<?xml version="1.0"?>
<?xml-stylesheet type="text/xsl" href="http://jsbsim.sourceforge.net/JSBSim.xsl"?>
<!-- Generated by hangar 0.1.0 from a10c.toml on 2026-10-01. Edit the design and rebuild; changes
     made here are overwritten.  -->
<fdm_config name="a10c" version="2.0" release="ALPHA"
            xmlns:xsi="http://www.w3.org/2001/XMLSchema-instance"
            xsi:noNamespaceSchemaLocation="http://jsbsim.sourceforge.net/JSBSim.xsd">
    <fileheader>
      <author>hangar</author>
      <filecreationdate>2026-10-01</filecreationdate>
      <version>0.1.0</version>
      <description>Fairchild Republic A-10C Thunderbolt II (hangar build)</description>
      <note>Aerodynamics: vortex lattice with viscous section polars, full-envelope
        strip model, slender-body fuselage (hangar). Mass: Raymer component
        weights on the geometry. Propeller: blade-element momentum theory.</note>
      <reference refID="fsim/applicability/aerobatic" author="the design" title="USAF fact sheet and design limits: +7.33 g (fsim/envelope/clean/n_max), flown in loops and rolls" date="n/a"/>
      <reference refID="fsim/applicability/carrier" author="the design" title="USAF fact sheet: a land-based close-support aircraft, with no launch bar or carrier arresting hook" date="n/a"/>
      <reference refID="fsim/applicability/drag_devices" author="the design" title="USAF fact sheet and Jenkins: split ailerons that open as speed brakes (decelerons)" date="n/a"/>
      <reference refID="fsim/applicability/flaps" author="the design" title="Jenkins, Fairchild-Republic A/OA-10 Warthog: trailing-edge flaps" date="n/a"/>
      <reference refID="fsim/applicability/ground_contact" author="the design" title="USAF fact sheet: tricycle wheeled landing gear" date="n/a"/>
      <reference refID="fsim/applicability/releasable_stores" author="the design" title="USAF fact sheet: eleven stations for bombs, missiles and rockets" date="n/a"/>
      <reference refID="fsim/applicability/retractable_gear" author="the design" title="Jenkins, Fairchild-Republic A/OA-10 Warthog: the main wheels retract forward into pods under the wing" date="n/a"/>
      <reference refID="fsim/applicability/vertical_flight" author="the design" title="USAF A-10C Thunderbolt II fact sheet: a conventional take-off and landing jet. Conventional take-off and landing: no rotors, lift fans or vectored lift to hover" date="n/a"/>
    </fileheader>
    <metrics>
      <wingarea unit="M2"> 46.8124 </wingarea>
      <wingspan unit="M"> 17.2400 </wingspan>
      <chord unit="M"> 2.7160 </chord>
      <htailarea unit="M2"> 11.5374 </htailarea>
      <htailarm unit="M"> 6.6690 </htailarm>
      <vtailarea unit="M2"> 9.3021 </vtailarea>
      <vtailarm unit="M"> 6.6311 </vtailarm>
      <location name="AERORP" unit="M">
        <x> 7.8535 </x>
        <y> 0.0000 </y>
        <z> 0.2004 </z>
      </location>
      <location name="EYEPOINT" unit="M">
        <x> 2.9000 </x>
        <y> 0.0000 </y>
        <z> 1.3000 </z>
      </location>
      <location name="VRP" unit="M">
        <x> 8.0900 </x>
        <y> 0.0000 </y>
        <z> 0.2500 </z>
      </location>
    </metrics>
    <mass_balance negated_crossproduct_inertia="false">
      <ixx unit="KG*M2"> 52253.89 </ixx>
      <iyy unit="KG*M2"> 105425.80 </iyy>
      <izz unit="KG*M2"> 148652.15 </izz>
      <ixy unit="KG*M2"> 67.025 </ixy>
      <ixz unit="KG*M2"> 8134.618 </ixz>
      <iyz unit="KG*M2"> -35.438 </iyz>
      <emptywt unit="KG"> 11321.00 </emptywt>
      <location name="CG" unit="M">
        <x> 8.0900 </x>
        <y> 0.0000 </y>
        <z> 0.2500 </z>
      </location>
      <pointmass name="pilot">
        <weight unit="KG"> 100.00 </weight>
        <location unit="M">
          <x> 2.9000 </x>
          <y> 0.0000 </y>
          <z> 0.6000 </z>
        </location>
      </pointmass>
      <pointmass name="gun ammunition">
        <weight unit="KG"> 820.00 </weight>
        <location unit="M">
          <x> 4.6000 </x>
          <y> 0.0000 </y>
          <z> -0.1000 </z>
        </location>
      </pointmass>
    </mass_balance>
    <ground_reactions>
      <contact type="BOGEY" name="Nose Gear">
        <location unit="M">
          <x> 3.1200 </x>
          <y> 0.2200 </y>
          <z> -2.0300 </z>
        </location>
        <static_friction> 0.8 </static_friction>
        <dynamic_friction> 0.5 </dynamic_friction>
        <rolling_friction> 0.02 </rolling_friction>
        <spring_coeff unit="N/M"> 192855 </spring_coeff>
        <damping_coeff unit="N/M/SEC"> 18475 </damping_coeff>
        <damping_coeff_rebound unit="N/M/SEC"> 36951 </damping_coeff_rebound>
        <max_steer unit="DEG"> 60.0 </max_steer>
        <brake_group> NONE </brake_group>
        <retractable> 1 </retractable>
      </contact>
      <contact type="BOGEY" name="Left Main Gear">
        <location unit="M">
          <x> 8.2800 </x>
          <y> -2.6250 </y>
          <z> -2.0300 </z>
        </location>
        <static_friction> 0.8 </static_friction>
        <dynamic_friction> 0.5 </dynamic_friction>
        <rolling_friction> 0.02 </rolling_friction>
        <spring_coeff unit="N/M"> 842341 </spring_coeff>
        <damping_coeff unit="N/M/SEC"> 80695 </damping_coeff>
        <damping_coeff_rebound unit="N/M/SEC"> 161391 </damping_coeff_rebound>
        <max_steer unit="DEG"> 0.0 </max_steer>
        <brake_group> LEFT </brake_group>
        <retractable> 1 </retractable>
      </contact>
      <contact type="BOGEY" name="Right Main Gear">
        <location unit="M">
          <x> 8.2800 </x>
          <y> 2.6250 </y>
          <z> -2.0300 </z>
        </location>
        <static_friction> 0.8 </static_friction>
        <dynamic_friction> 0.5 </dynamic_friction>
        <rolling_friction> 0.02 </rolling_friction>
        <spring_coeff unit="N/M"> 842341 </spring_coeff>
        <damping_coeff unit="N/M/SEC"> 80695 </damping_coeff>
        <damping_coeff_rebound unit="N/M/SEC"> 161391 </damping_coeff_rebound>
        <max_steer unit="DEG"> 0.0 </max_steer>
        <brake_group> RIGHT </brake_group>
        <retractable> 1 </retractable>
      </contact>
      <contact type="STRUCTURE" name="canopy front">
        <location unit="M">
          <x> 2.7075 </x>
          <y> 0.0000 </y>
          <z> 1.7203 </z>
        </location>
        <static_friction> 0.8 </static_friction>
        <dynamic_friction> 0.6 </dynamic_friction>
        <spring_coeff unit="N/M"> 2345934 </spring_coeff>
        <damping_coeff unit="N/M/SEC"> 78198 </damping_coeff>
        <damping_coeff_rebound unit="N/M/SEC"> 78198 </damping_coeff_rebound>
      </contact>
      <contact type="STRUCTURE" name="fin left rear">
        <location unit="M">
          <x> 15.2500 </x>
          <y> -2.8700 </y>
          <z> 2.5700 </z>
        </location>
        <static_friction> 0.8 </static_friction>
        <dynamic_friction> 0.6 </dynamic_friction>
        <spring_coeff unit="N/M"> 1126755 </spring_coeff>
        <damping_coeff unit="N/M/SEC"> 37559 </damping_coeff>
        <damping_coeff_rebound unit="N/M/SEC"> 37559 </damping_coeff_rebound>
      </contact>
      <contact type="STRUCTURE" name="fin left rear 2">
        <location unit="M">
          <x> 16.0300 </x>
          <y> -2.8700 </y>
          <z> -0.4600 </z>
        </location>
        <static_friction> 0.8 </static_friction>
        <dynamic_friction> 0.6 </dynamic_friction>
        <spring_coeff unit="N/M"> 1048136 </spring_coeff>
        <damping_coeff unit="N/M/SEC"> 34938 </damping_coeff>
        <damping_coeff_rebound unit="N/M/SEC"> 34938 </damping_coeff_rebound>
      </contact>
      <contact type="STRUCTURE" name="fin right rear">
        <location unit="M">
          <x> 15.2500 </x>
          <y> 2.8700 </y>
          <z> 2.5700 </z>
        </location>
        <static_friction> 0.8 </static_friction>
        <dynamic_friction> 0.6 </dynamic_friction>
        <spring_coeff unit="N/M"> 1128445 </spring_coeff>
        <damping_coeff unit="N/M/SEC"> 37615 </damping_coeff>
        <damping_coeff_rebound unit="N/M/SEC"> 37615 </damping_coeff_rebound>
      </contact>
      <contact type="STRUCTURE" name="fin right rear 2">
        <location unit="M">
          <x> 16.0300 </x>
          <y> 2.8700 </y>
          <z> -0.4600 </z>
        </location>
        <static_friction> 0.8 </static_friction>
        <dynamic_friction> 0.6 </dynamic_friction>
        <spring_coeff unit="N/M"> 1049394 </spring_coeff>
        <damping_coeff unit="N/M/SEC"> 34980 </damping_coeff>
        <damping_coeff_rebound unit="N/M/SEC"> 34980 </damping_coeff_rebound>
      </contact>
      <contact type="STRUCTURE" name="fuselage rear">
        <location unit="M">
          <x> 16.2600 </x>
          <y> 0.0000 </y>
          <z> 0.5200 </z>
        </location>
        <static_friction> 0.8 </static_friction>
        <dynamic_friction> 0.6 </dynamic_friction>
        <spring_coeff unit="N/M"> 1246262 </spring_coeff>
        <damping_coeff unit="N/M/SEC"> 41542 </damping_coeff>
        <damping_coeff_rebound unit="N/M/SEC"> 41542 </damping_coeff_rebound>
      </contact>
      <contact type="STRUCTURE" name="fuselage front">
        <location unit="M">
          <x> 0.3543 </x>
          <y> 0.0768 </y>
          <z> 0.4055 </z>
        </location>
        <static_friction> 0.8 </static_friction>
        <dynamic_friction> 0.6 </dynamic_friction>
        <spring_coeff unit="N/M"> 685656 </spring_coeff>
        <damping_coeff unit="N/M/SEC"> 22855 </damping_coeff>
        <damping_coeff_rebound unit="N/M/SEC"> 22855 </damping_coeff_rebound>
      </contact>
      <contact type="STRUCTURE" name="gear pod right bottom">
        <location unit="M">
          <x> 6.6429 </x>
          <y> 2.7796 </y>
          <z> -0.7419 </z>
        </location>
        <static_friction> 0.8 </static_friction>
        <dynamic_friction> 0.6 </dynamic_friction>
        <spring_coeff unit="N/M"> 3279125 </spring_coeff>
        <damping_coeff unit="N/M/SEC"> 109304 </damping_coeff>
        <damping_coeff_rebound unit="N/M/SEC"> 109304 </damping_coeff_rebound>
      </contact>
      <contact type="STRUCTURE" name="gun front">
        <location unit="M">
          <x> 0.0000 </x>
          <y> -0.0800 </y>
          <z> -0.4400 </z>
        </location>
        <static_friction> 0.8 </static_friction>
        <dynamic_friction> 0.6 </dynamic_friction>
        <spring_coeff unit="N/M"> 630469 </spring_coeff>
        <damping_coeff unit="N/M/SEC"> 21016 </damping_coeff>
        <damping_coeff_rebound unit="N/M/SEC"> 21016 </damping_coeff_rebound>
      </contact>
      <contact type="STRUCTURE" name="wing left rear">
        <location unit="M">
          <x> 9.5890 </x>
          <y> -8.6680 </y>
          <z> 0.5325 </z>
        </location>
        <static_friction> 0.8 </static_friction>
        <dynamic_friction> 0.6 </dynamic_friction>
        <spring_coeff unit="N/M"> 574050 </spring_coeff>
        <damping_coeff unit="N/M/SEC"> 19135 </damping_coeff>
        <damping_coeff_rebound unit="N/M/SEC"> 19135 </damping_coeff_rebound>
      </contact>
      <contact type="STRUCTURE" name="wing left front">
        <location unit="M">
          <x> 7.6113 </x>
          <y> -8.5396 </y>
          <z> 0.7038 </z>
        </location>
        <static_friction> 0.8 </static_friction>
        <dynamic_friction> 0.6 </dynamic_friction>
        <spring_coeff unit="N/M"> 596503 </spring_coeff>
        <damping_coeff unit="N/M/SEC"> 19883 </damping_coeff>
        <damping_coeff_rebound unit="N/M/SEC"> 19883 </damping_coeff_rebound>
      </contact>
      <contact type="STRUCTURE" name="wing right front">
        <location unit="M">
          <x> 7.6113 </x>
          <y> 8.5396 </y>
          <z> 0.7038 </z>
        </location>
        <static_friction> 0.8 </static_friction>
        <dynamic_friction> 0.6 </dynamic_friction>
        <spring_coeff unit="N/M"> 596434 </spring_coeff>
        <damping_coeff unit="N/M/SEC"> 19881 </damping_coeff>
        <damping_coeff_rebound unit="N/M/SEC"> 19881 </damping_coeff_rebound>
      </contact>
      <contact type="STRUCTURE" name="wing right rear">
        <location unit="M">
          <x> 9.5890 </x>
          <y> 8.6680 </y>
          <z> 0.5325 </z>
        </location>
        <static_friction> 0.8 </static_friction>
        <dynamic_friction> 0.6 </dynamic_friction>
        <spring_coeff unit="N/M"> 574276 </spring_coeff>
        <damping_coeff unit="N/M/SEC"> 19143 </damping_coeff>
        <damping_coeff_rebound unit="N/M/SEC"> 19143 </damping_coeff_rebound>
      </contact>
    </ground_reactions>
    <propulsion>
      <engine file="a10c_engine0">
        <location unit="M">
          <x> 11.3000 </x>
          <y> -1.5800 </y>
          <z> 1.1600 </z>
        </location>
        <feed>0</feed>
        <feed>1</feed>
        <feed>2</feed>
        <feed>3</feed>
        <thruster file="a10c_nozzle0">
          <location unit="M">
            <x> 13.0500 </x>
            <y> -1.5800 </y>
            <z> 1.1600 </z>
          </location>
          <orient unit="DEG"> <roll>0.00</roll> <pitch>0.00</pitch> <yaw>0.00</yaw> </orient>

        </thruster>
      </engine>
      <engine file="a10c_engine0">
        <location unit="M">
          <x> 11.3000 </x>
          <y> 1.5800 </y>
          <z> 1.1600 </z>
        </location>
        <feed>0</feed>
        <feed>1</feed>
        <feed>2</feed>
        <feed>3</feed>
        <thruster file="a10c_nozzle0">
          <location unit="M">
            <x> 13.0500 </x>
            <y> 1.5800 </y>
            <z> 1.1600 </z>
          </location>
          <orient unit="DEG"> <roll>0.00</roll> <pitch>0.00</pitch> <yaw>0.00</yaw> </orient>

        </thruster>
      </engine>
      <tank type="FUEL">
        <location unit="M">
          <x> 6.3000 </x>
          <y> 0.0000 </y>
          <z> 0.4500 </z>
        </location>
        <capacity unit="KG"> 1700.00 </capacity>
        <contents unit="KG"> 1700.00 </contents>
      </tank>
      <tank type="FUEL">
        <location unit="M">
          <x> 8.6000 </x>
          <y> 0.0000 </y>
          <z> 0.5500 </z>
        </location>
        <capacity unit="KG"> 1700.00 </capacity>
        <contents unit="KG"> 1700.00 </contents>
      </tank>
      <tank type="FUEL">
        <location unit="M">
          <x> 7.9000 </x>
          <y> -1.8000 </y>
          <z> 0.0500 </z>
        </location>
        <capacity unit="KG"> 795.00 </capacity>
        <contents unit="KG"> 795.00 </contents>
      </tank>
      <tank type="FUEL">
        <location unit="M">
          <x> 7.9000 </x>
          <y> 1.8000 </y>
          <z> 0.0500 </z>
        </location>
        <capacity unit="KG"> 795.00 </capacity>
        <contents unit="KG"> 795.00 </contents>
      </tank>
    </propulsion>
    <flight_control name="a10c">
      <!-- the aircraft's profile for the platform (docs/control-architecture.md, section 7): what
           hangar knows of it - its design, its flight tests, its identified responses -->
      <property value="1">fsim/identity/version</property>
      <property value="1">fsim/identity/provenance</property>
      <property value="3">fsim/identity/class</property>
      <property value="1">fsim/identity/family</property>
      <property value="1">fsim/effectors/version</property>
      <property value="1">fsim/effectors/provenance</property>
      <property value="1">fsim/effectors/flaps</property>
      <property value="8">fsim/effectors/flaps_transit_s</property>
      <property value="0.0">fsim/effectors/neutral</property>
      <property value="0.0">fsim/effectors/pitch</property>
      <property value="1">fsim/effectors/pitch_trim</property>
      <property value="1">fsim/effectors/retractable_gear</property>
      <property value="0.0">fsim/effectors/roll</property>
      <property value="1">fsim/effectors/speedbrake</property>
      <property value="1">fsim/effectors/speedbrake_approach</property>
      <property value="1">fsim/effectors/wheel_brakes</property>
      <property value="0.0">fsim/effectors/yaw</property>
      <property value="1">fsim/envelope/version</property>
      <property value="1">fsim/envelope/provenance</property>
      <property value="14.8092">fsim/envelope/clean/alpha_max_deg</property>
      <property value="55.8816">fsim/envelope/clean/cas_min_ms</property>
      <property value="7.33">fsim/envelope/clean/n_max</property>
      <property value="15.43">fsim/envelope/crosswind_max_ms</property>
      <property value="95.17">fsim/envelope/flaps/cas_max_ms</property>
      <property value="0.35">fsim/envelope/flaps_threshold</property>
      <property value="10.81">fsim/envelope/ground_pitch_max_deg</property>
      <property value="3.65">fsim/envelope/ground_turn_radius_m</property>
      <property value="0.1709">fsim/envelope/ground_yaw_accel_rad_s2</property>
      <property value="1">fsim/propulsion/version</property>
      <property value="1">fsim/propulsion/provenance</property>
      <property value="0.0">fsim/propulsion/afterburner</property>
      <property value="2">fsim/propulsion/engines</property>
      <property value="0.0986749">fsim/propulsion/spool_s</property>
      <property value="2">fsim/propulsion/type</property>
      <property value="1">fsim/plant/version</property>
      <property value="1">fsim/plant/provenance</property>
      <property value="-7.19715">fsim/plant/alpha_zero_lift_deg</property>
      <property value="3000">fsim/plant/altitude_m</property>
      <property value="130.769">fsim/plant/eas_ms</property>
      <property value="-0.111777">fsim/plant/elevator_trim</property>
      <property value="-0.114644">fsim/plant/elevator_trim_lift</property>
      <property value="10.6307">fsim/plant/pitch/gain</property>
      <property value="0.381037">fsim/plant/pitch/tau_s</property>
      <property value="4.08783">fsim/plant/roll/gain</property>
      <property value="0.189688">fsim/plant/roll/tau_s</property>
      <property value="3.66295">fsim/plant/speed/gain</property>
      <property value="0.0986749">fsim/plant/speed/tau_s</property>
      <property value="150.616">fsim/plant/tas_ms</property>
      <property value="0.807996">fsim/plant/throttle_trim</property>
      <property value="0.481414">fsim/plant/yaw/gain</property>
      <property value="1">fsim/performance/version</property>
      <property value="1">fsim/performance/provenance</property>
      <property value="9071.29">fsim/performance/ceiling_m</property>
      <property value="194.825">fsim/performance/max_tas_ms</property>
      <property value="55.8816">fsim/performance/stall_cas_ms</property>
      <property value="52.1744">fsim/performance/stall_flaps_cas_ms</property>
      <property value="1">fsim/applicability/version</property>
      <property value="1">fsim/applicability/provenance</property>
      <property value="1">fsim/applicability/aerobatic</property>
      <property value="1">fsim/applicability/carrier</property>
      <property value="2">fsim/applicability/drag_devices</property>
      <property value="1">fsim/applicability/flaps</property>
      <property value="1">fsim/applicability/ground_contact</property>
      <property value="2">fsim/applicability/releasable_stores</property>
      <property value="1">fsim/applicability/retractable_gear</property>
      <property value="0.0">fsim/applicability/vertical_flight</property>
      <property value="1">fsim/tables/version</property>
      <property value="1">fsim/tables/provenance</property>
      <property value="100">fsim/tables/altitude_m/h0</property>
      <property value="1810">fsim/tables/altitude_m/h1</property>
      <property value="3630">fsim/tables/altitude_m/h2</property>
      <property value="5440">fsim/tables/altitude_m/h3</property>
      <property value="6800">fsim/tables/altitude_m/h4</property>
      <property value="7710">fsim/tables/altitude_m/h5</property>
      <property value="8620">fsim/tables/altitude_m/h6</property>
      <property value="0.201804">fsim/tables/best_endurance_fuel_kg_s/h0/w0</property>
      <property value="0.221968">fsim/tables/best_endurance_fuel_kg_s/h0/w1</property>
      <property value="0.243067">fsim/tables/best_endurance_fuel_kg_s/h0/w2</property>
      <property value="0.181724">fsim/tables/best_endurance_fuel_kg_s/h1/w0</property>
      <property value="0.202505">fsim/tables/best_endurance_fuel_kg_s/h1/w1</property>
      <property value="0.223846">fsim/tables/best_endurance_fuel_kg_s/h1/w2</property>
      <property value="0.166818">fsim/tables/best_endurance_fuel_kg_s/h2/w0</property>
      <property value="0.184465">fsim/tables/best_endurance_fuel_kg_s/h2/w1</property>
      <property value="0.205355">fsim/tables/best_endurance_fuel_kg_s/h2/w2</property>
      <property value="0.166818">fsim/tables/best_endurance_fuel_kg_s/h3/w0</property>
      <property value="0.168902">fsim/tables/best_endurance_fuel_kg_s/h3/w1</property>
      <property value="0.188804">fsim/tables/best_endurance_fuel_kg_s/h3/w2</property>
      <property value="0.166818">fsim/tables/best_endurance_fuel_kg_s/h4/w0</property>
      <property value="0.166818">fsim/tables/best_endurance_fuel_kg_s/h4/w1</property>
      <property value="0.178002">fsim/tables/best_endurance_fuel_kg_s/h4/w2</property>
      <property value="0.166818">fsim/tables/best_endurance_fuel_kg_s/h5/w0</property>
      <property value="0.166818">fsim/tables/best_endurance_fuel_kg_s/h5/w1</property>
      <property value="0.172097">fsim/tables/best_endurance_fuel_kg_s/h5/w2</property>
      <property value="0.166818">fsim/tables/best_endurance_fuel_kg_s/h6/w0</property>
      <property value="0.166818">fsim/tables/best_endurance_fuel_kg_s/h6/w1</property>
      <property value="0.167342">fsim/tables/best_endurance_fuel_kg_s/h6/w2</property>
      <property value="82.8138">fsim/tables/best_endurance_tas_ms/h0/w0</property>
      <property value="83.718">fsim/tables/best_endurance_tas_ms/h0/w1</property>
      <property value="85.3062">fsim/tables/best_endurance_tas_ms/h0/w2</property>
      <property value="82.5814">fsim/tables/best_endurance_tas_ms/h1/w0</property>
      <property value="84.5973">fsim/tables/best_endurance_tas_ms/h1/w1</property>
      <property value="86.8204">fsim/tables/best_endurance_tas_ms/h1/w2</property>
      <property value="83.5991">fsim/tables/best_endurance_tas_ms/h2/w0</property>
      <property value="86.7079">fsim/tables/best_endurance_tas_ms/h2/w1</property>
      <property value="96.93">fsim/tables/best_endurance_tas_ms/h2/w2</property>
      <property value="86.4524">fsim/tables/best_endurance_tas_ms/h3/w0</property>
      <property value="98.1887">fsim/tables/best_endurance_tas_ms/h3/w1</property>
      <property value="106.253">fsim/tables/best_endurance_tas_ms/h3/w2</property>
      <property value="89.722">fsim/tables/best_endurance_tas_ms/h4/w0</property>
      <property value="94.5694">fsim/tables/best_endurance_tas_ms/h4/w1</property>
      <property value="113.578">fsim/tables/best_endurance_tas_ms/h4/w2</property>
      <property value="92.5493">fsim/tables/best_endurance_tas_ms/h5/w0</property>
      <property value="97.905">fsim/tables/best_endurance_tas_ms/h5/w1</property>
      <property value="118.7">fsim/tables/best_endurance_tas_ms/h5/w2</property>
      <property value="95.6866">fsim/tables/best_endurance_tas_ms/h6/w0</property>
      <property value="101.63">fsim/tables/best_endurance_tas_ms/h6/w1</property>
      <property value="125.3">fsim/tables/best_endurance_tas_ms/h6/w2</property>
      <property value="0.233825">fsim/tables/best_range_fuel_kg_s/h0/w0</property>
      <property value="0.264221">fsim/tables/best_range_fuel_kg_s/h0/w1</property>
      <property value="0.290967">fsim/tables/best_range_fuel_kg_s/h0/w2</property>
      <property value="0.218445">fsim/tables/best_range_fuel_kg_s/h1/w0</property>
      <property value="0.244803">fsim/tables/best_range_fuel_kg_s/h1/w1</property>
      <property value="0.26917">fsim/tables/best_range_fuel_kg_s/h1/w2</property>
      <property value="0.197114">fsim/tables/best_range_fuel_kg_s/h2/w0</property>
      <property value="0.219561">fsim/tables/best_range_fuel_kg_s/h2/w1</property>
      <property value="0.240183">fsim/tables/best_range_fuel_kg_s/h2/w2</property>
      <property value="0.177894">fsim/tables/best_range_fuel_kg_s/h3/w0</property>
      <property value="0.198169">fsim/tables/best_range_fuel_kg_s/h3/w1</property>
      <property value="0.21633">fsim/tables/best_range_fuel_kg_s/h3/w2</property>
      <property value="0.171719">fsim/tables/best_range_fuel_kg_s/h4/w0</property>
      <property value="0.179358">fsim/tables/best_range_fuel_kg_s/h4/w1</property>
      <property value="0.201223">fsim/tables/best_range_fuel_kg_s/h4/w2</property>
      <property value="0.171301">fsim/tables/best_range_fuel_kg_s/h5/w0</property>
      <property value="0.173332">fsim/tables/best_range_fuel_kg_s/h5/w1</property>
      <property value="0.193972">fsim/tables/best_range_fuel_kg_s/h5/w2</property>
      <property value="0.169946">fsim/tables/best_range_fuel_kg_s/h6/w0</property>
      <property value="0.170841">fsim/tables/best_range_fuel_kg_s/h6/w1</property>
      <property value="0.182105">fsim/tables/best_range_fuel_kg_s/h6/w2</property>
      <property value="99.8641">fsim/tables/best_range_tas_ms/h0/w0</property>
      <property value="108.681">fsim/tables/best_range_tas_ms/h0/w1</property>
      <property value="115.901">fsim/tables/best_range_tas_ms/h0/w2</property>
      <property value="109.296">fsim/tables/best_range_tas_ms/h1/w0</property>
      <property value="117.952">fsim/tables/best_range_tas_ms/h1/w1</property>
      <property value="125.376">fsim/tables/best_range_tas_ms/h1/w2</property>
      <property value="118.221">fsim/tables/best_range_tas_ms/h2/w0</property>
      <property value="126.413">fsim/tables/best_range_tas_ms/h2/w1</property>
      <property value="132.988">fsim/tables/best_range_tas_ms/h2/w2</property>
      <property value="127.563">fsim/tables/best_range_tas_ms/h3/w0</property>
      <property value="135.564">fsim/tables/best_range_tas_ms/h3/w1</property>
      <property value="141.395">fsim/tables/best_range_tas_ms/h3/w2</property>
      <property value="140.186">fsim/tables/best_range_tas_ms/h4/w0</property>
      <property value="139.445">fsim/tables/best_range_tas_ms/h4/w1</property>
      <property value="148.515">fsim/tables/best_range_tas_ms/h4/w2</property>
      <property value="151.431">fsim/tables/best_range_tas_ms/h5/w0</property>
      <property value="146.351">fsim/tables/best_range_tas_ms/h5/w1</property>
      <property value="154.446">fsim/tables/best_range_tas_ms/h5/w2</property>
      <property value="161.65">fsim/tables/best_range_tas_ms/h6/w0</property>
      <property value="155.988">fsim/tables/best_range_tas_ms/h6/w1</property>
      <property value="154.958">fsim/tables/best_range_tas_ms/h6/w2</property>
      <property value="112.922">fsim/tables/climb_tas_ms/h0/w0</property>
      <property value="114.305">fsim/tables/climb_tas_ms/h0/w1</property>
      <property value="114.386">fsim/tables/climb_tas_ms/h0/w2</property>
      <property value="113.83">fsim/tables/climb_tas_ms/h1/w0</property>
      <property value="115.528">fsim/tables/climb_tas_ms/h1/w1</property>
      <property value="117.868">fsim/tables/climb_tas_ms/h1/w2</property>
      <property value="114.192">fsim/tables/climb_tas_ms/h2/w0</property>
      <property value="115.503">fsim/tables/climb_tas_ms/h2/w1</property>
      <property value="119.038">fsim/tables/climb_tas_ms/h2/w2</property>
      <property value="115.359">fsim/tables/climb_tas_ms/h3/w0</property>
      <property value="119.03">fsim/tables/climb_tas_ms/h3/w1</property>
      <property value="120.635">fsim/tables/climb_tas_ms/h3/w2</property>
      <property value="117.763">fsim/tables/climb_tas_ms/h4/w0</property>
      <property value="120.285">fsim/tables/climb_tas_ms/h4/w1</property>
      <property value="119.826">fsim/tables/climb_tas_ms/h4/w2</property>
      <property value="117.982">fsim/tables/climb_tas_ms/h5/w0</property>
      <property value="125.47">fsim/tables/climb_tas_ms/h5/w1</property>
      <property value="122.462">fsim/tables/climb_tas_ms/h5/w2</property>
      <property value="120.296">fsim/tables/climb_tas_ms/h6/w0</property>
      <property value="118.73">fsim/tables/climb_tas_ms/h6/w1</property>
      <property value="126.732">fsim/tables/climb_tas_ms/h6/w2</property>
      <property value="4990">fsim/tables/fuel_capacity_kg</property>
      <property value="0.201767">fsim/tables/fuel_kg_s/h0/w0/v0</property>
      <property value="0.212413">fsim/tables/fuel_kg_s/h0/w0/v1</property>
      <property value="0.405741">fsim/tables/fuel_kg_s/h0/w0/v10</property>
      <property value="0.435654">fsim/tables/fuel_kg_s/h0/w0/v11</property>
      <property value="0.467742">fsim/tables/fuel_kg_s/h0/w0/v12</property>
      <property value="0.502016">fsim/tables/fuel_kg_s/h0/w0/v13</property>
      <property value="0.538803">fsim/tables/fuel_kg_s/h0/w0/v14</property>
      <property value="0.57847">fsim/tables/fuel_kg_s/h0/w0/v15</property>
      <property value="0.227067">fsim/tables/fuel_kg_s/h0/w0/v2</property>
      <property value="0.243978">fsim/tables/fuel_kg_s/h0/w0/v3</property>
      <property value="0.262262">fsim/tables/fuel_kg_s/h0/w0/v4</property>
      <property value="0.283022">fsim/tables/fuel_kg_s/h0/w0/v5</property>
      <property value="0.304419">fsim/tables/fuel_kg_s/h0/w0/v6</property>
      <property value="0.327724">fsim/tables/fuel_kg_s/h0/w0/v7</property>
      <property value="0.352504">fsim/tables/fuel_kg_s/h0/w0/v8</property>
      <property value="0.378469">fsim/tables/fuel_kg_s/h0/w0/v9</property>
      <property value="0.221944">fsim/tables/fuel_kg_s/h0/w1/v0</property>
      <property value="0.228924">fsim/tables/fuel_kg_s/h0/w1/v1</property>
      <property value="0.409856">fsim/tables/fuel_kg_s/h0/w1/v10</property>
      <property value="0.438492">fsim/tables/fuel_kg_s/h0/w1/v11</property>
      <property value="0.468913">fsim/tables/fuel_kg_s/h0/w1/v12</property>
      <property value="0.502909">fsim/tables/fuel_kg_s/h0/w1/v13</property>
      <property value="0.539364">fsim/tables/fuel_kg_s/h0/w1/v14</property>
      <property value="0.578633">fsim/tables/fuel_kg_s/h0/w1/v15</property>
      <property value="0.239936">fsim/tables/fuel_kg_s/h0/w1/v2</property>
      <property value="0.254845">fsim/tables/fuel_kg_s/h0/w1/v3</property>
      <property value="0.271884">fsim/tables/fuel_kg_s/h0/w1/v4</property>
      <property value="0.290498">fsim/tables/fuel_kg_s/h0/w1/v5</property>
      <property value="0.311415">fsim/tables/fuel_kg_s/h0/w1/v6</property>
      <property value="0.33344">fsim/tables/fuel_kg_s/h0/w1/v7</property>
      <property value="0.356902">fsim/tables/fuel_kg_s/h0/w1/v8</property>
      <property value="0.382734">fsim/tables/fuel_kg_s/h0/w1/v9</property>
      <property value="0.243049">fsim/tables/fuel_kg_s/h0/w2/v0</property>
      <property value="0.248125">fsim/tables/fuel_kg_s/h0/w2/v1</property>
      <property value="0.414772">fsim/tables/fuel_kg_s/h0/w2/v10</property>
      <property value="0.443116">fsim/tables/fuel_kg_s/h0/w2/v11</property>
      <property value="0.473178">fsim/tables/fuel_kg_s/h0/w2/v12</property>
      <property value="0.505166">fsim/tables/fuel_kg_s/h0/w2/v13</property>
      <property value="0.540129">fsim/tables/fuel_kg_s/h0/w2/v14</property>
      <property value="0.578766">fsim/tables/fuel_kg_s/h0/w2/v15</property>
      <property value="0.256423">fsim/tables/fuel_kg_s/h0/w2/v2</property>
      <property value="0.268067">fsim/tables/fuel_kg_s/h0/w2/v3</property>
      <property value="0.283468">fsim/tables/fuel_kg_s/h0/w2/v4</property>
      <property value="0.300993">fsim/tables/fuel_kg_s/h0/w2/v5</property>
      <property value="0.320014">fsim/tables/fuel_kg_s/h0/w2/v6</property>
      <property value="0.341291">fsim/tables/fuel_kg_s/h0/w2/v7</property>
      <property value="0.364086">fsim/tables/fuel_kg_s/h0/w2/v8</property>
      <property value="0.387939">fsim/tables/fuel_kg_s/h0/w2/v9</property>
      <property value="0.181708">fsim/tables/fuel_kg_s/h1/w0/v0</property>
      <property value="0.187087">fsim/tables/fuel_kg_s/h1/w0/v1</property>
      <property value="0.336074">fsim/tables/fuel_kg_s/h1/w0/v10</property>
      <property value="0.360067">fsim/tables/fuel_kg_s/h1/w0/v11</property>
      <property value="0.385523">fsim/tables/fuel_kg_s/h1/w0/v12</property>
      <property value="0.41399">fsim/tables/fuel_kg_s/h1/w0/v13</property>
      <property value="0.444498">fsim/tables/fuel_kg_s/h1/w0/v14</property>
      <property value="0.477316">fsim/tables/fuel_kg_s/h1/w0/v15</property>
      <property value="0.195799">fsim/tables/fuel_kg_s/h1/w0/v2</property>
      <property value="0.207822">fsim/tables/fuel_kg_s/h1/w0/v3</property>
      <property value="0.221607">fsim/tables/fuel_kg_s/h1/w0/v4</property>
      <property value="0.236946">fsim/tables/fuel_kg_s/h1/w0/v5</property>
      <property value="0.254042">fsim/tables/fuel_kg_s/h1/w0/v6</property>
      <property value="0.272251">fsim/tables/fuel_kg_s/h1/w0/v7</property>
      <property value="0.291754">fsim/tables/fuel_kg_s/h1/w0/v8</property>
      <property value="0.31336">fsim/tables/fuel_kg_s/h1/w0/v9</property>
      <property value="0.202493">fsim/tables/fuel_kg_s/h1/w1/v0</property>
      <property value="0.206367">fsim/tables/fuel_kg_s/h1/w1/v1</property>
      <property value="0.341042">fsim/tables/fuel_kg_s/h1/w1/v10</property>
      <property value="0.364718">fsim/tables/fuel_kg_s/h1/w1/v11</property>
      <property value="0.389813">fsim/tables/fuel_kg_s/h1/w1/v12</property>
      <property value="0.416498">fsim/tables/fuel_kg_s/h1/w1/v13</property>
      <property value="0.44525">fsim/tables/fuel_kg_s/h1/w1/v14</property>
      <property value="0.477395">fsim/tables/fuel_kg_s/h1/w1/v15</property>
      <property value="0.212314">fsim/tables/fuel_kg_s/h1/w1/v2</property>
      <property value="0.221361">fsim/tables/fuel_kg_s/h1/w1/v3</property>
      <property value="0.233525">fsim/tables/fuel_kg_s/h1/w1/v4</property>
      <property value="0.247394">fsim/tables/fuel_kg_s/h1/w1/v5</property>
      <property value="0.263056">fsim/tables/fuel_kg_s/h1/w1/v6</property>
      <property value="0.280121">fsim/tables/fuel_kg_s/h1/w1/v7</property>
      <property value="0.299154">fsim/tables/fuel_kg_s/h1/w1/v8</property>
      <property value="0.319061">fsim/tables/fuel_kg_s/h1/w1/v9</property>
      <property value="0.223839">fsim/tables/fuel_kg_s/h1/w2/v0</property>
      <property value="0.226103">fsim/tables/fuel_kg_s/h1/w2/v1</property>
      <property value="0.347326">fsim/tables/fuel_kg_s/h1/w2/v10</property>
      <property value="0.369512">fsim/tables/fuel_kg_s/h1/w2/v11</property>
      <property value="0.394223">fsim/tables/fuel_kg_s/h1/w2/v12</property>
      <property value="0.420477">fsim/tables/fuel_kg_s/h1/w2/v13</property>
      <property value="0.448477">fsim/tables/fuel_kg_s/h1/w2/v14</property>
      <property value="0.478434">fsim/tables/fuel_kg_s/h1/w2/v15</property>
      <property value="0.230478">fsim/tables/fuel_kg_s/h1/w2/v2</property>
      <property value="0.237113">fsim/tables/fuel_kg_s/h1/w2/v3</property>
      <property value="0.246706">fsim/tables/fuel_kg_s/h1/w2/v4</property>
      <property value="0.259225">fsim/tables/fuel_kg_s/h1/w2/v5</property>
      <property value="0.273385">fsim/tables/fuel_kg_s/h1/w2/v6</property>
      <property value="0.289475">fsim/tables/fuel_kg_s/h1/w2/v7</property>
      <property value="0.307002">fsim/tables/fuel_kg_s/h1/w2/v8</property>
      <property value="0.32668">fsim/tables/fuel_kg_s/h1/w2/v9</property>
      <property value="0.166818">fsim/tables/fuel_kg_s/h2/w0/v0</property>
      <property value="0.166818">fsim/tables/fuel_kg_s/h2/w0/v1</property>
      <property value="0.2701">fsim/tables/fuel_kg_s/h2/w0/v10</property>
      <property value="0.28905">fsim/tables/fuel_kg_s/h2/w0/v11</property>
      <property value="0.309127">fsim/tables/fuel_kg_s/h2/w0/v12</property>
      <property value="0.330458">fsim/tables/fuel_kg_s/h2/w0/v13</property>
      <property value="0.353205">fsim/tables/fuel_kg_s/h2/w0/v14</property>
      <property value="0.378463">fsim/tables/fuel_kg_s/h2/w0/v15</property>
      <property value="0.170561">fsim/tables/fuel_kg_s/h2/w0/v2</property>
      <property value="0.176928">fsim/tables/fuel_kg_s/h2/w0/v3</property>
      <property value="0.186058">fsim/tables/fuel_kg_s/h2/w0/v4</property>
      <property value="0.196449">fsim/tables/fuel_kg_s/h2/w0/v5</property>
      <property value="0.208808">fsim/tables/fuel_kg_s/h2/w0/v6</property>
      <property value="0.221846">fsim/tables/fuel_kg_s/h2/w0/v7</property>
      <property value="0.237065">fsim/tables/fuel_kg_s/h2/w0/v8</property>
      <property value="0.252994">fsim/tables/fuel_kg_s/h2/w0/v9</property>
      <property value="0.184462">fsim/tables/fuel_kg_s/h2/w1/v0</property>
      <property value="0.18577">fsim/tables/fuel_kg_s/h2/w1/v1</property>
      <property value="0.276946">fsim/tables/fuel_kg_s/h2/w1/v10</property>
      <property value="0.294204">fsim/tables/fuel_kg_s/h2/w1/v11</property>
      <property value="0.313196">fsim/tables/fuel_kg_s/h2/w1/v12</property>
      <property value="0.333951">fsim/tables/fuel_kg_s/h2/w1/v13</property>
      <property value="0.356027">fsim/tables/fuel_kg_s/h2/w1/v14</property>
      <property value="0.37958">fsim/tables/fuel_kg_s/h2/w1/v15</property>
      <property value="0.188776">fsim/tables/fuel_kg_s/h2/w1/v2</property>
      <property value="0.193241">fsim/tables/fuel_kg_s/h2/w1/v3</property>
      <property value="0.199965">fsim/tables/fuel_kg_s/h2/w1/v4</property>
      <property value="0.208898">fsim/tables/fuel_kg_s/h2/w1/v5</property>
      <property value="0.219403">fsim/tables/fuel_kg_s/h2/w1/v6</property>
      <property value="0.231898">fsim/tables/fuel_kg_s/h2/w1/v7</property>
      <property value="0.245385">fsim/tables/fuel_kg_s/h2/w1/v8</property>
      <property value="0.260556">fsim/tables/fuel_kg_s/h2/w1/v9</property>
      <property value="0.208534">fsim/tables/fuel_kg_s/h2/w2/v0</property>
      <property value="0.205394">fsim/tables/fuel_kg_s/h2/w2/v1</property>
      <property value="0.281953">fsim/tables/fuel_kg_s/h2/w2/v10</property>
      <property value="0.298478">fsim/tables/fuel_kg_s/h2/w2/v11</property>
      <property value="0.315866">fsim/tables/fuel_kg_s/h2/w2/v12</property>
      <property value="0.334184">fsim/tables/fuel_kg_s/h2/w2/v13</property>
      <property value="0.354704">fsim/tables/fuel_kg_s/h2/w2/v14</property>
      <property value="0.376893">fsim/tables/fuel_kg_s/h2/w2/v15</property>
      <property value="0.207269">fsim/tables/fuel_kg_s/h2/w2/v2</property>
      <property value="0.210317">fsim/tables/fuel_kg_s/h2/w2/v3</property>
      <property value="0.215169">fsim/tables/fuel_kg_s/h2/w2/v4</property>
      <property value="0.222191">fsim/tables/fuel_kg_s/h2/w2/v5</property>
      <property value="0.23076">fsim/tables/fuel_kg_s/h2/w2/v6</property>
      <property value="0.241502">fsim/tables/fuel_kg_s/h2/w2/v7</property>
      <property value="0.25387">fsim/tables/fuel_kg_s/h2/w2/v8</property>
      <property value="0.267452">fsim/tables/fuel_kg_s/h2/w2/v9</property>
      <property value="0.166818">fsim/tables/fuel_kg_s/h3/w0/v0</property>
      <property value="0.166818">fsim/tables/fuel_kg_s/h3/w0/v1</property>
      <property value="0.216099">fsim/tables/fuel_kg_s/h3/w0/v10</property>
      <property value="0.229225">fsim/tables/fuel_kg_s/h3/w0/v11</property>
      <property value="0.243058">fsim/tables/fuel_kg_s/h3/w0/v12</property>
      <property value="0.25862">fsim/tables/fuel_kg_s/h3/w0/v13</property>
      <property value="0.275357">fsim/tables/fuel_kg_s/h3/w0/v14</property>
      <property value="0.293196">fsim/tables/fuel_kg_s/h3/w0/v15</property>
      <property value="0.166818">fsim/tables/fuel_kg_s/h3/w0/v2</property>
      <property value="0.166818">fsim/tables/fuel_kg_s/h3/w0/v3</property>
      <property value="0.166818">fsim/tables/fuel_kg_s/h3/w0/v4</property>
      <property value="0.166818">fsim/tables/fuel_kg_s/h3/w0/v5</property>
      <property value="0.173621">fsim/tables/fuel_kg_s/h3/w0/v6</property>
      <property value="0.182512">fsim/tables/fuel_kg_s/h3/w0/v7</property>
      <property value="0.19279">fsim/tables/fuel_kg_s/h3/w0/v8</property>
      <property value="0.203626">fsim/tables/fuel_kg_s/h3/w0/v9</property>
      <property value="0.17305">fsim/tables/fuel_kg_s/h3/w1/v0</property>
      <property value="0.169109">fsim/tables/fuel_kg_s/h3/w1/v1</property>
      <property value="0.22227">fsim/tables/fuel_kg_s/h3/w1/v10</property>
      <property value="0.2337">fsim/tables/fuel_kg_s/h3/w1/v11</property>
      <property value="0.246748">fsim/tables/fuel_kg_s/h3/w1/v12</property>
      <property value="0.260475">fsim/tables/fuel_kg_s/h3/w1/v13</property>
      <property value="0.274962">fsim/tables/fuel_kg_s/h3/w1/v14</property>
      <property value="0.290953">fsim/tables/fuel_kg_s/h3/w1/v15</property>
      <property value="0.170171">fsim/tables/fuel_kg_s/h3/w1/v2</property>
      <property value="0.172262">fsim/tables/fuel_kg_s/h3/w1/v3</property>
      <property value="0.175294">fsim/tables/fuel_kg_s/h3/w1/v4</property>
      <property value="0.179484">fsim/tables/fuel_kg_s/h3/w1/v5</property>
      <property value="0.185286">fsim/tables/fuel_kg_s/h3/w1/v6</property>
      <property value="0.19308">fsim/tables/fuel_kg_s/h3/w1/v7</property>
      <property value="0.20161">fsim/tables/fuel_kg_s/h3/w1/v8</property>
      <property value="0.211576">fsim/tables/fuel_kg_s/h3/w1/v9</property>
      <property value="0.196316">fsim/tables/fuel_kg_s/h3/w2/v0</property>
      <property value="0.190851">fsim/tables/fuel_kg_s/h3/w2/v1</property>
      <property value="0.230098">fsim/tables/fuel_kg_s/h3/w2/v10</property>
      <property value="0.240763">fsim/tables/fuel_kg_s/h3/w2/v11</property>
      <property value="0.251893">fsim/tables/fuel_kg_s/h3/w2/v12</property>
      <property value="0.263877">fsim/tables/fuel_kg_s/h3/w2/v13</property>
      <property value="0.277486">fsim/tables/fuel_kg_s/h3/w2/v14</property>
      <property value="0.291814">fsim/tables/fuel_kg_s/h3/w2/v15</property>
      <property value="0.188821">fsim/tables/fuel_kg_s/h3/w2/v2</property>
      <property value="0.190175">fsim/tables/fuel_kg_s/h3/w2/v3</property>
      <property value="0.192347">fsim/tables/fuel_kg_s/h3/w2/v4</property>
      <property value="0.195454">fsim/tables/fuel_kg_s/h3/w2/v5</property>
      <property value="0.199455">fsim/tables/fuel_kg_s/h3/w2/v6</property>
      <property value="0.205508">fsim/tables/fuel_kg_s/h3/w2/v7</property>
      <property value="0.212443">fsim/tables/fuel_kg_s/h3/w2/v8</property>
      <property value="0.220977">fsim/tables/fuel_kg_s/h3/w2/v9</property>
      <property value="0.166818">fsim/tables/fuel_kg_s/h4/w0/v0</property>
      <property value="0.166818">fsim/tables/fuel_kg_s/h4/w0/v1</property>
      <property value="0.182073">fsim/tables/fuel_kg_s/h4/w0/v10</property>
      <property value="0.191133">fsim/tables/fuel_kg_s/h4/w0/v11</property>
      <property value="0.201687">fsim/tables/fuel_kg_s/h4/w0/v12</property>
      <property value="0.21279">fsim/tables/fuel_kg_s/h4/w0/v13</property>
      <property value="0.224506">fsim/tables/fuel_kg_s/h4/w0/v14</property>
      <property value="0.237209">fsim/tables/fuel_kg_s/h4/w0/v15</property>
      <property value="0.166818">fsim/tables/fuel_kg_s/h4/w0/v2</property>
      <property value="0.166818">fsim/tables/fuel_kg_s/h4/w0/v3</property>
      <property value="0.166818">fsim/tables/fuel_kg_s/h4/w0/v4</property>
      <property value="0.166818">fsim/tables/fuel_kg_s/h4/w0/v5</property>
      <property value="0.166818">fsim/tables/fuel_kg_s/h4/w0/v6</property>
      <property value="0.166818">fsim/tables/fuel_kg_s/h4/w0/v7</property>
      <property value="0.166818">fsim/tables/fuel_kg_s/h4/w0/v8</property>
      <property value="0.17342">fsim/tables/fuel_kg_s/h4/w0/v9</property>
      <property value="0.166818">fsim/tables/fuel_kg_s/h4/w1/v0</property>
      <property value="0.166818">fsim/tables/fuel_kg_s/h4/w1/v1</property>
      <property value="0.189914">fsim/tables/fuel_kg_s/h4/w1/v10</property>
      <property value="0.198042">fsim/tables/fuel_kg_s/h4/w1/v11</property>
      <property value="0.206905">fsim/tables/fuel_kg_s/h4/w1/v12</property>
      <property value="0.216133">fsim/tables/fuel_kg_s/h4/w1/v13</property>
      <property value="0.226539">fsim/tables/fuel_kg_s/h4/w1/v14</property>
      <property value="0.23789">fsim/tables/fuel_kg_s/h4/w1/v15</property>
      <property value="0.166818">fsim/tables/fuel_kg_s/h4/w1/v2</property>
      <property value="0.166818">fsim/tables/fuel_kg_s/h4/w1/v3</property>
      <property value="0.166818">fsim/tables/fuel_kg_s/h4/w1/v4</property>
      <property value="0.166818">fsim/tables/fuel_kg_s/h4/w1/v5</property>
      <property value="0.166818">fsim/tables/fuel_kg_s/h4/w1/v6</property>
      <property value="0.170932">fsim/tables/fuel_kg_s/h4/w1/v7</property>
      <property value="0.176031">fsim/tables/fuel_kg_s/h4/w1/v8</property>
      <property value="0.182854">fsim/tables/fuel_kg_s/h4/w1/v9</property>
      <property value="0.188199">fsim/tables/fuel_kg_s/h4/w2/v0</property>
      <property value="0.183266">fsim/tables/fuel_kg_s/h4/w2/v1</property>
      <property value="0.199166">fsim/tables/fuel_kg_s/h4/w2/v10</property>
      <property value="0.205986">fsim/tables/fuel_kg_s/h4/w2/v11</property>
      <property value="0.213057">fsim/tables/fuel_kg_s/h4/w2/v12</property>
      <property value="0.220843">fsim/tables/fuel_kg_s/h4/w2/v13</property>
      <property value="0.229655">fsim/tables/fuel_kg_s/h4/w2/v14</property>
      <property value="0.238835">fsim/tables/fuel_kg_s/h4/w2/v15</property>
      <property value="0.178977">fsim/tables/fuel_kg_s/h4/w2/v2</property>
      <property value="0.178002">fsim/tables/fuel_kg_s/h4/w2/v3</property>
      <property value="0.17905">fsim/tables/fuel_kg_s/h4/w2/v4</property>
      <property value="0.18064">fsim/tables/fuel_kg_s/h4/w2/v5</property>
      <property value="0.182562">fsim/tables/fuel_kg_s/h4/w2/v6</property>
      <property value="0.185672">fsim/tables/fuel_kg_s/h4/w2/v7</property>
      <property value="0.189226">fsim/tables/fuel_kg_s/h4/w2/v8</property>
      <property value="0.194062">fsim/tables/fuel_kg_s/h4/w2/v9</property>
      <property value="0.166818">fsim/tables/fuel_kg_s/h5/w0/v0</property>
      <property value="0.166818">fsim/tables/fuel_kg_s/h5/w0/v1</property>
      <property value="0.166818">fsim/tables/fuel_kg_s/h5/w0/v10</property>
      <property value="0.171638">fsim/tables/fuel_kg_s/h5/w0/v11</property>
      <property value="0.179541">fsim/tables/fuel_kg_s/h5/w0/v12</property>
      <property value="0.188199">fsim/tables/fuel_kg_s/h5/w0/v13</property>
      <property value="0.197887">fsim/tables/fuel_kg_s/h5/w0/v14</property>
      <property value="0.208096">fsim/tables/fuel_kg_s/h5/w0/v15</property>
      <property value="0.166818">fsim/tables/fuel_kg_s/h5/w0/v2</property>
      <property value="0.166818">fsim/tables/fuel_kg_s/h5/w0/v3</property>
      <property value="0.166818">fsim/tables/fuel_kg_s/h5/w0/v4</property>
      <property value="0.166818">fsim/tables/fuel_kg_s/h5/w0/v5</property>
      <property value="0.166818">fsim/tables/fuel_kg_s/h5/w0/v6</property>
      <property value="0.166818">fsim/tables/fuel_kg_s/h5/w0/v7</property>
      <property value="0.166818">fsim/tables/fuel_kg_s/h5/w0/v8</property>
      <property value="0.166818">fsim/tables/fuel_kg_s/h5/w0/v9</property>
      <property value="0.166818">fsim/tables/fuel_kg_s/h5/w1/v0</property>
      <property value="0.166818">fsim/tables/fuel_kg_s/h5/w1/v1</property>
      <property value="0.172872">fsim/tables/fuel_kg_s/h5/w1/v10</property>
      <property value="0.178902">fsim/tables/fuel_kg_s/h5/w1/v11</property>
      <property value="0.185128">fsim/tables/fuel_kg_s/h5/w1/v12</property>
      <property value="0.19246">fsim/tables/fuel_kg_s/h5/w1/v13</property>
      <property value="0.200264">fsim/tables/fuel_kg_s/h5/w1/v14</property>
      <property value="0.208402">fsim/tables/fuel_kg_s/h5/w1/v15</property>
      <property value="0.166818">fsim/tables/fuel_kg_s/h5/w1/v2</property>
      <property value="0.166818">fsim/tables/fuel_kg_s/h5/w1/v3</property>
      <property value="0.166818">fsim/tables/fuel_kg_s/h5/w1/v4</property>
      <property value="0.166818">fsim/tables/fuel_kg_s/h5/w1/v5</property>
      <property value="0.166818">fsim/tables/fuel_kg_s/h5/w1/v6</property>
      <property value="0.166818">fsim/tables/fuel_kg_s/h5/w1/v7</property>
      <property value="0.166818">fsim/tables/fuel_kg_s/h5/w1/v8</property>
      <property value="0.167608">fsim/tables/fuel_kg_s/h5/w1/v9</property>
      <property value="0.183952">fsim/tables/fuel_kg_s/h5/w2/v0</property>
      <property value="0.179618">fsim/tables/fuel_kg_s/h5/w2/v1</property>
      <property value="0.183792">fsim/tables/fuel_kg_s/h5/w2/v10</property>
      <property value="0.187826">fsim/tables/fuel_kg_s/h5/w2/v11</property>
      <property value="0.191934">fsim/tables/fuel_kg_s/h5/w2/v12</property>
      <property value="0.197291">fsim/tables/fuel_kg_s/h5/w2/v13</property>
      <property value="0.203105">fsim/tables/fuel_kg_s/h5/w2/v14</property>
      <property value="0.20909">fsim/tables/fuel_kg_s/h5/w2/v15</property>
      <property value="0.175667">fsim/tables/fuel_kg_s/h5/w2/v2</property>
      <property value="0.172457">fsim/tables/fuel_kg_s/h5/w2/v3</property>
      <property value="0.172136">fsim/tables/fuel_kg_s/h5/w2/v4</property>
      <property value="0.173084">fsim/tables/fuel_kg_s/h5/w2/v5</property>
      <property value="0.174423">fsim/tables/fuel_kg_s/h5/w2/v6</property>
      <property value="0.176023">fsim/tables/fuel_kg_s/h5/w2/v7</property>
      <property value="0.178114">fsim/tables/fuel_kg_s/h5/w2/v8</property>
      <property value="0.180657">fsim/tables/fuel_kg_s/h5/w2/v9</property>
      <property value="0.166818">fsim/tables/fuel_kg_s/h6/w0/v0</property>
      <property value="0.166818">fsim/tables/fuel_kg_s/h6/w0/v1</property>
      <property value="0.166818">fsim/tables/fuel_kg_s/h6/w0/v10</property>
      <property value="0.166818">fsim/tables/fuel_kg_s/h6/w0/v11</property>
      <property value="0.166818">fsim/tables/fuel_kg_s/h6/w0/v12</property>
      <property value="0.166818">fsim/tables/fuel_kg_s/h6/w0/v13</property>
      <property value="0.171483">fsim/tables/fuel_kg_s/h6/w0/v14</property>
      <property value="0.178654">fsim/tables/fuel_kg_s/h6/w0/v15</property>
      <property value="0.166818">fsim/tables/fuel_kg_s/h6/w0/v2</property>
      <property value="0.166818">fsim/tables/fuel_kg_s/h6/w0/v3</property>
      <property value="0.166818">fsim/tables/fuel_kg_s/h6/w0/v4</property>
      <property value="0.166818">fsim/tables/fuel_kg_s/h6/w0/v5</property>
      <property value="0.166818">fsim/tables/fuel_kg_s/h6/w0/v6</property>
      <property value="0.166818">fsim/tables/fuel_kg_s/h6/w0/v7</property>
      <property value="0.166818">fsim/tables/fuel_kg_s/h6/w0/v8</property>
      <property value="0.166818">fsim/tables/fuel_kg_s/h6/w0/v9</property>
      <property value="0.166818">fsim/tables/fuel_kg_s/h6/w1/v0</property>
      <property value="0.166818">fsim/tables/fuel_kg_s/h6/w1/v1</property>
      <property value="0.166818">fsim/tables/fuel_kg_s/h6/w1/v10</property>
      <property value="0.166818">fsim/tables/fuel_kg_s/h6/w1/v11</property>
      <property value="0.166818">fsim/tables/fuel_kg_s/h6/w1/v12</property>
      <property value="0.169383">fsim/tables/fuel_kg_s/h6/w1/v13</property>
      <property value="0.174383">fsim/tables/fuel_kg_s/h6/w1/v14</property>
      <property value="0.179533">fsim/tables/fuel_kg_s/h6/w1/v15</property>
      <property value="0.166818">fsim/tables/fuel_kg_s/h6/w1/v2</property>
      <property value="0.166818">fsim/tables/fuel_kg_s/h6/w1/v3</property>
      <property value="0.166818">fsim/tables/fuel_kg_s/h6/w1/v4</property>
      <property value="0.166818">fsim/tables/fuel_kg_s/h6/w1/v5</property>
      <property value="0.166818">fsim/tables/fuel_kg_s/h6/w1/v6</property>
      <property value="0.166818">fsim/tables/fuel_kg_s/h6/w1/v7</property>
      <property value="0.166818">fsim/tables/fuel_kg_s/h6/w1/v8</property>
      <property value="0.166818">fsim/tables/fuel_kg_s/h6/w1/v9</property>
      <property value="0.181932">fsim/tables/fuel_kg_s/h6/w2/v0</property>
      <property value="0.177758">fsim/tables/fuel_kg_s/h6/w2/v1</property>
      <property value="0.171386">fsim/tables/fuel_kg_s/h6/w2/v10</property>
      <property value="0.172844">fsim/tables/fuel_kg_s/h6/w2/v11</property>
      <property value="0.17474">fsim/tables/fuel_kg_s/h6/w2/v12</property>
      <property value="0.176617">fsim/tables/fuel_kg_s/h6/w2/v13</property>
      <property value="0.179116">fsim/tables/fuel_kg_s/h6/w2/v14</property>
      <property value="0.182115">fsim/tables/fuel_kg_s/h6/w2/v15</property>
      <property value="0.174534">fsim/tables/fuel_kg_s/h6/w2/v2</property>
      <property value="0.171439">fsim/tables/fuel_kg_s/h6/w2/v3</property>
      <property value="0.168755">fsim/tables/fuel_kg_s/h6/w2/v4</property>
      <property value="0.167585">fsim/tables/fuel_kg_s/h6/w2/v5</property>
      <property value="0.167389">fsim/tables/fuel_kg_s/h6/w2/v6</property>
      <property value="0.168201">fsim/tables/fuel_kg_s/h6/w2/v7</property>
      <property value="0.169053">fsim/tables/fuel_kg_s/h6/w2/v8</property>
      <property value="0.17024">fsim/tables/fuel_kg_s/h6/w2/v9</property>
      <property value="36.6038">fsim/tables/max_climb_ms/h0/w0</property>
      <property value="30.4647">fsim/tables/max_climb_ms/h0/w1</property>
      <property value="25.7866">fsim/tables/max_climb_ms/h0/w2</property>
      <property value="29.2">fsim/tables/max_climb_ms/h1/w0</property>
      <property value="24.0045">fsim/tables/max_climb_ms/h1/w1</property>
      <property value="20.0522">fsim/tables/max_climb_ms/h1/w2</property>
      <property value="21.6618">fsim/tables/max_climb_ms/h2/w0</property>
      <property value="17.4549">fsim/tables/max_climb_ms/h2/w1</property>
      <property value="14.2125">fsim/tables/max_climb_ms/h2/w2</property>
      <property value="15.5693">fsim/tables/max_climb_ms/h3/w0</property>
      <property value="12.0381">fsim/tables/max_climb_ms/h3/w1</property>
      <property value="9.23693">fsim/tables/max_climb_ms/h3/w2</property>
      <property value="11.4716">fsim/tables/max_climb_ms/h4/w0</property>
      <property value="8.30586">fsim/tables/max_climb_ms/h4/w1</property>
      <property value="5.81148">fsim/tables/max_climb_ms/h4/w2</property>
      <property value="9.06056">fsim/tables/max_climb_ms/h5/w0</property>
      <property value="6.10866">fsim/tables/max_climb_ms/h5/w1</property>
      <property value="3.80731">fsim/tables/max_climb_ms/h5/w2</property>
      <property value="6.50239">fsim/tables/max_climb_ms/h6/w0</property>
      <property value="3.83939">fsim/tables/max_climb_ms/h6/w1</property>
      <property value="1.74395">fsim/tables/max_climb_ms/h6/w2</property>
      <property value="195.399">fsim/tables/max_tas_ms/h0/w0</property>
      <property value="195.124">fsim/tables/max_tas_ms/h0/w1</property>
      <property value="194.852">fsim/tables/max_tas_ms/h0/w2</property>
      <property value="194.77">fsim/tables/max_tas_ms/h1/w0</property>
      <property value="194.425">fsim/tables/max_tas_ms/h1/w1</property>
      <property value="194.096">fsim/tables/max_tas_ms/h1/w2</property>
      <property value="192.158">fsim/tables/max_tas_ms/h2/w0</property>
      <property value="191.531">fsim/tables/max_tas_ms/h2/w1</property>
      <property value="189.596">fsim/tables/max_tas_ms/h2/w2</property>
      <property value="187.237">fsim/tables/max_tas_ms/h3/w0</property>
      <property value="184.968">fsim/tables/max_tas_ms/h3/w1</property>
      <property value="183.063">fsim/tables/max_tas_ms/h3/w2</property>
      <property value="181.76">fsim/tables/max_tas_ms/h4/w0</property>
      <property value="179.251">fsim/tables/max_tas_ms/h4/w1</property>
      <property value="176.217">fsim/tables/max_tas_ms/h4/w2</property>
      <property value="178.711">fsim/tables/max_tas_ms/h5/w0</property>
      <property value="175.274">fsim/tables/max_tas_ms/h5/w1</property>
      <property value="170.399">fsim/tables/max_tas_ms/h5/w2</property>
      <property value="173.253">fsim/tables/max_tas_ms/h6/w0</property>
      <property value="168.002">fsim/tables/max_tas_ms/h6/w1</property>
      <property value="159.751">fsim/tables/max_tas_ms/h6/w2</property>
      <property value="82.8138">fsim/tables/min_tas_ms/h0/w0</property>
      <property value="83.718">fsim/tables/min_tas_ms/h0/w1</property>
      <property value="85.3062">fsim/tables/min_tas_ms/h0/w2</property>
      <property value="82.5814">fsim/tables/min_tas_ms/h1/w0</property>
      <property value="84.5973">fsim/tables/min_tas_ms/h1/w1</property>
      <property value="86.8204">fsim/tables/min_tas_ms/h1/w2</property>
      <property value="83.5991">fsim/tables/min_tas_ms/h2/w0</property>
      <property value="86.7079">fsim/tables/min_tas_ms/h2/w1</property>
      <property value="89.8867">fsim/tables/min_tas_ms/h2/w2</property>
      <property value="86.4524">fsim/tables/min_tas_ms/h3/w0</property>
      <property value="90.5709">fsim/tables/min_tas_ms/h3/w1</property>
      <property value="94.6566">fsim/tables/min_tas_ms/h3/w2</property>
      <property value="89.722">fsim/tables/min_tas_ms/h4/w0</property>
      <property value="94.5694">fsim/tables/min_tas_ms/h4/w1</property>
      <property value="99.3528">fsim/tables/min_tas_ms/h4/w2</property>
      <property value="92.5493">fsim/tables/min_tas_ms/h5/w0</property>
      <property value="97.905">fsim/tables/min_tas_ms/h5/w1</property>
      <property value="103.161">fsim/tables/min_tas_ms/h5/w2</property>
      <property value="95.6866">fsim/tables/min_tas_ms/h6/w0</property>
      <property value="101.63">fsim/tables/min_tas_ms/h6/w1</property>
      <property value="107.151">fsim/tables/min_tas_ms/h6/w2</property>
      <property value="31.9377">fsim/tables/ps_full_ms/h0/w0/v0</property>
      <property value="34.4375">fsim/tables/ps_full_ms/h0/w0/v1</property>
      <property value="28.6485">fsim/tables/ps_full_ms/h0/w0/v10</property>
      <property value="25.3808">fsim/tables/ps_full_ms/h0/w0/v11</property>
      <property value="21.3874">fsim/tables/ps_full_ms/h0/w0/v12</property>
      <property value="16.7541">fsim/tables/ps_full_ms/h0/w0/v13</property>
      <property value="11.4579">fsim/tables/ps_full_ms/h0/w0/v14</property>
      <property value="5.47196">fsim/tables/ps_full_ms/h0/w0/v15</property>
      <property value="35.7092">fsim/tables/ps_full_ms/h0/w0/v2</property>
      <property value="36.3433">fsim/tables/ps_full_ms/h0/w0/v3</property>
      <property value="36.5977">fsim/tables/ps_full_ms/h0/w0/v4</property>
      <property value="36.459">fsim/tables/ps_full_ms/h0/w0/v5</property>
      <property value="35.8834">fsim/tables/ps_full_ms/h0/w0/v6</property>
      <property value="34.858">fsim/tables/ps_full_ms/h0/w0/v7</property>
      <property value="33.3129">fsim/tables/ps_full_ms/h0/w0/v8</property>
      <property value="31.2549">fsim/tables/ps_full_ms/h0/w0/v9</property>
      <property value="26.093">fsim/tables/ps_full_ms/h0/w1/v0</property>
      <property value="28.625">fsim/tables/ps_full_ms/h0/w1/v1</property>
      <property value="23.9244">fsim/tables/ps_full_ms/h0/w1/v10</property>
      <property value="21.2067">fsim/tables/ps_full_ms/h0/w1/v11</property>
      <property value="18.0044">fsim/tables/ps_full_ms/h0/w1/v12</property>
      <property value="14.1389">fsim/tables/ps_full_ms/h0/w1/v13</property>
      <property value="9.6737">fsim/tables/ps_full_ms/h0/w1/v14</property>
      <property value="4.63799">fsim/tables/ps_full_ms/h0/w1/v15</property>
      <property value="29.8169">fsim/tables/ps_full_ms/h0/w1/v2</property>
      <property value="30.2861">fsim/tables/ps_full_ms/h0/w1/v3</property>
      <property value="30.4565">fsim/tables/ps_full_ms/h0/w1/v4</property>
      <property value="30.3929">fsim/tables/ps_full_ms/h0/w1/v5</property>
      <property value="29.9901">fsim/tables/ps_full_ms/h0/w1/v6</property>
      <property value="29.1383">fsim/tables/ps_full_ms/h0/w1/v7</property>
      <property value="27.9113">fsim/tables/ps_full_ms/h0/w1/v8</property>
      <property value="26.172">fsim/tables/ps_full_ms/h0/w1/v9</property>
      <property value="21.7364">fsim/tables/ps_full_ms/h0/w2/v0</property>
      <property value="24.2133">fsim/tables/ps_full_ms/h0/w2/v1</property>
      <property value="20.3616">fsim/tables/ps_full_ms/h0/w2/v10</property>
      <property value="17.9918">fsim/tables/ps_full_ms/h0/w2/v11</property>
      <property value="15.2173">fsim/tables/ps_full_ms/h0/w2/v12</property>
      <property value="12.0255">fsim/tables/ps_full_ms/h0/w2/v13</property>
      <property value="8.33214">fsim/tables/ps_full_ms/h0/w2/v14</property>
      <property value="4.02394">fsim/tables/ps_full_ms/h0/w2/v15</property>
      <property value="25.3823">fsim/tables/ps_full_ms/h0/w2/v2</property>
      <property value="25.7278">fsim/tables/ps_full_ms/h0/w2/v3</property>
      <property value="25.7843">fsim/tables/ps_full_ms/h0/w2/v4</property>
      <property value="25.7557">fsim/tables/ps_full_ms/h0/w2/v5</property>
      <property value="25.4954">fsim/tables/ps_full_ms/h0/w2/v6</property>
      <property value="24.813">fsim/tables/ps_full_ms/h0/w2/v7</property>
      <property value="23.7137">fsim/tables/ps_full_ms/h0/w2/v8</property>
      <property value="22.2821">fsim/tables/ps_full_ms/h0/w2/v9</property>
      <property value="25.1277">fsim/tables/ps_full_ms/h1/w0/v0</property>
      <property value="27.3287">fsim/tables/ps_full_ms/h1/w0/v1</property>
      <property value="22.9135">fsim/tables/ps_full_ms/h1/w0/v10</property>
      <property value="20.3347">fsim/tables/ps_full_ms/h1/w0/v11</property>
      <property value="17.2841">fsim/tables/ps_full_ms/h1/w0/v12</property>
      <property value="13.5823">fsim/tables/ps_full_ms/h1/w0/v13</property>
      <property value="9.28912">fsim/tables/ps_full_ms/h1/w0/v14</property>
      <property value="4.43529">fsim/tables/ps_full_ms/h1/w0/v15</property>
      <property value="28.4393">fsim/tables/ps_full_ms/h1/w0/v2</property>
      <property value="28.9538">fsim/tables/ps_full_ms/h1/w0/v3</property>
      <property value="29.1815">fsim/tables/ps_full_ms/h1/w0/v4</property>
      <property value="29.1277">fsim/tables/ps_full_ms/h1/w0/v5</property>
      <property value="28.6865">fsim/tables/ps_full_ms/h1/w0/v6</property>
      <property value="27.8098">fsim/tables/ps_full_ms/h1/w0/v7</property>
      <property value="26.6624">fsim/tables/ps_full_ms/h1/w0/v8</property>
      <property value="25.0365">fsim/tables/ps_full_ms/h1/w0/v9</property>
      <property value="20.3543">fsim/tables/ps_full_ms/h1/w1/v0</property>
      <property value="22.4632">fsim/tables/ps_full_ms/h1/w1/v1</property>
      <property value="18.9628">fsim/tables/ps_full_ms/h1/w1/v10</property>
      <property value="16.7633">fsim/tables/ps_full_ms/h1/w1/v11</property>
      <property value="14.1805">fsim/tables/ps_full_ms/h1/w1/v12</property>
      <property value="11.2034">fsim/tables/ps_full_ms/h1/w1/v13</property>
      <property value="7.79681">fsim/tables/ps_full_ms/h1/w1/v14</property>
      <property value="3.75886">fsim/tables/ps_full_ms/h1/w1/v15</property>
      <property value="23.4694">fsim/tables/ps_full_ms/h1/w1/v2</property>
      <property value="23.8662">fsim/tables/ps_full_ms/h1/w1/v3</property>
      <property value="23.9897">fsim/tables/ps_full_ms/h1/w1/v4</property>
      <property value="23.982">fsim/tables/ps_full_ms/h1/w1/v5</property>
      <property value="23.689">fsim/tables/ps_full_ms/h1/w1/v6</property>
      <property value="23.0053">fsim/tables/ps_full_ms/h1/w1/v7</property>
      <property value="22.0071">fsim/tables/ps_full_ms/h1/w1/v8</property>
      <property value="20.6949">fsim/tables/ps_full_ms/h1/w1/v9</property>
      <property value="16.7461">fsim/tables/ps_full_ms/h1/w2/v0</property>
      <property value="18.8199">fsim/tables/ps_full_ms/h1/w2/v1</property>
      <property value="15.8692">fsim/tables/ps_full_ms/h1/w2/v10</property>
      <property value="14.0999">fsim/tables/ps_full_ms/h1/w2/v11</property>
      <property value="11.8717">fsim/tables/ps_full_ms/h1/w2/v12</property>
      <property value="9.30767">fsim/tables/ps_full_ms/h1/w2/v13</property>
      <property value="6.40245">fsim/tables/ps_full_ms/h1/w2/v14</property>
      <property value="3.14257">fsim/tables/ps_full_ms/h1/w2/v15</property>
      <property value="19.5894">fsim/tables/ps_full_ms/h1/w2/v2</property>
      <property value="19.9143">fsim/tables/ps_full_ms/h1/w2/v3</property>
      <property value="20.0327">fsim/tables/ps_full_ms/h1/w2/v4</property>
      <property value="20.0379">fsim/tables/ps_full_ms/h1/w2/v5</property>
      <property value="19.8712">fsim/tables/ps_full_ms/h1/w2/v6</property>
      <property value="19.306">fsim/tables/ps_full_ms/h1/w2/v7</property>
      <property value="18.5075">fsim/tables/ps_full_ms/h1/w2/v8</property>
      <property value="17.3327">fsim/tables/ps_full_ms/h1/w2/v9</property>
      <property value="18.542">fsim/tables/ps_full_ms/h2/w0/v0</property>
      <property value="20.2227">fsim/tables/ps_full_ms/h2/w0/v1</property>
      <property value="17.1019">fsim/tables/ps_full_ms/h2/w0/v10</property>
      <property value="15.1304">fsim/tables/ps_full_ms/h2/w0/v11</property>
      <property value="12.7961">fsim/tables/ps_full_ms/h2/w0/v12</property>
      <property value="10.0996">fsim/tables/ps_full_ms/h2/w0/v13</property>
      <property value="7.0239">fsim/tables/ps_full_ms/h2/w0/v14</property>
      <property value="3.42">fsim/tables/ps_full_ms/h2/w0/v15</property>
      <property value="21.0327">fsim/tables/ps_full_ms/h2/w0/v2</property>
      <property value="21.4643">fsim/tables/ps_full_ms/h2/w0/v3</property>
      <property value="21.6451">fsim/tables/ps_full_ms/h2/w0/v4</property>
      <property value="21.6302">fsim/tables/ps_full_ms/h2/w0/v5</property>
      <property value="21.2931">fsim/tables/ps_full_ms/h2/w0/v6</property>
      <property value="20.6364">fsim/tables/ps_full_ms/h2/w0/v7</property>
      <property value="19.7794">fsim/tables/ps_full_ms/h2/w0/v8</property>
      <property value="18.6036">fsim/tables/ps_full_ms/h2/w0/v9</property>
      <property value="14.6585">fsim/tables/ps_full_ms/h2/w1/v0</property>
      <property value="16.2617">fsim/tables/ps_full_ms/h2/w1/v1</property>
      <property value="13.7732">fsim/tables/ps_full_ms/h2/w1/v10</property>
      <property value="12.2429">fsim/tables/ps_full_ms/h2/w1/v11</property>
      <property value="10.3839">fsim/tables/ps_full_ms/h2/w1/v12</property>
      <property value="8.13668">fsim/tables/ps_full_ms/h2/w1/v13</property>
      <property value="5.59223">fsim/tables/ps_full_ms/h2/w1/v14</property>
      <property value="2.73802">fsim/tables/ps_full_ms/h2/w1/v15</property>
      <property value="16.8669">fsim/tables/ps_full_ms/h2/w1/v2</property>
      <property value="17.2557">fsim/tables/ps_full_ms/h2/w1/v3</property>
      <property value="17.44">fsim/tables/ps_full_ms/h2/w1/v4</property>
      <property value="17.4144">fsim/tables/ps_full_ms/h2/w1/v5</property>
      <property value="17.1832">fsim/tables/ps_full_ms/h2/w1/v6</property>
      <property value="16.6889">fsim/tables/ps_full_ms/h2/w1/v7</property>
      <property value="16.0169">fsim/tables/ps_full_ms/h2/w1/v8</property>
      <property value="15.0576">fsim/tables/ps_full_ms/h2/w1/v9</property>
      <property value="11.6294">fsim/tables/ps_full_ms/h2/w2/v0</property>
      <property value="13.2603">fsim/tables/ps_full_ms/h2/w2/v1</property>
      <property value="11.4454">fsim/tables/ps_full_ms/h2/w2/v10</property>
      <property value="10.1621">fsim/tables/ps_full_ms/h2/w2/v11</property>
      <property value="8.67356">fsim/tables/ps_full_ms/h2/w2/v12</property>
      <property value="6.9831">fsim/tables/ps_full_ms/h2/w2/v13</property>
      <property value="4.95987">fsim/tables/ps_full_ms/h2/w2/v14</property>
      <property value="2.64168">fsim/tables/ps_full_ms/h2/w2/v15</property>
      <property value="13.6395">fsim/tables/ps_full_ms/h2/w2/v2</property>
      <property value="13.9078">fsim/tables/ps_full_ms/h2/w2/v3</property>
      <property value="14.1546">fsim/tables/ps_full_ms/h2/w2/v4</property>
      <property value="14.1885">fsim/tables/ps_full_ms/h2/w2/v5</property>
      <property value="13.9835">fsim/tables/ps_full_ms/h2/w2/v6</property>
      <property value="13.6778">fsim/tables/ps_full_ms/h2/w2/v7</property>
      <property value="13.1775">fsim/tables/ps_full_ms/h2/w2/v8</property>
      <property value="12.3976">fsim/tables/ps_full_ms/h2/w2/v9</property>
      <property value="13.137">fsim/tables/ps_full_ms/h3/w0/v0</property>
      <property value="14.5228">fsim/tables/ps_full_ms/h3/w0/v1</property>
      <property value="12.3058">fsim/tables/ps_full_ms/h3/w0/v10</property>
      <property value="10.9129">fsim/tables/ps_full_ms/h3/w0/v11</property>
      <property value="9.29895">fsim/tables/ps_full_ms/h3/w0/v12</property>
      <property value="7.32771">fsim/tables/ps_full_ms/h3/w0/v13</property>
      <property value="5.04464">fsim/tables/ps_full_ms/h3/w0/v14</property>
      <property value="2.49032">fsim/tables/ps_full_ms/h3/w0/v15</property>
      <property value="14.9283">fsim/tables/ps_full_ms/h3/w0/v2</property>
      <property value="15.2684">fsim/tables/ps_full_ms/h3/w0/v3</property>
      <property value="15.5278">fsim/tables/ps_full_ms/h3/w0/v4</property>
      <property value="15.5447">fsim/tables/ps_full_ms/h3/w0/v5</property>
      <property value="15.3044">fsim/tables/ps_full_ms/h3/w0/v6</property>
      <property value="14.9034">fsim/tables/ps_full_ms/h3/w0/v7</property>
      <property value="14.2759">fsim/tables/ps_full_ms/h3/w0/v8</property>
      <property value="13.4588">fsim/tables/ps_full_ms/h3/w0/v9</property>
      <property value="9.92437">fsim/tables/ps_full_ms/h3/w1/v0</property>
      <property value="11.131">fsim/tables/ps_full_ms/h3/w1/v1</property>
      <property value="9.70239">fsim/tables/ps_full_ms/h3/w1/v10</property>
      <property value="8.69866">fsim/tables/ps_full_ms/h3/w1/v11</property>
      <property value="7.39843">fsim/tables/ps_full_ms/h3/w1/v12</property>
      <property value="5.92555">fsim/tables/ps_full_ms/h3/w1/v13</property>
      <property value="4.27733">fsim/tables/ps_full_ms/h3/w1/v14</property>
      <property value="2.36404">fsim/tables/ps_full_ms/h3/w1/v15</property>
      <property value="11.4948">fsim/tables/ps_full_ms/h3/w1/v2</property>
      <property value="11.7448">fsim/tables/ps_full_ms/h3/w1/v3</property>
      <property value="11.9678">fsim/tables/ps_full_ms/h3/w1/v4</property>
      <property value="12.0321">fsim/tables/ps_full_ms/h3/w1/v5</property>
      <property value="11.835">fsim/tables/ps_full_ms/h3/w1/v6</property>
      <property value="11.5999">fsim/tables/ps_full_ms/h3/w1/v7</property>
      <property value="11.2085">fsim/tables/ps_full_ms/h3/w1/v8</property>
      <property value="10.548">fsim/tables/ps_full_ms/h3/w1/v9</property>
      <property value="7.34011">fsim/tables/ps_full_ms/h3/w2/v0</property>
      <property value="8.48694">fsim/tables/ps_full_ms/h3/w2/v1</property>
      <property value="7.63433">fsim/tables/ps_full_ms/h3/w2/v10</property>
      <property value="6.79246">fsim/tables/ps_full_ms/h3/w2/v11</property>
      <property value="5.83915">fsim/tables/ps_full_ms/h3/w2/v12</property>
      <property value="4.74351">fsim/tables/ps_full_ms/h3/w2/v13</property>
      <property value="3.40048">fsim/tables/ps_full_ms/h3/w2/v14</property>
      <property value="1.92157">fsim/tables/ps_full_ms/h3/w2/v15</property>
      <property value="8.79365">fsim/tables/ps_full_ms/h3/w2/v2</property>
      <property value="8.98605">fsim/tables/ps_full_ms/h3/w2/v3</property>
      <property value="9.17008">fsim/tables/ps_full_ms/h3/w2/v4</property>
      <property value="9.22413">fsim/tables/ps_full_ms/h3/w2/v5</property>
      <property value="9.13563">fsim/tables/ps_full_ms/h3/w2/v6</property>
      <property value="8.95756">fsim/tables/ps_full_ms/h3/w2/v7</property>
      <property value="8.70061">fsim/tables/ps_full_ms/h3/w2/v8</property>
      <property value="8.25085">fsim/tables/ps_full_ms/h3/w2/v9</property>
      <property value="9.50052">fsim/tables/ps_full_ms/h4/w0/v0</property>
      <property value="10.6799">fsim/tables/ps_full_ms/h4/w0/v1</property>
      <property value="9.21998">fsim/tables/ps_full_ms/h4/w0/v10</property>
      <property value="8.26968">fsim/tables/ps_full_ms/h4/w0/v11</property>
      <property value="7.04166">fsim/tables/ps_full_ms/h4/w0/v12</property>
      <property value="5.634">fsim/tables/ps_full_ms/h4/w0/v13</property>
      <property value="4.06066">fsim/tables/ps_full_ms/h4/w0/v14</property>
      <property value="2.27216">fsim/tables/ps_full_ms/h4/w0/v15</property>
      <property value="10.9497">fsim/tables/ps_full_ms/h4/w0/v2</property>
      <property value="11.1396">fsim/tables/ps_full_ms/h4/w0/v3</property>
      <property value="11.3751">fsim/tables/ps_full_ms/h4/w0/v4</property>
      <property value="11.4686">fsim/tables/ps_full_ms/h4/w0/v5</property>
      <property value="11.2758">fsim/tables/ps_full_ms/h4/w0/v6</property>
      <property value="11.0563">fsim/tables/ps_full_ms/h4/w0/v7</property>
      <property value="10.6453">fsim/tables/ps_full_ms/h4/w0/v8</property>
      <property value="10.0353">fsim/tables/ps_full_ms/h4/w0/v9</property>
      <property value="6.69696">fsim/tables/ps_full_ms/h4/w1/v0</property>
      <property value="7.5268">fsim/tables/ps_full_ms/h4/w1/v1</property>
      <property value="6.89183">fsim/tables/ps_full_ms/h4/w1/v10</property>
      <property value="6.16708">fsim/tables/ps_full_ms/h4/w1/v11</property>
      <property value="5.28808">fsim/tables/ps_full_ms/h4/w1/v12</property>
      <property value="4.31265">fsim/tables/ps_full_ms/h4/w1/v13</property>
      <property value="3.14405">fsim/tables/ps_full_ms/h4/w1/v14</property>
      <property value="1.79735">fsim/tables/ps_full_ms/h4/w1/v15</property>
      <property value="7.91558">fsim/tables/ps_full_ms/h4/w1/v2</property>
      <property value="8.12282">fsim/tables/ps_full_ms/h4/w1/v3</property>
      <property value="8.22916">fsim/tables/ps_full_ms/h4/w1/v4</property>
      <property value="8.30207">fsim/tables/ps_full_ms/h4/w1/v5</property>
      <property value="8.22008">fsim/tables/ps_full_ms/h4/w1/v6</property>
      <property value="8.08895">fsim/tables/ps_full_ms/h4/w1/v7</property>
      <property value="7.86608">fsim/tables/ps_full_ms/h4/w1/v8</property>
      <property value="7.45483">fsim/tables/ps_full_ms/h4/w1/v9</property>
      <property value="4.40265">fsim/tables/ps_full_ms/h4/w2/v0</property>
      <property value="5.06506">fsim/tables/ps_full_ms/h4/w2/v1</property>
      <property value="4.99209">fsim/tables/ps_full_ms/h4/w2/v10</property>
      <property value="4.49475">fsim/tables/ps_full_ms/h4/w2/v11</property>
      <property value="3.8964">fsim/tables/ps_full_ms/h4/w2/v12</property>
      <property value="3.19308">fsim/tables/ps_full_ms/h4/w2/v13</property>
      <property value="2.3415">fsim/tables/ps_full_ms/h4/w2/v14</property>
      <property value="1.41625">fsim/tables/ps_full_ms/h4/w2/v15</property>
      <property value="5.45119">fsim/tables/ps_full_ms/h4/w2/v2</property>
      <property value="5.68782">fsim/tables/ps_full_ms/h4/w2/v3</property>
      <property value="5.79807">fsim/tables/ps_full_ms/h4/w2/v4</property>
      <property value="5.76654">fsim/tables/ps_full_ms/h4/w2/v5</property>
      <property value="5.78976">fsim/tables/ps_full_ms/h4/w2/v6</property>
      <property value="5.71167">fsim/tables/ps_full_ms/h4/w2/v7</property>
      <property value="5.59956">fsim/tables/ps_full_ms/h4/w2/v8</property>
      <property value="5.31481">fsim/tables/ps_full_ms/h4/w2/v9</property>
      <property value="7.40034">fsim/tables/ps_full_ms/h5/w0/v0</property>
      <property value="8.3495">fsim/tables/ps_full_ms/h5/w0/v1</property>
      <property value="7.43062">fsim/tables/ps_full_ms/h5/w0/v10</property>
      <property value="6.6106">fsim/tables/ps_full_ms/h5/w0/v11</property>
      <property value="5.68764">fsim/tables/ps_full_ms/h5/w0/v12</property>
      <property value="4.60509">fsim/tables/ps_full_ms/h5/w0/v13</property>
      <property value="3.30012">fsim/tables/ps_full_ms/h5/w0/v14</property>
      <property value="1.86264">fsim/tables/ps_full_ms/h5/w0/v15</property>
      <property value="8.66623">fsim/tables/ps_full_ms/h5/w0/v2</property>
      <property value="8.81533">fsim/tables/ps_full_ms/h5/w0/v3</property>
      <property value="8.96498">fsim/tables/ps_full_ms/h5/w0/v4</property>
      <property value="9.05289">fsim/tables/ps_full_ms/h5/w0/v5</property>
      <property value="8.96979">fsim/tables/ps_full_ms/h5/w0/v6</property>
      <property value="8.79738">fsim/tables/ps_full_ms/h5/w0/v7</property>
      <property value="8.52875">fsim/tables/ps_full_ms/h5/w0/v8</property>
      <property value="8.03616">fsim/tables/ps_full_ms/h5/w0/v9</property>
      <property value="4.7823">fsim/tables/ps_full_ms/h5/w1/v0</property>
      <property value="5.36206">fsim/tables/ps_full_ms/h5/w1/v1</property>
      <property value="5.23962">fsim/tables/ps_full_ms/h5/w1/v10</property>
      <property value="4.69146">fsim/tables/ps_full_ms/h5/w1/v11</property>
      <property value="4.08597">fsim/tables/ps_full_ms/h5/w1/v12</property>
      <property value="3.31458">fsim/tables/ps_full_ms/h5/w1/v13</property>
      <property value="2.44229">fsim/tables/ps_full_ms/h5/w1/v14</property>
      <property value="1.49305">fsim/tables/ps_full_ms/h5/w1/v15</property>
      <property value="5.80142">fsim/tables/ps_full_ms/h5/w1/v2</property>
      <property value="6.01563">fsim/tables/ps_full_ms/h5/w1/v3</property>
      <property value="6.09782">fsim/tables/ps_full_ms/h5/w1/v4</property>
      <property value="6.0879">fsim/tables/ps_full_ms/h5/w1/v5</property>
      <property value="6.09758">fsim/tables/ps_full_ms/h5/w1/v6</property>
      <property value="6.03059">fsim/tables/ps_full_ms/h5/w1/v7</property>
      <property value="5.87719">fsim/tables/ps_full_ms/h5/w1/v8</property>
      <property value="5.6062">fsim/tables/ps_full_ms/h5/w1/v9</property>
      <property value="2.6383">fsim/tables/ps_full_ms/h5/w2/v0</property>
      <property value="3.03811">fsim/tables/ps_full_ms/h5/w2/v1</property>
      <property value="3.38078">fsim/tables/ps_full_ms/h5/w2/v10</property>
      <property value="3.08102">fsim/tables/ps_full_ms/h5/w2/v11</property>
      <property value="2.75399">fsim/tables/ps_full_ms/h5/w2/v12</property>
      <property value="2.30013">fsim/tables/ps_full_ms/h5/w2/v13</property>
      <property value="1.75418">fsim/tables/ps_full_ms/h5/w2/v14</property>
      <property value="1.16931">fsim/tables/ps_full_ms/h5/w2/v15</property>
      <property value="3.40562">fsim/tables/ps_full_ms/h5/w2/v2</property>
      <property value="3.71113">fsim/tables/ps_full_ms/h5/w2/v3</property>
      <property value="3.78334">fsim/tables/ps_full_ms/h5/w2/v4</property>
      <property value="3.79469">fsim/tables/ps_full_ms/h5/w2/v5</property>
      <property value="3.7938">fsim/tables/ps_full_ms/h5/w2/v6</property>
      <property value="3.77688">fsim/tables/ps_full_ms/h5/w2/v7</property>
      <property value="3.70332">fsim/tables/ps_full_ms/h5/w2/v8</property>
      <property value="3.57598">fsim/tables/ps_full_ms/h5/w2/v9</property>
      <property value="5.15583">fsim/tables/ps_full_ms/h6/w0/v0</property>
      <property value="5.82345">fsim/tables/ps_full_ms/h6/w0/v1</property>
      <property value="5.47905">fsim/tables/ps_full_ms/h6/w0/v10</property>
      <property value="4.92621">fsim/tables/ps_full_ms/h6/w0/v11</property>
      <property value="4.27209">fsim/tables/ps_full_ms/h6/w0/v12</property>
      <property value="3.45532">fsim/tables/ps_full_ms/h6/w0/v13</property>
      <property value="2.55971">fsim/tables/ps_full_ms/h6/w0/v14</property>
      <property value="1.57794">fsim/tables/ps_full_ms/h6/w0/v15</property>
      <property value="6.25642">fsim/tables/ps_full_ms/h6/w0/v2</property>
      <property value="6.37025">fsim/tables/ps_full_ms/h6/w0/v3</property>
      <property value="6.4655">fsim/tables/ps_full_ms/h6/w0/v4</property>
      <property value="6.50113">fsim/tables/ps_full_ms/h6/w0/v5</property>
      <property value="6.46203">fsim/tables/ps_full_ms/h6/w0/v6</property>
      <property value="6.41599">fsim/tables/ps_full_ms/h6/w0/v7</property>
      <property value="6.21368">fsim/tables/ps_full_ms/h6/w0/v8</property>
      <property value="5.95326">fsim/tables/ps_full_ms/h6/w0/v9</property>
      <property value="2.70411">fsim/tables/ps_full_ms/h6/w1/v0</property>
      <property value="3.08522">fsim/tables/ps_full_ms/h6/w1/v1</property>
      <property value="3.39222">fsim/tables/ps_full_ms/h6/w1/v10</property>
      <property value="3.10043">fsim/tables/ps_full_ms/h6/w1/v11</property>
      <property value="2.77892">fsim/tables/ps_full_ms/h6/w1/v12</property>
      <property value="2.28273">fsim/tables/ps_full_ms/h6/w1/v13</property>
      <property value="1.74311">fsim/tables/ps_full_ms/h6/w1/v14</property>
      <property value="1.16544">fsim/tables/ps_full_ms/h6/w1/v15</property>
      <property value="3.46754">fsim/tables/ps_full_ms/h6/w1/v2</property>
      <property value="3.75865">fsim/tables/ps_full_ms/h6/w1/v3</property>
      <property value="3.83247">fsim/tables/ps_full_ms/h6/w1/v4</property>
      <property value="3.80545">fsim/tables/ps_full_ms/h6/w1/v5</property>
      <property value="3.81323">fsim/tables/ps_full_ms/h6/w1/v6</property>
      <property value="3.79693">fsim/tables/ps_full_ms/h6/w1/v7</property>
      <property value="3.71939">fsim/tables/ps_full_ms/h6/w1/v8</property>
      <property value="3.59905">fsim/tables/ps_full_ms/h6/w1/v9</property>
      <property value="0.718648">fsim/tables/ps_full_ms/h6/w2/v0</property>
      <property value="0.943196">fsim/tables/ps_full_ms/h6/w2/v1</property>
      <property value="1.55974">fsim/tables/ps_full_ms/h6/w2/v10</property>
      <property value="1.46052">fsim/tables/ps_full_ms/h6/w2/v11</property>
      <property value="1.31563">fsim/tables/ps_full_ms/h6/w2/v12</property>
      <property value="1.16687">fsim/tables/ps_full_ms/h6/w2/v13</property>
      <property value="0.949667">fsim/tables/ps_full_ms/h6/w2/v14</property>
      <property value="0.67846">fsim/tables/ps_full_ms/h6/w2/v15</property>
      <property value="1.16794">fsim/tables/ps_full_ms/h6/w2/v2</property>
      <property value="1.38694">fsim/tables/ps_full_ms/h6/w2/v3</property>
      <property value="1.58278">fsim/tables/ps_full_ms/h6/w2/v4</property>
      <property value="1.67226">fsim/tables/ps_full_ms/h6/w2/v5</property>
      <property value="1.73778">fsim/tables/ps_full_ms/h6/w2/v6</property>
      <property value="1.71798">fsim/tables/ps_full_ms/h6/w2/v7</property>
      <property value="1.6888">fsim/tables/ps_full_ms/h6/w2/v8</property>
      <property value="1.62491">fsim/tables/ps_full_ms/h6/w2/v9</property>
      <property value="-7.80815">fsim/tables/ps_idle_ms/h0/w0/v0</property>
      <property value="-9.41402">fsim/tables/ps_idle_ms/h0/w0/v1</property>
      <property value="-44.4556">fsim/tables/ps_idle_ms/h0/w0/v10</property>
      <property value="-51.1231">fsim/tables/ps_idle_ms/h0/w0/v11</property>
      <property value="-58.417">fsim/tables/ps_idle_ms/h0/w0/v12</property>
      <property value="-66.3463">fsim/tables/ps_idle_ms/h0/w0/v13</property>
      <property value="-73.6599">fsim/tables/ps_idle_ms/h0/w0/v14</property>
      <property value="-75.0023">fsim/tables/ps_idle_ms/h0/w0/v15</property>
      <property value="-11.4143">fsim/tables/ps_idle_ms/h0/w0/v2</property>
      <property value="-13.8495">fsim/tables/ps_idle_ms/h0/w0/v3</property>
      <property value="-16.7001">fsim/tables/ps_idle_ms/h0/w0/v4</property>
      <property value="-20.0463">fsim/tables/ps_idle_ms/h0/w0/v5</property>
      <property value="-23.8377">fsim/tables/ps_idle_ms/h0/w0/v6</property>
      <property value="-28.2">fsim/tables/ps_idle_ms/h0/w0/v7</property>
      <property value="-33.0669">fsim/tables/ps_idle_ms/h0/w0/v8</property>
      <property value="-38.4505">fsim/tables/ps_idle_ms/h0/w0/v9</property>
      <property value="-7.85103">fsim/tables/ps_idle_ms/h0/w1/v0</property>
      <property value="-9.038">fsim/tables/ps_idle_ms/h0/w1/v1</property>
      <property value="-38.2592">fsim/tables/ps_idle_ms/h0/w1/v10</property>
      <property value="-43.7424">fsim/tables/ps_idle_ms/h0/w1/v11</property>
      <property value="-49.8118">fsim/tables/ps_idle_ms/h0/w1/v12</property>
      <property value="-56.4634">fsim/tables/ps_idle_ms/h0/w1/v13</property>
      <property value="-63.4369">fsim/tables/ps_idle_ms/h0/w1/v14</property>
      <property value="-64.9482">fsim/tables/ps_idle_ms/h0/w1/v15</property>
      <property value="-10.6806">fsim/tables/ps_idle_ms/h0/w1/v2</property>
      <property value="-12.6753">fsim/tables/ps_idle_ms/h0/w1/v3</property>
      <property value="-15.0608">fsim/tables/ps_idle_ms/h0/w1/v4</property>
      <property value="-17.8096">fsim/tables/ps_idle_ms/h0/w1/v5</property>
      <property value="-21.018">fsim/tables/ps_idle_ms/h0/w1/v6</property>
      <property value="-24.6044">fsim/tables/ps_idle_ms/h0/w1/v7</property>
      <property value="-28.684">fsim/tables/ps_idle_ms/h0/w1/v8</property>
      <property value="-33.25">fsim/tables/ps_idle_ms/h0/w1/v9</property>
      <property value="-8.09154">fsim/tables/ps_idle_ms/h0/w2/v0</property>
      <property value="-9.09074">fsim/tables/ps_idle_ms/h0/w2/v1</property>
      <property value="-33.8992">fsim/tables/ps_idle_ms/h0/w2/v10</property>
      <property value="-38.6185">fsim/tables/ps_idle_ms/h0/w2/v11</property>
      <property value="-43.7189">fsim/tables/ps_idle_ms/h0/w2/v12</property>
      <property value="-49.2906">fsim/tables/ps_idle_ms/h0/w2/v13</property>
      <property value="-55.3858">fsim/tables/ps_idle_ms/h0/w2/v14</property>
      <property value="-57.2668">fsim/tables/ps_idle_ms/h0/w2/v15</property>
      <property value="-10.3874">fsim/tables/ps_idle_ms/h0/w2/v2</property>
      <property value="-12.0776">fsim/tables/ps_idle_ms/h0/w2/v3</property>
      <property value="-14.0882">fsim/tables/ps_idle_ms/h0/w2/v4</property>
      <property value="-16.4632">fsim/tables/ps_idle_ms/h0/w2/v5</property>
      <property value="-19.1528">fsim/tables/ps_idle_ms/h0/w2/v6</property>
      <property value="-22.2623">fsim/tables/ps_idle_ms/h0/w2/v7</property>
      <property value="-25.7095">fsim/tables/ps_idle_ms/h0/w2/v8</property>
      <property value="-29.5726">fsim/tables/ps_idle_ms/h0/w2/v9</property>
      <property value="-7.66972">fsim/tables/ps_idle_ms/h1/w0/v0</property>
      <property value="-8.81396">fsim/tables/ps_idle_ms/h1/w0/v1</property>
      <property value="-37.607">fsim/tables/ps_idle_ms/h1/w0/v10</property>
      <property value="-43.0551">fsim/tables/ps_idle_ms/h1/w0/v11</property>
      <property value="-49.0887">fsim/tables/ps_idle_ms/h1/w0/v12</property>
      <property value="-55.7135">fsim/tables/ps_idle_ms/h1/w0/v13</property>
      <property value="-62.6512">fsim/tables/ps_idle_ms/h1/w0/v14</property>
      <property value="-63.6599">fsim/tables/ps_idle_ms/h1/w0/v15</property>
      <property value="-10.4052">fsim/tables/ps_idle_ms/h1/w0/v2</property>
      <property value="-12.3492">fsim/tables/ps_idle_ms/h1/w0/v3</property>
      <property value="-14.6781">fsim/tables/ps_idle_ms/h1/w0/v4</property>
      <property value="-17.3788">fsim/tables/ps_idle_ms/h1/w0/v5</property>
      <property value="-20.5381">fsim/tables/ps_idle_ms/h1/w0/v6</property>
      <property value="-24.0819">fsim/tables/ps_idle_ms/h1/w0/v7</property>
      <property value="-28.1109">fsim/tables/ps_idle_ms/h1/w0/v8</property>
      <property value="-32.6369">fsim/tables/ps_idle_ms/h1/w0/v9</property>
      <property value="-7.99247">fsim/tables/ps_idle_ms/h1/w1/v0</property>
      <property value="-8.9459">fsim/tables/ps_idle_ms/h1/w1/v1</property>
      <property value="-32.7151">fsim/tables/ps_idle_ms/h1/w1/v10</property>
      <property value="-37.2873">fsim/tables/ps_idle_ms/h1/w1/v11</property>
      <property value="-42.2282">fsim/tables/ps_idle_ms/h1/w1/v12</property>
      <property value="-47.5998">fsim/tables/ps_idle_ms/h1/w1/v13</property>
      <property value="-53.5003">fsim/tables/ps_idle_ms/h1/w1/v14</property>
      <property value="-55.0145">fsim/tables/ps_idle_ms/h1/w1/v15</property>
      <property value="-10.1459">fsim/tables/ps_idle_ms/h1/w1/v2</property>
      <property value="-11.7505">fsim/tables/ps_idle_ms/h1/w1/v3</property>
      <property value="-13.6743">fsim/tables/ps_idle_ms/h1/w1/v4</property>
      <property value="-15.9333">fsim/tables/ps_idle_ms/h1/w1/v5</property>
      <property value="-18.519">fsim/tables/ps_idle_ms/h1/w1/v6</property>
      <property value="-21.4984">fsim/tables/ps_idle_ms/h1/w1/v7</property>
      <property value="-24.8354">fsim/tables/ps_idle_ms/h1/w1/v8</property>
      <property value="-28.5387">fsim/tables/ps_idle_ms/h1/w1/v9</property>
      <property value="-8.29503">fsim/tables/ps_idle_ms/h1/w2/v0</property>
      <property value="-9.20625">fsim/tables/ps_idle_ms/h1/w2/v1</property>
      <property value="-29.1939">fsim/tables/ps_idle_ms/h1/w2/v10</property>
      <property value="-33.0709">fsim/tables/ps_idle_ms/h1/w2/v11</property>
      <property value="-37.3122">fsim/tables/ps_idle_ms/h1/w2/v12</property>
      <property value="-41.843">fsim/tables/ps_idle_ms/h1/w2/v13</property>
      <property value="-46.7099">fsim/tables/ps_idle_ms/h1/w2/v14</property>
      <property value="-48.4948">fsim/tables/ps_idle_ms/h1/w2/v15</property>
      <property value="-10.2095">fsim/tables/ps_idle_ms/h1/w2/v2</property>
      <property value="-11.4695">fsim/tables/ps_idle_ms/h1/w2/v3</property>
      <property value="-13.0934">fsim/tables/ps_idle_ms/h1/w2/v4</property>
      <property value="-15.004">fsim/tables/ps_idle_ms/h1/w2/v5</property>
      <property value="-17.2149">fsim/tables/ps_idle_ms/h1/w2/v6</property>
      <property value="-19.7132">fsim/tables/ps_idle_ms/h1/w2/v7</property>
      <property value="-22.5476">fsim/tables/ps_idle_ms/h1/w2/v8</property>
      <property value="-25.7212">fsim/tables/ps_idle_ms/h1/w2/v9</property>
      <property value="-7.86258">fsim/tables/ps_idle_ms/h2/w0/v0</property>
      <property value="-8.76661">fsim/tables/ps_idle_ms/h2/w0/v1</property>
      <property value="-30.9227">fsim/tables/ps_idle_ms/h2/w0/v10</property>
      <property value="-35.2301">fsim/tables/ps_idle_ms/h2/w0/v11</property>
      <property value="-39.8873">fsim/tables/ps_idle_ms/h2/w0/v12</property>
      <property value="-44.9171">fsim/tables/ps_idle_ms/h2/w0/v13</property>
      <property value="-50.4372">fsim/tables/ps_idle_ms/h2/w0/v14</property>
      <property value="-51.622">fsim/tables/ps_idle_ms/h2/w0/v15</property>
      <property value="-9.86478">fsim/tables/ps_idle_ms/h2/w0/v2</property>
      <property value="-11.3461">fsim/tables/ps_idle_ms/h2/w0/v3</property>
      <property value="-13.1319">fsim/tables/ps_idle_ms/h2/w0/v4</property>
      <property value="-15.2176">fsim/tables/ps_idle_ms/h2/w0/v5</property>
      <property value="-17.6525">fsim/tables/ps_idle_ms/h2/w0/v6</property>
      <property value="-20.4125">fsim/tables/ps_idle_ms/h2/w0/v7</property>
      <property value="-23.5592">fsim/tables/ps_idle_ms/h2/w0/v8</property>
      <property value="-27.0238">fsim/tables/ps_idle_ms/h2/w0/v9</property>
      <property value="-8.33083">fsim/tables/ps_idle_ms/h2/w1/v0</property>
      <property value="-9.1645">fsim/tables/ps_idle_ms/h2/w1/v1</property>
      <property value="-27.2214">fsim/tables/ps_idle_ms/h2/w1/v10</property>
      <property value="-30.6855">fsim/tables/ps_idle_ms/h2/w1/v11</property>
      <property value="-34.5243">fsim/tables/ps_idle_ms/h2/w1/v12</property>
      <property value="-38.6568">fsim/tables/ps_idle_ms/h2/w1/v13</property>
      <property value="-43.0607">fsim/tables/ps_idle_ms/h2/w1/v14</property>
      <property value="-44.5067">fsim/tables/ps_idle_ms/h2/w1/v15</property>
      <property value="-10.0756">fsim/tables/ps_idle_ms/h2/w1/v2</property>
      <property value="-11.175">fsim/tables/ps_idle_ms/h2/w1/v3</property>
      <property value="-12.643">fsim/tables/ps_idle_ms/h2/w1/v4</property>
      <property value="-14.371">fsim/tables/ps_idle_ms/h2/w1/v5</property>
      <property value="-16.3438">fsim/tables/ps_idle_ms/h2/w1/v6</property>
      <property value="-18.6329">fsim/tables/ps_idle_ms/h2/w1/v7</property>
      <property value="-21.1641">fsim/tables/ps_idle_ms/h2/w1/v8</property>
      <property value="-24.0521">fsim/tables/ps_idle_ms/h2/w1/v9</property>
      <property value="-8.91542">fsim/tables/ps_idle_ms/h2/w2/v0</property>
      <property value="-9.50972">fsim/tables/ps_idle_ms/h2/w2/v1</property>
      <property value="-24.2164">fsim/tables/ps_idle_ms/h2/w2/v10</property>
      <property value="-27.0823">fsim/tables/ps_idle_ms/h2/w2/v11</property>
      <property value="-30.1498">fsim/tables/ps_idle_ms/h2/w2/v12</property>
      <property value="-33.4388">fsim/tables/ps_idle_ms/h2/w2/v13</property>
      <property value="-37.0099">fsim/tables/ps_idle_ms/h2/w2/v14</property>
      <property value="-38.749">fsim/tables/ps_idle_ms/h2/w2/v15</property>
      <property value="-10.358">fsim/tables/ps_idle_ms/h2/w2/v2</property>
      <property value="-11.2676">fsim/tables/ps_idle_ms/h2/w2/v3</property>
      <property value="-12.3549">fsim/tables/ps_idle_ms/h2/w2/v4</property>
      <property value="-13.7687">fsim/tables/ps_idle_ms/h2/w2/v5</property>
      <property value="-15.4017">fsim/tables/ps_idle_ms/h2/w2/v6</property>
      <property value="-17.2327">fsim/tables/ps_idle_ms/h2/w2/v7</property>
      <property value="-19.3348">fsim/tables/ps_idle_ms/h2/w2/v8</property>
      <property value="-21.6367">fsim/tables/ps_idle_ms/h2/w2/v9</property>
      <property value="-8.33185">fsim/tables/ps_idle_ms/h3/w0/v0</property>
      <property value="-9.06597">fsim/tables/ps_idle_ms/h3/w0/v1</property>
      <property value="-25.1541">fsim/tables/ps_idle_ms/h3/w0/v10</property>
      <property value="-28.2398">fsim/tables/ps_idle_ms/h3/w0/v11</property>
      <property value="-31.6009">fsim/tables/ps_idle_ms/h3/w0/v12</property>
      <property value="-35.2871">fsim/tables/ps_idle_ms/h3/w0/v13</property>
      <property value="-39.2256">fsim/tables/ps_idle_ms/h3/w0/v14</property>
      <property value="-40.36">fsim/tables/ps_idle_ms/h3/w0/v15</property>
      <property value="-9.89992">fsim/tables/ps_idle_ms/h3/w0/v2</property>
      <property value="-10.8796">fsim/tables/ps_idle_ms/h3/w0/v3</property>
      <property value="-12.1761">fsim/tables/ps_idle_ms/h3/w0/v4</property>
      <property value="-13.7037">fsim/tables/ps_idle_ms/h3/w0/v5</property>
      <property value="-15.473">fsim/tables/ps_idle_ms/h3/w0/v6</property>
      <property value="-17.4983">fsim/tables/ps_idle_ms/h3/w0/v7</property>
      <property value="-19.7678">fsim/tables/ps_idle_ms/h3/w0/v8</property>
      <property value="-22.3051">fsim/tables/ps_idle_ms/h3/w0/v9</property>
      <property value="-9.13287">fsim/tables/ps_idle_ms/h3/w1/v0</property>
      <property value="-9.54622">fsim/tables/ps_idle_ms/h3/w1/v1</property>
      <property value="-22.1239">fsim/tables/ps_idle_ms/h3/w1/v10</property>
      <property value="-24.5437">fsim/tables/ps_idle_ms/h3/w1/v11</property>
      <property value="-27.1946">fsim/tables/ps_idle_ms/h3/w1/v12</property>
      <property value="-29.9827">fsim/tables/ps_idle_ms/h3/w1/v13</property>
      <property value="-32.9476">fsim/tables/ps_idle_ms/h3/w1/v14</property>
      <property value="-34.9718">fsim/tables/ps_idle_ms/h3/w1/v15</property>
      <property value="-10.3116">fsim/tables/ps_idle_ms/h3/w1/v2</property>
      <property value="-11.1118">fsim/tables/ps_idle_ms/h3/w1/v3</property>
      <property value="-12.03">fsim/tables/ps_idle_ms/h3/w1/v4</property>
      <property value="-13.2141">fsim/tables/ps_idle_ms/h3/w1/v5</property>
      <property value="-14.601">fsim/tables/ps_idle_ms/h3/w1/v6</property>
      <property value="-16.1942">fsim/tables/ps_idle_ms/h3/w1/v7</property>
      <property value="-17.9487">fsim/tables/ps_idle_ms/h3/w1/v8</property>
      <property value="-19.9516">fsim/tables/ps_idle_ms/h3/w1/v9</property>
      <property value="-9.9014">fsim/tables/ps_idle_ms/h3/w2/v0</property>
      <property value="-10.1102">fsim/tables/ps_idle_ms/h3/w2/v1</property>
      <property value="-20.1301">fsim/tables/ps_idle_ms/h3/w2/v10</property>
      <property value="-22.0717">fsim/tables/ps_idle_ms/h3/w2/v11</property>
      <property value="-24.1298">fsim/tables/ps_idle_ms/h3/w2/v12</property>
      <property value="-26.3482">fsim/tables/ps_idle_ms/h3/w2/v13</property>
      <property value="-28.679">fsim/tables/ps_idle_ms/h3/w2/v14</property>
      <property value="-30.638">fsim/tables/ps_idle_ms/h3/w2/v15</property>
      <property value="-10.6813">fsim/tables/ps_idle_ms/h3/w2/v2</property>
      <property value="-11.429">fsim/tables/ps_idle_ms/h3/w2/v3</property>
      <property value="-12.2006">fsim/tables/ps_idle_ms/h3/w2/v4</property>
      <property value="-13.0646">fsim/tables/ps_idle_ms/h3/w2/v5</property>
      <property value="-14.1323">fsim/tables/ps_idle_ms/h3/w2/v6</property>
      <property value="-15.3993">fsim/tables/ps_idle_ms/h3/w2/v7</property>
      <property value="-16.8236">fsim/tables/ps_idle_ms/h3/w2/v8</property>
      <property value="-18.3835">fsim/tables/ps_idle_ms/h3/w2/v9</property>
      <property value="-8.95027">fsim/tables/ps_idle_ms/h4/w0/v0</property>
      <property value="-9.40563">fsim/tables/ps_idle_ms/h4/w0/v1</property>
      <property value="-21.3834">fsim/tables/ps_idle_ms/h4/w0/v10</property>
      <property value="-23.6661">fsim/tables/ps_idle_ms/h4/w0/v11</property>
      <property value="-26.1838">fsim/tables/ps_idle_ms/h4/w0/v12</property>
      <property value="-28.84">fsim/tables/ps_idle_ms/h4/w0/v13</property>
      <property value="-31.6517">fsim/tables/ps_idle_ms/h4/w0/v14</property>
      <property value="-33.5495">fsim/tables/ps_idle_ms/h4/w0/v15</property>
      <property value="-10.1286">fsim/tables/ps_idle_ms/h4/w0/v2</property>
      <property value="-10.8854">fsim/tables/ps_idle_ms/h4/w0/v3</property>
      <property value="-11.7742">fsim/tables/ps_idle_ms/h4/w0/v4</property>
      <property value="-12.9078">fsim/tables/ps_idle_ms/h4/w0/v5</property>
      <property value="-14.2288">fsim/tables/ps_idle_ms/h4/w0/v6</property>
      <property value="-15.7428">fsim/tables/ps_idle_ms/h4/w0/v7</property>
      <property value="-17.4085">fsim/tables/ps_idle_ms/h4/w0/v8</property>
      <property value="-19.3118">fsim/tables/ps_idle_ms/h4/w0/v9</property>
      <property value="-9.90606">fsim/tables/ps_idle_ms/h4/w1/v0</property>
      <property value="-10.0945">fsim/tables/ps_idle_ms/h4/w1/v1</property>
      <property value="-19.16">fsim/tables/ps_idle_ms/h4/w1/v10</property>
      <property value="-20.9222">fsim/tables/ps_idle_ms/h4/w1/v11</property>
      <property value="-22.7995">fsim/tables/ps_idle_ms/h4/w1/v12</property>
      <property value="-24.7679">fsim/tables/ps_idle_ms/h4/w1/v13</property>
      <property value="-26.8792">fsim/tables/ps_idle_ms/h4/w1/v14</property>
      <property value="-28.7592">fsim/tables/ps_idle_ms/h4/w1/v15</property>
      <property value="-10.5858">fsim/tables/ps_idle_ms/h4/w1/v2</property>
      <property value="-11.2852">fsim/tables/ps_idle_ms/h4/w1/v3</property>
      <property value="-11.9921">fsim/tables/ps_idle_ms/h4/w1/v4</property>
      <property value="-12.7804">fsim/tables/ps_idle_ms/h4/w1/v5</property>
      <property value="-13.7322">fsim/tables/ps_idle_ms/h4/w1/v6</property>
      <property value="-14.8952">fsim/tables/ps_idle_ms/h4/w1/v7</property>
      <property value="-16.1689">fsim/tables/ps_idle_ms/h4/w1/v8</property>
      <property value="-17.6043">fsim/tables/ps_idle_ms/h4/w1/v9</property>
      <property value="-10.7526">fsim/tables/ps_idle_ms/h4/w2/v0</property>
      <property value="-10.8425">fsim/tables/ps_idle_ms/h4/w2/v1</property>
      <property value="-17.6155">fsim/tables/ps_idle_ms/h4/w2/v10</property>
      <property value="-18.9441">fsim/tables/ps_idle_ms/h4/w2/v11</property>
      <property value="-20.339">fsim/tables/ps_idle_ms/h4/w2/v12</property>
      <property value="-21.8302">fsim/tables/ps_idle_ms/h4/w2/v13</property>
      <property value="-23.3404">fsim/tables/ps_idle_ms/h4/w2/v14</property>
      <property value="-24.8366">fsim/tables/ps_idle_ms/h4/w2/v15</property>
      <property value="-11.0988">fsim/tables/ps_idle_ms/h4/w2/v2</property>
      <property value="-11.6281">fsim/tables/ps_idle_ms/h4/w2/v3</property>
      <property value="-12.2738">fsim/tables/ps_idle_ms/h4/w2/v4</property>
      <property value="-12.9155">fsim/tables/ps_idle_ms/h4/w2/v5</property>
      <property value="-13.6154">fsim/tables/ps_idle_ms/h4/w2/v6</property>
      <property value="-14.3898">fsim/tables/ps_idle_ms/h4/w2/v7</property>
      <property value="-15.3458">fsim/tables/ps_idle_ms/h4/w2/v8</property>
      <property value="-16.4237">fsim/tables/ps_idle_ms/h4/w2/v9</property>
      <property value="-9.50683">fsim/tables/ps_idle_ms/h5/w0/v0</property>
      <property value="-9.75186">fsim/tables/ps_idle_ms/h5/w0/v1</property>
      <property value="-19.5413">fsim/tables/ps_idle_ms/h5/w0/v10</property>
      <property value="-21.414">fsim/tables/ps_idle_ms/h5/w0/v11</property>
      <property value="-23.3989">fsim/tables/ps_idle_ms/h5/w0/v12</property>
      <property value="-25.5635">fsim/tables/ps_idle_ms/h5/w0/v13</property>
      <property value="-27.8482">fsim/tables/ps_idle_ms/h5/w0/v14</property>
      <property value="-29.672">fsim/tables/ps_idle_ms/h5/w0/v15</property>
      <property value="-10.3381">fsim/tables/ps_idle_ms/h5/w0/v2</property>
      <property value="-11.0366">fsim/tables/ps_idle_ms/h5/w0/v3</property>
      <property value="-11.7656">fsim/tables/ps_idle_ms/h5/w0/v4</property>
      <property value="-12.6379">fsim/tables/ps_idle_ms/h5/w0/v5</property>
      <property value="-13.719">fsim/tables/ps_idle_ms/h5/w0/v6</property>
      <property value="-14.9422">fsim/tables/ps_idle_ms/h5/w0/v7</property>
      <property value="-16.3279">fsim/tables/ps_idle_ms/h5/w0/v8</property>
      <property value="-17.839">fsim/tables/ps_idle_ms/h5/w0/v9</property>
      <property value="-10.4472">fsim/tables/ps_idle_ms/h5/w1/v0</property>
      <property value="-10.6043">fsim/tables/ps_idle_ms/h5/w1/v1</property>
      <property value="-17.6452">fsim/tables/ps_idle_ms/h5/w1/v10</property>
      <property value="-18.9966">fsim/tables/ps_idle_ms/h5/w1/v11</property>
      <property value="-20.4389">fsim/tables/ps_idle_ms/h5/w1/v12</property>
      <property value="-21.9966">fsim/tables/ps_idle_ms/h5/w1/v13</property>
      <property value="-23.5623">fsim/tables/ps_idle_ms/h5/w1/v14</property>
      <property value="-25.1077">fsim/tables/ps_idle_ms/h5/w1/v15</property>
      <property value="-10.8904">fsim/tables/ps_idle_ms/h5/w1/v2</property>
      <property value="-11.4485">fsim/tables/ps_idle_ms/h5/w1/v3</property>
      <property value="-12.0858">fsim/tables/ps_idle_ms/h5/w1/v4</property>
      <property value="-12.7349">fsim/tables/ps_idle_ms/h5/w1/v5</property>
      <property value="-13.4469">fsim/tables/ps_idle_ms/h5/w1/v6</property>
      <property value="-14.2799">fsim/tables/ps_idle_ms/h5/w1/v7</property>
      <property value="-15.2987">fsim/tables/ps_idle_ms/h5/w1/v8</property>
      <property value="-16.4007">fsim/tables/ps_idle_ms/h5/w1/v9</property>
      <property value="-11.3643">fsim/tables/ps_idle_ms/h5/w2/v0</property>
      <property value="-11.4157">fsim/tables/ps_idle_ms/h5/w2/v1</property>
      <property value="-16.2238">fsim/tables/ps_idle_ms/h5/w2/v10</property>
      <property value="-17.1863">fsim/tables/ps_idle_ms/h5/w2/v11</property>
      <property value="-18.1974">fsim/tables/ps_idle_ms/h5/w2/v12</property>
      <property value="-19.2475">fsim/tables/ps_idle_ms/h5/w2/v13</property>
      <property value="-20.2541">fsim/tables/ps_idle_ms/h5/w2/v14</property>
      <property value="-21.3656">fsim/tables/ps_idle_ms/h5/w2/v15</property>
      <property value="-11.5578">fsim/tables/ps_idle_ms/h5/w2/v2</property>
      <property value="-11.8523">fsim/tables/ps_idle_ms/h5/w2/v3</property>
      <property value="-12.3376">fsim/tables/ps_idle_ms/h5/w2/v4</property>
      <property value="-12.8985">fsim/tables/ps_idle_ms/h5/w2/v5</property>
      <property value="-13.4371">fsim/tables/ps_idle_ms/h5/w2/v6</property>
      <property value="-14.0221">fsim/tables/ps_idle_ms/h5/w2/v7</property>
      <property value="-14.649">fsim/tables/ps_idle_ms/h5/w2/v8</property>
      <property value="-15.3521">fsim/tables/ps_idle_ms/h5/w2/v9</property>
      <property value="-10.1171">fsim/tables/ps_idle_ms/h6/w0/v0</property>
      <property value="-10.1766">fsim/tables/ps_idle_ms/h6/w0/v1</property>
      <property value="-17.6019">fsim/tables/ps_idle_ms/h6/w0/v10</property>
      <property value="-18.9808">fsim/tables/ps_idle_ms/h6/w0/v11</property>
      <property value="-20.4998">fsim/tables/ps_idle_ms/h6/w0/v12</property>
      <property value="-22.1105">fsim/tables/ps_idle_ms/h6/w0/v13</property>
      <property value="-23.7488">fsim/tables/ps_idle_ms/h6/w0/v14</property>
      <property value="-25.3284">fsim/tables/ps_idle_ms/h6/w0/v15</property>
      <property value="-10.5864">fsim/tables/ps_idle_ms/h6/w0/v2</property>
      <property value="-11.1693">fsim/tables/ps_idle_ms/h6/w0/v3</property>
      <property value="-11.7868">fsim/tables/ps_idle_ms/h6/w0/v4</property>
      <property value="-12.4409">fsim/tables/ps_idle_ms/h6/w0/v5</property>
      <property value="-13.2024">fsim/tables/ps_idle_ms/h6/w0/v6</property>
      <property value="-14.1153">fsim/tables/ps_idle_ms/h6/w0/v7</property>
      <property value="-15.1682">fsim/tables/ps_idle_ms/h6/w0/v8</property>
      <property value="-16.3119">fsim/tables/ps_idle_ms/h6/w0/v9</property>
      <property value="-11.0205">fsim/tables/ps_idle_ms/h6/w1/v0</property>
      <property value="-11.1721">fsim/tables/ps_idle_ms/h6/w1/v1</property>
      <property value="-15.977">fsim/tables/ps_idle_ms/h6/w1/v10</property>
      <property value="-16.9202">fsim/tables/ps_idle_ms/h6/w1/v11</property>
      <property value="-17.9214">fsim/tables/ps_idle_ms/h6/w1/v12</property>
      <property value="-18.9679">fsim/tables/ps_idle_ms/h6/w1/v13</property>
      <property value="-19.9843">fsim/tables/ps_idle_ms/h6/w1/v14</property>
      <property value="-21.0861">fsim/tables/ps_idle_ms/h6/w1/v15</property>
      <property value="-11.3182">fsim/tables/ps_idle_ms/h6/w1/v2</property>
      <property value="-11.6263">fsim/tables/ps_idle_ms/h6/w1/v3</property>
      <property value="-12.1092">fsim/tables/ps_idle_ms/h6/w1/v4</property>
      <property value="-12.6523">fsim/tables/ps_idle_ms/h6/w1/v5</property>
      <property value="-13.1799">fsim/tables/ps_idle_ms/h6/w1/v6</property>
      <property value="-13.7493">fsim/tables/ps_idle_ms/h6/w1/v7</property>
      <property value="-14.3754">fsim/tables/ps_idle_ms/h6/w1/v8</property>
      <property value="-15.1032">fsim/tables/ps_idle_ms/h6/w1/v9</property>
      <property value="-12.0111">fsim/tables/ps_idle_ms/h6/w2/v0</property>
      <property value="-12.053">fsim/tables/ps_idle_ms/h6/w2/v1</property>
      <property value="-14.8731">fsim/tables/ps_idle_ms/h6/w2/v10</property>
      <property value="-15.3836">fsim/tables/ps_idle_ms/h6/w2/v11</property>
      <property value="-15.89">fsim/tables/ps_idle_ms/h6/w2/v12</property>
      <property value="-16.394">fsim/tables/ps_idle_ms/h6/w2/v13</property>
      <property value="-16.9214">fsim/tables/ps_idle_ms/h6/w2/v14</property>
      <property value="-17.536">fsim/tables/ps_idle_ms/h6/w2/v15</property>
      <property value="-12.1072">fsim/tables/ps_idle_ms/h6/w2/v2</property>
      <property value="-12.2179">fsim/tables/ps_idle_ms/h6/w2/v3</property>
      <property value="-12.3964">fsim/tables/ps_idle_ms/h6/w2/v4</property>
      <property value="-12.7062">fsim/tables/ps_idle_ms/h6/w2/v5</property>
      <property value="-13.0898">fsim/tables/ps_idle_ms/h6/w2/v6</property>
      <property value="-13.5186">fsim/tables/ps_idle_ms/h6/w2/v7</property>
      <property value="-13.9298">fsim/tables/ps_idle_ms/h6/w2/v8</property>
      <property value="-14.3861">fsim/tables/ps_idle_ms/h6/w2/v9</property>
      <property value="195.399">fsim/tables/reach_tas_ms/h0/w0</property>
      <property value="195.124">fsim/tables/reach_tas_ms/h0/w1</property>
      <property value="194.852">fsim/tables/reach_tas_ms/h0/w2</property>
      <property value="194.77">fsim/tables/reach_tas_ms/h1/w0</property>
      <property value="194.425">fsim/tables/reach_tas_ms/h1/w1</property>
      <property value="194.096">fsim/tables/reach_tas_ms/h1/w2</property>
      <property value="192.158">fsim/tables/reach_tas_ms/h2/w0</property>
      <property value="191.531">fsim/tables/reach_tas_ms/h2/w1</property>
      <property value="189.596">fsim/tables/reach_tas_ms/h2/w2</property>
      <property value="187.237">fsim/tables/reach_tas_ms/h3/w0</property>
      <property value="184.968">fsim/tables/reach_tas_ms/h3/w1</property>
      <property value="183.063">fsim/tables/reach_tas_ms/h3/w2</property>
      <property value="181.76">fsim/tables/reach_tas_ms/h4/w0</property>
      <property value="179.251">fsim/tables/reach_tas_ms/h4/w1</property>
      <property value="176.217">fsim/tables/reach_tas_ms/h4/w2</property>
      <property value="178.711">fsim/tables/reach_tas_ms/h5/w0</property>
      <property value="175.274">fsim/tables/reach_tas_ms/h5/w1</property>
      <property value="170.399">fsim/tables/reach_tas_ms/h5/w2</property>
      <property value="173.253">fsim/tables/reach_tas_ms/h6/w0</property>
      <property value="168.002">fsim/tables/reach_tas_ms/h6/w1</property>
      <property value="159.751">fsim/tables/reach_tas_ms/h6/w2</property>
      <property value="0.0">fsim/tables/speed_fraction/v0</property>
      <property value="0.0666667">fsim/tables/speed_fraction/v1</property>
      <property value="0.666667">fsim/tables/speed_fraction/v10</property>
      <property value="0.733333">fsim/tables/speed_fraction/v11</property>
      <property value="0.8">fsim/tables/speed_fraction/v12</property>
      <property value="0.866667">fsim/tables/speed_fraction/v13</property>
      <property value="0.933333">fsim/tables/speed_fraction/v14</property>
      <property value="1">fsim/tables/speed_fraction/v15</property>
      <property value="0.133333">fsim/tables/speed_fraction/v2</property>
      <property value="0.2">fsim/tables/speed_fraction/v3</property>
      <property value="0.266667">fsim/tables/speed_fraction/v4</property>
      <property value="0.333333">fsim/tables/speed_fraction/v5</property>
      <property value="0.4">fsim/tables/speed_fraction/v6</property>
      <property value="0.466667">fsim/tables/speed_fraction/v7</property>
      <property value="0.533333">fsim/tables/speed_fraction/v8</property>
      <property value="0.6">fsim/tables/speed_fraction/v9</property>
      <property value="47.7864">fsim/tables/stall_cas_ms/h0/w0</property>
      <property value="51.8269">fsim/tables/stall_cas_ms/h0/w1</property>
      <property value="55.5745">fsim/tables/stall_cas_ms/h0/w2</property>
      <property value="47.6465">fsim/tables/stall_cas_ms/h1/w0</property>
      <property value="51.6752">fsim/tables/stall_cas_ms/h1/w1</property>
      <property value="55.4117">fsim/tables/stall_cas_ms/h1/w2</property>
      <property value="47.6724">fsim/tables/stall_cas_ms/h2/w0</property>
      <property value="51.7033">fsim/tables/stall_cas_ms/h2/w1</property>
      <property value="55.4419">fsim/tables/stall_cas_ms/h2/w2</property>
      <property value="47.7549">fsim/tables/stall_cas_ms/h3/w0</property>
      <property value="51.7928">fsim/tables/stall_cas_ms/h3/w1</property>
      <property value="55.5378">fsim/tables/stall_cas_ms/h3/w2</property>
      <property value="47.8611">fsim/tables/stall_cas_ms/h4/w0</property>
      <property value="51.908">fsim/tables/stall_cas_ms/h4/w1</property>
      <property value="55.6613">fsim/tables/stall_cas_ms/h4/w2</property>
      <property value="47.9101">fsim/tables/stall_cas_ms/h5/w0</property>
      <property value="51.961">fsim/tables/stall_cas_ms/h5/w1</property>
      <property value="55.7182">fsim/tables/stall_cas_ms/h5/w2</property>
      <property value="48.0306">fsim/tables/stall_cas_ms/h6/w0</property>
      <property value="52.0917">fsim/tables/stall_cas_ms/h6/w1</property>
      <property value="55.8584">fsim/tables/stall_cas_ms/h6/w2</property>
      <property value="12740">fsim/tables/weight_kg/w0</property>
      <property value="14985.5">fsim/tables/weight_kg/w1</property>
      <property value="17231">fsim/tables/weight_kg/w2</property>
      <channel name="Pitch">
        <summer name="fcs/pitch-trim-sum">
          <input>fcs/elevator-cmd-norm</input>
          <input>fcs/pitch-trim-cmd-norm</input>
          <clipto> <min>-1</min> <max>1</max> </clipto>
        </summer>
        <aerosurface_scale name="fcs/elevator-control">
          <input>fcs/pitch-trim-sum</input>
          <range> <min>-30.00</min> <max>20.00</max> </range>
          <gain>0.0174533</gain>
        </aerosurface_scale>
        <actuator name="fcs/elevator-actuator">
          <input>fcs/elevator-control</input>
          <rate_limit>2.0</rate_limit>
          <output>fcs/elevator-pos-rad</output>
        </actuator>
      </channel>
      <channel name="Roll">
        <summer name="fcs/roll-trim-sum">
          <input>fcs/aileron-cmd-norm</input>
          <input>fcs/roll-trim-cmd-norm</input>
          <clipto> <min>-1</min> <max>1</max> </clipto>
        </summer>
        <aerosurface_scale name="fcs/left-aileron-control">
          <input>fcs/roll-trim-sum</input>
          <range> <min>-25.00</min> <max>25.00</max> </range>
          <gain>0.0174533</gain>
        </aerosurface_scale>
        <actuator name="fcs/left-aileron-actuator">
          <input>fcs/left-aileron-control</input>
          <rate_limit>2.0</rate_limit>
          <output>fcs/left-aileron-pos-rad</output>
        </actuator>
        <pure_gain name="fcs/right-aileron">
          <input>fcs/left-aileron-pos-rad</input>
          <gain>-1</gain>
          <output>fcs/right-aileron-pos-rad</output>
        </pure_gain>
      </channel>
      <channel name="Yaw">
        <summer name="fcs/yaw-trim-sum">
          <input>fcs/rudder-cmd-norm</input>
          <input>fcs/yaw-trim-cmd-norm</input>
          <clipto> <min>-1</min> <max>1</max> </clipto>
        </summer>
        <aerosurface_scale name="fcs/rudder-control">
          <input>fcs/yaw-trim-sum</input>
          <range> <min>-20.00</min> <max>20.00</max> </range>
          <gain>0.0174533</gain>
        </aerosurface_scale>
        <!-- the yaw damper (hangar/fcs.py yaw_damper): the yaw rate, washed out so a
             steady turn's is left alone, against itself through the rudder - the
             dutch roll damped to 0.30 at 1 g across the speed range -->
        <washout_filter name="fcs/yaw-damper-washout">
          <input>velocities/r-rad_sec</input>
          <c1>0.500</c1>
        </washout_filter>
        <fcs_function name="fcs/yaw-damper">
          <function>
            <product>
              <value>-1</value>
              <table>
                <independentVar lookup="row">aero/qbar-psf</independentVar>
                <tableData>
                  10.0   -1.55000
                  20.0   -1.35000
                  40.0   -0.43531
                  80.0   -0.25714
                 150.0   -0.18778
                 300.0   -0.12369
                 600.0   -0.07589
                1200.0   -0.04836
                2400.0   -0.03415
                </tableData>
              </table>
              <property>fcs/yaw-damper-washout</property>
            </product>
          </function>
          <clipto> <min>-0.17453</min> <max>0.17453</max> </clipto>
        </fcs_function>
        <summer name="fcs/rudder-sum">
          <input>fcs/rudder-control</input>
          <input>fcs/yaw-damper</input>
          <clipto> <min>-0.34907</min> <max>0.34907</max> </clipto>
        </summer>
        <actuator name="fcs/rudder-actuator">
          <input>fcs/rudder-sum</input>
          <rate_limit>2.0</rate_limit>
          <output>fcs/rudder-pos-rad</output>
        </actuator>
        <!-- the nose or tail wheel steers with the rudder pedals (JSBSim steers from
             fcs/steer-cmd-norm, positive right; the rudder command is positive left) -->
        <pure_gain name="fcs/steer-from-rudder">
          <input>fcs/yaw-trim-sum</input>
          <gain>-1</gain>
          <output>fcs/steer-cmd-norm</output>
        </pure_gain>
      </channel>
      <channel name="Flaps">
        <kinematic name="fcs/flaps-control">
          <input>fcs/flap-cmd-norm</input>
          <traverse>
            <setting> <position>0.0</position> <time>0.0</time> </setting>
            <setting> <position>5.0</position> <time>2.0</time> </setting>
            <setting> <position>10.0</position> <time>2.0</time> </setting>
            <setting> <position>15.0</position> <time>2.0</time> </setting>
            <setting> <position>20.0</position> <time>2.0</time> </setting>
          </traverse>
          <output>fcs/flap-pos-deg</output>
        </kinematic>
        <pure_gain name="fcs/flaps-normalized">
          <input>fcs/flap-pos-deg</input>
          <gain>0.05</gain>
          <output>fcs/flap-pos-norm</output>
        </pure_gain>
      </channel>
      <channel name="Speedbrake">
        <kinematic name="fcs/speedbrake-control">
          <input>fcs/speedbrake-cmd-norm</input>
          <traverse>
            <setting> <position>0</position> <time>0</time> </setting>
            <setting> <position>1</position> <time>2.00</time> </setting>
          </traverse>
          <output>fcs/speedbrake-pos-norm</output>
        </kinematic>
      </channel>
      <channel name="Leading-Edge Flaps">
        <fcs_function name="fcs/lef-schedule">
          <function>
            <sum>
              <product> <value>4</value> <property>aero/alpha-deg</property> </product>
              <product> <value>-0</value>
                <quotient> <property>aero/qbar-psf</property> <property>atmosphere/P-psf</property> </quotient>
              </product>
              <value>-40</value>
            </sum>
          </function>
          <clipto> <min>0</min> <max>20</max> </clipto>
        </fcs_function>
        <actuator name="fcs/lef-actuator">
          <input>fcs/lef-schedule</input>
          <lag>7.35</lag>
          <rate_limit>25</rate_limit>
          <output>fcs/lef-pos-deg</output>
        </actuator>
      </channel>
      <channel name="Landing Gear">
        <kinematic name="fcs/gear-control">
          <input>gear/gear-cmd-norm</input>
          <traverse>
            <setting> <position>0</position> <time>0</time> </setting>
            <setting> <position>1</position> <time>5</time> </setting>
          </traverse>
          <output>gear/gear-pos-norm</output>
        </kinematic>
      </channel>
    </flight_control>
    <aerodynamics>
        <function name="aero/function/mach-lift">
          <description>lift, and damping, over its low-speed value (hangar: aero/mach.py)</description>
          <table>
            <independentVar lookup="row">velocities/mach</independentVar>
            <tableData>
                 0.000     1.000000
                 0.300     1.030656
                 0.500     1.094639
                 0.600     1.148069
                 0.700     1.225542
                 0.800     1.343441
                 0.850     1.473534
                 0.900     1.492649
            </tableData>
          </table>
        </function>
        <function name="aero/function/mach-side">
          <description>side force, rolling and yawing moment over their low-speed values</description>
          <table>
            <independentVar lookup="row">velocities/mach</independentVar>
            <tableData>
                 0.000     1.000000
                 0.300     1.020624
                 0.500     1.063634
                 0.600     1.099749
                 0.700     1.153031
                 0.800     1.239344
                 0.850     1.308588
                 0.900     1.412588
            </tableData>
          </table>
        </function>
        <function name="aero/function/mach-dCm-dCL">
          <description>pitching moment per unit low-speed lift: the neutral point's move</description>
          <table>
            <independentVar lookup="row">velocities/mach</independentVar>
            <tableData>
                 0.000     0.000000
                 0.300    -0.002493
                 0.500    -0.006353
                 0.600    -0.008177
                 0.700    -0.008564
                 0.800    -0.044969
                 0.850    -0.017625
                 0.900     0.059041
            </tableData>
          </table>
        </function>
        <function name="aero/function/mach-dCD0">
          <description>zero-lift drag's change: friction and wave drag</description>
          <table>
            <independentVar lookup="row">velocities/mach</independentVar>
            <tableData>
                 0.000     0.000000
                 0.300    -0.000136
                 0.500    -0.000370
                 0.600    -0.000522
                 0.700     0.000958
                 0.800     0.037980
                 0.850     0.074534
                 0.900     0.114396
            </tableData>
          </table>
        </function>
        <function name="aero/function/mach-dK">
          <description>induced-drag factor's change (per CL^2)</description>
          <table>
            <independentVar lookup="row">velocities/mach</independentVar>
            <tableData>
                 0.000     0.000000
                 0.300     0.003279
                 0.500     0.009256
                 0.600     0.013501
                 0.700     0.018698
                 0.800     0.024949
                 0.850     0.030180
                 0.900     0.030836
            </tableData>
          </table>
        </function>
        <function name="aero/function/mach-aileron">
          <description>aileron power over its low-speed value</description>
          <table>
            <independentVar lookup="row">velocities/mach</independentVar>
            <tableData>
                 0.000     1.000000
                 0.300     1.024965
                 0.500     1.076422
                 0.600     1.118799
                 0.700     1.179534
                 0.800     1.272189
                 0.850     1.339957
                 0.900     1.454989
            </tableData>
          </table>
        </function>
        <function name="aero/function/mach-elevator">
          <description>elevator power over its low-speed value</description>
          <table>
            <independentVar lookup="row">velocities/mach</independentVar>
            <tableData>
                 0.000     1.000000
                 0.300     1.026409
                 0.500     1.081087
                 0.600     1.126320
                 0.700     1.191376
                 0.800     1.290951
                 0.850     1.364368
                 0.900     1.464444
            </tableData>
          </table>
        </function>
        <function name="aero/function/mach-flap">
          <description>flap power over its low-speed value</description>
          <table>
            <independentVar lookup="row">velocities/mach</independentVar>
            <tableData>
                 0.000     1.000000
                 0.300     1.035069
                 0.500     1.109107
                 0.600     1.171859
                 0.700     1.264546
                 0.800     1.411149
                 0.850     1.555503
                 0.900     1.706983
            </tableData>
          </table>
        </function>
        <function name="aero/function/mach-rudder">
          <description>rudder power over its low-speed value</description>
          <table>
            <independentVar lookup="row">velocities/mach</independentVar>
            <tableData>
                 0.000     1.000000
                 0.300     1.020928
                 0.500     1.063559
                 0.600     1.098162
                 0.700     1.146972
                 0.800     1.219797
                 0.850     1.272374
                 0.900     1.341944
            </tableData>
          </table>
        </function>
        <function name="aero/function/CL-base">
          <description>CL over alpha and beta at low speed</description>
          <table>
            <independentVar lookup="row">aero/alpha-deg</independentVar>
            <independentVar lookup="column">aero/beta-deg</independentVar>
            <tableData>
                        -90.00    -70.00    -50.00    -40.00    -30.00    -25.00    -20.00    -15.00    -10.00     -6.00     -3.00      0.00      3.00      6.00     10.00     15.00     20.00     25.00     30.00     40.00     50.00     70.00     90.00
             -180.00   0.00000  -0.00159   0.00829  -0.01512  -0.03351  -0.03913  -0.04330  -0.04571  -0.04754  -0.05035  -0.05124  -0.05145  -0.05124  -0.05035  -0.04754  -0.04571  -0.04330  -0.03913  -0.03351  -0.01512   0.00829  -0.00159   0.00000
             -120.00  -0.00000   0.16325   0.41209   0.54102   0.65591   0.70487   0.74601   0.77908   0.80319   0.81675   0.82282   0.82260   0.82282   0.81675   0.80319   0.77908   0.74601   0.70487   0.65591   0.54102   0.41209   0.16325  -0.00000
              -70.00  -0.00000  -0.12863  -0.33576  -0.44516  -0.54335  -0.58569  -0.62212  -0.65173  -0.67356  -0.68587  -0.68673  -0.68520  -0.68673  -0.68587  -0.67356  -0.65173  -0.62212  -0.58569  -0.54335  -0.44516  -0.33576  -0.12863  -0.00000
              -46.00  -0.00000  -0.22930  -0.61064  -0.81548  -1.00709  -1.09285  -1.17021  -1.23476  -1.27922  -1.29329  -1.29735  -1.29876  -1.29735  -1.29329  -1.27922  -1.23476  -1.17021  -1.09285  -1.00709  -0.81548  -0.61064  -0.22930  -0.00000
              -32.00  -0.00000  -0.22730  -0.68998  -0.92365  -1.14801  -1.24651  -1.34172  -1.40873  -1.45279  -1.47478  -1.48664  -1.47891  -1.48664  -1.47478  -1.45279  -1.40873  -1.34172  -1.24651  -1.14801  -0.92365  -0.68998  -0.22730  -0.00000
              -22.00  -0.00000  -0.19044  -0.65847  -0.95788  -1.11958  -1.18402  -1.25626  -1.31249  -1.35231  -1.37257  -1.38107  -1.38390  -1.38107  -1.37257  -1.35231  -1.31249  -1.25626  -1.18402  -1.11958  -0.95788  -0.65847  -0.19044  -0.00000
              -17.00  -0.00000  -0.15329  -0.55852  -0.67024  -0.75714  -0.80638  -0.85655  -0.89156  -0.91580  -0.92775  -0.93264  -0.93425  -0.93264  -0.92775  -0.91580  -0.89156  -0.85655  -0.80638  -0.75714  -0.67024  -0.55852  -0.15329  -0.00000
              -13.00  -0.00000  -0.10208  -0.35676  -0.40564  -0.46596  -0.49965  -0.52537  -0.54364  -0.55543  -0.56070  -0.56268  -0.56330  -0.56268  -0.56070  -0.55543  -0.54364  -0.52537  -0.49965  -0.46596  -0.40564  -0.35676  -0.10208  -0.00000
               -9.00  -0.00000  -0.05210  -0.12251  -0.13480  -0.17266  -0.18383  -0.18845   0.27842  -0.19017  -0.18903  -0.18815  -0.18778  -0.18815  -0.18903  -0.19017   0.27842  -0.18845  -0.18383  -0.17266  -0.13480  -0.12251  -0.05210  -0.00000
               -5.00  -0.00000  -0.01652   0.08873   0.10666   0.12163   0.13634   0.15199   0.16583   0.17724   0.18411   0.18752   0.18882   0.18752   0.18411   0.17724   0.16583   0.15199   0.13634   0.12163   0.10666   0.08873  -0.01652  -0.00000
               -1.00  -0.00000   0.02760   0.30313   0.36152   0.41729   0.45713   0.49243   0.52146   0.54324   0.55488   0.55994   0.56164   0.55994   0.55488   0.54324   0.52146   0.49243   0.45713   0.41729   0.36152   0.30313   0.02760  -0.00000
                3.00   0.00000   0.08957   0.50953   0.62728   0.72031   0.78380   0.83893   0.88328   0.91552   0.93202   0.93887   0.94111   0.93887   0.93202   0.91552   0.88328   0.83893   0.78380   0.72031   0.62728   0.50953   0.08957   0.00000
                7.00   0.00000   0.15076   0.64395   0.88668   1.01233   1.09714   1.17087   1.22991   1.27243   1.29405   1.30307   1.30606   1.30307   1.29405   1.27243   1.22991   1.17087   1.09714   1.01233   0.88668   0.64395   0.15076   0.00000
               11.00   0.00000   0.17976   0.69643   1.03379   1.29583   1.40819   1.50412   1.58095   1.63630   1.66457   1.67642   1.68037   1.67642   1.66457   1.63630   1.58095   1.50412   1.40819   1.29583   1.03379   0.69643   0.17976   0.00000
               15.00   0.00000   0.20031   0.73148   0.98228   1.23808   1.37500   1.49664   1.59973   1.68019   1.72714   1.75497   1.77963   1.75497   1.72714   1.68019   1.59973   1.49664   1.37500   1.23808   0.98228   0.73148   0.20031   0.00000
               19.00   0.00000   0.21412   0.74252   0.97206   1.16850   1.25442   1.32495   1.37821   1.39787   1.39668   1.39663   1.39728   1.39663   1.39668   1.39787   1.37821   1.32495   1.25442   1.16850   0.97206   0.74252   0.21412   0.00000
               23.00   0.00000   0.22641   0.66317   0.91009   1.08060   1.14644   1.20866   1.26048   1.29792   1.31652   1.32473   1.32743   1.32473   1.31652   1.29792   1.26048   1.20866   1.14644   1.08060   0.91009   0.66317   0.22641   0.00000
               27.00   0.00000   0.24269   0.62927   0.86083   1.08194   1.15799   1.22196   1.27439   1.31454   1.33558   1.34419   1.34690   1.34419   1.33558   1.31454   1.27439   1.22196   1.15799   1.08194   0.86083   0.62927   0.24269   0.00000
               32.00   0.00000   0.23914   0.61889   0.82797   1.03087   1.12238   1.19517   1.25065   1.29013   1.31245   1.32321   1.32945   1.32321   1.31245   1.29013   1.25065   1.19517   1.12238   1.03087   0.82797   0.61889   0.23914   0.00000
               46.00   0.00000   0.22010   0.58089   0.77206   0.94357   1.01648   1.07920   1.12807   1.16332   1.17328   1.17627   1.17720   1.17627   1.17328   1.16332   1.12807   1.07920   1.01648   0.94357   0.77206   0.58089   0.22010   0.00000
               70.00   0.00000   0.12999   0.33877   0.44952   0.54910   0.59170   0.62819   0.65753   0.67917   0.69198   0.69315   0.69174   0.69315   0.69198   0.67917   0.65753   0.62819   0.59170   0.54910   0.44952   0.33877   0.12999   0.00000
              120.00   0.00000  -0.16133  -0.40660  -0.53351  -0.64667  -0.69450  -0.73514  -0.76766  -0.79135  -0.80469  -0.81067  -0.81043  -0.81067  -0.80469  -0.79135  -0.76766  -0.73514  -0.69450  -0.64667  -0.53351  -0.40660  -0.16133   0.00000
              180.00   0.00000  -0.00159   0.00829  -0.01512  -0.03351  -0.03913  -0.04330  -0.04571  -0.04754  -0.05035  -0.05124  -0.05145  -0.05124  -0.05035  -0.04754  -0.04571  -0.04330  -0.03913  -0.03351  -0.01512   0.00829  -0.00159   0.00000
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            </tableData>
          </table>
        </function>
      <axis name="DRAG">
        <function name="aero/coefficient/CD_base">
          <description>CD over alpha and beta (hangar)</description>
          <product>
            <property>aero/qbar-psf</property>
            <property>metrics/Sw-sqft</property>
          <table>
            <independentVar lookup="row">aero/alpha-deg</independentVar>
            <independentVar lookup="column">aero/beta-deg</independentVar>
            <tableData>
                        -90.00    -70.00    -50.00    -40.00    -30.00    -25.00    -20.00    -15.00    -10.00     -6.00     -3.00      0.00      3.00      6.00     10.00     15.00     20.00     25.00     30.00     40.00     50.00     70.00     90.00
             -180.00   0.85308   0.69900   0.40238   0.26288   0.15540   0.11642   0.08747   0.06771   0.05297   0.05026   0.05017   0.05020   0.05017   0.05026   0.05297   0.06771   0.08747   0.11642   0.15540   0.26288   0.40238   0.69900   0.85308
             -120.00   0.85308   0.82172   0.90402   1.01737   1.15957   1.23188   1.29912   1.35688   1.40129   1.42484   1.43521   1.43889   1.43521   1.42484   1.40129   1.35688   1.29912   1.23188   1.15957   1.01737   0.90402   0.82172   0.85308
              -70.00   0.85308   0.86996   1.04603   1.21972   1.42232   1.52228   1.61459   1.69434   1.75637   1.78884   1.80269   1.80746   1.80269   1.78884   1.75637   1.69434   1.61459   1.52228   1.42232   1.21972   1.04603   0.86996   0.85308
              -46.00   0.85308   0.82758   0.81567   0.85320   0.92406   0.96894   1.01909   1.06357   1.09466   1.10918   1.11616   1.11845   1.11616   1.10918   1.09466   1.06357   1.01909   0.96894   0.92406   0.85320   0.81567   0.82758   0.85308
              -32.00   0.85308   0.79680   0.65750   0.60422   0.59523   0.59987   0.61150   0.61627   0.61701   0.61645   0.61637   0.61320   0.61637   0.61645   0.61701   0.61627   0.61150   0.59987   0.59523   0.60422   0.65750   0.79680   0.85308
              -22.00   0.85308   0.77718   0.54643   0.42339   0.35087   0.31417   0.28592   0.26255   0.24604   0.23777   0.23433   0.23319   0.23433   0.23777   0.24604   0.26255   0.28592   0.31417   0.35087   0.42339   0.54643   0.77718   0.85308
              -17.00   0.85308   0.76964   0.50150   0.36619   0.28008   0.23703   0.20259   0.17447   0.15488   0.14511   0.14106   0.13972   0.14106   0.14511   0.15488   0.17447   0.20259   0.23703   0.28008   0.36619   0.50150   0.76964   0.85308
              -13.00   0.85308   0.76538   0.47568   0.33659   0.24217   0.19708   0.15811   0.12783   0.10692   0.09660   0.09234   0.09094   0.09234   0.09660   0.10692   0.12783   0.15811   0.19708   0.24217   0.33659   0.47568   0.76538   0.85308
               -9.00   0.85308   0.76195   0.45348   0.31329   0.21873   0.17194   0.13095  -0.06480   0.07848   0.06815   0.06395   0.06257   0.06395   0.06815   0.07848  -0.06480   0.13095   0.17194   0.21873   0.31329   0.45348   0.76195   0.85308
               -5.00   0.85308   0.75922   0.44847   0.30572   0.20999   0.16219   0.12098   0.08998   0.06916   0.05926   0.05534   0.05408   0.05534   0.05926   0.06916   0.08998   0.12098   0.16219   0.20999   0.30572   0.44847   0.75922   0.85308
               -1.00   0.85308   0.75821   0.45116   0.30834   0.21613   0.16865   0.12843   0.09844   0.07854   0.06925   0.06566   0.06454   0.06566   0.06925   0.07854   0.09844   0.12843   0.16865   0.21613   0.30834   0.45116   0.75821   0.85308
                3.00   0.85308   0.75881   0.46100   0.32055   0.23628   0.19111   0.15306   0.12487   0.10629   0.09767   0.09434   0.09330   0.09434   0.09767   0.10629   0.12487   0.15306   0.19111   0.23628   0.32055   0.46100   0.75881   0.85308
                7.00   0.85308   0.76056   0.47250   0.34377   0.27153   0.23049   0.19591   0.17043   0.15368   0.14588   0.14285   0.14189   0.14285   0.14588   0.15368   0.17043   0.19591   0.23049   0.27153   0.34377   0.47250   0.76056   0.85308
               11.00   0.85308   0.76342   0.49101   0.37186   0.31922   0.28619   0.25695   0.23557   0.22159   0.21508   0.21253   0.21173   0.21253   0.21508   0.22159   0.23557   0.25695   0.28619   0.31922   0.37186   0.49101   0.76342   0.85308
               15.00   0.85308   0.76756   0.51283   0.39904   0.33828   0.31013   0.28607   0.26901   0.25879   0.25524   0.25463   0.25460   0.25463   0.25524   0.25879   0.26901   0.28607   0.31013   0.33828   0.39904   0.51283   0.76756   0.85308
               19.00   0.85308   0.77305   0.53832   0.43209   0.37413   0.34498   0.31751   0.29428   0.27179   0.25696   0.25136   0.24982   0.25136   0.25696   0.27179   0.29428   0.31751   0.34498   0.37413   0.43209   0.53832   0.77305   0.85308
               23.00   0.85308   0.77946   0.57255   0.47494   0.42049   0.39280   0.36861   0.34933   0.33476   0.32808   0.32515   0.32425   0.32515   0.32808   0.33476   0.34933   0.36861   0.39280   0.42049   0.47494   0.57255   0.77946   0.85308
               27.00   0.85308   0.78636   0.60942   0.52601   0.48834   0.47308   0.45652   0.44385   0.43499   0.42983   0.42846   0.42766   0.42846   0.42983   0.43499   0.44385   0.45652   0.47308   0.48834   0.52601   0.60942   0.78636   0.85308
               32.00   0.85308   0.79603   0.65933   0.59893   0.57594   0.57980   0.57736   0.57340   0.57176   0.57122   0.57242   0.57381   0.57242   0.57122   0.57176   0.57340   0.57736   0.57980   0.57594   0.59893   0.65933   0.79603   0.85308
               46.00   0.85308   0.82636   0.81044   0.84280   0.89690   0.92844   0.96090   0.98826   1.00864   1.01887   1.02366   1.02539   1.02366   1.01887   1.00864   0.98826   0.96090   0.92844   0.89690   0.84280   0.81044   0.82636   0.85308
               70.00   0.85308   0.86918   1.04205   1.21251   1.41202   1.51068   1.60143   1.67886   1.73828   1.77010   1.78396   1.78876   1.78396   1.77010   1.73828   1.67886   1.60143   1.51068   1.41202   1.21251   1.04205   0.86918   0.85308
              120.00   0.85308   0.82277   0.90997   1.02714   1.17344   1.24769   1.31665   1.37586   1.42135   1.44548   1.45610   1.45986   1.45610   1.44548   1.42135   1.37586   1.31665   1.24769   1.17344   1.02714   0.90997   0.82277   0.85308
              180.00   0.85308   0.69900   0.40238   0.26288   0.15540   0.11642   0.08747   0.06771   0.05297   0.05026   0.05017   0.05020   0.05017   0.05026   0.05297   0.06771   0.08747   0.11642   0.15540   0.26288   0.40238   0.69900   0.85308
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            </tableData>
          </table>
          </product>
        </function>
        <function name="aero/coefficient/CD_mach">
          <description>zero-lift drag's change with Mach: friction, wave drag</description>
          <product>
            <property>aero/qbar-psf</property>
            <property>metrics/Sw-sqft</property>
            <property>aero/function/mach-dCD0</property>
          </product>
        </function>
        <function name="aero/coefficient/CD_induced_mach">
          <description>induced drag's change with Mach (leading-edge suction lost)</description>
          <product>
            <property>aero/qbar-psf</property>
            <property>metrics/Sw-sqft</property>
            <property>aero/cl-squared</property>
            <property>aero/function/mach-dK</property>
          </product>
        </function>
        <function name="aero/coefficient/CD_aileron">
          <description>CD increment from aileron (deg), over alpha</description>
          <product>
            <property>aero/qbar-psf</property>
            <property>metrics/Sw-sqft</property>
            <property>aero/function/mach-aileron</property>
          <table>
            <independentVar lookup="row">aero/alpha-deg</independentVar>
            <independentVar lookup="column">fcs/left-aileron-pos-deg</independentVar>
            <tableData>
                        -25.00    -20.00    -15.00    -10.00     -5.00      0.00      5.00     10.00     15.00     20.00     25.00
             -180.00   0.01076   0.00705   0.00403   0.00182   0.00046   0.00000   0.00046   0.00182   0.00403   0.00705   0.01076
             -120.00   0.01058   0.00693   0.00397   0.00179   0.00045   0.00000   0.00045   0.00179   0.00397   0.00693   0.01058
              -70.00   0.01056   0.00692   0.00396   0.00178   0.00045   0.00000   0.00045   0.00178   0.00396   0.00692   0.01056
              -46.00   0.02029   0.01436   0.00901   0.00438   0.00116   0.00000   0.00116   0.00438   0.00901   0.01436   0.02029
              -32.00   0.04284   0.03246   0.02233   0.01282   0.00562   0.00000   0.00562   0.01282   0.02233   0.03246   0.04284
              -22.00   0.02847   0.02148   0.01446   0.00753   0.00207   0.00000   0.00207   0.00753   0.01446   0.02148   0.02847
              -17.00   0.02788   0.02094   0.01405   0.00730   0.00201   0.00000   0.00201   0.00730   0.01405   0.02094   0.02788
              -13.00   0.02864   0.02155   0.01447   0.00753   0.00207   0.00000   0.00207   0.00753   0.01447   0.02155   0.02864
               -9.00   0.02917   0.02196   0.01477   0.00769   0.00212   0.00000   0.00212   0.00769   0.01477   0.02196   0.02917
               -5.00   0.02946   0.02220   0.01493   0.00778   0.00214   0.00000   0.00214   0.00778   0.01493   0.02220   0.02946
               -1.00   0.02955   0.02227   0.01498   0.00781   0.00215   0.00000   0.00215   0.00781   0.01498   0.02227   0.02955
                3.00   0.02939   0.02214   0.01489   0.00776   0.00213   0.00000   0.00213   0.00776   0.01489   0.02214   0.02939
                7.00   0.02897   0.02179   0.01464   0.00762   0.00209   0.00000   0.00209   0.00762   0.01464   0.02179   0.02897
               11.00   0.02843   0.02111   0.01389   0.00699   0.00182   0.00000   0.00182   0.00699   0.01389   0.02111   0.02843
               15.00   0.03627   0.02703   0.01810   0.00893   0.00219   0.00000   0.00219   0.00893   0.01810   0.02703   0.03627
               19.00   0.09450   0.07363   0.05262   0.03259   0.01022   0.00000   0.01022   0.03259   0.05262   0.07363   0.09450
               23.00   0.07194   0.04842   0.02958   0.01443   0.00384   0.00000   0.00384   0.01443   0.02958   0.04842   0.07194
               27.00   0.05512   0.03856   0.02411   0.01187   0.00318   0.00000   0.00318   0.01187   0.02411   0.03856   0.05512
               32.00   0.04870   0.03456   0.02179   0.01072   0.00282   0.00000   0.00282   0.01072   0.02179   0.03456   0.04870
               46.00   0.02374   0.01654   0.01023   0.00495   0.00131   0.00000   0.00131   0.00495   0.01023   0.01654   0.02374
               70.00   0.01055   0.00691   0.00396   0.00178   0.00045   0.00000   0.00045   0.00178   0.00396   0.00691   0.01055
              120.00   0.01058   0.00693   0.00397   0.00179   0.00045   0.00000   0.00045   0.00179   0.00397   0.00693   0.01058
              180.00   0.01076   0.00705   0.00403   0.00182   0.00046   0.00000   0.00046   0.00182   0.00403   0.00705   0.01076
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            </tableData>
          </table>
          </product>
        </function>
        <function name="aero/coefficient/CD_elevator">
          <description>CD increment from elevator (deg), over alpha</description>
          <product>
            <property>aero/qbar-psf</property>
            <property>metrics/Sw-sqft</property>
            <property>aero/function/mach-elevator</property>
          <table>
            <independentVar lookup="row">aero/alpha-deg</independentVar>
            <independentVar lookup="column">fcs/elevator-pos-deg</independentVar>
            <tableData>
                        -30.00    -25.00    -20.00    -15.00    -10.00     -5.00      0.00      5.00     10.00     15.00     20.00
             -180.00   0.01057   0.00755   0.00494   0.00283   0.00127   0.00032   0.00000   0.00032   0.00127   0.00283   0.00494
             -120.00   0.01057   0.00755   0.00494   0.00283   0.00127   0.00032   0.00000   0.00032   0.00127   0.00283   0.00494
              -70.00   0.01057   0.00755   0.00495   0.00283   0.00128   0.00032   0.00000   0.00032   0.00127   0.00283   0.00494
              -46.00   0.00952   0.00682   0.00445   0.00240   0.00073  -0.00025   0.00000   0.00181   0.00517   0.00965   0.01486
              -32.00   0.05850   0.05125   0.04372   0.03515   0.02459   0.01219   0.00000  -0.00872  -0.01424  -0.02077  -0.02486
              -22.00   0.06789   0.05982   0.05136   0.04138   0.02883   0.01424   0.00000  -0.01189  -0.02024  -0.02474  -0.02633
              -17.00   0.05962   0.05198   0.04411   0.03506   0.02401   0.01160   0.00000  -0.00911  -0.01492  -0.01744  -0.01764
              -13.00   0.05226   0.04507   0.03778   0.02958   0.01988   0.00937   0.00000  -0.00680  -0.01049  -0.01140  -0.01045
               -9.00   0.04409   0.03746   0.03084   0.02362   0.01541   0.00696   0.00000  -0.00433  -0.00581  -0.00503  -0.00290
               -5.00   0.03533   0.02931   0.02343   0.01728   0.01068   0.00443   0.00000  -0.00177  -0.00097   0.00153   0.00485
               -1.00   0.02608   0.02074   0.01567   0.01066   0.00576   0.00180   0.00000   0.00086   0.00398   0.00821   0.01270
                3.00   0.01650   0.01188   0.00769   0.00387   0.00073  -0.00087   0.00000   0.00352   0.00895   0.01489   0.02054
                7.00   0.00732   0.00343   0.00008  -0.00257  -0.00402  -0.00338   0.00000   0.00599   0.01356   0.02106   0.02774
               11.00  -0.00182  -0.00497  -0.00745  -0.00891  -0.00867  -0.00594   0.00000   0.00832   0.01787   0.02681   0.03442
               15.00  -0.00677  -0.00810  -0.00850  -0.00788  -0.00724  -0.00716   0.00000   0.00958   0.02023   0.03022   0.03898
               19.00  -0.02006  -0.01679  -0.01541  -0.02374  -0.01953  -0.01135   0.00000   0.01354   0.02761   0.04020   0.05081
               23.00  -0.04386  -0.04029  -0.03675  -0.03193  -0.02458  -0.01383   0.00000   0.01580   0.03172   0.04557   0.05676
               27.00  -0.04597  -0.04411  -0.04138  -0.03664  -0.02847  -0.01601   0.00000   0.01797   0.03570   0.05083   0.06278
               32.00  -0.00282  -0.00953  -0.01533  -0.01983  -0.02153  -0.01657   0.00000   0.01913   0.03997   0.05632   0.06802
               46.00   0.03012   0.02306   0.01665   0.01081   0.00571   0.00190   0.00000   0.00010   0.00180   0.00434   0.00722
               70.00   0.01057   0.00755   0.00494   0.00283   0.00127   0.00032   0.00000   0.00032   0.00127   0.00283   0.00494
              120.00   0.01057   0.00755   0.00494   0.00283   0.00127   0.00032   0.00000   0.00032   0.00127   0.00283   0.00494
              180.00   0.01057   0.00755   0.00494   0.00283   0.00127   0.00032   0.00000   0.00032   0.00127   0.00283   0.00494
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            </tableData>
          </table>
          </product>
        </function>
        <function name="aero/coefficient/CD_flap">
          <description>CD increment from flap (deg), over alpha</description>
          <product>
            <property>aero/qbar-psf</property>
            <property>metrics/Sw-sqft</property>
            <property>aero/function/mach-flap</property>
          <table>
            <independentVar lookup="row">aero/alpha-deg</independentVar>
            <independentVar lookup="column">fcs/flap-pos-deg</independentVar>
            <tableData>
                          0.00      5.00     10.00     15.00     20.00
             -180.00   0.00000   0.00041   0.00163   0.00363   0.00634
             -120.00   0.00000   0.00041   0.00162   0.00360   0.00629
              -70.00   0.00000   0.00041   0.00163   0.00361   0.00630
              -46.00   0.00000   0.01260   0.02771   0.04461   0.06246
              -32.00   0.00000   0.01104   0.02768   0.04794   0.06990
              -22.00   0.00000  -0.01820  -0.02908  -0.03386  -0.03416
              -17.00   0.00000  -0.00879  -0.01241  -0.01125  -0.00638
              -13.00   0.00000  -0.00356  -0.00209   0.00373   0.01264
               -9.00   0.00000   0.00165   0.00818   0.01860   0.03151
               -5.00   0.00000   0.00691   0.01851   0.03356   0.05046
               -1.00   0.00000   0.01217   0.02879   0.04838   0.06919
                3.00   0.00000   0.01779   0.03983   0.06435   0.08944
                7.00   0.00000   0.02350   0.05099   0.08035   0.10968
               11.00   0.00000   0.03032   0.06383   0.09664   0.12962
               15.00   0.00000   0.03377   0.07562   0.12196   0.17497
               19.00   0.00000   0.01541   0.03752   0.06356   0.09933
               23.00   0.00000   0.00675   0.01913   0.03438   0.05373
               27.00   0.00000   0.00198   0.01008   0.02193   0.03742
               32.00   0.00000  -0.00365   0.00160   0.00984   0.02125
               46.00   0.00000  -0.01041  -0.01764  -0.02208  -0.02422
               70.00   0.00000   0.00040   0.00161   0.00358   0.00627
              120.00   0.00000   0.00041   0.00162   0.00360   0.00629
              180.00   0.00000   0.00041   0.00163   0.00363   0.00634
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            </tableData>
          </table>
          </product>
        </function>
        <function name="aero/coefficient/CD_rudder">
          <description>CD increment from rudder (deg), over alpha</description>
          <product>
            <property>aero/qbar-psf</property>
            <property>metrics/Sw-sqft</property>
            <property>aero/function/mach-rudder</property>
          <table>
            <independentVar lookup="row">aero/alpha-deg</independentVar>
            <independentVar lookup="column">fcs/rudder-pos-deg</independentVar>
            <tableData>
                        -20.00    -15.00    -10.00     -5.00      0.00      5.00     10.00     15.00     20.00
             -180.00   0.00442   0.00253   0.00114   0.00029   0.00000   0.00029   0.00114   0.00253   0.00442
             -120.00   0.00055   0.00032   0.00014   0.00004   0.00000   0.00004   0.00014   0.00032   0.00055
              -70.00   0.00020   0.00011   0.00005   0.00001   0.00000   0.00001   0.00005   0.00011   0.00020
              -46.00   0.00374   0.00221   0.00078   0.00042   0.00000   0.00042   0.00078   0.00221   0.00374
              -32.00   0.01168   0.00887   0.00602   0.00386   0.00000   0.00386   0.00602   0.00887   0.01168
              -22.00   0.01042   0.00699   0.00363   0.00100   0.00000   0.00100   0.00363   0.00699   0.01042
              -17.00   0.01146   0.00769   0.00399   0.00110   0.00000   0.00110   0.00399   0.00769   0.01146
              -13.00   0.01213   0.00814   0.00423   0.00116   0.00000   0.00116   0.00423   0.00814   0.01213
               -9.00   0.01264   0.00848   0.00441   0.00121   0.00000   0.00121   0.00441   0.00848   0.01264
               -5.00   0.01297   0.00870   0.00452   0.00124   0.00000   0.00124   0.00452   0.00870   0.01297
               -1.00   0.01310   0.00878   0.00456   0.00125   0.00000   0.00125   0.00456   0.00878   0.01310
                3.00   0.01304   0.00874   0.00454   0.00125   0.00000   0.00125   0.00454   0.00874   0.01304
                7.00   0.01279   0.00857   0.00445   0.00122   0.00000   0.00122   0.00445   0.00857   0.01279
               11.00   0.01234   0.00826   0.00429   0.00118   0.00000   0.00118   0.00429   0.00826   0.01234
               15.00   0.01208   0.00816   0.00428   0.00116   0.00000   0.00116   0.00428   0.00816   0.01208
               19.00   0.01041   0.00688   0.00476   0.00129   0.00000   0.00129   0.00476   0.00688   0.01041
               23.00   0.01128   0.00781   0.00423   0.00118   0.00000   0.00118   0.00423   0.00781   0.01128
               27.00   0.01122   0.00788   0.00472   0.00148   0.00000   0.00148   0.00472   0.00788   0.01122
               32.00   0.00754   0.00468   0.00102  -0.00054   0.00000  -0.00054   0.00102   0.00468   0.00754
               46.00   0.00441   0.00291   0.00146   0.00038   0.00000   0.00038   0.00146   0.00291   0.00441
               70.00   0.00020   0.00011   0.00005   0.00001   0.00000   0.00001   0.00005   0.00011   0.00020
              120.00   0.00055   0.00032   0.00014   0.00004   0.00000   0.00004   0.00014   0.00032   0.00055
              180.00   0.00442   0.00253   0.00114   0.00029   0.00000   0.00029   0.00114   0.00253   0.00442
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            </tableData>
          </table>
          </product>
        </function>
        <function name="aero/coefficient/CD_ground">
          <description>Induced drag change in ground effect</description>
          <product>
            <property>aero/qbar-psf</property>
            <property>metrics/Sw-sqft</property>
            <property>aero/cl-squared</property>
            <value>0.05898</value>
          <table>
            <independentVar lookup="row">aero/h_b-mac-ft</independentVar>
            <tableData>
                    0.00   -1.00000
                    0.10   -0.28090
                    0.15   -0.14793
                    0.20   -0.08897
                    0.30   -0.04160
                    0.40   -0.02383
                    0.50   -0.01538
                    0.60   -0.01073
                    0.70   -0.00791
                    0.80   -0.00607
                    0.90   -0.00480
                    1.00   -0.00389
                    1.10   -0.00322
            </tableData>
          </table>
          </product>
        </function>
        <function name="aero/coefficient/CD_decelerons">
          <description>decelerons: drag of its airbrake plates, 4.95 m2 opened to 40 deg (hangar)</description>
          <product>
            <property>aero/qbar-psf</property>
            <property>metrics/Sw-sqft</property>
            <value>0.126889</value>
            <pow>
              <sin>
                <product>
                  <property>fcs/speedbrake-pos-norm</property>
                  <value>0.698132</value>
                </product>
              </sin>
              <value>2</value>
            </pow>
          </product>
        </function>
        <function name="aero/coefficient/CD_gear">
          <description>the gear extended: its wheels' and struts' drag by Raymer's components, 0.352 m2 (hangar)</description>
          <product>
            <property>aero/qbar-psf</property>
            <property>metrics/Sw-sqft</property>
            <value>0.00752432</value>
            <property>gear/gear-pos-norm</property>
          </product>
        </function>
      </axis>
      <axis name="SIDE">
        <function name="aero/coefficient/CY_base">
          <description>CY over alpha and beta (hangar)</description>
          <product>
            <property>aero/qbar-psf</property>
            <property>metrics/Sw-sqft</property>
            <property>aero/function/mach-side</property>
          <table>
            <independentVar lookup="row">aero/alpha-deg</independentVar>
            <independentVar lookup="column">aero/beta-deg</independentVar>
            <tableData>
                        -90.00    -70.00    -50.00    -40.00    -30.00    -25.00    -20.00    -15.00    -10.00     -6.00     -3.00      0.00      3.00      6.00     10.00     15.00     20.00     25.00     30.00     40.00     50.00     70.00     90.00
             -180.00  -0.00000   0.24184   0.32181   0.28450   0.20908   0.16559   0.12240   0.08326   0.09002   0.09850   0.05179  -0.00000  -0.05179  -0.09850  -0.09002  -0.08326  -0.12240  -0.16559  -0.20908  -0.28450  -0.32181  -0.24184   0.00000
             -120.00  -0.00000  -0.00962  -0.18813  -0.26484  -0.29002  -0.27813  -0.24809  -0.20237  -0.14314  -0.08496  -0.02727  -0.00000   0.02727   0.08496   0.14314   0.20237   0.24809   0.27813   0.29002   0.26484   0.18813   0.00962   0.00000
              -70.00   0.00000  -0.05585  -0.28673  -0.37444  -0.39200  -0.37103  -0.32986  -0.26887  -0.18786  -0.10259  -0.04494  -0.00000   0.04494   0.10259   0.18786   0.26887   0.32986   0.37103   0.39200   0.37444   0.28673   0.05585  -0.00000
              -46.00   0.00000   0.07567  -0.00180  -0.05366  -0.08304  -0.08063  -0.05618  -0.01538   0.02982   0.02342   0.01120  -0.00000  -0.01120  -0.02342  -0.02982   0.01538   0.05618   0.08063   0.08304   0.05366   0.00180  -0.07567  -0.00000
              -32.00   0.00000   0.16800   0.18020   0.13831   0.12098   0.11573   0.11102   0.08371   0.05721   0.03707   0.01915  -0.00000  -0.01915  -0.03707  -0.05721  -0.08371  -0.11102  -0.11573  -0.12098  -0.13831  -0.18020  -0.16800  -0.00000
              -22.00   0.00000   0.23485   0.30513   0.28029   0.27391   0.23019   0.19985   0.15075   0.09996   0.05963   0.02973  -0.00000  -0.02973  -0.05963  -0.09996  -0.15075  -0.19985  -0.23019  -0.27391  -0.28029  -0.30513  -0.23485  -0.00000
              -17.00   0.00000   0.26272   0.35882   0.32805   0.31194   0.26822   0.22880   0.17149   0.11333   0.06746   0.03358  -0.00000  -0.03358  -0.06746  -0.11333  -0.17149  -0.22880  -0.26822  -0.31194  -0.32805  -0.35882  -0.26272  -0.00000
              -13.00   0.00000   0.28055   0.38126   0.35013   0.33237   0.29800   0.24286   0.18127   0.11920   0.07063   0.03507  -0.00000  -0.03507  -0.07063  -0.11920  -0.18127  -0.24286  -0.29800  -0.33237  -0.35013  -0.38126  -0.28055  -0.00000
               -9.00   0.00000   0.29168   0.38878   0.36102   0.34676   0.31064   0.25057   0.21760   0.12146   0.07144   0.03530  -0.00000  -0.03530  -0.07144  -0.12146  -0.21760  -0.25057  -0.31064  -0.34676  -0.36102  -0.38878  -0.29168  -0.00000
               -5.00   0.00000   0.29550   0.39538   0.36755   0.35590   0.31444   0.25225   0.18636   0.12064   0.07022   0.03435  -0.00000  -0.03435  -0.07022  -0.12064  -0.18636  -0.25225  -0.31444  -0.35590  -0.36755  -0.39538  -0.29550  -0.00000
               -1.00   0.00000   0.29447   0.40175   0.36854   0.36080   0.31369   0.25085   0.18469   0.11896   0.06878   0.03336  -0.00000  -0.03336  -0.06878  -0.11896  -0.18469  -0.25085  -0.31369  -0.36080  -0.36854  -0.40175  -0.29447  -0.00000
                3.00   0.00000   0.28700   0.39899   0.36062   0.35602   0.30851   0.24625   0.18112   0.11666   0.06758   0.03293  -0.00000  -0.03293  -0.06758  -0.11666  -0.18112  -0.24625  -0.30851  -0.35602  -0.36062  -0.39899  -0.28700  -0.00000
                7.00   0.00000   0.27655   0.37841   0.34410   0.33982   0.29644   0.23661   0.17413   0.11251   0.06552   0.03209  -0.00000  -0.03209  -0.06552  -0.11251  -0.17413  -0.23661  -0.29644  -0.33982  -0.34410  -0.37841  -0.27655  -0.00000
               11.00   0.00000   0.26343   0.34939   0.31787   0.31163   0.27683   0.22177   0.16332   0.10584   0.06186   0.03039  -0.00000  -0.03039  -0.06186  -0.10584  -0.16332  -0.22177  -0.27683  -0.31163  -0.31787  -0.34939  -0.26343  -0.00000
               15.00   0.00000   0.24714   0.32016   0.28226   0.27343   0.24231   0.19900   0.14831   0.09603   0.05550   0.02631  -0.00000  -0.02631  -0.05550  -0.09603  -0.14831  -0.19900  -0.24231  -0.27343  -0.28226  -0.32016  -0.24714  -0.00000
               19.00   0.00000   0.22744   0.29386   0.25861   0.24222   0.20749   0.16795   0.12555   0.08432   0.04920   0.02104  -0.00000  -0.02104  -0.04920  -0.08432  -0.12555  -0.16795  -0.20749  -0.24222  -0.25861  -0.29386  -0.22744  -0.00000
               23.00   0.00000   0.20558   0.27182   0.24195   0.22673   0.18889   0.15386   0.11638   0.07779   0.04334   0.01974  -0.00000  -0.01974  -0.04334  -0.07779  -0.11638  -0.15386  -0.18889  -0.22673  -0.24195  -0.27182  -0.20558  -0.00000
               27.00   0.00000   0.18274   0.23943   0.20666   0.18502   0.15844   0.12784   0.09418   0.06124   0.03228   0.01326  -0.00000  -0.01326  -0.03228  -0.06124  -0.09418  -0.12784  -0.15844  -0.18502  -0.20666  -0.23943  -0.18274  -0.00000
               32.00   0.00000   0.15970   0.18710   0.15294   0.12495   0.13347   0.10308   0.08215   0.04944   0.02166   0.00329  -0.00000  -0.00329  -0.02166  -0.04944  -0.08215  -0.10308  -0.13347  -0.12495  -0.15294  -0.18710  -0.15970  -0.00000
               46.00   0.00000   0.07963   0.00712  -0.04121  -0.06637  -0.06330  -0.04107  -0.01197   0.02977   0.02564   0.01322  -0.00000  -0.01322  -0.02564  -0.02977   0.01197   0.04107   0.06330   0.06637   0.04121  -0.00712  -0.07963  -0.00000
               70.00   0.00000  -0.05383  -0.28030  -0.36764  -0.38752  -0.36588  -0.32286  -0.25910  -0.17674  -0.09488  -0.04094  -0.00000   0.04094   0.09488   0.17674   0.25910   0.32286   0.36588   0.38752   0.36764   0.28030   0.05383  -0.00000
              120.00  -0.00000  -0.01227  -0.19494  -0.27277  -0.29821  -0.28494  -0.25431  -0.20733  -0.14659  -0.08708  -0.02834  -0.00000   0.02834   0.08708   0.14659   0.20733   0.25431   0.28494   0.29821   0.27277   0.19494   0.01227   0.00000
              180.00  -0.00000   0.24184   0.32181   0.28450   0.20908   0.16559   0.12240   0.08326   0.09002   0.09850   0.05179  -0.00000  -0.05179  -0.09850  -0.09002  -0.08326  -0.12240  -0.16559  -0.20908  -0.28450  -0.32181  -0.24184   0.00000
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            </tableData>
          </table>
          </product>
        </function>
        <function name="aero/coefficient/CY_aileron">
          <description>CY increment from aileron (deg), over alpha</description>
          <product>
            <property>aero/qbar-psf</property>
            <property>metrics/Sw-sqft</property>
            <property>aero/function/mach-aileron</property>
          <table>
            <independentVar lookup="row">aero/alpha-deg</independentVar>
            <independentVar lookup="column">fcs/left-aileron-pos-deg</independentVar>
            <tableData>
                        -25.00    -20.00    -15.00    -10.00     -5.00      0.00      5.00     10.00     15.00     20.00     25.00
             -180.00  -0.00000  -0.00000  -0.00000  -0.00000  -0.00000   0.00000  -0.00000  -0.00000  -0.00000  -0.00000  -0.00000
             -120.00   0.00352   0.00317   0.00270   0.00200   0.00106   0.00000  -0.00106  -0.00200  -0.00270  -0.00317  -0.00352
              -70.00  -0.00026  -0.00028  -0.00028  -0.00023  -0.00013   0.00000   0.00013   0.00023   0.00028   0.00028   0.00026
              -46.00   0.00130   0.00060   0.00006  -0.00022  -0.00019   0.00000   0.00019   0.00022  -0.00006  -0.00060  -0.00130
              -32.00  -0.00715  -0.00686  -0.00615  -0.00469  -0.00243   0.00000   0.00243   0.00469   0.00615   0.00686   0.00715
              -22.00  -0.01359  -0.01222  -0.01036  -0.00767  -0.00408   0.00000   0.00408   0.00767   0.01036   0.01222   0.01359
              -17.00  -0.01226  -0.01101  -0.00931  -0.00688  -0.00365   0.00000   0.00365   0.00688   0.00931   0.01101   0.01226
              -13.00  -0.01133  -0.01016  -0.00858  -0.00633  -0.00336   0.00000   0.00336   0.00633   0.00858   0.01016   0.01133
               -9.00  -0.01048  -0.00937  -0.00789  -0.00581  -0.00308   0.00000   0.00308   0.00581   0.00789   0.00937   0.01048
               -5.00  -0.01003  -0.00892  -0.00748  -0.00549  -0.00290   0.00000   0.00290   0.00549   0.00748   0.00892   0.01003
               -1.00  -0.01221  -0.01089  -0.00915  -0.00672  -0.00356   0.00000   0.00356   0.00672   0.00915   0.01089   0.01221
                3.00  -0.01623  -0.01456  -0.01231  -0.00909  -0.00482   0.00000   0.00482   0.00909   0.01231   0.01456   0.01623
                7.00  -0.02008  -0.01807  -0.01533  -0.01135  -0.00603   0.00000   0.00603   0.01135   0.01533   0.01807   0.02008
               11.00  -0.02498  -0.02243  -0.01891  -0.01381  -0.00720   0.00000   0.00720   0.01381   0.01891   0.02243   0.02498
               15.00  -0.03526  -0.03225  -0.02783  -0.02098  -0.01174   0.00000   0.01174   0.02098   0.02783   0.03225   0.03526
               19.00  -0.05506  -0.05044  -0.04364  -0.03396  -0.01859   0.00000   0.01859   0.03396   0.04364   0.05044   0.05506
               23.00  -0.03169  -0.02606  -0.02104  -0.01537  -0.00819   0.00000   0.00819   0.01537   0.02104   0.02606   0.03169
               27.00  -0.01980  -0.01788  -0.01542  -0.01167  -0.00635   0.00000   0.00635   0.01167   0.01542   0.01788   0.01980
               32.00  -0.01692  -0.00113  -0.00053   0.00133   0.00461   0.00000  -0.00461  -0.00133   0.00053   0.00113   0.01692
               46.00  -0.00474  -0.00493  -0.00469  -0.00376  -0.00209   0.00000   0.00209   0.00376   0.00469   0.00493   0.00474
               70.00  -0.00095  -0.00090  -0.00080  -0.00062  -0.00033   0.00000   0.00033   0.00062   0.00080   0.00090   0.00095
              120.00   0.00300   0.00271   0.00230   0.00170   0.00091   0.00000  -0.00091  -0.00170  -0.00230  -0.00271  -0.00300
              180.00   0.00000   0.00000   0.00000   0.00000   0.00000   0.00000   0.00000   0.00000   0.00000   0.00000   0.00000
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            </tableData>
          </table>
          </product>
        </function>
        <function name="aero/coefficient/CY_rudder">
          <description>CY increment from rudder (deg), over alpha</description>
          <product>
            <property>aero/qbar-psf</property>
            <property>metrics/Sw-sqft</property>
            <property>aero/function/mach-rudder</property>
          <table>
            <independentVar lookup="row">aero/alpha-deg</independentVar>
            <independentVar lookup="column">fcs/rudder-pos-deg</independentVar>
            <tableData>
                        -20.00    -15.00    -10.00     -5.00      0.00      5.00     10.00     15.00     20.00
             -180.00  -0.00000  -0.00000  -0.00000  -0.00000   0.00000  -0.00000  -0.00000  -0.00000  -0.00000
             -120.00  -0.00000  -0.00000  -0.00000  -0.00000   0.00000  -0.00000  -0.00000  -0.00000  -0.00000
              -70.00  -0.02352  -0.01999  -0.01481  -0.00788   0.00000   0.00788   0.01481   0.01999   0.02352
              -46.00  -0.06952  -0.06086  -0.04750  -0.02274   0.00000   0.02274   0.04750   0.06086   0.06952
              -32.00  -0.06477  -0.05645  -0.04281  -0.02241   0.00000   0.02241   0.04281   0.05645   0.06477
              -22.00  -0.07328  -0.06237  -0.04627  -0.02462   0.00000   0.02462   0.04627   0.06237   0.07328
              -17.00  -0.07952  -0.06767  -0.05020  -0.02671   0.00000   0.02671   0.05020   0.06767   0.07952
              -13.00  -0.08365  -0.07118  -0.05280  -0.02809   0.00000   0.02809   0.05280   0.07118   0.08365
               -9.00  -0.08696  -0.07399  -0.05488  -0.02920   0.00000   0.02920   0.05488   0.07399   0.08696
               -5.00  -0.08934  -0.07601  -0.05637  -0.02999   0.00000   0.02999   0.05637   0.07601   0.08934
               -1.00  -0.09076  -0.07720  -0.05725  -0.03046   0.00000   0.03046   0.05725   0.07720   0.09076
                3.00  -0.09120  -0.07757  -0.05752  -0.03060   0.00000   0.03060   0.05752   0.07757   0.09120
                7.00  -0.09063  -0.07708  -0.05715  -0.03041   0.00000   0.03041   0.05715   0.07708   0.09063
               11.00  -0.08904  -0.07570  -0.05610  -0.02985   0.00000   0.02985   0.05610   0.07570   0.08904
               15.00  -0.08791  -0.07506  -0.05583  -0.02918   0.00000   0.02918   0.05583   0.07506   0.08791
               19.00  -0.08872  -0.07647  -0.05503  -0.02927   0.00000   0.02927   0.05503   0.07647   0.08872
               23.00  -0.08128  -0.06772  -0.05005  -0.02695   0.00000   0.02695   0.05005   0.06772   0.08128
               27.00  -0.07932  -0.06811  -0.05322  -0.02949   0.00000   0.02949   0.05322   0.06811   0.07932
               32.00  -0.06824  -0.05909  -0.04024  -0.01493   0.00000   0.01493   0.04024   0.05909   0.06824
               46.00  -0.07056  -0.06133  -0.04631  -0.02491   0.00000   0.02491   0.04631   0.06133   0.07056
               70.00  -0.02352  -0.01999  -0.01482  -0.00788   0.00000   0.00788   0.01482   0.01999   0.02352
              120.00  -0.00000  -0.00000  -0.00000  -0.00000   0.00000  -0.00000  -0.00000  -0.00000  -0.00000
              180.00   0.00000   0.00000   0.00000   0.00000   0.00000   0.00000   0.00000   0.00000   0.00000
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            </tableData>
          </table>
          </product>
        </function>
        <function name="aero/coefficient/CYp">
          <description>CY per p (non-dimensional), over alpha</description>
          <product>
            <property>aero/qbar-psf</property>
            <property>metrics/Sw-sqft</property>
            <property>aero/bi2vel</property>
            <property>velocities/p-aero-rad_sec</property>
            <property>aero/function/mach-lift</property>
          <table>
            <independentVar lookup="row">aero/alpha-deg</independentVar>
            <tableData>
                 -180.00   -0.28027
                 -165.00   -0.10066
                 -105.00   -0.14324
                  -60.00   -0.11368
                  -42.00   -0.06002
                  -30.00   -0.15115
                  -20.00   -0.14931
                  -16.00   -0.13742
                  -12.00   -0.12317
                   -8.00   -0.10577
                   -4.00   -0.08365
                    0.00   -0.10321
                    4.00   -0.13762
                    8.00   -0.16469
                   12.00   -0.18715
                   16.00    0.22456
                   20.00    0.22875
                   24.00    0.07601
                   28.00    0.16704
                   35.00   -0.00420
                   50.00   -0.14543
                   80.00   -0.14230
                  135.00   -0.14845
                  180.00   -0.28027
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            </tableData>
          </table>
          </product>
        </function>
        <function name="aero/coefficient/CYr">
          <description>CY per r (non-dimensional), over alpha</description>
          <product>
            <property>aero/qbar-psf</property>
            <property>metrics/Sw-sqft</property>
            <property>aero/bi2vel</property>
            <property>velocities/r-aero-rad_sec</property>
            <property>aero/function/mach-lift</property>
          <table>
            <independentVar lookup="row">aero/alpha-deg</independentVar>
            <tableData>
                 -180.00    0.73742
                 -165.00    0.71919
                 -105.00    0.17523
                  -60.00    0.49862
                  -42.00    0.47262
                  -30.00    0.28631
                  -20.00    0.35617
                  -16.00    0.39089
                  -12.00    0.42314
                   -8.00    0.45257
                   -4.00    0.47640
                    0.00    0.50212
                    4.00    0.51661
                    8.00    0.52895
                   12.00    0.55063
                   16.00    0.82825
                   20.00    0.57347
                   24.00    0.25664
                   28.00    0.08048
                   35.00    0.51983
                   50.00    0.61709
                   80.00    0.15458
                  135.00    0.48546
                  180.00    0.73742
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            </tableData>
          </table>
          </product>
        </function>
      </axis>
      <axis name="LIFT">
        <function name="aero/coefficient/CL_base">
          <description>CL over alpha and beta, ground effect, compressibility (hangar)</description>
          <product>
            <property>aero/qbar-psf</property>
            <property>metrics/Sw-sqft</property>
            <property>aero/function/CL-base</property>
            <property>aero/function/mach-lift</property>
          <table>
            <independentVar lookup="row">aero/h_b-mac-ft</independentVar>
            <tableData>
                    0.00    1.20000
                    0.10    1.08692
                    0.15    1.05730
                    0.20    1.03778
                    0.30    1.01642
                    0.40    1.00713
                    0.50    1.00310
                    0.60    1.00135
                    0.70    1.00059
                    0.80    1.00025
                    0.90    1.00011
                    1.00    1.00005
                    1.10    1.00000
            </tableData>
          </table>
          </product>
        </function>
        <function name="aero/coefficient/CL_elevator">
          <description>CL increment from elevator (deg), over alpha</description>
          <product>
            <property>aero/qbar-psf</property>
            <property>metrics/Sw-sqft</property>
            <property>aero/function/mach-elevator</property>
          <table>
            <independentVar lookup="row">aero/alpha-deg</independentVar>
            <independentVar lookup="column">fcs/elevator-pos-deg</independentVar>
            <tableData>
                        -30.00    -25.00    -20.00    -15.00    -10.00     -5.00      0.00      5.00     10.00     15.00     20.00
             -180.00   0.00000   0.00000   0.00000   0.00000   0.00000   0.00000   0.00000   0.00000   0.00000   0.00000   0.00000
             -120.00  -0.03632  -0.03352  -0.03023  -0.02569  -0.01904  -0.01013   0.00000   0.01013   0.01904   0.02569   0.03023
              -70.00  -0.01371  -0.01276  -0.01161  -0.01000  -0.00754  -0.00411   0.00000   0.00433   0.00832   0.01142   0.01359
              -46.00  -0.04870  -0.04625  -0.04294  -0.03763  -0.02883  -0.01585   0.00000   0.01660   0.03146   0.04225   0.04899
              -32.00  -0.06617  -0.06382  -0.06003  -0.05346  -0.04172  -0.02320   0.00000   0.01608  -0.00334   0.00819   0.02090
              -22.00  -0.12383  -0.11672  -0.10750  -0.09318  -0.07029  -0.03794   0.00000   0.03879   0.07337   0.09910   0.11628
              -17.00  -0.13755  -0.12906  -0.11836  -0.10219  -0.07680  -0.04131   0.00000   0.04198   0.07920   0.10676   0.12507
              -13.00  -0.14615  -0.13686  -0.12526  -0.10794  -0.08095  -0.04345   0.00000   0.04396   0.08280   0.11145   0.13040
               -9.00  -0.15303  -0.14305  -0.13071  -0.11244  -0.08417  -0.04510   0.00000   0.04544   0.08543   0.11483   0.13419
               -5.00  -0.15819  -0.14766  -0.13472  -0.11571  -0.08648  -0.04624   0.00000   0.04643   0.08713   0.11693   0.13648
               -1.00  -0.16153  -0.15057  -0.13718  -0.11765  -0.08779  -0.04687   0.00000   0.04688   0.08782   0.11769   0.13718
                3.00  -0.16314  -0.15189  -0.13821  -0.11839  -0.08821  -0.04701   0.00000   0.04686   0.08766   0.11730   0.13655
                7.00  -0.16318  -0.15177  -0.13797  -0.11806  -0.08787  -0.04677   0.00000   0.04643   0.08670   0.11581   0.13459
               11.00  -0.16164  -0.15025  -0.13646  -0.11658  -0.08655  -0.04662   0.00000   0.04509   0.08400   0.11196   0.12981
               15.00  -0.11549  -0.10286  -0.08656  -0.06477  -0.05209  -0.04110   0.00000   0.03962   0.07365   0.09970   0.11938
               19.00  -0.04356   0.00705  -0.10592  -0.13702  -0.09921  -0.05013   0.00000   0.04612   0.08569   0.11733   0.14336
               23.00  -0.23415  -0.20463  -0.17625  -0.14284  -0.10046  -0.05073   0.00000   0.04710   0.08731   0.11855   0.14395
               27.00  -0.20562  -0.18386  -0.15968  -0.12979  -0.09162  -0.04646   0.00000   0.04149   0.07426   0.09961   0.12065
               32.00  -0.21519  -0.20511  -0.19179  -0.17075  -0.13385  -0.07684   0.00000   0.05906   0.10367   0.13207   0.15022
               46.00  -0.08012  -0.07589  -0.07008  -0.06074  -0.04564  -0.02443   0.00000   0.02430   0.04533   0.06060   0.07068
               70.00  -0.02136  -0.01958  -0.01753  -0.01474  -0.01076  -0.00561   0.00000   0.00535   0.00986   0.01311   0.01527
              120.00  -0.03632  -0.03352  -0.03023  -0.02569  -0.01904  -0.01013   0.00000   0.01013   0.01904   0.02569   0.03023
              180.00   0.00000   0.00000   0.00000   0.00000   0.00000   0.00000   0.00000   0.00000   0.00000   0.00000   0.00000
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            </tableData>
          </table>
          </product>
        </function>
        <function name="aero/coefficient/CL_flap">
          <description>CL increment from flap (deg), over alpha</description>
          <product>
            <property>aero/qbar-psf</property>
            <property>metrics/Sw-sqft</property>
            <property>aero/function/mach-flap</property>
          <table>
            <independentVar lookup="row">aero/alpha-deg</independentVar>
            <independentVar lookup="column">fcs/flap-pos-deg</independentVar>
            <tableData>
                          0.00      5.00     10.00     15.00     20.00
             -180.00   0.00000   0.00000   0.00000   0.00000   0.00000
             -120.00   0.00000   0.02487   0.04880   0.07053   0.08930
              -70.00   0.00000   0.01247   0.02524   0.03755   0.04876
              -46.00   0.00000   0.04148   0.08231   0.11973   0.15172
              -32.00   0.00000   0.07632   0.14971   0.21632   0.27316
              -22.00   0.00000   0.12771   0.25147   0.36480   0.46345
              -17.00   0.00000   0.13077   0.25729   0.37268   0.47257
              -13.00   0.00000   0.13192   0.25920   0.37494   0.47476
               -9.00   0.00000   0.13198   0.25899   0.37413   0.47310
               -5.00   0.00000   0.13167   0.25810   0.37242   0.47039
               -1.00   0.00000   0.13008   0.25478   0.36725   0.46332
                3.00   0.00000   0.12993   0.25414   0.36577   0.46093
                7.00   0.00000   0.12481   0.24514   0.35064   0.43473
               11.00   0.00000   0.12164   0.22428   0.29547   0.35022
               15.00   0.00000   0.12254   0.22969   0.32019   0.41488
               19.00   0.00000   0.08982   0.16586   0.22509   0.30268
               23.00   0.00000   0.07357   0.13254   0.17223   0.20948
               27.00   0.00000   0.06240   0.11411   0.15100   0.18414
               32.00   0.00000   0.06409   0.12998   0.17541   0.21216
               46.00   0.00000   0.03449   0.06558   0.09132   0.11466
               70.00   0.00000   0.01094   0.02076   0.02909   0.03646
              120.00   0.00000   0.02442   0.04791   0.06925   0.08770
              180.00   0.00000   0.00000   0.00000   0.00000   0.00000
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            </tableData>
          </table>
          <table>
            <independentVar lookup="row">aero/h_b-mac-ft</independentVar>
            <tableData>
                    0.00    1.20000
                    0.10    1.08692
                    0.15    1.05730
                    0.20    1.03778
                    0.30    1.01642
                    0.40    1.00713
                    0.50    1.00310
                    0.60    1.00135
                    0.70    1.00059
                    0.80    1.00025
                    0.90    1.00011
                    1.00    1.00005
                    1.10    1.00000
            </tableData>
          </table>
          </product>
        </function>
        <function name="aero/coefficient/CLq">
          <description>CL per q (non-dimensional), over alpha</description>
          <product>
            <property>aero/qbar-psf</property>
            <property>metrics/Sw-sqft</property>
            <property>aero/ci2vel</property>
            <property>velocities/q-aero-rad_sec</property>
            <property>aero/function/mach-lift</property>
          <table>
            <independentVar lookup="row">aero/alpha-deg</independentVar>
            <tableData>
                 -180.00   -3.83665
                 -165.00    0.20563
                 -105.00   -0.62914
                  -60.00    1.14392
                  -42.00    1.54595
                  -30.00    1.62730
                  -20.00    9.72985
                  -16.00    9.77272
                  -12.00    9.80400
                   -8.00    9.85269
                   -4.00    9.92607
                    0.00    9.93516
                    4.00    9.93680
                    8.00   10.02431
                   12.00    7.77841
                   16.00   -1.12433
                   20.00    1.48233
                   24.00    3.26374
                   28.00    2.23610
                   35.00    0.42459
                   50.00    1.35322
                   80.00    0.43917
                  135.00   -1.32525
                  180.00   -3.83665
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            </tableData>
          </table>
          </product>
        </function>
        <function name="aero/coefficient/CLadot">
          <description>CL per alpha-dot (downwash lag at the tail)</description>
          <product>
            <property>aero/qbar-psf</property>
            <property>metrics/Sw-sqft</property>
            <property>aero/ci2vel</property>
            <property>aero/alphadot-rad_sec</property>
            <value>0.25306</value>
            <property>aero/function/mach-lift</property>
          </product>
        </function>
      </axis>
      <axis name="ROLL">
        <function name="aero/coefficient/Cl_base">
          <description>Cl over alpha and beta (hangar)</description>
          <product>
            <property>aero/qbar-psf</property>
            <property>metrics/Sw-sqft</property>
            <property>metrics/bw-ft</property>
            <property>aero/function/mach-side</property>
          <table>
            <independentVar lookup="row">aero/alpha-deg</independentVar>
            <independentVar lookup="column">aero/beta-deg</independentVar>
            <tableData>
                        -90.00    -70.00    -50.00    -40.00    -30.00    -25.00    -20.00    -15.00    -10.00     -6.00     -3.00      0.00      3.00      6.00     10.00     15.00     20.00     25.00     30.00     40.00     50.00     70.00     90.00
             -180.00   0.01986   0.02517   0.04873   0.06061   0.05637   0.05004   0.04190   0.03213   0.02241   0.01480   0.00747  -0.00000  -0.00747  -0.01480  -0.02241  -0.03213  -0.04190  -0.05004  -0.05637  -0.06061  -0.04873  -0.02517  -0.01986
             -120.00   0.01986   0.03133   0.03616   0.03371   0.02817   0.02458   0.02021   0.01553   0.01053   0.00651   0.00388  -0.00000  -0.00388  -0.00651  -0.01053  -0.01553  -0.02021  -0.02458  -0.02817  -0.03371  -0.03616  -0.03133  -0.01986
              -70.00   0.01986   0.03195   0.03789   0.03554   0.02931   0.02571   0.02204   0.01821   0.01383   0.00927   0.00501  -0.00000  -0.00501  -0.00927  -0.01383  -0.01821  -0.02204  -0.02571  -0.02931  -0.03554  -0.03789  -0.03195  -0.01986
              -46.00   0.01986   0.02633   0.02960   0.02700   0.02094   0.01764   0.01334   0.01003   0.00720   0.00410   0.00202  -0.00000  -0.00202  -0.00410  -0.00720  -0.01003  -0.01334  -0.01764  -0.02094  -0.02700  -0.02960  -0.02633  -0.01986
              -32.00   0.01986   0.02723   0.01835   0.01528   0.01087   0.01002   0.00664   0.00310   0.00158   0.00071   0.00239  -0.00000  -0.00239  -0.00071  -0.00158  -0.00310  -0.00664  -0.01002  -0.01087  -0.01528  -0.01835  -0.02723  -0.01986
              -22.00   0.01986   0.03642   0.03652   0.03622   0.02939   0.02386   0.02091   0.01630   0.01115   0.00678   0.00341  -0.00000  -0.00341  -0.00678  -0.01115  -0.01630  -0.02091  -0.02386  -0.02939  -0.03622  -0.03652  -0.03642  -0.01986
              -17.00   0.01986   0.04205   0.05945   0.04788   0.03115   0.02657   0.02332   0.01808   0.01232   0.00748   0.00375  -0.00000  -0.00375  -0.00748  -0.01232  -0.01808  -0.02332  -0.02657  -0.03115  -0.04788  -0.05945  -0.04205  -0.01986
              -13.00   0.01986   0.04711   0.07065   0.04695   0.03257   0.02986   0.02521   0.01952   0.01329   0.00806   0.00405  -0.00000  -0.00405  -0.00806  -0.01329  -0.01952  -0.02521  -0.02986  -0.03257  -0.04695  -0.07065  -0.04711  -0.01986
               -9.00   0.01986   0.04873   0.07087   0.04761   0.03466   0.03218   0.02699   0.16939   0.01421   0.00861   0.00432  -0.00000  -0.00432  -0.00861  -0.01421  -0.16939  -0.02699  -0.03218  -0.03466  -0.04761  -0.07087  -0.04873  -0.01986
               -5.00   0.01986   0.04530   0.07032   0.04704   0.03685   0.03432   0.02872   0.02220   0.01509   0.00913   0.00458  -0.00000  -0.00458  -0.00913  -0.01509  -0.02220  -0.02872  -0.03432  -0.03685  -0.04704  -0.07032  -0.04530  -0.01986
               -1.00   0.01986   0.04174   0.07448   0.05036   0.03941   0.03635   0.03037   0.02348   0.01595   0.00965   0.00483  -0.00000  -0.00483  -0.00965  -0.01595  -0.02348  -0.03037  -0.03635  -0.03941  -0.05036  -0.07448  -0.04174  -0.01986
                3.00   0.01986   0.03653   0.06789   0.05028   0.04139   0.03840   0.03209   0.02482   0.01687   0.01020   0.00511  -0.00000  -0.00511  -0.01020  -0.01687  -0.02482  -0.03209  -0.03840  -0.04139  -0.05028  -0.06789  -0.03653  -0.01986
                7.00   0.01986   0.03156   0.04048   0.05099   0.04247   0.04001   0.03355   0.02597   0.01766   0.01068   0.00535  -0.00000  -0.00535  -0.01068  -0.01766  -0.02597  -0.03355  -0.04001  -0.04247  -0.05099  -0.04048  -0.03156  -0.01986
               11.00   0.01986   0.02706   0.00811   0.02830   0.04149   0.04067   0.03483   0.02720   0.01862   0.01131   0.00567  -0.00000  -0.00567  -0.01131  -0.01862  -0.02720  -0.03483  -0.04067  -0.04149  -0.02830  -0.00811  -0.02706  -0.01986
               15.00   0.01986   0.02300  -0.01100  -0.01981  -0.00577  -0.00024   0.00043  -0.00001  -0.00070  -0.00140  -0.00180  -0.00000   0.00180   0.00140   0.00070   0.00001  -0.00043   0.00024   0.00577   0.01981   0.01100  -0.02300  -0.01986
               19.00   0.01986   0.01938  -0.01439  -0.02171  -0.02397  -0.02204  -0.01996  -0.01750  -0.01239  -0.00698  -0.00331  -0.00000   0.00331   0.00698   0.01239   0.01750   0.01996   0.02204   0.02397   0.02171   0.01439  -0.01938  -0.01986
               23.00   0.01986   0.01622   0.00252   0.00183   0.00250   0.00244   0.00286   0.00240   0.00200   0.00144   0.00079  -0.00000  -0.00079  -0.00144  -0.00200  -0.00240  -0.00286  -0.00244  -0.00250  -0.00183  -0.00252  -0.01622  -0.01986
               27.00   0.01986   0.01355   0.01397   0.00905   0.01081   0.01041   0.01012   0.00795   0.00545   0.00336   0.00174  -0.00000  -0.00174  -0.00336  -0.00545  -0.00795  -0.01012  -0.01041  -0.01081  -0.00905  -0.01397  -0.01355  -0.01986
               32.00   0.01986   0.01779   0.02011   0.01587   0.01213   0.01070   0.00814   0.00567   0.00269   0.00029  -0.00121  -0.00000   0.00121  -0.00029  -0.00269  -0.00567  -0.00814  -0.01070  -0.01213  -0.01587  -0.02011  -0.01779  -0.01986
               46.00   0.01986   0.02692   0.02985   0.02684   0.02074   0.01753   0.01453   0.01264   0.00989   0.00592   0.00289  -0.00000  -0.00289  -0.00592  -0.00989  -0.01264  -0.01453  -0.01753  -0.02074  -0.02684  -0.02985  -0.02692  -0.01986
               70.00   0.01986   0.03189   0.03745   0.03525   0.02961   0.02570   0.02131   0.01645   0.01134   0.00745   0.00405  -0.00000  -0.00405  -0.00745  -0.01134  -0.01645  -0.02131  -0.02570  -0.02961  -0.03525  -0.03745  -0.03189  -0.01986
              120.00   0.01986   0.03147   0.03636   0.03390   0.02845   0.02462   0.02033   0.01562   0.01059   0.00655   0.00390  -0.00000  -0.00390  -0.00655  -0.01059  -0.01562  -0.02033  -0.02462  -0.02845  -0.03390  -0.03636  -0.03147  -0.01986
              180.00   0.01986   0.02517   0.04873   0.06061   0.05637   0.05004   0.04190   0.03213   0.02241   0.01480   0.00747  -0.00000  -0.00747  -0.01480  -0.02241  -0.03213  -0.04190  -0.05004  -0.05637  -0.06061  -0.04873  -0.02517  -0.01986
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            </tableData>
          </table>
          </product>
        </function>
        <function name="aero/coefficient/Cl_aileron">
          <description>Cl increment from aileron (deg), over alpha</description>
          <product>
            <property>aero/qbar-psf</property>
            <property>metrics/Sw-sqft</property>
            <property>metrics/bw-ft</property>
            <property>aero/function/mach-aileron</property>
          <table>
            <independentVar lookup="row">aero/alpha-deg</independentVar>
            <independentVar lookup="column">fcs/left-aileron-pos-deg</independentVar>
            <tableData>
                        -25.00    -20.00    -15.00    -10.00     -5.00      0.00      5.00     10.00     15.00     20.00     25.00
             -180.00  -0.00000  -0.00000  -0.00000  -0.00000  -0.00000   0.00000  -0.00000  -0.00000  -0.00000  -0.00000  -0.00000
              -35.00  -0.02457  -0.02346  -0.02093  -0.01607  -0.00876   0.00000   0.00876   0.01607   0.02093   0.02346   0.02457
              -11.00  -0.08358  -0.07503  -0.06349  -0.04689  -0.02489   0.00000   0.02489   0.04689   0.06349   0.07503   0.08358
                4.00  -0.08055  -0.07267  -0.06178  -0.04579  -0.02435   0.00000   0.02435   0.04579   0.06178   0.07267   0.08055
               19.00  -0.13088  -0.11973  -0.10248  -0.07706  -0.04125   0.00000   0.04125   0.07706   0.10248   0.11973   0.13088
               42.00  -0.01077  -0.01191  -0.01187  -0.00979  -0.00552   0.00000   0.00552   0.00979   0.01187   0.01191   0.01077
              180.00  -0.00000  -0.00000  -0.00000  -0.00000  -0.00000   0.00000  -0.00000  -0.00000  -0.00000  -0.00000  -0.00000
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            </tableData>
          </table>
          </product>
        </function>
        <function name="aero/coefficient/Cl_rudder">
          <description>Cl increment from rudder (deg), over alpha</description>
          <product>
            <property>aero/qbar-psf</property>
            <property>metrics/Sw-sqft</property>
            <property>metrics/bw-ft</property>
            <property>aero/function/mach-rudder</property>
          <table>
            <independentVar lookup="row">aero/alpha-deg</independentVar>
            <independentVar lookup="column">fcs/rudder-pos-deg</independentVar>
            <tableData>
                        -20.00    -15.00    -10.00     -5.00      0.00      5.00     10.00     15.00     20.00
             -180.00  -0.00000  -0.00000  -0.00000  -0.00000   0.00000  -0.00000  -0.00000  -0.00000  -0.00000
              -35.00  -0.00196  -0.00170  -0.00130  -0.00071   0.00000   0.00071   0.00130   0.00170   0.00196
              -11.00  -0.00421  -0.00361  -0.00269  -0.00144   0.00000   0.00144   0.00269   0.00361   0.00421
                4.00  -0.00478  -0.00410  -0.00305  -0.00163   0.00000   0.00163   0.00305   0.00410   0.00478
               19.00  -0.00554  -0.00479  -0.00344  -0.00182   0.00000   0.00182   0.00344   0.00479   0.00554
               42.00  -0.00299  -0.00256  -0.00190  -0.00099   0.00000   0.00099   0.00190   0.00256   0.00299
              180.00  -0.00000  -0.00000  -0.00000  -0.00000   0.00000  -0.00000  -0.00000  -0.00000  -0.00000
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            </tableData>
          </table>
          </product>
        </function>
        <function name="aero/coefficient/Clp">
          <description>Cl per p (non-dimensional), over alpha</description>
          <product>
            <property>aero/qbar-psf</property>
            <property>metrics/Sw-sqft</property>
            <property>metrics/bw-ft</property>
            <property>aero/bi2vel</property>
            <property>velocities/p-aero-rad_sec</property>
            <property>aero/function/mach-lift</property>
          <table>
            <independentVar lookup="row">aero/alpha-deg</independentVar>
            <tableData>
                 -180.00   -0.76557
                 -165.00   -0.09909
                  -32.00   -0.22346
                  -10.00   -0.46974
                    5.00   -0.47991
                   20.00    0.35270
                   46.00   -0.24311
                  180.00   -0.76557
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            </tableData>
          </table>
          </product>
        </function>
        <function name="aero/coefficient/Clr">
          <description>Cl per r (non-dimensional), over alpha</description>
          <product>
            <property>aero/qbar-psf</property>
            <property>metrics/Sw-sqft</property>
            <property>metrics/bw-ft</property>
            <property>aero/bi2vel</property>
            <property>velocities/r-aero-rad_sec</property>
            <property>aero/function/mach-lift</property>
          <table>
            <independentVar lookup="row">aero/alpha-deg</independentVar>
            <tableData>
                 -180.00   -0.00397
                 -165.00    0.09429
                  -32.00   -0.20947
                  -10.00    0.08963
                    5.00    0.25948
                   20.00    0.54437
                   46.00    0.20280
                  180.00   -0.00397
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            </tableData>
          </table>
          </product>
        </function>
      </axis>
      <axis name="PITCH">
        <function name="aero/coefficient/Cm_base">
          <description>Cm over alpha and beta (hangar)</description>
          <product>
            <property>aero/qbar-psf</property>
            <property>metrics/Sw-sqft</property>
            <property>metrics/cbarw-ft</property>
          <table>
            <independentVar lookup="row">aero/alpha-deg</independentVar>
            <independentVar lookup="column">aero/beta-deg</independentVar>
            <tableData>
                        -90.00    -70.00    -50.00    -40.00    -30.00    -25.00    -20.00    -15.00    -10.00     -6.00     -3.00      0.00      3.00      6.00     10.00     15.00     20.00     25.00     30.00     40.00     50.00     70.00     90.00
             -180.00   0.00000  -0.00077   0.00430  -0.00743  -0.01694  -0.01995  -0.02223  -0.02356  -0.02213  -0.02396  -0.02613  -0.02686  -0.02613  -0.02396  -0.02213  -0.02356  -0.02223  -0.01995  -0.01694  -0.00743   0.00430  -0.00077   0.00000
              -35.00   0.00000   0.03553   0.18530   0.26627   0.34192   0.37737   0.41221   0.44615   0.47501   0.49169   0.49899   0.50141   0.49899   0.49169   0.47501   0.44615   0.41221   0.37737   0.34192   0.26627   0.18530   0.03553   0.00000
              -11.00   0.00000   0.05080   0.09312   0.04477   0.01511   0.02637   0.03570   0.04378   0.05044   0.05440   0.05628   0.05695   0.05628   0.05440   0.05044   0.04378   0.03570   0.02637   0.01511   0.04477   0.09312   0.05080   0.00000
                4.00   0.00000  -0.04779  -0.12688  -0.11046  -0.11095  -0.11916  -0.12818  -0.13647  -0.14378  -0.14861  -0.15128  -0.15238  -0.15128  -0.14861  -0.14378  -0.13647  -0.12818  -0.11916  -0.11095  -0.11046  -0.12688  -0.04779   0.00000
               19.00   0.00000  -0.08849  -0.35103  -0.35740  -0.32489  -0.33994  -0.36811  -0.39159  -0.40987  -0.42216  -0.42829  -0.43089  -0.42829  -0.42216  -0.40987  -0.39159  -0.36811  -0.33994  -0.32489  -0.35740  -0.35103  -0.08849   0.00000
               42.00   0.00000  -0.04479  -0.20183  -0.29591  -0.37494  -0.40809  -0.43812  -0.46203  -0.47984  -0.48539  -0.48757  -0.48831  -0.48757  -0.48539  -0.47984  -0.46203  -0.43812  -0.40809  -0.37494  -0.29591  -0.20183  -0.04479   0.00000
              180.00   0.00000  -0.00077   0.00430  -0.00743  -0.01694  -0.01995  -0.02223  -0.02356  -0.02213  -0.02396  -0.02613  -0.02686  -0.02613  -0.02396  -0.02213  -0.02356  -0.02223  -0.01995  -0.01694  -0.00743   0.00430  -0.00077   0.00000
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            </tableData>
          </table>
          </product>
        </function>
        <function name="aero/coefficient/Cm_mach">
          <description>Cm from the neutral point's move with Mach</description>
          <product>
            <property>aero/qbar-psf</property>
            <property>metrics/Sw-sqft</property>
            <property>metrics/cbarw-ft</property>
            <property>aero/function/CL-base</property>
            <property>aero/function/mach-dCm-dCL</property>
          </product>
        </function>
        <function name="aero/coefficient/Cm_elevator">
          <description>Cm increment from elevator (deg), over alpha</description>
          <product>
            <property>aero/qbar-psf</property>
            <property>metrics/Sw-sqft</property>
            <property>metrics/cbarw-ft</property>
            <property>aero/function/mach-elevator</property>
          <table>
            <independentVar lookup="row">aero/alpha-deg</independentVar>
            <independentVar lookup="column">fcs/elevator-pos-deg</independentVar>
            <tableData>
                        -30.00    -25.00    -20.00    -15.00    -10.00     -5.00      0.00      5.00     10.00     15.00     20.00
             -180.00  -0.00058  -0.00042  -0.00027  -0.00016  -0.00007  -0.00002   0.00000  -0.00002  -0.00007  -0.00016  -0.00027
              -35.00   0.21907   0.20329   0.18444   0.15873   0.12033   0.06561   0.00000  -0.06587  -0.12008  -0.15423  -0.17071
              -11.00   0.38359   0.35561   0.32219   0.27494   0.20432   0.10877   0.00000  -0.10852  -0.20335  -0.27287  -0.31873
                4.00   0.38799   0.36029   0.32695   0.27939   0.20786   0.11075   0.00000  -0.11063  -0.20742  -0.27846  -0.32544
               19.00   0.17972   0.05347   0.31318   0.38281   0.27888   0.14228   0.00000  -0.13361  -0.24996  -0.34309  -0.41847
               42.00   0.12444   0.13028   0.13092   0.12206   0.09784   0.05555   0.00000  -0.06106  -0.11848  -0.16377  -0.19670
              180.00  -0.00058  -0.00042  -0.00027  -0.00016  -0.00007  -0.00002   0.00000  -0.00002  -0.00007  -0.00016  -0.00027
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            </tableData>
          </table>
          </product>
        </function>
        <function name="aero/coefficient/Cm_flap">
          <description>Cm increment from flap (deg), over alpha</description>
          <product>
            <property>aero/qbar-psf</property>
            <property>metrics/Sw-sqft</property>
            <property>metrics/cbarw-ft</property>
            <property>aero/function/mach-flap</property>
          <table>
            <independentVar lookup="row">aero/alpha-deg</independentVar>
            <independentVar lookup="column">fcs/flap-pos-deg</independentVar>
            <tableData>
                          0.00      5.00     10.00     15.00     20.00
             -180.00   0.00000   0.00002   0.00009   0.00019   0.00033
              -35.00   0.00000  -0.01140  -0.02214  -0.03163  -0.03960
              -11.00   0.00000   0.01027   0.01963   0.02759   0.03399
                4.00   0.00000   0.00415   0.00782   0.01070   0.01322
               19.00   0.00000   0.00816   0.01074   0.00576   0.00018
               42.00   0.00000  -0.00189  -0.00419  -0.00655  -0.00835
              180.00   0.00000   0.00002   0.00009   0.00019   0.00033
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            </tableData>
          </table>
          </product>
        </function>
        <function name="aero/coefficient/Cmq">
          <description>Cm per q (non-dimensional), over alpha</description>
          <product>
            <property>aero/qbar-psf</property>
            <property>metrics/Sw-sqft</property>
            <property>metrics/cbarw-ft</property>
            <property>aero/ci2vel</property>
            <property>velocities/q-aero-rad_sec</property>
            <property>aero/function/mach-lift</property>
          <table>
            <independentVar lookup="row">aero/alpha-deg</independentVar>
            <tableData>
                 -180.00  -10.57325
                 -165.00   -0.35137
                  -32.00   -5.55578
                  -10.00  -12.22298
                    5.00  -12.26506
                   20.00  -11.57366
                   46.00   -7.97963
                  180.00  -10.57325
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            </tableData>
          </table>
          </product>
        </function>
        <function name="aero/coefficient/Cmadot">
          <description>Cm per alpha-dot (downwash lag at the tail)</description>
          <product>
            <property>aero/qbar-psf</property>
            <property>metrics/Sw-sqft</property>
            <property>metrics/cbarw-ft</property>
            <property>aero/ci2vel</property>
            <property>aero/alphadot-rad_sec</property>
            <value>-0.62138</value>
            <property>aero/function/mach-lift</property>
          </product>
        </function>
        <function name="aero/coefficient/Cm_decelerons">
          <description>decelerons: its drag's pitching moment, 0.15 m from the reference point's height</description>
          <product>
            <property>aero/qbar-psf</property>
            <property>metrics/Sw-sqft</property>
            <property>metrics/cbarw-ft</property>
            <value>0.00698856</value>
            <pow>
              <sin>
                <product>
                  <property>fcs/speedbrake-pos-norm</property>
                  <value>0.698132</value>
                </product>
              </sin>
              <value>2</value>
            </pow>
          </product>
        </function>
        <function name="aero/coefficient/Cm_gear">
          <description>the gear's drag's pitching moment, -1.47 m from the reference point's height</description>
          <product>
            <property>aero/qbar-psf</property>
            <property>metrics/Sw-sqft</property>
            <property>metrics/cbarw-ft</property>
            <value>-0.00407632</value>
            <property>gear/gear-pos-norm</property>
          </product>
        </function>
      </axis>
      <axis name="YAW">
        <function name="aero/coefficient/Cn_base">
          <description>Cn over alpha and beta (hangar)</description>
          <product>
            <property>aero/qbar-psf</property>
            <property>metrics/Sw-sqft</property>
            <property>metrics/bw-ft</property>
            <property>aero/function/mach-side</property>
          <table>
            <independentVar lookup="row">aero/alpha-deg</independentVar>
            <independentVar lookup="column">aero/beta-deg</independentVar>
            <tableData>
                        -90.00    -70.00    -50.00    -40.00    -30.00    -25.00    -20.00    -15.00    -10.00     -6.00     -3.00      0.00      3.00      6.00     10.00     15.00     20.00     25.00     30.00     40.00     50.00     70.00     90.00
             -180.00  -0.07709  -0.09414  -0.09522  -0.08881  -0.07478  -0.06524  -0.05426  -0.04229  -0.04545  -0.04772  -0.02567  -0.00000   0.02567   0.04772   0.04545   0.04229   0.05426   0.06524   0.07478   0.08881   0.09522   0.09414   0.07709
              -35.00  -0.07709  -0.05628  -0.03317  -0.02224  -0.02116  -0.02744  -0.03635  -0.03400  -0.02756  -0.01915  -0.00974  -0.00000   0.00974   0.01915   0.02756   0.03400   0.03635   0.02744   0.02116   0.02224   0.03317   0.05628   0.07709
              -11.00  -0.07709  -0.05521  -0.03890  -0.03011  -0.04566  -0.04813  -0.04172  -0.03298  -0.02288  -0.01404  -0.00709  -0.00000   0.00709   0.01404   0.02288   0.03298   0.04172   0.04813   0.04566   0.03011   0.03890   0.05521   0.07709
                4.00  -0.07709  -0.05336  -0.01504  -0.01479  -0.04298  -0.04189  -0.03590  -0.02840  -0.01972  -0.01210  -0.00611  -0.00000   0.00611   0.01210   0.01972   0.02840   0.03590   0.04189   0.04298   0.01479   0.01504   0.05336   0.07709
               19.00  -0.07709  -0.05169  -0.03387  -0.02612  -0.03845  -0.03614  -0.03204  -0.02596  -0.01841  -0.01050  -0.00415  -0.00000   0.00415   0.01050   0.01841   0.02596   0.03204   0.03614   0.03845   0.02612   0.03387   0.05169   0.07709
               42.00  -0.07709  -0.05618  -0.03443  -0.02577  -0.02127  -0.02258  -0.02825  -0.03092  -0.02989  -0.02061  -0.01055  -0.00000   0.01055   0.02061   0.02989   0.03092   0.02825   0.02258   0.02127   0.02577   0.03443   0.05618   0.07709
              180.00  -0.07709  -0.09414  -0.09522  -0.08881  -0.07478  -0.06524  -0.05426  -0.04229  -0.04545  -0.04772  -0.02567  -0.00000   0.02567   0.04772   0.04545   0.04229   0.05426   0.06524   0.07478   0.08881   0.09522   0.09414   0.07709
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            </tableData>
          </table>
          </product>
        </function>
        <function name="aero/coefficient/Cn_aileron">
          <description>Cn increment from aileron (deg), over alpha</description>
          <product>
            <property>aero/qbar-psf</property>
            <property>metrics/Sw-sqft</property>
            <property>metrics/bw-ft</property>
            <property>aero/function/mach-aileron</property>
          <table>
            <independentVar lookup="row">aero/alpha-deg</independentVar>
            <independentVar lookup="column">fcs/left-aileron-pos-deg</independentVar>
            <tableData>
                        -25.00    -20.00    -15.00    -10.00     -5.00      0.00      5.00     10.00     15.00     20.00     25.00
             -180.00   0.00000   0.00000   0.00000  -0.00000   0.00000   0.00000   0.00000  -0.00000   0.00000   0.00000   0.00000
              -35.00   0.03537   0.03211   0.02746   0.02047   0.01094   0.00000  -0.01094  -0.02047  -0.02746  -0.03211  -0.03537
              -11.00   0.00786   0.00698   0.00584   0.00427   0.00225   0.00000  -0.00225  -0.00427  -0.00584  -0.00698  -0.00786
                4.00   0.00977   0.00877   0.00742   0.00547   0.00290   0.00000  -0.00290  -0.00547  -0.00742  -0.00877  -0.00977
               19.00  -0.00826  -0.00827  -0.00738  -0.00532  -0.00293   0.00000   0.00293   0.00532   0.00738   0.00827   0.00826
               42.00  -0.02910  -0.02649  -0.02267  -0.01691  -0.00904   0.00000   0.00904   0.01691   0.02267   0.02649   0.02910
              180.00  -0.00000   0.00000   0.00000  -0.00000   0.00000   0.00000   0.00000  -0.00000   0.00000   0.00000  -0.00000
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            </tableData>
          </table>
          </product>
        </function>
        <function name="aero/coefficient/Cn_rudder">
          <description>Cn increment from rudder (deg), over alpha</description>
          <product>
            <property>aero/qbar-psf</property>
            <property>metrics/Sw-sqft</property>
            <property>metrics/bw-ft</property>
            <property>aero/function/mach-rudder</property>
          <table>
            <independentVar lookup="row">aero/alpha-deg</independentVar>
            <independentVar lookup="column">fcs/rudder-pos-deg</independentVar>
            <tableData>
                        -20.00    -15.00    -10.00     -5.00      0.00      5.00     10.00     15.00     20.00
             -180.00  -0.00000  -0.00000  -0.00000  -0.00000   0.00000  -0.00000  -0.00000  -0.00000  -0.00000
              -35.00   0.02638   0.02355   0.01816   0.00923   0.00000  -0.00923  -0.01816  -0.02355  -0.02638
              -11.00   0.03571   0.03038   0.02253   0.01199   0.00000  -0.01199  -0.02253  -0.03038  -0.03571
                4.00   0.03804   0.03236   0.02399   0.01276   0.00000  -0.01276  -0.02399  -0.03236  -0.03804
               19.00   0.03564   0.03063   0.02176   0.01154   0.00000  -0.01154  -0.02176  -0.03063  -0.03564
               42.00   0.02824   0.02446   0.01852   0.00996   0.00000  -0.00996  -0.01852  -0.02446  -0.02824
              180.00  -0.00000   0.00000   0.00000   0.00000   0.00000   0.00000   0.00000   0.00000  -0.00000
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            </tableData>
          </table>
          </product>
        </function>
        <function name="aero/coefficient/Cnp">
          <description>Cn per p (non-dimensional), over alpha</description>
          <product>
            <property>aero/qbar-psf</property>
            <property>metrics/Sw-sqft</property>
            <property>metrics/bw-ft</property>
            <property>aero/bi2vel</property>
            <property>velocities/p-aero-rad_sec</property>
            <property>aero/function/mach-lift</property>
          <table>
            <independentVar lookup="row">aero/alpha-deg</independentVar>
            <tableData>
                 -180.00    0.06242
                 -165.00    0.06963
                  -32.00    0.04288
                  -10.00    0.06294
                    5.00   -0.07932
                   20.00   -0.00208
                   46.00    0.01292
                  180.00    0.06242
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            </tableData>
          </table>
          </product>
        </function>
        <function name="aero/coefficient/Cnr">
          <description>Cn per r (non-dimensional), over alpha</description>
          <product>
            <property>aero/qbar-psf</property>
            <property>metrics/Sw-sqft</property>
            <property>metrics/bw-ft</property>
            <property>aero/bi2vel</property>
            <property>velocities/r-aero-rad_sec</property>
            <property>aero/function/mach-lift</property>
          <table>
            <independentVar lookup="row">aero/alpha-deg</independentVar>
            <tableData>
                 -180.00   -0.30242
                 -165.00   -0.29175
                  -32.00   -0.14965
                  -10.00   -0.21394
                    5.00   -0.21046
                   20.00   -0.11089
                   46.00   -0.23132
                  180.00   -0.30242
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            </tableData>
          </table>
          </product>
        </function>
      </axis>
    </aerodynamics>
</fdm_config>
