<?xml version="1.0"?>
<?xml-stylesheet type="text/xsl" href="http://jsbsim.sourceforge.net/JSBSim.xsl"?>
<!-- Generated by hangar 0.1.0 from b52h.toml on 2026-10-01. Edit the design and rebuild; changes
     made here are overwritten.  -->
<fdm_config name="b52h" version="2.0" release="ALPHA"
            xmlns:xsi="http://www.w3.org/2001/XMLSchema-instance"
            xsi:noNamespaceSchemaLocation="http://jsbsim.sourceforge.net/JSBSim.xsd">
    <fileheader>
      <author>hangar</author>
      <filecreationdate>2026-10-01</filecreationdate>
      <version>0.1.0</version>
      <description>Boeing B-52H Stratofortress (hangar build)</description>
      <note>Aerodynamics: vortex lattice with viscous section polars, full-envelope
        strip model, slender-body fuselage (hangar). Mass: Raymer component
        weights on the geometry. Propeller: blade-element momentum theory.</note>
      <reference refID="fsim/applicability/aerobatic" author="the design" title="USAF fact sheet: a strategic bomber, not cleared for aerobatic manoeuvres" date="n/a"/>
      <reference refID="fsim/applicability/carrier" author="the design" title="USAF fact sheet: a land-based strategic bomber" date="n/a"/>
      <reference refID="fsim/applicability/drag_devices" author="the design" title="B. Schiff, AOPA Pilot, May 2015: spoilers roll the H (it has no ailerons) and serve as airbrakes" date="n/a"/>
      <reference refID="fsim/applicability/flaps" author="the design" title="Knaack (1988) and NASA SP-468: Fowler flaps" date="n/a"/>
      <reference refID="fsim/applicability/ground_contact" author="the design" title="USAF fact sheet and Knaack (1988): four twin-wheel main bogies and wing-tip outrigger wheels" date="n/a"/>
      <reference refID="fsim/applicability/releasable_stores" author="the design" title="USAF fact sheet: bombs and missiles in the bomb bay and on underwing pylons" date="n/a"/>
      <reference refID="fsim/applicability/retractable_gear" author="the design" title="Knaack (1988): the main bogies and the outriggers retract" date="n/a"/>
      <reference refID="fsim/applicability/vertical_flight" author="the design" title="USAF B-52H fact sheet: a conventional take-off and landing bomber. Conventional take-off and landing: no rotors, lift fans or vectored lift to hover" date="n/a"/>
    </fileheader>
    <metrics>
      <wingarea unit="M2"> 371.6000 </wingarea>
      <wingspan unit="M"> 56.3800 </wingspan>
      <chord unit="M"> 7.4565 </chord>
      <htailarea unit="M2"> 82.0628 </htailarea>
      <htailarm unit="M"> 19.8189 </htailarm>
      <vtailarea unit="M2"> 39.7750 </vtailarea>
      <vtailarm unit="M"> 19.6973 </vtailarm>
      <location name="AERORP" unit="M">
        <x> 21.0538 </x>
        <y> 0.0000 </y>
        <z> -0.0848 </z>
      </location>
      <location name="EYEPOINT" unit="M">
        <x> 4.5000 </x>
        <y> 0.0000 </y>
        <z> 1.0000 </z>
      </location>
      <location name="VRP" unit="M">
        <x> 21.3000 </x>
        <y> -0.0000 </y>
        <z> -0.8000 </z>
      </location>
    </metrics>
    <mass_balance negated_crossproduct_inertia="false">
      <ixx unit="KG*M2"> 8032692.50 </ixx>
      <iyy unit="KG*M2"> 8004046.96 </iyy>
      <izz unit="KG*M2"> 15475969.13 </izz>
      <ixy unit="KG*M2"> 3.693 </ixy>
      <ixz unit="KG*M2"> 88065.541 </ixz>
      <iyz unit="KG*M2"> -4.446 </iyz>
      <emptywt unit="KG"> 83250.00 </emptywt>
      <location name="CG" unit="M">
        <x> 21.3000 </x>
        <y> -0.0000 </y>
        <z> -0.8000 </z>
      </location>
      <pointmass name="pilot">
        <weight unit="KG"> 200.00 </weight>
        <location unit="M">
          <x> 4.5000 </x>
          <y> 0.0000 </y>
          <z> 0.3000 </z>
        </location>
      </pointmass>
      <pointmass name="navigators and weapons officers">
        <weight unit="KG"> 300.00 </weight>
        <location unit="M">
          <x> 6.5000 </x>
          <y> 0.0000 </y>
          <z> -1.2000 </z>
        </location>
      </pointmass>
    </mass_balance>
    <ground_reactions>
      <contact type="BOGEY" name="Left Forward Main Gear">
        <location unit="M">
          <x> 12.0400 </x>
          <y> -1.2550 </y>
          <z> -4.8190 </z>
        </location>
        <static_friction> 0.8 </static_friction>
        <dynamic_friction> 0.5 </dynamic_friction>
        <rolling_friction> 0.02 </rolling_friction>
        <spring_coeff unit="N/M"> 1529772 </spring_coeff>
        <damping_coeff unit="N/M/SEC"> 189196 </damping_coeff>
        <damping_coeff_rebound unit="N/M/SEC"> 378392 </damping_coeff_rebound>
        <max_steer unit="DEG"> 20.0 </max_steer>
        <brake_group> NONE </brake_group>
        <retractable> 1 </retractable>
      </contact>
      <contact type="BOGEY" name="Right Forward Main Gear">
        <location unit="M">
          <x> 12.0400 </x>
          <y> 1.2550 </y>
          <z> -4.8190 </z>
        </location>
        <static_friction> 0.8 </static_friction>
        <dynamic_friction> 0.5 </dynamic_friction>
        <rolling_friction> 0.02 </rolling_friction>
        <spring_coeff unit="N/M"> 1529772 </spring_coeff>
        <damping_coeff unit="N/M/SEC"> 189196 </damping_coeff>
        <damping_coeff_rebound unit="N/M/SEC"> 378392 </damping_coeff_rebound>
        <max_steer unit="DEG"> 20.0 </max_steer>
        <brake_group> NONE </brake_group>
        <retractable> 1 </retractable>
      </contact>
      <contact type="BOGEY" name="Left Aft Main Gear">
        <location unit="M">
          <x> 24.2900 </x>
          <y> -1.2550 </y>
          <z> -4.8190 </z>
        </location>
        <static_friction> 0.8 </static_friction>
        <dynamic_friction> 0.5 </dynamic_friction>
        <rolling_friction> 0.02 </rolling_friction>
        <spring_coeff unit="N/M"> 1529772 </spring_coeff>
        <damping_coeff unit="N/M/SEC"> 189196 </damping_coeff>
        <damping_coeff_rebound unit="N/M/SEC"> 378392 </damping_coeff_rebound>
        <max_steer unit="DEG"> 0.0 </max_steer>
        <brake_group> LEFT </brake_group>
        <retractable> 1 </retractable>
      </contact>
      <contact type="BOGEY" name="Right Aft Main Gear">
        <location unit="M">
          <x> 24.2900 </x>
          <y> 1.2550 </y>
          <z> -4.8190 </z>
        </location>
        <static_friction> 0.8 </static_friction>
        <dynamic_friction> 0.5 </dynamic_friction>
        <rolling_friction> 0.02 </rolling_friction>
        <spring_coeff unit="N/M"> 1529772 </spring_coeff>
        <damping_coeff unit="N/M/SEC"> 189196 </damping_coeff>
        <damping_coeff_rebound unit="N/M/SEC"> 378392 </damping_coeff_rebound>
        <max_steer unit="DEG"> 0.0 </max_steer>
        <brake_group> RIGHT </brake_group>
        <retractable> 1 </retractable>
      </contact>
      <contact type="BOGEY" name="Left Outrigger">
        <location unit="M">
          <x> 30.3300 </x>
          <y> -22.6300 </y>
          <z> -4.6080 </z>
        </location>
        <static_friction> 0.8 </static_friction>
        <dynamic_friction> 0.5 </dynamic_friction>
        <rolling_friction> 0.02 </rolling_friction>
        <spring_coeff unit="N/M"> 4589316 </spring_coeff>
        <damping_coeff unit="N/M/SEC"> 327697 </damping_coeff>
        <damping_coeff_rebound unit="N/M/SEC"> 655394 </damping_coeff_rebound>
        <max_steer unit="DEG"> 0.0 </max_steer>
        <brake_group> LEFT </brake_group>
        <retractable> 1 </retractable>
      </contact>
      <contact type="BOGEY" name="Right Outrigger">
        <location unit="M">
          <x> 30.3300 </x>
          <y> 22.6300 </y>
          <z> -4.6080 </z>
        </location>
        <static_friction> 0.8 </static_friction>
        <dynamic_friction> 0.5 </dynamic_friction>
        <rolling_friction> 0.02 </rolling_friction>
        <spring_coeff unit="N/M"> 4589316 </spring_coeff>
        <damping_coeff unit="N/M/SEC"> 327697 </damping_coeff>
        <damping_coeff_rebound unit="N/M/SEC"> 655394 </damping_coeff_rebound>
        <max_steer unit="DEG"> 0.0 </max_steer>
        <brake_group> RIGHT </brake_group>
        <retractable> 1 </retractable>
      </contact>
      <contact type="STRUCTURE" name="canopy front">
        <location unit="M">
          <x> 3.1904 </x>
          <y> 0.0000 </y>
          <z> 0.5822 </z>
        </location>
        <static_friction> 0.8 </static_friction>
        <dynamic_friction> 0.6 </dynamic_friction>
        <spring_coeff unit="N/M"> 8454703 </spring_coeff>
        <damping_coeff unit="N/M/SEC"> 281823 </damping_coeff>
        <damping_coeff_rebound unit="N/M/SEC"> 281823 </damping_coeff_rebound>
      </contact>
      <contact type="STRUCTURE" name="fin rear">
        <location unit="M">
          <x> 45.8200 </x>
          <y> 0.0000 </y>
          <z> 7.6450 </z>
        </location>
        <static_friction> 0.8 </static_friction>
        <dynamic_friction> 0.6 </dynamic_friction>
        <spring_coeff unit="N/M"> 9371285 </spring_coeff>
        <damping_coeff unit="N/M/SEC"> 312376 </damping_coeff>
        <damping_coeff_rebound unit="N/M/SEC"> 312376 </damping_coeff_rebound>
      </contact>
      <contact type="STRUCTURE" name="fuselage front">
        <location unit="M">
          <x> 0.0000 </x>
          <y> 0.0000 </y>
          <z> -1.5000 </z>
        </location>
        <static_friction> 0.8 </static_friction>
        <dynamic_friction> 0.6 </dynamic_friction>
        <spring_coeff unit="N/M"> 6544902 </spring_coeff>
        <damping_coeff unit="N/M/SEC"> 218163 </damping_coeff>
        <damping_coeff_rebound unit="N/M/SEC"> 218163 </damping_coeff_rebound>
      </contact>
      <contact type="STRUCTURE" name="fuselage rear">
        <location unit="M">
          <x> 48.5650 </x>
          <y> -0.0000 </y>
          <z> -1.4000 </z>
        </location>
        <static_friction> 0.8 </static_friction>
        <dynamic_friction> 0.6 </dynamic_friction>
        <spring_coeff unit="N/M"> 8576940 </spring_coeff>
        <damping_coeff unit="N/M/SEC"> 285898 </damping_coeff>
        <damping_coeff_rebound unit="N/M/SEC"> 285898 </damping_coeff_rebound>
      </contact>
      <contact type="STRUCTURE" name="fuselage bottom front">
        <location unit="M">
          <x> 8.0942 </x>
          <y> 0.0000 </y>
          <z> -3.2131 </z>
        </location>
        <static_friction> 0.8 </static_friction>
        <dynamic_friction> 0.6 </dynamic_friction>
        <spring_coeff unit="N/M"> 8688658 </spring_coeff>
        <damping_coeff unit="N/M/SEC"> 289622 </damping_coeff>
        <damping_coeff_rebound unit="N/M/SEC"> 289622 </damping_coeff_rebound>
      </contact>
      <contact type="STRUCTURE" name="htail left rear">
        <location unit="M">
          <x> 45.6683 </x>
          <y> -7.9182 </y>
          <z> -0.8122 </z>
        </location>
        <static_friction> 0.8 </static_friction>
        <dynamic_friction> 0.6 </dynamic_friction>
        <spring_coeff unit="N/M"> 9573693 </spring_coeff>
        <damping_coeff unit="N/M/SEC"> 319123 </damping_coeff>
        <damping_coeff_rebound unit="N/M/SEC"> 319123 </damping_coeff_rebound>
      </contact>
      <contact type="STRUCTURE" name="htail right rear">
        <location unit="M">
          <x> 45.6683 </x>
          <y> 7.9182 </y>
          <z> -0.8122 </z>
        </location>
        <static_friction> 0.8 </static_friction>
        <dynamic_friction> 0.6 </dynamic_friction>
        <spring_coeff unit="N/M"> 9573698 </spring_coeff>
        <damping_coeff unit="N/M/SEC"> 319123 </damping_coeff>
        <damping_coeff_rebound unit="N/M/SEC"> 319123 </damping_coeff_rebound>
      </contact>
      <contact type="STRUCTURE" name="outboard pod, outer nacelle left front">
        <location unit="M">
          <x> 19.3100 </x>
          <y> -19.1521 </y>
          <z> -2.3859 </z>
        </location>
        <static_friction> 0.8 </static_friction>
        <dynamic_friction> 0.6 </dynamic_friction>
        <spring_coeff unit="N/M"> 15387394 </spring_coeff>
        <damping_coeff unit="N/M/SEC"> 512913 </damping_coeff>
        <damping_coeff_rebound unit="N/M/SEC"> 512913 </damping_coeff_rebound>
      </contact>
      <contact type="STRUCTURE" name="outboard pod, outer nacelle right front">
        <location unit="M">
          <x> 19.3100 </x>
          <y> 19.1521 </y>
          <z> -2.3859 </z>
        </location>
        <static_friction> 0.8 </static_friction>
        <dynamic_friction> 0.6 </dynamic_friction>
        <spring_coeff unit="N/M"> 15387391 </spring_coeff>
        <damping_coeff unit="N/M/SEC"> 512913 </damping_coeff>
        <damping_coeff_rebound unit="N/M/SEC"> 512913 </damping_coeff_rebound>
      </contact>
      <contact type="STRUCTURE" name="wing left rear">
        <location unit="M">
          <x> 31.6070 </x>
          <y> -28.1900 </y>
          <z> -1.5020 </z>
        </location>
        <static_friction> 0.8 </static_friction>
        <dynamic_friction> 0.6 </dynamic_friction>
        <spring_coeff unit="N/M"> 3620594 </spring_coeff>
        <damping_coeff unit="N/M/SEC"> 120686 </damping_coeff>
        <damping_coeff_rebound unit="N/M/SEC"> 120686 </damping_coeff_rebound>
      </contact>
      <contact type="STRUCTURE" name="wing left rear 2">
        <location unit="M">
          <x> 35.2102 </x>
          <y> -28.1587 </y>
          <z> -1.8163 </z>
        </location>
        <static_friction> 0.8 </static_friction>
        <dynamic_friction> 0.6 </dynamic_friction>
        <spring_coeff unit="N/M"> 3332384 </spring_coeff>
        <damping_coeff unit="N/M/SEC"> 111079 </damping_coeff>
        <damping_coeff_rebound unit="N/M/SEC"> 111079 </damping_coeff_rebound>
      </contact>
      <contact type="STRUCTURE" name="wing right rear">
        <location unit="M">
          <x> 35.2102 </x>
          <y> 28.1587 </y>
          <z> -1.8163 </z>
        </location>
        <static_friction> 0.8 </static_friction>
        <dynamic_friction> 0.6 </dynamic_friction>
        <spring_coeff unit="N/M"> 3332386 </spring_coeff>
        <damping_coeff unit="N/M/SEC"> 111080 </damping_coeff>
        <damping_coeff_rebound unit="N/M/SEC"> 111080 </damping_coeff_rebound>
      </contact>
      <contact type="STRUCTURE" name="wing right rear 2">
        <location unit="M">
          <x> 31.6070 </x>
          <y> 28.1900 </y>
          <z> -1.5020 </z>
        </location>
        <static_friction> 0.8 </static_friction>
        <dynamic_friction> 0.6 </dynamic_friction>
        <spring_coeff unit="N/M"> 3620596 </spring_coeff>
        <damping_coeff unit="N/M/SEC"> 120687 </damping_coeff>
        <damping_coeff_rebound unit="N/M/SEC"> 120687 </damping_coeff_rebound>
      </contact>
    </ground_reactions>
    <propulsion>
      <engine file="b52h_engine0">
        <location unit="M">
          <x> 15.2000 </x>
          <y> -9.5500 </y>
          <z> -1.5300 </z>
        </location>
        <feed>0</feed>
        <feed>1</feed>
        <feed>2</feed>
        <feed>3</feed>
        <feed>4</feed>
        <feed>5</feed>
        <feed>6</feed>
        <feed>7</feed>
        <thruster file="b52h_nozzle0">
          <location unit="M">
            <x> 17.7000 </x>
            <y> -9.5500 </y>
            <z> -1.5300 </z>
          </location>
          <orient unit="DEG"> <roll>0.00</roll> <pitch>0.00</pitch> <yaw>0.00</yaw> </orient>

        </thruster>
      </engine>
      <engine file="b52h_engine0">
        <location unit="M">
          <x> 15.2000 </x>
          <y> 9.5500 </y>
          <z> -1.5300 </z>
        </location>
        <feed>0</feed>
        <feed>1</feed>
        <feed>2</feed>
        <feed>3</feed>
        <feed>4</feed>
        <feed>5</feed>
        <feed>6</feed>
        <feed>7</feed>
        <thruster file="b52h_nozzle0">
          <location unit="M">
            <x> 17.7000 </x>
            <y> 9.5500 </y>
            <z> -1.5300 </z>
          </location>
          <orient unit="DEG"> <roll>0.00</roll> <pitch>0.00</pitch> <yaw>0.00</yaw> </orient>

        </thruster>
      </engine>
      <engine file="b52h_engine1">
        <location unit="M">
          <x> 15.2000 </x>
          <y> -10.9900 </y>
          <z> -1.5300 </z>
        </location>
        <feed>0</feed>
        <feed>1</feed>
        <feed>2</feed>
        <feed>3</feed>
        <feed>4</feed>
        <feed>5</feed>
        <feed>6</feed>
        <feed>7</feed>
        <thruster file="b52h_nozzle1">
          <location unit="M">
            <x> 17.7000 </x>
            <y> -10.9900 </y>
            <z> -1.5300 </z>
          </location>
          <orient unit="DEG"> <roll>0.00</roll> <pitch>0.00</pitch> <yaw>0.00</yaw> </orient>

        </thruster>
      </engine>
      <engine file="b52h_engine1">
        <location unit="M">
          <x> 15.2000 </x>
          <y> 10.9900 </y>
          <z> -1.5300 </z>
        </location>
        <feed>0</feed>
        <feed>1</feed>
        <feed>2</feed>
        <feed>3</feed>
        <feed>4</feed>
        <feed>5</feed>
        <feed>6</feed>
        <feed>7</feed>
        <thruster file="b52h_nozzle1">
          <location unit="M">
            <x> 17.7000 </x>
            <y> 10.9900 </y>
            <z> -1.5300 </z>
          </location>
          <orient unit="DEG"> <roll>0.00</roll> <pitch>0.00</pitch> <yaw>0.00</yaw> </orient>

        </thruster>
      </engine>
      <engine file="b52h_engine2">
        <location unit="M">
          <x> 21.1100 </x>
          <y> -17.3300 </y>
          <z> -1.8600 </z>
        </location>
        <feed>0</feed>
        <feed>1</feed>
        <feed>2</feed>
        <feed>3</feed>
        <feed>4</feed>
        <feed>5</feed>
        <feed>6</feed>
        <feed>7</feed>
        <thruster file="b52h_nozzle2">
          <location unit="M">
            <x> 23.6100 </x>
            <y> -17.3300 </y>
            <z> -1.8600 </z>
          </location>
          <orient unit="DEG"> <roll>0.00</roll> <pitch>0.00</pitch> <yaw>0.00</yaw> </orient>

        </thruster>
      </engine>
      <engine file="b52h_engine2">
        <location unit="M">
          <x> 21.1100 </x>
          <y> 17.3300 </y>
          <z> -1.8600 </z>
        </location>
        <feed>0</feed>
        <feed>1</feed>
        <feed>2</feed>
        <feed>3</feed>
        <feed>4</feed>
        <feed>5</feed>
        <feed>6</feed>
        <feed>7</feed>
        <thruster file="b52h_nozzle2">
          <location unit="M">
            <x> 23.6100 </x>
            <y> 17.3300 </y>
            <z> -1.8600 </z>
          </location>
          <orient unit="DEG"> <roll>0.00</roll> <pitch>0.00</pitch> <yaw>0.00</yaw> </orient>

        </thruster>
      </engine>
      <engine file="b52h_engine3">
        <location unit="M">
          <x> 21.1100 </x>
          <y> -18.7700 </y>
          <z> -1.8600 </z>
        </location>
        <feed>0</feed>
        <feed>1</feed>
        <feed>2</feed>
        <feed>3</feed>
        <feed>4</feed>
        <feed>5</feed>
        <feed>6</feed>
        <feed>7</feed>
        <thruster file="b52h_nozzle3">
          <location unit="M">
            <x> 23.6100 </x>
            <y> -18.7700 </y>
            <z> -1.8600 </z>
          </location>
          <orient unit="DEG"> <roll>0.00</roll> <pitch>0.00</pitch> <yaw>0.00</yaw> </orient>

        </thruster>
      </engine>
      <engine file="b52h_engine3">
        <location unit="M">
          <x> 21.1100 </x>
          <y> 18.7700 </y>
          <z> -1.8600 </z>
        </location>
        <feed>0</feed>
        <feed>1</feed>
        <feed>2</feed>
        <feed>3</feed>
        <feed>4</feed>
        <feed>5</feed>
        <feed>6</feed>
        <feed>7</feed>
        <thruster file="b52h_nozzle3">
          <location unit="M">
            <x> 23.6100 </x>
            <y> 18.7700 </y>
            <z> -1.8600 </z>
          </location>
          <orient unit="DEG"> <roll>0.00</roll> <pitch>0.00</pitch> <yaw>0.00</yaw> </orient>

        </thruster>
      </engine>
      <tank type="FUEL">
        <location unit="M">
          <x> 9.5000 </x>
          <y> 0.0000 </y>
          <z> -1.2000 </z>
        </location>
        <capacity unit="KG"> 11000.00 </capacity>
        <contents unit="KG"> 4400.00 </contents>
      </tank>
      <tank type="FUEL">
        <location unit="M">
          <x> 16.5000 </x>
          <y> 0.0000 </y>
          <z> 0.0000 </z>
        </location>
        <capacity unit="KG"> 20000.00 </capacity>
        <contents unit="KG"> 8000.00 </contents>
      </tank>
      <tank type="FUEL">
        <location unit="M">
          <x> 21.0000 </x>
          <y> 0.0000 </y>
          <z> -1.5000 </z>
        </location>
        <capacity unit="KG"> 18000.00 </capacity>
        <contents unit="KG"> 7200.00 </contents>
      </tank>
      <tank type="FUEL">
        <location unit="M">
          <x> 28.0000 </x>
          <y> 0.0000 </y>
          <z> -1.2000 </z>
        </location>
        <capacity unit="KG"> 22000.00 </capacity>
        <contents unit="KG"> 8800.00 </contents>
      </tank>
      <tank type="FUEL">
        <location unit="M">
          <x> 18.9000 </x>
          <y> -7.0000 </y>
          <z> -0.1000 </z>
        </location>
        <capacity unit="KG"> 20000.00 </capacity>
        <contents unit="KG"> 8000.00 </contents>
      </tank>
      <tank type="FUEL">
        <location unit="M">
          <x> 18.9000 </x>
          <y> 7.0000 </y>
          <z> -0.1000 </z>
        </location>
        <capacity unit="KG"> 20000.00 </capacity>
        <contents unit="KG"> 8000.00 </contents>
      </tank>
      <tank type="FUEL">
        <location unit="M">
          <x> 24.6000 </x>
          <y> -15.5000 </y>
          <z> -0.6000 </z>
        </location>
        <capacity unit="KG"> 15305.00 </capacity>
        <contents unit="KG"> 6122.00 </contents>
      </tank>
      <tank type="FUEL">
        <location unit="M">
          <x> 24.6000 </x>
          <y> 15.5000 </y>
          <z> -0.6000 </z>
        </location>
        <capacity unit="KG"> 15305.00 </capacity>
        <contents unit="KG"> 6122.00 </contents>
      </tank>
    </propulsion>
    <flight_control name="b52h">
      <!-- the aircraft's profile for the platform (docs/control-architecture.md, section 7): what
           hangar knows of it - its design, its flight tests, its identified responses -->
      <property value="1">fsim/identity/version</property>
      <property value="1">fsim/identity/provenance</property>
      <property value="4">fsim/identity/class</property>
      <property value="1">fsim/identity/family</property>
      <property value="1">fsim/effectors/version</property>
      <property value="1">fsim/effectors/provenance</property>
      <property value="1">fsim/effectors/flaps</property>
      <property value="8">fsim/effectors/flaps_transit_s</property>
      <property value="0.0">fsim/effectors/neutral</property>
      <property value="0.0">fsim/effectors/pitch</property>
      <property value="1">fsim/effectors/pitch_trim</property>
      <property value="1">fsim/effectors/retractable_gear</property>
      <property value="0.0">fsim/effectors/roll</property>
      <property value="1">fsim/effectors/speedbrake</property>
      <property value="1">fsim/effectors/speedbrake_approach</property>
      <property value="1">fsim/effectors/wheel_brakes</property>
      <property value="0.0">fsim/effectors/yaw</property>
      <property value="1">fsim/envelope/version</property>
      <property value="1">fsim/envelope/provenance</property>
      <property value="16.5708">fsim/envelope/clean/alpha_max_deg</property>
      <property value="58.6062">fsim/envelope/clean/cas_min_ms</property>
      <property value="21.09">fsim/envelope/crosswind_max_ms</property>
      <property value="9.83">fsim/envelope/ground_pitch_max_deg</property>
      <property value="41.83">fsim/envelope/ground_turn_radius_m</property>
      <property value="0.1106">fsim/envelope/ground_yaw_accel_rad_s2</property>
      <property value="1">fsim/propulsion/version</property>
      <property value="1">fsim/propulsion/provenance</property>
      <property value="0.0">fsim/propulsion/afterburner</property>
      <property value="8">fsim/propulsion/engines</property>
      <property value="0.178957">fsim/propulsion/spool_s</property>
      <property value="2">fsim/propulsion/type</property>
      <property value="1">fsim/plant/version</property>
      <property value="1">fsim/plant/provenance</property>
      <property value="-8.39618">fsim/plant/alpha_zero_lift_deg</property>
      <property value="3000">fsim/plant/altitude_m</property>
      <property value="132.51">fsim/plant/eas_ms</property>
      <property value="0.217485">fsim/plant/elevator_trim</property>
      <property value="-0.150116">fsim/plant/elevator_trim_lift</property>
      <property value="5.75177">fsim/plant/pitch/gain</property>
      <property value="0.86862">fsim/plant/pitch/tau_s</property>
      <property value="0.642585">fsim/plant/roll/gain</property>
      <property value="0.574601">fsim/plant/roll/tau_s</property>
      <property value="1.43882">fsim/plant/speed/gain</property>
      <property value="0.178957">fsim/plant/speed/tau_s</property>
      <property value="152.593">fsim/plant/tas_ms</property>
      <property value="0.421802">fsim/plant/throttle_trim</property>
      <property value="0.177075">fsim/plant/yaw/gain</property>
      <property value="1">fsim/performance/version</property>
      <property value="1">fsim/performance/provenance</property>
      <property value="69.45">fsim/performance/approach_cas_ms</property>
      <property value="16118">fsim/performance/ceiling_m</property>
      <property value="307.438">fsim/performance/max_tas_ms</property>
      <property value="58.6062">fsim/performance/stall_cas_ms</property>
      <property value="48.6423">fsim/performance/stall_flaps_cas_ms</property>
      <property value="1">fsim/applicability/version</property>
      <property value="1">fsim/applicability/provenance</property>
      <property value="0.0">fsim/applicability/aerobatic</property>
      <property value="1">fsim/applicability/carrier</property>
      <property value="2">fsim/applicability/drag_devices</property>
      <property value="1">fsim/applicability/flaps</property>
      <property value="1">fsim/applicability/ground_contact</property>
      <property value="2">fsim/applicability/releasable_stores</property>
      <property value="1">fsim/applicability/retractable_gear</property>
      <property value="0.0">fsim/applicability/vertical_flight</property>
      <property value="1">fsim/tables/version</property>
      <property value="1">fsim/tables/provenance</property>
      <property value="100">fsim/tables/altitude_m/h0</property>
      <property value="3220">fsim/tables/altitude_m/h1</property>
      <property value="6450">fsim/tables/altitude_m/h2</property>
      <property value="9670">fsim/tables/altitude_m/h3</property>
      <property value="12090">fsim/tables/altitude_m/h4</property>
      <property value="13700">fsim/tables/altitude_m/h5</property>
      <property value="15310">fsim/tables/altitude_m/h6</property>
      <property value="1.37374">fsim/tables/best_endurance_fuel_kg_s/h0/w0</property>
      <property value="1.48665">fsim/tables/best_endurance_fuel_kg_s/h0/w1</property>
      <property value="1.69872">fsim/tables/best_endurance_fuel_kg_s/h0/w2</property>
      <property value="2.32248">fsim/tables/best_endurance_fuel_kg_s/h0/w3</property>
      <property value="1.02563">fsim/tables/best_endurance_fuel_kg_s/h1/w0</property>
      <property value="1.32233">fsim/tables/best_endurance_fuel_kg_s/h1/w1</property>
      <property value="1.48013">fsim/tables/best_endurance_fuel_kg_s/h1/w2</property>
      <property value="1.81065">fsim/tables/best_endurance_fuel_kg_s/h1/w3</property>
      <property value="0.919605">fsim/tables/best_endurance_fuel_kg_s/h2/w0</property>
      <property value="1.15912">fsim/tables/best_endurance_fuel_kg_s/h2/w1</property>
      <property value="1.26897">fsim/tables/best_endurance_fuel_kg_s/h2/w2</property>
      <property value="1.62457">fsim/tables/best_endurance_fuel_kg_s/h2/w3</property>
      <property value="0.809964">fsim/tables/best_endurance_fuel_kg_s/h3/w0</property>
      <property value="0.996795">fsim/tables/best_endurance_fuel_kg_s/h3/w1</property>
      <property value="1.07241">fsim/tables/best_endurance_fuel_kg_s/h3/w2</property>
      <property value="0.756602">fsim/tables/best_endurance_fuel_kg_s/h4/w0</property>
      <property value="0.894749">fsim/tables/best_endurance_fuel_kg_s/h4/w1</property>
      <property value="0.950844">fsim/tables/best_endurance_fuel_kg_s/h4/w2</property>
      <property value="0.756666">fsim/tables/best_endurance_fuel_kg_s/h5/w0</property>
      <property value="0.85342">fsim/tables/best_endurance_fuel_kg_s/h5/w1</property>
      <property value="0.939042">fsim/tables/best_endurance_fuel_kg_s/h5/w2</property>
      <property value="0.756666">fsim/tables/best_endurance_fuel_kg_s/h6/w0</property>
      <property value="0.822941">fsim/tables/best_endurance_fuel_kg_s/h6/w1</property>
      <property value="122.487">fsim/tables/best_endurance_tas_ms/h0/w0</property>
      <property value="105.018">fsim/tables/best_endurance_tas_ms/h0/w1</property>
      <property value="115.165">fsim/tables/best_endurance_tas_ms/h0/w2</property>
      <property value="136.686">fsim/tables/best_endurance_tas_ms/h0/w3</property>
      <property value="100.952">fsim/tables/best_endurance_tas_ms/h1/w0</property>
      <property value="121.636">fsim/tables/best_endurance_tas_ms/h1/w1</property>
      <property value="128.794">fsim/tables/best_endurance_tas_ms/h1/w2</property>
      <property value="137.901">fsim/tables/best_endurance_tas_ms/h1/w3</property>
      <property value="122.352">fsim/tables/best_endurance_tas_ms/h2/w0</property>
      <property value="142.306">fsim/tables/best_endurance_tas_ms/h2/w1</property>
      <property value="147.51">fsim/tables/best_endurance_tas_ms/h2/w2</property>
      <property value="196.768">fsim/tables/best_endurance_tas_ms/h2/w3</property>
      <property value="149.125">fsim/tables/best_endurance_tas_ms/h3/w0</property>
      <property value="169.914">fsim/tables/best_endurance_tas_ms/h3/w1</property>
      <property value="169.699">fsim/tables/best_endurance_tas_ms/h3/w2</property>
      <property value="182.356">fsim/tables/best_endurance_tas_ms/h4/w0</property>
      <property value="198.026">fsim/tables/best_endurance_tas_ms/h4/w1</property>
      <property value="194.503">fsim/tables/best_endurance_tas_ms/h4/w2</property>
      <property value="178.541">fsim/tables/best_endurance_tas_ms/h5/w0</property>
      <property value="221.342">fsim/tables/best_endurance_tas_ms/h5/w1</property>
      <property value="244.067">fsim/tables/best_endurance_tas_ms/h5/w2</property>
      <property value="203.115">fsim/tables/best_endurance_tas_ms/h6/w0</property>
      <property value="235.813">fsim/tables/best_endurance_tas_ms/h6/w1</property>
      <property value="1.37374">fsim/tables/best_range_fuel_kg_s/h0/w0</property>
      <property value="1.81761">fsim/tables/best_range_fuel_kg_s/h0/w1</property>
      <property value="2.06035">fsim/tables/best_range_fuel_kg_s/h0/w2</property>
      <property value="2.7683">fsim/tables/best_range_fuel_kg_s/h0/w3</property>
      <property value="1.26809">fsim/tables/best_range_fuel_kg_s/h1/w0</property>
      <property value="1.63505">fsim/tables/best_range_fuel_kg_s/h1/w1</property>
      <property value="1.82345">fsim/tables/best_range_fuel_kg_s/h1/w2</property>
      <property value="2.38465">fsim/tables/best_range_fuel_kg_s/h1/w3</property>
      <property value="1.16047">fsim/tables/best_range_fuel_kg_s/h2/w0</property>
      <property value="1.39484">fsim/tables/best_range_fuel_kg_s/h2/w1</property>
      <property value="1.53194">fsim/tables/best_range_fuel_kg_s/h2/w2</property>
      <property value="1.90031">fsim/tables/best_range_fuel_kg_s/h2/w3</property>
      <property value="0.994821">fsim/tables/best_range_fuel_kg_s/h3/w0</property>
      <property value="1.15367">fsim/tables/best_range_fuel_kg_s/h3/w1</property>
      <property value="1.2283">fsim/tables/best_range_fuel_kg_s/h3/w2</property>
      <property value="0.817158">fsim/tables/best_range_fuel_kg_s/h4/w0</property>
      <property value="0.945603">fsim/tables/best_range_fuel_kg_s/h4/w1</property>
      <property value="1.01635">fsim/tables/best_range_fuel_kg_s/h4/w2</property>
      <property value="0.757903">fsim/tables/best_range_fuel_kg_s/h5/w0</property>
      <property value="0.880625">fsim/tables/best_range_fuel_kg_s/h5/w1</property>
      <property value="0.94903">fsim/tables/best_range_fuel_kg_s/h5/w2</property>
      <property value="0.756666">fsim/tables/best_range_fuel_kg_s/h6/w0</property>
      <property value="0.843538">fsim/tables/best_range_fuel_kg_s/h6/w1</property>
      <property value="122.487">fsim/tables/best_range_tas_ms/h0/w0</property>
      <property value="147.371">fsim/tables/best_range_tas_ms/h0/w1</property>
      <property value="160.179">fsim/tables/best_range_tas_ms/h0/w2</property>
      <property value="194.469">fsim/tables/best_range_tas_ms/h0/w3</property>
      <property value="146.978">fsim/tables/best_range_tas_ms/h1/w0</property>
      <property value="173.891">fsim/tables/best_range_tas_ms/h1/w1</property>
      <property value="186.873">fsim/tables/best_range_tas_ms/h1/w2</property>
      <property value="221.928">fsim/tables/best_range_tas_ms/h1/w3</property>
      <property value="181.784">fsim/tables/best_range_tas_ms/h2/w0</property>
      <property value="202.039">fsim/tables/best_range_tas_ms/h2/w1</property>
      <property value="214.108">fsim/tables/best_range_tas_ms/h2/w2</property>
      <property value="242.316">fsim/tables/best_range_tas_ms/h2/w3</property>
      <property value="216.918">fsim/tables/best_range_tas_ms/h3/w0</property>
      <property value="231.579">fsim/tables/best_range_tas_ms/h3/w1</property>
      <property value="236.574">fsim/tables/best_range_tas_ms/h3/w2</property>
      <property value="230.679">fsim/tables/best_range_tas_ms/h4/w0</property>
      <property value="237.056">fsim/tables/best_range_tas_ms/h4/w1</property>
      <property value="239.979">fsim/tables/best_range_tas_ms/h4/w2</property>
      <property value="243.214">fsim/tables/best_range_tas_ms/h5/w0</property>
      <property value="243.034">fsim/tables/best_range_tas_ms/h5/w1</property>
      <property value="247.012">fsim/tables/best_range_tas_ms/h5/w2</property>
      <property value="250.129">fsim/tables/best_range_tas_ms/h6/w0</property>
      <property value="250.349">fsim/tables/best_range_tas_ms/h6/w1</property>
      <property value="263.706">fsim/tables/climb_tas_ms/h0/w0</property>
      <property value="266.38">fsim/tables/climb_tas_ms/h0/w1</property>
      <property value="266.864">fsim/tables/climb_tas_ms/h0/w2</property>
      <property value="268.841">fsim/tables/climb_tas_ms/h0/w3</property>
      <property value="257.376">fsim/tables/climb_tas_ms/h1/w0</property>
      <property value="259.888">fsim/tables/climb_tas_ms/h1/w1</property>
      <property value="260.29">fsim/tables/climb_tas_ms/h1/w2</property>
      <property value="260.208">fsim/tables/climb_tas_ms/h1/w3</property>
      <property value="250.356">fsim/tables/climb_tas_ms/h2/w0</property>
      <property value="250.443">fsim/tables/climb_tas_ms/h2/w1</property>
      <property value="250.504">fsim/tables/climb_tas_ms/h2/w2</property>
      <property value="251.188">fsim/tables/climb_tas_ms/h2/w3</property>
      <property value="240.124">fsim/tables/climb_tas_ms/h3/w0</property>
      <property value="241.133">fsim/tables/climb_tas_ms/h3/w1</property>
      <property value="240.813">fsim/tables/climb_tas_ms/h3/w2</property>
      <property value="244.487">fsim/tables/climb_tas_ms/h3/w3</property>
      <property value="236.403">fsim/tables/climb_tas_ms/h4/w0</property>
      <property value="236.58">fsim/tables/climb_tas_ms/h4/w1</property>
      <property value="242.739">fsim/tables/climb_tas_ms/h4/w2</property>
      <property value="244.171">fsim/tables/climb_tas_ms/h4/w3</property>
      <property value="239.758">fsim/tables/climb_tas_ms/h5/w0</property>
      <property value="242.512">fsim/tables/climb_tas_ms/h5/w1</property>
      <property value="246.284">fsim/tables/climb_tas_ms/h5/w2</property>
      <property value="240.07">fsim/tables/climb_tas_ms/h6/w0</property>
      <property value="251.005">fsim/tables/climb_tas_ms/h6/w1</property>
      <property value="141610">fsim/tables/fuel_capacity_kg</property>
      <property value="1.37369">fsim/tables/fuel_kg_s/h0/w0/v0</property>
      <property value="1.51935">fsim/tables/fuel_kg_s/h0/w0/v1</property>
      <property value="3.3908">fsim/tables/fuel_kg_s/h0/w0/v10</property>
      <property value="3.63662">fsim/tables/fuel_kg_s/h0/w0/v11</property>
      <property value="3.92143">fsim/tables/fuel_kg_s/h0/w0/v12</property>
      <property value="4.26133">fsim/tables/fuel_kg_s/h0/w0/v13</property>
      <property value="4.73127">fsim/tables/fuel_kg_s/h0/w0/v14</property>
      <property value="6.87981">fsim/tables/fuel_kg_s/h0/w0/v15</property>
      <property value="1.67589">fsim/tables/fuel_kg_s/h0/w0/v2</property>
      <property value="1.86053">fsim/tables/fuel_kg_s/h0/w0/v3</property>
      <property value="2.05159">fsim/tables/fuel_kg_s/h0/w0/v4</property>
      <property value="2.24805">fsim/tables/fuel_kg_s/h0/w0/v5</property>
      <property value="2.44981">fsim/tables/fuel_kg_s/h0/w0/v6</property>
      <property value="2.67198">fsim/tables/fuel_kg_s/h0/w0/v7</property>
      <property value="2.90424">fsim/tables/fuel_kg_s/h0/w0/v8</property>
      <property value="3.14278">fsim/tables/fuel_kg_s/h0/w0/v9</property>
      <property value="1.55451">fsim/tables/fuel_kg_s/h0/w1/v0</property>
      <property value="1.48695">fsim/tables/fuel_kg_s/h0/w1/v1</property>
      <property value="3.17123">fsim/tables/fuel_kg_s/h0/w1/v10</property>
      <property value="3.46327">fsim/tables/fuel_kg_s/h0/w1/v11</property>
      <property value="3.7785">fsim/tables/fuel_kg_s/h0/w1/v12</property>
      <property value="4.10623">fsim/tables/fuel_kg_s/h0/w1/v13</property>
      <property value="4.63971">fsim/tables/fuel_kg_s/h0/w1/v14</property>
      <property value="6.64046">fsim/tables/fuel_kg_s/h0/w1/v15</property>
      <property value="1.53761">fsim/tables/fuel_kg_s/h0/w1/v2</property>
      <property value="1.64922">fsim/tables/fuel_kg_s/h0/w1/v3</property>
      <property value="1.79571">fsim/tables/fuel_kg_s/h0/w1/v4</property>
      <property value="1.98588">fsim/tables/fuel_kg_s/h0/w1/v5</property>
      <property value="2.18442">fsim/tables/fuel_kg_s/h0/w1/v6</property>
      <property value="2.41844">fsim/tables/fuel_kg_s/h0/w1/v7</property>
      <property value="2.65945">fsim/tables/fuel_kg_s/h0/w1/v8</property>
      <property value="2.91089">fsim/tables/fuel_kg_s/h0/w1/v9</property>
      <property value="1.97613">fsim/tables/fuel_kg_s/h0/w2/v0</property>
      <property value="1.73207">fsim/tables/fuel_kg_s/h0/w2/v1</property>
      <property value="3.20223">fsim/tables/fuel_kg_s/h0/w2/v10</property>
      <property value="3.47628">fsim/tables/fuel_kg_s/h0/w2/v11</property>
      <property value="3.78571">fsim/tables/fuel_kg_s/h0/w2/v12</property>
      <property value="4.11297">fsim/tables/fuel_kg_s/h0/w2/v13</property>
      <property value="4.6421">fsim/tables/fuel_kg_s/h0/w2/v14</property>
      <property value="6.63369">fsim/tables/fuel_kg_s/h0/w2/v15</property>
      <property value="1.70003">fsim/tables/fuel_kg_s/h0/w2/v2</property>
      <property value="1.76368">fsim/tables/fuel_kg_s/h0/w2/v3</property>
      <property value="1.88688">fsim/tables/fuel_kg_s/h0/w2/v4</property>
      <property value="2.0478">fsim/tables/fuel_kg_s/h0/w2/v5</property>
      <property value="2.24372">fsim/tables/fuel_kg_s/h0/w2/v6</property>
      <property value="2.44988">fsim/tables/fuel_kg_s/h0/w2/v7</property>
      <property value="2.69086">fsim/tables/fuel_kg_s/h0/w2/v8</property>
      <property value="2.94217">fsim/tables/fuel_kg_s/h0/w2/v9</property>
      <property value="2.33454">fsim/tables/fuel_kg_s/h0/w3/v1</property>
      <property value="3.48147">fsim/tables/fuel_kg_s/h0/w3/v10</property>
      <property value="3.72811">fsim/tables/fuel_kg_s/h0/w3/v11</property>
      <property value="3.98453">fsim/tables/fuel_kg_s/h0/w3/v12</property>
      <property value="4.27895">fsim/tables/fuel_kg_s/h0/w3/v13</property>
      <property value="4.73997">fsim/tables/fuel_kg_s/h0/w3/v14</property>
      <property value="6.617">fsim/tables/fuel_kg_s/h0/w3/v15</property>
      <property value="2.32346">fsim/tables/fuel_kg_s/h0/w3/v2</property>
      <property value="2.35207">fsim/tables/fuel_kg_s/h0/w3/v3</property>
      <property value="2.41449">fsim/tables/fuel_kg_s/h0/w3/v4</property>
      <property value="2.5322">fsim/tables/fuel_kg_s/h0/w3/v5</property>
      <property value="2.68141">fsim/tables/fuel_kg_s/h0/w3/v6</property>
      <property value="2.85561">fsim/tables/fuel_kg_s/h0/w3/v7</property>
      <property value="3.03784">fsim/tables/fuel_kg_s/h0/w3/v8</property>
      <property value="3.25245">fsim/tables/fuel_kg_s/h0/w3/v9</property>
      <property value="1.04346">fsim/tables/fuel_kg_s/h1/w0/v0</property>
      <property value="1.02688">fsim/tables/fuel_kg_s/h1/w0/v1</property>
      <property value="2.12791">fsim/tables/fuel_kg_s/h1/w0/v10</property>
      <property value="2.3203">fsim/tables/fuel_kg_s/h1/w0/v11</property>
      <property value="2.52654">fsim/tables/fuel_kg_s/h1/w0/v12</property>
      <property value="2.74419">fsim/tables/fuel_kg_s/h1/w0/v13</property>
      <property value="3.1028">fsim/tables/fuel_kg_s/h1/w0/v14</property>
      <property value="4.50729">fsim/tables/fuel_kg_s/h1/w0/v15</property>
      <property value="1.06671">fsim/tables/fuel_kg_s/h1/w0/v2</property>
      <property value="1.14052">fsim/tables/fuel_kg_s/h1/w0/v3</property>
      <property value="1.23553">fsim/tables/fuel_kg_s/h1/w0/v4</property>
      <property value="1.35628">fsim/tables/fuel_kg_s/h1/w0/v5</property>
      <property value="1.48667">fsim/tables/fuel_kg_s/h1/w0/v6</property>
      <property value="1.63784">fsim/tables/fuel_kg_s/h1/w0/v7</property>
      <property value="1.7944">fsim/tables/fuel_kg_s/h1/w0/v8</property>
      <property value="1.95822">fsim/tables/fuel_kg_s/h1/w0/v9</property>
      <property value="1.55383">fsim/tables/fuel_kg_s/h1/w1/v0</property>
      <property value="1.35682">fsim/tables/fuel_kg_s/h1/w1/v1</property>
      <property value="2.20872">fsim/tables/fuel_kg_s/h1/w1/v10</property>
      <property value="2.38562">fsim/tables/fuel_kg_s/h1/w1/v11</property>
      <property value="2.57319">fsim/tables/fuel_kg_s/h1/w1/v12</property>
      <property value="2.77357">fsim/tables/fuel_kg_s/h1/w1/v13</property>
      <property value="3.11969">fsim/tables/fuel_kg_s/h1/w1/v14</property>
      <property value="4.46799">fsim/tables/fuel_kg_s/h1/w1/v15</property>
      <property value="1.32244">fsim/tables/fuel_kg_s/h1/w1/v2</property>
      <property value="1.34951">fsim/tables/fuel_kg_s/h1/w1/v3</property>
      <property value="1.41392">fsim/tables/fuel_kg_s/h1/w1/v4</property>
      <property value="1.50976">fsim/tables/fuel_kg_s/h1/w1/v5</property>
      <property value="1.62055">fsim/tables/fuel_kg_s/h1/w1/v6</property>
      <property value="1.74936">fsim/tables/fuel_kg_s/h1/w1/v7</property>
      <property value="1.88195">fsim/tables/fuel_kg_s/h1/w1/v8</property>
      <property value="2.04246">fsim/tables/fuel_kg_s/h1/w1/v9</property>
      <property value="1.55219">fsim/tables/fuel_kg_s/h1/w2/v1</property>
      <property value="2.25054">fsim/tables/fuel_kg_s/h1/w2/v10</property>
      <property value="2.42621">fsim/tables/fuel_kg_s/h1/w2/v11</property>
      <property value="2.61202">fsim/tables/fuel_kg_s/h1/w2/v12</property>
      <property value="2.81131">fsim/tables/fuel_kg_s/h1/w2/v13</property>
      <property value="3.13946">fsim/tables/fuel_kg_s/h1/w2/v14</property>
      <property value="4.46587">fsim/tables/fuel_kg_s/h1/w2/v15</property>
      <property value="1.48807">fsim/tables/fuel_kg_s/h1/w2/v2</property>
      <property value="1.4882">fsim/tables/fuel_kg_s/h1/w2/v3</property>
      <property value="1.53116">fsim/tables/fuel_kg_s/h1/w2/v4</property>
      <property value="1.60304">fsim/tables/fuel_kg_s/h1/w2/v5</property>
      <property value="1.7004">fsim/tables/fuel_kg_s/h1/w2/v6</property>
      <property value="1.81729">fsim/tables/fuel_kg_s/h1/w2/v7</property>
      <property value="1.9492">fsim/tables/fuel_kg_s/h1/w2/v8</property>
      <property value="2.08595">fsim/tables/fuel_kg_s/h1/w2/v9</property>
      <property value="2.10529">fsim/tables/fuel_kg_s/h1/w3/v0</property>
      <property value="2.45328">fsim/tables/fuel_kg_s/h1/w3/v10</property>
      <property value="2.59156">fsim/tables/fuel_kg_s/h1/w3/v11</property>
      <property value="2.74915">fsim/tables/fuel_kg_s/h1/w3/v12</property>
      <property value="2.94375">fsim/tables/fuel_kg_s/h1/w3/v13</property>
      <property value="3.24734">fsim/tables/fuel_kg_s/h1/w3/v14</property>
      <property value="4.50053">fsim/tables/fuel_kg_s/h1/w3/v15</property>
      <property value="1.82581">fsim/tables/fuel_kg_s/h1/w3/v3</property>
      <property value="1.93135">fsim/tables/fuel_kg_s/h1/w3/v4</property>
      <property value="1.98289">fsim/tables/fuel_kg_s/h1/w3/v5</property>
      <property value="2.04409">fsim/tables/fuel_kg_s/h1/w3/v6</property>
      <property value="2.11776">fsim/tables/fuel_kg_s/h1/w3/v7</property>
      <property value="2.20921">fsim/tables/fuel_kg_s/h1/w3/v8</property>
      <property value="2.32424">fsim/tables/fuel_kg_s/h1/w3/v9</property>
      <property value="1.00366">fsim/tables/fuel_kg_s/h2/w0/v0</property>
      <property value="0.944272">fsim/tables/fuel_kg_s/h2/w0/v1</property>
      <property value="1.42789">fsim/tables/fuel_kg_s/h2/w0/v10</property>
      <property value="1.53638">fsim/tables/fuel_kg_s/h2/w0/v11</property>
      <property value="1.65088">fsim/tables/fuel_kg_s/h2/w0/v12</property>
      <property value="1.78225">fsim/tables/fuel_kg_s/h2/w0/v13</property>
      <property value="1.99323">fsim/tables/fuel_kg_s/h2/w0/v14</property>
      <property value="2.89192">fsim/tables/fuel_kg_s/h2/w0/v15</property>
      <property value="0.920112">fsim/tables/fuel_kg_s/h2/w0/v2</property>
      <property value="0.93216">fsim/tables/fuel_kg_s/h2/w0/v3</property>
      <property value="0.96391">fsim/tables/fuel_kg_s/h2/w0/v4</property>
      <property value="1.01751">fsim/tables/fuel_kg_s/h2/w0/v5</property>
      <property value="1.07896">fsim/tables/fuel_kg_s/h2/w0/v6</property>
      <property value="1.15458">fsim/tables/fuel_kg_s/h2/w0/v7</property>
      <property value="1.23339">fsim/tables/fuel_kg_s/h2/w0/v8</property>
      <property value="1.32735">fsim/tables/fuel_kg_s/h2/w0/v9</property>
      <property value="1.30224">fsim/tables/fuel_kg_s/h2/w1/v0</property>
      <property value="1.24803">fsim/tables/fuel_kg_s/h2/w1/v1</property>
      <property value="1.52492">fsim/tables/fuel_kg_s/h2/w1/v10</property>
      <property value="1.61709">fsim/tables/fuel_kg_s/h2/w1/v11</property>
      <property value="1.72674">fsim/tables/fuel_kg_s/h2/w1/v12</property>
      <property value="1.85816">fsim/tables/fuel_kg_s/h2/w1/v13</property>
      <property value="2.05388">fsim/tables/fuel_kg_s/h2/w1/v14</property>
      <property value="2.90212">fsim/tables/fuel_kg_s/h2/w1/v15</property>
      <property value="1.17946">fsim/tables/fuel_kg_s/h2/w1/v2</property>
      <property value="1.15969">fsim/tables/fuel_kg_s/h2/w1/v3</property>
      <property value="1.16812">fsim/tables/fuel_kg_s/h2/w1/v4</property>
      <property value="1.19746">fsim/tables/fuel_kg_s/h2/w1/v5</property>
      <property value="1.24023">fsim/tables/fuel_kg_s/h2/w1/v6</property>
      <property value="1.29781">fsim/tables/fuel_kg_s/h2/w1/v7</property>
      <property value="1.36127">fsim/tables/fuel_kg_s/h2/w1/v8</property>
      <property value="1.44191">fsim/tables/fuel_kg_s/h2/w1/v9</property>
      <property value="1.586">fsim/tables/fuel_kg_s/h2/w2/v10</property>
      <property value="1.67506">fsim/tables/fuel_kg_s/h2/w2/v11</property>
      <property value="1.76694">fsim/tables/fuel_kg_s/h2/w2/v12</property>
      <property value="1.89692">fsim/tables/fuel_kg_s/h2/w2/v13</property>
      <property value="2.08615">fsim/tables/fuel_kg_s/h2/w2/v14</property>
      <property value="2.91488">fsim/tables/fuel_kg_s/h2/w2/v15</property>
      <property value="1.29369">fsim/tables/fuel_kg_s/h2/w2/v2</property>
      <property value="1.2709">fsim/tables/fuel_kg_s/h2/w2/v3</property>
      <property value="1.27376">fsim/tables/fuel_kg_s/h2/w2/v4</property>
      <property value="1.29381">fsim/tables/fuel_kg_s/h2/w2/v5</property>
      <property value="1.33279">fsim/tables/fuel_kg_s/h2/w2/v6</property>
      <property value="1.3784">fsim/tables/fuel_kg_s/h2/w2/v7</property>
      <property value="1.43794">fsim/tables/fuel_kg_s/h2/w2/v8</property>
      <property value="1.50317">fsim/tables/fuel_kg_s/h2/w2/v9</property>
      <property value="1.79537">fsim/tables/fuel_kg_s/h2/w3/v10</property>
      <property value="1.85793">fsim/tables/fuel_kg_s/h2/w3/v11</property>
      <property value="1.93428">fsim/tables/fuel_kg_s/h2/w3/v12</property>
      <property value="2.05056">fsim/tables/fuel_kg_s/h2/w3/v13</property>
      <property value="2.20464">fsim/tables/fuel_kg_s/h2/w3/v14</property>
      <property value="2.95689">fsim/tables/fuel_kg_s/h2/w3/v15</property>
      <property value="1.62457">fsim/tables/fuel_kg_s/h2/w3/v7</property>
      <property value="1.68291">fsim/tables/fuel_kg_s/h2/w3/v8</property>
      <property value="1.73243">fsim/tables/fuel_kg_s/h2/w3/v9</property>
      <property value="0.883962">fsim/tables/fuel_kg_s/h3/w0/v1</property>
      <property value="0.978615">fsim/tables/fuel_kg_s/h3/w0/v10</property>
      <property value="1.02767">fsim/tables/fuel_kg_s/h3/w0/v11</property>
      <property value="1.08459">fsim/tables/fuel_kg_s/h3/w0/v12</property>
      <property value="1.16528">fsim/tables/fuel_kg_s/h3/w0/v13</property>
      <property value="1.27771">fsim/tables/fuel_kg_s/h3/w0/v14</property>
      <property value="1.81558">fsim/tables/fuel_kg_s/h3/w0/v15</property>
      <property value="0.838815">fsim/tables/fuel_kg_s/h3/w0/v2</property>
      <property value="0.81488">fsim/tables/fuel_kg_s/h3/w0/v3</property>
      <property value="0.810021">fsim/tables/fuel_kg_s/h3/w0/v4</property>
      <property value="0.817209">fsim/tables/fuel_kg_s/h3/w0/v5</property>
      <property value="0.832181">fsim/tables/fuel_kg_s/h3/w0/v6</property>
      <property value="0.861486">fsim/tables/fuel_kg_s/h3/w0/v7</property>
      <property value="0.891309">fsim/tables/fuel_kg_s/h3/w0/v8</property>
      <property value="0.933201">fsim/tables/fuel_kg_s/h3/w0/v9</property>
      <property value="1.04978">fsim/tables/fuel_kg_s/h3/w1/v1</property>
      <property value="1.09743">fsim/tables/fuel_kg_s/h3/w1/v10</property>
      <property value="1.13245">fsim/tables/fuel_kg_s/h3/w1/v11</property>
      <property value="1.18092">fsim/tables/fuel_kg_s/h3/w1/v12</property>
      <property value="1.25376">fsim/tables/fuel_kg_s/h3/w1/v13</property>
      <property value="1.35713">fsim/tables/fuel_kg_s/h3/w1/v14</property>
      <property value="1.83927">fsim/tables/fuel_kg_s/h3/w1/v15</property>
      <property value="1.04346">fsim/tables/fuel_kg_s/h3/w1/v2</property>
      <property value="1.02019">fsim/tables/fuel_kg_s/h3/w1/v3</property>
      <property value="1.00293">fsim/tables/fuel_kg_s/h3/w1/v4</property>
      <property value="0.996797">fsim/tables/fuel_kg_s/h3/w1/v5</property>
      <property value="1.0034">fsim/tables/fuel_kg_s/h3/w1/v6</property>
      <property value="1.01737">fsim/tables/fuel_kg_s/h3/w1/v7</property>
      <property value="1.03666">fsim/tables/fuel_kg_s/h3/w1/v8</property>
      <property value="1.06457">fsim/tables/fuel_kg_s/h3/w1/v9</property>
      <property value="1.16274">fsim/tables/fuel_kg_s/h3/w2/v10</property>
      <property value="1.19788">fsim/tables/fuel_kg_s/h3/w2/v11</property>
      <property value="1.23371">fsim/tables/fuel_kg_s/h3/w2/v12</property>
      <property value="1.30414">fsim/tables/fuel_kg_s/h3/w2/v13</property>
      <property value="1.40811">fsim/tables/fuel_kg_s/h3/w2/v14</property>
      <property value="1.8674">fsim/tables/fuel_kg_s/h3/w2/v15</property>
      <property value="1.0732">fsim/tables/fuel_kg_s/h3/w2/v4</property>
      <property value="1.07314">fsim/tables/fuel_kg_s/h3/w2/v5</property>
      <property value="1.07918">fsim/tables/fuel_kg_s/h3/w2/v6</property>
      <property value="1.0927">fsim/tables/fuel_kg_s/h3/w2/v7</property>
      <property value="1.1115">fsim/tables/fuel_kg_s/h3/w2/v8</property>
      <property value="1.13423">fsim/tables/fuel_kg_s/h3/w2/v9</property>
      <property value="2.3317">fsim/tables/fuel_kg_s/h3/w3/v1</property>
      <property value="0.775516">fsim/tables/fuel_kg_s/h4/w0/v10</property>
      <property value="0.796364">fsim/tables/fuel_kg_s/h4/w0/v11</property>
      <property value="0.825013">fsim/tables/fuel_kg_s/h4/w0/v12</property>
      <property value="0.871768">fsim/tables/fuel_kg_s/h4/w0/v13</property>
      <property value="0.949615">fsim/tables/fuel_kg_s/h4/w0/v14</property>
      <property value="1.26801">fsim/tables/fuel_kg_s/h4/w0/v15</property>
      <property value="0.773346">fsim/tables/fuel_kg_s/h4/w0/v3</property>
      <property value="0.761358">fsim/tables/fuel_kg_s/h4/w0/v4</property>
      <property value="0.757259">fsim/tables/fuel_kg_s/h4/w0/v5</property>
      <property value="0.756666">fsim/tables/fuel_kg_s/h4/w0/v6</property>
      <property value="0.756693">fsim/tables/fuel_kg_s/h4/w0/v7</property>
      <property value="0.75701">fsim/tables/fuel_kg_s/h4/w0/v8</property>
      <property value="0.76098">fsim/tables/fuel_kg_s/h4/w0/v9</property>
      <property value="0.912394">fsim/tables/fuel_kg_s/h4/w1/v10</property>
      <property value="0.923735">fsim/tables/fuel_kg_s/h4/w1/v11</property>
      <property value="0.940866">fsim/tables/fuel_kg_s/h4/w1/v12</property>
      <property value="0.981464">fsim/tables/fuel_kg_s/h4/w1/v13</property>
      <property value="1.05248">fsim/tables/fuel_kg_s/h4/w1/v14</property>
      <property value="1.32124">fsim/tables/fuel_kg_s/h4/w1/v15</property>
      <property value="0.923066">fsim/tables/fuel_kg_s/h4/w1/v2</property>
      <property value="0.924008">fsim/tables/fuel_kg_s/h4/w1/v3</property>
      <property value="0.921832">fsim/tables/fuel_kg_s/h4/w1/v4</property>
      <property value="0.908088">fsim/tables/fuel_kg_s/h4/w1/v5</property>
      <property value="0.899819">fsim/tables/fuel_kg_s/h4/w1/v6</property>
      <property value="0.894827">fsim/tables/fuel_kg_s/h4/w1/v7</property>
      <property value="0.897614">fsim/tables/fuel_kg_s/h4/w1/v8</property>
      <property value="0.900733">fsim/tables/fuel_kg_s/h4/w1/v9</property>
      <property value="0.973654">fsim/tables/fuel_kg_s/h4/w2/v10</property>
      <property value="0.987524">fsim/tables/fuel_kg_s/h4/w2/v11</property>
      <property value="1.00541">fsim/tables/fuel_kg_s/h4/w2/v12</property>
      <property value="1.03852">fsim/tables/fuel_kg_s/h4/w2/v13</property>
      <property value="1.11349">fsim/tables/fuel_kg_s/h4/w2/v14</property>
      <property value="1.35751">fsim/tables/fuel_kg_s/h4/w2/v15</property>
      <property value="0.950844">fsim/tables/fuel_kg_s/h4/w2/v6</property>
      <property value="0.953516">fsim/tables/fuel_kg_s/h4/w2/v7</property>
      <property value="0.956447">fsim/tables/fuel_kg_s/h4/w2/v8</property>
      <property value="0.966393">fsim/tables/fuel_kg_s/h4/w2/v9</property>
      <property value="0.756666">fsim/tables/fuel_kg_s/h5/w0/v10</property>
      <property value="0.756666">fsim/tables/fuel_kg_s/h5/w0/v11</property>
      <property value="0.756666">fsim/tables/fuel_kg_s/h5/w0/v12</property>
      <property value="0.758043">fsim/tables/fuel_kg_s/h5/w0/v13</property>
      <property value="0.823092">fsim/tables/fuel_kg_s/h5/w0/v14</property>
      <property value="1.04434">fsim/tables/fuel_kg_s/h5/w0/v15</property>
      <property value="0.756666">fsim/tables/fuel_kg_s/h5/w0/v5</property>
      <property value="0.756666">fsim/tables/fuel_kg_s/h5/w0/v6</property>
      <property value="0.756666">fsim/tables/fuel_kg_s/h5/w0/v7</property>
      <property value="0.756666">fsim/tables/fuel_kg_s/h5/w0/v8</property>
      <property value="0.756666">fsim/tables/fuel_kg_s/h5/w0/v9</property>
      <property value="0.854572">fsim/tables/fuel_kg_s/h5/w1/v10</property>
      <property value="0.854969">fsim/tables/fuel_kg_s/h5/w1/v11</property>
      <property value="0.868411">fsim/tables/fuel_kg_s/h5/w1/v12</property>
      <property value="0.890276">fsim/tables/fuel_kg_s/h5/w1/v13</property>
      <property value="0.949889">fsim/tables/fuel_kg_s/h5/w1/v14</property>
      <property value="1.12771">fsim/tables/fuel_kg_s/h5/w1/v15</property>
      <property value="0.87816">fsim/tables/fuel_kg_s/h5/w1/v3</property>
      <property value="0.877796">fsim/tables/fuel_kg_s/h5/w1/v4</property>
      <property value="0.883117">fsim/tables/fuel_kg_s/h5/w1/v5</property>
      <property value="0.871577">fsim/tables/fuel_kg_s/h5/w1/v6</property>
      <property value="0.861357">fsim/tables/fuel_kg_s/h5/w1/v7</property>
      <property value="0.856939">fsim/tables/fuel_kg_s/h5/w1/v8</property>
      <property value="0.853582">fsim/tables/fuel_kg_s/h5/w1/v9</property>
      <property value="0.939042">fsim/tables/fuel_kg_s/h5/w2/v13</property>
      <property value="0.957913">fsim/tables/fuel_kg_s/h5/w2/v14</property>
      <property value="1.07512">fsim/tables/fuel_kg_s/h5/w2/v15</property>
      <property value="0.756666">fsim/tables/fuel_kg_s/h6/w0/v10</property>
      <property value="0.756666">fsim/tables/fuel_kg_s/h6/w0/v11</property>
      <property value="0.756666">fsim/tables/fuel_kg_s/h6/w0/v12</property>
      <property value="0.756666">fsim/tables/fuel_kg_s/h6/w0/v13</property>
      <property value="0.756666">fsim/tables/fuel_kg_s/h6/w0/v14</property>
      <property value="0.859005">fsim/tables/fuel_kg_s/h6/w0/v15</property>
      <property value="0.756666">fsim/tables/fuel_kg_s/h6/w0/v7</property>
      <property value="0.756666">fsim/tables/fuel_kg_s/h6/w0/v8</property>
      <property value="0.756666">fsim/tables/fuel_kg_s/h6/w0/v9</property>
      <property value="0.868037">fsim/tables/fuel_kg_s/h6/w1/v0</property>
      <property value="0.83615">fsim/tables/fuel_kg_s/h6/w1/v1</property>
      <property value="0.823034">fsim/tables/fuel_kg_s/h6/w1/v10</property>
      <property value="0.82383">fsim/tables/fuel_kg_s/h6/w1/v11</property>
      <property value="0.827614">fsim/tables/fuel_kg_s/h6/w1/v12</property>
      <property value="0.833037">fsim/tables/fuel_kg_s/h6/w1/v13</property>
      <property value="0.838317">fsim/tables/fuel_kg_s/h6/w1/v14</property>
      <property value="0.843629">fsim/tables/fuel_kg_s/h6/w1/v15</property>
      <property value="0.835106">fsim/tables/fuel_kg_s/h6/w1/v2</property>
      <property value="0.835861">fsim/tables/fuel_kg_s/h6/w1/v3</property>
      <property value="0.844158">fsim/tables/fuel_kg_s/h6/w1/v4</property>
      <property value="0.83968">fsim/tables/fuel_kg_s/h6/w1/v5</property>
      <property value="0.834921">fsim/tables/fuel_kg_s/h6/w1/v6</property>
      <property value="0.82984">fsim/tables/fuel_kg_s/h6/w1/v7</property>
      <property value="0.827333">fsim/tables/fuel_kg_s/h6/w1/v8</property>
      <property value="0.825352">fsim/tables/fuel_kg_s/h6/w1/v9</property>
      <property value="99.7962">fsim/tables/max_climb_ms/h0/w0</property>
      <property value="69.3874">fsim/tables/max_climb_ms/h0/w1</property>
      <property value="60.1379">fsim/tables/max_climb_ms/h0/w2</property>
      <property value="42.4658">fsim/tables/max_climb_ms/h0/w3</property>
      <property value="70.3674">fsim/tables/max_climb_ms/h1/w0</property>
      <property value="48.6685">fsim/tables/max_climb_ms/h1/w1</property>
      <property value="41.8306">fsim/tables/max_climb_ms/h1/w2</property>
      <property value="29.0203">fsim/tables/max_climb_ms/h1/w3</property>
      <property value="47.5032">fsim/tables/max_climb_ms/h2/w0</property>
      <property value="32.1319">fsim/tables/max_climb_ms/h2/w1</property>
      <property value="27.4506">fsim/tables/max_climb_ms/h2/w2</property>
      <property value="18.1914">fsim/tables/max_climb_ms/h2/w3</property>
      <property value="30.1216">fsim/tables/max_climb_ms/h3/w0</property>
      <property value="19.5293">fsim/tables/max_climb_ms/h3/w1</property>
      <property value="16.2181">fsim/tables/max_climb_ms/h3/w2</property>
      <property value="9.3978">fsim/tables/max_climb_ms/h3/w3</property>
      <property value="19.5208">fsim/tables/max_climb_ms/h4/w0</property>
      <property value="11.5145">fsim/tables/max_climb_ms/h4/w1</property>
      <property value="8.87764">fsim/tables/max_climb_ms/h4/w2</property>
      <property value="3.81391">fsim/tables/max_climb_ms/h4/w3</property>
      <property value="14.4123">fsim/tables/max_climb_ms/h5/w0</property>
      <property value="7.36036">fsim/tables/max_climb_ms/h5/w1</property>
      <property value="4.99498">fsim/tables/max_climb_ms/h5/w2</property>
      <property value="8.6703">fsim/tables/max_climb_ms/h6/w0</property>
      <property value="2.75701">fsim/tables/max_climb_ms/h6/w1</property>
      <property value="309.407">fsim/tables/max_tas_ms/h0/w0</property>
      <property value="308.121">fsim/tables/max_tas_ms/h0/w1</property>
      <property value="307.921">fsim/tables/max_tas_ms/h0/w2</property>
      <property value="307.681">fsim/tables/max_tas_ms/h0/w3</property>
      <property value="297.965">fsim/tables/max_tas_ms/h1/w0</property>
      <property value="297.436">fsim/tables/max_tas_ms/h1/w1</property>
      <property value="297.348">fsim/tables/max_tas_ms/h1/w2</property>
      <property value="297.002">fsim/tables/max_tas_ms/h1/w3</property>
      <property value="286.412">fsim/tables/max_tas_ms/h2/w0</property>
      <property value="286.033">fsim/tables/max_tas_ms/h2/w1</property>
      <property value="285.848">fsim/tables/max_tas_ms/h2/w2</property>
      <property value="285.302">fsim/tables/max_tas_ms/h2/w3</property>
      <property value="274.425">fsim/tables/max_tas_ms/h3/w0</property>
      <property value="273.808">fsim/tables/max_tas_ms/h3/w1</property>
      <property value="273.482">fsim/tables/max_tas_ms/h3/w2</property>
      <property value="272.445">fsim/tables/max_tas_ms/h3/w3</property>
      <property value="268.764">fsim/tables/max_tas_ms/h4/w0</property>
      <property value="267.695">fsim/tables/max_tas_ms/h4/w1</property>
      <property value="267.177">fsim/tables/max_tas_ms/h4/w2</property>
      <property value="262.113">fsim/tables/max_tas_ms/h4/w3</property>
      <property value="268.465">fsim/tables/max_tas_ms/h5/w0</property>
      <property value="267.15">fsim/tables/max_tas_ms/h5/w1</property>
      <property value="263.057">fsim/tables/max_tas_ms/h5/w2</property>
      <property value="267.01">fsim/tables/max_tas_ms/h6/w0</property>
      <property value="258.091">fsim/tables/max_tas_ms/h6/w1</property>
      <property value="122.487">fsim/tables/min_tas_ms/h0/w0</property>
      <property value="90.113">fsim/tables/min_tas_ms/h0/w1</property>
      <property value="89.6179">fsim/tables/min_tas_ms/h0/w2</property>
      <property value="115.024">fsim/tables/min_tas_ms/h0/w3</property>
      <property value="90.4647">fsim/tables/min_tas_ms/h1/w0</property>
      <property value="95.0832">fsim/tables/min_tas_ms/h1/w1</property>
      <property value="96.9263">fsim/tables/min_tas_ms/h1/w2</property>
      <property value="108.728">fsim/tables/min_tas_ms/h1/w3</property>
      <property value="96.0606">fsim/tables/min_tas_ms/h2/w0</property>
      <property value="105.643">fsim/tables/min_tas_ms/h2/w1</property>
      <property value="109.677">fsim/tables/min_tas_ms/h2/w2</property>
      <property value="126.934">fsim/tables/min_tas_ms/h2/w3</property>
      <property value="107.908">fsim/tables/min_tas_ms/h3/w0</property>
      <property value="122.34">fsim/tables/min_tas_ms/h3/w1</property>
      <property value="128.65">fsim/tables/min_tas_ms/h3/w2</property>
      <property value="150.906">fsim/tables/min_tas_ms/h3/w3</property>
      <property value="123.107">fsim/tables/min_tas_ms/h4/w0</property>
      <property value="142.01">fsim/tables/min_tas_ms/h4/w1</property>
      <property value="151.432">fsim/tables/min_tas_ms/h4/w2</property>
      <property value="198.234">fsim/tables/min_tas_ms/h4/w3</property>
      <property value="137.557">fsim/tables/min_tas_ms/h5/w0</property>
      <property value="160.158">fsim/tables/min_tas_ms/h5/w1</property>
      <property value="171.846">fsim/tables/min_tas_ms/h5/w2</property>
      <property value="154.151">fsim/tables/min_tas_ms/h6/w0</property>
      <property value="204.375">fsim/tables/min_tas_ms/h6/w1</property>
      <property value="62.7102">fsim/tables/ps_full_ms/h0/w0/v0</property>
      <property value="67.5069">fsim/tables/ps_full_ms/h0/w0/v1</property>
      <property value="98.0909">fsim/tables/ps_full_ms/h0/w0/v10</property>
      <property value="99.2649">fsim/tables/ps_full_ms/h0/w0/v11</property>
      <property value="99.7962">fsim/tables/ps_full_ms/h0/w0/v12</property>
      <property value="98.5083">fsim/tables/ps_full_ms/h0/w0/v13</property>
      <property value="89.3931">fsim/tables/ps_full_ms/h0/w0/v14</property>
      <property value="48.7485">fsim/tables/ps_full_ms/h0/w0/v15</property>
      <property value="72.1719">fsim/tables/ps_full_ms/h0/w0/v2</property>
      <property value="76.657">fsim/tables/ps_full_ms/h0/w0/v3</property>
      <property value="80.8336">fsim/tables/ps_full_ms/h0/w0/v4</property>
      <property value="84.6696">fsim/tables/ps_full_ms/h0/w0/v5</property>
      <property value="88.0843">fsim/tables/ps_full_ms/h0/w0/v6</property>
      <property value="91.0983">fsim/tables/ps_full_ms/h0/w0/v7</property>
      <property value="93.864">fsim/tables/ps_full_ms/h0/w0/v8</property>
      <property value="96.2523">fsim/tables/ps_full_ms/h0/w0/v9</property>
      <property value="32.3472">fsim/tables/ps_full_ms/h0/w1/v0</property>
      <property value="37.2378">fsim/tables/ps_full_ms/h0/w1/v1</property>
      <property value="66.8994">fsim/tables/ps_full_ms/h0/w1/v10</property>
      <property value="68.3636">fsim/tables/ps_full_ms/h0/w1/v11</property>
      <property value="69.1735">fsim/tables/ps_full_ms/h0/w1/v12</property>
      <property value="69.223">fsim/tables/ps_full_ms/h0/w1/v13</property>
      <property value="66.1952">fsim/tables/ps_full_ms/h0/w1/v14</property>
      <property value="37.3438">fsim/tables/ps_full_ms/h0/w1/v15</property>
      <property value="41.4548">fsim/tables/ps_full_ms/h0/w1/v2</property>
      <property value="45.3049">fsim/tables/ps_full_ms/h0/w1/v3</property>
      <property value="49.102">fsim/tables/ps_full_ms/h0/w1/v4</property>
      <property value="53.0638">fsim/tables/ps_full_ms/h0/w1/v5</property>
      <property value="56.7521">fsim/tables/ps_full_ms/h0/w1/v6</property>
      <property value="59.7886">fsim/tables/ps_full_ms/h0/w1/v7</property>
      <property value="62.2695">fsim/tables/ps_full_ms/h0/w1/v8</property>
      <property value="64.7393">fsim/tables/ps_full_ms/h0/w1/v9</property>
      <property value="27.2611">fsim/tables/ps_full_ms/h0/w2/v0</property>
      <property value="31.7465">fsim/tables/ps_full_ms/h0/w2/v1</property>
      <property value="57.6897">fsim/tables/ps_full_ms/h0/w2/v10</property>
      <property value="59.1463">fsim/tables/ps_full_ms/h0/w2/v11</property>
      <property value="59.9456">fsim/tables/ps_full_ms/h0/w2/v12</property>
      <property value="60.0269">fsim/tables/ps_full_ms/h0/w2/v13</property>
      <property value="57.571">fsim/tables/ps_full_ms/h0/w2/v14</property>
      <property value="32.6983">fsim/tables/ps_full_ms/h0/w2/v15</property>
      <property value="35.3644">fsim/tables/ps_full_ms/h0/w2/v2</property>
      <property value="38.7128">fsim/tables/ps_full_ms/h0/w2/v3</property>
      <property value="41.9908">fsim/tables/ps_full_ms/h0/w2/v4</property>
      <property value="45.4976">fsim/tables/ps_full_ms/h0/w2/v5</property>
      <property value="48.7987">fsim/tables/ps_full_ms/h0/w2/v6</property>
      <property value="51.5608">fsim/tables/ps_full_ms/h0/w2/v7</property>
      <property value="53.7058">fsim/tables/ps_full_ms/h0/w2/v8</property>
      <property value="55.8336">fsim/tables/ps_full_ms/h0/w2/v9</property>
      <property value="23.7355">fsim/tables/ps_full_ms/h0/w3/v0</property>
      <property value="26.2512">fsim/tables/ps_full_ms/h0/w3/v1</property>
      <property value="41.1893">fsim/tables/ps_full_ms/h0/w3/v10</property>
      <property value="41.8944">fsim/tables/ps_full_ms/h0/w3/v11</property>
      <property value="42.3375">fsim/tables/ps_full_ms/h0/w3/v12</property>
      <property value="42.2766">fsim/tables/ps_full_ms/h0/w3/v13</property>
      <property value="40.5669">fsim/tables/ps_full_ms/h0/w3/v14</property>
      <property value="23.3767">fsim/tables/ps_full_ms/h0/w3/v15</property>
      <property value="28.4093">fsim/tables/ps_full_ms/h0/w3/v2</property>
      <property value="30.626">fsim/tables/ps_full_ms/h0/w3/v3</property>
      <property value="32.5401">fsim/tables/ps_full_ms/h0/w3/v4</property>
      <property value="34.2204">fsim/tables/ps_full_ms/h0/w3/v5</property>
      <property value="35.9231">fsim/tables/ps_full_ms/h0/w3/v6</property>
      <property value="37.4804">fsim/tables/ps_full_ms/h0/w3/v7</property>
      <property value="39.027">fsim/tables/ps_full_ms/h0/w3/v8</property>
      <property value="40.2165">fsim/tables/ps_full_ms/h0/w3/v9</property>
      <property value="33.6448">fsim/tables/ps_full_ms/h1/w0/v0</property>
      <property value="38.371">fsim/tables/ps_full_ms/h1/w0/v1</property>
      <property value="67.7607">fsim/tables/ps_full_ms/h1/w0/v10</property>
      <property value="69.2345">fsim/tables/ps_full_ms/h1/w0/v11</property>
      <property value="70.1107">fsim/tables/ps_full_ms/h1/w0/v12</property>
      <property value="70.1732">fsim/tables/ps_full_ms/h1/w0/v13</property>
      <property value="66.7608">fsim/tables/ps_full_ms/h1/w0/v14</property>
      <property value="38.0769">fsim/tables/ps_full_ms/h1/w0/v15</property>
      <property value="42.4749">fsim/tables/ps_full_ms/h1/w0/v2</property>
      <property value="46.2311">fsim/tables/ps_full_ms/h1/w0/v3</property>
      <property value="50.0603">fsim/tables/ps_full_ms/h1/w0/v4</property>
      <property value="53.9676">fsim/tables/ps_full_ms/h1/w0/v5</property>
      <property value="57.5546">fsim/tables/ps_full_ms/h1/w0/v6</property>
      <property value="60.5777">fsim/tables/ps_full_ms/h1/w0/v7</property>
      <property value="63.1089">fsim/tables/ps_full_ms/h1/w0/v8</property>
      <property value="65.5832">fsim/tables/ps_full_ms/h1/w0/v9</property>
      <property value="22.9145">fsim/tables/ps_full_ms/h1/w1/v0</property>
      <property value="26.393">fsim/tables/ps_full_ms/h1/w1/v1</property>
      <property value="46.4519">fsim/tables/ps_full_ms/h1/w1/v10</property>
      <property value="47.5817">fsim/tables/ps_full_ms/h1/w1/v11</property>
      <property value="48.343">fsim/tables/ps_full_ms/h1/w1/v12</property>
      <property value="48.5999">fsim/tables/ps_full_ms/h1/w1/v13</property>
      <property value="46.6959">fsim/tables/ps_full_ms/h1/w1/v14</property>
      <property value="27.0938">fsim/tables/ps_full_ms/h1/w1/v15</property>
      <property value="29.1171">fsim/tables/ps_full_ms/h1/w1/v2</property>
      <property value="31.6142">fsim/tables/ps_full_ms/h1/w1/v3</property>
      <property value="34.2683">fsim/tables/ps_full_ms/h1/w1/v4</property>
      <property value="37.1214">fsim/tables/ps_full_ms/h1/w1/v5</property>
      <property value="39.5907">fsim/tables/ps_full_ms/h1/w1/v6</property>
      <property value="41.6414">fsim/tables/ps_full_ms/h1/w1/v7</property>
      <property value="43.4161">fsim/tables/ps_full_ms/h1/w1/v8</property>
      <property value="45.0348">fsim/tables/ps_full_ms/h1/w1/v9</property>
      <property value="19.3596">fsim/tables/ps_full_ms/h1/w2/v0</property>
      <property value="22.6053">fsim/tables/ps_full_ms/h1/w2/v1</property>
      <property value="40.0451">fsim/tables/ps_full_ms/h1/w2/v10</property>
      <property value="40.9762">fsim/tables/ps_full_ms/h1/w2/v11</property>
      <property value="41.5777">fsim/tables/ps_full_ms/h1/w2/v12</property>
      <property value="41.7677">fsim/tables/ps_full_ms/h1/w2/v13</property>
      <property value="40.3173">fsim/tables/ps_full_ms/h1/w2/v14</property>
      <property value="23.4561">fsim/tables/ps_full_ms/h1/w2/v15</property>
      <property value="24.847">fsim/tables/ps_full_ms/h1/w2/v2</property>
      <property value="26.9894">fsim/tables/ps_full_ms/h1/w2/v3</property>
      <property value="29.2693">fsim/tables/ps_full_ms/h1/w2/v4</property>
      <property value="31.859">fsim/tables/ps_full_ms/h1/w2/v5</property>
      <property value="34.0903">fsim/tables/ps_full_ms/h1/w2/v6</property>
      <property value="35.7984">fsim/tables/ps_full_ms/h1/w2/v7</property>
      <property value="37.2559">fsim/tables/ps_full_ms/h1/w2/v8</property>
      <property value="38.8062">fsim/tables/ps_full_ms/h1/w2/v9</property>
      <property value="11.9813">fsim/tables/ps_full_ms/h1/w3/v0</property>
      <property value="15.8263">fsim/tables/ps_full_ms/h1/w3/v1</property>
      <property value="27.8515">fsim/tables/ps_full_ms/h1/w3/v10</property>
      <property value="28.5233">fsim/tables/ps_full_ms/h1/w3/v11</property>
      <property value="28.9125">fsim/tables/ps_full_ms/h1/w3/v12</property>
      <property value="28.9064">fsim/tables/ps_full_ms/h1/w3/v13</property>
      <property value="27.8415">fsim/tables/ps_full_ms/h1/w3/v14</property>
      <property value="16.2374">fsim/tables/ps_full_ms/h1/w3/v15</property>
      <property value="17.1187">fsim/tables/ps_full_ms/h1/w3/v2</property>
      <property value="18.8694">fsim/tables/ps_full_ms/h1/w3/v3</property>
      <property value="20.5163">fsim/tables/ps_full_ms/h1/w3/v4</property>
      <property value="22.1225">fsim/tables/ps_full_ms/h1/w3/v5</property>
      <property value="23.7088">fsim/tables/ps_full_ms/h1/w3/v6</property>
      <property value="24.8465">fsim/tables/ps_full_ms/h1/w3/v7</property>
      <property value="25.9584">fsim/tables/ps_full_ms/h1/w3/v8</property>
      <property value="26.9877">fsim/tables/ps_full_ms/h1/w3/v9</property>
      <property value="22.8672">fsim/tables/ps_full_ms/h2/w0/v0</property>
      <property value="26.148">fsim/tables/ps_full_ms/h2/w0/v1</property>
      <property value="45.2456">fsim/tables/ps_full_ms/h2/w0/v10</property>
      <property value="46.3343">fsim/tables/ps_full_ms/h2/w0/v11</property>
      <property value="47.1425">fsim/tables/ps_full_ms/h2/w0/v12</property>
      <property value="47.4315">fsim/tables/ps_full_ms/h2/w0/v13</property>
      <property value="45.5535">fsim/tables/ps_full_ms/h2/w0/v14</property>
      <property value="27.0263">fsim/tables/ps_full_ms/h2/w0/v15</property>
      <property value="28.6547">fsim/tables/ps_full_ms/h2/w0/v2</property>
      <property value="31.0083">fsim/tables/ps_full_ms/h2/w0/v3</property>
      <property value="33.5941">fsim/tables/ps_full_ms/h2/w0/v4</property>
      <property value="36.2547">fsim/tables/ps_full_ms/h2/w0/v5</property>
      <property value="38.5649">fsim/tables/ps_full_ms/h2/w0/v6</property>
      <property value="40.4656">fsim/tables/ps_full_ms/h2/w0/v7</property>
      <property value="42.3082">fsim/tables/ps_full_ms/h2/w0/v8</property>
      <property value="43.8927">fsim/tables/ps_full_ms/h2/w0/v9</property>
      <property value="15.359">fsim/tables/ps_full_ms/h2/w1/v0</property>
      <property value="17.7999">fsim/tables/ps_full_ms/h2/w1/v1</property>
      <property value="30.7547">fsim/tables/ps_full_ms/h2/w1/v10</property>
      <property value="31.5281">fsim/tables/ps_full_ms/h2/w1/v11</property>
      <property value="31.9625">fsim/tables/ps_full_ms/h2/w1/v12</property>
      <property value="32.0138">fsim/tables/ps_full_ms/h2/w1/v13</property>
      <property value="30.8826">fsim/tables/ps_full_ms/h2/w1/v14</property>
      <property value="18.4251">fsim/tables/ps_full_ms/h2/w1/v15</property>
      <property value="19.3142">fsim/tables/ps_full_ms/h2/w1/v2</property>
      <property value="20.8773">fsim/tables/ps_full_ms/h2/w1/v3</property>
      <property value="22.8353">fsim/tables/ps_full_ms/h2/w1/v4</property>
      <property value="24.7586">fsim/tables/ps_full_ms/h2/w1/v5</property>
      <property value="26.2076">fsim/tables/ps_full_ms/h2/w1/v6</property>
      <property value="27.3651">fsim/tables/ps_full_ms/h2/w1/v7</property>
      <property value="28.6373">fsim/tables/ps_full_ms/h2/w1/v8</property>
      <property value="29.7543">fsim/tables/ps_full_ms/h2/w1/v9</property>
      <property value="12.7802">fsim/tables/ps_full_ms/h2/w2/v0</property>
      <property value="15.0038">fsim/tables/ps_full_ms/h2/w2/v1</property>
      <property value="26.1697">fsim/tables/ps_full_ms/h2/w2/v10</property>
      <property value="26.8004">fsim/tables/ps_full_ms/h2/w2/v11</property>
      <property value="27.318">fsim/tables/ps_full_ms/h2/w2/v12</property>
      <property value="27.3107">fsim/tables/ps_full_ms/h2/w2/v13</property>
      <property value="26.349">fsim/tables/ps_full_ms/h2/w2/v14</property>
      <property value="15.6921">fsim/tables/ps_full_ms/h2/w2/v15</property>
      <property value="16.2932">fsim/tables/ps_full_ms/h2/w2/v2</property>
      <property value="17.5284">fsim/tables/ps_full_ms/h2/w2/v3</property>
      <property value="19.3711">fsim/tables/ps_full_ms/h2/w2/v4</property>
      <property value="21.0941">fsim/tables/ps_full_ms/h2/w2/v5</property>
      <property value="22.2">fsim/tables/ps_full_ms/h2/w2/v6</property>
      <property value="23.2299">fsim/tables/ps_full_ms/h2/w2/v7</property>
      <property value="24.3635">fsim/tables/ps_full_ms/h2/w2/v8</property>
      <property value="25.3976">fsim/tables/ps_full_ms/h2/w2/v9</property>
      <property value="8.91675">fsim/tables/ps_full_ms/h2/w3/v0</property>
      <property value="9.39911">fsim/tables/ps_full_ms/h2/w3/v1</property>
      <property value="17.3902">fsim/tables/ps_full_ms/h2/w3/v10</property>
      <property value="17.8686">fsim/tables/ps_full_ms/h2/w3/v11</property>
      <property value="18.1208">fsim/tables/ps_full_ms/h2/w3/v12</property>
      <property value="18.0509">fsim/tables/ps_full_ms/h2/w3/v13</property>
      <property value="17.4912">fsim/tables/ps_full_ms/h2/w3/v14</property>
      <property value="10.4744">fsim/tables/ps_full_ms/h2/w3/v15</property>
      <property value="10.6352">fsim/tables/ps_full_ms/h2/w3/v2</property>
      <property value="11.7713">fsim/tables/ps_full_ms/h2/w3/v3</property>
      <property value="12.7973">fsim/tables/ps_full_ms/h2/w3/v4</property>
      <property value="13.9319">fsim/tables/ps_full_ms/h2/w3/v5</property>
      <property value="14.648">fsim/tables/ps_full_ms/h2/w3/v6</property>
      <property value="15.4698">fsim/tables/ps_full_ms/h2/w3/v7</property>
      <property value="16.2326">fsim/tables/ps_full_ms/h2/w3/v8</property>
      <property value="16.8712">fsim/tables/ps_full_ms/h2/w3/v9</property>
      <property value="14.6743">fsim/tables/ps_full_ms/h3/w0/v0</property>
      <property value="16.9105">fsim/tables/ps_full_ms/h3/w0/v1</property>
      <property value="28.6882">fsim/tables/ps_full_ms/h3/w0/v10</property>
      <property value="29.4419">fsim/tables/ps_full_ms/h3/w0/v11</property>
      <property value="29.9741">fsim/tables/ps_full_ms/h3/w0/v12</property>
      <property value="29.9869">fsim/tables/ps_full_ms/h3/w0/v13</property>
      <property value="28.7351">fsim/tables/ps_full_ms/h3/w0/v14</property>
      <property value="17.6609">fsim/tables/ps_full_ms/h3/w0/v15</property>
      <property value="18.2643">fsim/tables/ps_full_ms/h3/w0/v2</property>
      <property value="19.7142">fsim/tables/ps_full_ms/h3/w0/v3</property>
      <property value="21.4803">fsim/tables/ps_full_ms/h3/w0/v4</property>
      <property value="23.1562">fsim/tables/ps_full_ms/h3/w0/v5</property>
      <property value="24.5067">fsim/tables/ps_full_ms/h3/w0/v6</property>
      <property value="25.5793">fsim/tables/ps_full_ms/h3/w0/v7</property>
      <property value="26.7597">fsim/tables/ps_full_ms/h3/w0/v8</property>
      <property value="27.7837">fsim/tables/ps_full_ms/h3/w0/v9</property>
      <property value="9.13245">fsim/tables/ps_full_ms/h3/w1/v0</property>
      <property value="10.6549">fsim/tables/ps_full_ms/h3/w1/v1</property>
      <property value="18.6164">fsim/tables/ps_full_ms/h3/w1/v10</property>
      <property value="19.1401">fsim/tables/ps_full_ms/h3/w1/v11</property>
      <property value="19.4466">fsim/tables/ps_full_ms/h3/w1/v12</property>
      <property value="19.4188">fsim/tables/ps_full_ms/h3/w1/v13</property>
      <property value="18.6823">fsim/tables/ps_full_ms/h3/w1/v14</property>
      <property value="11.5872">fsim/tables/ps_full_ms/h3/w1/v15</property>
      <property value="11.4245">fsim/tables/ps_full_ms/h3/w1/v2</property>
      <property value="12.7304">fsim/tables/ps_full_ms/h3/w1/v3</property>
      <property value="13.9527">fsim/tables/ps_full_ms/h3/w1/v4</property>
      <property value="14.8662">fsim/tables/ps_full_ms/h3/w1/v5</property>
      <property value="15.6729">fsim/tables/ps_full_ms/h3/w1/v6</property>
      <property value="16.5519">fsim/tables/ps_full_ms/h3/w1/v7</property>
      <property value="17.3587">fsim/tables/ps_full_ms/h3/w1/v8</property>
      <property value="18.0336">fsim/tables/ps_full_ms/h3/w1/v9</property>
      <property value="7.09527">fsim/tables/ps_full_ms/h3/w2/v0</property>
      <property value="8.39849">fsim/tables/ps_full_ms/h3/w2/v1</property>
      <property value="15.378">fsim/tables/ps_full_ms/h3/w2/v10</property>
      <property value="15.7736">fsim/tables/ps_full_ms/h3/w2/v11</property>
      <property value="16.1478">fsim/tables/ps_full_ms/h3/w2/v12</property>
      <property value="16.08">fsim/tables/ps_full_ms/h3/w2/v13</property>
      <property value="15.4119">fsim/tables/ps_full_ms/h3/w2/v14</property>
      <property value="9.4819">fsim/tables/ps_full_ms/h3/w2/v15</property>
      <property value="8.91425">fsim/tables/ps_full_ms/h3/w2/v2</property>
      <property value="10.5709">fsim/tables/ps_full_ms/h3/w2/v3</property>
      <property value="11.2677">fsim/tables/ps_full_ms/h3/w2/v4</property>
      <property value="12.0478">fsim/tables/ps_full_ms/h3/w2/v5</property>
      <property value="12.9047">fsim/tables/ps_full_ms/h3/w2/v6</property>
      <property value="13.61">fsim/tables/ps_full_ms/h3/w2/v7</property>
      <property value="14.2714">fsim/tables/ps_full_ms/h3/w2/v8</property>
      <property value="14.8913">fsim/tables/ps_full_ms/h3/w2/v9</property>
      <property value="2.44872">fsim/tables/ps_full_ms/h3/w3/v0</property>
      <property value="4.35304">fsim/tables/ps_full_ms/h3/w3/v1</property>
      <property value="8.90734">fsim/tables/ps_full_ms/h3/w3/v10</property>
      <property value="9.15212">fsim/tables/ps_full_ms/h3/w3/v11</property>
      <property value="9.37953">fsim/tables/ps_full_ms/h3/w3/v12</property>
      <property value="9.32421">fsim/tables/ps_full_ms/h3/w3/v13</property>
      <property value="8.77677">fsim/tables/ps_full_ms/h3/w3/v14</property>
      <property value="5.25822">fsim/tables/ps_full_ms/h3/w3/v15</property>
      <property value="4.53034">fsim/tables/ps_full_ms/h3/w3/v2</property>
      <property value="5.58355">fsim/tables/ps_full_ms/h3/w3/v3</property>
      <property value="6.04306">fsim/tables/ps_full_ms/h3/w3/v4</property>
      <property value="6.73354">fsim/tables/ps_full_ms/h3/w3/v5</property>
      <property value="7.28836">fsim/tables/ps_full_ms/h3/w3/v6</property>
      <property value="7.73093">fsim/tables/ps_full_ms/h3/w3/v7</property>
      <property value="8.1868">fsim/tables/ps_full_ms/h3/w3/v8</property>
      <property value="8.55324">fsim/tables/ps_full_ms/h3/w3/v9</property>
      <property value="9.43741">fsim/tables/ps_full_ms/h4/w0/v0</property>
      <property value="10.8107">fsim/tables/ps_full_ms/h4/w0/v1</property>
      <property value="18.6304">fsim/tables/ps_full_ms/h4/w0/v10</property>
      <property value="19.143">fsim/tables/ps_full_ms/h4/w0/v11</property>
      <property value="19.4556">fsim/tables/ps_full_ms/h4/w0/v12</property>
      <property value="19.4151">fsim/tables/ps_full_ms/h4/w0/v13</property>
      <property value="18.5169">fsim/tables/ps_full_ms/h4/w0/v14</property>
      <property value="11.6892">fsim/tables/ps_full_ms/h4/w0/v15</property>
      <property value="11.8108">fsim/tables/ps_full_ms/h4/w0/v2</property>
      <property value="12.8356">fsim/tables/ps_full_ms/h4/w0/v3</property>
      <property value="14.0682">fsim/tables/ps_full_ms/h4/w0/v4</property>
      <property value="15.0046">fsim/tables/ps_full_ms/h4/w0/v5</property>
      <property value="15.7815">fsim/tables/ps_full_ms/h4/w0/v6</property>
      <property value="16.6033">fsim/tables/ps_full_ms/h4/w0/v7</property>
      <property value="17.4043">fsim/tables/ps_full_ms/h4/w0/v8</property>
      <property value="18.0594">fsim/tables/ps_full_ms/h4/w0/v9</property>
      <property value="4.78042">fsim/tables/ps_full_ms/h4/w1/v0</property>
      <property value="5.44682">fsim/tables/ps_full_ms/h4/w1/v1</property>
      <property value="10.9382">fsim/tables/ps_full_ms/h4/w1/v10</property>
      <property value="11.2885">fsim/tables/ps_full_ms/h4/w1/v11</property>
      <property value="11.5126">fsim/tables/ps_full_ms/h4/w1/v12</property>
      <property value="11.4549">fsim/tables/ps_full_ms/h4/w1/v13</property>
      <property value="10.8434">fsim/tables/ps_full_ms/h4/w1/v14</property>
      <property value="6.78976">fsim/tables/ps_full_ms/h4/w1/v15</property>
      <property value="6.42493">fsim/tables/ps_full_ms/h4/w1/v2</property>
      <property value="7.19729">fsim/tables/ps_full_ms/h4/w1/v3</property>
      <property value="7.82351">fsim/tables/ps_full_ms/h4/w1/v4</property>
      <property value="8.49926">fsim/tables/ps_full_ms/h4/w1/v5</property>
      <property value="9.07566">fsim/tables/ps_full_ms/h4/w1/v6</property>
      <property value="9.65055">fsim/tables/ps_full_ms/h4/w1/v7</property>
      <property value="10.1244">fsim/tables/ps_full_ms/h4/w1/v8</property>
      <property value="10.5933">fsim/tables/ps_full_ms/h4/w1/v9</property>
      <property value="3.58247">fsim/tables/ps_full_ms/h4/w2/v0</property>
      <property value="3.50348">fsim/tables/ps_full_ms/h4/w2/v1</property>
      <property value="8.4259">fsim/tables/ps_full_ms/h4/w2/v10</property>
      <property value="8.65738">fsim/tables/ps_full_ms/h4/w2/v11</property>
      <property value="8.84702">fsim/tables/ps_full_ms/h4/w2/v12</property>
      <property value="8.85374">fsim/tables/ps_full_ms/h4/w2/v13</property>
      <property value="8.22779">fsim/tables/ps_full_ms/h4/w2/v14</property>
      <property value="5.02562">fsim/tables/ps_full_ms/h4/w2/v15</property>
      <property value="4.44128">fsim/tables/ps_full_ms/h4/w2/v2</property>
      <property value="5.20516">fsim/tables/ps_full_ms/h4/w2/v3</property>
      <property value="5.73654">fsim/tables/ps_full_ms/h4/w2/v4</property>
      <property value="6.31913">fsim/tables/ps_full_ms/h4/w2/v5</property>
      <property value="6.86019">fsim/tables/ps_full_ms/h4/w2/v6</property>
      <property value="7.283">fsim/tables/ps_full_ms/h4/w2/v7</property>
      <property value="7.72813">fsim/tables/ps_full_ms/h4/w2/v8</property>
      <property value="8.06707">fsim/tables/ps_full_ms/h4/w2/v9</property>
      <property value="1.01641">fsim/tables/ps_full_ms/h4/w3/v0</property>
      <property value="1.34051">fsim/tables/ps_full_ms/h4/w3/v1</property>
      <property value="3.51867">fsim/tables/ps_full_ms/h4/w3/v10</property>
      <property value="3.64698">fsim/tables/ps_full_ms/h4/w3/v11</property>
      <property value="3.77528">fsim/tables/ps_full_ms/h4/w3/v12</property>
      <property value="3.25909">fsim/tables/ps_full_ms/h4/w3/v13</property>
      <property value="2.46529">fsim/tables/ps_full_ms/h4/w3/v14</property>
      <property value="1.67149">fsim/tables/ps_full_ms/h4/w3/v15</property>
      <property value="1.66461">fsim/tables/ps_full_ms/h4/w3/v2</property>
      <property value="1.9887">fsim/tables/ps_full_ms/h4/w3/v3</property>
      <property value="2.3128">fsim/tables/ps_full_ms/h4/w3/v4</property>
      <property value="2.6369">fsim/tables/ps_full_ms/h4/w3/v5</property>
      <property value="2.961">fsim/tables/ps_full_ms/h4/w3/v6</property>
      <property value="3.13374">fsim/tables/ps_full_ms/h4/w3/v7</property>
      <property value="3.26205">fsim/tables/ps_full_ms/h4/w3/v8</property>
      <property value="3.39036">fsim/tables/ps_full_ms/h4/w3/v9</property>
      <property value="6.77952">fsim/tables/ps_full_ms/h5/w0/v0</property>
      <property value="7.50915">fsim/tables/ps_full_ms/h5/w0/v1</property>
      <property value="13.7571">fsim/tables/ps_full_ms/h5/w0/v10</property>
      <property value="14.0932">fsim/tables/ps_full_ms/h5/w0/v11</property>
      <property value="14.388">fsim/tables/ps_full_ms/h5/w0/v12</property>
      <property value="14.3979">fsim/tables/ps_full_ms/h5/w0/v13</property>
      <property value="13.4557">fsim/tables/ps_full_ms/h5/w0/v14</property>
      <property value="8.63375">fsim/tables/ps_full_ms/h5/w0/v15</property>
      <property value="8.57795">fsim/tables/ps_full_ms/h5/w0/v2</property>
      <property value="9.33463">fsim/tables/ps_full_ms/h5/w0/v3</property>
      <property value="10.1811">fsim/tables/ps_full_ms/h5/w0/v4</property>
      <property value="10.8546">fsim/tables/ps_full_ms/h5/w0/v5</property>
      <property value="11.5579">fsim/tables/ps_full_ms/h5/w0/v6</property>
      <property value="12.1783">fsim/tables/ps_full_ms/h5/w0/v7</property>
      <property value="12.7855">fsim/tables/ps_full_ms/h5/w0/v8</property>
      <property value="13.2736">fsim/tables/ps_full_ms/h5/w0/v9</property>
      <property value="2.68016">fsim/tables/ps_full_ms/h5/w1/v0</property>
      <property value="2.84669">fsim/tables/ps_full_ms/h5/w1/v1</property>
      <property value="6.95627">fsim/tables/ps_full_ms/h5/w1/v10</property>
      <property value="7.24417">fsim/tables/ps_full_ms/h5/w1/v11</property>
      <property value="7.35327">fsim/tables/ps_full_ms/h5/w1/v12</property>
      <property value="7.35517">fsim/tables/ps_full_ms/h5/w1/v13</property>
      <property value="6.72152">fsim/tables/ps_full_ms/h5/w1/v14</property>
      <property value="4.07926">fsim/tables/ps_full_ms/h5/w1/v15</property>
      <property value="3.41271">fsim/tables/ps_full_ms/h5/w1/v2</property>
      <property value="4.0265">fsim/tables/ps_full_ms/h5/w1/v3</property>
      <property value="4.61504">fsim/tables/ps_full_ms/h5/w1/v4</property>
      <property value="5.11596">fsim/tables/ps_full_ms/h5/w1/v5</property>
      <property value="5.56385">fsim/tables/ps_full_ms/h5/w1/v6</property>
      <property value="5.97185">fsim/tables/ps_full_ms/h5/w1/v7</property>
      <property value="6.33742">fsim/tables/ps_full_ms/h5/w1/v8</property>
      <property value="6.68183">fsim/tables/ps_full_ms/h5/w1/v9</property>
      <property value="0.617293">fsim/tables/ps_full_ms/h5/w2/v0</property>
      <property value="1.2002">fsim/tables/ps_full_ms/h5/w2/v1</property>
      <property value="4.56091">fsim/tables/ps_full_ms/h5/w2/v10</property>
      <property value="4.77311">fsim/tables/ps_full_ms/h5/w2/v11</property>
      <property value="4.90472">fsim/tables/ps_full_ms/h5/w2/v12</property>
      <property value="4.97239">fsim/tables/ps_full_ms/h5/w2/v13</property>
      <property value="4.96127">fsim/tables/ps_full_ms/h5/w2/v14</property>
      <property value="3.5621">fsim/tables/ps_full_ms/h5/w2/v15</property>
      <property value="1.68483">fsim/tables/ps_full_ms/h5/w2/v2</property>
      <property value="2.14483">fsim/tables/ps_full_ms/h5/w2/v3</property>
      <property value="2.58353">fsim/tables/ps_full_ms/h5/w2/v4</property>
      <property value="3.00309">fsim/tables/ps_full_ms/h5/w2/v5</property>
      <property value="3.4187">fsim/tables/ps_full_ms/h5/w2/v6</property>
      <property value="3.72791">fsim/tables/ps_full_ms/h5/w2/v7</property>
      <property value="4.0553">fsim/tables/ps_full_ms/h5/w2/v8</property>
      <property value="4.30484">fsim/tables/ps_full_ms/h5/w2/v9</property>
      <property value="3.58002">fsim/tables/ps_full_ms/h6/w0/v0</property>
      <property value="3.96408">fsim/tables/ps_full_ms/h6/w0/v1</property>
      <property value="8.27151">fsim/tables/ps_full_ms/h6/w0/v10</property>
      <property value="8.48703">fsim/tables/ps_full_ms/h6/w0/v11</property>
      <property value="8.62109">fsim/tables/ps_full_ms/h6/w0/v12</property>
      <property value="8.62181">fsim/tables/ps_full_ms/h6/w0/v13</property>
      <property value="8.00003">fsim/tables/ps_full_ms/h6/w0/v14</property>
      <property value="4.80757">fsim/tables/ps_full_ms/h6/w0/v15</property>
      <property value="4.65679">fsim/tables/ps_full_ms/h6/w0/v2</property>
      <property value="5.27887">fsim/tables/ps_full_ms/h6/w0/v3</property>
      <property value="5.79598">fsim/tables/ps_full_ms/h6/w0/v4</property>
      <property value="6.30951">fsim/tables/ps_full_ms/h6/w0/v5</property>
      <property value="6.79531">fsim/tables/ps_full_ms/h6/w0/v6</property>
      <property value="7.21406">fsim/tables/ps_full_ms/h6/w0/v7</property>
      <property value="7.61984">fsim/tables/ps_full_ms/h6/w0/v8</property>
      <property value="7.933">fsim/tables/ps_full_ms/h6/w0/v9</property>
      <property value="1.16373">fsim/tables/ps_full_ms/h6/w1/v0</property>
      <property value="1.32481">fsim/tables/ps_full_ms/h6/w1/v1</property>
      <property value="2.519">fsim/tables/ps_full_ms/h6/w1/v10</property>
      <property value="2.56465">fsim/tables/ps_full_ms/h6/w1/v11</property>
      <property value="2.6103">fsim/tables/ps_full_ms/h6/w1/v12</property>
      <property value="2.65595">fsim/tables/ps_full_ms/h6/w1/v13</property>
      <property value="2.70159">fsim/tables/ps_full_ms/h6/w1/v14</property>
      <property value="2.74724">fsim/tables/ps_full_ms/h6/w1/v15</property>
      <property value="1.48588">fsim/tables/ps_full_ms/h6/w1/v2</property>
      <property value="1.64696">fsim/tables/ps_full_ms/h6/w1/v3</property>
      <property value="1.80803">fsim/tables/ps_full_ms/h6/w1/v4</property>
      <property value="1.96911">fsim/tables/ps_full_ms/h6/w1/v5</property>
      <property value="2.13018">fsim/tables/ps_full_ms/h6/w1/v6</property>
      <property value="2.29126">fsim/tables/ps_full_ms/h6/w1/v7</property>
      <property value="2.42771">fsim/tables/ps_full_ms/h6/w1/v8</property>
      <property value="2.47336">fsim/tables/ps_full_ms/h6/w1/v9</property>
      <property value="-6.10613">fsim/tables/ps_idle_ms/h0/w0/v0</property>
      <property value="-8.12354">fsim/tables/ps_idle_ms/h0/w0/v1</property>
      <property value="-50.0215">fsim/tables/ps_idle_ms/h0/w0/v10</property>
      <property value="-58.0363">fsim/tables/ps_idle_ms/h0/w0/v11</property>
      <property value="-67.015">fsim/tables/ps_idle_ms/h0/w0/v12</property>
      <property value="-78.7051">fsim/tables/ps_idle_ms/h0/w0/v13</property>
      <property value="-101.123">fsim/tables/ps_idle_ms/h0/w0/v14</property>
      <property value="-131.432">fsim/tables/ps_idle_ms/h0/w0/v15</property>
      <property value="-10.5197">fsim/tables/ps_idle_ms/h0/w0/v2</property>
      <property value="-13.5158">fsim/tables/ps_idle_ms/h0/w0/v3</property>
      <property value="-16.9708">fsim/tables/ps_idle_ms/h0/w0/v4</property>
      <property value="-20.9064">fsim/tables/ps_idle_ms/h0/w0/v5</property>
      <property value="-25.363">fsim/tables/ps_idle_ms/h0/w0/v6</property>
      <property value="-30.5953">fsim/tables/ps_idle_ms/h0/w0/v7</property>
      <property value="-36.4565">fsim/tables/ps_idle_ms/h0/w0/v8</property>
      <property value="-42.9102">fsim/tables/ps_idle_ms/h0/w0/v9</property>
      <property value="-3.39207">fsim/tables/ps_idle_ms/h0/w1/v0</property>
      <property value="-3.92565">fsim/tables/ps_idle_ms/h0/w1/v1</property>
      <property value="-30.3336">fsim/tables/ps_idle_ms/h0/w1/v10</property>
      <property value="-36.3508">fsim/tables/ps_idle_ms/h0/w1/v11</property>
      <property value="-43.1019">fsim/tables/ps_idle_ms/h0/w1/v12</property>
      <property value="-50.8667">fsim/tables/ps_idle_ms/h0/w1/v13</property>
      <property value="-63.1634">fsim/tables/ps_idle_ms/h0/w1/v14</property>
      <property value="-96.9382">fsim/tables/ps_idle_ms/h0/w1/v15</property>
      <property value="-4.90075">fsim/tables/ps_idle_ms/h0/w1/v2</property>
      <property value="-6.29905">fsim/tables/ps_idle_ms/h0/w1/v3</property>
      <property value="-8.1226">fsim/tables/ps_idle_ms/h0/w1/v4</property>
      <property value="-10.503">fsim/tables/ps_idle_ms/h0/w1/v5</property>
      <property value="-13.2906">fsim/tables/ps_idle_ms/h0/w1/v6</property>
      <property value="-16.7602">fsim/tables/ps_idle_ms/h0/w1/v7</property>
      <property value="-20.7329">fsim/tables/ps_idle_ms/h0/w1/v8</property>
      <property value="-25.229">fsim/tables/ps_idle_ms/h0/w1/v9</property>
      <property value="-3.78151">fsim/tables/ps_idle_ms/h0/w2/v0</property>
      <property value="-4.0686">fsim/tables/ps_idle_ms/h0/w2/v1</property>
      <property value="-26.6041">fsim/tables/ps_idle_ms/h0/w2/v10</property>
      <property value="-31.6934">fsim/tables/ps_idle_ms/h0/w2/v11</property>
      <property value="-37.5425">fsim/tables/ps_idle_ms/h0/w2/v12</property>
      <property value="-44.1641">fsim/tables/ps_idle_ms/h0/w2/v13</property>
      <property value="-54.5755">fsim/tables/ps_idle_ms/h0/w2/v14</property>
      <property value="-85.9534">fsim/tables/ps_idle_ms/h0/w2/v15</property>
      <property value="-4.81909">fsim/tables/ps_idle_ms/h0/w2/v2</property>
      <property value="-5.95179">fsim/tables/ps_idle_ms/h0/w2/v3</property>
      <property value="-7.50621">fsim/tables/ps_idle_ms/h0/w2/v4</property>
      <property value="-9.46947">fsim/tables/ps_idle_ms/h0/w2/v5</property>
      <property value="-11.9122">fsim/tables/ps_idle_ms/h0/w2/v6</property>
      <property value="-14.7681">fsim/tables/ps_idle_ms/h0/w2/v7</property>
      <property value="-18.246">fsim/tables/ps_idle_ms/h0/w2/v8</property>
      <property value="-22.186">fsim/tables/ps_idle_ms/h0/w2/v9</property>
      <property value="-5.00819">fsim/tables/ps_idle_ms/h0/w3/v0</property>
      <property value="-5.50816">fsim/tables/ps_idle_ms/h0/w3/v1</property>
      <property value="-22.0234">fsim/tables/ps_idle_ms/h0/w3/v10</property>
      <property value="-25.52">fsim/tables/ps_idle_ms/h0/w3/v11</property>
      <property value="-29.3886">fsim/tables/ps_idle_ms/h0/w3/v12</property>
      <property value="-33.5391">fsim/tables/ps_idle_ms/h0/w3/v13</property>
      <property value="-40.4014">fsim/tables/ps_idle_ms/h0/w3/v14</property>
      <property value="-63.2262">fsim/tables/ps_idle_ms/h0/w3/v15</property>
      <property value="-6.24937">fsim/tables/ps_idle_ms/h0/w3/v2</property>
      <property value="-7.25389">fsim/tables/ps_idle_ms/h0/w3/v3</property>
      <property value="-8.50073">fsim/tables/ps_idle_ms/h0/w3/v4</property>
      <property value="-10.0033">fsim/tables/ps_idle_ms/h0/w3/v5</property>
      <property value="-11.8177">fsim/tables/ps_idle_ms/h0/w3/v6</property>
      <property value="-13.9151">fsim/tables/ps_idle_ms/h0/w3/v7</property>
      <property value="-16.2191">fsim/tables/ps_idle_ms/h0/w3/v8</property>
      <property value="-18.9849">fsim/tables/ps_idle_ms/h0/w3/v9</property>
      <property value="-3.41613">fsim/tables/ps_idle_ms/h1/w0/v0</property>
      <property value="-3.99558">fsim/tables/ps_idle_ms/h1/w0/v1</property>
      <property value="-29.2535">fsim/tables/ps_idle_ms/h1/w0/v10</property>
      <property value="-34.9211">fsim/tables/ps_idle_ms/h1/w0/v11</property>
      <property value="-41.2604">fsim/tables/ps_idle_ms/h1/w0/v12</property>
      <property value="-48.7138">fsim/tables/ps_idle_ms/h1/w0/v13</property>
      <property value="-60.9701">fsim/tables/ps_idle_ms/h1/w0/v14</property>
      <property value="-93.3088">fsim/tables/ps_idle_ms/h1/w0/v15</property>
      <property value="-4.97712">fsim/tables/ps_idle_ms/h1/w0/v2</property>
      <property value="-6.35657">fsim/tables/ps_idle_ms/h1/w0/v3</property>
      <property value="-8.14122">fsim/tables/ps_idle_ms/h1/w0/v4</property>
      <property value="-10.4216">fsim/tables/ps_idle_ms/h1/w0/v5</property>
      <property value="-13.105">fsim/tables/ps_idle_ms/h1/w0/v6</property>
      <property value="-16.409">fsim/tables/ps_idle_ms/h1/w0/v7</property>
      <property value="-20.174">fsim/tables/ps_idle_ms/h1/w0/v8</property>
      <property value="-24.4304">fsim/tables/ps_idle_ms/h1/w0/v9</property>
      <property value="-4.41644">fsim/tables/ps_idle_ms/h1/w1/v0</property>
      <property value="-4.58906">fsim/tables/ps_idle_ms/h1/w1/v1</property>
      <property value="-21.5708">fsim/tables/ps_idle_ms/h1/w1/v10</property>
      <property value="-25.4018">fsim/tables/ps_idle_ms/h1/w1/v11</property>
      <property value="-29.6913">fsim/tables/ps_idle_ms/h1/w1/v12</property>
      <property value="-34.389">fsim/tables/ps_idle_ms/h1/w1/v13</property>
      <property value="-42.2191">fsim/tables/ps_idle_ms/h1/w1/v14</property>
      <property value="-68.1208">fsim/tables/ps_idle_ms/h1/w1/v15</property>
      <property value="-5.14769">fsim/tables/ps_idle_ms/h1/w1/v2</property>
      <property value="-6.02279">fsim/tables/ps_idle_ms/h1/w1/v3</property>
      <property value="-7.19267">fsim/tables/ps_idle_ms/h1/w1/v4</property>
      <property value="-8.72284">fsim/tables/ps_idle_ms/h1/w1/v5</property>
      <property value="-10.5526">fsim/tables/ps_idle_ms/h1/w1/v6</property>
      <property value="-12.755">fsim/tables/ps_idle_ms/h1/w1/v7</property>
      <property value="-15.2274">fsim/tables/ps_idle_ms/h1/w1/v8</property>
      <property value="-18.2357">fsim/tables/ps_idle_ms/h1/w1/v9</property>
      <property value="-4.87642">fsim/tables/ps_idle_ms/h1/w2/v0</property>
      <property value="-4.9028">fsim/tables/ps_idle_ms/h1/w2/v1</property>
      <property value="-19.2642">fsim/tables/ps_idle_ms/h1/w2/v10</property>
      <property value="-22.5736">fsim/tables/ps_idle_ms/h1/w2/v11</property>
      <property value="-26.3542">fsim/tables/ps_idle_ms/h1/w2/v12</property>
      <property value="-30.3463">fsim/tables/ps_idle_ms/h1/w2/v13</property>
      <property value="-36.7847">fsim/tables/ps_idle_ms/h1/w2/v14</property>
      <property value="-59.4895">fsim/tables/ps_idle_ms/h1/w2/v15</property>
      <property value="-5.33288">fsim/tables/ps_idle_ms/h1/w2/v2</property>
      <property value="-6.05361">fsim/tables/ps_idle_ms/h1/w2/v3</property>
      <property value="-7.04281">fsim/tables/ps_idle_ms/h1/w2/v4</property>
      <property value="-8.2988">fsim/tables/ps_idle_ms/h1/w2/v5</property>
      <property value="-9.84352">fsim/tables/ps_idle_ms/h1/w2/v6</property>
      <property value="-11.7283">fsim/tables/ps_idle_ms/h1/w2/v7</property>
      <property value="-13.9085">fsim/tables/ps_idle_ms/h1/w2/v8</property>
      <property value="-16.3444">fsim/tables/ps_idle_ms/h1/w2/v9</property>
      <property value="-5.93749">fsim/tables/ps_idle_ms/h1/w3/v0</property>
      <property value="-6.08108">fsim/tables/ps_idle_ms/h1/w3/v1</property>
      <property value="-15.6103">fsim/tables/ps_idle_ms/h1/w3/v10</property>
      <property value="-17.7527">fsim/tables/ps_idle_ms/h1/w3/v11</property>
      <property value="-20.3404">fsim/tables/ps_idle_ms/h1/w3/v12</property>
      <property value="-23.3204">fsim/tables/ps_idle_ms/h1/w3/v13</property>
      <property value="-27.4718">fsim/tables/ps_idle_ms/h1/w3/v14</property>
      <property value="-43.1102">fsim/tables/ps_idle_ms/h1/w3/v15</property>
      <property value="-6.18677">fsim/tables/ps_idle_ms/h1/w3/v2</property>
      <property value="-6.64771">fsim/tables/ps_idle_ms/h1/w3/v3</property>
      <property value="-7.30992">fsim/tables/ps_idle_ms/h1/w3/v4</property>
      <property value="-8.15362">fsim/tables/ps_idle_ms/h1/w3/v5</property>
      <property value="-9.19872">fsim/tables/ps_idle_ms/h1/w3/v6</property>
      <property value="-10.4958">fsim/tables/ps_idle_ms/h1/w3/v7</property>
      <property value="-11.9257">fsim/tables/ps_idle_ms/h1/w3/v8</property>
      <property value="-13.6665">fsim/tables/ps_idle_ms/h1/w3/v9</property>
      <property value="-4.39019">fsim/tables/ps_idle_ms/h2/w0/v0</property>
      <property value="-4.6751">fsim/tables/ps_idle_ms/h2/w0/v1</property>
      <property value="-20.0389">fsim/tables/ps_idle_ms/h2/w0/v10</property>
      <property value="-23.4849">fsim/tables/ps_idle_ms/h2/w0/v11</property>
      <property value="-27.2828">fsim/tables/ps_idle_ms/h2/w0/v12</property>
      <property value="-31.56">fsim/tables/ps_idle_ms/h2/w0/v13</property>
      <property value="-38.8656">fsim/tables/ps_idle_ms/h2/w0/v14</property>
      <property value="-63.3622">fsim/tables/ps_idle_ms/h2/w0/v15</property>
      <property value="-5.20408">fsim/tables/ps_idle_ms/h2/w0/v2</property>
      <property value="-6.02428">fsim/tables/ps_idle_ms/h2/w0/v3</property>
      <property value="-7.0998">fsim/tables/ps_idle_ms/h2/w0/v4</property>
      <property value="-8.50356">fsim/tables/ps_idle_ms/h2/w0/v5</property>
      <property value="-10.1508">fsim/tables/ps_idle_ms/h2/w0/v6</property>
      <property value="-12.1527">fsim/tables/ps_idle_ms/h2/w0/v7</property>
      <property value="-14.3788">fsim/tables/ps_idle_ms/h2/w0/v8</property>
      <property value="-17.0465">fsim/tables/ps_idle_ms/h2/w0/v9</property>
      <property value="-5.6493">fsim/tables/ps_idle_ms/h2/w1/v0</property>
      <property value="-5.64386">fsim/tables/ps_idle_ms/h2/w1/v1</property>
      <property value="-15.5953">fsim/tables/ps_idle_ms/h2/w1/v10</property>
      <property value="-17.8">fsim/tables/ps_idle_ms/h2/w1/v11</property>
      <property value="-20.4637">fsim/tables/ps_idle_ms/h2/w1/v12</property>
      <property value="-23.4799">fsim/tables/ps_idle_ms/h2/w1/v13</property>
      <property value="-27.9572">fsim/tables/ps_idle_ms/h2/w1/v14</property>
      <property value="-44.6008">fsim/tables/ps_idle_ms/h2/w1/v15</property>
      <property value="-5.92095">fsim/tables/ps_idle_ms/h2/w1/v2</property>
      <property value="-6.41648">fsim/tables/ps_idle_ms/h2/w1/v3</property>
      <property value="-7.11521">fsim/tables/ps_idle_ms/h2/w1/v4</property>
      <property value="-8.01763">fsim/tables/ps_idle_ms/h2/w1/v5</property>
      <property value="-9.08692">fsim/tables/ps_idle_ms/h2/w1/v6</property>
      <property value="-10.4033">fsim/tables/ps_idle_ms/h2/w1/v7</property>
      <property value="-11.8818">fsim/tables/ps_idle_ms/h2/w1/v8</property>
      <property value="-13.6598">fsim/tables/ps_idle_ms/h2/w1/v9</property>
      <property value="-6.17977">fsim/tables/ps_idle_ms/h2/w2/v0</property>
      <property value="-6.18807">fsim/tables/ps_idle_ms/h2/w2/v1</property>
      <property value="-14.3786">fsim/tables/ps_idle_ms/h2/w2/v10</property>
      <property value="-16.2538">fsim/tables/ps_idle_ms/h2/w2/v11</property>
      <property value="-18.3725">fsim/tables/ps_idle_ms/h2/w2/v12</property>
      <property value="-21.0476">fsim/tables/ps_idle_ms/h2/w2/v13</property>
      <property value="-24.7528">fsim/tables/ps_idle_ms/h2/w2/v14</property>
      <property value="-38.9663">fsim/tables/ps_idle_ms/h2/w2/v15</property>
      <property value="-6.27755">fsim/tables/ps_idle_ms/h2/w2/v2</property>
      <property value="-6.65474">fsim/tables/ps_idle_ms/h2/w2/v3</property>
      <property value="-7.22373">fsim/tables/ps_idle_ms/h2/w2/v4</property>
      <property value="-7.94783">fsim/tables/ps_idle_ms/h2/w2/v5</property>
      <property value="-8.88986">fsim/tables/ps_idle_ms/h2/w2/v6</property>
      <property value="-9.97204">fsim/tables/ps_idle_ms/h2/w2/v7</property>
      <property value="-11.2401">fsim/tables/ps_idle_ms/h2/w2/v8</property>
      <property value="-12.6724">fsim/tables/ps_idle_ms/h2/w2/v9</property>
      <property value="-7.45851">fsim/tables/ps_idle_ms/h2/w3/v0</property>
      <property value="-7.46226">fsim/tables/ps_idle_ms/h2/w3/v1</property>
      <property value="-12.5874">fsim/tables/ps_idle_ms/h2/w3/v10</property>
      <property value="-13.7484">fsim/tables/ps_idle_ms/h2/w3/v11</property>
      <property value="-15.1614">fsim/tables/ps_idle_ms/h2/w3/v12</property>
      <property value="-17.0751">fsim/tables/ps_idle_ms/h2/w3/v13</property>
      <property value="-19.1286">fsim/tables/ps_idle_ms/h2/w3/v14</property>
      <property value="-28.6102">fsim/tables/ps_idle_ms/h2/w3/v15</property>
      <property value="-7.57673">fsim/tables/ps_idle_ms/h2/w3/v2</property>
      <property value="-7.64316">fsim/tables/ps_idle_ms/h2/w3/v3</property>
      <property value="-7.9932">fsim/tables/ps_idle_ms/h2/w3/v4</property>
      <property value="-8.46242">fsim/tables/ps_idle_ms/h2/w3/v5</property>
      <property value="-9.06908">fsim/tables/ps_idle_ms/h2/w3/v6</property>
      <property value="-9.75113">fsim/tables/ps_idle_ms/h2/w3/v7</property>
      <property value="-10.5668">fsim/tables/ps_idle_ms/h2/w3/v8</property>
      <property value="-11.4965">fsim/tables/ps_idle_ms/h2/w3/v9</property>
      <property value="-5.67923">fsim/tables/ps_idle_ms/h3/w0/v0</property>
      <property value="-5.76261">fsim/tables/ps_idle_ms/h3/w0/v1</property>
      <property value="-14.3179">fsim/tables/ps_idle_ms/h3/w0/v10</property>
      <property value="-16.1748">fsim/tables/ps_idle_ms/h3/w0/v11</property>
      <property value="-18.3448">fsim/tables/ps_idle_ms/h3/w0/v12</property>
      <property value="-21.0535">fsim/tables/ps_idle_ms/h3/w0/v13</property>
      <property value="-25.2381">fsim/tables/ps_idle_ms/h3/w0/v14</property>
      <property value="-39.8904">fsim/tables/ps_idle_ms/h3/w0/v15</property>
      <property value="-6.04606">fsim/tables/ps_idle_ms/h3/w0/v2</property>
      <property value="-6.48466">fsim/tables/ps_idle_ms/h3/w0/v3</property>
      <property value="-7.09379">fsim/tables/ps_idle_ms/h3/w0/v4</property>
      <property value="-7.85886">fsim/tables/ps_idle_ms/h3/w0/v5</property>
      <property value="-8.76058">fsim/tables/ps_idle_ms/h3/w0/v6</property>
      <property value="-9.90686">fsim/tables/ps_idle_ms/h3/w0/v7</property>
      <property value="-11.1348">fsim/tables/ps_idle_ms/h3/w0/v8</property>
      <property value="-12.6474">fsim/tables/ps_idle_ms/h3/w0/v9</property>
      <property value="-7.14945">fsim/tables/ps_idle_ms/h3/w1/v0</property>
      <property value="-7.13671">fsim/tables/ps_idle_ms/h3/w1/v1</property>
      <property value="-12.1653">fsim/tables/ps_idle_ms/h3/w1/v10</property>
      <property value="-13.2983">fsim/tables/ps_idle_ms/h3/w1/v11</property>
      <property value="-14.7025">fsim/tables/ps_idle_ms/h3/w1/v12</property>
      <property value="-16.5312">fsim/tables/ps_idle_ms/h3/w1/v13</property>
      <property value="-18.9438">fsim/tables/ps_idle_ms/h3/w1/v14</property>
      <property value="-28.3746">fsim/tables/ps_idle_ms/h3/w1/v15</property>
      <property value="-7.13163">fsim/tables/ps_idle_ms/h3/w1/v2</property>
      <property value="-7.35048">fsim/tables/ps_idle_ms/h3/w1/v3</property>
      <property value="-7.69383">fsim/tables/ps_idle_ms/h3/w1/v4</property>
      <property value="-8.14072">fsim/tables/ps_idle_ms/h3/w1/v5</property>
      <property value="-8.73073">fsim/tables/ps_idle_ms/h3/w1/v6</property>
      <property value="-9.41491">fsim/tables/ps_idle_ms/h3/w1/v7</property>
      <property value="-10.1858">fsim/tables/ps_idle_ms/h3/w1/v8</property>
      <property value="-11.1143">fsim/tables/ps_idle_ms/h3/w1/v9</property>
      <property value="-7.7947">fsim/tables/ps_idle_ms/h3/w2/v0</property>
      <property value="-7.68924">fsim/tables/ps_idle_ms/h3/w2/v1</property>
      <property value="-11.6582">fsim/tables/ps_idle_ms/h3/w2/v10</property>
      <property value="-12.6289">fsim/tables/ps_idle_ms/h3/w2/v11</property>
      <property value="-13.673">fsim/tables/ps_idle_ms/h3/w2/v12</property>
      <property value="-15.2786">fsim/tables/ps_idle_ms/h3/w2/v13</property>
      <property value="-17.2593">fsim/tables/ps_idle_ms/h3/w2/v14</property>
      <property value="-25.18">fsim/tables/ps_idle_ms/h3/w2/v15</property>
      <property value="-7.76735">fsim/tables/ps_idle_ms/h3/w2/v2</property>
      <property value="-7.78395">fsim/tables/ps_idle_ms/h3/w2/v3</property>
      <property value="-8.05467">fsim/tables/ps_idle_ms/h3/w2/v4</property>
      <property value="-8.41895">fsim/tables/ps_idle_ms/h3/w2/v5</property>
      <property value="-8.8631">fsim/tables/ps_idle_ms/h3/w2/v6</property>
      <property value="-9.40307">fsim/tables/ps_idle_ms/h3/w2/v7</property>
      <property value="-10.0645">fsim/tables/ps_idle_ms/h3/w2/v8</property>
      <property value="-10.7835">fsim/tables/ps_idle_ms/h3/w2/v9</property>
      <property value="-9.2714">fsim/tables/ps_idle_ms/h3/w3/v0</property>
      <property value="-9.1138">fsim/tables/ps_idle_ms/h3/w3/v1</property>
      <property value="-11.2511">fsim/tables/ps_idle_ms/h3/w3/v10</property>
      <property value="-11.7933">fsim/tables/ps_idle_ms/h3/w3/v11</property>
      <property value="-12.4693">fsim/tables/ps_idle_ms/h3/w3/v12</property>
      <property value="-13.4718">fsim/tables/ps_idle_ms/h3/w3/v13</property>
      <property value="-14.4798">fsim/tables/ps_idle_ms/h3/w3/v14</property>
      <property value="-19.4649">fsim/tables/ps_idle_ms/h3/w3/v15</property>
      <property value="-9.2115">fsim/tables/ps_idle_ms/h3/w3/v2</property>
      <property value="-9.27823">fsim/tables/ps_idle_ms/h3/w3/v3</property>
      <property value="-9.3763">fsim/tables/ps_idle_ms/h3/w3/v4</property>
      <property value="-9.42734">fsim/tables/ps_idle_ms/h3/w3/v5</property>
      <property value="-9.65841">fsim/tables/ps_idle_ms/h3/w3/v6</property>
      <property value="-9.98512">fsim/tables/ps_idle_ms/h3/w3/v7</property>
      <property value="-10.3368">fsim/tables/ps_idle_ms/h3/w3/v8</property>
      <property value="-10.7659">fsim/tables/ps_idle_ms/h3/w3/v9</property>
      <property value="-7.05622">fsim/tables/ps_idle_ms/h4/w0/v0</property>
      <property value="-7.01326">fsim/tables/ps_idle_ms/h4/w0/v1</property>
      <property value="-11.9572">fsim/tables/ps_idle_ms/h4/w0/v10</property>
      <property value="-13.0485">fsim/tables/ps_idle_ms/h4/w0/v11</property>
      <property value="-14.3755">fsim/tables/ps_idle_ms/h4/w0/v12</property>
      <property value="-16.1248">fsim/tables/ps_idle_ms/h4/w0/v13</property>
      <property value="-18.7932">fsim/tables/ps_idle_ms/h4/w0/v14</property>
      <property value="-27.7791">fsim/tables/ps_idle_ms/h4/w0/v15</property>
      <property value="-7.09283">fsim/tables/ps_idle_ms/h4/w0/v2</property>
      <property value="-7.33774">fsim/tables/ps_idle_ms/h4/w0/v3</property>
      <property value="-7.67681">fsim/tables/ps_idle_ms/h4/w0/v4</property>
      <property value="-8.11399">fsim/tables/ps_idle_ms/h4/w0/v5</property>
      <property value="-8.66387">fsim/tables/ps_idle_ms/h4/w0/v6</property>
      <property value="-9.33372">fsim/tables/ps_idle_ms/h4/w0/v7</property>
      <property value="-10.0616">fsim/tables/ps_idle_ms/h4/w0/v8</property>
      <property value="-10.9607">fsim/tables/ps_idle_ms/h4/w0/v9</property>
      <property value="-8.67867">fsim/tables/ps_idle_ms/h4/w1/v0</property>
      <property value="-8.58472">fsim/tables/ps_idle_ms/h4/w1/v1</property>
      <property value="-11.1067">fsim/tables/ps_idle_ms/h4/w1/v10</property>
      <property value="-11.7067">fsim/tables/ps_idle_ms/h4/w1/v11</property>
      <property value="-12.4775">fsim/tables/ps_idle_ms/h4/w1/v12</property>
      <property value="-13.6117">fsim/tables/ps_idle_ms/h4/w1/v13</property>
      <property value="-15.0949">fsim/tables/ps_idle_ms/h4/w1/v14</property>
      <property value="-20.535">fsim/tables/ps_idle_ms/h4/w1/v15</property>
      <property value="-8.59912">fsim/tables/ps_idle_ms/h4/w1/v2</property>
      <property value="-8.60051">fsim/tables/ps_idle_ms/h4/w1/v3</property>
      <property value="-8.71387">fsim/tables/ps_idle_ms/h4/w1/v4</property>
      <property value="-8.94882">fsim/tables/ps_idle_ms/h4/w1/v5</property>
      <property value="-9.24754">fsim/tables/ps_idle_ms/h4/w1/v6</property>
      <property value="-9.58259">fsim/tables/ps_idle_ms/h4/w1/v7</property>
      <property value="-10.0345">fsim/tables/ps_idle_ms/h4/w1/v8</property>
      <property value="-10.5006">fsim/tables/ps_idle_ms/h4/w1/v9</property>
      <property value="-9.38306">fsim/tables/ps_idle_ms/h4/w2/v0</property>
      <property value="-9.28144">fsim/tables/ps_idle_ms/h4/w2/v1</property>
      <property value="-11.0302">fsim/tables/ps_idle_ms/h4/w2/v10</property>
      <property value="-11.5551">fsim/tables/ps_idle_ms/h4/w2/v11</property>
      <property value="-12.1772">fsim/tables/ps_idle_ms/h4/w2/v12</property>
      <property value="-13.0474">fsim/tables/ps_idle_ms/h4/w2/v13</property>
      <property value="-14.2295">fsim/tables/ps_idle_ms/h4/w2/v14</property>
      <property value="-18.6023">fsim/tables/ps_idle_ms/h4/w2/v15</property>
      <property value="-9.23882">fsim/tables/ps_idle_ms/h4/w2/v2</property>
      <property value="-9.30926">fsim/tables/ps_idle_ms/h4/w2/v3</property>
      <property value="-9.31534">fsim/tables/ps_idle_ms/h4/w2/v4</property>
      <property value="-9.42257">fsim/tables/ps_idle_ms/h4/w2/v5</property>
      <property value="-9.62738">fsim/tables/ps_idle_ms/h4/w2/v6</property>
      <property value="-9.92193">fsim/tables/ps_idle_ms/h4/w2/v7</property>
      <property value="-10.2182">fsim/tables/ps_idle_ms/h4/w2/v8</property>
      <property value="-10.6279">fsim/tables/ps_idle_ms/h4/w2/v9</property>
      <property value="-10.9698">fsim/tables/ps_idle_ms/h4/w3/v0</property>
      <property value="-10.974">fsim/tables/ps_idle_ms/h4/w3/v1</property>
      <property value="-11.9507">fsim/tables/ps_idle_ms/h4/w3/v10</property>
      <property value="-12.1511">fsim/tables/ps_idle_ms/h4/w3/v11</property>
      <property value="-12.0818">fsim/tables/ps_idle_ms/h4/w3/v12</property>
      <property value="-12.0735">fsim/tables/ps_idle_ms/h4/w3/v13</property>
      <property value="-12.553">fsim/tables/ps_idle_ms/h4/w3/v14</property>
      <property value="-14.2861">fsim/tables/ps_idle_ms/h4/w3/v15</property>
      <property value="-11.044">fsim/tables/ps_idle_ms/h4/w3/v2</property>
      <property value="-11.1278">fsim/tables/ps_idle_ms/h4/w3/v3</property>
      <property value="-11.1553">fsim/tables/ps_idle_ms/h4/w3/v4</property>
      <property value="-11.1719">fsim/tables/ps_idle_ms/h4/w3/v5</property>
      <property value="-11.2019">fsim/tables/ps_idle_ms/h4/w3/v6</property>
      <property value="-11.2404">fsim/tables/ps_idle_ms/h4/w3/v7</property>
      <property value="-11.3864">fsim/tables/ps_idle_ms/h4/w3/v8</property>
      <property value="-11.6513">fsim/tables/ps_idle_ms/h4/w3/v9</property>
      <property value="-8.16394">fsim/tables/ps_idle_ms/h5/w0/v0</property>
      <property value="-8.08549">fsim/tables/ps_idle_ms/h5/w0/v1</property>
      <property value="-11.2733">fsim/tables/ps_idle_ms/h5/w0/v10</property>
      <property value="-12.0887">fsim/tables/ps_idle_ms/h5/w0/v11</property>
      <property value="-12.9526">fsim/tables/ps_idle_ms/h5/w0/v12</property>
      <property value="-14.1859">fsim/tables/ps_idle_ms/h5/w0/v13</property>
      <property value="-16.4517">fsim/tables/ps_idle_ms/h5/w0/v14</property>
      <property value="-22.7447">fsim/tables/ps_idle_ms/h5/w0/v15</property>
      <property value="-8.04772">fsim/tables/ps_idle_ms/h5/w0/v2</property>
      <property value="-8.19918">fsim/tables/ps_idle_ms/h5/w0/v3</property>
      <property value="-8.4211">fsim/tables/ps_idle_ms/h5/w0/v4</property>
      <property value="-8.71478">fsim/tables/ps_idle_ms/h5/w0/v5</property>
      <property value="-9.05411">fsim/tables/ps_idle_ms/h5/w0/v6</property>
      <property value="-9.51948">fsim/tables/ps_idle_ms/h5/w0/v7</property>
      <property value="-10.0101">fsim/tables/ps_idle_ms/h5/w0/v8</property>
      <property value="-10.6359">fsim/tables/ps_idle_ms/h5/w0/v9</property>
      <property value="-9.92752">fsim/tables/ps_idle_ms/h5/w1/v0</property>
      <property value="-9.83635">fsim/tables/ps_idle_ms/h5/w1/v1</property>
      <property value="-11.1782">fsim/tables/ps_idle_ms/h5/w1/v10</property>
      <property value="-11.5486">fsim/tables/ps_idle_ms/h5/w1/v11</property>
      <property value="-12.1089">fsim/tables/ps_idle_ms/h5/w1/v12</property>
      <property value="-12.8383">fsim/tables/ps_idle_ms/h5/w1/v13</property>
      <property value="-14.0669">fsim/tables/ps_idle_ms/h5/w1/v14</property>
      <property value="-17.6104">fsim/tables/ps_idle_ms/h5/w1/v15</property>
      <property value="-9.80891">fsim/tables/ps_idle_ms/h5/w1/v2</property>
      <property value="-9.83954">fsim/tables/ps_idle_ms/h5/w1/v3</property>
      <property value="-9.83415">fsim/tables/ps_idle_ms/h5/w1/v4</property>
      <property value="-9.86635">fsim/tables/ps_idle_ms/h5/w1/v5</property>
      <property value="-10.057">fsim/tables/ps_idle_ms/h5/w1/v6</property>
      <property value="-10.2586">fsim/tables/ps_idle_ms/h5/w1/v7</property>
      <property value="-10.523">fsim/tables/ps_idle_ms/h5/w1/v8</property>
      <property value="-10.8107">fsim/tables/ps_idle_ms/h5/w1/v9</property>
      <property value="-10.7026">fsim/tables/ps_idle_ms/h5/w2/v0</property>
      <property value="-10.6371">fsim/tables/ps_idle_ms/h5/w2/v1</property>
      <property value="-11.293">fsim/tables/ps_idle_ms/h5/w2/v10</property>
      <property value="-11.5801">fsim/tables/ps_idle_ms/h5/w2/v11</property>
      <property value="-11.9637">fsim/tables/ps_idle_ms/h5/w2/v12</property>
      <property value="-12.3737">fsim/tables/ps_idle_ms/h5/w2/v13</property>
      <property value="-12.7618">fsim/tables/ps_idle_ms/h5/w2/v14</property>
      <property value="-14.7848">fsim/tables/ps_idle_ms/h5/w2/v15</property>
      <property value="-10.5603">fsim/tables/ps_idle_ms/h5/w2/v2</property>
      <property value="-10.5213">fsim/tables/ps_idle_ms/h5/w2/v3</property>
      <property value="-10.5697">fsim/tables/ps_idle_ms/h5/w2/v4</property>
      <property value="-10.623">fsim/tables/ps_idle_ms/h5/w2/v5</property>
      <property value="-10.5989">fsim/tables/ps_idle_ms/h5/w2/v6</property>
      <property value="-10.7291">fsim/tables/ps_idle_ms/h5/w2/v7</property>
      <property value="-10.8739">fsim/tables/ps_idle_ms/h5/w2/v8</property>
      <property value="-11.0864">fsim/tables/ps_idle_ms/h5/w2/v9</property>
      <property value="-9.39889">fsim/tables/ps_idle_ms/h6/w0/v0</property>
      <property value="-9.1696">fsim/tables/ps_idle_ms/h6/w0/v1</property>
      <property value="-11.0821">fsim/tables/ps_idle_ms/h6/w0/v10</property>
      <property value="-11.6125">fsim/tables/ps_idle_ms/h6/w0/v11</property>
      <property value="-12.1571">fsim/tables/ps_idle_ms/h6/w0/v12</property>
      <property value="-12.9738">fsim/tables/ps_idle_ms/h6/w0/v13</property>
      <property value="-14.545">fsim/tables/ps_idle_ms/h6/w0/v14</property>
      <property value="-18.6349">fsim/tables/ps_idle_ms/h6/w0/v15</property>
      <property value="-9.25136">fsim/tables/ps_idle_ms/h6/w0/v2</property>
      <property value="-9.21931">fsim/tables/ps_idle_ms/h6/w0/v3</property>
      <property value="-9.35648">fsim/tables/ps_idle_ms/h6/w0/v4</property>
      <property value="-9.52286">fsim/tables/ps_idle_ms/h6/w0/v5</property>
      <property value="-9.71847">fsim/tables/ps_idle_ms/h6/w0/v6</property>
      <property value="-10.0033">fsim/tables/ps_idle_ms/h6/w0/v7</property>
      <property value="-10.3064">fsim/tables/ps_idle_ms/h6/w0/v8</property>
      <property value="-10.6861">fsim/tables/ps_idle_ms/h6/w0/v9</property>
      <property value="-11.2059">fsim/tables/ps_idle_ms/h6/w1/v0</property>
      <property value="-11.2167">fsim/tables/ps_idle_ms/h6/w1/v1</property>
      <property value="-11.8304">fsim/tables/ps_idle_ms/h6/w1/v10</property>
      <property value="-11.9301">fsim/tables/ps_idle_ms/h6/w1/v11</property>
      <property value="-12.0993">fsim/tables/ps_idle_ms/h6/w1/v12</property>
      <property value="-12.3562">fsim/tables/ps_idle_ms/h6/w1/v13</property>
      <property value="-12.6738">fsim/tables/ps_idle_ms/h6/w1/v14</property>
      <property value="-12.9921">fsim/tables/ps_idle_ms/h6/w1/v15</property>
      <property value="-11.2143">fsim/tables/ps_idle_ms/h6/w1/v2</property>
      <property value="-11.1813">fsim/tables/ps_idle_ms/h6/w1/v3</property>
      <property value="-11.2102">fsim/tables/ps_idle_ms/h6/w1/v4</property>
      <property value="-11.2983">fsim/tables/ps_idle_ms/h6/w1/v5</property>
      <property value="-11.3767">fsim/tables/ps_idle_ms/h6/w1/v6</property>
      <property value="-11.4627">fsim/tables/ps_idle_ms/h6/w1/v7</property>
      <property value="-11.5963">fsim/tables/ps_idle_ms/h6/w1/v8</property>
      <property value="-11.734">fsim/tables/ps_idle_ms/h6/w1/v9</property>
      <property value="309.407">fsim/tables/reach_tas_ms/h0/w0</property>
      <property value="308.121">fsim/tables/reach_tas_ms/h0/w1</property>
      <property value="307.921">fsim/tables/reach_tas_ms/h0/w2</property>
      <property value="307.681">fsim/tables/reach_tas_ms/h0/w3</property>
      <property value="297.965">fsim/tables/reach_tas_ms/h1/w0</property>
      <property value="297.436">fsim/tables/reach_tas_ms/h1/w1</property>
      <property value="297.348">fsim/tables/reach_tas_ms/h1/w2</property>
      <property value="297.002">fsim/tables/reach_tas_ms/h1/w3</property>
      <property value="286.412">fsim/tables/reach_tas_ms/h2/w0</property>
      <property value="286.033">fsim/tables/reach_tas_ms/h2/w1</property>
      <property value="285.848">fsim/tables/reach_tas_ms/h2/w2</property>
      <property value="285.302">fsim/tables/reach_tas_ms/h2/w3</property>
      <property value="274.425">fsim/tables/reach_tas_ms/h3/w0</property>
      <property value="273.808">fsim/tables/reach_tas_ms/h3/w1</property>
      <property value="273.482">fsim/tables/reach_tas_ms/h3/w2</property>
      <property value="272.445">fsim/tables/reach_tas_ms/h3/w3</property>
      <property value="268.764">fsim/tables/reach_tas_ms/h4/w0</property>
      <property value="267.695">fsim/tables/reach_tas_ms/h4/w1</property>
      <property value="267.177">fsim/tables/reach_tas_ms/h4/w2</property>
      <property value="268.465">fsim/tables/reach_tas_ms/h5/w0</property>
      <property value="267.15">fsim/tables/reach_tas_ms/h5/w1</property>
      <property value="263.057">fsim/tables/reach_tas_ms/h5/w2</property>
      <property value="267.01">fsim/tables/reach_tas_ms/h6/w0</property>
      <property value="0.0">fsim/tables/speed_fraction/v0</property>
      <property value="0.0666667">fsim/tables/speed_fraction/v1</property>
      <property value="0.666667">fsim/tables/speed_fraction/v10</property>
      <property value="0.733333">fsim/tables/speed_fraction/v11</property>
      <property value="0.8">fsim/tables/speed_fraction/v12</property>
      <property value="0.866667">fsim/tables/speed_fraction/v13</property>
      <property value="0.933333">fsim/tables/speed_fraction/v14</property>
      <property value="1">fsim/tables/speed_fraction/v15</property>
      <property value="0.133333">fsim/tables/speed_fraction/v2</property>
      <property value="0.2">fsim/tables/speed_fraction/v3</property>
      <property value="0.266667">fsim/tables/speed_fraction/v4</property>
      <property value="0.333333">fsim/tables/speed_fraction/v5</property>
      <property value="0.4">fsim/tables/speed_fraction/v6</property>
      <property value="0.466667">fsim/tables/speed_fraction/v7</property>
      <property value="0.533333">fsim/tables/speed_fraction/v8</property>
      <property value="0.6">fsim/tables/speed_fraction/v9</property>
      <property value="49.4814">fsim/tables/stall_cas_ms/h0/w0</property>
      <property value="59.2516">fsim/tables/stall_cas_ms/h0/w1</property>
      <property value="63.5762">fsim/tables/stall_cas_ms/h0/w2</property>
      <property value="75.0697">fsim/tables/stall_cas_ms/h0/w3</property>
      <property value="49.6677">fsim/tables/stall_cas_ms/h1/w0</property>
      <property value="59.4747">fsim/tables/stall_cas_ms/h1/w1</property>
      <property value="63.8156">fsim/tables/stall_cas_ms/h1/w2</property>
      <property value="75.3523">fsim/tables/stall_cas_ms/h1/w3</property>
      <property value="49.5602">fsim/tables/stall_cas_ms/h2/w0</property>
      <property value="59.346">fsim/tables/stall_cas_ms/h2/w1</property>
      <property value="63.6775">fsim/tables/stall_cas_ms/h2/w2</property>
      <property value="75.1893">fsim/tables/stall_cas_ms/h2/w3</property>
      <property value="49.7881">fsim/tables/stall_cas_ms/h3/w0</property>
      <property value="59.6189">fsim/tables/stall_cas_ms/h3/w1</property>
      <property value="63.9702">fsim/tables/stall_cas_ms/h3/w2</property>
      <property value="75.535">fsim/tables/stall_cas_ms/h3/w3</property>
      <property value="49.7439">fsim/tables/stall_cas_ms/h4/w0</property>
      <property value="59.566">fsim/tables/stall_cas_ms/h4/w1</property>
      <property value="63.9134">fsim/tables/stall_cas_ms/h4/w2</property>
      <property value="75.4679">fsim/tables/stall_cas_ms/h4/w3</property>
      <property value="49.7956">fsim/tables/stall_cas_ms/h5/w0</property>
      <property value="59.6279">fsim/tables/stall_cas_ms/h5/w1</property>
      <property value="63.9799">fsim/tables/stall_cas_ms/h5/w2</property>
      <property value="49.7234">fsim/tables/stall_cas_ms/h6/w0</property>
      <property value="59.5414">fsim/tables/stall_cas_ms/h6/w1</property>
      <property value="97911">fsim/tables/weight_kg/w0</property>
      <property value="140394">fsim/tables/weight_kg/w1</property>
      <property value="161636">fsim/tables/weight_kg/w2</property>
      <property value="225360">fsim/tables/weight_kg/w3</property>
      <channel name="Pitch">
        <summer name="fcs/pitch-trim-sum">
          <input>fcs/elevator-cmd-norm</input>
          <input>fcs/pitch-trim-cmd-norm</input>
          <clipto> <min>-1</min> <max>1</max> </clipto>
        </summer>
        <aerosurface_scale name="fcs/elevator-control">
          <input>fcs/pitch-trim-sum</input>
          <range> <min>-10.00</min> <max>15.00</max> </range>
          <gain>0.0174533</gain>
        </aerosurface_scale>
        <actuator name="fcs/elevator-actuator">
          <input>fcs/elevator-control</input>
          <rate_limit>2.0</rate_limit>
          <output>fcs/elevator-pos-rad</output>
        </actuator>
      </channel>
      <channel name="Roll">
        <summer name="fcs/roll-trim-sum">
          <input>fcs/aileron-cmd-norm</input>
          <input>fcs/roll-trim-cmd-norm</input>
          <clipto> <min>-1</min> <max>1</max> </clipto>
        </summer>
        <aerosurface_scale name="fcs/left-aileron-control">
          <input>fcs/roll-trim-sum</input>
          <range> <min>-20.00</min> <max>20.00</max> </range>
          <gain>0.0174533</gain>
        </aerosurface_scale>
        <actuator name="fcs/left-aileron-actuator">
          <input>fcs/left-aileron-control</input>
          <rate_limit>2.0</rate_limit>
          <output>fcs/left-aileron-pos-rad</output>
        </actuator>
        <pure_gain name="fcs/right-aileron">
          <input>fcs/left-aileron-pos-rad</input>
          <gain>-1</gain>
          <output>fcs/right-aileron-pos-rad</output>
        </pure_gain>
      </channel>
      <channel name="Yaw">
        <summer name="fcs/yaw-trim-sum">
          <input>fcs/rudder-cmd-norm</input>
          <input>fcs/yaw-trim-cmd-norm</input>
          <clipto> <min>-1</min> <max>1</max> </clipto>
        </summer>
        <aerosurface_scale name="fcs/rudder-control">
          <input>fcs/yaw-trim-sum</input>
          <range> <min>-25.00</min> <max>25.00</max> </range>
          <gain>0.0174533</gain>
        </aerosurface_scale>
        <!-- the yaw damper (hangar/fcs.py yaw_damper): the yaw rate, washed out so a
             steady turn's is left alone, against itself through the rudder - the
             dutch roll damped to 0.30 at 1 g across the speed range -->
        <washout_filter name="fcs/yaw-damper-washout">
          <input>velocities/r-rad_sec</input>
          <c1>0.500</c1>
        </washout_filter>
        <fcs_function name="fcs/yaw-damper">
          <function>
            <product>
              <value>-1</value>
              <table>
                <independentVar lookup="row">aero/qbar-psf</independentVar>
                <tableData>
                  10.0    0.00000
                  20.0    0.00000
                  40.0    0.00000
                  80.0   -3.00000
                 150.0   -1.35136
                 300.0   -0.54076
                 600.0   -0.27372
                1200.0   -0.26107
                2400.0   -0.58754
                </tableData>
              </table>
              <property>fcs/yaw-damper-washout</property>
            </product>
          </function>
          <clipto> <min>-0.21817</min> <max>0.21817</max> </clipto>
        </fcs_function>
        <summer name="fcs/rudder-sum">
          <input>fcs/rudder-control</input>
          <input>fcs/yaw-damper</input>
          <clipto> <min>-0.43633</min> <max>0.43633</max> </clipto>
        </summer>
        <actuator name="fcs/rudder-actuator">
          <input>fcs/rudder-sum</input>
          <rate_limit>2.0</rate_limit>
          <output>fcs/rudder-pos-rad</output>
        </actuator>
        <!-- the nose or tail wheel steers with the rudder pedals (JSBSim steers from
             fcs/steer-cmd-norm, positive right; the rudder command is positive left) -->
        <pure_gain name="fcs/steer-from-rudder">
          <input>fcs/yaw-trim-sum</input>
          <gain>-1</gain>
          <output>fcs/steer-cmd-norm</output>
        </pure_gain>
      </channel>
      <channel name="Flaps">
        <kinematic name="fcs/flaps-control">
          <input>fcs/flap-cmd-norm</input>
          <traverse>
            <setting> <position>0.0</position> <time>0.0</time> </setting>
            <setting> <position>7.5</position> <time>2.0</time> </setting>
            <setting> <position>15.0</position> <time>2.0</time> </setting>
            <setting> <position>22.5</position> <time>2.0</time> </setting>
            <setting> <position>30.0</position> <time>2.0</time> </setting>
          </traverse>
          <output>fcs/flap-pos-deg</output>
        </kinematic>
        <pure_gain name="fcs/flaps-normalized">
          <input>fcs/flap-pos-deg</input>
          <gain>0.0333333</gain>
          <output>fcs/flap-pos-norm</output>
        </pure_gain>
      </channel>
      <channel name="Speedbrake">
        <kinematic name="fcs/speedbrake-control">
          <input>fcs/speedbrake-cmd-norm</input>
          <traverse>
            <setting> <position>0</position> <time>0</time> </setting>
            <setting> <position>1</position> <time>2.00</time> </setting>
          </traverse>
          <output>fcs/speedbrake-pos-norm</output>
        </kinematic>
      </channel>
      <channel name="Throttle 4">
        <pure_gain name="fcs/throttle-lever-4">
          <input>fcs/throttle-cmd-norm[0]</input>
          <gain>1</gain>
          <output>fcs/throttle-pos-norm[4]</output>
        </pure_gain>
      </channel>
      <channel name="Throttle 5">
        <pure_gain name="fcs/throttle-lever-5">
          <input>fcs/throttle-cmd-norm[1]</input>
          <gain>1</gain>
          <output>fcs/throttle-pos-norm[5]</output>
        </pure_gain>
      </channel>
      <channel name="Throttle 6">
        <pure_gain name="fcs/throttle-lever-6">
          <input>fcs/throttle-cmd-norm[2]</input>
          <gain>1</gain>
          <output>fcs/throttle-pos-norm[6]</output>
        </pure_gain>
      </channel>
      <channel name="Throttle 7">
        <pure_gain name="fcs/throttle-lever-7">
          <input>fcs/throttle-cmd-norm[3]</input>
          <gain>1</gain>
          <output>fcs/throttle-pos-norm[7]</output>
        </pure_gain>
      </channel>
      <channel name="Landing Gear">
        <kinematic name="fcs/gear-control">
          <input>gear/gear-cmd-norm</input>
          <traverse>
            <setting> <position>0</position> <time>0</time> </setting>
            <setting> <position>1</position> <time>5</time> </setting>
          </traverse>
          <output>gear/gear-pos-norm</output>
        </kinematic>
      </channel>
    </flight_control>
    <aerodynamics>
        <function name="aero/function/mach-lift">
          <description>lift, and damping, over its low-speed value (hangar: aero/mach.py)</description>
          <table>
            <independentVar lookup="row">velocities/mach</independentVar>
            <tableData>
                 0.000     1.000000
                 0.300     1.027862
                 0.500     1.085055
                 0.600     1.131712
                 0.700     1.197358
                 0.800     1.292422
                 0.850     1.354109
                 0.900     1.398136
                 0.950     1.402262
                 1.000     1.401956
                 1.050     1.397447
                 1.100     1.388962
                 1.200     1.360978
                 1.400     0.974622
                 1.600     0.783136
                 1.800     0.663097
                 2.000     0.578721
                 2.300     0.489008
                 2.600     0.425106
            </tableData>
          </table>
        </function>
        <function name="aero/function/mach-side">
          <description>side force, rolling and yawing moment over their low-speed values</description>
          <table>
            <independentVar lookup="row">velocities/mach</independentVar>
            <tableData>
                 0.000     1.000000
                 0.300     1.019220
                 0.500     1.058535
                 0.600     1.090509
                 0.700     1.135381
                 0.800     1.200415
                 0.850     1.244237
                 0.900     1.296710
                 0.950     1.274303
                 1.000     1.215356
                 1.050     1.139747
                 1.100     1.067356
                 1.200     1.011747
                 1.400     1.376114
                 1.600     1.156855
                 1.800     1.004296
                 2.000     0.890832
                 2.300     0.764997
                 2.600     0.672304
            </tableData>
          </table>
        </function>
        <function name="aero/function/mach-dCm-dCL">
          <description>pitching moment per unit low-speed lift: the neutral point's move</description>
          <table>
            <independentVar lookup="row">velocities/mach</independentVar>
            <tableData>
                 0.000     0.000000
                 0.300    -0.004336
                 0.500    -0.013117
                 0.600    -0.020210
                 0.700    -0.030116
                 0.800    -0.043595
                 0.850    -0.048590
                 0.900    -0.014195
                 0.950    -0.024289
                 1.000    -0.053422
                 1.050    -0.095002
                 1.100    -0.142263
                 1.200    -0.227081
                 1.400    -0.220535
                 1.600    -0.155232
                 1.800    -0.109811
                 2.000    -0.075875
                 2.300    -0.038014
                 2.600    -0.009945
            </tableData>
          </table>
        </function>
        <function name="aero/function/mach-dCD0">
          <description>zero-lift drag's change: friction and wave drag</description>
          <table>
            <independentVar lookup="row">velocities/mach</independentVar>
            <tableData>
                 0.000     0.000000
                 0.300    -0.000095
                 0.500    -0.000259
                 0.600    -0.000368
                 0.700    -0.000494
                 0.800    -0.000410
                 0.850     0.000713
                 0.900     0.011582
                 0.950     0.040642
                 1.000     0.071035
                 1.050     0.085045
                 1.100     0.084956
                 1.200     0.084772
                 1.400     0.081003
                 1.600     0.078962
                 1.800     0.077248
                 2.000     0.075715
                 2.300     0.073639
                 2.600     0.071761
            </tableData>
          </table>
        </function>
        <function name="aero/function/mach-dK">
          <description>induced-drag factor's change (per CL^2)</description>
          <table>
            <independentVar lookup="row">velocities/mach</independentVar>
            <tableData>
                 0.000     0.000000
                 0.300     0.002312
                 0.500     0.006513
                 0.600     0.009479
                 0.700     0.013079
                 0.800     0.017353
                 0.850     0.019657
                 0.900     0.021119
                 0.950     0.021249
                 1.000     0.021239
                 1.050     0.030228
                 1.100     0.052132
                 1.200     0.103191
                 1.400     0.146867
                 1.600     0.168926
                 1.800     0.184433
                 2.000     0.194896
                 2.300     0.202621
                 2.600     0.201813
            </tableData>
          </table>
        </function>
        <function name="aero/function/mach-aileron">
          <description>aileron power over its low-speed value</description>
          <table>
            <independentVar lookup="row">velocities/mach</independentVar>
            <tableData>
                 0.000     1.000000
                 0.300     1.021696
                 0.500     1.064920
                 0.600     1.098884
                 0.700     1.144776
                 0.800     1.208104
                 0.850     1.249337
                 0.900     1.303110
                 0.950     1.226588
                 1.000     1.094692
                 1.050     0.931239
                 1.100     0.760049
                 1.200     0.489722
                 1.400     0.333363
                 1.600     0.265270
                 1.800     0.223262
                 2.000     0.194039
                 2.300     0.163238
                 2.600     0.141464
            </tableData>
          </table>
        </function>
        <function name="aero/function/mach-elevator">
          <description>elevator power over its low-speed value</description>
          <table>
            <independentVar lookup="row">velocities/mach</independentVar>
            <tableData>
                 0.000     1.000000
                 0.300     1.020950
                 0.500     1.062973
                 0.600     1.096387
                 0.700     1.142360
                 0.800     1.208105
                 0.850     1.253075
                 0.900     1.311690
                 0.950     1.314675
                 1.000     1.294828
                 1.050     1.261254
                 1.100     1.223060
                 1.200     1.169235
                 1.400     1.139777
                 1.600     0.932710
                 1.800     0.797767
                 2.000     0.700838
                 2.300     0.596073
                 2.600     0.520458
            </tableData>
          </table>
        </function>
        <function name="aero/function/mach-flap">
          <description>flap power over its low-speed value</description>
          <table>
            <independentVar lookup="row">velocities/mach</independentVar>
            <tableData>
                 0.000     1.000000
                 0.300     1.033012
                 0.500     1.101569
                 0.600     1.158260
                 0.700     1.239141
                 0.800     1.358688
                 0.850     1.439226
                 0.900     1.513731
                 0.950     1.442322
                 1.000     1.310150
                 1.050     1.142248
                 1.100     0.963650
                 1.200     0.674506
                 1.400     0.459149
                 1.600     0.365362
                 1.800     0.307504
                 2.000     0.267255
                 2.300     0.224831
                 2.600     0.194842
            </tableData>
          </table>
        </function>
        <function name="aero/function/mach-rudder">
          <description>rudder power over its low-speed value</description>
          <table>
            <independentVar lookup="row">velocities/mach</independentVar>
            <tableData>
                 0.000     1.000000
                 0.300     1.020950
                 0.500     1.064461
                 0.600     1.100679
                 0.700     1.153277
                 0.800     1.235344
                 0.850     1.297352
                 0.900     1.387619
                 0.950     1.286247
                 1.000     1.099668
                 1.050     0.867853
                 1.100     0.630771
                 1.200     0.300691
                 1.400     0.408981
                 1.600     0.343817
                 1.800     0.298476
                 2.000     0.264755
                 2.300     0.227357
                 2.600     0.199809
            </tableData>
          </table>
        </function>
        <function name="aero/function/CL-base">
          <description>CL over alpha and beta at low speed</description>
          <table>
            <independentVar lookup="row">aero/alpha-deg</independentVar>
            <independentVar lookup="column">aero/beta-deg</independentVar>
            <tableData>
                        -90.00    -70.00    -50.00    -40.00    -30.00    -25.00    -20.00    -15.00    -10.00     -6.00     -3.00      0.00      3.00      6.00     10.00     15.00     20.00     25.00     30.00     40.00     50.00     70.00     90.00
             -180.00   0.00000   0.01237   0.12703   0.23716   0.35895   0.41701   0.46920   0.51271   0.54523   0.56230   0.56959   0.57202   0.56959   0.56230   0.54523   0.51271   0.46920   0.41701   0.35895   0.23716   0.12703   0.01237   0.00000
             -120.00  -0.00001   0.12804   0.33946   0.45075   0.55024   0.59237   0.62805   0.65649   0.67711   0.68829   0.69323   0.69362   0.69323   0.68829   0.67711   0.65649   0.62805   0.59237   0.55024   0.45075   0.33946   0.12804  -0.00001
              -70.00  -0.00001  -0.12749  -0.36438  -0.49430  -0.61293  -0.66391  -0.70747  -0.74249  -0.76809  -0.78139  -0.78651  -0.78672  -0.78651  -0.78139  -0.76809  -0.74249  -0.70747  -0.66391  -0.61293  -0.49430  -0.36438  -0.12749  -0.00001
              -46.00  -0.00001  -0.19778  -0.55789  -0.75269  -0.92264  -0.99419  -1.05581  -1.10657  -1.14085  -1.15620  -1.16275  -1.16491  -1.16275  -1.15620  -1.14085  -1.10657  -1.05581  -0.99419  -0.92264  -0.75269  -0.55789  -0.19778  -0.00001
              -32.00  -0.00000  -0.21986  -0.60785  -0.82760  -1.00211  -1.07332  -1.12657  -1.18428  -1.22606  -1.24778  -1.25173  -1.25399  -1.25173  -1.24778  -1.22606  -1.18428  -1.12657  -1.07332  -1.00211  -0.82760  -0.60785  -0.21986  -0.00000
              -22.00  -0.00000  -0.15528  -0.61248  -0.90751  -1.10508  -1.16995  -1.21609  -1.26838  -1.30604  -1.32516  -1.33307  -1.33565  -1.33307  -1.32516  -1.30604  -1.26838  -1.21609  -1.16995  -1.10508  -0.90751  -0.61248  -0.15528  -0.00000
              -17.00  -0.00000  -0.12584  -0.50271  -0.67022  -0.76310  -0.80541  -0.83430  -0.86088  -0.87932  -0.88824  -0.89174  -0.89282  -0.89174  -0.88824  -0.87932  -0.86088  -0.83430  -0.80541  -0.76310  -0.67022  -0.50271  -0.12584  -0.00000
              -13.00  -0.00000  -0.09043  -0.32497  -0.40344  -0.46560  -0.49059  -0.50165  -0.51074  -0.51620  -0.51825  -0.51878  -0.51886  -0.51878  -0.51825  -0.51620  -0.51074  -0.50165  -0.49059  -0.46560  -0.40344  -0.32497  -0.09043  -0.00000
               -9.00  -0.00000  -0.03623  -0.10081  -0.14003  -0.17278  -0.17426  -0.16537  -0.15681  -0.14925  -0.14441  -0.14195  -0.14102  -0.14195  -0.14441  -0.14925  -0.15681  -0.16537  -0.17426  -0.17278  -0.14003  -0.10081  -0.03623  -0.00000
               -5.00  -0.00000   0.01556   0.10847   0.10549   0.11623   0.13968   0.16964   0.19566   0.21590   0.22726   0.23251   0.23441   0.23251   0.22726   0.21590   0.19566   0.16964   0.13968   0.11623   0.10549   0.10847   0.01556  -0.00000
               -1.00  -0.00000   0.05983   0.32664   0.35192   0.40252   0.45261   0.50435   0.54776   0.58043   0.59792   0.60552   0.60811   0.60552   0.59792   0.58043   0.54776   0.50435   0.45261   0.40252   0.35192   0.32664   0.05983  -0.00000
                3.00   0.00000   0.09810   0.51253   0.60211   0.68848   0.76278   0.83767   0.89820   0.94316   0.96684   0.97701   0.98044   0.97701   0.96684   0.94316   0.89820   0.83767   0.76278   0.68848   0.60211   0.51253   0.09810   0.00000
                7.00   0.00000   0.13967   0.60386   0.83539   0.96429   1.06390   1.16441   1.24220   1.29956   1.32963   1.34255   1.34693   1.34255   1.32963   1.29956   1.24220   1.16441   1.06390   0.96429   0.83539   0.60386   0.13967   0.00000
               11.00   0.00000   0.17387   0.67836   0.88064   1.16741   1.29619   1.42194   1.51584   1.58498   1.62119   1.63673   1.64200   1.63673   1.62119   1.58498   1.51584   1.42194   1.29619   1.16741   0.88064   0.67836   0.17387   0.00000
               15.00   0.00000   0.20187   0.67017   0.91217   1.13284   1.23356   1.32432   1.38341   1.42558   1.44824   1.45898   1.45784   1.45898   1.44824   1.42558   1.38341   1.32432   1.23356   1.13284   0.91217   0.67017   0.20187   0.00000
               19.00   0.00000   0.21156   0.58766   0.83630   1.06391   1.14661   1.21527   1.26050   1.29379   1.31083   1.31792   1.32026   1.31792   1.31083   1.29379   1.26050   1.21527   1.14661   1.06391   0.83630   0.58766   0.21156   0.00000
               23.00   0.00000   0.20351   0.57170   0.77900   1.00913   1.09266   1.19484   1.24164   1.27509   1.29203   1.29907   1.30139   1.29907   1.29203   1.27509   1.24164   1.19484   1.09266   1.00913   0.77900   0.57170   0.20351   0.00000
               27.00   0.00000   0.19674   0.56357   0.75939   0.95323   1.04082   1.10208   1.14378   1.17294   1.18066   1.18610   1.18792   1.18610   1.18066   1.17294   1.14378   1.10208   1.04082   0.95323   0.75939   0.56357   0.19674   0.00000
               32.00   0.00000   0.19505   0.55472   0.74158   0.91002   0.98258   1.03709   1.07843   1.10800   1.12310   1.12935   1.13136   1.12935   1.12310   1.10800   1.07843   1.03709   0.98258   0.91002   0.74158   0.55472   0.19505   0.00000
               46.00   0.00001   0.17939   0.49759   0.66720   0.81006   0.86723   0.91416   0.95308   0.97362   0.98393   0.98826   0.98963   0.98826   0.98393   0.97362   0.95308   0.91416   0.86723   0.81006   0.66720   0.49759   0.17939   0.00001
               70.00   0.00001   0.09038   0.23731   0.31449   0.38356   0.41286   0.43771   0.45754   0.47195   0.47941   0.48205   0.48142   0.48205   0.47941   0.47195   0.45754   0.43771   0.41286   0.38356   0.31449   0.23731   0.09038   0.00001
              120.00   0.00001  -0.14880  -0.40932  -0.54940  -0.67594  -0.72991  -0.77580  -0.81253  -0.83926  -0.85363  -0.85992  -0.86076  -0.85992  -0.85363  -0.83926  -0.81253  -0.77580  -0.72991  -0.67594  -0.54940  -0.40932  -0.14880   0.00001
              180.00   0.00000   0.01237   0.12703   0.23716   0.35895   0.41701   0.46920   0.51271   0.54523   0.56230   0.56959   0.57202   0.56959   0.56230   0.54523   0.51271   0.46920   0.41701   0.35895   0.23716   0.12703   0.01237   0.00000
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            </tableData>
          </table>
        </function>
      <axis name="DRAG">
        <function name="aero/coefficient/CD_base">
          <description>CD over alpha and beta (hangar)</description>
          <product>
            <property>aero/qbar-psf</property>
            <property>metrics/Sw-sqft</property>
          <table>
            <independentVar lookup="row">aero/alpha-deg</independentVar>
            <independentVar lookup="column">aero/beta-deg</independentVar>
            <tableData>
                        -90.00    -70.00    -50.00    -40.00    -30.00    -25.00    -20.00    -15.00    -10.00     -6.00     -3.00      0.00      3.00      6.00     10.00     15.00     20.00     25.00     30.00     40.00     50.00     70.00     90.00
             -180.00   0.52781   0.43804   0.25257   0.16171   0.09091   0.06526   0.04628   0.03351   0.02446   0.02244   0.02224   0.02223   0.02224   0.02244   0.02446   0.03351   0.04628   0.06526   0.09091   0.16171   0.25257   0.43804   0.52781
             -120.00   0.52781   0.53921   0.73288   0.91735   1.12888   1.23200   1.32590   1.40525   1.46546   1.49729   1.51101   1.51570   1.51101   1.49729   1.46546   1.40525   1.32590   1.23200   1.12888   0.91735   0.73288   0.53921   0.52781
              -70.00   0.52781   0.55357   0.75930   0.94564   1.15656   1.25884   1.35180   1.43028   1.48981   1.52141   1.53486   1.53945   1.53486   1.52141   1.48981   1.43028   1.35180   1.25884   1.15656   0.94564   0.75930   0.55357   0.52781
              -46.00   0.52781   0.51054   0.53140   0.57945   0.64550   0.68132   0.71622   0.74987   0.77200   0.78003   0.78342   0.78450   0.78342   0.78003   0.77200   0.74987   0.71622   0.68132   0.64550   0.57945   0.53140   0.51054   0.52781
              -32.00   0.52781   0.48321   0.39743   0.37724   0.38654   0.39653   0.38956   0.38057   0.37480   0.37276   0.36903   0.36834   0.36903   0.37276   0.37480   0.38057   0.38956   0.39653   0.38654   0.37724   0.39743   0.48321   0.52781
              -22.00   0.52781   0.46897   0.32263   0.28070   0.26161   0.23103   0.19052   0.15940   0.13667   0.12486   0.11984   0.11815   0.11984   0.12486   0.13667   0.15940   0.19052   0.23103   0.26161   0.28070   0.32263   0.46897   0.52781
              -17.00   0.52781   0.46296   0.30094   0.23620   0.18196   0.15001   0.11954   0.09529   0.07779   0.06880   0.06501   0.06374   0.06501   0.06880   0.07779   0.09529   0.11954   0.15001   0.18196   0.23620   0.30094   0.46296   0.52781
              -13.00   0.52781   0.45924   0.28898   0.20833   0.14920   0.11092   0.08311   0.06158   0.04639   0.03876   0.03560   0.03456   0.03560   0.03876   0.04639   0.06158   0.08311   0.11092   0.14920   0.20833   0.28898   0.45924   0.52781
               -9.00   0.52781   0.45696   0.28033   0.19171   0.12504   0.08864   0.06260   0.04284   0.02927   0.02269   0.02003   0.01917   0.02003   0.02269   0.02927   0.04284   0.06260   0.08864   0.12504   0.19171   0.28033   0.45696   0.52781
               -5.00   0.52781   0.45604   0.27651   0.18395   0.11828   0.08164   0.05725   0.03884   0.02644   0.02066   0.01838   0.01765   0.01838   0.02066   0.02644   0.03884   0.05725   0.08164   0.11828   0.18395   0.27651   0.45604   0.52781
               -1.00   0.52781   0.45659   0.27730   0.18560   0.12600   0.09144   0.06781   0.04999   0.03799   0.03245   0.03023   0.02955   0.03023   0.03245   0.03799   0.04999   0.06781   0.09144   0.12600   0.18560   0.27730   0.45659   0.52781
                3.00   0.52781   0.45836   0.28558   0.20076   0.14792   0.11881   0.09466   0.07630   0.06387   0.05778   0.05544   0.05474   0.05544   0.05778   0.06387   0.07630   0.09466   0.11881   0.14792   0.20076   0.28558   0.45836   0.52781
                7.00   0.52781   0.46078   0.30067   0.24709   0.18452   0.16134   0.13763   0.11738   0.10308   0.09586   0.09288   0.09191   0.09288   0.09586   0.10308   0.11738   0.13763   0.16134   0.18452   0.24709   0.30067   0.46078   0.52781
               11.00   0.52781   0.46411   0.32493   0.27545   0.22666   0.21210   0.19125   0.17111   0.15642   0.14892   0.14567   0.14449   0.14567   0.14892   0.15642   0.17111   0.19125   0.21210   0.22666   0.27545   0.32493   0.46411   0.52781
               15.00   0.52781   0.46836   0.34774   0.32252   0.32340   0.32536   0.30720   0.28612   0.26723   0.25638   0.25063   0.23322   0.25063   0.25638   0.26723   0.28612   0.30720   0.32536   0.32340   0.32252   0.34774   0.46836   0.52781
               19.00   0.52781   0.47378   0.36924   0.35033   0.38249   0.37077   0.35068   0.33374   0.32204   0.31623   0.31398   0.31325   0.31398   0.31623   0.32204   0.33374   0.35068   0.37077   0.38249   0.35033   0.36924   0.47378   0.52781
               23.00   0.52781   0.48037   0.39825   0.38507   0.41423   0.40545   0.40798   0.40429   0.40186   0.40074   0.40033   0.40019   0.40033   0.40074   0.40186   0.40429   0.40798   0.40545   0.41423   0.38507   0.39825   0.48037   0.52781
               27.00   0.52781   0.48739   0.43196   0.43426   0.46208   0.47752   0.48096   0.48502   0.49058   0.48808   0.48900   0.48931   0.48900   0.48808   0.49058   0.48502   0.48096   0.47752   0.46208   0.43426   0.43196   0.48739   0.52781
               32.00   0.52781   0.49666   0.47881   0.50424   0.54836   0.57729   0.58505   0.59569   0.60480   0.61010   0.61243   0.61318   0.61243   0.61010   0.60480   0.59569   0.58505   0.57729   0.54836   0.50424   0.47881   0.49666   0.52781
               46.00   0.52781   0.52448   0.62055   0.72875   0.85017   0.90687   0.95703   1.00247   1.02665   1.03883   1.04380   1.04532   1.04380   1.03883   1.02665   1.00247   0.95703   0.90687   0.85017   0.72875   0.62055   0.52448   0.52781
               70.00   0.52781   0.56247   0.81652   1.04211   1.29568   1.41820   1.52934   1.62305   1.69407   1.73175   1.74780   1.75327   1.74780   1.73175   1.69407   1.62305   1.52934   1.41820   1.29568   1.04211   0.81652   0.56247   0.52781
              120.00   0.52781   0.52719   0.65573   0.78729   0.94135   1.01721   1.08660   1.14544   1.19018   1.21381   1.22402   1.22753   1.22402   1.21381   1.19018   1.14544   1.08660   1.01721   0.94135   0.78729   0.65573   0.52719   0.52781
              180.00   0.52781   0.43804   0.25257   0.16171   0.09091   0.06526   0.04628   0.03351   0.02446   0.02244   0.02224   0.02223   0.02224   0.02244   0.02446   0.03351   0.04628   0.06526   0.09091   0.16171   0.25257   0.43804   0.52781
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            </tableData>
          </table>
          </product>
        </function>
        <function name="aero/coefficient/CD_mach">
          <description>zero-lift drag's change with Mach: friction, wave drag</description>
          <product>
            <property>aero/qbar-psf</property>
            <property>metrics/Sw-sqft</property>
            <property>aero/function/mach-dCD0</property>
          </product>
        </function>
        <function name="aero/coefficient/CD_induced_mach">
          <description>induced drag's change with Mach (leading-edge suction lost)</description>
          <product>
            <property>aero/qbar-psf</property>
            <property>metrics/Sw-sqft</property>
            <property>aero/cl-squared</property>
            <property>aero/function/mach-dK</property>
          </product>
        </function>
        <function name="aero/coefficient/CD_aileron">
          <description>CD increment from aileron (deg), over alpha</description>
          <product>
            <property>aero/qbar-psf</property>
            <property>metrics/Sw-sqft</property>
            <property>aero/function/mach-aileron</property>
          <table>
            <independentVar lookup="row">aero/alpha-deg</independentVar>
            <independentVar lookup="column">fcs/left-aileron-pos-deg</independentVar>
            <tableData>
                        -20.00    -15.00    -10.00     -5.00      0.00      5.00     10.00     15.00     20.00
             -180.00   0.00282   0.00162   0.00073   0.00018   0.00000   0.00018   0.00073   0.00162   0.00282
             -120.00   0.00279   0.00160   0.00072   0.00018   0.00000   0.00018   0.00072   0.00160   0.00279
              -70.00   0.00279   0.00160   0.00072   0.00018   0.00000   0.00018   0.00072   0.00160   0.00279
              -46.00   0.00561   0.00353   0.00174   0.00046   0.00000   0.00046   0.00174   0.00353   0.00561
              -32.00   0.00843   0.00559   0.00289   0.00079   0.00000   0.00079   0.00289   0.00559   0.00843
              -22.00   0.00494   0.00315   0.00159   0.00042   0.00000   0.00042   0.00159   0.00315   0.00494
              -17.00   0.00659   0.00433   0.00221   0.00060   0.00000   0.00060   0.00221   0.00433   0.00659
              -13.00   0.00700   0.00461   0.00237   0.00065   0.00000   0.00065   0.00237   0.00461   0.00700
               -9.00   0.00723   0.00478   0.00246   0.00067   0.00000   0.00067   0.00246   0.00478   0.00723
               -5.00   0.00730   0.00483   0.00248   0.00068   0.00000   0.00068   0.00248   0.00483   0.00730
               -1.00   0.00720   0.00476   0.00244   0.00067   0.00000   0.00067   0.00244   0.00476   0.00720
                3.00   0.00694   0.00457   0.00234   0.00064   0.00000   0.00064   0.00234   0.00457   0.00694
                7.00   0.00819   0.00516   0.00247   0.00062   0.00000   0.00062   0.00247   0.00516   0.00819
               11.00   0.02822   0.02019   0.01115   0.00322   0.00000   0.00322   0.01115   0.02019   0.02822
               15.00   0.03737   0.02935   0.02143   0.01495   0.00000   0.01495   0.02143   0.02935   0.03737
               19.00   0.01589   0.01073   0.00562   0.00155   0.00000   0.00155   0.00562   0.01073   0.01589
               23.00   0.01231   0.00825   0.00430   0.00119   0.00000   0.00119   0.00430   0.00825   0.01231
               27.00   0.01047   0.00694   0.00358   0.00098   0.00000   0.00098   0.00358   0.00694   0.01047
               32.00   0.00905   0.00589   0.00300   0.00082   0.00000   0.00082   0.00300   0.00589   0.00905
               46.00   0.00549   0.00344   0.00169   0.00045   0.00000   0.00045   0.00169   0.00344   0.00549
               70.00   0.00279   0.00160   0.00072   0.00018   0.00000   0.00018   0.00072   0.00160   0.00279
              120.00   0.00279   0.00160   0.00072   0.00018   0.00000   0.00018   0.00072   0.00160   0.00279
              180.00   0.00282   0.00162   0.00073   0.00018   0.00000   0.00018   0.00073   0.00162   0.00282
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            </tableData>
          </table>
          </product>
        </function>
        <function name="aero/coefficient/CD_elevator">
          <description>CD increment from elevator (deg), over alpha</description>
          <product>
            <property>aero/qbar-psf</property>
            <property>metrics/Sw-sqft</property>
            <property>aero/function/mach-elevator</property>
          <table>
            <independentVar lookup="row">aero/alpha-deg</independentVar>
            <independentVar lookup="column">fcs/elevator-pos-deg</independentVar>
            <tableData>
                        -10.00     -5.00      0.00      5.00     10.00     15.00
             -180.00   0.00056  -0.00010   0.00000   0.00090   0.00937   0.01957
             -120.00  -0.03315  -0.01587   0.00000   0.01397   0.02562   0.03460
              -70.00   0.02168   0.01214   0.00000  -0.01438  -0.03057  -0.04807
              -46.00   0.03398   0.01747   0.00000  -0.01779  -0.03519  -0.05148
              -32.00   0.03160   0.01525   0.00000  -0.01117  -0.02466  -0.03632
              -22.00   0.02985   0.01192   0.00000  -0.01078  -0.01934  -0.02519
              -17.00   0.02255   0.01056   0.00000  -0.00824  -0.01367  -0.01597
              -13.00   0.01928   0.00857   0.00000  -0.00575  -0.00836  -0.00766
               -9.00   0.01486   0.00602   0.00000  -0.00288  -0.00246   0.00133
               -5.00   0.00913   0.00298   0.00000   0.00033   0.00400   0.01091
               -1.00   0.00222  -0.00056   0.00000   0.00388   0.01096   0.02100
                3.00  -0.00402  -0.00367   0.00000   0.00682   0.01654   0.02879
                7.00  -0.00903  -0.00610   0.00000   0.00895   0.02040   0.03377
               11.00  -0.01546  -0.00915   0.00000   0.01173   0.02546   0.03988
               15.00  -0.01750  -0.01268   0.00000   0.01500   0.03072   0.04548
               19.00  -0.01597  -0.01379   0.00000   0.01515   0.02524   0.03669
               23.00  -0.02432  -0.01470   0.00000   0.00942   0.02333   0.03859
               27.00  -0.02326  -0.01090   0.00000   0.01459   0.03042   0.04622
               32.00  -0.02793  -0.01574   0.00000   0.01660   0.03293   0.04814
               46.00  -0.03584  -0.01763   0.00000   0.01637   0.03089   0.04307
               70.00  -0.02562  -0.01165   0.00000   0.00897   0.01500   0.01790
              120.00   0.03058   0.01619   0.00000  -0.01750  -0.03578  -0.05429
              180.00   0.00056  -0.00010   0.00000   0.00090   0.00937   0.01957
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            </tableData>
          </table>
          </product>
        </function>
        <function name="aero/coefficient/CD_flap">
          <description>CD increment from flap (deg), over alpha</description>
          <product>
            <property>aero/qbar-psf</property>
            <property>metrics/Sw-sqft</property>
            <property>aero/function/mach-flap</property>
          <table>
            <independentVar lookup="row">aero/alpha-deg</independentVar>
            <independentVar lookup="column">fcs/flap-pos-deg</independentVar>
            <tableData>
                          0.00      5.00     10.00     15.00     20.00     25.00     30.00
             -180.00   0.00000   0.00053   0.00210   0.00468   0.00817   0.01247   0.01745
             -120.00   0.00000   0.00053   0.00209   0.00465   0.00813   0.01241   0.01736
              -70.00   0.00000   0.00053   0.00209   0.00465   0.00812   0.01239   0.01735
              -46.00   0.00000   0.01146   0.02687   0.04592   0.06783   0.09190   0.11778
              -32.00   0.00000   0.01068   0.02777   0.04910   0.07038   0.08572   0.08398
              -22.00   0.00000  -0.01214  -0.01988  -0.02322  -0.02253  -0.01851  -0.01189
              -17.00   0.00000  -0.00691  -0.00952  -0.00779  -0.00236   0.00587   0.01623
              -13.00   0.00000  -0.00266  -0.00088   0.00508   0.01434   0.02595   0.03930
               -9.00   0.00000   0.00172   0.00792   0.01803   0.03094   0.04569   0.06176
               -5.00   0.00000   0.00602   0.01643   0.03038   0.04659   0.06407   0.08244
               -1.00   0.00000   0.01012   0.02443   0.04181   0.06087   0.08060   0.10066
                3.00   0.00000   0.01385   0.03160   0.05182   0.07290   0.09532   0.12014
                7.00   0.00000   0.01700   0.03802   0.06409   0.09456   0.12675   0.15890
               11.00   0.00000   0.02436   0.05809   0.09650   0.13527   0.17327   0.21043
               15.00   0.00000   0.01265   0.04425   0.08478   0.12640   0.16548   0.20168
               19.00   0.00000  -0.00337   0.00842   0.03407   0.06864   0.10743   0.14723
               23.00   0.00000  -0.01375  -0.01707  -0.01156   0.00011   0.01593   0.03585
               27.00   0.00000  -0.02245  -0.03598  -0.04138  -0.03891  -0.03488  -0.02905
               32.00   0.00000  -0.03137  -0.05536  -0.07226  -0.08334  -0.09022  -0.09418
               46.00   0.00000  -0.01838  -0.03311  -0.04410  -0.05172  -0.05665  -0.05955
               70.00   0.00000   0.00053   0.00209   0.00465   0.00812   0.01239   0.01735
              120.00   0.00000   0.00053   0.00209   0.00465   0.00813   0.01241   0.01736
              180.00   0.00000   0.00053   0.00210   0.00468   0.00817   0.01247   0.01745
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            </tableData>
          </table>
          </product>
        </function>
        <function name="aero/coefficient/CD_rudder">
          <description>CD increment from rudder (deg), over alpha</description>
          <product>
            <property>aero/qbar-psf</property>
            <property>metrics/Sw-sqft</property>
            <property>aero/function/mach-rudder</property>
          <table>
            <independentVar lookup="row">aero/alpha-deg</independentVar>
            <independentVar lookup="column">fcs/rudder-pos-deg</independentVar>
            <tableData>
                        -25.00    -20.00    -15.00    -10.00     -5.00      0.00      5.00     10.00     15.00     20.00     25.00
             -180.00   0.00083   0.00054   0.00031   0.00014   0.00004   0.00000   0.00004   0.00014   0.00031   0.00054   0.00083
             -120.00   0.00010   0.00007   0.00004   0.00002   0.00000   0.00000   0.00000   0.00002   0.00004   0.00007   0.00010
              -70.00   0.00004   0.00002   0.00001   0.00001   0.00000   0.00000   0.00000   0.00001   0.00001   0.00002   0.00004
              -46.00   0.00281   0.00223   0.00157   0.00085   0.00023   0.00000   0.00023   0.00085   0.00157   0.00223   0.00281
              -32.00   0.00592   0.00532   0.00440   0.00086   0.00026   0.00000   0.00026   0.00086   0.00440   0.00532   0.00592
              -22.00   0.00299   0.00231   0.00159   0.00085   0.00025   0.00000   0.00025   0.00085   0.00159   0.00231   0.00299
              -17.00   0.00308   0.00236   0.00162   0.00086   0.00024   0.00000   0.00024   0.00086   0.00162   0.00236   0.00308
              -13.00   0.00312   0.00239   0.00163   0.00086   0.00024   0.00000   0.00024   0.00086   0.00163   0.00239   0.00312
               -9.00   0.00315   0.00241   0.00165   0.00087   0.00024   0.00000   0.00024   0.00087   0.00165   0.00241   0.00315
               -5.00   0.00315   0.00240   0.00164   0.00086   0.00024   0.00000   0.00024   0.00086   0.00164   0.00240   0.00315
               -1.00   0.00311   0.00237   0.00162   0.00085   0.00023   0.00000   0.00023   0.00085   0.00162   0.00237   0.00311
                3.00   0.00304   0.00232   0.00157   0.00083   0.00023   0.00000   0.00023   0.00083   0.00157   0.00232   0.00304
                7.00   0.00294   0.00224   0.00152   0.00080   0.00022   0.00000   0.00022   0.00080   0.00152   0.00224   0.00294
               11.00   0.00281   0.00213   0.00145   0.00076   0.00021   0.00000   0.00021   0.00076   0.00145   0.00213   0.00281
               15.00   0.00266   0.00203   0.00138   0.00072   0.00020   0.00000   0.00020   0.00072   0.00138   0.00203   0.00266
               19.00   0.00246   0.00187   0.00127   0.00067   0.00018   0.00000   0.00018   0.00067   0.00127   0.00187   0.00246
               23.00   0.00223   0.00169   0.00115   0.00060   0.00016   0.00000   0.00016   0.00060   0.00115   0.00169   0.00223
               27.00   0.00203   0.00153   0.00104   0.00054   0.00015   0.00000   0.00015   0.00054   0.00104   0.00153   0.00203
               32.00   0.00183   0.00139   0.00094   0.00049   0.00014   0.00000   0.00014   0.00049   0.00094   0.00139   0.00183
               46.00   0.00224   0.00176   0.00123   0.00066   0.00018   0.00000   0.00018   0.00066   0.00123   0.00176   0.00224
               70.00   0.00004   0.00002   0.00001   0.00001   0.00000   0.00000   0.00000   0.00001   0.00001   0.00002   0.00004
              120.00   0.00010   0.00007   0.00004   0.00002   0.00000   0.00000   0.00000   0.00002   0.00004   0.00007   0.00010
              180.00   0.00083   0.00054   0.00031   0.00014   0.00004   0.00000   0.00004   0.00014   0.00031   0.00054   0.00083
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            </tableData>
          </table>
          </product>
        </function>
        <function name="aero/coefficient/CD_ground">
          <description>Induced drag change in ground effect</description>
          <product>
            <property>aero/qbar-psf</property>
            <property>metrics/Sw-sqft</property>
            <property>aero/cl-squared</property>
            <value>0.04378</value>
          <table>
            <independentVar lookup="row">aero/h_b-mac-ft</independentVar>
            <tableData>
                    0.00   -1.00000
                    0.10   -0.28090
                    0.15   -0.14793
                    0.20   -0.08897
                    0.30   -0.04160
                    0.40   -0.02383
                    0.50   -0.01538
                    0.60   -0.01073
                    0.70   -0.00791
                    0.80   -0.00607
                    0.90   -0.00480
                    1.00   -0.00389
                    1.10   -0.00322
            </tableData>
          </table>
          </product>
        </function>
        <function name="aero/coefficient/CD_spoilers">
          <description>spoilers: drag of its spoiler panels, 19.2 m2 opened to 60 deg (hangar)</description>
          <product>
            <property>aero/qbar-psf</property>
            <property>metrics/Sw-sqft</property>
            <value>0.0620188</value>
            <pow>
              <sin>
                <product>
                  <property>fcs/speedbrake-pos-norm</property>
                  <value>1.0472</value>
                </product>
              </sin>
              <value>2</value>
            </pow>
          </product>
        </function>
        <function name="aero/coefficient/CD_gear">
          <description>the gear extended: its wheels' and struts' drag by Raymer's components, 2.07 m2 (hangar)</description>
          <product>
            <property>aero/qbar-psf</property>
            <property>metrics/Sw-sqft</property>
            <value>0.00558255</value>
            <property>gear/gear-pos-norm</property>
          </product>
        </function>
      </axis>
      <axis name="SIDE">
        <function name="aero/coefficient/CY_base">
          <description>CY over alpha and beta (hangar)</description>
          <product>
            <property>aero/qbar-psf</property>
            <property>metrics/Sw-sqft</property>
            <property>aero/function/mach-side</property>
          <table>
            <independentVar lookup="row">aero/alpha-deg</independentVar>
            <independentVar lookup="column">aero/beta-deg</independentVar>
            <tableData>
                        -90.00    -70.00    -50.00    -40.00    -30.00    -25.00    -20.00    -15.00    -10.00     -6.00     -3.00      0.00      3.00      6.00     10.00     15.00     20.00     25.00     30.00     40.00     50.00     70.00     90.00
             -180.00  -0.00001   0.15831   0.19579   0.16953   0.12310   0.09658   0.07036   0.04622   0.04672   0.05129   0.02673  -0.00000  -0.02673  -0.05129  -0.04672  -0.04622  -0.07036  -0.09658  -0.12310  -0.16953  -0.19579  -0.15831   0.00001
             -120.00  -0.00000  -0.08086  -0.32378  -0.40963  -0.42319  -0.39727  -0.34952  -0.28190  -0.19783  -0.11996  -0.05193  -0.00000   0.05193   0.11996   0.19783   0.28190   0.34952   0.39727   0.42319   0.40963   0.32378   0.08086   0.00000
              -70.00   0.00000  -0.09111  -0.32928  -0.41074  -0.42087  -0.39388  -0.34545  -0.27728  -0.19220  -0.11366  -0.05134  -0.00000   0.05134   0.11366   0.19220   0.27728   0.34545   0.39388   0.42087   0.41074   0.32928   0.09111  -0.00000
              -46.00   0.00001   0.02535  -0.06251  -0.10734  -0.12500  -0.11923  -0.10235  -0.06831  -0.03508  -0.02290  -0.01158  -0.00000   0.01158   0.02290   0.03508   0.06831   0.10235   0.11923   0.12500   0.10734   0.06251  -0.02535  -0.00001
              -32.00   0.00001   0.09274   0.08732   0.05694   0.04256   0.04535   0.05622   0.03584   0.02041   0.01069   0.00544  -0.00000  -0.00544  -0.01069  -0.02041  -0.03584  -0.05622  -0.04535  -0.04256  -0.05694  -0.08732  -0.09274  -0.00001
              -22.00   0.00001   0.14109   0.17845   0.16266   0.14691   0.15937   0.12743   0.09347   0.06028   0.03510   0.01719  -0.00000  -0.01719  -0.03510  -0.06028  -0.09347  -0.12743  -0.15937  -0.14691  -0.16266  -0.17845  -0.14109  -0.00001
              -17.00   0.00001   0.16439   0.21851   0.19972   0.17820   0.18235   0.14566   0.10668   0.06863   0.03987   0.01951  -0.00000  -0.01951  -0.03987  -0.06863  -0.10668  -0.14566  -0.18235  -0.17820  -0.19972  -0.21851  -0.16439  -0.00001
              -13.00   0.00001   0.18055   0.23655   0.21403   0.19406   0.19114   0.15185   0.11079   0.07092   0.04101   0.02001  -0.00000  -0.02001  -0.04101  -0.07092  -0.11079  -0.15185  -0.19114  -0.19406  -0.21403  -0.23655  -0.18055  -0.00001
               -9.00   0.00001   0.19005   0.24396   0.22142   0.20860   0.19324   0.15261   0.11064   0.07023   0.04029   0.01955  -0.00000  -0.01955  -0.04029  -0.07023  -0.11064  -0.15261  -0.19324  -0.20860  -0.22142  -0.24396  -0.19005  -0.00001
               -5.00   0.00001   0.19128   0.24579   0.21872   0.20302   0.18506   0.14554   0.10498   0.06616   0.03765   0.01812  -0.00000  -0.01812  -0.03765  -0.06616  -0.10498  -0.14554  -0.18506  -0.20302  -0.21872  -0.24579  -0.19128  -0.00001
               -1.00   0.00001   0.18431   0.24121   0.20804   0.18912   0.17002   0.13299   0.09534   0.05970   0.03378   0.01617  -0.00000  -0.01617  -0.03378  -0.05970  -0.09534  -0.13299  -0.17002  -0.18912  -0.20804  -0.24121  -0.18431  -0.00001
                3.00   0.00001   0.17195   0.22823   0.19104   0.16976   0.14909   0.11536   0.08186   0.05082   0.02869   0.01379  -0.00000  -0.01379  -0.02869  -0.05082  -0.08186  -0.11536  -0.14909  -0.16976  -0.19104  -0.22823  -0.17195  -0.00001
                7.00   0.00001   0.15922   0.20092   0.16636   0.14538   0.12058   0.09100   0.06315   0.03834   0.02130   0.01016  -0.00000  -0.01016  -0.02130  -0.03834  -0.06315  -0.09100  -0.12058  -0.14538  -0.16636  -0.20092  -0.15922  -0.00001
               11.00   0.00001   0.14449   0.17013   0.13805   0.11613   0.08547   0.05944   0.03822   0.02118   0.01084   0.00487  -0.00000  -0.00487  -0.01084  -0.02118  -0.03822  -0.05944  -0.08547  -0.11613  -0.13805  -0.17013  -0.14449  -0.00001
               15.00   0.00001   0.12847   0.14383   0.10944   0.07428   0.07178   0.04906   0.03080   0.01667   0.00898   0.00632  -0.00000  -0.00632  -0.00898  -0.01667  -0.03080  -0.04906  -0.07178  -0.07428  -0.10944  -0.14383  -0.12847  -0.00001
               19.00   0.00001   0.11283   0.11680   0.08075   0.04738   0.04908   0.02843   0.01429   0.00498   0.00116   0.00028  -0.00000  -0.00028  -0.00116  -0.00498  -0.01429  -0.02843  -0.04908  -0.04738  -0.08075  -0.11680  -0.11283  -0.00001
               23.00   0.00001   0.09838   0.08368   0.04801   0.02280   0.01996   0.00358  -0.00427  -0.00718  -0.00597  -0.00327  -0.00000   0.00327   0.00597   0.00718   0.00427  -0.00358  -0.01996  -0.02280  -0.04801  -0.08368  -0.09838  -0.00001
               27.00   0.00001   0.08301   0.04584   0.00753  -0.01732  -0.00619  -0.01800  -0.02202  -0.01954  -0.01241  -0.00653  -0.00000   0.00653   0.01241   0.01954   0.02202   0.01800   0.00619   0.01732  -0.00753  -0.04584  -0.08301  -0.00001
               32.00   0.00001   0.06007  -0.00650  -0.04973  -0.06854  -0.04610  -0.04534  -0.04414  -0.03468  -0.02257  -0.01165  -0.00000   0.01165   0.02257   0.03468   0.04414   0.04534   0.04610   0.06854   0.04973   0.00650  -0.06007  -0.00001
               46.00   0.00001  -0.01175  -0.16783  -0.23194  -0.24360  -0.22549  -0.19108  -0.12610  -0.08836  -0.05512  -0.02742  -0.00000   0.02742   0.05512   0.08836   0.12610   0.19108   0.22549   0.24360   0.23194   0.16783   0.01175  -0.00001
               70.00   0.00000  -0.11505  -0.39705  -0.49134  -0.50093  -0.46796  -0.40988  -0.32879  -0.22812  -0.13571  -0.06247  -0.00000   0.06247   0.13571   0.22812   0.32879   0.40988   0.46796   0.50093   0.49134   0.39705   0.11505  -0.00000
              120.00  -0.00000  -0.04850  -0.23239  -0.30096  -0.31529  -0.29742  -0.26268  -0.21247  -0.14942  -0.09024  -0.03693  -0.00000   0.03693   0.09024   0.14942   0.21247   0.26268   0.29742   0.31529   0.30096   0.23239   0.04850   0.00000
              180.00  -0.00001   0.15831   0.19579   0.16953   0.12310   0.09658   0.07036   0.04622   0.04672   0.05129   0.02673  -0.00000  -0.02673  -0.05129  -0.04672  -0.04622  -0.07036  -0.09658  -0.12310  -0.16953  -0.19579  -0.15831   0.00001
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            </tableData>
          </table>
          </product>
        </function>
        <function name="aero/coefficient/CY_aileron">
          <description>CY increment from aileron (deg), over alpha</description>
          <product>
            <property>aero/qbar-psf</property>
            <property>metrics/Sw-sqft</property>
            <property>aero/function/mach-aileron</property>
          <table>
            <independentVar lookup="row">aero/alpha-deg</independentVar>
            <independentVar lookup="column">fcs/left-aileron-pos-deg</independentVar>
            <tableData>
                        -20.00    -15.00    -10.00     -5.00      0.00      5.00     10.00     15.00     20.00
             -180.00   0.00000   0.00000   0.00000   0.00000   0.00000   0.00000   0.00000   0.00000   0.00000
             -120.00  -0.00084  -0.00072  -0.00053  -0.00028   0.00000   0.00028   0.00053   0.00072   0.00084
              -70.00   0.00061   0.00052   0.00038   0.00020   0.00000  -0.00020  -0.00038  -0.00052  -0.00061
              -46.00   0.00291   0.00256   0.00194   0.00105   0.00000  -0.00105  -0.00194  -0.00256  -0.00291
              -32.00   0.00560   0.00487   0.00371   0.00202   0.00000  -0.00202  -0.00371  -0.00487  -0.00560
              -22.00   0.00877   0.00758   0.00570   0.00304   0.00000  -0.00304  -0.00570  -0.00758  -0.00877
              -17.00   0.01092   0.00939   0.00703   0.00376   0.00000  -0.00376  -0.00703  -0.00939  -0.01092
              -13.00   0.01113   0.00958   0.00716   0.00383   0.00000  -0.00383  -0.00716  -0.00958  -0.01113
               -9.00   0.01121   0.00965   0.00722   0.00386   0.00000  -0.00386  -0.00722  -0.00965  -0.01121
               -5.00   0.01116   0.00961   0.00719   0.00384   0.00000  -0.00384  -0.00719  -0.00961  -0.01116
               -1.00   0.01098   0.00946   0.00708   0.00378   0.00000  -0.00378  -0.00708  -0.00946  -0.01098
                3.00   0.01065   0.00917   0.00686   0.00367   0.00000  -0.00367  -0.00686  -0.00917  -0.01065
                7.00   0.01094   0.00926   0.00679   0.00357   0.00000  -0.00357  -0.00679  -0.00926  -0.01094
               11.00   0.01464   0.01261   0.00948   0.00511   0.00000  -0.00511  -0.00948  -0.01261  -0.01464
               15.00  -0.00459  -0.00520  -0.00636  -0.00788   0.00000   0.00788   0.00636   0.00520   0.00459
               19.00  -0.00198  -0.00127  -0.00074  -0.00035   0.00000   0.00035   0.00074   0.00127   0.00198
               23.00  -0.00162  -0.00111  -0.00070  -0.00034   0.00000   0.00034   0.00070   0.00111   0.00162
               27.00  -0.00041  -0.00011   0.00003   0.00005   0.00000  -0.00005  -0.00003   0.00011   0.00041
               32.00   0.00003   0.00026   0.00031   0.00020   0.00000  -0.00020  -0.00031  -0.00026  -0.00003
               46.00   0.00097   0.00095   0.00077   0.00043   0.00000  -0.00043  -0.00077  -0.00095  -0.00097
               70.00   0.00023   0.00019   0.00014   0.00008   0.00000  -0.00008  -0.00014  -0.00019  -0.00023
              120.00  -0.00167  -0.00142  -0.00105  -0.00056   0.00000   0.00056   0.00105   0.00142   0.00167
              180.00   0.00000   0.00000   0.00000   0.00000   0.00000   0.00000   0.00000   0.00000   0.00000
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            </tableData>
          </table>
          </product>
        </function>
        <function name="aero/coefficient/CY_rudder">
          <description>CY increment from rudder (deg), over alpha</description>
          <product>
            <property>aero/qbar-psf</property>
            <property>metrics/Sw-sqft</property>
            <property>aero/function/mach-rudder</property>
          <table>
            <independentVar lookup="row">aero/alpha-deg</independentVar>
            <independentVar lookup="column">fcs/rudder-pos-deg</independentVar>
            <tableData>
                        -25.00    -20.00    -15.00    -10.00     -5.00      0.00      5.00     10.00     15.00     20.00     25.00
             -180.00   0.00000   0.00000   0.00000   0.00000   0.00000   0.00000   0.00000   0.00000   0.00000   0.00000   0.00000
             -120.00   0.00000   0.00000   0.00000   0.00000   0.00000   0.00000   0.00000   0.00000   0.00000   0.00000   0.00000
              -70.00  -0.00868  -0.00783  -0.00665  -0.00493  -0.00262   0.00000   0.00262   0.00493   0.00665   0.00783   0.00868
              -46.00  -0.02615  -0.02363  -0.02013  -0.01494  -0.00794   0.00000   0.00794   0.01494   0.02013   0.02363   0.02615
              -32.00  -0.01952  -0.01731  -0.01446  -0.01235  -0.00662   0.00000   0.00662   0.01235   0.01446   0.01731   0.01952
              -22.00  -0.02815  -0.02537  -0.02156  -0.01600  -0.00854   0.00000   0.00854   0.01600   0.02156   0.02537   0.02815
              -17.00  -0.03006  -0.02705  -0.02295  -0.01699  -0.00904   0.00000   0.00904   0.01699   0.02295   0.02705   0.03006
              -13.00  -0.03123  -0.02808  -0.02379  -0.01759  -0.00934   0.00000   0.00934   0.01759   0.02379   0.02808   0.03123
               -9.00  -0.03192  -0.02869  -0.02430  -0.01796  -0.00954   0.00000   0.00954   0.01796   0.02430   0.02869   0.03192
               -5.00  -0.03215  -0.02890  -0.02449  -0.01811  -0.00962   0.00000   0.00962   0.01811   0.02449   0.02890   0.03215
               -1.00  -0.03205  -0.02882  -0.02442  -0.01806  -0.00959   0.00000   0.00959   0.01806   0.02442   0.02882   0.03205
                3.00  -0.03161  -0.02843  -0.02410  -0.01782  -0.00947   0.00000   0.00947   0.01782   0.02410   0.02843   0.03161
                7.00  -0.03083  -0.02773  -0.02350  -0.01738  -0.00923   0.00000   0.00923   0.01738   0.02350   0.02773   0.03083
               11.00  -0.02969  -0.02670  -0.02263  -0.01673  -0.00889   0.00000   0.00889   0.01673   0.02263   0.02670   0.02969
               15.00  -0.02781  -0.02497  -0.02114  -0.01562  -0.00830   0.00000   0.00830   0.01562   0.02114   0.02497   0.02781
               19.00  -0.02684  -0.02415  -0.02047  -0.01514  -0.00804   0.00000   0.00804   0.01514   0.02047   0.02415   0.02684
               23.00  -0.02492  -0.02241  -0.01900  -0.01405  -0.00746   0.00000   0.00746   0.01405   0.01900   0.02241   0.02492
               27.00  -0.02250  -0.02016  -0.01702  -0.01255  -0.00666   0.00000   0.00666   0.01255   0.01702   0.02016   0.02250
               32.00  -0.02048  -0.01838  -0.01555  -0.01148  -0.00609   0.00000   0.00609   0.01148   0.01555   0.01838   0.02048
               46.00  -0.02509  -0.02268  -0.01931  -0.01432  -0.00757   0.00000   0.00757   0.01432   0.01931   0.02268   0.02509
               70.00  -0.00868  -0.00783  -0.00665  -0.00493  -0.00262   0.00000   0.00262   0.00493   0.00665   0.00783   0.00868
              120.00   0.00000   0.00000   0.00000   0.00000   0.00000   0.00000   0.00000   0.00000   0.00000   0.00000   0.00000
              180.00   0.00000   0.00000   0.00000   0.00000   0.00000   0.00000   0.00000   0.00000   0.00000   0.00000   0.00000
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            </tableData>
          </table>
          </product>
        </function>
        <function name="aero/coefficient/CYp">
          <description>CY per p (non-dimensional), over alpha</description>
          <product>
            <property>aero/qbar-psf</property>
            <property>metrics/Sw-sqft</property>
            <property>aero/bi2vel</property>
            <property>velocities/p-aero-rad_sec</property>
            <property>aero/function/mach-lift</property>
          <table>
            <independentVar lookup="row">aero/alpha-deg</independentVar>
            <tableData>
                 -180.00    0.01378
                 -165.00   -0.01153
                 -105.00    0.08687
                  -60.00    0.04757
                  -42.00    0.00855
                  -30.00   -0.39108
                  -20.00    0.13439
                  -16.00    0.14087
                  -12.00    0.14311
                   -8.00    0.14453
                   -4.00    0.14308
                    0.00    0.14176
                    4.00    0.13186
                    8.00    0.09989
                   12.00   -0.01584
                   16.00    0.64598
                   20.00    0.20632
                   24.00    0.13595
                   28.00    0.09263
                   35.00    0.07634
                   50.00    0.03910
                   80.00    0.09146
                  135.00    0.02874
                  180.00    0.01378
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            </tableData>
          </table>
          </product>
        </function>
        <function name="aero/coefficient/CYr">
          <description>CY per r (non-dimensional), over alpha</description>
          <product>
            <property>aero/qbar-psf</property>
            <property>metrics/Sw-sqft</property>
            <property>aero/bi2vel</property>
            <property>velocities/r-aero-rad_sec</property>
            <property>aero/function/mach-lift</property>
          <table>
            <independentVar lookup="row">aero/alpha-deg</independentVar>
            <tableData>
                 -180.00    0.33502
                 -165.00    0.32944
                 -105.00    0.05927
                  -60.00    0.24677
                  -42.00    0.25041
                  -30.00    0.41663
                  -20.00    0.22211
                  -16.00    0.21783
                  -12.00    0.21306
                   -8.00    0.20740
                   -4.00    0.20053
                    0.00    0.18848
                    4.00    0.16755
                    8.00    0.14089
                   12.00    0.08957
                   16.00    0.38961
                   20.00    0.18323
                   24.00    0.13903
                   28.00    0.11685
                   35.00    0.11294
                   50.00    0.18210
                   80.00    0.05336
                  135.00    0.26389
                  180.00    0.33502
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            </tableData>
          </table>
          </product>
        </function>
      </axis>
      <axis name="LIFT">
        <function name="aero/coefficient/CL_base">
          <description>CL over alpha and beta, ground effect, compressibility (hangar)</description>
          <product>
            <property>aero/qbar-psf</property>
            <property>metrics/Sw-sqft</property>
            <property>aero/function/CL-base</property>
            <property>aero/function/mach-lift</property>
          <table>
            <independentVar lookup="row">aero/h_b-mac-ft</independentVar>
            <tableData>
                    0.00    1.20000
                    0.10    1.08692
                    0.15    1.05730
                    0.20    1.03778
                    0.30    1.01642
                    0.40    1.00713
                    0.50    1.00310
                    0.60    1.00135
                    0.70    1.00059
                    0.80    1.00025
                    0.90    1.00011
                    1.00    1.00005
                    1.10    1.00000
            </tableData>
          </table>
          </product>
        </function>
        <function name="aero/coefficient/CL_elevator">
          <description>CL increment from elevator (deg), over alpha</description>
          <product>
            <property>aero/qbar-psf</property>
            <property>metrics/Sw-sqft</property>
            <property>aero/function/mach-elevator</property>
          <table>
            <independentVar lookup="row">aero/alpha-deg</independentVar>
            <independentVar lookup="column">fcs/elevator-pos-deg</independentVar>
            <tableData>
                        -10.00     -5.00      0.00      5.00     10.00     15.00
             -180.00  -0.14083  -0.07936   0.00000   0.04285   0.00308   0.01522
             -120.00   0.01625   0.00958   0.00000  -0.01221  -0.02666  -0.04294
              -70.00   0.03353   0.01608   0.00000  -0.01431  -0.02657  -0.03659
              -46.00   0.01360   0.00565   0.00000  -0.00363  -0.00590  -0.00813
              -32.00   0.01041   0.00627   0.00000  -0.06649  -0.03591   0.00958
              -22.00  -0.00660  -0.04422   0.00000   0.05438   0.11148   0.17059
              -17.00  -0.09459  -0.05576   0.00000   0.05844   0.11865   0.18013
              -13.00  -0.11259  -0.05865   0.00000   0.06036   0.12181   0.18387
               -9.00  -0.11921  -0.06054   0.00000   0.06154   0.12350   0.18539
               -5.00  -0.12244  -0.06170   0.00000   0.06200   0.12375   0.18475
               -1.00  -0.12410  -0.06214   0.00000   0.06171   0.12248   0.18181
                3.00  -0.12414  -0.06178   0.00000   0.06067   0.11974   0.17665
                7.00  -0.12252  -0.06065   0.00000   0.05888   0.11552   0.16903
               11.00  -0.11330  -0.05469   0.00000   0.05344   0.10400   0.14739
               15.00  -0.05323  -0.04236   0.00000   0.04190   0.07861   0.04298
               19.00  -0.08582  -0.04646   0.00000   0.04108  -0.01806  -0.03379
               23.00  -0.08401  -0.04039   0.00000  -0.06835  -0.07841  -0.08481
               27.00   0.03199   0.06993   0.00000  -0.00882  -0.01442  -0.02009
               32.00   0.07426   0.00631   0.00000  -0.00458  -0.00981  -0.01667
               46.00   0.01139   0.00674   0.00000  -0.00907  -0.02044  -0.03386
               70.00   0.03156   0.01660   0.00000  -0.01783  -0.03643  -0.05528
              120.00   0.02073   0.00902   0.00000  -0.00606  -0.00897  -0.00864
              180.00  -0.14083  -0.07936   0.00000   0.04285   0.00308   0.01522
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            </tableData>
          </table>
          </product>
        </function>
        <function name="aero/coefficient/CL_flap">
          <description>CL increment from flap (deg), over alpha</description>
          <product>
            <property>aero/qbar-psf</property>
            <property>metrics/Sw-sqft</property>
            <property>aero/function/mach-flap</property>
          <table>
            <independentVar lookup="row">aero/alpha-deg</independentVar>
            <independentVar lookup="column">fcs/flap-pos-deg</independentVar>
            <tableData>
                          0.00      5.00     10.00     15.00     20.00     25.00     30.00
             -180.00   0.00000   0.00544   0.01086   0.01599   0.02060   0.02469   0.02838
             -120.00   0.00000   0.01935   0.03866   0.05688   0.07330   0.08785   0.10096
              -70.00   0.00000   0.02524   0.05196   0.07866   0.10400   0.12753   0.14965
              -46.00   0.00000   0.06460   0.13252   0.19893   0.25975   0.31358   0.36145
              -32.00   0.00000   0.09728   0.19760   0.28980   0.36499   0.41736   0.45000
              -22.00   0.00000   0.15612   0.31766   0.47211   0.61221   0.73682   0.84975
              -17.00   0.00000   0.16777   0.33587   0.49466   0.63735   0.76313   0.87595
              -13.00   0.00000   0.17063   0.34113   0.50179   0.64582   0.77248   0.88579
               -9.00   0.00000   0.17174   0.34293   0.50387   0.64787   0.77428   0.88719
               -5.00   0.00000   0.17155   0.34214   0.50218   0.64514   0.77048   0.88227
               -1.00   0.00000   0.17028   0.33933   0.49762   0.63869   0.76197   0.87104
                3.00   0.00000   0.16577   0.32981   0.48241   0.61541   0.72707   0.82119
                7.00   0.00000   0.15670   0.30406   0.42885   0.52663   0.60264   0.66557
               11.00   0.00000   0.11226   0.21287   0.30433   0.38681   0.45939   0.52413
               15.00   0.00000   0.20976   0.39258   0.53991   0.65354   0.74125   0.81142
               19.00   0.00000   0.15050   0.30600   0.45430   0.58834   0.70738   0.81109
               23.00   0.00000   0.12227   0.24368   0.35628   0.45528   0.54127   0.61896
               27.00   0.00000   0.10884   0.21861   0.32281   0.45971   0.54244   0.60453
               32.00   0.00000   0.08502   0.17112   0.25154   0.32173   0.38085   0.43053
               46.00   0.00000   0.04487   0.08940   0.13060   0.16658   0.19722   0.22362
               70.00   0.00000   0.00703   0.01370   0.01970   0.02485   0.02923   0.03301
              120.00   0.00000   0.04608   0.09207   0.13549   0.17462   0.20929   0.24054
              180.00   0.00000   0.00544   0.01086   0.01599   0.02060   0.02469   0.02838
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            </tableData>
          </table>
          <table>
            <independentVar lookup="row">aero/h_b-mac-ft</independentVar>
            <tableData>
                    0.00    1.20000
                    0.10    1.08692
                    0.15    1.05730
                    0.20    1.03778
                    0.30    1.01642
                    0.40    1.00713
                    0.50    1.00310
                    0.60    1.00135
                    0.70    1.00059
                    0.80    1.00025
                    0.90    1.00011
                    1.00    1.00005
                    1.10    1.00000
            </tableData>
          </table>
          </product>
        </function>
        <function name="aero/coefficient/CLq">
          <description>CL per q (non-dimensional), over alpha</description>
          <product>
            <property>aero/qbar-psf</property>
            <property>metrics/Sw-sqft</property>
            <property>aero/ci2vel</property>
            <property>velocities/q-aero-rad_sec</property>
            <property>aero/function/mach-lift</property>
          <table>
            <independentVar lookup="row">aero/alpha-deg</independentVar>
            <tableData>
                 -180.00   -4.70831
                 -165.00   -0.53993
                 -105.00   -0.54860
                  -60.00    1.05967
                  -42.00    1.35605
                  -30.00   -1.01428
                  -20.00    6.48734
                  -16.00    8.67469
                  -12.00    9.16628
                   -8.00    9.46230
                   -4.00    9.71133
                    0.00    9.84524
                    4.00    9.77585
                    8.00    8.41868
                   12.00    3.75074
                   16.00    0.09800
                   20.00    1.48940
                   24.00    1.25983
                   28.00    0.77630
                   35.00    1.34772
                   50.00    1.40450
                   80.00    0.33825
                  135.00   -1.34662
                  180.00   -4.70831
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            </tableData>
          </table>
          </product>
        </function>
        <function name="aero/coefficient/CLadot">
          <description>CL per alpha-dot (downwash lag at the tail)</description>
          <product>
            <property>aero/qbar-psf</property>
            <property>metrics/Sw-sqft</property>
            <property>aero/ci2vel</property>
            <property>aero/alphadot-rad_sec</property>
            <value>1.09780</value>
            <property>aero/function/mach-lift</property>
          </product>
        </function>
        <function name="aero/coefficient/CL_spoilers">
          <description>spoilers: the lift lost behind them, 192 m2 of wing, over alpha (hangar)</description>
          <product>
            <property>aero/qbar-psf</property>
            <property>metrics/Sw-sqft</property>
            <table>
              <independentVar lookup="row">aero/alpha-deg</independentVar>
              <tableData>
                   -180.00   -0.20694
                   -165.00   -0.19645
                   -105.00   -0.11339
                    -60.00    0.36369
                    -42.00    0.42869
                    -30.00    0.47875
                    -20.00    0.42172
                    -16.00    0.28948
                    -12.00    0.15357
                     -8.00    0.01693
                     -4.00   -0.11854
                      0.00   -0.25382
                      4.00   -0.38804
                      8.00   -0.51946
                     12.00   -0.60370
                     16.00   -0.50073
                     20.00   -0.47531
                     24.00   -0.46806
                     28.00   -0.42514
                     35.00   -0.39907
                     50.00   -0.33970
                     80.00   -0.05811
                    135.00    0.31469
                    180.00   -0.20694
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              </tableData>
            </table>
            <min>
              <value>1</value>
              <product>
                <property>fcs/speedbrake-pos-norm</property>
                <value>1.33333</value>
              </product>
            </min>
          </product>
        </function>
      </axis>
      <axis name="ROLL">
        <function name="aero/coefficient/Cl_base">
          <description>Cl over alpha and beta (hangar)</description>
          <product>
            <property>aero/qbar-psf</property>
            <property>metrics/Sw-sqft</property>
            <property>metrics/bw-ft</property>
            <property>aero/function/mach-side</property>
          <table>
            <independentVar lookup="row">aero/alpha-deg</independentVar>
            <independentVar lookup="column">aero/beta-deg</independentVar>
            <tableData>
                        -90.00    -70.00    -50.00    -40.00    -30.00    -25.00    -20.00    -15.00    -10.00     -6.00     -3.00      0.00      3.00      6.00     10.00     15.00     20.00     25.00     30.00     40.00     50.00     70.00     90.00
             -180.00  -0.00320  -0.01152  -0.01247  -0.01212  -0.01192  -0.01138  -0.01032  -0.00861  -0.00488  -0.00139  -0.00057  -0.00000   0.00057   0.00139   0.00488   0.00861   0.01032   0.01138   0.01192   0.01212   0.01247   0.01152   0.00320
             -120.00  -0.00320  -0.01454  -0.02157  -0.02149  -0.01888  -0.01670  -0.01402  -0.01091  -0.00747  -0.00442  -0.00167  -0.00000   0.00167   0.00442   0.00747   0.01091   0.01402   0.01670   0.01888   0.02149   0.02157   0.01454   0.00320
              -70.00  -0.00320  -0.01510  -0.02261  -0.02261  -0.01994  -0.01766  -0.01482  -0.01149  -0.00773  -0.00440  -0.00183  -0.00000   0.00183   0.00440   0.00773   0.01149   0.01482   0.01766   0.01994   0.02261   0.02261   0.01510   0.00320
              -46.00  -0.00320  -0.01099  -0.01586  -0.01539  -0.01293  -0.01097  -0.00847  -0.00527  -0.00241  -0.00146  -0.00071  -0.00000   0.00071   0.00146   0.00241   0.00527   0.00847   0.01097   0.01293   0.01539   0.01586   0.01099   0.00320
              -32.00  -0.00320  -0.00439  -0.00755  -0.01333  -0.03794  -0.04329  -0.03887  -0.03028  -0.02075  -0.01263  -0.00636  -0.00000   0.00636   0.01263   0.02075   0.03028   0.03887   0.04329   0.03794   0.01333   0.00755   0.00439   0.00320
              -22.00  -0.00320  -0.01397  -0.00798  -0.02622  -0.06754  -0.07123  -0.06320  -0.04965  -0.03419  -0.02084  -0.01048  -0.00000   0.01048   0.02084   0.03419   0.04965   0.06320   0.07123   0.06754   0.02622   0.00798   0.01397   0.00320
              -17.00  -0.00320  -0.02053  -0.03260  -0.04975  -0.06272  -0.06024  -0.05131  -0.03975  -0.02710  -0.01644  -0.00825  -0.00000   0.00825   0.01644   0.02710   0.03975   0.05131   0.06024   0.06272   0.04975   0.03260   0.02053   0.00320
              -13.00  -0.00320  -0.02701  -0.04586  -0.04230  -0.04401  -0.04116  -0.03455  -0.02671  -0.01818  -0.01101  -0.00553  -0.00000   0.00553   0.01101   0.01818   0.02671   0.03455   0.04116   0.04401   0.04230   0.04586   0.02701   0.00320
               -9.00  -0.00320  -0.03118  -0.04574  -0.03392  -0.02510  -0.02161  -0.01778  -0.01366  -0.00924  -0.00558  -0.00279  -0.00000   0.00279   0.00558   0.00924   0.01366   0.01778   0.02161   0.02510   0.03392   0.04574   0.03118   0.00320
               -5.00  -0.00320  -0.02966  -0.04608  -0.02508  -0.00639  -0.00173  -0.00100  -0.00061  -0.00031  -0.00014  -0.00005  -0.00000   0.00005   0.00014   0.00031   0.00061   0.00100   0.00173   0.00639   0.02508   0.04608   0.02966   0.00320
               -1.00  -0.00320  -0.02448  -0.04536  -0.01663   0.01226   0.01847   0.01591   0.01252   0.00866   0.00530   0.00267  -0.00000  -0.00267  -0.00530  -0.00866  -0.01252  -0.01591  -0.01847  -0.01226   0.01663   0.04536   0.02448   0.00320
                3.00  -0.00320  -0.01779  -0.03284  -0.00897   0.03056   0.03853   0.03298   0.02578   0.01770   0.01079   0.00543  -0.00000  -0.00543  -0.01079  -0.01770  -0.02578  -0.03298  -0.03853  -0.03056   0.00897   0.03284   0.01779   0.00320
                7.00  -0.00320  -0.01215  -0.00372   0.00832   0.05011   0.05915   0.05102   0.03971   0.02718   0.01654   0.00832  -0.00000  -0.00832  -0.01654  -0.02718  -0.03971  -0.05102  -0.05915  -0.05011  -0.00832   0.00372   0.01215   0.00320
               11.00  -0.00320  -0.00664   0.01648   0.04513   0.08667   0.09525   0.08492   0.06720   0.04652   0.02846   0.01435  -0.00000  -0.01435  -0.02846  -0.04652  -0.06720  -0.08492  -0.09525  -0.08667  -0.04513  -0.01648   0.00664   0.00320
               15.00  -0.00320  -0.00219   0.01467   0.03998   0.09018   0.09671   0.08658   0.06902   0.04948   0.03285   0.01986  -0.00000  -0.01986  -0.03285  -0.04948  -0.06902  -0.08658  -0.09671  -0.09018  -0.03998  -0.01467   0.00219   0.00320
               19.00  -0.00320  -0.00008  -0.00106   0.01484   0.05157   0.06012   0.05493   0.04269   0.02917   0.01773   0.00894  -0.00000  -0.00894  -0.01773  -0.02917  -0.04269  -0.05493  -0.06012  -0.05157  -0.01484   0.00106   0.00008   0.00320
               23.00  -0.00320  -0.00278  -0.00538   0.00408   0.03221   0.04027   0.03778   0.02950   0.02024   0.01233   0.00622  -0.00000  -0.00622  -0.01233  -0.02024  -0.02950  -0.03778  -0.04027  -0.03221  -0.00408   0.00538   0.00278   0.00320
               27.00  -0.00320  -0.00666  -0.00857  -0.00306   0.01255   0.01935   0.01982   0.01572   0.01077   0.00651   0.00328  -0.00000  -0.00328  -0.00651  -0.01077  -0.01572  -0.01982  -0.01935  -0.01255   0.00306   0.00857   0.00666   0.00320
               32.00  -0.00320  -0.00861  -0.01170  -0.00838  -0.00162   0.00205   0.00364   0.00308   0.00212   0.00129   0.00065  -0.00000  -0.00065  -0.00129  -0.00212  -0.00308  -0.00364  -0.00205   0.00162   0.00838   0.01170   0.00861   0.00320
               46.00  -0.00320  -0.01214  -0.01752  -0.01694  -0.01303  -0.01040  -0.00760  -0.00384  -0.00216  -0.00126  -0.00058  -0.00000   0.00058   0.00126   0.00216   0.00384   0.00760   0.01040   0.01303   0.01694   0.01752   0.01214   0.00320
               70.00  -0.00320  -0.01561  -0.02339  -0.02339  -0.02062  -0.01827  -0.01533  -0.01189  -0.00800  -0.00457  -0.00191  -0.00000   0.00191   0.00457   0.00800   0.01189   0.01533   0.01827   0.02062   0.02339   0.02339   0.01561   0.00320
              120.00  -0.00320  -0.01386  -0.02053  -0.02045  -0.01796  -0.01589  -0.01334  -0.01038  -0.00711  -0.00420  -0.00156  -0.00000   0.00156   0.00420   0.00711   0.01038   0.01334   0.01589   0.01796   0.02045   0.02053   0.01386   0.00320
              180.00  -0.00320  -0.01152  -0.01247  -0.01212  -0.01192  -0.01138  -0.01032  -0.00861  -0.00488  -0.00139  -0.00057  -0.00000   0.00057   0.00139   0.00488   0.00861   0.01032   0.01138   0.01192   0.01212   0.01247   0.01152   0.00320
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            </tableData>
          </table>
          </product>
        </function>
        <function name="aero/coefficient/Cl_aileron">
          <description>Cl increment from aileron (deg), over alpha</description>
          <product>
            <property>aero/qbar-psf</property>
            <property>metrics/Sw-sqft</property>
            <property>metrics/bw-ft</property>
            <property>aero/function/mach-aileron</property>
          <table>
            <independentVar lookup="row">aero/alpha-deg</independentVar>
            <independentVar lookup="column">fcs/left-aileron-pos-deg</independentVar>
            <tableData>
                        -20.00    -15.00    -10.00     -5.00      0.00      5.00     10.00     15.00     20.00
             -180.00   0.00000   0.00000   0.00000   0.00000   0.00000   0.00000   0.00000   0.00000   0.00000
              -35.00  -0.01515  -0.01358  -0.01049  -0.00573   0.00000   0.00573   0.01049   0.01358   0.01515
              -11.00  -0.04038  -0.03462  -0.02582  -0.01378   0.00000   0.01378   0.02582   0.03462   0.04038
                4.00  -0.03989  -0.03424  -0.02556  -0.01365   0.00000   0.01365   0.02556   0.03424   0.03989
               19.00  -0.03735  -0.03198  -0.02389  -0.01278   0.00000   0.01278   0.02389   0.03198   0.03735
               42.00  -0.00658  -0.00624  -0.00500  -0.00277   0.00000   0.00277   0.00500   0.00624   0.00658
              180.00   0.00000   0.00000   0.00000   0.00000   0.00000   0.00000   0.00000   0.00000   0.00000
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            </tableData>
          </table>
          </product>
        </function>
        <function name="aero/coefficient/Cl_rudder">
          <description>Cl increment from rudder (deg), over alpha</description>
          <product>
            <property>aero/qbar-psf</property>
            <property>metrics/Sw-sqft</property>
            <property>metrics/bw-ft</property>
            <property>aero/function/mach-rudder</property>
          <table>
            <independentVar lookup="row">aero/alpha-deg</independentVar>
            <independentVar lookup="column">fcs/rudder-pos-deg</independentVar>
            <tableData>
                        -25.00    -20.00    -15.00    -10.00     -5.00      0.00      5.00     10.00     15.00     20.00     25.00
             -180.00   0.00000   0.00000   0.00000   0.00000   0.00000   0.00000   0.00000   0.00000   0.00000   0.00000   0.00000
              -35.00  -0.00154  -0.00137  -0.00115  -0.00084  -0.00045   0.00000   0.00045   0.00084   0.00115   0.00137   0.00154
              -11.00  -0.00171  -0.00152  -0.00127  -0.00093  -0.00049   0.00000   0.00049   0.00093   0.00127   0.00152   0.00171
                4.00  -0.00184  -0.00164  -0.00137  -0.00100  -0.00053   0.00000   0.00053   0.00100   0.00137   0.00164   0.00184
               19.00  -0.00177  -0.00158  -0.00132  -0.00097  -0.00051   0.00000   0.00051   0.00097   0.00132   0.00158   0.00177
               42.00  -0.00160  -0.00143  -0.00120  -0.00088  -0.00047   0.00000   0.00047   0.00088   0.00120   0.00143   0.00160
              180.00   0.00000   0.00000   0.00000   0.00000   0.00000   0.00000   0.00000   0.00000   0.00000   0.00000   0.00000
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            </tableData>
          </table>
          </product>
        </function>
        <function name="aero/coefficient/Clp">
          <description>Cl per p (non-dimensional), over alpha</description>
          <product>
            <property>aero/qbar-psf</property>
            <property>metrics/Sw-sqft</property>
            <property>metrics/bw-ft</property>
            <property>aero/bi2vel</property>
            <property>velocities/p-aero-rad_sec</property>
            <property>aero/function/mach-lift</property>
          <table>
            <independentVar lookup="row">aero/alpha-deg</independentVar>
            <tableData>
                 -180.00   -0.35272
                 -165.00   -0.19886
                  -32.00   -0.11139
                  -10.00   -0.44988
                    5.00   -0.45427
                   20.00   -0.01691
                   46.00   -0.20826
                  180.00   -0.35272
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            </tableData>
          </table>
          </product>
        </function>
        <function name="aero/coefficient/Clr">
          <description>Cl per r (non-dimensional), over alpha</description>
          <product>
            <property>aero/qbar-psf</property>
            <property>metrics/Sw-sqft</property>
            <property>metrics/bw-ft</property>
            <property>aero/bi2vel</property>
            <property>velocities/r-aero-rad_sec</property>
            <property>aero/function/mach-lift</property>
          <table>
            <independentVar lookup="row">aero/alpha-deg</independentVar>
            <tableData>
                 -180.00    0.13820
                 -165.00    0.09627
                  -32.00   -0.19310
                  -10.00    0.02381
                    5.00    0.21533
                   20.00    0.27435
                   46.00    0.17527
                  180.00    0.13820
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            </tableData>
          </table>
          </product>
        </function>
      </axis>
      <axis name="PITCH">
        <function name="aero/coefficient/Cm_base">
          <description>Cm over alpha and beta (hangar)</description>
          <product>
            <property>aero/qbar-psf</property>
            <property>metrics/Sw-sqft</property>
            <property>metrics/cbarw-ft</property>
          <table>
            <independentVar lookup="row">aero/alpha-deg</independentVar>
            <independentVar lookup="column">aero/beta-deg</independentVar>
            <tableData>
                        -90.00    -70.00    -50.00    -40.00    -30.00    -25.00    -20.00    -15.00    -10.00     -6.00     -3.00      0.00      3.00      6.00     10.00     15.00     20.00     25.00     30.00     40.00     50.00     70.00     90.00
             -180.00  -0.00002   0.01827   0.10092   0.17982   0.26717   0.30873   0.34605   0.37707   0.40256   0.41422   0.41751   0.41854   0.41751   0.41422   0.40256   0.37707   0.34605   0.30873   0.26717   0.17982   0.10092   0.01827  -0.00002
              -35.00  -0.00002   0.05330   0.16170   0.21040   0.23807   0.24663   0.25944   0.26114   0.26175   0.26125   0.26075   0.26054   0.26075   0.26125   0.26175   0.26114   0.25944   0.24663   0.23807   0.21040   0.16170   0.05330  -0.00002
              -11.00  -0.00002   0.04065   0.15944   0.16263   0.17519   0.18319   0.19243   0.19985   0.20492   0.20730   0.20814   0.20835   0.20814   0.20730   0.20492   0.19985   0.19243   0.18319   0.17519   0.16263   0.15944   0.04065  -0.00002
                4.00  -0.00002  -0.03219  -0.04808  -0.03681  -0.00586  -0.00990  -0.02225  -0.03364  -0.04362  -0.05004  -0.05344  -0.05487  -0.05344  -0.05004  -0.04362  -0.03364  -0.02225  -0.00990  -0.00586  -0.03681  -0.04808  -0.03219  -0.00002
               19.00  -0.00002  -0.05611  -0.16527  -0.26492  -0.26074  -0.25573  -0.28990  -0.31273  -0.32788  -0.33532  -0.33838  -0.33945  -0.33838  -0.33532  -0.32788  -0.31273  -0.28990  -0.25573  -0.26074  -0.26492  -0.16527  -0.05611  -0.00002
               42.00  -0.00002  -0.07935  -0.25333  -0.34591  -0.41178  -0.43347  -0.45165  -0.45701  -0.45389  -0.45113  -0.44940  -0.44855  -0.44940  -0.45113  -0.45389  -0.45701  -0.45165  -0.43347  -0.41178  -0.34591  -0.25333  -0.07935  -0.00002
              180.00  -0.00002   0.01827   0.10092   0.17982   0.26717   0.30873   0.34605   0.37707   0.40256   0.41422   0.41751   0.41854   0.41751   0.41422   0.40256   0.37707   0.34605   0.30873   0.26717   0.17982   0.10092   0.01827  -0.00002
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            </tableData>
          </table>
          </product>
        </function>
        <function name="aero/coefficient/Cm_mach">
          <description>Cm from the neutral point's move with Mach</description>
          <product>
            <property>aero/qbar-psf</property>
            <property>metrics/Sw-sqft</property>
            <property>metrics/cbarw-ft</property>
            <property>aero/function/CL-base</property>
            <property>aero/function/mach-dCm-dCL</property>
          </product>
        </function>
        <function name="aero/coefficient/Cm_elevator">
          <description>Cm increment from elevator (deg), over alpha</description>
          <product>
            <property>aero/qbar-psf</property>
            <property>metrics/Sw-sqft</property>
            <property>metrics/cbarw-ft</property>
            <property>aero/function/mach-elevator</property>
          <table>
            <independentVar lookup="row">aero/alpha-deg</independentVar>
            <independentVar lookup="column">fcs/elevator-pos-deg</independentVar>
            <tableData>
                        -10.00     -5.00      0.00      5.00     10.00     15.00
             -180.00  -0.43225  -0.24371   0.00000   0.13149   0.01027   0.04850
              -35.00   0.03735   0.01868   0.00000  -0.01021   0.10675   0.00864
              -11.00   0.28487   0.14539   0.00000  -0.14745  -0.29534  -0.44246
                4.00   0.29725   0.14810   0.00000  -0.14562  -0.28753  -0.42416
               19.00   0.22132   0.12484   0.00000  -0.11298   0.01034   0.03443
               42.00   0.05436   0.02572   0.00000  -0.02010  -0.03279  -0.03706
              180.00  -0.43225  -0.24371   0.00000   0.13149   0.01027   0.04850
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            </tableData>
          </table>
          </product>
        </function>
        <function name="aero/coefficient/Cm_flap">
          <description>Cm increment from flap (deg), over alpha</description>
          <product>
            <property>aero/qbar-psf</property>
            <property>metrics/Sw-sqft</property>
            <property>metrics/cbarw-ft</property>
            <property>aero/function/mach-flap</property>
          <table>
            <independentVar lookup="row">aero/alpha-deg</independentVar>
            <independentVar lookup="column">fcs/flap-pos-deg</independentVar>
            <tableData>
                          0.00      5.00     10.00     15.00     20.00     25.00     30.00
             -180.00   0.00000  -0.00110  -0.00214  -0.00304  -0.00377  -0.00433  -0.00477
              -35.00   0.00000   0.00840   0.01693   0.02416   0.02908   0.03144   0.03158
              -11.00   0.00000   0.01440   0.02862   0.04118   0.05109   0.05822   0.06317
                4.00   0.00000   0.00986   0.01971   0.02927   0.04090   0.05445   0.06715
               19.00   0.00000   0.05796   0.12316   0.18897   0.24996   0.30297   0.34577
               42.00   0.00000   0.00533   0.01108   0.01679   0.02207   0.02679   0.03098
              180.00   0.00000  -0.00110  -0.00214  -0.00304  -0.00377  -0.00433  -0.00477
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            </tableData>
          </table>
          </product>
        </function>
        <function name="aero/coefficient/Cmq">
          <description>Cm per q (non-dimensional), over alpha</description>
          <product>
            <property>aero/qbar-psf</property>
            <property>metrics/Sw-sqft</property>
            <property>metrics/cbarw-ft</property>
            <property>aero/ci2vel</property>
            <property>velocities/q-aero-rad_sec</property>
            <property>aero/function/mach-lift</property>
          <table>
            <independentVar lookup="row">aero/alpha-deg</independentVar>
            <tableData>
                 -180.00  -10.37690
                 -165.00   -3.25403
                  -32.00   -5.79394
                  -10.00  -16.83361
                    5.00  -16.91254
                   20.00   -7.00602
                   46.00   -9.87975
                  180.00  -10.37690
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            </tableData>
          </table>
          </product>
        </function>
        <function name="aero/coefficient/Cmadot">
          <description>Cm per alpha-dot (downwash lag at the tail)</description>
          <product>
            <property>aero/qbar-psf</property>
            <property>metrics/Sw-sqft</property>
            <property>metrics/cbarw-ft</property>
            <property>aero/ci2vel</property>
            <property>aero/alphadot-rad_sec</property>
            <value>-2.91789</value>
            <property>aero/function/mach-lift</property>
          </product>
        </function>
        <function name="aero/coefficient/Cm_spoilers">
          <description>spoilers: its drag's pitching moment, -0.20 m from the reference point's height</description>
          <product>
            <property>aero/qbar-psf</property>
            <property>metrics/Sw-sqft</property>
            <property>metrics/cbarw-ft</property>
            <value>-0.00166185</value>
            <pow>
              <sin>
                <product>
                  <property>fcs/speedbrake-pos-norm</property>
                  <value>1.0472</value>
                </product>
              </sin>
              <value>2</value>
            </pow>
          </product>
        </function>
        <function name="aero/coefficient/Cm_spoilers_lift">
          <description>spoilers: the lift lost's pitching moment, 2.31 m from the reference point</description>
          <product>
            <property>aero/qbar-psf</property>
            <property>metrics/Sw-sqft</property>
            <property>metrics/cbarw-ft</property>
            <table>
              <independentVar lookup="row">aero/alpha-deg</independentVar>
              <tableData>
                   -180.00    0.06422
                   -165.00    0.06097
                    -32.00   -0.14079
                    -10.00   -0.02643
                      5.00    0.13077
                     20.00    0.14751
                     46.00    0.11111
                    180.00    0.06422
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              </tableData>
            </table>
            <min>
              <value>1</value>
              <product>
                <property>fcs/speedbrake-pos-norm</property>
                <value>1.33333</value>
              </product>
            </min>
          </product>
        </function>
        <function name="aero/coefficient/Cm_gear">
          <description>the gear's drag's pitching moment, -3.61 m from the reference point's height</description>
          <product>
            <property>aero/qbar-psf</property>
            <property>metrics/Sw-sqft</property>
            <property>metrics/cbarw-ft</property>
            <value>-0.0027005</value>
            <property>gear/gear-pos-norm</property>
          </product>
        </function>
      </axis>
      <axis name="YAW">
        <function name="aero/coefficient/Cn_base">
          <description>Cn over alpha and beta (hangar)</description>
          <product>
            <property>aero/qbar-psf</property>
            <property>metrics/Sw-sqft</property>
            <property>metrics/bw-ft</property>
            <property>aero/function/mach-side</property>
          <table>
            <independentVar lookup="row">aero/alpha-deg</independentVar>
            <independentVar lookup="column">aero/beta-deg</independentVar>
            <tableData>
                        -90.00    -70.00    -50.00    -40.00    -30.00    -25.00    -20.00    -15.00    -10.00     -6.00     -3.00      0.00      3.00      6.00     10.00     15.00     20.00     25.00     30.00     40.00     50.00     70.00     90.00
             -180.00  -0.04939  -0.05469  -0.05272  -0.04826  -0.04032  -0.03505  -0.02902  -0.02234  -0.02337  -0.02454  -0.01318  -0.00000   0.01318   0.02454   0.02337   0.02234   0.02902   0.03505   0.04032   0.04826   0.05272   0.05469   0.04939
              -35.00  -0.04939  -0.03754  -0.02125  -0.01193  -0.00242  -0.00183  -0.01072  -0.00691  -0.00399  -0.00221  -0.00106  -0.00000   0.00106   0.00221   0.00399   0.00691   0.01072   0.00183   0.00242   0.01193   0.02125   0.03754   0.04939
              -11.00  -0.04939  -0.03308  -0.01320  -0.01114  -0.01859  -0.02121  -0.01736  -0.01293  -0.00840  -0.00489  -0.00237  -0.00000   0.00237   0.00489   0.00840   0.01293   0.01736   0.02121   0.01859   0.01114   0.01320   0.03308   0.04939
                4.00  -0.04939  -0.03810  -0.02919  -0.02539  -0.03400  -0.03444  -0.02983  -0.02352  -0.01617  -0.00982  -0.00492  -0.00000   0.00492   0.00982   0.01617   0.02352   0.02983   0.03444   0.03400   0.02539   0.02919   0.03810   0.04939
               19.00  -0.04939  -0.03650  -0.02205  -0.01668  -0.01829  -0.02112  -0.01665  -0.01207  -0.00763  -0.00441  -0.00223  -0.00000   0.00223   0.00441   0.00763   0.01207   0.01665   0.02112   0.01829   0.01668   0.02205   0.03650   0.04939
               42.00  -0.04939  -0.03663  -0.02058  -0.01355  -0.00925  -0.00894  -0.01139  -0.01394  -0.00846  -0.00485  -0.00252  -0.00000   0.00252   0.00485   0.00846   0.01394   0.01139   0.00894   0.00925   0.01355   0.02058   0.03663   0.04939
              180.00  -0.04939  -0.05469  -0.05272  -0.04826  -0.04032  -0.03505  -0.02902  -0.02234  -0.02337  -0.02454  -0.01318  -0.00000   0.01318   0.02454   0.02337   0.02234   0.02902   0.03505   0.04032   0.04826   0.05272   0.05469   0.04939
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            </tableData>
          </table>
          </product>
        </function>
        <function name="aero/coefficient/Cn_aileron">
          <description>Cn increment from aileron (deg), over alpha</description>
          <product>
            <property>aero/qbar-psf</property>
            <property>metrics/Sw-sqft</property>
            <property>metrics/bw-ft</property>
            <property>aero/function/mach-aileron</property>
          <table>
            <independentVar lookup="row">aero/alpha-deg</independentVar>
            <independentVar lookup="column">fcs/left-aileron-pos-deg</independentVar>
            <tableData>
                        -20.00    -15.00    -10.00     -5.00      0.00      5.00     10.00     15.00     20.00
             -180.00  -0.00000  -0.00000  -0.00000  -0.00000   0.00000  -0.00000  -0.00000  -0.00000  -0.00000
              -35.00   0.01786   0.01504   0.01108   0.00588   0.00000  -0.00588  -0.01108  -0.01504  -0.01786
              -11.00   0.00433   0.00371   0.00276   0.00147   0.00000  -0.00147  -0.00276  -0.00371  -0.00433
                4.00  -0.00011  -0.00007  -0.00004  -0.00001   0.00000   0.00001   0.00004   0.00007   0.00011
               19.00  -0.01625  -0.01364  -0.00999  -0.00528   0.00000   0.00528   0.00999   0.01364   0.01625
               42.00  -0.01696  -0.01431  -0.01055  -0.00560   0.00000   0.00560   0.01055   0.01431   0.01696
              180.00  -0.00000  -0.00000  -0.00000  -0.00000   0.00000  -0.00000  -0.00000  -0.00000  -0.00000
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            </tableData>
          </table>
          </product>
        </function>
        <function name="aero/coefficient/Cn_rudder">
          <description>Cn increment from rudder (deg), over alpha</description>
          <product>
            <property>aero/qbar-psf</property>
            <property>metrics/Sw-sqft</property>
            <property>metrics/bw-ft</property>
            <property>aero/function/mach-rudder</property>
          <table>
            <independentVar lookup="row">aero/alpha-deg</independentVar>
            <independentVar lookup="column">fcs/rudder-pos-deg</independentVar>
            <tableData>
                        -25.00    -20.00    -15.00    -10.00     -5.00      0.00      5.00     10.00     15.00     20.00     25.00
             -180.00  -0.00000  -0.00000  -0.00000  -0.00000  -0.00000   0.00000  -0.00000  -0.00000  -0.00000  -0.00000  -0.00000
              -35.00   0.00875   0.00790   0.00672   0.00500   0.00267   0.00000  -0.00267  -0.00500  -0.00672  -0.00790  -0.00875
              -11.00   0.01248   0.01121   0.00949   0.00701   0.00372   0.00000  -0.00372  -0.00701  -0.00949  -0.01121  -0.01248
                4.00   0.01295   0.01163   0.00985   0.00728   0.00387   0.00000  -0.00387  -0.00728  -0.00985  -0.01163  -0.01295
               19.00   0.01091   0.00980   0.00830   0.00614   0.00326   0.00000  -0.00326  -0.00614  -0.00830  -0.00980  -0.01091
               42.00   0.00942   0.00850   0.00722   0.00535   0.00283   0.00000  -0.00283  -0.00535  -0.00722  -0.00850  -0.00942
              180.00  -0.00000  -0.00000  -0.00000  -0.00000  -0.00000   0.00000  -0.00000  -0.00000  -0.00000  -0.00000  -0.00000
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            </tableData>
          </table>
          </product>
        </function>
        <function name="aero/coefficient/Cnp">
          <description>Cn per p (non-dimensional), over alpha</description>
          <product>
            <property>aero/qbar-psf</property>
            <property>metrics/Sw-sqft</property>
            <property>metrics/bw-ft</property>
            <property>aero/bi2vel</property>
            <property>velocities/p-aero-rad_sec</property>
            <property>aero/function/mach-lift</property>
          <table>
            <independentVar lookup="row">aero/alpha-deg</independentVar>
            <tableData>
                 -180.00   -0.04161
                 -165.00    0.03779
                  -32.00    0.03342
                  -10.00    0.07784
                    5.00   -0.12741
                   20.00   -0.06824
                   46.00    0.02211
                  180.00   -0.04161
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            </tableData>
          </table>
          </product>
        </function>
        <function name="aero/coefficient/Cnr">
          <description>Cn per r (non-dimensional), over alpha</description>
          <product>
            <property>aero/qbar-psf</property>
            <property>metrics/Sw-sqft</property>
            <property>metrics/bw-ft</property>
            <property>aero/bi2vel</property>
            <property>velocities/r-aero-rad_sec</property>
            <property>aero/function/mach-lift</property>
          <table>
            <independentVar lookup="row">aero/alpha-deg</independentVar>
            <tableData>
                 -180.00   -0.13778
                 -165.00   -0.14484
                  -32.00   -0.02058
                  -10.00   -0.09810
                    5.00   -0.09298
                   20.00   -0.07496
                   46.00   -0.08372
                  180.00   -0.13778
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            </tableData>
          </table>
          </product>
        </function>
      </axis>
    </aerodynamics>
</fdm_config>
