<?xml version="1.0"?>
<!-- Generated by hangar: a turboprop of 3458 kW (4637 hp), its core 4474 kW, psfc 0.280 kg/(kW h),
     its propeller at 1020 rpm through a 14:1 gearbox. Power lapse: Mattingly, Heiser &
     Pratt, Aircraft Engine Design, 2002, sec. 2.3.2 (throttle ratio 1.000). -->
<turboprop_engine name="AE 2100D3 outboard">
  <maxpower> 4637.3 </maxpower>
  <psfc> 0.4603 </psfc>
  <idlen1> 52.5 </idlen1>
  <maxn1> 100.0 </maxn1>
  <n1idle_max_delay> 1.00 </n1idle_max_delay>
  <function name="EnginePowerVC">
    <description>Shaft power over sea-level static: the total pressure ratio delta0, cut once
      the total temperature ratio theta0 passes the throttle ratio</description>
    <product>
      <quotient> <property>atmosphere/P-psf</property> <value>2116.228</value> </quotient>
      <pow> <sum> <value>1</value> <product> <value>0.2</value> <property>velocities/mach</property> <property>velocities/mach</property> </product> </sum> <value>3.5</value> </pow>
      <max>
        <value>0</value>
        <difference>
          <value>1</value>
          <product>
            <max>
              <value>0</value>
              <difference>
                <product> <quotient> <property>atmosphere/T-R</property> <value>518.67</value> </quotient> <sum> <value>1</value> <product> <value>0.2</value> <property>velocities/mach</property> <property>velocities/mach</property> </product> </sum> </product>
                <value>1.0000</value>
              </difference>
            </max>
            <table>
              <independentVar lookup="row">velocities/mach</independentVar>
              <tableData>
                  0.00    0.0000
                  0.10    0.0000
                  0.20    8.0192
                  0.30    5.1535
                  0.40    4.2484
                  0.50    3.9000
                  0.60    3.8290
                  0.70    3.9654
                  0.80    4.3246
                  0.90    5.0088
              </tableData>
            </table>
          </product>
        </difference>
      </max>
    </product>
  </function>
  <!-- shaft power (hp) over the output shaft's rpm (rows) and N1 (columns, %) -->
  <table name="EnginePowerRPM_N1" type="internal">
    <tableData>
                0.0     20.0     40.0     50.0     55.0     60.0     65.0     70.0     75.0     80.0     85.0     90.0     95.0    100.0    105.0    110.0
         0.0       0.0      0.0      0.0      0.0      5.3     11.7     19.2     28.0     38.1     49.7     62.8     77.5     94.0    112.3    132.6    154.8
       714.0       0.0      0.0      0.0      0.0     27.7     60.8    100.0    145.7    198.5    258.7    327.0    403.8    489.6    585.0    690.4    806.3
      1428.0       0.0      0.0      0.0      0.0     53.9    118.6    194.9    284.0    386.8    504.2    637.2    786.9    954.1   1139.9   1345.3   1571.2
      2856.0       0.0      0.0      0.0      0.0    102.1    224.6    369.3    538.1    732.8    955.3   1207.4   1491.0   1807.8   2159.9   2549.0   2977.0
      4284.0       0.0      0.0      0.0      0.0    144.7    318.2    523.2    762.3   1038.2   1353.3   1710.5   2112.2   2561.1   3059.9   3611.1   4217.4
      5712.0       0.0      0.0      0.0      0.0    181.6    399.3    656.6    956.7   1302.8   1698.3   2146.5   2650.6   3213.9   3839.8   4531.5   5292.4
      7140.0       0.0      0.0      0.0      0.0    212.8    468.0    769.5   1121.1   1526.7   1990.2   2515.4   3106.1   3766.3   4499.8   5310.4   6202.0
      8568.0       0.0      0.0      0.0      0.0    238.3    524.1    861.8   1255.6   1709.9   2229.0   2817.2   3478.9   4218.3   5039.8   5947.7   6946.2
      9996.0       0.0      0.0      0.0      0.0    258.2    567.8    933.6   1360.3   1852.4   2414.8   3052.0   3768.8   4569.8   5459.8   6443.3   7525.1
     11424.0       0.0      0.0      0.0      0.0    272.4    599.0    984.9   1435.0   1954.2   2547.5   3219.7   3975.9   4820.9   5759.7   6797.3   7938.6
     12852.0       0.0      0.0      0.0      0.0    280.9    617.7   1015.7   1479.8   2015.3   2627.1   3320.3   4100.1   4971.6   5939.7   7009.7   8186.7
     13566.0       0.0      0.0      0.0      0.0    283.0    622.4   1023.4   1491.1   2030.5   2647.0   3345.5   4131.2   5009.2   5984.7   7062.8   8248.7
     14280.0       0.0      0.0      0.0      0.0    283.7    624.0   1026.0   1494.8   2035.6   2653.6   3353.9   4141.5   5021.8   5999.7   7080.5   8269.3
     14994.0       0.0      0.0      0.0      0.0    283.0    622.4   1023.4   1491.1   2030.5   2647.0   3345.5   4131.2   5009.2   5984.7   7062.8   8248.7
     15708.0       0.0      0.0      0.0      0.0    280.9    617.7   1015.7   1479.8   2015.3   2627.1   3320.3   4100.1   4971.6   5939.7   7009.7   8186.7
     17136.0       0.0      0.0      0.0      0.0    272.4    599.0    984.9   1435.0   1954.2   2547.5   3219.7   3975.9   4820.9   5759.7   6797.3   7938.6
     18564.0       0.0      0.0      0.0      0.0    258.2    567.8    933.6   1360.3   1852.4   2414.8   3052.0   3768.8   4569.8   5459.8   6443.3   7525.1
    </tableData>
  </table>
  <!-- inter-turbine temperature (deg C) over N1: not burning (0), burning (1) -->
  <table name="ITT_N1" type="internal">
    <tableData>
                 0       1
      0.0    15.0    15.0
     20.0    15.0   199.6
     40.0    15.0   384.2
     50.0    15.0   476.5
     55.0    15.0   507.5
     60.0    15.0   524.9
     65.0    15.0   545.5
     70.0    15.0   569.5
     75.0    15.0   597.1
     80.0    15.0   628.8
     85.0    15.0   664.6
     90.0    15.0   704.9
     95.0    15.0   750.0
    100.0    15.0   800.0
    105.0    15.0   855.3
    110.0    15.0   916.1
    </tableData>
  </table>
  <table name="CombustionEfficiency_N1" type="internal">
    <tableData>
      0.0   0.0200
     20.0   0.0200
     40.0   0.0200
     50.0   0.0200
     55.0   0.1988
     60.0   0.3672
     65.0   0.5077
     70.0   0.6239
     75.0   0.7197
     80.0   0.7986
     85.0   0.8637
     90.0   0.9177
     95.0   0.9625
    100.0   1.0000
    105.0   1.0315
    110.0   1.0581
    </tableData>
  </table>
</turboprop_engine>
