<?xml version="1.0"?>
<?xml-stylesheet type="text/xsl" href="http://jsbsim.sourceforge.net/JSBSim.xsl"?>
<!-- Generated by hangar 0.1.0 from c130j.toml on 2026-10-01. Edit the design and rebuild; changes
     made here are overwritten.  -->
<fdm_config name="c130j" version="2.0" release="ALPHA"
            xmlns:xsi="http://www.w3.org/2001/XMLSchema-instance"
            xsi:noNamespaceSchemaLocation="http://jsbsim.sourceforge.net/JSBSim.xsd">
    <fileheader>
      <author>hangar</author>
      <filecreationdate>2026-10-01</filecreationdate>
      <version>0.1.0</version>
      <description>Lockheed Martin C-130J Super Hercules (hangar build)</description>
      <note>Aerodynamics: vortex lattice with viscous section polars, full-envelope
        strip model, slender-body fuselage (hangar). Mass: Raymer component
        weights on the geometry. Propeller: blade-element momentum theory.</note>
      <reference refID="fsim/applicability/aerobatic" author="the design" title="USAF fact sheet: a transport, not cleared for aerobatic manoeuvres" date="n/a"/>
      <reference refID="fsim/applicability/carrier" author="the design" title="USAF and Lockheed Martin fact sheets: a land-based tactical airlifter with no launch bar or arresting hook (the 1963 KC-130F carrier trials used neither)" date="n/a"/>
      <reference refID="fsim/applicability/drag_devices" author="the design" title="Lockheed Martin fact sheet and the C-130 flight manual: no spoilers or airbrakes; drag comes from the propellers and flaps" date="n/a"/>
      <reference refID="fsim/applicability/flaps" author="the design" title="Wikipedia's C-130J article and its sources: Lockheed-Fowler trailing-edge flaps" date="n/a"/>
      <reference refID="fsim/applicability/ground_contact" author="the design" title="Lockheed Martin fact sheet: tandem main wheels in the fuselage sponsons and twin nose wheels" date="n/a"/>
      <reference refID="fsim/applicability/releasable_stores" author="the design" title="US Air Force Research Laboratory, Rapid Dragon (2021): palletized cruise missiles released from the cargo hold of C-130-series aircraft; cargo airdrop over the ramp" date="n/a"/>
      <reference refID="fsim/applicability/retractable_gear" author="the design" title="Lockheed Martin fact sheet: the main gear retracts into the sponsons" date="n/a"/>
      <reference refID="fsim/applicability/vertical_flight" author="the design" title="Lockheed Martin C-130J fact sheet: a conventional take-off and landing turboprop. Conventional take-off and landing: no rotors, lift fans or vectored lift to hover" date="n/a"/>
    </fileheader>
    <metrics>
      <wingarea unit="M2"> 163.1798 </wingarea>
      <wingspan unit="M"> 40.4100 </wingspan>
      <chord unit="M"> 4.1929 </chord>
      <htailarea unit="M2"> 45.0203 </htailarea>
      <htailarm unit="M"> 12.9557 </htailarm>
      <vtailarea unit="M2"> 27.2290 </vtailarea>
      <vtailarm unit="M"> 13.0099 </vtailarm>
      <location name="AERORP" unit="M">
        <x> 12.3897 </x>
        <y> 0.0000 </y>
        <z> 5.1474 </z>
      </location>
      <location name="EYEPOINT" unit="M">
        <x> 12.3897 </x>
        <y> 0.0000 </y>
        <z> 5.1474 </z>
      </location>
      <location name="VRP" unit="M">
        <x> 12.3000 </x>
        <y> 0.0000 </y>
        <z> 3.3000 </z>
      </location>
    </metrics>
    <mass_balance negated_crossproduct_inertia="false">
      <ixx unit="KG*M2"> 1070040.93 </ixx>
      <iyy unit="KG*M2"> 806825.03 </iyy>
      <izz unit="KG*M2"> 1726534.62 </izz>
      <ixy unit="KG*M2"> 3.995 </ixy>
      <ixz unit="KG*M2"> 80626.365 </ixz>
      <iyz unit="KG*M2"> 2.794 </iyz>
      <emptywt unit="KG"> 34274.00 </emptywt>
      <location name="CG" unit="M">
        <x> 12.3000 </x>
        <y> 0.0000 </y>
        <z> 3.3000 </z>
      </location>
      <pointmass name="flight crew">
        <weight unit="KG"> 300.00 </weight>
        <location unit="M">
          <x> 3.3000 </x>
          <y> 0.0000 </y>
          <z> 3.3000 </z>
        </location>
      </pointmass>
      <pointmass name="cargo">
        <weight unit="KG"> 5000.00 </weight>
        <location unit="M">
          <x> 12.3000 </x>
          <y> 0.0000 </y>
          <z> 1.8000 </z>
        </location>
      </pointmass>
    </mass_balance>
    <ground_reactions>
      <contact type="BOGEY" name="Nose Gear">
        <location unit="M">
          <x> 3.4200 </x>
          <y> 0.0000 </y>
          <z> -0.1500 </z>
        </location>
        <static_friction> 0.8 </static_friction>
        <dynamic_friction> 0.5 </dynamic_friction>
        <rolling_friction> 0.02 </rolling_friction>
        <spring_coeff unit="N/M"> 260910 </spring_coeff>
        <damping_coeff unit="N/M/SEC"> 32268 </damping_coeff>
        <damping_coeff_rebound unit="N/M/SEC"> 64537 </damping_coeff_rebound>
        <max_steer unit="DEG"> 60.0 </max_steer>
        <brake_group> NONE </brake_group>
        <retractable> 1 </retractable>
      </contact>
      <contact type="BOGEY" name="Left Main Gear Front">
        <location unit="M">
          <x> 12.3100 </x>
          <y> -2.1700 </y>
          <z> -0.1500 </z>
        </location>
        <static_friction> 0.8 </static_friction>
        <dynamic_friction> 0.5 </dynamic_friction>
        <rolling_friction> 0.02 </rolling_friction>
        <spring_coeff unit="N/M"> 921877 </spring_coeff>
        <damping_coeff unit="N/M/SEC"> 114014 </damping_coeff>
        <damping_coeff_rebound unit="N/M/SEC"> 228028 </damping_coeff_rebound>
        <max_steer unit="DEG"> 0.0 </max_steer>
        <brake_group> LEFT </brake_group>
        <retractable> 1 </retractable>
      </contact>
      <contact type="BOGEY" name="Right Main Gear Front">
        <location unit="M">
          <x> 12.3100 </x>
          <y> 2.1700 </y>
          <z> -0.1500 </z>
        </location>
        <static_friction> 0.8 </static_friction>
        <dynamic_friction> 0.5 </dynamic_friction>
        <rolling_friction> 0.02 </rolling_friction>
        <spring_coeff unit="N/M"> 921877 </spring_coeff>
        <damping_coeff unit="N/M/SEC"> 114014 </damping_coeff>
        <damping_coeff_rebound unit="N/M/SEC"> 228028 </damping_coeff_rebound>
        <max_steer unit="DEG"> 0.0 </max_steer>
        <brake_group> RIGHT </brake_group>
        <retractable> 1 </retractable>
      </contact>
      <contact type="BOGEY" name="Left Main Gear Rear">
        <location unit="M">
          <x> 13.8200 </x>
          <y> -2.1700 </y>
          <z> -0.1500 </z>
        </location>
        <static_friction> 0.8 </static_friction>
        <dynamic_friction> 0.5 </dynamic_friction>
        <rolling_friction> 0.02 </rolling_friction>
        <spring_coeff unit="N/M"> 921877 </spring_coeff>
        <damping_coeff unit="N/M/SEC"> 114014 </damping_coeff>
        <damping_coeff_rebound unit="N/M/SEC"> 228028 </damping_coeff_rebound>
        <max_steer unit="DEG"> 0.0 </max_steer>
        <brake_group> LEFT </brake_group>
        <retractable> 1 </retractable>
      </contact>
      <contact type="BOGEY" name="Right Main Gear Rear">
        <location unit="M">
          <x> 13.8200 </x>
          <y> 2.1700 </y>
          <z> -0.1500 </z>
        </location>
        <static_friction> 0.8 </static_friction>
        <dynamic_friction> 0.5 </dynamic_friction>
        <rolling_friction> 0.02 </rolling_friction>
        <spring_coeff unit="N/M"> 921877 </spring_coeff>
        <damping_coeff unit="N/M/SEC"> 114014 </damping_coeff>
        <damping_coeff_rebound unit="N/M/SEC"> 228028 </damping_coeff_rebound>
        <max_steer unit="DEG"> 0.0 </max_steer>
        <brake_group> RIGHT </brake_group>
        <retractable> 1 </retractable>
      </contact>
      <contact type="STRUCTURE" name="AE 2100D3 outboard R propeller left front">
        <location unit="M">
          <x> 8.9700 </x>
          <y> -10.2500 </y>
          <z> 2.1325 </z>
        </location>
        <static_friction> 0.8 </static_friction>
        <dynamic_friction> 0.6 </dynamic_friction>
        <spring_coeff unit="N/M"> 6269289 </spring_coeff>
        <damping_coeff unit="N/M/SEC"> 208976 </damping_coeff>
        <damping_coeff_rebound unit="N/M/SEC"> 208976 </damping_coeff_rebound>
      </contact>
      <contact type="STRUCTURE" name="AE 2100D3 outboard R propeller left front 2">
        <location unit="M">
          <x> 8.9700 </x>
          <y> -10.2500 </y>
          <z> 6.2475 </z>
        </location>
        <static_friction> 0.8 </static_friction>
        <dynamic_friction> 0.6 </dynamic_friction>
        <spring_coeff unit="N/M"> 6001791 </spring_coeff>
        <damping_coeff unit="N/M/SEC"> 200060 </damping_coeff>
        <damping_coeff_rebound unit="N/M/SEC"> 200060 </damping_coeff_rebound>
      </contact>
      <contact type="STRUCTURE" name="AE 2100D3 outboard R propeller right front">
        <location unit="M">
          <x> 8.9700 </x>
          <y> 10.2500 </y>
          <z> 2.1325 </z>
        </location>
        <static_friction> 0.8 </static_friction>
        <dynamic_friction> 0.6 </dynamic_friction>
        <spring_coeff unit="N/M"> 6269258 </spring_coeff>
        <damping_coeff unit="N/M/SEC"> 208975 </damping_coeff>
        <damping_coeff_rebound unit="N/M/SEC"> 208975 </damping_coeff_rebound>
      </contact>
      <contact type="STRUCTURE" name="AE 2100D3 outboard R propeller right front 2">
        <location unit="M">
          <x> 8.9700 </x>
          <y> 10.2500 </y>
          <z> 6.2475 </z>
        </location>
        <static_friction> 0.8 </static_friction>
        <dynamic_friction> 0.6 </dynamic_friction>
        <spring_coeff unit="N/M"> 6001763 </spring_coeff>
        <damping_coeff unit="N/M/SEC"> 200059 </damping_coeff>
        <damping_coeff_rebound unit="N/M/SEC"> 200059 </damping_coeff_rebound>
      </contact>
      <contact type="STRUCTURE" name="fin rear">
        <location unit="M">
          <x> 27.8800 </x>
          <y> 0.0000 </y>
          <z> 11.8000 </z>
        </location>
        <static_friction> 0.8 </static_friction>
        <dynamic_friction> 0.6 </dynamic_friction>
        <spring_coeff unit="N/M"> 2145007 </spring_coeff>
        <damping_coeff unit="N/M/SEC"> 71500 </damping_coeff>
        <damping_coeff_rebound unit="N/M/SEC"> 71500 </damping_coeff_rebound>
      </contact>
      <contact type="STRUCTURE" name="fuselage left bottom">
        <location unit="M">
          <x> 17.8009 </x>
          <y> -0.9654 </y>
          <z> 0.9503 </z>
        </location>
        <static_friction> 0.8 </static_friction>
        <dynamic_friction> 0.6 </dynamic_friction>
        <spring_coeff unit="N/M"> 6051718 </spring_coeff>
        <damping_coeff unit="N/M/SEC"> 201724 </damping_coeff>
        <damping_coeff_rebound unit="N/M/SEC"> 201724 </damping_coeff_rebound>
      </contact>
      <contact type="STRUCTURE" name="fuselage front">
        <location unit="M">
          <x> 0.0000 </x>
          <y> 0.0000 </y>
          <z> 2.2800 </z>
        </location>
        <static_friction> 0.8 </static_friction>
        <dynamic_friction> 0.6 </dynamic_friction>
        <spring_coeff unit="N/M"> 2064420 </spring_coeff>
        <damping_coeff unit="N/M/SEC"> 68814 </damping_coeff>
        <damping_coeff_rebound unit="N/M/SEC"> 68814 </damping_coeff_rebound>
      </contact>
      <contact type="STRUCTURE" name="fuselage front 2">
        <location unit="M">
          <x> 1.9300 </x>
          <y> -0.0000 </y>
          <z> 1.1000 </z>
        </location>
        <static_friction> 0.8 </static_friction>
        <dynamic_friction> 0.6 </dynamic_friction>
        <spring_coeff unit="N/M"> 1780843 </spring_coeff>
        <damping_coeff unit="N/M/SEC"> 59361 </damping_coeff>
        <damping_coeff_rebound unit="N/M/SEC"> 59361 </damping_coeff_rebound>
      </contact>
      <contact type="STRUCTURE" name="fuselage rear">
        <location unit="M">
          <x> 29.7900 </x>
          <y> 0.0000 </y>
          <z> 4.4100 </z>
        </location>
        <static_friction> 0.8 </static_friction>
        <dynamic_friction> 0.6 </dynamic_friction>
        <spring_coeff unit="N/M"> 2195956 </spring_coeff>
        <damping_coeff unit="N/M/SEC"> 73199 </damping_coeff>
        <damping_coeff_rebound unit="N/M/SEC"> 73199 </damping_coeff_rebound>
      </contact>
      <contact type="STRUCTURE" name="fuselage right bottom">
        <location unit="M">
          <x> 17.8009 </x>
          <y> 0.9654 </y>
          <z> 0.9503 </z>
        </location>
        <static_friction> 0.8 </static_friction>
        <dynamic_friction> 0.6 </dynamic_friction>
        <spring_coeff unit="N/M"> 6051726 </spring_coeff>
        <damping_coeff unit="N/M/SEC"> 201724 </damping_coeff>
        <damping_coeff_rebound unit="N/M/SEC"> 201724 </damping_coeff_rebound>
      </contact>
      <contact type="STRUCTURE" name="htail left rear">
        <location unit="M">
          <x> 27.5600 </x>
          <y> -8.0250 </y>
          <z> 4.5996 </z>
        </location>
        <static_friction> 0.8 </static_friction>
        <dynamic_friction> 0.6 </dynamic_friction>
        <spring_coeff unit="N/M"> 2364558 </spring_coeff>
        <damping_coeff unit="N/M/SEC"> 78819 </damping_coeff>
        <damping_coeff_rebound unit="N/M/SEC"> 78819 </damping_coeff_rebound>
      </contact>
      <contact type="STRUCTURE" name="htail right rear">
        <location unit="M">
          <x> 27.5600 </x>
          <y> 8.0250 </y>
          <z> 4.5996 </z>
        </location>
        <static_friction> 0.8 </static_friction>
        <dynamic_friction> 0.6 </dynamic_friction>
        <spring_coeff unit="N/M"> 2364573 </spring_coeff>
        <damping_coeff unit="N/M/SEC"> 78819 </damping_coeff>
        <damping_coeff_rebound unit="N/M/SEC"> 78819 </damping_coeff_rebound>
      </contact>
      <contact type="STRUCTURE" name="wing left bottom">
        <location unit="M">
          <x> 14.2999 </x>
          <y> -20.2060 </y>
          <z> 5.5736 </z>
        </location>
        <static_friction> 0.8 </static_friction>
        <dynamic_friction> 0.6 </dynamic_friction>
        <spring_coeff unit="N/M"> 1060243 </spring_coeff>
        <damping_coeff unit="N/M/SEC"> 35341 </damping_coeff>
        <damping_coeff_rebound unit="N/M/SEC"> 35341 </damping_coeff_rebound>
      </contact>
      <contact type="STRUCTURE" name="wing left front">
        <location unit="M">
          <x> 11.8000 </x>
          <y> -20.2050 </y>
          <z> 5.5960 </z>
        </location>
        <static_friction> 0.8 </static_friction>
        <dynamic_friction> 0.6 </dynamic_friction>
        <spring_coeff unit="N/M"> 1072885 </spring_coeff>
        <damping_coeff unit="N/M/SEC"> 35763 </damping_coeff>
        <damping_coeff_rebound unit="N/M/SEC"> 35763 </damping_coeff_rebound>
      </contact>
      <contact type="STRUCTURE" name="wing right front">
        <location unit="M">
          <x> 11.8000 </x>
          <y> 20.2050 </y>
          <z> 5.5960 </z>
        </location>
        <static_friction> 0.8 </static_friction>
        <dynamic_friction> 0.6 </dynamic_friction>
        <spring_coeff unit="N/M"> 1072885 </spring_coeff>
        <damping_coeff unit="N/M/SEC"> 35763 </damping_coeff>
        <damping_coeff_rebound unit="N/M/SEC"> 35763 </damping_coeff_rebound>
      </contact>
      <contact type="STRUCTURE" name="wing right bottom">
        <location unit="M">
          <x> 14.2999 </x>
          <y> 20.2060 </y>
          <z> 5.5736 </z>
        </location>
        <static_friction> 0.8 </static_friction>
        <dynamic_friction> 0.6 </dynamic_friction>
        <spring_coeff unit="N/M"> 1060246 </spring_coeff>
        <damping_coeff unit="N/M/SEC"> 35342 </damping_coeff>
        <damping_coeff_rebound unit="N/M/SEC"> 35342 </damping_coeff_rebound>
      </contact>
    </ground_reactions>
    <propulsion>
      <engine file="c130j_engine0">
        <location unit="M">
          <x> 10.6000 </x>
          <y> -5.0800 </y>
          <z> 3.9500 </z>
        </location>
        <feed>0</feed>
        <feed>1</feed>
        <feed>2</feed>
        <feed>3</feed>
        <thruster file="c130j_prop0">
          <location unit="M">
            <x> 8.9200 </x>
            <y> -5.0800 </y>
            <z> 3.9500 </z>
          </location>
          <orient unit="DEG"> <roll>0.00</roll> <pitch>0.00</pitch> <yaw>0.00</yaw> </orient>
          <sense>-1</sense>
        </thruster>
      </engine>
      <engine file="c130j_engine0">
        <location unit="M">
          <x> 10.6000 </x>
          <y> 5.0800 </y>
          <z> 3.9500 </z>
        </location>
        <feed>0</feed>
        <feed>1</feed>
        <feed>2</feed>
        <feed>3</feed>
        <thruster file="c130j_prop0">
          <location unit="M">
            <x> 8.9200 </x>
            <y> 5.0800 </y>
            <z> 3.9500 </z>
          </location>
          <orient unit="DEG"> <roll>0.00</roll> <pitch>0.00</pitch> <yaw>0.00</yaw> </orient>
          <sense>-1</sense>
        </thruster>
      </engine>
      <engine file="c130j_engine1">
        <location unit="M">
          <x> 10.6500 </x>
          <y> -10.2500 </y>
          <z> 4.1900 </z>
        </location>
        <feed>0</feed>
        <feed>1</feed>
        <feed>2</feed>
        <feed>3</feed>
        <thruster file="c130j_prop1">
          <location unit="M">
            <x> 8.9700 </x>
            <y> -10.2500 </y>
            <z> 4.1900 </z>
          </location>
          <orient unit="DEG"> <roll>0.00</roll> <pitch>0.00</pitch> <yaw>0.00</yaw> </orient>
          <sense>-1</sense>
        </thruster>
      </engine>
      <engine file="c130j_engine1">
        <location unit="M">
          <x> 10.6500 </x>
          <y> 10.2500 </y>
          <z> 4.1900 </z>
        </location>
        <feed>0</feed>
        <feed>1</feed>
        <feed>2</feed>
        <feed>3</feed>
        <thruster file="c130j_prop1">
          <location unit="M">
            <x> 8.9700 </x>
            <y> 10.2500 </y>
            <z> 4.1900 </z>
          </location>
          <orient unit="DEG"> <roll>0.00</roll> <pitch>0.00</pitch> <yaw>0.00</yaw> </orient>
          <sense>-1</sense>
        </thruster>
      </engine>
      <tank type="FUEL">
        <location unit="M">
          <x> 12.8000 </x>
          <y> -12.0000 </y>
          <z> 5.2000 </z>
        </location>
        <capacity unit="KG"> 5205.00 </capacity>
        <contents unit="KG"> 5205.00 </contents>
      </tank>
      <tank type="FUEL">
        <location unit="M">
          <x> 12.8000 </x>
          <y> -4.5000 </y>
          <z> 4.9600 </z>
        </location>
        <capacity unit="KG"> 5205.00 </capacity>
        <contents unit="KG"> 5205.00 </contents>
      </tank>
      <tank type="FUEL">
        <location unit="M">
          <x> 12.8000 </x>
          <y> 4.5000 </y>
          <z> 4.9600 </z>
        </location>
        <capacity unit="KG"> 5205.00 </capacity>
        <contents unit="KG"> 5205.00 </contents>
      </tank>
      <tank type="FUEL">
        <location unit="M">
          <x> 12.8000 </x>
          <y> 12.0000 </y>
          <z> 5.2000 </z>
        </location>
        <capacity unit="KG"> 5205.00 </capacity>
        <contents unit="KG"> 5205.00 </contents>
      </tank>
    </propulsion>
    <flight_control name="c130j">
      <!-- the aircraft's profile for the platform (docs/control-architecture.md, section 7): what
           hangar knows of it - its design, its flight tests, its identified responses -->
      <property value="1">fsim/identity/version</property>
      <property value="1">fsim/identity/provenance</property>
      <property value="5">fsim/identity/class</property>
      <property value="1">fsim/identity/family</property>
      <property value="1">fsim/effectors/version</property>
      <property value="1">fsim/effectors/provenance</property>
      <property value="1">fsim/effectors/flaps</property>
      <property value="8">fsim/effectors/flaps_transit_s</property>
      <property value="0.0">fsim/effectors/neutral</property>
      <property value="0.0">fsim/effectors/pitch</property>
      <property value="1">fsim/effectors/pitch_trim</property>
      <property value="1">fsim/effectors/retractable_gear</property>
      <property value="0.0">fsim/effectors/roll</property>
      <property value="0.0">fsim/effectors/speedbrake</property>
      <property value="1">fsim/effectors/wheel_brakes</property>
      <property value="0.0">fsim/effectors/yaw</property>
      <property value="1">fsim/envelope/version</property>
      <property value="1">fsim/envelope/provenance</property>
      <property value="16.5254">fsim/envelope/clean/alpha_max_deg</property>
      <property value="54.1192">fsim/envelope/clean/cas_min_ms</property>
      <property value="18.01">fsim/envelope/crosswind_max_ms</property>
      <property value="74.59">fsim/envelope/flaps/cas_max_ms</property>
      <property value="0.5">fsim/envelope/flaps_threshold</property>
      <property value="86.43">fsim/envelope/gear_cas_max_ms</property>
      <property value="13.43">fsim/envelope/ground_pitch_max_deg</property>
      <property value="25.04">fsim/envelope/ground_turn_radius_m</property>
      <property value="0.0301">fsim/envelope/ground_yaw_accel_rad_s2</property>
      <property value="1">fsim/propulsion/version</property>
      <property value="1">fsim/propulsion/provenance</property>
      <property value="0.0">fsim/propulsion/afterburner</property>
      <property value="4">fsim/propulsion/engines</property>
      <property value="0.947696">fsim/propulsion/spool_s</property>
      <property value="1">fsim/propulsion/type</property>
      <property value="1">fsim/plant/version</property>
      <property value="1">fsim/plant/provenance</property>
      <property value="-4.34853">fsim/plant/alpha_zero_lift_deg</property>
      <property value="3000">fsim/plant/altitude_m</property>
      <property value="128.952">fsim/plant/eas_ms</property>
      <property value="0.181749">fsim/plant/elevator_trim</property>
      <property value="-0.180493">fsim/plant/elevator_trim_lift</property>
      <property value="5.07603">fsim/plant/pitch/gain</property>
      <property value="0.369934">fsim/plant/pitch/tau_s</property>
      <property value="0.974248">fsim/plant/roll/gain</property>
      <property value="0.385595">fsim/plant/roll/tau_s</property>
      <property value="1.55927">fsim/plant/speed/gain</property>
      <property value="0.947696">fsim/plant/speed/tau_s</property>
      <property value="148.553">fsim/plant/tas_ms</property>
      <property value="0.626997">fsim/plant/throttle_trim</property>
      <property value="0.962456">fsim/plant/yaw/gain</property>
      <property value="1">fsim/performance/version</property>
      <property value="1">fsim/performance/provenance</property>
      <property value="9842.96">fsim/performance/ceiling_m</property>
      <property value="185.691">fsim/performance/max_tas_ms</property>
      <property value="54.1192">fsim/performance/stall_cas_ms</property>
      <property value="44.1727">fsim/performance/stall_flaps_cas_ms</property>
      <property value="1">fsim/applicability/version</property>
      <property value="1">fsim/applicability/provenance</property>
      <property value="0.0">fsim/applicability/aerobatic</property>
      <property value="1">fsim/applicability/carrier</property>
      <property value="1">fsim/applicability/drag_devices</property>
      <property value="1">fsim/applicability/flaps</property>
      <property value="1">fsim/applicability/ground_contact</property>
      <property value="3">fsim/applicability/releasable_stores</property>
      <property value="1">fsim/applicability/retractable_gear</property>
      <property value="0.0">fsim/applicability/vertical_flight</property>
      <property value="1">fsim/tables/version</property>
      <property value="1">fsim/tables/provenance</property>
      <property value="100">fsim/tables/altitude_m/h0</property>
      <property value="1970">fsim/tables/altitude_m/h1</property>
      <property value="3940">fsim/tables/altitude_m/h2</property>
      <property value="5910">fsim/tables/altitude_m/h3</property>
      <property value="6705.6">fsim/tables/altitude_m/h4</property>
      <property value="7380">fsim/tables/altitude_m/h5</property>
      <property value="8370">fsim/tables/altitude_m/h6</property>
      <property value="9350">fsim/tables/altitude_m/h7</property>
      <property value="0.41243">fsim/tables/best_endurance_fuel_kg_s/h0/w0</property>
      <property value="0.44046">fsim/tables/best_endurance_fuel_kg_s/h0/w1</property>
      <property value="0.470889">fsim/tables/best_endurance_fuel_kg_s/h0/w2</property>
      <property value="0.369572">fsim/tables/best_endurance_fuel_kg_s/h1/w0</property>
      <property value="0.400406">fsim/tables/best_endurance_fuel_kg_s/h1/w1</property>
      <property value="0.441464">fsim/tables/best_endurance_fuel_kg_s/h1/w2</property>
      <property value="0.318889">fsim/tables/best_endurance_fuel_kg_s/h2/w0</property>
      <property value="0.359055">fsim/tables/best_endurance_fuel_kg_s/h2/w1</property>
      <property value="0.409473">fsim/tables/best_endurance_fuel_kg_s/h2/w2</property>
      <property value="0.288027">fsim/tables/best_endurance_fuel_kg_s/h3/w0</property>
      <property value="0.334259">fsim/tables/best_endurance_fuel_kg_s/h3/w1</property>
      <property value="0.391312">fsim/tables/best_endurance_fuel_kg_s/h3/w2</property>
      <property value="0.280873">fsim/tables/best_endurance_fuel_kg_s/h4/w0</property>
      <property value="0.32863">fsim/tables/best_endurance_fuel_kg_s/h4/w1</property>
      <property value="0.388821">fsim/tables/best_endurance_fuel_kg_s/h4/w2</property>
      <property value="0.272695">fsim/tables/best_endurance_fuel_kg_s/h5/w0</property>
      <property value="0.327014">fsim/tables/best_endurance_fuel_kg_s/h5/w1</property>
      <property value="0.383374">fsim/tables/best_endurance_fuel_kg_s/h5/w2</property>
      <property value="0.264725">fsim/tables/best_endurance_fuel_kg_s/h6/w0</property>
      <property value="0.32191">fsim/tables/best_endurance_fuel_kg_s/h6/w1</property>
      <property value="0.386006">fsim/tables/best_endurance_fuel_kg_s/h6/w2</property>
      <property value="0.263582">fsim/tables/best_endurance_fuel_kg_s/h7/w0</property>
      <property value="0.320819">fsim/tables/best_endurance_fuel_kg_s/h7/w1</property>
      <property value="0.390264">fsim/tables/best_endurance_fuel_kg_s/h7/w2</property>
      <property value="70.8297">fsim/tables/best_endurance_tas_ms/h0/w0</property>
      <property value="73.9203">fsim/tables/best_endurance_tas_ms/h0/w1</property>
      <property value="79.6711">fsim/tables/best_endurance_tas_ms/h0/w2</property>
      <property value="75.4601">fsim/tables/best_endurance_tas_ms/h1/w0</property>
      <property value="78.5582">fsim/tables/best_endurance_tas_ms/h1/w1</property>
      <property value="81.6988">fsim/tables/best_endurance_tas_ms/h1/w2</property>
      <property value="78.0736">fsim/tables/best_endurance_tas_ms/h2/w0</property>
      <property value="82.0453">fsim/tables/best_endurance_tas_ms/h2/w1</property>
      <property value="90.8116">fsim/tables/best_endurance_tas_ms/h2/w2</property>
      <property value="81.6411">fsim/tables/best_endurance_tas_ms/h3/w0</property>
      <property value="92.8661">fsim/tables/best_endurance_tas_ms/h3/w1</property>
      <property value="96.8318">fsim/tables/best_endurance_tas_ms/h3/w2</property>
      <property value="88.6234">fsim/tables/best_endurance_tas_ms/h4/w0</property>
      <property value="94.6981">fsim/tables/best_endurance_tas_ms/h4/w1</property>
      <property value="107.06">fsim/tables/best_endurance_tas_ms/h4/w2</property>
      <property value="92.6788">fsim/tables/best_endurance_tas_ms/h5/w0</property>
      <property value="97.7304">fsim/tables/best_endurance_tas_ms/h5/w1</property>
      <property value="108.315">fsim/tables/best_endurance_tas_ms/h5/w2</property>
      <property value="94.8309">fsim/tables/best_endurance_tas_ms/h6/w0</property>
      <property value="109.285">fsim/tables/best_endurance_tas_ms/h6/w1</property>
      <property value="111.819">fsim/tables/best_endurance_tas_ms/h6/w2</property>
      <property value="103.21">fsim/tables/best_endurance_tas_ms/h7/w0</property>
      <property value="109.696">fsim/tables/best_endurance_tas_ms/h7/w1</property>
      <property value="124.744">fsim/tables/best_endurance_tas_ms/h7/w2</property>
      <property value="0.499319">fsim/tables/best_range_fuel_kg_s/h0/w0</property>
      <property value="0.577811">fsim/tables/best_range_fuel_kg_s/h0/w1</property>
      <property value="0.599218">fsim/tables/best_range_fuel_kg_s/h0/w2</property>
      <property value="0.438819">fsim/tables/best_range_fuel_kg_s/h1/w0</property>
      <property value="0.51152">fsim/tables/best_range_fuel_kg_s/h1/w1</property>
      <property value="0.53928">fsim/tables/best_range_fuel_kg_s/h1/w2</property>
      <property value="0.361098">fsim/tables/best_range_fuel_kg_s/h2/w0</property>
      <property value="0.431531">fsim/tables/best_range_fuel_kg_s/h2/w1</property>
      <property value="0.469787">fsim/tables/best_range_fuel_kg_s/h2/w2</property>
      <property value="0.340619">fsim/tables/best_range_fuel_kg_s/h3/w0</property>
      <property value="0.381097">fsim/tables/best_range_fuel_kg_s/h3/w1</property>
      <property value="0.471893">fsim/tables/best_range_fuel_kg_s/h3/w2</property>
      <property value="0.322776">fsim/tables/best_range_fuel_kg_s/h4/w0</property>
      <property value="0.365815">fsim/tables/best_range_fuel_kg_s/h4/w1</property>
      <property value="0.440391">fsim/tables/best_range_fuel_kg_s/h4/w2</property>
      <property value="0.307451">fsim/tables/best_range_fuel_kg_s/h5/w0</property>
      <property value="0.39265">fsim/tables/best_range_fuel_kg_s/h5/w1</property>
      <property value="0.429205">fsim/tables/best_range_fuel_kg_s/h5/w2</property>
      <property value="0.295296">fsim/tables/best_range_fuel_kg_s/h6/w0</property>
      <property value="0.367801">fsim/tables/best_range_fuel_kg_s/h6/w1</property>
      <property value="0.414266">fsim/tables/best_range_fuel_kg_s/h6/w2</property>
      <property value="0.306161">fsim/tables/best_range_fuel_kg_s/h7/w0</property>
      <property value="0.350476">fsim/tables/best_range_fuel_kg_s/h7/w1</property>
      <property value="0.446012">fsim/tables/best_range_fuel_kg_s/h7/w2</property>
      <property value="105.798">fsim/tables/best_range_tas_ms/h0/w0</property>
      <property value="118.519">fsim/tables/best_range_tas_ms/h0/w1</property>
      <property value="119.827">fsim/tables/best_range_tas_ms/h0/w2</property>
      <property value="105.456">fsim/tables/best_range_tas_ms/h1/w0</property>
      <property value="118.075">fsim/tables/best_range_tas_ms/h1/w1</property>
      <property value="120.204">fsim/tables/best_range_tas_ms/h1/w2</property>
      <property value="104.231">fsim/tables/best_range_tas_ms/h2/w0</property>
      <property value="118.806">fsim/tables/best_range_tas_ms/h2/w1</property>
      <property value="120.934">fsim/tables/best_range_tas_ms/h2/w2</property>
      <property value="117.711">fsim/tables/best_range_tas_ms/h3/w0</property>
      <property value="121.258">fsim/tables/best_range_tas_ms/h3/w1</property>
      <property value="138">fsim/tables/best_range_tas_ms/h3/w2</property>
      <property value="118.883">fsim/tables/best_range_tas_ms/h4/w0</property>
      <property value="122.375">fsim/tables/best_range_tas_ms/h4/w1</property>
      <property value="135.934">fsim/tables/best_range_tas_ms/h4/w2</property>
      <property value="119.576">fsim/tables/best_range_tas_ms/h5/w0</property>
      <property value="137.968">fsim/tables/best_range_tas_ms/h5/w1</property>
      <property value="137.149">fsim/tables/best_range_tas_ms/h5/w2</property>
      <property value="122.025">fsim/tables/best_range_tas_ms/h6/w0</property>
      <property value="137.665">fsim/tables/best_range_tas_ms/h6/w1</property>
      <property value="138.455">fsim/tables/best_range_tas_ms/h6/w2</property>
      <property value="135.635">fsim/tables/best_range_tas_ms/h7/w0</property>
      <property value="137.674">fsim/tables/best_range_tas_ms/h7/w1</property>
      <property value="155.044">fsim/tables/best_range_tas_ms/h7/w2</property>
      <property value="87.6131">fsim/tables/climb_tas_ms/h0/w0</property>
      <property value="90.6842">fsim/tables/climb_tas_ms/h0/w1</property>
      <property value="91.8819">fsim/tables/climb_tas_ms/h0/w2</property>
      <property value="87.3172">fsim/tables/climb_tas_ms/h1/w0</property>
      <property value="96.5603">fsim/tables/climb_tas_ms/h1/w1</property>
      <property value="100.293">fsim/tables/climb_tas_ms/h1/w2</property>
      <property value="110.777">fsim/tables/climb_tas_ms/h2/w0</property>
      <property value="111.585">fsim/tables/climb_tas_ms/h2/w1</property>
      <property value="112.62">fsim/tables/climb_tas_ms/h2/w2</property>
      <property value="112.884">fsim/tables/climb_tas_ms/h3/w0</property>
      <property value="115.375">fsim/tables/climb_tas_ms/h3/w1</property>
      <property value="116.385">fsim/tables/climb_tas_ms/h3/w2</property>
      <property value="115.384">fsim/tables/climb_tas_ms/h4/w0</property>
      <property value="116.824">fsim/tables/climb_tas_ms/h4/w1</property>
      <property value="117.815">fsim/tables/climb_tas_ms/h4/w2</property>
      <property value="116.922">fsim/tables/climb_tas_ms/h5/w0</property>
      <property value="118.073">fsim/tables/climb_tas_ms/h5/w1</property>
      <property value="118.675">fsim/tables/climb_tas_ms/h5/w2</property>
      <property value="117.587">fsim/tables/climb_tas_ms/h6/w0</property>
      <property value="119.864">fsim/tables/climb_tas_ms/h6/w1</property>
      <property value="122.302">fsim/tables/climb_tas_ms/h6/w2</property>
      <property value="120.658">fsim/tables/climb_tas_ms/h7/w0</property>
      <property value="121.063">fsim/tables/climb_tas_ms/h7/w1</property>
      <property value="123.206">fsim/tables/climb_tas_ms/h7/w2</property>
      <property value="20820">fsim/tables/fuel_capacity_kg</property>
      <property value="0.411829">fsim/tables/fuel_kg_s/h0/w0/v0</property>
      <property value="0.42115">fsim/tables/fuel_kg_s/h0/w0/v1</property>
      <property value="0.697359">fsim/tables/fuel_kg_s/h0/w0/v10</property>
      <property value="0.739179">fsim/tables/fuel_kg_s/h0/w0/v11</property>
      <property value="0.820616">fsim/tables/fuel_kg_s/h0/w0/v12</property>
      <property value="0.894344">fsim/tables/fuel_kg_s/h0/w0/v13</property>
      <property value="0.964053">fsim/tables/fuel_kg_s/h0/w0/v14</property>
      <property value="1.04019">fsim/tables/fuel_kg_s/h0/w0/v15</property>
      <property value="0.424995">fsim/tables/fuel_kg_s/h0/w0/v2</property>
      <property value="0.446275">fsim/tables/fuel_kg_s/h0/w0/v3</property>
      <property value="0.468427">fsim/tables/fuel_kg_s/h0/w0/v4</property>
      <property value="0.490907">fsim/tables/fuel_kg_s/h0/w0/v5</property>
      <property value="0.526161">fsim/tables/fuel_kg_s/h0/w0/v6</property>
      <property value="0.558198">fsim/tables/fuel_kg_s/h0/w0/v7</property>
      <property value="0.593841">fsim/tables/fuel_kg_s/h0/w0/v8</property>
      <property value="0.647024">fsim/tables/fuel_kg_s/h0/w0/v9</property>
      <property value="0.440414">fsim/tables/fuel_kg_s/h0/w1/v0</property>
      <property value="0.442107">fsim/tables/fuel_kg_s/h0/w1/v1</property>
      <property value="0.713962">fsim/tables/fuel_kg_s/h0/w1/v10</property>
      <property value="0.755797">fsim/tables/fuel_kg_s/h0/w1/v11</property>
      <property value="0.829165">fsim/tables/fuel_kg_s/h0/w1/v12</property>
      <property value="0.900639">fsim/tables/fuel_kg_s/h0/w1/v13</property>
      <property value="0.967741">fsim/tables/fuel_kg_s/h0/w1/v14</property>
      <property value="1.0397">fsim/tables/fuel_kg_s/h0/w1/v15</property>
      <property value="0.451014">fsim/tables/fuel_kg_s/h0/w1/v2</property>
      <property value="0.474881">fsim/tables/fuel_kg_s/h0/w1/v3</property>
      <property value="0.491255">fsim/tables/fuel_kg_s/h0/w1/v4</property>
      <property value="0.519234">fsim/tables/fuel_kg_s/h0/w1/v5</property>
      <property value="0.551093">fsim/tables/fuel_kg_s/h0/w1/v6</property>
      <property value="0.580003">fsim/tables/fuel_kg_s/h0/w1/v7</property>
      <property value="0.615293">fsim/tables/fuel_kg_s/h0/w1/v8</property>
      <property value="0.668279">fsim/tables/fuel_kg_s/h0/w1/v9</property>
      <property value="0.473141">fsim/tables/fuel_kg_s/h0/w2/v0</property>
      <property value="0.472997">fsim/tables/fuel_kg_s/h0/w2/v1</property>
      <property value="0.726413">fsim/tables/fuel_kg_s/h0/w2/v10</property>
      <property value="0.769827">fsim/tables/fuel_kg_s/h0/w2/v11</property>
      <property value="0.83904">fsim/tables/fuel_kg_s/h0/w2/v12</property>
      <property value="0.904081">fsim/tables/fuel_kg_s/h0/w2/v13</property>
      <property value="0.964983">fsim/tables/fuel_kg_s/h0/w2/v14</property>
      <property value="1.02762">fsim/tables/fuel_kg_s/h0/w2/v15</property>
      <property value="0.490297">fsim/tables/fuel_kg_s/h0/w2/v2</property>
      <property value="0.503803">fsim/tables/fuel_kg_s/h0/w2/v3</property>
      <property value="0.515014">fsim/tables/fuel_kg_s/h0/w2/v4</property>
      <property value="0.545">fsim/tables/fuel_kg_s/h0/w2/v5</property>
      <property value="0.57681">fsim/tables/fuel_kg_s/h0/w2/v6</property>
      <property value="0.599355">fsim/tables/fuel_kg_s/h0/w2/v7</property>
      <property value="0.639783">fsim/tables/fuel_kg_s/h0/w2/v8</property>
      <property value="0.686737">fsim/tables/fuel_kg_s/h0/w2/v9</property>
      <property value="0.369474">fsim/tables/fuel_kg_s/h1/w0/v0</property>
      <property value="0.37316">fsim/tables/fuel_kg_s/h1/w0/v1</property>
      <property value="0.66847">fsim/tables/fuel_kg_s/h1/w0/v10</property>
      <property value="0.738893">fsim/tables/fuel_kg_s/h1/w0/v11</property>
      <property value="0.806746">fsim/tables/fuel_kg_s/h1/w0/v12</property>
      <property value="0.866184">fsim/tables/fuel_kg_s/h1/w0/v13</property>
      <property value="0.949961">fsim/tables/fuel_kg_s/h1/w0/v14</property>
      <property value="1.04486">fsim/tables/fuel_kg_s/h1/w0/v15</property>
      <property value="0.388641">fsim/tables/fuel_kg_s/h1/w0/v2</property>
      <property value="0.410018">fsim/tables/fuel_kg_s/h1/w0/v3</property>
      <property value="0.430415">fsim/tables/fuel_kg_s/h1/w0/v4</property>
      <property value="0.463037">fsim/tables/fuel_kg_s/h1/w0/v5</property>
      <property value="0.491761">fsim/tables/fuel_kg_s/h1/w0/v6</property>
      <property value="0.526243">fsim/tables/fuel_kg_s/h1/w0/v7</property>
      <property value="0.574292">fsim/tables/fuel_kg_s/h1/w0/v8</property>
      <property value="0.621197">fsim/tables/fuel_kg_s/h1/w0/v9</property>
      <property value="0.400283">fsim/tables/fuel_kg_s/h1/w1/v0</property>
      <property value="0.409583">fsim/tables/fuel_kg_s/h1/w1/v1</property>
      <property value="0.683143">fsim/tables/fuel_kg_s/h1/w1/v10</property>
      <property value="0.74985">fsim/tables/fuel_kg_s/h1/w1/v11</property>
      <property value="0.810339">fsim/tables/fuel_kg_s/h1/w1/v12</property>
      <property value="0.865463">fsim/tables/fuel_kg_s/h1/w1/v13</property>
      <property value="0.942154">fsim/tables/fuel_kg_s/h1/w1/v14</property>
      <property value="1.03304">fsim/tables/fuel_kg_s/h1/w1/v15</property>
      <property value="0.424847">fsim/tables/fuel_kg_s/h1/w1/v2</property>
      <property value="0.436538">fsim/tables/fuel_kg_s/h1/w1/v3</property>
      <property value="0.460298">fsim/tables/fuel_kg_s/h1/w1/v4</property>
      <property value="0.490003">fsim/tables/fuel_kg_s/h1/w1/v5</property>
      <property value="0.515034">fsim/tables/fuel_kg_s/h1/w1/v6</property>
      <property value="0.552659">fsim/tables/fuel_kg_s/h1/w1/v7</property>
      <property value="0.59554">fsim/tables/fuel_kg_s/h1/w1/v8</property>
      <property value="0.636093">fsim/tables/fuel_kg_s/h1/w1/v9</property>
      <property value="0.441395">fsim/tables/fuel_kg_s/h1/w2/v0</property>
      <property value="0.449899">fsim/tables/fuel_kg_s/h1/w2/v1</property>
      <property value="0.704205">fsim/tables/fuel_kg_s/h1/w2/v10</property>
      <property value="0.76766">fsim/tables/fuel_kg_s/h1/w2/v11</property>
      <property value="0.824793">fsim/tables/fuel_kg_s/h1/w2/v12</property>
      <property value="0.877729">fsim/tables/fuel_kg_s/h1/w2/v13</property>
      <property value="0.946311">fsim/tables/fuel_kg_s/h1/w2/v14</property>
      <property value="1.03049">fsim/tables/fuel_kg_s/h1/w2/v15</property>
      <property value="0.456921">fsim/tables/fuel_kg_s/h1/w2/v2</property>
      <property value="0.466202">fsim/tables/fuel_kg_s/h1/w2/v3</property>
      <property value="0.495347">fsim/tables/fuel_kg_s/h1/w2/v4</property>
      <property value="0.520285">fsim/tables/fuel_kg_s/h1/w2/v5</property>
      <property value="0.540381">fsim/tables/fuel_kg_s/h1/w2/v6</property>
      <property value="0.581899">fsim/tables/fuel_kg_s/h1/w2/v7</property>
      <property value="0.623624">fsim/tables/fuel_kg_s/h1/w2/v8</property>
      <property value="0.658754">fsim/tables/fuel_kg_s/h1/w2/v9</property>
      <property value="0.318814">fsim/tables/fuel_kg_s/h2/w0/v0</property>
      <property value="0.327086">fsim/tables/fuel_kg_s/h2/w0/v1</property>
      <property value="0.617381">fsim/tables/fuel_kg_s/h2/w0/v10</property>
      <property value="0.672103">fsim/tables/fuel_kg_s/h2/w0/v11</property>
      <property value="0.730859">fsim/tables/fuel_kg_s/h2/w0/v12</property>
      <property value="0.819694">fsim/tables/fuel_kg_s/h2/w0/v13</property>
      <property value="0.905807">fsim/tables/fuel_kg_s/h2/w0/v14</property>
      <property value="0.989685">fsim/tables/fuel_kg_s/h2/w0/v15</property>
      <property value="0.340319">fsim/tables/fuel_kg_s/h2/w0/v2</property>
      <property value="0.349175">fsim/tables/fuel_kg_s/h2/w0/v3</property>
      <property value="0.377238">fsim/tables/fuel_kg_s/h2/w0/v4</property>
      <property value="0.404151">fsim/tables/fuel_kg_s/h2/w0/v5</property>
      <property value="0.431744">fsim/tables/fuel_kg_s/h2/w0/v6</property>
      <property value="0.473405">fsim/tables/fuel_kg_s/h2/w0/v7</property>
      <property value="0.510504">fsim/tables/fuel_kg_s/h2/w0/v8</property>
      <property value="0.556847">fsim/tables/fuel_kg_s/h2/w0/v9</property>
      <property value="0.359012">fsim/tables/fuel_kg_s/h2/w1/v0</property>
      <property value="0.367049">fsim/tables/fuel_kg_s/h2/w1/v1</property>
      <property value="0.639049">fsim/tables/fuel_kg_s/h2/w1/v10</property>
      <property value="0.69301">fsim/tables/fuel_kg_s/h2/w1/v11</property>
      <property value="0.749927">fsim/tables/fuel_kg_s/h2/w1/v12</property>
      <property value="0.830806">fsim/tables/fuel_kg_s/h2/w1/v13</property>
      <property value="0.912034">fsim/tables/fuel_kg_s/h2/w1/v14</property>
      <property value="0.99315">fsim/tables/fuel_kg_s/h2/w1/v15</property>
      <property value="0.372814">fsim/tables/fuel_kg_s/h2/w1/v2</property>
      <property value="0.390785">fsim/tables/fuel_kg_s/h2/w1/v3</property>
      <property value="0.413505">fsim/tables/fuel_kg_s/h2/w1/v4</property>
      <property value="0.431196">fsim/tables/fuel_kg_s/h2/w1/v5</property>
      <property value="0.467637">fsim/tables/fuel_kg_s/h2/w1/v6</property>
      <property value="0.504006">fsim/tables/fuel_kg_s/h2/w1/v7</property>
      <property value="0.534913">fsim/tables/fuel_kg_s/h2/w1/v8</property>
      <property value="0.584462">fsim/tables/fuel_kg_s/h2/w1/v9</property>
      <property value="0.411557">fsim/tables/fuel_kg_s/h2/w2/v0</property>
      <property value="0.410032">fsim/tables/fuel_kg_s/h2/w2/v1</property>
      <property value="0.663738">fsim/tables/fuel_kg_s/h2/w2/v10</property>
      <property value="0.709879">fsim/tables/fuel_kg_s/h2/w2/v11</property>
      <property value="0.765897">fsim/tables/fuel_kg_s/h2/w2/v12</property>
      <property value="0.843983">fsim/tables/fuel_kg_s/h2/w2/v13</property>
      <property value="0.917126">fsim/tables/fuel_kg_s/h2/w2/v14</property>
      <property value="0.989696">fsim/tables/fuel_kg_s/h2/w2/v15</property>
      <property value="0.418109">fsim/tables/fuel_kg_s/h2/w2/v2</property>
      <property value="0.432659">fsim/tables/fuel_kg_s/h2/w2/v3</property>
      <property value="0.447959">fsim/tables/fuel_kg_s/h2/w2/v4</property>
      <property value="0.470207">fsim/tables/fuel_kg_s/h2/w2/v5</property>
      <property value="0.503101">fsim/tables/fuel_kg_s/h2/w2/v6</property>
      <property value="0.533813">fsim/tables/fuel_kg_s/h2/w2/v7</property>
      <property value="0.563257">fsim/tables/fuel_kg_s/h2/w2/v8</property>
      <property value="0.615857">fsim/tables/fuel_kg_s/h2/w2/v9</property>
      <property value="0.288008">fsim/tables/fuel_kg_s/h3/w0/v0</property>
      <property value="0.292114">fsim/tables/fuel_kg_s/h3/w0/v1</property>
      <property value="0.495662">fsim/tables/fuel_kg_s/h3/w0/v10</property>
      <property value="0.540032">fsim/tables/fuel_kg_s/h3/w0/v11</property>
      <property value="0.579772">fsim/tables/fuel_kg_s/h3/w0/v12</property>
      <property value="0.640741">fsim/tables/fuel_kg_s/h3/w0/v13</property>
      <property value="0.703537">fsim/tables/fuel_kg_s/h3/w0/v14</property>
      <property value="0.771048">fsim/tables/fuel_kg_s/h3/w0/v15</property>
      <property value="0.296271">fsim/tables/fuel_kg_s/h3/w0/v2</property>
      <property value="0.308239">fsim/tables/fuel_kg_s/h3/w0/v3</property>
      <property value="0.324414">fsim/tables/fuel_kg_s/h3/w0/v4</property>
      <property value="0.339214">fsim/tables/fuel_kg_s/h3/w0/v5</property>
      <property value="0.365143">fsim/tables/fuel_kg_s/h3/w0/v6</property>
      <property value="0.394047">fsim/tables/fuel_kg_s/h3/w0/v7</property>
      <property value="0.419981">fsim/tables/fuel_kg_s/h3/w0/v8</property>
      <property value="0.453803">fsim/tables/fuel_kg_s/h3/w0/v9</property>
      <property value="0.339015">fsim/tables/fuel_kg_s/h3/w1/v0</property>
      <property value="0.334331">fsim/tables/fuel_kg_s/h3/w1/v1</property>
      <property value="0.525485">fsim/tables/fuel_kg_s/h3/w1/v10</property>
      <property value="0.561395">fsim/tables/fuel_kg_s/h3/w1/v11</property>
      <property value="0.59481">fsim/tables/fuel_kg_s/h3/w1/v12</property>
      <property value="0.655911">fsim/tables/fuel_kg_s/h3/w1/v13</property>
      <property value="0.71367">fsim/tables/fuel_kg_s/h3/w1/v14</property>
      <property value="0.773342">fsim/tables/fuel_kg_s/h3/w1/v15</property>
      <property value="0.341634">fsim/tables/fuel_kg_s/h3/w1/v2</property>
      <property value="0.353299">fsim/tables/fuel_kg_s/h3/w1/v3</property>
      <property value="0.363337">fsim/tables/fuel_kg_s/h3/w1/v4</property>
      <property value="0.377721">fsim/tables/fuel_kg_s/h3/w1/v5</property>
      <property value="0.402958">fsim/tables/fuel_kg_s/h3/w1/v6</property>
      <property value="0.427471">fsim/tables/fuel_kg_s/h3/w1/v7</property>
      <property value="0.449845">fsim/tables/fuel_kg_s/h3/w1/v8</property>
      <property value="0.486252">fsim/tables/fuel_kg_s/h3/w1/v9</property>
      <property value="0.392685">fsim/tables/fuel_kg_s/h3/w2/v0</property>
      <property value="0.391471">fsim/tables/fuel_kg_s/h3/w2/v1</property>
      <property value="0.553605">fsim/tables/fuel_kg_s/h3/w2/v10</property>
      <property value="0.584645">fsim/tables/fuel_kg_s/h3/w2/v11</property>
      <property value="0.616758">fsim/tables/fuel_kg_s/h3/w2/v12</property>
      <property value="0.667702">fsim/tables/fuel_kg_s/h3/w2/v13</property>
      <property value="0.717232">fsim/tables/fuel_kg_s/h3/w2/v14</property>
      <property value="0.772327">fsim/tables/fuel_kg_s/h3/w2/v15</property>
      <property value="0.395191">fsim/tables/fuel_kg_s/h3/w2/v2</property>
      <property value="0.399077">fsim/tables/fuel_kg_s/h3/w2/v3</property>
      <property value="0.406873">fsim/tables/fuel_kg_s/h3/w2/v4</property>
      <property value="0.424676">fsim/tables/fuel_kg_s/h3/w2/v5</property>
      <property value="0.444185">fsim/tables/fuel_kg_s/h3/w2/v6</property>
      <property value="0.462992">fsim/tables/fuel_kg_s/h3/w2/v7</property>
      <property value="0.484308">fsim/tables/fuel_kg_s/h3/w2/v8</property>
      <property value="0.520877">fsim/tables/fuel_kg_s/h3/w2/v9</property>
      <property value="0.281476">fsim/tables/fuel_kg_s/h4/w0/v0</property>
      <property value="0.28095">fsim/tables/fuel_kg_s/h4/w0/v1</property>
      <property value="0.455004">fsim/tables/fuel_kg_s/h4/w0/v10</property>
      <property value="0.491429">fsim/tables/fuel_kg_s/h4/w0/v11</property>
      <property value="0.526714">fsim/tables/fuel_kg_s/h4/w0/v12</property>
      <property value="0.577332">fsim/tables/fuel_kg_s/h4/w0/v13</property>
      <property value="0.632812">fsim/tables/fuel_kg_s/h4/w0/v14</property>
      <property value="0.689155">fsim/tables/fuel_kg_s/h4/w0/v15</property>
      <property value="0.282648">fsim/tables/fuel_kg_s/h4/w0/v2</property>
      <property value="0.295089">fsim/tables/fuel_kg_s/h4/w0/v3</property>
      <property value="0.307664">fsim/tables/fuel_kg_s/h4/w0/v4</property>
      <property value="0.319376">fsim/tables/fuel_kg_s/h4/w0/v5</property>
      <property value="0.342065">fsim/tables/fuel_kg_s/h4/w0/v6</property>
      <property value="0.366611">fsim/tables/fuel_kg_s/h4/w0/v7</property>
      <property value="0.389215">fsim/tables/fuel_kg_s/h4/w0/v8</property>
      <property value="0.418844">fsim/tables/fuel_kg_s/h4/w0/v9</property>
      <property value="0.332016">fsim/tables/fuel_kg_s/h4/w1/v0</property>
      <property value="0.328754">fsim/tables/fuel_kg_s/h4/w1/v1</property>
      <property value="0.483651">fsim/tables/fuel_kg_s/h4/w1/v10</property>
      <property value="0.51498">fsim/tables/fuel_kg_s/h4/w1/v11</property>
      <property value="0.543794">fsim/tables/fuel_kg_s/h4/w1/v12</property>
      <property value="0.587194">fsim/tables/fuel_kg_s/h4/w1/v13</property>
      <property value="0.638194">fsim/tables/fuel_kg_s/h4/w1/v14</property>
      <property value="0.691141">fsim/tables/fuel_kg_s/h4/w1/v15</property>
      <property value="0.335104">fsim/tables/fuel_kg_s/h4/w1/v2</property>
      <property value="0.341495">fsim/tables/fuel_kg_s/h4/w1/v3</property>
      <property value="0.347502">fsim/tables/fuel_kg_s/h4/w1/v4</property>
      <property value="0.361117">fsim/tables/fuel_kg_s/h4/w1/v5</property>
      <property value="0.382157">fsim/tables/fuel_kg_s/h4/w1/v6</property>
      <property value="0.401973">fsim/tables/fuel_kg_s/h4/w1/v7</property>
      <property value="0.419537">fsim/tables/fuel_kg_s/h4/w1/v8</property>
      <property value="0.451373">fsim/tables/fuel_kg_s/h4/w1/v9</property>
      <property value="0.394087">fsim/tables/fuel_kg_s/h4/w2/v0</property>
      <property value="0.389464">fsim/tables/fuel_kg_s/h4/w2/v1</property>
      <property value="0.51355">fsim/tables/fuel_kg_s/h4/w2/v10</property>
      <property value="0.54008">fsim/tables/fuel_kg_s/h4/w2/v11</property>
      <property value="0.565154">fsim/tables/fuel_kg_s/h4/w2/v12</property>
      <property value="0.604995">fsim/tables/fuel_kg_s/h4/w2/v13</property>
      <property value="0.647442">fsim/tables/fuel_kg_s/h4/w2/v14</property>
      <property value="0.690009">fsim/tables/fuel_kg_s/h4/w2/v15</property>
      <property value="0.388824">fsim/tables/fuel_kg_s/h4/w2/v2</property>
      <property value="0.389311">fsim/tables/fuel_kg_s/h4/w2/v3</property>
      <property value="0.399731">fsim/tables/fuel_kg_s/h4/w2/v4</property>
      <property value="0.412224">fsim/tables/fuel_kg_s/h4/w2/v5</property>
      <property value="0.424462">fsim/tables/fuel_kg_s/h4/w2/v6</property>
      <property value="0.43778">fsim/tables/fuel_kg_s/h4/w2/v7</property>
      <property value="0.459734">fsim/tables/fuel_kg_s/h4/w2/v8</property>
      <property value="0.48646">fsim/tables/fuel_kg_s/h4/w2/v9</property>
      <property value="0.276073">fsim/tables/fuel_kg_s/h5/w0/v0</property>
      <property value="0.272718">fsim/tables/fuel_kg_s/h5/w0/v1</property>
      <property value="0.424288">fsim/tables/fuel_kg_s/h5/w0/v10</property>
      <property value="0.455462">fsim/tables/fuel_kg_s/h5/w0/v11</property>
      <property value="0.484453">fsim/tables/fuel_kg_s/h5/w0/v12</property>
      <property value="0.526662">fsim/tables/fuel_kg_s/h5/w0/v13</property>
      <property value="0.577052">fsim/tables/fuel_kg_s/h5/w0/v14</property>
      <property value="0.62795">fsim/tables/fuel_kg_s/h5/w0/v15</property>
      <property value="0.275047">fsim/tables/fuel_kg_s/h5/w0/v2</property>
      <property value="0.286356">fsim/tables/fuel_kg_s/h5/w0/v3</property>
      <property value="0.296083">fsim/tables/fuel_kg_s/h5/w0/v4</property>
      <property value="0.303543">fsim/tables/fuel_kg_s/h5/w0/v5</property>
      <property value="0.325275">fsim/tables/fuel_kg_s/h5/w0/v6</property>
      <property value="0.346334">fsim/tables/fuel_kg_s/h5/w0/v7</property>
      <property value="0.36622">fsim/tables/fuel_kg_s/h5/w0/v8</property>
      <property value="0.390829">fsim/tables/fuel_kg_s/h5/w0/v9</property>
      <property value="0.329319">fsim/tables/fuel_kg_s/h5/w1/v0</property>
      <property value="0.327014">fsim/tables/fuel_kg_s/h5/w1/v1</property>
      <property value="0.453525">fsim/tables/fuel_kg_s/h5/w1/v10</property>
      <property value="0.47892">fsim/tables/fuel_kg_s/h5/w1/v11</property>
      <property value="0.505935">fsim/tables/fuel_kg_s/h5/w1/v12</property>
      <property value="0.540892">fsim/tables/fuel_kg_s/h5/w1/v13</property>
      <property value="0.581974">fsim/tables/fuel_kg_s/h5/w1/v14</property>
      <property value="0.627684">fsim/tables/fuel_kg_s/h5/w1/v15</property>
      <property value="0.329379">fsim/tables/fuel_kg_s/h5/w1/v2</property>
      <property value="0.332966">fsim/tables/fuel_kg_s/h5/w1/v3</property>
      <property value="0.337101">fsim/tables/fuel_kg_s/h5/w1/v4</property>
      <property value="0.35163">fsim/tables/fuel_kg_s/h5/w1/v5</property>
      <property value="0.367248">fsim/tables/fuel_kg_s/h5/w1/v6</property>
      <property value="0.382732">fsim/tables/fuel_kg_s/h5/w1/v7</property>
      <property value="0.396262">fsim/tables/fuel_kg_s/h5/w1/v8</property>
      <property value="0.42572">fsim/tables/fuel_kg_s/h5/w1/v9</property>
      <property value="0.394503">fsim/tables/fuel_kg_s/h5/w2/v0</property>
      <property value="0.38711">fsim/tables/fuel_kg_s/h5/w2/v1</property>
      <property value="0.480661">fsim/tables/fuel_kg_s/h5/w2/v10</property>
      <property value="0.502497">fsim/tables/fuel_kg_s/h5/w2/v11</property>
      <property value="0.524519">fsim/tables/fuel_kg_s/h5/w2/v12</property>
      <property value="0.548766">fsim/tables/fuel_kg_s/h5/w2/v13</property>
      <property value="0.584152">fsim/tables/fuel_kg_s/h5/w2/v14</property>
      <property value="0.621752">fsim/tables/fuel_kg_s/h5/w2/v15</property>
      <property value="0.38338">fsim/tables/fuel_kg_s/h5/w2/v2</property>
      <property value="0.387725">fsim/tables/fuel_kg_s/h5/w2/v3</property>
      <property value="0.395239">fsim/tables/fuel_kg_s/h5/w2/v4</property>
      <property value="0.403069">fsim/tables/fuel_kg_s/h5/w2/v5</property>
      <property value="0.411833">fsim/tables/fuel_kg_s/h5/w2/v6</property>
      <property value="0.421162">fsim/tables/fuel_kg_s/h5/w2/v7</property>
      <property value="0.437547">fsim/tables/fuel_kg_s/h5/w2/v8</property>
      <property value="0.459466">fsim/tables/fuel_kg_s/h5/w2/v9</property>
      <property value="0.268633">fsim/tables/fuel_kg_s/h6/w0/v0</property>
      <property value="0.264725">fsim/tables/fuel_kg_s/h6/w0/v1</property>
      <property value="0.382125">fsim/tables/fuel_kg_s/h6/w0/v10</property>
      <property value="0.407906">fsim/tables/fuel_kg_s/h6/w0/v11</property>
      <property value="0.432446">fsim/tables/fuel_kg_s/h6/w0/v12</property>
      <property value="0.459169">fsim/tables/fuel_kg_s/h6/w0/v13</property>
      <property value="0.500257">fsim/tables/fuel_kg_s/h6/w0/v14</property>
      <property value="0.543272">fsim/tables/fuel_kg_s/h6/w0/v15</property>
      <property value="0.268667">fsim/tables/fuel_kg_s/h6/w0/v2</property>
      <property value="0.274356">fsim/tables/fuel_kg_s/h6/w0/v3</property>
      <property value="0.279667">fsim/tables/fuel_kg_s/h6/w0/v4</property>
      <property value="0.288488">fsim/tables/fuel_kg_s/h6/w0/v5</property>
      <property value="0.303586">fsim/tables/fuel_kg_s/h6/w0/v6</property>
      <property value="0.320383">fsim/tables/fuel_kg_s/h6/w0/v7</property>
      <property value="0.334388">fsim/tables/fuel_kg_s/h6/w0/v8</property>
      <property value="0.355504">fsim/tables/fuel_kg_s/h6/w0/v9</property>
      <property value="0.330546">fsim/tables/fuel_kg_s/h6/w1/v0</property>
      <property value="0.325027">fsim/tables/fuel_kg_s/h6/w1/v1</property>
      <property value="0.410692">fsim/tables/fuel_kg_s/h6/w1/v10</property>
      <property value="0.433169">fsim/tables/fuel_kg_s/h6/w1/v11</property>
      <property value="0.453261">fsim/tables/fuel_kg_s/h6/w1/v12</property>
      <property value="0.472897">fsim/tables/fuel_kg_s/h6/w1/v13</property>
      <property value="0.507353">fsim/tables/fuel_kg_s/h6/w1/v14</property>
      <property value="0.542085">fsim/tables/fuel_kg_s/h6/w1/v15</property>
      <property value="0.322956">fsim/tables/fuel_kg_s/h6/w1/v2</property>
      <property value="0.322809">fsim/tables/fuel_kg_s/h6/w1/v3</property>
      <property value="0.330432">fsim/tables/fuel_kg_s/h6/w1/v4</property>
      <property value="0.339458">fsim/tables/fuel_kg_s/h6/w1/v5</property>
      <property value="0.348536">fsim/tables/fuel_kg_s/h6/w1/v6</property>
      <property value="0.358677">fsim/tables/fuel_kg_s/h6/w1/v7</property>
      <property value="0.369706">fsim/tables/fuel_kg_s/h6/w1/v8</property>
      <property value="0.391213">fsim/tables/fuel_kg_s/h6/w1/v9</property>
      <property value="0.392417">fsim/tables/fuel_kg_s/h6/w2/v0</property>
      <property value="0.387535">fsim/tables/fuel_kg_s/h6/w2/v1</property>
      <property value="0.441769">fsim/tables/fuel_kg_s/h6/w2/v10</property>
      <property value="0.456614">fsim/tables/fuel_kg_s/h6/w2/v11</property>
      <property value="0.471218">fsim/tables/fuel_kg_s/h6/w2/v12</property>
      <property value="0.484366">fsim/tables/fuel_kg_s/h6/w2/v13</property>
      <property value="0.504619">fsim/tables/fuel_kg_s/h6/w2/v14</property>
      <property value="0.532757">fsim/tables/fuel_kg_s/h6/w2/v15</property>
      <property value="0.386011">fsim/tables/fuel_kg_s/h6/w2/v2</property>
      <property value="0.387216">fsim/tables/fuel_kg_s/h6/w2/v3</property>
      <property value="0.390235">fsim/tables/fuel_kg_s/h6/w2/v4</property>
      <property value="0.393502">fsim/tables/fuel_kg_s/h6/w2/v5</property>
      <property value="0.396596">fsim/tables/fuel_kg_s/h6/w2/v6</property>
      <property value="0.401786">fsim/tables/fuel_kg_s/h6/w2/v7</property>
      <property value="0.412388">fsim/tables/fuel_kg_s/h6/w2/v8</property>
      <property value="0.4271">fsim/tables/fuel_kg_s/h6/w2/v9</property>
      <property value="0.267395">fsim/tables/fuel_kg_s/h7/w0/v0</property>
      <property value="0.264858">fsim/tables/fuel_kg_s/h7/w0/v1</property>
      <property value="0.347696">fsim/tables/fuel_kg_s/h7/w0/v10</property>
      <property value="0.368036">fsim/tables/fuel_kg_s/h7/w0/v11</property>
      <property value="0.387215">fsim/tables/fuel_kg_s/h7/w0/v12</property>
      <property value="0.407045">fsim/tables/fuel_kg_s/h7/w0/v13</property>
      <property value="0.437848">fsim/tables/fuel_kg_s/h7/w0/v14</property>
      <property value="0.470174">fsim/tables/fuel_kg_s/h7/w0/v15</property>
      <property value="0.263593">fsim/tables/fuel_kg_s/h7/w0/v2</property>
      <property value="0.265371">fsim/tables/fuel_kg_s/h7/w0/v3</property>
      <property value="0.267888">fsim/tables/fuel_kg_s/h7/w0/v4</property>
      <property value="0.278367">fsim/tables/fuel_kg_s/h7/w0/v5</property>
      <property value="0.28873">fsim/tables/fuel_kg_s/h7/w0/v6</property>
      <property value="0.297906">fsim/tables/fuel_kg_s/h7/w0/v7</property>
      <property value="0.30937">fsim/tables/fuel_kg_s/h7/w0/v8</property>
      <property value="0.326352">fsim/tables/fuel_kg_s/h7/w0/v9</property>
      <property value="0.331396">fsim/tables/fuel_kg_s/h7/w1/v0</property>
      <property value="0.323699">fsim/tables/fuel_kg_s/h7/w1/v1</property>
      <property value="0.376626">fsim/tables/fuel_kg_s/h7/w1/v10</property>
      <property value="0.391535">fsim/tables/fuel_kg_s/h7/w1/v11</property>
      <property value="0.405164">fsim/tables/fuel_kg_s/h7/w1/v12</property>
      <property value="0.419167">fsim/tables/fuel_kg_s/h7/w1/v13</property>
      <property value="0.436771">fsim/tables/fuel_kg_s/h7/w1/v14</property>
      <property value="0.462265">fsim/tables/fuel_kg_s/h7/w1/v15</property>
      <property value="0.320822">fsim/tables/fuel_kg_s/h7/w1/v2</property>
      <property value="0.323316">fsim/tables/fuel_kg_s/h7/w1/v3</property>
      <property value="0.327246">fsim/tables/fuel_kg_s/h7/w1/v4</property>
      <property value="0.331492">fsim/tables/fuel_kg_s/h7/w1/v5</property>
      <property value="0.335854">fsim/tables/fuel_kg_s/h7/w1/v6</property>
      <property value="0.341095">fsim/tables/fuel_kg_s/h7/w1/v7</property>
      <property value="0.348103">fsim/tables/fuel_kg_s/h7/w1/v8</property>
      <property value="0.362098">fsim/tables/fuel_kg_s/h7/w1/v9</property>
      <property value="0.404935">fsim/tables/fuel_kg_s/h7/w2/v0</property>
      <property value="0.400834">fsim/tables/fuel_kg_s/h7/w2/v1</property>
      <property value="0.414029">fsim/tables/fuel_kg_s/h7/w2/v10</property>
      <property value="0.420419">fsim/tables/fuel_kg_s/h7/w2/v11</property>
      <property value="0.428748">fsim/tables/fuel_kg_s/h7/w2/v12</property>
      <property value="0.437743">fsim/tables/fuel_kg_s/h7/w2/v13</property>
      <property value="0.44626">fsim/tables/fuel_kg_s/h7/w2/v14</property>
      <property value="0.457173">fsim/tables/fuel_kg_s/h7/w2/v15</property>
      <property value="0.394124">fsim/tables/fuel_kg_s/h7/w2/v2</property>
      <property value="0.391095">fsim/tables/fuel_kg_s/h7/w2/v3</property>
      <property value="0.390464">fsim/tables/fuel_kg_s/h7/w2/v4</property>
      <property value="0.390264">fsim/tables/fuel_kg_s/h7/w2/v5</property>
      <property value="0.390486">fsim/tables/fuel_kg_s/h7/w2/v6</property>
      <property value="0.394415">fsim/tables/fuel_kg_s/h7/w2/v7</property>
      <property value="0.399972">fsim/tables/fuel_kg_s/h7/w2/v8</property>
      <property value="0.406537">fsim/tables/fuel_kg_s/h7/w2/v9</property>
      <property value="21.4466">fsim/tables/max_climb_ms/h0/w0</property>
      <property value="16.916">fsim/tables/max_climb_ms/h0/w1</property>
      <property value="13.7036">fsim/tables/max_climb_ms/h0/w2</property>
      <property value="20.9061">fsim/tables/max_climb_ms/h1/w0</property>
      <property value="16.3677">fsim/tables/max_climb_ms/h1/w1</property>
      <property value="13.1423">fsim/tables/max_climb_ms/h1/w2</property>
      <property value="17.2034">fsim/tables/max_climb_ms/h2/w0</property>
      <property value="13.3296">fsim/tables/max_climb_ms/h2/w1</property>
      <property value="10.5169">fsim/tables/max_climb_ms/h2/w2</property>
      <property value="12.3767">fsim/tables/max_climb_ms/h3/w0</property>
      <property value="9.2">fsim/tables/max_climb_ms/h3/w1</property>
      <property value="6.83577">fsim/tables/max_climb_ms/h3/w2</property>
      <property value="10.6435">fsim/tables/max_climb_ms/h4/w0</property>
      <property value="7.6908">fsim/tables/max_climb_ms/h4/w1</property>
      <property value="5.47923">fsim/tables/max_climb_ms/h4/w2</property>
      <property value="9.2293">fsim/tables/max_climb_ms/h5/w0</property>
      <property value="6.45493">fsim/tables/max_climb_ms/h5/w1</property>
      <property value="4.35446">fsim/tables/max_climb_ms/h5/w2</property>
      <property value="7.28979">fsim/tables/max_climb_ms/h6/w0</property>
      <property value="4.76581">fsim/tables/max_climb_ms/h6/w1</property>
      <property value="2.79461">fsim/tables/max_climb_ms/h6/w2</property>
      <property value="5.50748">fsim/tables/max_climb_ms/h7/w0</property>
      <property value="3.16723">fsim/tables/max_climb_ms/h7/w1</property>
      <property value="1.31581">fsim/tables/max_climb_ms/h7/w2</property>
      <property value="176.411">fsim/tables/max_tas_ms/h0/w0</property>
      <property value="175.832">fsim/tables/max_tas_ms/h0/w1</property>
      <property value="174.529">fsim/tables/max_tas_ms/h0/w2</property>
      <property value="186.893">fsim/tables/max_tas_ms/h1/w0</property>
      <property value="185.294">fsim/tables/max_tas_ms/h1/w1</property>
      <property value="184.383">fsim/tables/max_tas_ms/h1/w2</property>
      <property value="198.661">fsim/tables/max_tas_ms/h2/w0</property>
      <property value="198.07">fsim/tables/max_tas_ms/h2/w1</property>
      <property value="196.616">fsim/tables/max_tas_ms/h2/w2</property>
      <property value="194.523">fsim/tables/max_tas_ms/h3/w0</property>
      <property value="193.033">fsim/tables/max_tas_ms/h3/w1</property>
      <property value="190.471">fsim/tables/max_tas_ms/h3/w2</property>
      <property value="192.144">fsim/tables/max_tas_ms/h4/w0</property>
      <property value="189.748">fsim/tables/max_tas_ms/h4/w1</property>
      <property value="186.55">fsim/tables/max_tas_ms/h4/w2</property>
      <property value="189.828">fsim/tables/max_tas_ms/h5/w0</property>
      <property value="186.93">fsim/tables/max_tas_ms/h5/w1</property>
      <property value="181.73">fsim/tables/max_tas_ms/h5/w2</property>
      <property value="185.875">fsim/tables/max_tas_ms/h6/w0</property>
      <property value="181.427">fsim/tables/max_tas_ms/h6/w1</property>
      <property value="173.797">fsim/tables/max_tas_ms/h6/w2</property>
      <property value="181.724">fsim/tables/max_tas_ms/h7/w0</property>
      <property value="174.017">fsim/tables/max_tas_ms/h7/w1</property>
      <property value="163.396">fsim/tables/max_tas_ms/h7/w2</property>
      <property value="70.8297">fsim/tables/min_tas_ms/h0/w0</property>
      <property value="73.9203">fsim/tables/min_tas_ms/h0/w1</property>
      <property value="76.6171">fsim/tables/min_tas_ms/h0/w2</property>
      <property value="75.4601">fsim/tables/min_tas_ms/h1/w0</property>
      <property value="78.5582">fsim/tables/min_tas_ms/h1/w1</property>
      <property value="81.6988">fsim/tables/min_tas_ms/h1/w2</property>
      <property value="78.0736">fsim/tables/min_tas_ms/h2/w0</property>
      <property value="82.0453">fsim/tables/min_tas_ms/h2/w1</property>
      <property value="86.2372">fsim/tables/min_tas_ms/h2/w2</property>
      <property value="81.6411">fsim/tables/min_tas_ms/h3/w0</property>
      <property value="86.9198">fsim/tables/min_tas_ms/h3/w1</property>
      <property value="92.2415">fsim/tables/min_tas_ms/h3/w2</property>
      <property value="83.5929">fsim/tables/min_tas_ms/h4/w0</property>
      <property value="89.4145">fsim/tables/min_tas_ms/h4/w1</property>
      <property value="95.2498">fsim/tables/min_tas_ms/h4/w2</property>
      <property value="85.5215">fsim/tables/min_tas_ms/h5/w0</property>
      <property value="91.8126">fsim/tables/min_tas_ms/h5/w1</property>
      <property value="98.0922">fsim/tables/min_tas_ms/h5/w2</property>
      <property value="88.7516">fsim/tables/min_tas_ms/h6/w0</property>
      <property value="95.8246">fsim/tables/min_tas_ms/h6/w1</property>
      <property value="102.792">fsim/tables/min_tas_ms/h6/w2</property>
      <property value="92.5157">fsim/tables/min_tas_ms/h7/w0</property>
      <property value="100.417">fsim/tables/min_tas_ms/h7/w1</property>
      <property value="107.986">fsim/tables/min_tas_ms/h7/w2</property>
      <property value="20.858">fsim/tables/ps_full_ms/h0/w0/v0</property>
      <property value="21.2701">fsim/tables/ps_full_ms/h0/w0/v1</property>
      <property value="14.7059">fsim/tables/ps_full_ms/h0/w0/v10</property>
      <property value="12.6544">fsim/tables/ps_full_ms/h0/w0/v11</property>
      <property value="10.5071">fsim/tables/ps_full_ms/h0/w0/v12</property>
      <property value="8.29412">fsim/tables/ps_full_ms/h0/w0/v13</property>
      <property value="6.03312">fsim/tables/ps_full_ms/h0/w0/v14</property>
      <property value="2.76545">fsim/tables/ps_full_ms/h0/w0/v15</property>
      <property value="21.4176">fsim/tables/ps_full_ms/h0/w0/v2</property>
      <property value="21.4116">fsim/tables/ps_full_ms/h0/w0/v3</property>
      <property value="21.1003">fsim/tables/ps_full_ms/h0/w0/v4</property>
      <property value="20.56">fsim/tables/ps_full_ms/h0/w0/v5</property>
      <property value="19.8592">fsim/tables/ps_full_ms/h0/w0/v6</property>
      <property value="19.0146">fsim/tables/ps_full_ms/h0/w0/v7</property>
      <property value="18.0214">fsim/tables/ps_full_ms/h0/w0/v8</property>
      <property value="16.5463">fsim/tables/ps_full_ms/h0/w0/v9</property>
      <property value="16.4098">fsim/tables/ps_full_ms/h0/w1/v0</property>
      <property value="16.6803">fsim/tables/ps_full_ms/h0/w1/v1</property>
      <property value="11.4695">fsim/tables/ps_full_ms/h0/w1/v10</property>
      <property value="9.933">fsim/tables/ps_full_ms/h0/w1/v11</property>
      <property value="8.34146">fsim/tables/ps_full_ms/h0/w1/v12</property>
      <property value="6.59202">fsim/tables/ps_full_ms/h0/w1/v13</property>
      <property value="4.81096">fsim/tables/ps_full_ms/h0/w1/v14</property>
      <property value="2.2622">fsim/tables/ps_full_ms/h0/w1/v15</property>
      <property value="16.8625">fsim/tables/ps_full_ms/h0/w1/v2</property>
      <property value="16.8833">fsim/tables/ps_full_ms/h0/w1/v3</property>
      <property value="16.6037">fsim/tables/ps_full_ms/h0/w1/v4</property>
      <property value="16.139">fsim/tables/ps_full_ms/h0/w1/v5</property>
      <property value="15.5579">fsim/tables/ps_full_ms/h0/w1/v6</property>
      <property value="14.8997">fsim/tables/ps_full_ms/h0/w1/v7</property>
      <property value="14.2031">fsim/tables/ps_full_ms/h0/w1/v8</property>
      <property value="12.9434">fsim/tables/ps_full_ms/h0/w1/v9</property>
      <property value="13.158">fsim/tables/ps_full_ms/h0/w2/v0</property>
      <property value="13.4713">fsim/tables/ps_full_ms/h0/w2/v1</property>
      <property value="9.34785">fsim/tables/ps_full_ms/h0/w2/v10</property>
      <property value="8.08441">fsim/tables/ps_full_ms/h0/w2/v11</property>
      <property value="6.78637">fsim/tables/ps_full_ms/h0/w2/v12</property>
      <property value="5.46166">fsim/tables/ps_full_ms/h0/w2/v13</property>
      <property value="4.11339">fsim/tables/ps_full_ms/h0/w2/v14</property>
      <property value="2.15296">fsim/tables/ps_full_ms/h0/w2/v15</property>
      <property value="13.669">fsim/tables/ps_full_ms/h0/w2/v2</property>
      <property value="13.6449">fsim/tables/ps_full_ms/h0/w2/v3</property>
      <property value="13.401">fsim/tables/ps_full_ms/h0/w2/v4</property>
      <property value="13.0323">fsim/tables/ps_full_ms/h0/w2/v5</property>
      <property value="12.5533">fsim/tables/ps_full_ms/h0/w2/v6</property>
      <property value="12.0529">fsim/tables/ps_full_ms/h0/w2/v7</property>
      <property value="11.4622">fsim/tables/ps_full_ms/h0/w2/v8</property>
      <property value="10.4902">fsim/tables/ps_full_ms/h0/w2/v9</property>
      <property value="20.4915">fsim/tables/ps_full_ms/h1/w0/v0</property>
      <property value="20.8745">fsim/tables/ps_full_ms/h1/w0/v1</property>
      <property value="14.6012">fsim/tables/ps_full_ms/h1/w0/v10</property>
      <property value="12.9844">fsim/tables/ps_full_ms/h1/w0/v11</property>
      <property value="10.8918">fsim/tables/ps_full_ms/h1/w0/v12</property>
      <property value="8.21971">fsim/tables/ps_full_ms/h1/w0/v13</property>
      <property value="5.40002">fsim/tables/ps_full_ms/h1/w0/v14</property>
      <property value="2.4355">fsim/tables/ps_full_ms/h1/w0/v15</property>
      <property value="20.9039">fsim/tables/ps_full_ms/h1/w0/v2</property>
      <property value="20.8477">fsim/tables/ps_full_ms/h1/w0/v3</property>
      <property value="20.6767">fsim/tables/ps_full_ms/h1/w0/v4</property>
      <property value="20.4051">fsim/tables/ps_full_ms/h1/w0/v5</property>
      <property value="19.8711">fsim/tables/ps_full_ms/h1/w0/v6</property>
      <property value="18.837">fsim/tables/ps_full_ms/h1/w0/v7</property>
      <property value="17.5314">fsim/tables/ps_full_ms/h1/w0/v8</property>
      <property value="16.1047">fsim/tables/ps_full_ms/h1/w0/v9</property>
      <property value="16.0082">fsim/tables/ps_full_ms/h1/w1/v0</property>
      <property value="16.2566">fsim/tables/ps_full_ms/h1/w1/v1</property>
      <property value="11.5041">fsim/tables/ps_full_ms/h1/w1/v10</property>
      <property value="10.2686">fsim/tables/ps_full_ms/h1/w1/v11</property>
      <property value="8.78324">fsim/tables/ps_full_ms/h1/w1/v12</property>
      <property value="6.78878">fsim/tables/ps_full_ms/h1/w1/v13</property>
      <property value="4.59367">fsim/tables/ps_full_ms/h1/w1/v14</property>
      <property value="2.2936">fsim/tables/ps_full_ms/h1/w1/v15</property>
      <property value="16.3385">fsim/tables/ps_full_ms/h1/w1/v2</property>
      <property value="16.3607">fsim/tables/ps_full_ms/h1/w1/v3</property>
      <property value="16.2556">fsim/tables/ps_full_ms/h1/w1/v4</property>
      <property value="16.0182">fsim/tables/ps_full_ms/h1/w1/v5</property>
      <property value="15.552">fsim/tables/ps_full_ms/h1/w1/v6</property>
      <property value="14.694">fsim/tables/ps_full_ms/h1/w1/v7</property>
      <property value="13.7542">fsim/tables/ps_full_ms/h1/w1/v8</property>
      <property value="12.705">fsim/tables/ps_full_ms/h1/w1/v9</property>
      <property value="12.7281">fsim/tables/ps_full_ms/h1/w2/v0</property>
      <property value="12.996">fsim/tables/ps_full_ms/h1/w2/v1</property>
      <property value="9.26955">fsim/tables/ps_full_ms/h1/w2/v10</property>
      <property value="8.26913">fsim/tables/ps_full_ms/h1/w2/v11</property>
      <property value="7.04064">fsim/tables/ps_full_ms/h1/w2/v12</property>
      <property value="5.44136">fsim/tables/ps_full_ms/h1/w2/v13</property>
      <property value="3.76994">fsim/tables/ps_full_ms/h1/w2/v14</property>
      <property value="1.98442">fsim/tables/ps_full_ms/h1/w2/v15</property>
      <property value="13.1017">fsim/tables/ps_full_ms/h1/w2/v2</property>
      <property value="13.1412">fsim/tables/ps_full_ms/h1/w2/v3</property>
      <property value="13.064">fsim/tables/ps_full_ms/h1/w2/v4</property>
      <property value="12.8863">fsim/tables/ps_full_ms/h1/w2/v5</property>
      <property value="12.4319">fsim/tables/ps_full_ms/h1/w2/v6</property>
      <property value="11.7485">fsim/tables/ps_full_ms/h1/w2/v7</property>
      <property value="10.9758">fsim/tables/ps_full_ms/h1/w2/v8</property>
      <property value="10.1339">fsim/tables/ps_full_ms/h1/w2/v9</property>
      <property value="16.1177">fsim/tables/ps_full_ms/h2/w0/v0</property>
      <property value="16.6512">fsim/tables/ps_full_ms/h2/w0/v1</property>
      <property value="12.8858">fsim/tables/ps_full_ms/h2/w0/v10</property>
      <property value="11.2488">fsim/tables/ps_full_ms/h2/w0/v11</property>
      <property value="9.4149">fsim/tables/ps_full_ms/h2/w0/v12</property>
      <property value="7.43264">fsim/tables/ps_full_ms/h2/w0/v13</property>
      <property value="5.39501">fsim/tables/ps_full_ms/h2/w0/v14</property>
      <property value="3.11623">fsim/tables/ps_full_ms/h2/w0/v15</property>
      <property value="16.8167">fsim/tables/ps_full_ms/h2/w0/v2</property>
      <property value="17.0392">fsim/tables/ps_full_ms/h2/w0/v3</property>
      <property value="17.1914">fsim/tables/ps_full_ms/h2/w0/v4</property>
      <property value="17.03">fsim/tables/ps_full_ms/h2/w0/v5</property>
      <property value="16.4314">fsim/tables/ps_full_ms/h2/w0/v6</property>
      <property value="15.7354">fsim/tables/ps_full_ms/h2/w0/v7</property>
      <property value="14.9885">fsim/tables/ps_full_ms/h2/w0/v8</property>
      <property value="14.0978">fsim/tables/ps_full_ms/h2/w0/v9</property>
      <property value="12.3523">fsim/tables/ps_full_ms/h2/w1/v0</property>
      <property value="12.7105">fsim/tables/ps_full_ms/h2/w1/v1</property>
      <property value="9.90833">fsim/tables/ps_full_ms/h2/w1/v10</property>
      <property value="8.59057">fsim/tables/ps_full_ms/h2/w1/v11</property>
      <property value="7.20929">fsim/tables/ps_full_ms/h2/w1/v12</property>
      <property value="5.77144">fsim/tables/ps_full_ms/h2/w1/v13</property>
      <property value="4.19476">fsim/tables/ps_full_ms/h2/w1/v14</property>
      <property value="2.42361">fsim/tables/ps_full_ms/h2/w1/v15</property>
      <property value="12.9487">fsim/tables/ps_full_ms/h2/w1/v2</property>
      <property value="13.2055">fsim/tables/ps_full_ms/h2/w1/v3</property>
      <property value="13.3295">fsim/tables/ps_full_ms/h2/w1/v4</property>
      <property value="13.0959">fsim/tables/ps_full_ms/h2/w1/v5</property>
      <property value="12.6096">fsim/tables/ps_full_ms/h2/w1/v6</property>
      <property value="12.0958">fsim/tables/ps_full_ms/h2/w1/v7</property>
      <property value="11.5034">fsim/tables/ps_full_ms/h2/w1/v8</property>
      <property value="10.9276">fsim/tables/ps_full_ms/h2/w1/v9</property>
      <property value="9.54909">fsim/tables/ps_full_ms/h2/w2/v0</property>
      <property value="9.92491">fsim/tables/ps_full_ms/h2/w2/v1</property>
      <property value="7.7919">fsim/tables/ps_full_ms/h2/w2/v10</property>
      <property value="6.83404">fsim/tables/ps_full_ms/h2/w2/v11</property>
      <property value="5.70206">fsim/tables/ps_full_ms/h2/w2/v12</property>
      <property value="4.52696">fsim/tables/ps_full_ms/h2/w2/v13</property>
      <property value="3.33483">fsim/tables/ps_full_ms/h2/w2/v14</property>
      <property value="2.09408">fsim/tables/ps_full_ms/h2/w2/v15</property>
      <property value="10.1759">fsim/tables/ps_full_ms/h2/w2/v2</property>
      <property value="10.406">fsim/tables/ps_full_ms/h2/w2/v3</property>
      <property value="10.5052">fsim/tables/ps_full_ms/h2/w2/v4</property>
      <property value="10.27">fsim/tables/ps_full_ms/h2/w2/v5</property>
      <property value="9.92469">fsim/tables/ps_full_ms/h2/w2/v6</property>
      <property value="9.5018">fsim/tables/ps_full_ms/h2/w2/v7</property>
      <property value="9.07339">fsim/tables/ps_full_ms/h2/w2/v8</property>
      <property value="8.5842">fsim/tables/ps_full_ms/h2/w2/v9</property>
      <property value="11.4472">fsim/tables/ps_full_ms/h3/w0/v0</property>
      <property value="11.9078">fsim/tables/ps_full_ms/h3/w0/v1</property>
      <property value="9.42467">fsim/tables/ps_full_ms/h3/w0/v10</property>
      <property value="8.14449">fsim/tables/ps_full_ms/h3/w0/v11</property>
      <property value="6.77623">fsim/tables/ps_full_ms/h3/w0/v12</property>
      <property value="5.36676">fsim/tables/ps_full_ms/h3/w0/v13</property>
      <property value="3.9006">fsim/tables/ps_full_ms/h3/w0/v14</property>
      <property value="2.20364">fsim/tables/ps_full_ms/h3/w0/v15</property>
      <property value="12.022">fsim/tables/ps_full_ms/h3/w0/v2</property>
      <property value="12.1923">fsim/tables/ps_full_ms/h3/w0/v3</property>
      <property value="12.3605">fsim/tables/ps_full_ms/h3/w0/v4</property>
      <property value="12.2995">fsim/tables/ps_full_ms/h3/w0/v5</property>
      <property value="11.832">fsim/tables/ps_full_ms/h3/w0/v6</property>
      <property value="11.2951">fsim/tables/ps_full_ms/h3/w0/v7</property>
      <property value="10.6883">fsim/tables/ps_full_ms/h3/w0/v8</property>
      <property value="10.0774">fsim/tables/ps_full_ms/h3/w0/v9</property>
      <property value="8.32945">fsim/tables/ps_full_ms/h3/w1/v0</property>
      <property value="8.65">fsim/tables/ps_full_ms/h3/w1/v1</property>
      <property value="6.91597">fsim/tables/ps_full_ms/h3/w1/v10</property>
      <property value="6.01896">fsim/tables/ps_full_ms/h3/w1/v11</property>
      <property value="5.04435">fsim/tables/ps_full_ms/h3/w1/v12</property>
      <property value="3.94268">fsim/tables/ps_full_ms/h3/w1/v13</property>
      <property value="2.82296">fsim/tables/ps_full_ms/h3/w1/v14</property>
      <property value="1.6336">fsim/tables/ps_full_ms/h3/w1/v15</property>
      <property value="8.83929">fsim/tables/ps_full_ms/h3/w1/v2</property>
      <property value="9.05654">fsim/tables/ps_full_ms/h3/w1/v3</property>
      <property value="9.18407">fsim/tables/ps_full_ms/h3/w1/v4</property>
      <property value="9.0676">fsim/tables/ps_full_ms/h3/w1/v5</property>
      <property value="8.7248">fsim/tables/ps_full_ms/h3/w1/v6</property>
      <property value="8.33689">fsim/tables/ps_full_ms/h3/w1/v7</property>
      <property value="7.89302">fsim/tables/ps_full_ms/h3/w1/v8</property>
      <property value="7.44778">fsim/tables/ps_full_ms/h3/w1/v9</property>
      <property value="6.00529">fsim/tables/ps_full_ms/h3/w2/v0</property>
      <property value="6.30601">fsim/tables/ps_full_ms/h3/w2/v1</property>
      <property value="5.17293">fsim/tables/ps_full_ms/h3/w2/v10</property>
      <property value="4.47601">fsim/tables/ps_full_ms/h3/w2/v11</property>
      <property value="3.73239">fsim/tables/ps_full_ms/h3/w2/v12</property>
      <property value="2.98103">fsim/tables/ps_full_ms/h3/w2/v13</property>
      <property value="2.19416">fsim/tables/ps_full_ms/h3/w2/v14</property>
      <property value="1.26618">fsim/tables/ps_full_ms/h3/w2/v15</property>
      <property value="6.52121">fsim/tables/ps_full_ms/h3/w2/v2</property>
      <property value="6.71284">fsim/tables/ps_full_ms/h3/w2/v3</property>
      <property value="6.83331">fsim/tables/ps_full_ms/h3/w2/v4</property>
      <property value="6.71627">fsim/tables/ps_full_ms/h3/w2/v5</property>
      <property value="6.50032">fsim/tables/ps_full_ms/h3/w2/v6</property>
      <property value="6.20125">fsim/tables/ps_full_ms/h3/w2/v7</property>
      <property value="5.91658">fsim/tables/ps_full_ms/h3/w2/v8</property>
      <property value="5.55484">fsim/tables/ps_full_ms/h3/w2/v9</property>
      <property value="9.75507">fsim/tables/ps_full_ms/h4/w0/v0</property>
      <property value="10.1479">fsim/tables/ps_full_ms/h4/w0/v1</property>
      <property value="8.0852">fsim/tables/ps_full_ms/h4/w0/v10</property>
      <property value="7.1364">fsim/tables/ps_full_ms/h4/w0/v11</property>
      <property value="5.91761">fsim/tables/ps_full_ms/h4/w0/v12</property>
      <property value="4.66324">fsim/tables/ps_full_ms/h4/w0/v13</property>
      <property value="3.35634">fsim/tables/ps_full_ms/h4/w0/v14</property>
      <property value="1.98098">fsim/tables/ps_full_ms/h4/w0/v15</property>
      <property value="10.297">fsim/tables/ps_full_ms/h4/w0/v2</property>
      <property value="10.4424">fsim/tables/ps_full_ms/h4/w0/v3</property>
      <property value="10.5863">fsim/tables/ps_full_ms/h4/w0/v4</property>
      <property value="10.5902">fsim/tables/ps_full_ms/h4/w0/v5</property>
      <property value="10.2114">fsim/tables/ps_full_ms/h4/w0/v6</property>
      <property value="9.70652">fsim/tables/ps_full_ms/h4/w0/v7</property>
      <property value="9.20299">fsim/tables/ps_full_ms/h4/w0/v8</property>
      <property value="8.63303">fsim/tables/ps_full_ms/h4/w0/v9</property>
      <property value="6.84394">fsim/tables/ps_full_ms/h4/w1/v0</property>
      <property value="7.15005">fsim/tables/ps_full_ms/h4/w1/v1</property>
      <property value="5.84937">fsim/tables/ps_full_ms/h4/w1/v10</property>
      <property value="5.11685">fsim/tables/ps_full_ms/h4/w1/v11</property>
      <property value="4.3013">fsim/tables/ps_full_ms/h4/w1/v12</property>
      <property value="3.46945">fsim/tables/ps_full_ms/h4/w1/v13</property>
      <property value="2.47925">fsim/tables/ps_full_ms/h4/w1/v14</property>
      <property value="1.42278">fsim/tables/ps_full_ms/h4/w1/v15</property>
      <property value="7.33799">fsim/tables/ps_full_ms/h4/w1/v2</property>
      <property value="7.54103">fsim/tables/ps_full_ms/h4/w1/v3</property>
      <property value="7.65645">fsim/tables/ps_full_ms/h4/w1/v4</property>
      <property value="7.59181">fsim/tables/ps_full_ms/h4/w1/v5</property>
      <property value="7.33846">fsim/tables/ps_full_ms/h4/w1/v6</property>
      <property value="6.99766">fsim/tables/ps_full_ms/h4/w1/v7</property>
      <property value="6.63028">fsim/tables/ps_full_ms/h4/w1/v8</property>
      <property value="6.23329">fsim/tables/ps_full_ms/h4/w1/v9</property>
      <property value="4.69134">fsim/tables/ps_full_ms/h4/w2/v0</property>
      <property value="4.96851">fsim/tables/ps_full_ms/h4/w2/v1</property>
      <property value="4.20591">fsim/tables/ps_full_ms/h4/w2/v10</property>
      <property value="3.69432">fsim/tables/ps_full_ms/h4/w2/v11</property>
      <property value="3.10025">fsim/tables/ps_full_ms/h4/w2/v12</property>
      <property value="2.43749">fsim/tables/ps_full_ms/h4/w2/v13</property>
      <property value="1.76981">fsim/tables/ps_full_ms/h4/w2/v14</property>
      <property value="1.0819">fsim/tables/ps_full_ms/h4/w2/v15</property>
      <property value="5.17908">fsim/tables/ps_full_ms/h4/w2/v2</property>
      <property value="5.35437">fsim/tables/ps_full_ms/h4/w2/v3</property>
      <property value="5.47888">fsim/tables/ps_full_ms/h4/w2/v4</property>
      <property value="5.37849">fsim/tables/ps_full_ms/h4/w2/v5</property>
      <property value="5.23135">fsim/tables/ps_full_ms/h4/w2/v6</property>
      <property value="5.02721">fsim/tables/ps_full_ms/h4/w2/v7</property>
      <property value="4.75526">fsim/tables/ps_full_ms/h4/w2/v8</property>
      <property value="4.50875">fsim/tables/ps_full_ms/h4/w2/v9</property>
      <property value="8.39456">fsim/tables/ps_full_ms/h5/w0/v0</property>
      <property value="8.72708">fsim/tables/ps_full_ms/h5/w0/v1</property>
      <property value="6.99092">fsim/tables/ps_full_ms/h5/w0/v10</property>
      <property value="6.26598">fsim/tables/ps_full_ms/h5/w0/v11</property>
      <property value="5.27331">fsim/tables/ps_full_ms/h5/w0/v12</property>
      <property value="4.14388">fsim/tables/ps_full_ms/h5/w0/v13</property>
      <property value="2.94414">fsim/tables/ps_full_ms/h5/w0/v14</property>
      <property value="1.70547">fsim/tables/ps_full_ms/h5/w0/v15</property>
      <property value="8.92777">fsim/tables/ps_full_ms/h5/w0/v2</property>
      <property value="9.04808">fsim/tables/ps_full_ms/h5/w0/v3</property>
      <property value="9.18228">fsim/tables/ps_full_ms/h5/w0/v4</property>
      <property value="9.21756">fsim/tables/ps_full_ms/h5/w0/v5</property>
      <property value="8.882">fsim/tables/ps_full_ms/h5/w0/v6</property>
      <property value="8.47066">fsim/tables/ps_full_ms/h5/w0/v7</property>
      <property value="7.99493">fsim/tables/ps_full_ms/h5/w0/v8</property>
      <property value="7.52042">fsim/tables/ps_full_ms/h5/w0/v9</property>
      <property value="5.64872">fsim/tables/ps_full_ms/h5/w1/v0</property>
      <property value="5.94014">fsim/tables/ps_full_ms/h5/w1/v1</property>
      <property value="4.91078">fsim/tables/ps_full_ms/h5/w1/v10</property>
      <property value="4.40376">fsim/tables/ps_full_ms/h5/w1/v11</property>
      <property value="3.66787">fsim/tables/ps_full_ms/h5/w1/v12</property>
      <property value="2.92173">fsim/tables/ps_full_ms/h5/w1/v13</property>
      <property value="2.1501">fsim/tables/ps_full_ms/h5/w1/v14</property>
      <property value="1.24847">fsim/tables/ps_full_ms/h5/w1/v15</property>
      <property value="6.13035">fsim/tables/ps_full_ms/h5/w1/v2</property>
      <property value="6.31254">fsim/tables/ps_full_ms/h5/w1/v3</property>
      <property value="6.43243">fsim/tables/ps_full_ms/h5/w1/v4</property>
      <property value="6.39877">fsim/tables/ps_full_ms/h5/w1/v5</property>
      <property value="6.19442">fsim/tables/ps_full_ms/h5/w1/v6</property>
      <property value="5.91384">fsim/tables/ps_full_ms/h5/w1/v7</property>
      <property value="5.61251">fsim/tables/ps_full_ms/h5/w1/v8</property>
      <property value="5.27008">fsim/tables/ps_full_ms/h5/w1/v9</property>
      <property value="3.63069">fsim/tables/ps_full_ms/h5/w2/v0</property>
      <property value="3.86747">fsim/tables/ps_full_ms/h5/w2/v1</property>
      <property value="3.42995">fsim/tables/ps_full_ms/h5/w2/v10</property>
      <property value="3.13697">fsim/tables/ps_full_ms/h5/w2/v11</property>
      <property value="2.62377">fsim/tables/ps_full_ms/h5/w2/v12</property>
      <property value="2.122">fsim/tables/ps_full_ms/h5/w2/v13</property>
      <property value="1.5747">fsim/tables/ps_full_ms/h5/w2/v14</property>
      <property value="0.970463">fsim/tables/ps_full_ms/h5/w2/v15</property>
      <property value="4.07452">fsim/tables/ps_full_ms/h5/w2/v2</property>
      <property value="4.23649">fsim/tables/ps_full_ms/h5/w2/v3</property>
      <property value="4.3539">fsim/tables/ps_full_ms/h5/w2/v4</property>
      <property value="4.30217">fsim/tables/ps_full_ms/h5/w2/v5</property>
      <property value="4.20501">fsim/tables/ps_full_ms/h5/w2/v6</property>
      <property value="4.05574">fsim/tables/ps_full_ms/h5/w2/v7</property>
      <property value="3.87231">fsim/tables/ps_full_ms/h5/w2/v8</property>
      <property value="3.64749">fsim/tables/ps_full_ms/h5/w2/v9</property>
      <property value="6.50658">fsim/tables/ps_full_ms/h6/w0/v0</property>
      <property value="6.77751">fsim/tables/ps_full_ms/h6/w0/v1</property>
      <property value="5.55192">fsim/tables/ps_full_ms/h6/w0/v10</property>
      <property value="5.07667">fsim/tables/ps_full_ms/h6/w0/v11</property>
      <property value="4.26752">fsim/tables/ps_full_ms/h6/w0/v12</property>
      <property value="3.43034">fsim/tables/ps_full_ms/h6/w0/v13</property>
      <property value="2.46199">fsim/tables/ps_full_ms/h6/w0/v14</property>
      <property value="1.42293">fsim/tables/ps_full_ms/h6/w0/v15</property>
      <property value="7.01732">fsim/tables/ps_full_ms/h6/w0/v2</property>
      <property value="7.11378">fsim/tables/ps_full_ms/h6/w0/v3</property>
      <property value="7.23375">fsim/tables/ps_full_ms/h6/w0/v4</property>
      <property value="7.28015">fsim/tables/ps_full_ms/h6/w0/v5</property>
      <property value="7.0801">fsim/tables/ps_full_ms/h6/w0/v6</property>
      <property value="6.7516">fsim/tables/ps_full_ms/h6/w0/v7</property>
      <property value="6.39216">fsim/tables/ps_full_ms/h6/w0/v8</property>
      <property value="5.96179">fsim/tables/ps_full_ms/h6/w0/v9</property>
      <property value="4.00502">fsim/tables/ps_full_ms/h6/w1/v0</property>
      <property value="4.24501">fsim/tables/ps_full_ms/h6/w1/v1</property>
      <property value="3.6906">fsim/tables/ps_full_ms/h6/w1/v10</property>
      <property value="3.37335">fsim/tables/ps_full_ms/h6/w1/v11</property>
      <property value="2.87344">fsim/tables/ps_full_ms/h6/w1/v12</property>
      <property value="2.31611">fsim/tables/ps_full_ms/h6/w1/v13</property>
      <property value="1.66661">fsim/tables/ps_full_ms/h6/w1/v14</property>
      <property value="0.999698">fsim/tables/ps_full_ms/h6/w1/v15</property>
      <property value="4.44503">fsim/tables/ps_full_ms/h6/w1/v2</property>
      <property value="4.5995">fsim/tables/ps_full_ms/h6/w1/v3</property>
      <property value="4.71784">fsim/tables/ps_full_ms/h6/w1/v4</property>
      <property value="4.71315">fsim/tables/ps_full_ms/h6/w1/v5</property>
      <property value="4.5945">fsim/tables/ps_full_ms/h6/w1/v6</property>
      <property value="4.41881">fsim/tables/ps_full_ms/h6/w1/v7</property>
      <property value="4.2087">fsim/tables/ps_full_ms/h6/w1/v8</property>
      <property value="3.94129">fsim/tables/ps_full_ms/h6/w1/v9</property>
      <property value="2.15048">fsim/tables/ps_full_ms/h6/w2/v0</property>
      <property value="2.336">fsim/tables/ps_full_ms/h6/w2/v1</property>
      <property value="2.29142">fsim/tables/ps_full_ms/h6/w2/v10</property>
      <property value="2.12411">fsim/tables/ps_full_ms/h6/w2/v11</property>
      <property value="1.94832">fsim/tables/ps_full_ms/h6/w2/v12</property>
      <property value="1.62397">fsim/tables/ps_full_ms/h6/w2/v13</property>
      <property value="1.22689">fsim/tables/ps_full_ms/h6/w2/v14</property>
      <property value="0.805488">fsim/tables/ps_full_ms/h6/w2/v15</property>
      <property value="2.53831">fsim/tables/ps_full_ms/h6/w2/v2</property>
      <property value="2.687">fsim/tables/ps_full_ms/h6/w2/v3</property>
      <property value="2.78874">fsim/tables/ps_full_ms/h6/w2/v4</property>
      <property value="2.76454">fsim/tables/ps_full_ms/h6/w2/v5</property>
      <property value="2.7337">fsim/tables/ps_full_ms/h6/w2/v6</property>
      <property value="2.64082">fsim/tables/ps_full_ms/h6/w2/v7</property>
      <property value="2.57961">fsim/tables/ps_full_ms/h6/w2/v8</property>
      <property value="2.4444">fsim/tables/ps_full_ms/h6/w2/v9</property>
      <property value="4.75094">fsim/tables/ps_full_ms/h7/w0/v0</property>
      <property value="4.96991">fsim/tables/ps_full_ms/h7/w0/v1</property>
      <property value="4.19289">fsim/tables/ps_full_ms/h7/w0/v10</property>
      <property value="3.83779">fsim/tables/ps_full_ms/h7/w0/v11</property>
      <property value="3.35328">fsim/tables/ps_full_ms/h7/w0/v12</property>
      <property value="2.62639">fsim/tables/ps_full_ms/h7/w0/v13</property>
      <property value="1.8821">fsim/tables/ps_full_ms/h7/w0/v14</property>
      <property value="1.13053">fsim/tables/ps_full_ms/h7/w0/v15</property>
      <property value="5.2078">fsim/tables/ps_full_ms/h7/w0/v2</property>
      <property value="5.3467">fsim/tables/ps_full_ms/h7/w0/v3</property>
      <property value="5.45784">fsim/tables/ps_full_ms/h7/w0/v4</property>
      <property value="5.50702">fsim/tables/ps_full_ms/h7/w0/v5</property>
      <property value="5.34296">fsim/tables/ps_full_ms/h7/w0/v6</property>
      <property value="5.15617">fsim/tables/ps_full_ms/h7/w0/v7</property>
      <property value="4.8677">fsim/tables/ps_full_ms/h7/w0/v8</property>
      <property value="4.55999">fsim/tables/ps_full_ms/h7/w0/v9</property>
      <property value="2.46465">fsim/tables/ps_full_ms/h7/w1/v0</property>
      <property value="2.64256">fsim/tables/ps_full_ms/h7/w1/v1</property>
      <property value="2.53072">fsim/tables/ps_full_ms/h7/w1/v10</property>
      <property value="2.32356">fsim/tables/ps_full_ms/h7/w1/v11</property>
      <property value="2.13508">fsim/tables/ps_full_ms/h7/w1/v12</property>
      <property value="1.7859">fsim/tables/ps_full_ms/h7/w1/v13</property>
      <property value="1.32393">fsim/tables/ps_full_ms/h7/w1/v14</property>
      <property value="0.851118">fsim/tables/ps_full_ms/h7/w1/v15</property>
      <property value="2.8581">fsim/tables/ps_full_ms/h7/w1/v2</property>
      <property value="3.01042">fsim/tables/ps_full_ms/h7/w1/v3</property>
      <property value="3.11375">fsim/tables/ps_full_ms/h7/w1/v4</property>
      <property value="3.14114">fsim/tables/ps_full_ms/h7/w1/v5</property>
      <property value="3.0764">fsim/tables/ps_full_ms/h7/w1/v6</property>
      <property value="2.97029">fsim/tables/ps_full_ms/h7/w1/v7</property>
      <property value="2.85851">fsim/tables/ps_full_ms/h7/w1/v8</property>
      <property value="2.71241">fsim/tables/ps_full_ms/h7/w1/v9</property>
      <property value="0.747452">fsim/tables/ps_full_ms/h7/w2/v0</property>
      <property value="0.882917">fsim/tables/ps_full_ms/h7/w2/v1</property>
      <property value="1.13708">fsim/tables/ps_full_ms/h7/w2/v10</property>
      <property value="1.09591">fsim/tables/ps_full_ms/h7/w2/v11</property>
      <property value="1.00995">fsim/tables/ps_full_ms/h7/w2/v12</property>
      <property value="0.908901">fsim/tables/ps_full_ms/h7/w2/v13</property>
      <property value="0.822419">fsim/tables/ps_full_ms/h7/w2/v14</property>
      <property value="0.638572">fsim/tables/ps_full_ms/h7/w2/v15</property>
      <property value="1.05867">fsim/tables/ps_full_ms/h7/w2/v2</property>
      <property value="1.19824">fsim/tables/ps_full_ms/h7/w2/v3</property>
      <property value="1.29731">fsim/tables/ps_full_ms/h7/w2/v4</property>
      <property value="1.30294">fsim/tables/ps_full_ms/h7/w2/v5</property>
      <property value="1.2968">fsim/tables/ps_full_ms/h7/w2/v6</property>
      <property value="1.27341">fsim/tables/ps_full_ms/h7/w2/v7</property>
      <property value="1.24591">fsim/tables/ps_full_ms/h7/w2/v8</property>
      <property value="1.2012">fsim/tables/ps_full_ms/h7/w2/v9</property>
      <property value="-4.00809">fsim/tables/ps_idle_ms/h0/w0/v0</property>
      <property value="-4.31402">fsim/tables/ps_idle_ms/h0/w0/v1</property>
      <property value="-14.9142">fsim/tables/ps_idle_ms/h0/w0/v10</property>
      <property value="-17.4065">fsim/tables/ps_idle_ms/h0/w0/v11</property>
      <property value="-19.7666">fsim/tables/ps_idle_ms/h0/w0/v12</property>
      <property value="-21.9107">fsim/tables/ps_idle_ms/h0/w0/v13</property>
      <property value="-24.368">fsim/tables/ps_idle_ms/h0/w0/v14</property>
      <property value="-25.1028">fsim/tables/ps_idle_ms/h0/w0/v15</property>
      <property value="-4.98633">fsim/tables/ps_idle_ms/h0/w0/v2</property>
      <property value="-5.3927">fsim/tables/ps_idle_ms/h0/w0/v3</property>
      <property value="-6.51622">fsim/tables/ps_idle_ms/h0/w0/v4</property>
      <property value="-7.56319">fsim/tables/ps_idle_ms/h0/w0/v5</property>
      <property value="-8.34915">fsim/tables/ps_idle_ms/h0/w0/v6</property>
      <property value="-9.99499">fsim/tables/ps_idle_ms/h0/w0/v7</property>
      <property value="-11.6435">fsim/tables/ps_idle_ms/h0/w0/v8</property>
      <property value="-13.0505">fsim/tables/ps_idle_ms/h0/w0/v9</property>
      <property value="-4.05793">fsim/tables/ps_idle_ms/h0/w1/v0</property>
      <property value="-4.50554">fsim/tables/ps_idle_ms/h0/w1/v1</property>
      <property value="-12.7503">fsim/tables/ps_idle_ms/h0/w1/v10</property>
      <property value="-14.6109">fsim/tables/ps_idle_ms/h0/w1/v11</property>
      <property value="-16.3847">fsim/tables/ps_idle_ms/h0/w1/v12</property>
      <property value="-18.0982">fsim/tables/ps_idle_ms/h0/w1/v13</property>
      <property value="-20.118">fsim/tables/ps_idle_ms/h0/w1/v14</property>
      <property value="-21.1882">fsim/tables/ps_idle_ms/h0/w1/v15</property>
      <property value="-4.86815">fsim/tables/ps_idle_ms/h0/w1/v2</property>
      <property value="-5.25497">fsim/tables/ps_idle_ms/h0/w1/v3</property>
      <property value="-6.14052">fsim/tables/ps_idle_ms/h0/w1/v4</property>
      <property value="-6.89331">fsim/tables/ps_idle_ms/h0/w1/v5</property>
      <property value="-7.58941">fsim/tables/ps_idle_ms/h0/w1/v6</property>
      <property value="-8.90837">fsim/tables/ps_idle_ms/h0/w1/v7</property>
      <property value="-10.0797">fsim/tables/ps_idle_ms/h0/w1/v8</property>
      <property value="-11.1741">fsim/tables/ps_idle_ms/h0/w1/v9</property>
      <property value="-4.40549">fsim/tables/ps_idle_ms/h0/w2/v0</property>
      <property value="-4.71345">fsim/tables/ps_idle_ms/h0/w2/v1</property>
      <property value="-11.1237">fsim/tables/ps_idle_ms/h0/w2/v10</property>
      <property value="-12.6517">fsim/tables/ps_idle_ms/h0/w2/v11</property>
      <property value="-14.0893">fsim/tables/ps_idle_ms/h0/w2/v12</property>
      <property value="-15.4087">fsim/tables/ps_idle_ms/h0/w2/v13</property>
      <property value="-16.9039">fsim/tables/ps_idle_ms/h0/w2/v14</property>
      <property value="-18.136">fsim/tables/ps_idle_ms/h0/w2/v15</property>
      <property value="-4.85735">fsim/tables/ps_idle_ms/h0/w2/v2</property>
      <property value="-5.27035">fsim/tables/ps_idle_ms/h0/w2/v3</property>
      <property value="-5.92092">fsim/tables/ps_idle_ms/h0/w2/v4</property>
      <property value="-6.42693">fsim/tables/ps_idle_ms/h0/w2/v5</property>
      <property value="-7.10027">fsim/tables/ps_idle_ms/h0/w2/v6</property>
      <property value="-8.131">fsim/tables/ps_idle_ms/h0/w2/v7</property>
      <property value="-9.0845">fsim/tables/ps_idle_ms/h0/w2/v8</property>
      <property value="-9.86179">fsim/tables/ps_idle_ms/h0/w2/v9</property>
      <property value="-4.11801">fsim/tables/ps_idle_ms/h1/w0/v0</property>
      <property value="-4.65456">fsim/tables/ps_idle_ms/h1/w0/v1</property>
      <property value="-15.095">fsim/tables/ps_idle_ms/h1/w0/v10</property>
      <property value="-17.0783">fsim/tables/ps_idle_ms/h1/w0/v11</property>
      <property value="-19.0107">fsim/tables/ps_idle_ms/h1/w0/v12</property>
      <property value="-21.8268">fsim/tables/ps_idle_ms/h1/w0/v13</property>
      <property value="-24.6132">fsim/tables/ps_idle_ms/h1/w0/v14</property>
      <property value="-25.3038">fsim/tables/ps_idle_ms/h1/w0/v15</property>
      <property value="-4.94741">fsim/tables/ps_idle_ms/h1/w0/v2</property>
      <property value="-5.74853">fsim/tables/ps_idle_ms/h1/w0/v3</property>
      <property value="-6.66063">fsim/tables/ps_idle_ms/h1/w0/v4</property>
      <property value="-7.31991">fsim/tables/ps_idle_ms/h1/w0/v5</property>
      <property value="-8.71371">fsim/tables/ps_idle_ms/h1/w0/v6</property>
      <property value="-10.039">fsim/tables/ps_idle_ms/h1/w0/v7</property>
      <property value="-11.2613">fsim/tables/ps_idle_ms/h1/w0/v8</property>
      <property value="-13.0531">fsim/tables/ps_idle_ms/h1/w0/v9</property>
      <property value="-4.52136">fsim/tables/ps_idle_ms/h1/w1/v0</property>
      <property value="-4.79328">fsim/tables/ps_idle_ms/h1/w1/v1</property>
      <property value="-12.7535">fsim/tables/ps_idle_ms/h1/w1/v10</property>
      <property value="-14.256">fsim/tables/ps_idle_ms/h1/w1/v11</property>
      <property value="-15.6325">fsim/tables/ps_idle_ms/h1/w1/v12</property>
      <property value="-17.7336">fsim/tables/ps_idle_ms/h1/w1/v13</property>
      <property value="-20.0138">fsim/tables/ps_idle_ms/h1/w1/v14</property>
      <property value="-21.1126">fsim/tables/ps_idle_ms/h1/w1/v15</property>
      <property value="-4.91332">fsim/tables/ps_idle_ms/h1/w1/v2</property>
      <property value="-5.61062">fsim/tables/ps_idle_ms/h1/w1/v3</property>
      <property value="-6.22387">fsim/tables/ps_idle_ms/h1/w1/v4</property>
      <property value="-6.77159">fsim/tables/ps_idle_ms/h1/w1/v5</property>
      <property value="-7.87273">fsim/tables/ps_idle_ms/h1/w1/v6</property>
      <property value="-8.89491">fsim/tables/ps_idle_ms/h1/w1/v7</property>
      <property value="-9.72586">fsim/tables/ps_idle_ms/h1/w1/v8</property>
      <property value="-11.1343">fsim/tables/ps_idle_ms/h1/w1/v9</property>
      <property value="-4.87948">fsim/tables/ps_idle_ms/h1/w2/v0</property>
      <property value="-4.94725">fsim/tables/ps_idle_ms/h1/w2/v1</property>
      <property value="-11.2449">fsim/tables/ps_idle_ms/h1/w2/v10</property>
      <property value="-12.4624">fsim/tables/ps_idle_ms/h1/w2/v11</property>
      <property value="-13.5907">fsim/tables/ps_idle_ms/h1/w2/v12</property>
      <property value="-15.2613">fsim/tables/ps_idle_ms/h1/w2/v13</property>
      <property value="-17.042">fsim/tables/ps_idle_ms/h1/w2/v14</property>
      <property value="-18.1277">fsim/tables/ps_idle_ms/h1/w2/v15</property>
      <property value="-5.14187">fsim/tables/ps_idle_ms/h1/w2/v2</property>
      <property value="-5.61009">fsim/tables/ps_idle_ms/h1/w2/v3</property>
      <property value="-5.99535">fsim/tables/ps_idle_ms/h1/w2/v4</property>
      <property value="-6.54945">fsim/tables/ps_idle_ms/h1/w2/v5</property>
      <property value="-7.41649">fsim/tables/ps_idle_ms/h1/w2/v6</property>
      <property value="-8.18338">fsim/tables/ps_idle_ms/h1/w2/v7</property>
      <property value="-8.85333">fsim/tables/ps_idle_ms/h1/w2/v8</property>
      <property value="-10.0474">fsim/tables/ps_idle_ms/h1/w2/v9</property>
      <property value="-4.52368">fsim/tables/ps_idle_ms/h2/w0/v0</property>
      <property value="-4.84514">fsim/tables/ps_idle_ms/h2/w0/v1</property>
      <property value="-14.6571">fsim/tables/ps_idle_ms/h2/w0/v10</property>
      <property value="-16.3638">fsim/tables/ps_idle_ms/h2/w0/v11</property>
      <property value="-19.0036">fsim/tables/ps_idle_ms/h2/w0/v12</property>
      <property value="-21.6626">fsim/tables/ps_idle_ms/h2/w0/v13</property>
      <property value="-24.1332">fsim/tables/ps_idle_ms/h2/w0/v14</property>
      <property value="-25.0079">fsim/tables/ps_idle_ms/h2/w0/v15</property>
      <property value="-5.07338">fsim/tables/ps_idle_ms/h2/w0/v2</property>
      <property value="-5.83702">fsim/tables/ps_idle_ms/h2/w0/v3</property>
      <property value="-6.43652">fsim/tables/ps_idle_ms/h2/w0/v4</property>
      <property value="-7.45112">fsim/tables/ps_idle_ms/h2/w0/v5</property>
      <property value="-8.64907">fsim/tables/ps_idle_ms/h2/w0/v6</property>
      <property value="-9.64851">fsim/tables/ps_idle_ms/h2/w0/v7</property>
      <property value="-11.149">fsim/tables/ps_idle_ms/h2/w0/v8</property>
      <property value="-12.9812">fsim/tables/ps_idle_ms/h2/w0/v9</property>
      <property value="-4.98186">fsim/tables/ps_idle_ms/h2/w1/v0</property>
      <property value="-5.02479">fsim/tables/ps_idle_ms/h2/w1/v1</property>
      <property value="-12.5821">fsim/tables/ps_idle_ms/h2/w1/v10</property>
      <property value="-14.0045">fsim/tables/ps_idle_ms/h2/w1/v11</property>
      <property value="-16.0066">fsim/tables/ps_idle_ms/h2/w1/v12</property>
      <property value="-17.9806">fsim/tables/ps_idle_ms/h2/w1/v13</property>
      <property value="-19.9651">fsim/tables/ps_idle_ms/h2/w1/v14</property>
      <property value="-20.9863">fsim/tables/ps_idle_ms/h2/w1/v15</property>
      <property value="-5.35379">fsim/tables/ps_idle_ms/h2/w1/v2</property>
      <property value="-5.8119">fsim/tables/ps_idle_ms/h2/w1/v3</property>
      <property value="-6.17057">fsim/tables/ps_idle_ms/h2/w1/v4</property>
      <property value="-7.08449">fsim/tables/ps_idle_ms/h2/w1/v5</property>
      <property value="-7.96882">fsim/tables/ps_idle_ms/h2/w1/v6</property>
      <property value="-8.68193">fsim/tables/ps_idle_ms/h2/w1/v7</property>
      <property value="-9.99468">fsim/tables/ps_idle_ms/h2/w1/v8</property>
      <property value="-11.2898">fsim/tables/ps_idle_ms/h2/w1/v9</property>
      <property value="-5.36727">fsim/tables/ps_idle_ms/h2/w2/v0</property>
      <property value="-5.30259">fsim/tables/ps_idle_ms/h2/w2/v1</property>
      <property value="-11.2016">fsim/tables/ps_idle_ms/h2/w2/v10</property>
      <property value="-12.2669">fsim/tables/ps_idle_ms/h2/w2/v11</property>
      <property value="-13.8983">fsim/tables/ps_idle_ms/h2/w2/v12</property>
      <property value="-15.5059">fsim/tables/ps_idle_ms/h2/w2/v13</property>
      <property value="-17.0456">fsim/tables/ps_idle_ms/h2/w2/v14</property>
      <property value="-17.9725">fsim/tables/ps_idle_ms/h2/w2/v15</property>
      <property value="-5.63326">fsim/tables/ps_idle_ms/h2/w2/v2</property>
      <property value="-5.85591">fsim/tables/ps_idle_ms/h2/w2/v3</property>
      <property value="-6.21815">fsim/tables/ps_idle_ms/h2/w2/v4</property>
      <property value="-6.91605">fsim/tables/ps_idle_ms/h2/w2/v5</property>
      <property value="-7.51906">fsim/tables/ps_idle_ms/h2/w2/v6</property>
      <property value="-8.13697">fsim/tables/ps_idle_ms/h2/w2/v7</property>
      <property value="-9.20056">fsim/tables/ps_idle_ms/h2/w2/v8</property>
      <property value="-10.2578">fsim/tables/ps_idle_ms/h2/w2/v9</property>
      <property value="-5.08471">fsim/tables/ps_idle_ms/h3/w0/v0</property>
      <property value="-5.07971">fsim/tables/ps_idle_ms/h3/w0/v1</property>
      <property value="-12.0919">fsim/tables/ps_idle_ms/h3/w0/v10</property>
      <property value="-13.3033">fsim/tables/ps_idle_ms/h3/w0/v11</property>
      <property value="-15.1402">fsim/tables/ps_idle_ms/h3/w0/v12</property>
      <property value="-17.0574">fsim/tables/ps_idle_ms/h3/w0/v13</property>
      <property value="-18.9359">fsim/tables/ps_idle_ms/h3/w0/v14</property>
      <property value="-20.0155">fsim/tables/ps_idle_ms/h3/w0/v15</property>
      <property value="-5.33219">fsim/tables/ps_idle_ms/h3/w0/v2</property>
      <property value="-5.7723">fsim/tables/ps_idle_ms/h3/w0/v3</property>
      <property value="-6.07704">fsim/tables/ps_idle_ms/h3/w0/v4</property>
      <property value="-6.89541">fsim/tables/ps_idle_ms/h3/w0/v5</property>
      <property value="-7.76352">fsim/tables/ps_idle_ms/h3/w0/v6</property>
      <property value="-8.47393">fsim/tables/ps_idle_ms/h3/w0/v7</property>
      <property value="-9.57617">fsim/tables/ps_idle_ms/h3/w0/v8</property>
      <property value="-10.8649">fsim/tables/ps_idle_ms/h3/w0/v9</property>
      <property value="-5.52026">fsim/tables/ps_idle_ms/h3/w1/v0</property>
      <property value="-5.43303">fsim/tables/ps_idle_ms/h3/w1/v1</property>
      <property value="-10.6626">fsim/tables/ps_idle_ms/h3/w1/v10</property>
      <property value="-11.4825">fsim/tables/ps_idle_ms/h3/w1/v11</property>
      <property value="-12.8503">fsim/tables/ps_idle_ms/h3/w1/v12</property>
      <property value="-14.3458">fsim/tables/ps_idle_ms/h3/w1/v13</property>
      <property value="-15.7928">fsim/tables/ps_idle_ms/h3/w1/v14</property>
      <property value="-16.74">fsim/tables/ps_idle_ms/h3/w1/v15</property>
      <property value="-5.7018">fsim/tables/ps_idle_ms/h3/w1/v2</property>
      <property value="-5.89826">fsim/tables/ps_idle_ms/h3/w1/v3</property>
      <property value="-6.15911">fsim/tables/ps_idle_ms/h3/w1/v4</property>
      <property value="-6.76681">fsim/tables/ps_idle_ms/h3/w1/v5</property>
      <property value="-7.35324">fsim/tables/ps_idle_ms/h3/w1/v6</property>
      <property value="-7.84115">fsim/tables/ps_idle_ms/h3/w1/v7</property>
      <property value="-8.79659">fsim/tables/ps_idle_ms/h3/w1/v8</property>
      <property value="-9.75085">fsim/tables/ps_idle_ms/h3/w1/v9</property>
      <property value="-5.89891">fsim/tables/ps_idle_ms/h3/w2/v0</property>
      <property value="-5.94543">fsim/tables/ps_idle_ms/h3/w2/v1</property>
      <property value="-9.68298">fsim/tables/ps_idle_ms/h3/w2/v10</property>
      <property value="-10.3123">fsim/tables/ps_idle_ms/h3/w2/v11</property>
      <property value="-11.3359">fsim/tables/ps_idle_ms/h3/w2/v12</property>
      <property value="-12.3993">fsim/tables/ps_idle_ms/h3/w2/v13</property>
      <property value="-13.4633">fsim/tables/ps_idle_ms/h3/w2/v14</property>
      <property value="-14.3334">fsim/tables/ps_idle_ms/h3/w2/v15</property>
      <property value="-6.04268">fsim/tables/ps_idle_ms/h3/w2/v2</property>
      <property value="-6.06947">fsim/tables/ps_idle_ms/h3/w2/v3</property>
      <property value="-6.39391">fsim/tables/ps_idle_ms/h3/w2/v4</property>
      <property value="-6.77047">fsim/tables/ps_idle_ms/h3/w2/v5</property>
      <property value="-7.1329">fsim/tables/ps_idle_ms/h3/w2/v6</property>
      <property value="-7.54679">fsim/tables/ps_idle_ms/h3/w2/v7</property>
      <property value="-8.26986">fsim/tables/ps_idle_ms/h3/w2/v8</property>
      <property value="-9.01801">fsim/tables/ps_idle_ms/h3/w2/v9</property>
      <property value="-5.33081">fsim/tables/ps_idle_ms/h4/w0/v0</property>
      <property value="-5.19346">fsim/tables/ps_idle_ms/h4/w0/v1</property>
      <property value="-11.2222">fsim/tables/ps_idle_ms/h4/w0/v10</property>
      <property value="-12.2017">fsim/tables/ps_idle_ms/h4/w0/v11</property>
      <property value="-13.7286">fsim/tables/ps_idle_ms/h4/w0/v12</property>
      <property value="-15.4322">fsim/tables/ps_idle_ms/h4/w0/v13</property>
      <property value="-17.0778">fsim/tables/ps_idle_ms/h4/w0/v14</property>
      <property value="-18.0821">fsim/tables/ps_idle_ms/h4/w0/v15</property>
      <property value="-5.49339">fsim/tables/ps_idle_ms/h4/w0/v2</property>
      <property value="-5.82831">fsim/tables/ps_idle_ms/h4/w0/v3</property>
      <property value="-6.04546">fsim/tables/ps_idle_ms/h4/w0/v4</property>
      <property value="-6.75488">fsim/tables/ps_idle_ms/h4/w0/v5</property>
      <property value="-7.46258">fsim/tables/ps_idle_ms/h4/w0/v6</property>
      <property value="-8.10586">fsim/tables/ps_idle_ms/h4/w0/v7</property>
      <property value="-9.01275">fsim/tables/ps_idle_ms/h4/w0/v8</property>
      <property value="-10.1714">fsim/tables/ps_idle_ms/h4/w0/v9</property>
      <property value="-5.72536">fsim/tables/ps_idle_ms/h4/w1/v0</property>
      <property value="-5.69899">fsim/tables/ps_idle_ms/h4/w1/v1</property>
      <property value="-9.94593">fsim/tables/ps_idle_ms/h4/w1/v10</property>
      <property value="-10.668">fsim/tables/ps_idle_ms/h4/w1/v11</property>
      <property value="-11.6938">fsim/tables/ps_idle_ms/h4/w1/v12</property>
      <property value="-12.8826">fsim/tables/ps_idle_ms/h4/w1/v13</property>
      <property value="-14.1595">fsim/tables/ps_idle_ms/h4/w1/v14</property>
      <property value="-15.0928">fsim/tables/ps_idle_ms/h4/w1/v15</property>
      <property value="-5.87674">fsim/tables/ps_idle_ms/h4/w1/v2</property>
      <property value="-5.98288">fsim/tables/ps_idle_ms/h4/w1/v3</property>
      <property value="-6.23309">fsim/tables/ps_idle_ms/h4/w1/v4</property>
      <property value="-6.71053">fsim/tables/ps_idle_ms/h4/w1/v5</property>
      <property value="-7.1644">fsim/tables/ps_idle_ms/h4/w1/v6</property>
      <property value="-7.56701">fsim/tables/ps_idle_ms/h4/w1/v7</property>
      <property value="-8.35828">fsim/tables/ps_idle_ms/h4/w1/v8</property>
      <property value="-9.18626">fsim/tables/ps_idle_ms/h4/w1/v9</property>
      <property value="-6.21285">fsim/tables/ps_idle_ms/h4/w2/v0</property>
      <property value="-6.20733">fsim/tables/ps_idle_ms/h4/w2/v1</property>
      <property value="-9.13772">fsim/tables/ps_idle_ms/h4/w2/v10</property>
      <property value="-9.65757">fsim/tables/ps_idle_ms/h4/w2/v11</property>
      <property value="-10.3556">fsim/tables/ps_idle_ms/h4/w2/v12</property>
      <property value="-11.2886">fsim/tables/ps_idle_ms/h4/w2/v13</property>
      <property value="-12.196">fsim/tables/ps_idle_ms/h4/w2/v14</property>
      <property value="-12.8844">fsim/tables/ps_idle_ms/h4/w2/v15</property>
      <property value="-6.22509">fsim/tables/ps_idle_ms/h4/w2/v2</property>
      <property value="-6.23113">fsim/tables/ps_idle_ms/h4/w2/v3</property>
      <property value="-6.52141">fsim/tables/ps_idle_ms/h4/w2/v4</property>
      <property value="-6.79716">fsim/tables/ps_idle_ms/h4/w2/v5</property>
      <property value="-7.05425">fsim/tables/ps_idle_ms/h4/w2/v6</property>
      <property value="-7.34658">fsim/tables/ps_idle_ms/h4/w2/v7</property>
      <property value="-7.97795">fsim/tables/ps_idle_ms/h4/w2/v8</property>
      <property value="-8.55224">fsim/tables/ps_idle_ms/h4/w2/v9</property>
      <property value="-5.52727">fsim/tables/ps_idle_ms/h5/w0/v0</property>
      <property value="-5.33956">fsim/tables/ps_idle_ms/h5/w0/v1</property>
      <property value="-10.5726">fsim/tables/ps_idle_ms/h5/w0/v10</property>
      <property value="-11.4209">fsim/tables/ps_idle_ms/h5/w0/v11</property>
      <property value="-12.5901">fsim/tables/ps_idle_ms/h5/w0/v12</property>
      <property value="-14.1201">fsim/tables/ps_idle_ms/h5/w0/v13</property>
      <property value="-15.6117">fsim/tables/ps_idle_ms/h5/w0/v14</property>
      <property value="-16.6142">fsim/tables/ps_idle_ms/h5/w0/v15</property>
      <property value="-5.6308">fsim/tables/ps_idle_ms/h5/w0/v2</property>
      <property value="-5.88056">fsim/tables/ps_idle_ms/h5/w0/v3</property>
      <property value="-6.04887">fsim/tables/ps_idle_ms/h5/w0/v4</property>
      <property value="-6.65226">fsim/tables/ps_idle_ms/h5/w0/v5</property>
      <property value="-7.28456">fsim/tables/ps_idle_ms/h5/w0/v6</property>
      <property value="-7.81017">fsim/tables/ps_idle_ms/h5/w0/v7</property>
      <property value="-8.61489">fsim/tables/ps_idle_ms/h5/w0/v8</property>
      <property value="-9.61088">fsim/tables/ps_idle_ms/h5/w0/v9</property>
      <property value="-5.92544">fsim/tables/ps_idle_ms/h5/w1/v0</property>
      <property value="-5.9475">fsim/tables/ps_idle_ms/h5/w1/v1</property>
      <property value="-9.44571">fsim/tables/ps_idle_ms/h5/w1/v10</property>
      <property value="-10.0522">fsim/tables/ps_idle_ms/h5/w1/v11</property>
      <property value="-10.8604">fsim/tables/ps_idle_ms/h5/w1/v12</property>
      <property value="-11.9099">fsim/tables/ps_idle_ms/h5/w1/v13</property>
      <property value="-12.9305">fsim/tables/ps_idle_ms/h5/w1/v14</property>
      <property value="-13.7918">fsim/tables/ps_idle_ms/h5/w1/v15</property>
      <property value="-6.03816">fsim/tables/ps_idle_ms/h5/w1/v2</property>
      <property value="-6.07935">fsim/tables/ps_idle_ms/h5/w1/v3</property>
      <property value="-6.3339">fsim/tables/ps_idle_ms/h5/w1/v4</property>
      <property value="-6.69791">fsim/tables/ps_idle_ms/h5/w1/v5</property>
      <property value="-7.06051">fsim/tables/ps_idle_ms/h5/w1/v6</property>
      <property value="-7.39672">fsim/tables/ps_idle_ms/h5/w1/v7</property>
      <property value="-8.05256">fsim/tables/ps_idle_ms/h5/w1/v8</property>
      <property value="-8.77197">fsim/tables/ps_idle_ms/h5/w1/v9</property>
      <property value="-6.51121">fsim/tables/ps_idle_ms/h5/w2/v0</property>
      <property value="-6.43871">fsim/tables/ps_idle_ms/h5/w2/v1</property>
      <property value="-8.65189">fsim/tables/ps_idle_ms/h5/w2/v10</property>
      <property value="-9.10782">fsim/tables/ps_idle_ms/h5/w2/v11</property>
      <property value="-9.55615">fsim/tables/ps_idle_ms/h5/w2/v12</property>
      <property value="-10.263">fsim/tables/ps_idle_ms/h5/w2/v13</property>
      <property value="-11.0278">fsim/tables/ps_idle_ms/h5/w2/v14</property>
      <property value="-11.6707">fsim/tables/ps_idle_ms/h5/w2/v15</property>
      <property value="-6.39639">fsim/tables/ps_idle_ms/h5/w2/v2</property>
      <property value="-6.43035">fsim/tables/ps_idle_ms/h5/w2/v3</property>
      <property value="-6.65717">fsim/tables/ps_idle_ms/h5/w2/v4</property>
      <property value="-6.84741">fsim/tables/ps_idle_ms/h5/w2/v5</property>
      <property value="-7.01972">fsim/tables/ps_idle_ms/h5/w2/v6</property>
      <property value="-7.21949">fsim/tables/ps_idle_ms/h5/w2/v7</property>
      <property value="-7.69311">fsim/tables/ps_idle_ms/h5/w2/v8</property>
      <property value="-8.19519">fsim/tables/ps_idle_ms/h5/w2/v9</property>
      <property value="-5.80279">fsim/tables/ps_idle_ms/h6/w0/v0</property>
      <property value="-5.7151">fsim/tables/ps_idle_ms/h6/w0/v1</property>
      <property value="-9.67363">fsim/tables/ps_idle_ms/h6/w0/v10</property>
      <property value="-10.4221">fsim/tables/ps_idle_ms/h6/w0/v11</property>
      <property value="-11.1946">fsim/tables/ps_idle_ms/h6/w0/v12</property>
      <property value="-12.3473">fsim/tables/ps_idle_ms/h6/w0/v13</property>
      <property value="-13.5736">fsim/tables/ps_idle_ms/h6/w0/v14</property>
      <property value="-14.5336">fsim/tables/ps_idle_ms/h6/w0/v15</property>
      <property value="-5.85832">fsim/tables/ps_idle_ms/h6/w0/v2</property>
      <property value="-5.99451">fsim/tables/ps_idle_ms/h6/w0/v3</property>
      <property value="-6.16009">fsim/tables/ps_idle_ms/h6/w0/v4</property>
      <property value="-6.62701">fsim/tables/ps_idle_ms/h6/w0/v5</property>
      <property value="-7.05027">fsim/tables/ps_idle_ms/h6/w0/v6</property>
      <property value="-7.47313">fsim/tables/ps_idle_ms/h6/w0/v7</property>
      <property value="-8.07136">fsim/tables/ps_idle_ms/h6/w0/v8</property>
      <property value="-8.91078">fsim/tables/ps_idle_ms/h6/w0/v9</property>
      <property value="-6.3407">fsim/tables/ps_idle_ms/h6/w1/v0</property>
      <property value="-6.31544">fsim/tables/ps_idle_ms/h6/w1/v1</property>
      <property value="-8.72809">fsim/tables/ps_idle_ms/h6/w1/v10</property>
      <property value="-9.26015">fsim/tables/ps_idle_ms/h6/w1/v11</property>
      <property value="-9.72129">fsim/tables/ps_idle_ms/h6/w1/v12</property>
      <property value="-10.4631">fsim/tables/ps_idle_ms/h6/w1/v13</property>
      <property value="-11.3132">fsim/tables/ps_idle_ms/h6/w1/v14</property>
      <property value="-12.0057">fsim/tables/ps_idle_ms/h6/w1/v15</property>
      <property value="-6.301">fsim/tables/ps_idle_ms/h6/w1/v2</property>
      <property value="-6.28156">fsim/tables/ps_idle_ms/h6/w1/v3</property>
      <property value="-6.52553">fsim/tables/ps_idle_ms/h6/w1/v4</property>
      <property value="-6.77477">fsim/tables/ps_idle_ms/h6/w1/v5</property>
      <property value="-6.98644">fsim/tables/ps_idle_ms/h6/w1/v6</property>
      <property value="-7.20228">fsim/tables/ps_idle_ms/h6/w1/v7</property>
      <property value="-7.66631">fsim/tables/ps_idle_ms/h6/w1/v8</property>
      <property value="-8.21971">fsim/tables/ps_idle_ms/h6/w1/v9</property>
      <property value="-6.91502">fsim/tables/ps_idle_ms/h6/w2/v0</property>
      <property value="-6.79296">fsim/tables/ps_idle_ms/h6/w2/v1</property>
      <property value="-8.1021">fsim/tables/ps_idle_ms/h6/w2/v10</property>
      <property value="-8.43625">fsim/tables/ps_idle_ms/h6/w2/v11</property>
      <property value="-8.7547">fsim/tables/ps_idle_ms/h6/w2/v12</property>
      <property value="-9.02699">fsim/tables/ps_idle_ms/h6/w2/v13</property>
      <property value="-9.53217">fsim/tables/ps_idle_ms/h6/w2/v14</property>
      <property value="-10.0243">fsim/tables/ps_idle_ms/h6/w2/v15</property>
      <property value="-6.6768">fsim/tables/ps_idle_ms/h6/w2/v2</property>
      <property value="-6.7595">fsim/tables/ps_idle_ms/h6/w2/v3</property>
      <property value="-6.89518">fsim/tables/ps_idle_ms/h6/w2/v4</property>
      <property value="-7.00606">fsim/tables/ps_idle_ms/h6/w2/v5</property>
      <property value="-7.09218">fsim/tables/ps_idle_ms/h6/w2/v6</property>
      <property value="-7.18581">fsim/tables/ps_idle_ms/h6/w2/v7</property>
      <property value="-7.42426">fsim/tables/ps_idle_ms/h6/w2/v8</property>
      <property value="-7.76902">fsim/tables/ps_idle_ms/h6/w2/v9</property>
      <property value="-6.08917">fsim/tables/ps_idle_ms/h7/w0/v0</property>
      <property value="-6.12173">fsim/tables/ps_idle_ms/h7/w0/v1</property>
      <property value="-8.98328">fsim/tables/ps_idle_ms/h7/w0/v10</property>
      <property value="-9.57799">fsim/tables/ps_idle_ms/h7/w0/v11</property>
      <property value="-10.105">fsim/tables/ps_idle_ms/h7/w0/v12</property>
      <property value="-10.9692">fsim/tables/ps_idle_ms/h7/w0/v13</property>
      <property value="-11.9223">fsim/tables/ps_idle_ms/h7/w0/v14</property>
      <property value="-12.6849">fsim/tables/ps_idle_ms/h7/w0/v15</property>
      <property value="-6.09591">fsim/tables/ps_idle_ms/h7/w0/v2</property>
      <property value="-6.14278">fsim/tables/ps_idle_ms/h7/w0/v3</property>
      <property value="-6.32722">fsim/tables/ps_idle_ms/h7/w0/v4</property>
      <property value="-6.67805">fsim/tables/ps_idle_ms/h7/w0/v5</property>
      <property value="-6.983">fsim/tables/ps_idle_ms/h7/w0/v6</property>
      <property value="-7.22574">fsim/tables/ps_idle_ms/h7/w0/v7</property>
      <property value="-7.70008">fsim/tables/ps_idle_ms/h7/w0/v8</property>
      <property value="-8.32821">fsim/tables/ps_idle_ms/h7/w0/v9</property>
      <property value="-6.79827">fsim/tables/ps_idle_ms/h7/w1/v0</property>
      <property value="-6.67139">fsim/tables/ps_idle_ms/h7/w1/v1</property>
      <property value="-8.13888">fsim/tables/ps_idle_ms/h7/w1/v10</property>
      <property value="-8.52157">fsim/tables/ps_idle_ms/h7/w1/v11</property>
      <property value="-8.86268">fsim/tables/ps_idle_ms/h7/w1/v12</property>
      <property value="-9.20377">fsim/tables/ps_idle_ms/h7/w1/v13</property>
      <property value="-9.75501">fsim/tables/ps_idle_ms/h7/w1/v14</property>
      <property value="-10.2909">fsim/tables/ps_idle_ms/h7/w1/v15</property>
      <property value="-6.56856">fsim/tables/ps_idle_ms/h7/w1/v2</property>
      <property value="-6.58825">fsim/tables/ps_idle_ms/h7/w1/v3</property>
      <property value="-6.75826">fsim/tables/ps_idle_ms/h7/w1/v4</property>
      <property value="-6.90797">fsim/tables/ps_idle_ms/h7/w1/v5</property>
      <property value="-7.03634">fsim/tables/ps_idle_ms/h7/w1/v6</property>
      <property value="-7.15478">fsim/tables/ps_idle_ms/h7/w1/v7</property>
      <property value="-7.37959">fsim/tables/ps_idle_ms/h7/w1/v8</property>
      <property value="-7.75719">fsim/tables/ps_idle_ms/h7/w1/v9</property>
      <property value="-7.29234">fsim/tables/ps_idle_ms/h7/w2/v0</property>
      <property value="-7.15044">fsim/tables/ps_idle_ms/h7/w2/v1</property>
      <property value="-7.71507">fsim/tables/ps_idle_ms/h7/w2/v10</property>
      <property value="-7.88902">fsim/tables/ps_idle_ms/h7/w2/v11</property>
      <property value="-8.09435">fsim/tables/ps_idle_ms/h7/w2/v12</property>
      <property value="-8.29911">fsim/tables/ps_idle_ms/h7/w2/v13</property>
      <property value="-8.48428">fsim/tables/ps_idle_ms/h7/w2/v14</property>
      <property value="-8.61422">fsim/tables/ps_idle_ms/h7/w2/v15</property>
      <property value="-7.09604">fsim/tables/ps_idle_ms/h7/w2/v2</property>
      <property value="-7.13758">fsim/tables/ps_idle_ms/h7/w2/v3</property>
      <property value="-7.19373">fsim/tables/ps_idle_ms/h7/w2/v4</property>
      <property value="-7.23616">fsim/tables/ps_idle_ms/h7/w2/v5</property>
      <property value="-7.2757">fsim/tables/ps_idle_ms/h7/w2/v6</property>
      <property value="-7.30673">fsim/tables/ps_idle_ms/h7/w2/v7</property>
      <property value="-7.3488">fsim/tables/ps_idle_ms/h7/w2/v8</property>
      <property value="-7.52111">fsim/tables/ps_idle_ms/h7/w2/v9</property>
      <property value="176.411">fsim/tables/reach_tas_ms/h0/w0</property>
      <property value="175.832">fsim/tables/reach_tas_ms/h0/w1</property>
      <property value="174.529">fsim/tables/reach_tas_ms/h0/w2</property>
      <property value="186.893">fsim/tables/reach_tas_ms/h1/w0</property>
      <property value="185.294">fsim/tables/reach_tas_ms/h1/w1</property>
      <property value="184.383">fsim/tables/reach_tas_ms/h1/w2</property>
      <property value="198.661">fsim/tables/reach_tas_ms/h2/w0</property>
      <property value="198.07">fsim/tables/reach_tas_ms/h2/w1</property>
      <property value="196.616">fsim/tables/reach_tas_ms/h2/w2</property>
      <property value="194.523">fsim/tables/reach_tas_ms/h3/w0</property>
      <property value="193.033">fsim/tables/reach_tas_ms/h3/w1</property>
      <property value="190.471">fsim/tables/reach_tas_ms/h3/w2</property>
      <property value="192.144">fsim/tables/reach_tas_ms/h4/w0</property>
      <property value="189.748">fsim/tables/reach_tas_ms/h4/w1</property>
      <property value="186.55">fsim/tables/reach_tas_ms/h4/w2</property>
      <property value="189.828">fsim/tables/reach_tas_ms/h5/w0</property>
      <property value="186.93">fsim/tables/reach_tas_ms/h5/w1</property>
      <property value="181.73">fsim/tables/reach_tas_ms/h5/w2</property>
      <property value="185.875">fsim/tables/reach_tas_ms/h6/w0</property>
      <property value="181.427">fsim/tables/reach_tas_ms/h6/w1</property>
      <property value="173.797">fsim/tables/reach_tas_ms/h6/w2</property>
      <property value="181.724">fsim/tables/reach_tas_ms/h7/w0</property>
      <property value="174.017">fsim/tables/reach_tas_ms/h7/w1</property>
      <property value="163.396">fsim/tables/reach_tas_ms/h7/w2</property>
      <property value="0.0">fsim/tables/speed_fraction/v0</property>
      <property value="0.0666667">fsim/tables/speed_fraction/v1</property>
      <property value="0.666667">fsim/tables/speed_fraction/v10</property>
      <property value="0.733333">fsim/tables/speed_fraction/v11</property>
      <property value="0.8">fsim/tables/speed_fraction/v12</property>
      <property value="0.866667">fsim/tables/speed_fraction/v13</property>
      <property value="0.933333">fsim/tables/speed_fraction/v14</property>
      <property value="1">fsim/tables/speed_fraction/v15</property>
      <property value="0.133333">fsim/tables/speed_fraction/v2</property>
      <property value="0.2">fsim/tables/speed_fraction/v3</property>
      <property value="0.266667">fsim/tables/speed_fraction/v4</property>
      <property value="0.333333">fsim/tables/speed_fraction/v5</property>
      <property value="0.4">fsim/tables/speed_fraction/v6</property>
      <property value="0.466667">fsim/tables/speed_fraction/v7</property>
      <property value="0.533333">fsim/tables/speed_fraction/v8</property>
      <property value="0.6">fsim/tables/speed_fraction/v9</property>
      <property value="44.7352">fsim/tables/stall_cas_ms/h0/w0</property>
      <property value="49.511">fsim/tables/stall_cas_ms/h0/w1</property>
      <property value="53.8651">fsim/tables/stall_cas_ms/h0/w2</property>
      <property value="44.5658">fsim/tables/stall_cas_ms/h1/w0</property>
      <property value="49.3235">fsim/tables/stall_cas_ms/h1/w1</property>
      <property value="53.6611">fsim/tables/stall_cas_ms/h1/w2</property>
      <property value="44.3363">fsim/tables/stall_cas_ms/h2/w0</property>
      <property value="49.0696">fsim/tables/stall_cas_ms/h2/w1</property>
      <property value="53.3848">fsim/tables/stall_cas_ms/h2/w2</property>
      <property value="44.2326">fsim/tables/stall_cas_ms/h3/w0</property>
      <property value="48.9548">fsim/tables/stall_cas_ms/h3/w1</property>
      <property value="53.2599">fsim/tables/stall_cas_ms/h3/w2</property>
      <property value="44.2514">fsim/tables/stall_cas_ms/h4/w0</property>
      <property value="48.9756">fsim/tables/stall_cas_ms/h4/w1</property>
      <property value="53.2825">fsim/tables/stall_cas_ms/h4/w2</property>
      <property value="44.2928">fsim/tables/stall_cas_ms/h5/w0</property>
      <property value="49.0215">fsim/tables/stall_cas_ms/h5/w1</property>
      <property value="53.3325">fsim/tables/stall_cas_ms/h5/w2</property>
      <property value="44.3877">fsim/tables/stall_cas_ms/h6/w0</property>
      <property value="49.1265">fsim/tables/stall_cas_ms/h6/w1</property>
      <property value="53.4467">fsim/tables/stall_cas_ms/h6/w2</property>
      <property value="44.3608">fsim/tables/stall_cas_ms/h7/w0</property>
      <property value="49.0967">fsim/tables/stall_cas_ms/h7/w1</property>
      <property value="53.4143">fsim/tables/stall_cas_ms/h7/w2</property>
      <property value="41656">fsim/tables/weight_kg/w0</property>
      <property value="51025">fsim/tables/weight_kg/w1</property>
      <property value="60394">fsim/tables/weight_kg/w2</property>
      <channel name="Pitch">
        <summer name="fcs/pitch-trim-sum">
          <input>fcs/elevator-cmd-norm</input>
          <input>fcs/pitch-trim-cmd-norm</input>
          <clipto> <min>-1</min> <max>1</max> </clipto>
        </summer>
        <aerosurface_scale name="fcs/elevator-control">
          <input>fcs/pitch-trim-sum</input>
          <range> <min>-25.00</min> <max>15.00</max> </range>
          <gain>0.0174533</gain>
        </aerosurface_scale>
        <actuator name="fcs/elevator-actuator">
          <input>fcs/elevator-control</input>
          <rate_limit>2.0</rate_limit>
          <output>fcs/elevator-pos-rad</output>
        </actuator>
      </channel>
      <channel name="Roll">
        <summer name="fcs/roll-trim-sum">
          <input>fcs/aileron-cmd-norm</input>
          <input>fcs/roll-trim-cmd-norm</input>
          <clipto> <min>-1</min> <max>1</max> </clipto>
        </summer>
        <aerosurface_scale name="fcs/left-aileron-control">
          <input>fcs/roll-trim-sum</input>
          <range> <min>-20.00</min> <max>20.00</max> </range>
          <gain>0.0174533</gain>
        </aerosurface_scale>
        <actuator name="fcs/left-aileron-actuator">
          <input>fcs/left-aileron-control</input>
          <rate_limit>2.0</rate_limit>
          <output>fcs/left-aileron-pos-rad</output>
        </actuator>
        <pure_gain name="fcs/right-aileron">
          <input>fcs/left-aileron-pos-rad</input>
          <gain>-1</gain>
          <output>fcs/right-aileron-pos-rad</output>
        </pure_gain>
      </channel>
      <channel name="Yaw">
        <summer name="fcs/yaw-trim-sum">
          <input>fcs/rudder-cmd-norm</input>
          <input>fcs/yaw-trim-cmd-norm</input>
          <clipto> <min>-1</min> <max>1</max> </clipto>
        </summer>
        <aerosurface_scale name="fcs/rudder-control">
          <input>fcs/yaw-trim-sum</input>
          <range> <min>-35.00</min> <max>35.00</max> </range>
          <gain>0.0174533</gain>
        </aerosurface_scale>
        <actuator name="fcs/rudder-actuator">
          <input>fcs/rudder-control</input>
          <rate_limit>2.0</rate_limit>
          <output>fcs/rudder-pos-rad</output>
        </actuator>
        <!-- the nose or tail wheel steers with the rudder pedals (JSBSim steers from
             fcs/steer-cmd-norm, positive right; the rudder command is positive left) -->
        <pure_gain name="fcs/steer-from-rudder">
          <input>fcs/yaw-trim-sum</input>
          <gain>-1</gain>
          <output>fcs/steer-cmd-norm</output>
        </pure_gain>
      </channel>
      <channel name="Flaps">
        <kinematic name="fcs/flaps-control">
          <input>fcs/flap-cmd-norm</input>
          <traverse>
            <setting> <position>0.0</position> <time>0.0</time> </setting>
            <setting> <position>8.8</position> <time>2.0</time> </setting>
            <setting> <position>17.5</position> <time>2.0</time> </setting>
            <setting> <position>26.2</position> <time>2.0</time> </setting>
            <setting> <position>35.0</position> <time>2.0</time> </setting>
          </traverse>
          <output>fcs/flap-pos-deg</output>
        </kinematic>
        <pure_gain name="fcs/flaps-normalized">
          <input>fcs/flap-pos-deg</input>
          <gain>0.0285714</gain>
          <output>fcs/flap-pos-norm</output>
        </pure_gain>
      </channel>
      <channel name="Propeller Governor 0">
        <!-- AE 2100D3 inboard L: the propeller governed at 1020 rpm. The ground range: with weight
             on the wheels and time running, a throttle below 0.2 sets the blades, from
             ground idle's -5.15 deg (no thrust standing still) to the low stop, 15.0,
             and N1 holds the propeller's speed - not below 51.0 %, nor above 54.6 % at
             ground idle rising to the flight range's where it takes over, 62.0 %; past
             1030 rpm the blades open further -->
        <fcs_function name="fcs/propeller-ground-range-0">
          <function>
            <and>
              <gt> <property>simulation/dt</property> <value>0</value> </gt>
              <gt> <property>gear/wow</property> <value>0</value> </gt>
              <lt> <property>fcs/throttle-cmd-norm[0]</property> <value>0.2</value> </lt>
            </and>
          </function>
        </fcs_function>
        <fcs_function name="fcs/propeller-beta-blade-0">
          <function>
            <sum>
              <value>-5.1500</value>
              <product>
                <value>100.75</value>
                <max> <value>0</value> <property>fcs/throttle-cmd-norm[0]</property> </max>
              </product>
            </sum>
          </function>
          <clipto> <min>-5.1500</min> <max>15.0000</max> </clipto>
        </fcs_function>
        <!-- the fuel control: the N1 that holds the governed speed standing still with the
             blades there (sea level), less 0.0501 % for each rpm the propeller runs fast -->
        <fcs_function name="fcs/propeller-beta-n1-0">
          <function>
            <min>
              <sum>
                <value>54.5878</value>
                <product>
                  <value>37.2362</value>
                  <max> <value>0</value> <property>fcs/throttle-cmd-norm[0]</property> </max>
                </product>
              </sum>
              <max>
                <value>51.0000</value>
                <sum>
                  <table>
                    <independentVar>fcs/propeller-beta-blade-0</independentVar>
                    <tableData>
                         -5.15   52.5438
                          0.00   54.9396
                          5.00   59.0637
                         10.00   65.2608
                         15.00   72.7477
                         20.00   80.4850
                    </tableData>
                  </table>
                  <product>
                    <value>0.0500983</value>
                    <difference> <value>1020.0000</value> <property>propulsion/engine[0]/propeller-rpm</property> </difference>
                  </product>
                </sum>
              </max>
            </min>
          </function>
        </fcs_function>
        <!-- JSBSim's turboprop drops its N1 to idle as time runs again after standing still (a
             reset, a trim; its power reads 0 then): in that step the throttle puts N1 back where
             it was, or in the ground range where the fuel control wants it -->
        <fcs_function name="fcs/propeller-throttle-0">
          <function>
            <ifthen>
              <gt> <property>fcs/propeller-ground-range-0</property> <value>0</value> </gt>
              <quotient>
                <difference>
                  <ifthen>
                    <lt> <property>propulsion/engine[0]/power-hp</property> <value>0.5</value> </lt>
                    <ifthen>
                      <gt> <property>fcs/propeller-beta-n1-0</property> <value>52.5438</value> </gt>
                      <sum>
                        <value>52.5438</value>
                        <quotient>
                          <difference> <property>fcs/propeller-beta-n1-0</property> <value>52.5438</value> </difference>
                          <difference>
                            <value>1</value>
                            <exp> <quotient> <property>simulation/dt</property> <value>-1.0000</value> </quotient> </exp>
                          </difference>
                        </quotient>
                      </sum>
                      <quotient>
                        <difference>
                          <property>fcs/propeller-beta-n1-0</property>
                          <product>
                            <value>52.5438</value>
                            <exp> <quotient> <property>simulation/dt</property> <value>-2.4000</value> </quotient> </exp>
                          </product>
                        </difference>
                        <difference>
                          <value>1</value>
                          <exp> <quotient> <property>simulation/dt</property> <value>-2.4000</value> </quotient> </exp>
                        </difference>
                      </quotient>
                    </ifthen>
                    <property>fcs/propeller-beta-n1-0</property>
                  </ifthen>
                  <value>52.5438</value>
                </difference>
                <value>47.4562</value>
              </quotient>
              <ifthen>
                <and>
                  <gt> <property>simulation/dt</property> <value>0</value> </gt>
                  <lt> <property>propulsion/engine[0]/power-hp</property> <value>0.5</value> </lt>
                </and>
                <quotient>
                  <difference> <property>propulsion/engine[0]/n1</property> <value>52.5438</value> </difference>
                  <product>
                    <value>47.4562</value>
                    <difference>
                      <value>1</value>
                      <exp> <quotient> <property>simulation/dt</property> <value>-1.0000</value> </quotient> </exp>
                    </difference>
                  </product>
                </quotient>
                <property>fcs/throttle-cmd-norm[0]</property>
              </ifthen>
            </ifthen>
          </function>
          <output>fcs/throttle-pos-norm[0]</output>
        </fcs_function>
        <!-- the speed's rate of change: the power the engine gives the propeller less the
             power it takes, over its spin inertia (rpm/s); none read while the engine's
             power reads 0 (time stood still) -->
        <fcs_function name="fcs/propeller-rpm-rate-0">
          <function>
            <product>
              <ge> <property>propulsion/engine[0]/power-hp</property> <value>0.5</value> </ge>
              <quotient>
                <difference>
                  <product> <property>propulsion/engine[0]/power-hp</property> <value>550</value> </product>
                  <property>propulsion/engine[0]/propeller-power-ftlbps</property>
                </difference>
                <max>
                  <value>536.251</value>
                  <product> <value>5.25736</value> <property>propulsion/engine[0]/propeller-rpm</property> </product>
                </max>
              </quotient>
            </product>
          </function>
        </fcs_function>
        <fcs_function name="fcs/propeller-advance-0">
          <function>
            <quotient>
              <difference>
                <value>204.0</value>
                <product>
                  <gt> <property>simulation/dt</property> <value>0</value> </gt>
                  <value>0.1500</value>
                  <property>fcs/propeller-rpm-rate-0</property>
                </product>
              </difference>
              <value>306.0</value>
            </quotient>
          </function>
          <clipto> <min>0</min> <max>1</max> </clipto>
          <output>fcs/advance-cmd-norm[0]</output>
        </fcs_function>
        <!-- time standing still: the blades held where they take the engine's power; in the
             ground range: set -->
        <fcs_function name="fcs/propeller-governing-0">
          <function>
            <and>
              <gt> <property>simulation/dt</property> <value>0</value> </gt>
              <lt> <property>fcs/propeller-ground-range-0</property> <value>1</value> </lt>
            </and>
          </function>
          <output>propulsion/engine[0]/constant-speed-mode</output>
        </fcs_function>
        <fcs_function name="fcs/propeller-advance-ratio-0">
          <function>
            <max> <value>0</value> <quotient> <property>velocities/u-aero-fps</property> <value>229.5112</value> </quotient> </max>
          </function>
        </fcs_function>
        <!-- the engine's power coefficient at the governed speed: its core at the throttle's
             N1 (the full one at a start: JSBSim starts engines at full throttle), the lapse -->
        <fcs_function name="fcs/propeller-power-coefficient-0">
          <function>
            <quotient>
              <min>
                <value>4637.3</value>
                <product>
                  <value>5999.7</value>
                  <max>
                    <value>0</value>
                    <quotient>
                      <difference>
                        <pow>
                          <sum>
                            <value>0.5254</value>
                            <product>
                              <value>0.4746</value>
                              <ifthen>
                                <gt> <property>fcs/throttle-pos-norm[0]</property> <value>0.001</value> </gt>
                                <property>fcs/throttle-pos-norm[0]</property>
                                <value>1</value>
                              </ifthen>
                            </product>
                          </sum>
                          <value>3</value>
                        </pow>
                        <value>0.125000</value>
                      </difference>
                      <value>0.875000</value>
                    </quotient>
                  </max>
                  <product>
                    <quotient> <property>atmosphere/P-psf</property> <value>2116.228</value> </quotient>
                    <pow> <sum> <value>1</value> <product> <value>0.2</value> <property>velocities/mach</property> <property>velocities/mach</property> </product> </sum> <value>3.5</value> </pow>
                    <max>
                      <value>0</value>
                      <difference>
                        <value>1</value>
                        <product>
                          <max>
                            <value>0</value>
                            <difference>
                              <product> <quotient> <property>atmosphere/T-R</property> <value>518.67</value> </quotient> <sum> <value>1</value> <product> <value>0.2</value> <property>velocities/mach</property> <property>velocities/mach</property> </product> </sum> </product>
                              <value>1.0000</value>
                            </difference>
                          </max>
                          <table>
                            <independentVar lookup="row">velocities/mach</independentVar>
                            <tableData>
                                0.00    0.0000
                                0.10    0.0000
                                0.20    8.0192
                                0.30    5.1535
                                0.40    4.2484
                                0.50    3.9000
                                0.60    3.8290
                                0.70    3.9654
                                0.80    4.3246
                                0.90    5.0088
                            </tableData>
                          </table>
                        </product>
                      </difference>
                    </max>
                  </product>
                </product>
              </min>
              <product> <property>atmosphere/rho-slugs_ft3</property> <value>4.00644e+06</value> </product>
            </quotient>
          </function>
        </fcs_function>
        <fcs_function name="fcs/propeller-blade-angle-0">
          <function>
            <ifthen>
              <gt> <property>simulation/dt</property> <value>0</value> </gt>
              <ifthen>
                <gt> <property>fcs/propeller-ground-range-0</property> <value>0</value> </gt>
                <min>
                  <value>65.0000</value>
                  <sum>
                    <property>fcs/propeller-beta-blade-0</property>
                    <product>
                      <value>1.10814</value>
                      <max>
                        <value>0</value>
                        <difference> <property>propulsion/engine[0]/propeller-rpm</property> <value>1030.2000</value> </difference>
                      </max>
                    </product>
                  </sum>
                </min>
                <property>propulsion/engine[0]/blade-angle</property>
              </ifthen>
              <table>
                <independentVar lookup="row">fcs/propeller-advance-ratio-0</independentVar>
                <independentVar lookup="column">fcs/propeller-power-coefficient-0</independentVar>
                <tableData>
                    0.00    0.05    0.10    0.15    0.20    0.25    0.30    0.35    0.40    0.45    0.50    0.55    0.60    0.65    0.70    0.75    0.80    0.85    0.90    0.95    1.00    1.05    1.10    1.15    1.20
              0.00    15.00   15.00   15.00   15.00   15.61   18.17   20.66   22.97   25.33   28.11   34.89   57.14   65.00   65.00   65.00   65.00   65.00   65.00   65.00   65.00   65.00   65.00   65.00   65.00   65.00
              0.10    15.00   15.00   15.00   15.00   15.91   18.34   20.68   22.84   25.00   27.24   29.47   34.86   60.26   65.00   65.00   65.00   65.00   65.00   65.00   65.00   65.00   65.00   65.00   65.00   65.00
              0.20    15.00   15.00   15.00   15.00   16.33   18.74   20.93   22.89   24.85   26.87   28.89   31.61   55.67   63.33   65.00   65.00   65.00   65.00   65.00   65.00   65.00   65.00   65.00   65.00   65.00
              0.30    15.00   15.00   15.00   15.00   16.93   19.28   21.33   23.25   25.14   26.81   28.48   30.20   32.57   34.93   65.00   65.00   65.00   65.00   65.00   65.00   65.00   65.00   65.00   65.00   65.00
              0.40    15.00   15.00   15.00   15.37   17.70   20.02   21.88   23.73   25.51   27.10   28.70   30.31   31.97   33.63   39.96   65.00   65.00   65.00   65.00   65.00   65.00   65.00   65.00   65.00   65.00
              0.50    15.00   15.00   15.00   16.34   18.64   20.74   22.54   24.35   25.99   27.53   29.08   30.55   31.92   33.29   34.66   37.38   65.00   65.00   65.00   65.00   65.00   65.00   65.00   65.00   65.00
              0.60    15.00   15.00   15.25   17.52   19.79   21.61   23.38   25.12   26.60   28.08   29.56   30.93   32.24   33.56   34.87   36.19   37.50   38.82   65.00   65.00   65.00   65.00   65.00   65.00   65.00
              0.70    15.00   15.00   16.58   18.89   20.90   22.62   24.34   25.88   27.31   28.73   30.14   31.41   32.67   33.94   35.18   36.33   37.48   38.64   39.79   65.00   65.00   65.00   65.00   65.00   65.00
              0.80    15.00   15.98   18.20   20.33   22.04   23.76   25.38   26.76   28.14   29.53   30.79   32.00   33.20   34.40   35.55   36.65   37.75   38.85   39.95   41.05   42.15   43.25   44.36   65.00   65.00
              0.90    15.73   17.92   20.08   21.75   23.42   25.08   26.41   27.74   29.08   30.35   31.51   32.66   33.81   34.96   36.01   37.06   38.11   39.16   40.19   41.17   42.15   43.13   44.11   65.00   65.00
              1.00    17.97   20.09   21.68   23.27   24.86   26.19   27.50   28.81   30.10   31.20   32.30   33.40   34.50   35.55   36.55   37.55   38.55   39.55   40.50   41.43   42.35   43.27   44.20   45.69   65.00
              1.10    20.33   21.87   23.41   24.95   26.22   27.48   28.75   30.01   31.06   32.11   33.16   34.22   35.24   36.20   37.15   38.11   39.07   40.02   40.89   41.77   42.64   43.52   44.39   45.26   46.12
              1.20    22.30   23.79   25.23   26.44   27.66   28.87   30.08   31.09   32.10   33.12   34.13   35.13   36.03   36.94   37.84   38.75   39.65   40.51   41.34   42.17   43.00   43.83   44.66   45.46   46.25
              1.30    24.39   25.66   26.80   27.95   29.09   30.20   31.19   32.18   33.16   34.15   35.12   35.98   36.83   37.69   38.55   39.40   40.24   41.03   41.83   42.62   43.41   44.20   45.00   45.73   46.47
              1.40    26.24   27.34   28.44   29.53   30.54   31.49   32.43   33.38   34.32   35.23   36.05   36.86   37.68   38.49   39.31   40.11   40.87   41.62   42.37   43.13   43.88   44.63   45.36   46.06   46.75
              1.50    28.02   29.07   30.11   31.01   31.91   32.82   33.72   34.62   35.45   36.23   37.00   37.78   38.55   39.33   40.10   40.81   41.53   42.25   42.96   43.68   44.39   45.10   45.76   46.42   47.09
              1.60    29.84   30.73   31.59   32.45   33.31   34.17   35.03   35.77   36.51   37.24   37.98   38.72   39.46   40.18   40.86   41.54   42.22   42.90   43.58   44.26   44.95   45.58   46.20   46.83   47.46
              1.70    31.41   32.22   33.02   33.83   34.64   35.40   36.11   36.82   37.53   38.25   38.96   39.67   40.35   41.00   41.64   42.29   42.94   43.58   44.23   44.87   45.48   46.08   46.67   47.27   47.86
              1.80    32.95   33.72   34.49   35.23   35.92   36.60   37.29   37.97   38.66   39.34   40.03   40.64   41.25   41.85   42.46   43.07   43.68   44.29   44.90   45.47   46.04   46.60   47.17   47.74   48.30
              1.90    34.49   35.20   35.85   36.50   37.16   37.81   38.46   39.12   39.77   40.38   40.96   41.54   42.12   42.70   43.28   43.86   44.44   45.02   45.55   46.09   46.62   47.16   47.70   48.23   48.77
              2.00    35.90   36.52   37.15   37.77   38.39   39.01   39.63   40.23   40.78   41.33   41.88   42.43   42.99   43.54   44.09   44.64   45.18   45.69   46.20   46.70   47.21   47.72   48.23   48.74   49.25
              2.10    37.24   37.83   38.43   39.02   39.61   40.18   40.71   41.23   41.76   42.28   42.81   43.33   43.85   44.38   44.90   45.40   45.88   46.36   46.85   47.33   47.81   48.30   48.78   49.26   49.75
              2.20    38.56   39.12   39.69   40.22   40.72   41.22   41.72   42.22   42.72   43.22   43.72   44.22   44.72   45.20   45.66   46.12   46.58   47.04   47.50   47.96   48.42   48.88   49.34   49.80   50.24
              2.30    39.85   40.34   40.82   41.29   41.76   42.24   42.71   43.18   43.66   44.13   44.60   45.07   45.51   45.95   46.39   46.83   47.27   47.71   48.15   48.59   49.02   49.46   49.90   50.32   50.72
              2.40    40.92   41.38   41.84   42.30   42.75   43.21   43.67   44.12   44.58   45.03   45.45   45.87   46.29   46.71   47.13   47.55   47.96   48.38   48.80   49.22   49.64   50.05   50.44   50.82   51.21
              2.50    42.02   42.46   42.89   43.33   43.76   44.20   44.64   45.07   45.46   45.86   46.26   46.66   47.06   47.46   47.86   48.26   48.65   49.05   49.45   49.85   50.23   50.60   50.96   51.33   51.69
              2.60    43.09   43.51   43.92   44.34   44.75   45.15   45.54   45.92   46.30   46.68   47.06   47.44   47.82   48.20   48.58   48.96   49.34   49.72   50.09   50.44   50.79   51.14   51.49   51.83   52.18
              2.70    44.13   44.53   44.93   45.30   45.66   46.02   46.38   46.75   47.11   47.47   47.84   48.20   48.56   48.92   49.29   49.65   50.01   50.34   50.68   51.01   51.34   51.67   52.01   52.34   52.67
              2.80    45.13   45.48   45.83   46.17   46.52   46.87   47.21   47.56   47.91   48.25   48.60   48.95   49.29   49.64   49.99   50.30   50.62   50.94   51.25   51.57   51.89   52.21   52.52   52.84   53.16
              2.90    46.07   46.39   46.72   47.05   47.38   47.71   48.04   48.37   48.70   49.02   49.35   49.68   50.01   50.31   50.61   50.92   51.22   51.52   51.82   52.12   52.43   52.73   53.03   53.33   53.64
              3.00    46.94   47.25   47.56   47.88   48.19   48.51   48.82   49.14   49.45   49.76   50.07   50.36   50.65   50.94   51.23   51.51   51.80   52.09   52.38   52.67   52.96   53.25   53.53   53.82   54.11
              3.10    47.78   48.08   48.38   48.68   48.98   49.28   49.58   49.88   50.17   50.45   50.72   51.00   51.27   51.55   51.82   52.10   52.38   52.65   52.93   53.20   53.48   53.75   54.03   54.31   54.58
              3.20    48.60   48.89   49.18   49.46   49.75   50.04   50.30   50.56   50.83   51.09   51.35   51.62   51.88   52.14   52.41   52.67   52.94   53.20   53.46   53.73   53.99   54.25   54.52   54.78   55.04
              3.30    49.39   49.67   49.94   50.20   50.45   50.71   50.96   51.21   51.46   51.72   51.97   52.22   52.47   52.72   52.98   53.23   53.48   53.73   53.99   54.24   54.49   54.74   55.00   55.23   55.46
              3.40    50.15   50.39   50.63   50.88   51.12   51.36   51.60   51.84   52.08   52.33   52.57   52.81   53.05   53.29   53.53   53.78   54.02   54.26   54.50   54.74   54.98   55.21   55.43   55.65   55.88
              3.50    50.83   51.06   51.29   51.53   51.76   51.99   52.22   52.45   52.68   52.92   53.15   53.38   53.61   53.84   54.08   54.31   54.54   54.77   55.00   55.22   55.43   55.64   55.85   56.07   56.28
              3.60    51.50   51.72   51.94   52.16   52.38   52.61   52.83   53.05   53.27   53.49   53.72   53.94   54.16   54.38   54.60   54.83   55.04   55.25   55.45   55.66   55.86   56.07   56.27   56.48   56.68
              3.70    52.14   52.35   52.56   52.78   52.99   53.20   53.41   53.63   53.84   54.05   54.27   54.48   54.69   54.91   55.11   55.31   55.50   55.70   55.89   56.09   56.29   56.48   56.68   56.87   57.07
              3.80    52.76   52.96   53.17   53.37   53.58   53.78   53.99   54.19   54.39   54.60   54.80   55.01   55.20   55.38   55.57   55.76   55.95   56.14   56.32   56.51   56.70   56.89   57.08   57.26   57.45
              3.90    53.36   53.55   53.75   53.95   54.14   54.34   54.54   54.74   54.93   55.12   55.30   55.48   55.66   55.84   56.02   56.20   56.38   56.56   56.74   56.92   57.10   57.28   57.46   57.65   57.83
              4.00    53.94   54.13   54.32   54.51   54.70   54.89   55.07   55.24   55.42   55.59   55.76   55.94   56.11   56.28   56.46   56.63   56.80   56.98   57.15   57.33   57.50   57.67   57.85   58.02   58.19
                </tableData>
              </table>
            </ifthen>
          </function>
          <output>propulsion/engine[0]/blade-angle</output>
        </fcs_function>
      </channel>
      <channel name="Propeller Governor 1">
        <!-- AE 2100D3 inboard R: the propeller governed at 1020 rpm. The ground range: with weight
             on the wheels and time running, a throttle below 0.2 sets the blades, from
             ground idle's -5.15 deg (no thrust standing still) to the low stop, 15.0,
             and N1 holds the propeller's speed - not below 51.0 %, nor above 54.6 % at
             ground idle rising to the flight range's where it takes over, 62.0 %; past
             1030 rpm the blades open further -->
        <fcs_function name="fcs/propeller-ground-range-1">
          <function>
            <and>
              <gt> <property>simulation/dt</property> <value>0</value> </gt>
              <gt> <property>gear/wow</property> <value>0</value> </gt>
              <lt> <property>fcs/throttle-cmd-norm[1]</property> <value>0.2</value> </lt>
            </and>
          </function>
        </fcs_function>
        <fcs_function name="fcs/propeller-beta-blade-1">
          <function>
            <sum>
              <value>-5.1500</value>
              <product>
                <value>100.75</value>
                <max> <value>0</value> <property>fcs/throttle-cmd-norm[1]</property> </max>
              </product>
            </sum>
          </function>
          <clipto> <min>-5.1500</min> <max>15.0000</max> </clipto>
        </fcs_function>
        <!-- the fuel control: the N1 that holds the governed speed standing still with the
             blades there (sea level), less 0.0501 % for each rpm the propeller runs fast -->
        <fcs_function name="fcs/propeller-beta-n1-1">
          <function>
            <min>
              <sum>
                <value>54.5878</value>
                <product>
                  <value>37.2362</value>
                  <max> <value>0</value> <property>fcs/throttle-cmd-norm[1]</property> </max>
                </product>
              </sum>
              <max>
                <value>51.0000</value>
                <sum>
                  <table>
                    <independentVar>fcs/propeller-beta-blade-1</independentVar>
                    <tableData>
                         -5.15   52.5438
                          0.00   54.9396
                          5.00   59.0637
                         10.00   65.2608
                         15.00   72.7477
                         20.00   80.4850
                    </tableData>
                  </table>
                  <product>
                    <value>0.0500983</value>
                    <difference> <value>1020.0000</value> <property>propulsion/engine[1]/propeller-rpm</property> </difference>
                  </product>
                </sum>
              </max>
            </min>
          </function>
        </fcs_function>
        <!-- JSBSim's turboprop drops its N1 to idle as time runs again after standing still (a
             reset, a trim; its power reads 0 then): in that step the throttle puts N1 back where
             it was, or in the ground range where the fuel control wants it -->
        <fcs_function name="fcs/propeller-throttle-1">
          <function>
            <ifthen>
              <gt> <property>fcs/propeller-ground-range-1</property> <value>0</value> </gt>
              <quotient>
                <difference>
                  <ifthen>
                    <lt> <property>propulsion/engine[1]/power-hp</property> <value>0.5</value> </lt>
                    <ifthen>
                      <gt> <property>fcs/propeller-beta-n1-1</property> <value>52.5438</value> </gt>
                      <sum>
                        <value>52.5438</value>
                        <quotient>
                          <difference> <property>fcs/propeller-beta-n1-1</property> <value>52.5438</value> </difference>
                          <difference>
                            <value>1</value>
                            <exp> <quotient> <property>simulation/dt</property> <value>-1.0000</value> </quotient> </exp>
                          </difference>
                        </quotient>
                      </sum>
                      <quotient>
                        <difference>
                          <property>fcs/propeller-beta-n1-1</property>
                          <product>
                            <value>52.5438</value>
                            <exp> <quotient> <property>simulation/dt</property> <value>-2.4000</value> </quotient> </exp>
                          </product>
                        </difference>
                        <difference>
                          <value>1</value>
                          <exp> <quotient> <property>simulation/dt</property> <value>-2.4000</value> </quotient> </exp>
                        </difference>
                      </quotient>
                    </ifthen>
                    <property>fcs/propeller-beta-n1-1</property>
                  </ifthen>
                  <value>52.5438</value>
                </difference>
                <value>47.4562</value>
              </quotient>
              <ifthen>
                <and>
                  <gt> <property>simulation/dt</property> <value>0</value> </gt>
                  <lt> <property>propulsion/engine[1]/power-hp</property> <value>0.5</value> </lt>
                </and>
                <quotient>
                  <difference> <property>propulsion/engine[1]/n1</property> <value>52.5438</value> </difference>
                  <product>
                    <value>47.4562</value>
                    <difference>
                      <value>1</value>
                      <exp> <quotient> <property>simulation/dt</property> <value>-1.0000</value> </quotient> </exp>
                    </difference>
                  </product>
                </quotient>
                <property>fcs/throttle-cmd-norm[1]</property>
              </ifthen>
            </ifthen>
          </function>
          <output>fcs/throttle-pos-norm[1]</output>
        </fcs_function>
        <!-- the speed's rate of change: the power the engine gives the propeller less the
             power it takes, over its spin inertia (rpm/s); none read while the engine's
             power reads 0 (time stood still) -->
        <fcs_function name="fcs/propeller-rpm-rate-1">
          <function>
            <product>
              <ge> <property>propulsion/engine[1]/power-hp</property> <value>0.5</value> </ge>
              <quotient>
                <difference>
                  <product> <property>propulsion/engine[1]/power-hp</property> <value>550</value> </product>
                  <property>propulsion/engine[1]/propeller-power-ftlbps</property>
                </difference>
                <max>
                  <value>536.251</value>
                  <product> <value>5.25736</value> <property>propulsion/engine[1]/propeller-rpm</property> </product>
                </max>
              </quotient>
            </product>
          </function>
        </fcs_function>
        <fcs_function name="fcs/propeller-advance-1">
          <function>
            <quotient>
              <difference>
                <value>204.0</value>
                <product>
                  <gt> <property>simulation/dt</property> <value>0</value> </gt>
                  <value>0.1500</value>
                  <property>fcs/propeller-rpm-rate-1</property>
                </product>
              </difference>
              <value>306.0</value>
            </quotient>
          </function>
          <clipto> <min>0</min> <max>1</max> </clipto>
          <output>fcs/advance-cmd-norm[1]</output>
        </fcs_function>
        <!-- time standing still: the blades held where they take the engine's power; in the
             ground range: set -->
        <fcs_function name="fcs/propeller-governing-1">
          <function>
            <and>
              <gt> <property>simulation/dt</property> <value>0</value> </gt>
              <lt> <property>fcs/propeller-ground-range-1</property> <value>1</value> </lt>
            </and>
          </function>
          <output>propulsion/engine[1]/constant-speed-mode</output>
        </fcs_function>
        <fcs_function name="fcs/propeller-advance-ratio-1">
          <function>
            <max> <value>0</value> <quotient> <property>velocities/u-aero-fps</property> <value>229.5112</value> </quotient> </max>
          </function>
        </fcs_function>
        <!-- the engine's power coefficient at the governed speed: its core at the throttle's
             N1 (the full one at a start: JSBSim starts engines at full throttle), the lapse -->
        <fcs_function name="fcs/propeller-power-coefficient-1">
          <function>
            <quotient>
              <min>
                <value>4637.3</value>
                <product>
                  <value>5999.7</value>
                  <max>
                    <value>0</value>
                    <quotient>
                      <difference>
                        <pow>
                          <sum>
                            <value>0.5254</value>
                            <product>
                              <value>0.4746</value>
                              <ifthen>
                                <gt> <property>fcs/throttle-pos-norm[1]</property> <value>0.001</value> </gt>
                                <property>fcs/throttle-pos-norm[1]</property>
                                <value>1</value>
                              </ifthen>
                            </product>
                          </sum>
                          <value>3</value>
                        </pow>
                        <value>0.125000</value>
                      </difference>
                      <value>0.875000</value>
                    </quotient>
                  </max>
                  <product>
                    <quotient> <property>atmosphere/P-psf</property> <value>2116.228</value> </quotient>
                    <pow> <sum> <value>1</value> <product> <value>0.2</value> <property>velocities/mach</property> <property>velocities/mach</property> </product> </sum> <value>3.5</value> </pow>
                    <max>
                      <value>0</value>
                      <difference>
                        <value>1</value>
                        <product>
                          <max>
                            <value>0</value>
                            <difference>
                              <product> <quotient> <property>atmosphere/T-R</property> <value>518.67</value> </quotient> <sum> <value>1</value> <product> <value>0.2</value> <property>velocities/mach</property> <property>velocities/mach</property> </product> </sum> </product>
                              <value>1.0000</value>
                            </difference>
                          </max>
                          <table>
                            <independentVar lookup="row">velocities/mach</independentVar>
                            <tableData>
                                0.00    0.0000
                                0.10    0.0000
                                0.20    8.0192
                                0.30    5.1535
                                0.40    4.2484
                                0.50    3.9000
                                0.60    3.8290
                                0.70    3.9654
                                0.80    4.3246
                                0.90    5.0088
                            </tableData>
                          </table>
                        </product>
                      </difference>
                    </max>
                  </product>
                </product>
              </min>
              <product> <property>atmosphere/rho-slugs_ft3</property> <value>4.00644e+06</value> </product>
            </quotient>
          </function>
        </fcs_function>
        <fcs_function name="fcs/propeller-blade-angle-1">
          <function>
            <ifthen>
              <gt> <property>simulation/dt</property> <value>0</value> </gt>
              <ifthen>
                <gt> <property>fcs/propeller-ground-range-1</property> <value>0</value> </gt>
                <min>
                  <value>65.0000</value>
                  <sum>
                    <property>fcs/propeller-beta-blade-1</property>
                    <product>
                      <value>1.10814</value>
                      <max>
                        <value>0</value>
                        <difference> <property>propulsion/engine[1]/propeller-rpm</property> <value>1030.2000</value> </difference>
                      </max>
                    </product>
                  </sum>
                </min>
                <property>propulsion/engine[1]/blade-angle</property>
              </ifthen>
              <table>
                <independentVar lookup="row">fcs/propeller-advance-ratio-1</independentVar>
                <independentVar lookup="column">fcs/propeller-power-coefficient-1</independentVar>
                <tableData>
                    0.00    0.05    0.10    0.15    0.20    0.25    0.30    0.35    0.40    0.45    0.50    0.55    0.60    0.65    0.70    0.75    0.80    0.85    0.90    0.95    1.00    1.05    1.10    1.15    1.20
              0.00    15.00   15.00   15.00   15.00   15.61   18.17   20.66   22.97   25.33   28.11   34.89   57.14   65.00   65.00   65.00   65.00   65.00   65.00   65.00   65.00   65.00   65.00   65.00   65.00   65.00
              0.10    15.00   15.00   15.00   15.00   15.91   18.34   20.68   22.84   25.00   27.24   29.47   34.86   60.26   65.00   65.00   65.00   65.00   65.00   65.00   65.00   65.00   65.00   65.00   65.00   65.00
              0.20    15.00   15.00   15.00   15.00   16.33   18.74   20.93   22.89   24.85   26.87   28.89   31.61   55.67   63.33   65.00   65.00   65.00   65.00   65.00   65.00   65.00   65.00   65.00   65.00   65.00
              0.30    15.00   15.00   15.00   15.00   16.93   19.28   21.33   23.25   25.14   26.81   28.48   30.20   32.57   34.93   65.00   65.00   65.00   65.00   65.00   65.00   65.00   65.00   65.00   65.00   65.00
              0.40    15.00   15.00   15.00   15.37   17.70   20.02   21.88   23.73   25.51   27.10   28.70   30.31   31.97   33.63   39.96   65.00   65.00   65.00   65.00   65.00   65.00   65.00   65.00   65.00   65.00
              0.50    15.00   15.00   15.00   16.34   18.64   20.74   22.54   24.35   25.99   27.53   29.08   30.55   31.92   33.29   34.66   37.38   65.00   65.00   65.00   65.00   65.00   65.00   65.00   65.00   65.00
              0.60    15.00   15.00   15.25   17.52   19.79   21.61   23.38   25.12   26.60   28.08   29.56   30.93   32.24   33.56   34.87   36.19   37.50   38.82   65.00   65.00   65.00   65.00   65.00   65.00   65.00
              0.70    15.00   15.00   16.58   18.89   20.90   22.62   24.34   25.88   27.31   28.73   30.14   31.41   32.67   33.94   35.18   36.33   37.48   38.64   39.79   65.00   65.00   65.00   65.00   65.00   65.00
              0.80    15.00   15.98   18.20   20.33   22.04   23.76   25.38   26.76   28.14   29.53   30.79   32.00   33.20   34.40   35.55   36.65   37.75   38.85   39.95   41.05   42.15   43.25   44.36   65.00   65.00
              0.90    15.73   17.92   20.08   21.75   23.42   25.08   26.41   27.74   29.08   30.35   31.51   32.66   33.81   34.96   36.01   37.06   38.11   39.16   40.19   41.17   42.15   43.13   44.11   65.00   65.00
              1.00    17.97   20.09   21.68   23.27   24.86   26.19   27.50   28.81   30.10   31.20   32.30   33.40   34.50   35.55   36.55   37.55   38.55   39.55   40.50   41.43   42.35   43.27   44.20   45.69   65.00
              1.10    20.33   21.87   23.41   24.95   26.22   27.48   28.75   30.01   31.06   32.11   33.16   34.22   35.24   36.20   37.15   38.11   39.07   40.02   40.89   41.77   42.64   43.52   44.39   45.26   46.12
              1.20    22.30   23.79   25.23   26.44   27.66   28.87   30.08   31.09   32.10   33.12   34.13   35.13   36.03   36.94   37.84   38.75   39.65   40.51   41.34   42.17   43.00   43.83   44.66   45.46   46.25
              1.30    24.39   25.66   26.80   27.95   29.09   30.20   31.19   32.18   33.16   34.15   35.12   35.98   36.83   37.69   38.55   39.40   40.24   41.03   41.83   42.62   43.41   44.20   45.00   45.73   46.47
              1.40    26.24   27.34   28.44   29.53   30.54   31.49   32.43   33.38   34.32   35.23   36.05   36.86   37.68   38.49   39.31   40.11   40.87   41.62   42.37   43.13   43.88   44.63   45.36   46.06   46.75
              1.50    28.02   29.07   30.11   31.01   31.91   32.82   33.72   34.62   35.45   36.23   37.00   37.78   38.55   39.33   40.10   40.81   41.53   42.25   42.96   43.68   44.39   45.10   45.76   46.42   47.09
              1.60    29.84   30.73   31.59   32.45   33.31   34.17   35.03   35.77   36.51   37.24   37.98   38.72   39.46   40.18   40.86   41.54   42.22   42.90   43.58   44.26   44.95   45.58   46.20   46.83   47.46
              1.70    31.41   32.22   33.02   33.83   34.64   35.40   36.11   36.82   37.53   38.25   38.96   39.67   40.35   41.00   41.64   42.29   42.94   43.58   44.23   44.87   45.48   46.08   46.67   47.27   47.86
              1.80    32.95   33.72   34.49   35.23   35.92   36.60   37.29   37.97   38.66   39.34   40.03   40.64   41.25   41.85   42.46   43.07   43.68   44.29   44.90   45.47   46.04   46.60   47.17   47.74   48.30
              1.90    34.49   35.20   35.85   36.50   37.16   37.81   38.46   39.12   39.77   40.38   40.96   41.54   42.12   42.70   43.28   43.86   44.44   45.02   45.55   46.09   46.62   47.16   47.70   48.23   48.77
              2.00    35.90   36.52   37.15   37.77   38.39   39.01   39.63   40.23   40.78   41.33   41.88   42.43   42.99   43.54   44.09   44.64   45.18   45.69   46.20   46.70   47.21   47.72   48.23   48.74   49.25
              2.10    37.24   37.83   38.43   39.02   39.61   40.18   40.71   41.23   41.76   42.28   42.81   43.33   43.85   44.38   44.90   45.40   45.88   46.36   46.85   47.33   47.81   48.30   48.78   49.26   49.75
              2.20    38.56   39.12   39.69   40.22   40.72   41.22   41.72   42.22   42.72   43.22   43.72   44.22   44.72   45.20   45.66   46.12   46.58   47.04   47.50   47.96   48.42   48.88   49.34   49.80   50.24
              2.30    39.85   40.34   40.82   41.29   41.76   42.24   42.71   43.18   43.66   44.13   44.60   45.07   45.51   45.95   46.39   46.83   47.27   47.71   48.15   48.59   49.02   49.46   49.90   50.32   50.72
              2.40    40.92   41.38   41.84   42.30   42.75   43.21   43.67   44.12   44.58   45.03   45.45   45.87   46.29   46.71   47.13   47.55   47.96   48.38   48.80   49.22   49.64   50.05   50.44   50.82   51.21
              2.50    42.02   42.46   42.89   43.33   43.76   44.20   44.64   45.07   45.46   45.86   46.26   46.66   47.06   47.46   47.86   48.26   48.65   49.05   49.45   49.85   50.23   50.60   50.96   51.33   51.69
              2.60    43.09   43.51   43.92   44.34   44.75   45.15   45.54   45.92   46.30   46.68   47.06   47.44   47.82   48.20   48.58   48.96   49.34   49.72   50.09   50.44   50.79   51.14   51.49   51.83   52.18
              2.70    44.13   44.53   44.93   45.30   45.66   46.02   46.38   46.75   47.11   47.47   47.84   48.20   48.56   48.92   49.29   49.65   50.01   50.34   50.68   51.01   51.34   51.67   52.01   52.34   52.67
              2.80    45.13   45.48   45.83   46.17   46.52   46.87   47.21   47.56   47.91   48.25   48.60   48.95   49.29   49.64   49.99   50.30   50.62   50.94   51.25   51.57   51.89   52.21   52.52   52.84   53.16
              2.90    46.07   46.39   46.72   47.05   47.38   47.71   48.04   48.37   48.70   49.02   49.35   49.68   50.01   50.31   50.61   50.92   51.22   51.52   51.82   52.12   52.43   52.73   53.03   53.33   53.64
              3.00    46.94   47.25   47.56   47.88   48.19   48.51   48.82   49.14   49.45   49.76   50.07   50.36   50.65   50.94   51.23   51.51   51.80   52.09   52.38   52.67   52.96   53.25   53.53   53.82   54.11
              3.10    47.78   48.08   48.38   48.68   48.98   49.28   49.58   49.88   50.17   50.45   50.72   51.00   51.27   51.55   51.82   52.10   52.38   52.65   52.93   53.20   53.48   53.75   54.03   54.31   54.58
              3.20    48.60   48.89   49.18   49.46   49.75   50.04   50.30   50.56   50.83   51.09   51.35   51.62   51.88   52.14   52.41   52.67   52.94   53.20   53.46   53.73   53.99   54.25   54.52   54.78   55.04
              3.30    49.39   49.67   49.94   50.20   50.45   50.71   50.96   51.21   51.46   51.72   51.97   52.22   52.47   52.72   52.98   53.23   53.48   53.73   53.99   54.24   54.49   54.74   55.00   55.23   55.46
              3.40    50.15   50.39   50.63   50.88   51.12   51.36   51.60   51.84   52.08   52.33   52.57   52.81   53.05   53.29   53.53   53.78   54.02   54.26   54.50   54.74   54.98   55.21   55.43   55.65   55.88
              3.50    50.83   51.06   51.29   51.53   51.76   51.99   52.22   52.45   52.68   52.92   53.15   53.38   53.61   53.84   54.08   54.31   54.54   54.77   55.00   55.22   55.43   55.64   55.85   56.07   56.28
              3.60    51.50   51.72   51.94   52.16   52.38   52.61   52.83   53.05   53.27   53.49   53.72   53.94   54.16   54.38   54.60   54.83   55.04   55.25   55.45   55.66   55.86   56.07   56.27   56.48   56.68
              3.70    52.14   52.35   52.56   52.78   52.99   53.20   53.41   53.63   53.84   54.05   54.27   54.48   54.69   54.91   55.11   55.31   55.50   55.70   55.89   56.09   56.29   56.48   56.68   56.87   57.07
              3.80    52.76   52.96   53.17   53.37   53.58   53.78   53.99   54.19   54.39   54.60   54.80   55.01   55.20   55.38   55.57   55.76   55.95   56.14   56.32   56.51   56.70   56.89   57.08   57.26   57.45
              3.90    53.36   53.55   53.75   53.95   54.14   54.34   54.54   54.74   54.93   55.12   55.30   55.48   55.66   55.84   56.02   56.20   56.38   56.56   56.74   56.92   57.10   57.28   57.46   57.65   57.83
              4.00    53.94   54.13   54.32   54.51   54.70   54.89   55.07   55.24   55.42   55.59   55.76   55.94   56.11   56.28   56.46   56.63   56.80   56.98   57.15   57.33   57.50   57.67   57.85   58.02   58.19
                </tableData>
              </table>
            </ifthen>
          </function>
          <output>propulsion/engine[1]/blade-angle</output>
        </fcs_function>
      </channel>
      <channel name="Propeller Governor 2">
        <!-- AE 2100D3 outboard L: the propeller governed at 1020 rpm. The ground range: with weight
             on the wheels and time running, a throttle below 0.2 sets the blades, from
             ground idle's -5.15 deg (no thrust standing still) to the low stop, 15.0,
             and N1 holds the propeller's speed - not below 51.0 %, nor above 54.6 % at
             ground idle rising to the flight range's where it takes over, 62.0 %; past
             1030 rpm the blades open further -->
        <fcs_function name="fcs/propeller-ground-range-2">
          <function>
            <and>
              <gt> <property>simulation/dt</property> <value>0</value> </gt>
              <gt> <property>gear/wow</property> <value>0</value> </gt>
              <lt> <property>fcs/throttle-cmd-norm[2]</property> <value>0.2</value> </lt>
            </and>
          </function>
        </fcs_function>
        <fcs_function name="fcs/propeller-beta-blade-2">
          <function>
            <sum>
              <value>-5.1500</value>
              <product>
                <value>100.75</value>
                <max> <value>0</value> <property>fcs/throttle-cmd-norm[2]</property> </max>
              </product>
            </sum>
          </function>
          <clipto> <min>-5.1500</min> <max>15.0000</max> </clipto>
        </fcs_function>
        <!-- the fuel control: the N1 that holds the governed speed standing still with the
             blades there (sea level), less 0.0501 % for each rpm the propeller runs fast -->
        <fcs_function name="fcs/propeller-beta-n1-2">
          <function>
            <min>
              <sum>
                <value>54.5878</value>
                <product>
                  <value>37.2362</value>
                  <max> <value>0</value> <property>fcs/throttle-cmd-norm[2]</property> </max>
                </product>
              </sum>
              <max>
                <value>51.0000</value>
                <sum>
                  <table>
                    <independentVar>fcs/propeller-beta-blade-2</independentVar>
                    <tableData>
                         -5.15   52.5438
                          0.00   54.9396
                          5.00   59.0637
                         10.00   65.2608
                         15.00   72.7477
                         20.00   80.4850
                    </tableData>
                  </table>
                  <product>
                    <value>0.0500983</value>
                    <difference> <value>1020.0000</value> <property>propulsion/engine[2]/propeller-rpm</property> </difference>
                  </product>
                </sum>
              </max>
            </min>
          </function>
        </fcs_function>
        <!-- JSBSim's turboprop drops its N1 to idle as time runs again after standing still (a
             reset, a trim; its power reads 0 then): in that step the throttle puts N1 back where
             it was, or in the ground range where the fuel control wants it -->
        <fcs_function name="fcs/propeller-throttle-2">
          <function>
            <ifthen>
              <gt> <property>fcs/propeller-ground-range-2</property> <value>0</value> </gt>
              <quotient>
                <difference>
                  <ifthen>
                    <lt> <property>propulsion/engine[2]/power-hp</property> <value>0.5</value> </lt>
                    <ifthen>
                      <gt> <property>fcs/propeller-beta-n1-2</property> <value>52.5438</value> </gt>
                      <sum>
                        <value>52.5438</value>
                        <quotient>
                          <difference> <property>fcs/propeller-beta-n1-2</property> <value>52.5438</value> </difference>
                          <difference>
                            <value>1</value>
                            <exp> <quotient> <property>simulation/dt</property> <value>-1.0000</value> </quotient> </exp>
                          </difference>
                        </quotient>
                      </sum>
                      <quotient>
                        <difference>
                          <property>fcs/propeller-beta-n1-2</property>
                          <product>
                            <value>52.5438</value>
                            <exp> <quotient> <property>simulation/dt</property> <value>-2.4000</value> </quotient> </exp>
                          </product>
                        </difference>
                        <difference>
                          <value>1</value>
                          <exp> <quotient> <property>simulation/dt</property> <value>-2.4000</value> </quotient> </exp>
                        </difference>
                      </quotient>
                    </ifthen>
                    <property>fcs/propeller-beta-n1-2</property>
                  </ifthen>
                  <value>52.5438</value>
                </difference>
                <value>47.4562</value>
              </quotient>
              <ifthen>
                <and>
                  <gt> <property>simulation/dt</property> <value>0</value> </gt>
                  <lt> <property>propulsion/engine[2]/power-hp</property> <value>0.5</value> </lt>
                </and>
                <quotient>
                  <difference> <property>propulsion/engine[2]/n1</property> <value>52.5438</value> </difference>
                  <product>
                    <value>47.4562</value>
                    <difference>
                      <value>1</value>
                      <exp> <quotient> <property>simulation/dt</property> <value>-1.0000</value> </quotient> </exp>
                    </difference>
                  </product>
                </quotient>
                <property>fcs/throttle-cmd-norm[2]</property>
              </ifthen>
            </ifthen>
          </function>
          <output>fcs/throttle-pos-norm[2]</output>
        </fcs_function>
        <!-- the speed's rate of change: the power the engine gives the propeller less the
             power it takes, over its spin inertia (rpm/s); none read while the engine's
             power reads 0 (time stood still) -->
        <fcs_function name="fcs/propeller-rpm-rate-2">
          <function>
            <product>
              <ge> <property>propulsion/engine[2]/power-hp</property> <value>0.5</value> </ge>
              <quotient>
                <difference>
                  <product> <property>propulsion/engine[2]/power-hp</property> <value>550</value> </product>
                  <property>propulsion/engine[2]/propeller-power-ftlbps</property>
                </difference>
                <max>
                  <value>536.251</value>
                  <product> <value>5.25736</value> <property>propulsion/engine[2]/propeller-rpm</property> </product>
                </max>
              </quotient>
            </product>
          </function>
        </fcs_function>
        <fcs_function name="fcs/propeller-advance-2">
          <function>
            <quotient>
              <difference>
                <value>204.0</value>
                <product>
                  <gt> <property>simulation/dt</property> <value>0</value> </gt>
                  <value>0.1500</value>
                  <property>fcs/propeller-rpm-rate-2</property>
                </product>
              </difference>
              <value>306.0</value>
            </quotient>
          </function>
          <clipto> <min>0</min> <max>1</max> </clipto>
          <output>fcs/advance-cmd-norm[2]</output>
        </fcs_function>
        <!-- time standing still: the blades held where they take the engine's power; in the
             ground range: set -->
        <fcs_function name="fcs/propeller-governing-2">
          <function>
            <and>
              <gt> <property>simulation/dt</property> <value>0</value> </gt>
              <lt> <property>fcs/propeller-ground-range-2</property> <value>1</value> </lt>
            </and>
          </function>
          <output>propulsion/engine[2]/constant-speed-mode</output>
        </fcs_function>
        <fcs_function name="fcs/propeller-advance-ratio-2">
          <function>
            <max> <value>0</value> <quotient> <property>velocities/u-aero-fps</property> <value>229.5112</value> </quotient> </max>
          </function>
        </fcs_function>
        <!-- the engine's power coefficient at the governed speed: its core at the throttle's
             N1 (the full one at a start: JSBSim starts engines at full throttle), the lapse -->
        <fcs_function name="fcs/propeller-power-coefficient-2">
          <function>
            <quotient>
              <min>
                <value>4637.3</value>
                <product>
                  <value>5999.7</value>
                  <max>
                    <value>0</value>
                    <quotient>
                      <difference>
                        <pow>
                          <sum>
                            <value>0.5254</value>
                            <product>
                              <value>0.4746</value>
                              <ifthen>
                                <gt> <property>fcs/throttle-pos-norm[2]</property> <value>0.001</value> </gt>
                                <property>fcs/throttle-pos-norm[2]</property>
                                <value>1</value>
                              </ifthen>
                            </product>
                          </sum>
                          <value>3</value>
                        </pow>
                        <value>0.125000</value>
                      </difference>
                      <value>0.875000</value>
                    </quotient>
                  </max>
                  <product>
                    <quotient> <property>atmosphere/P-psf</property> <value>2116.228</value> </quotient>
                    <pow> <sum> <value>1</value> <product> <value>0.2</value> <property>velocities/mach</property> <property>velocities/mach</property> </product> </sum> <value>3.5</value> </pow>
                    <max>
                      <value>0</value>
                      <difference>
                        <value>1</value>
                        <product>
                          <max>
                            <value>0</value>
                            <difference>
                              <product> <quotient> <property>atmosphere/T-R</property> <value>518.67</value> </quotient> <sum> <value>1</value> <product> <value>0.2</value> <property>velocities/mach</property> <property>velocities/mach</property> </product> </sum> </product>
                              <value>1.0000</value>
                            </difference>
                          </max>
                          <table>
                            <independentVar lookup="row">velocities/mach</independentVar>
                            <tableData>
                                0.00    0.0000
                                0.10    0.0000
                                0.20    8.0192
                                0.30    5.1535
                                0.40    4.2484
                                0.50    3.9000
                                0.60    3.8290
                                0.70    3.9654
                                0.80    4.3246
                                0.90    5.0088
                            </tableData>
                          </table>
                        </product>
                      </difference>
                    </max>
                  </product>
                </product>
              </min>
              <product> <property>atmosphere/rho-slugs_ft3</property> <value>4.00644e+06</value> </product>
            </quotient>
          </function>
        </fcs_function>
        <fcs_function name="fcs/propeller-blade-angle-2">
          <function>
            <ifthen>
              <gt> <property>simulation/dt</property> <value>0</value> </gt>
              <ifthen>
                <gt> <property>fcs/propeller-ground-range-2</property> <value>0</value> </gt>
                <min>
                  <value>65.0000</value>
                  <sum>
                    <property>fcs/propeller-beta-blade-2</property>
                    <product>
                      <value>1.10814</value>
                      <max>
                        <value>0</value>
                        <difference> <property>propulsion/engine[2]/propeller-rpm</property> <value>1030.2000</value> </difference>
                      </max>
                    </product>
                  </sum>
                </min>
                <property>propulsion/engine[2]/blade-angle</property>
              </ifthen>
              <table>
                <independentVar lookup="row">fcs/propeller-advance-ratio-2</independentVar>
                <independentVar lookup="column">fcs/propeller-power-coefficient-2</independentVar>
                <tableData>
                    0.00    0.05    0.10    0.15    0.20    0.25    0.30    0.35    0.40    0.45    0.50    0.55    0.60    0.65    0.70    0.75    0.80    0.85    0.90    0.95    1.00    1.05    1.10    1.15    1.20
              0.00    15.00   15.00   15.00   15.00   15.61   18.17   20.66   22.97   25.33   28.11   34.89   57.14   65.00   65.00   65.00   65.00   65.00   65.00   65.00   65.00   65.00   65.00   65.00   65.00   65.00
              0.10    15.00   15.00   15.00   15.00   15.91   18.34   20.68   22.84   25.00   27.24   29.47   34.86   60.26   65.00   65.00   65.00   65.00   65.00   65.00   65.00   65.00   65.00   65.00   65.00   65.00
              0.20    15.00   15.00   15.00   15.00   16.33   18.74   20.93   22.89   24.85   26.87   28.89   31.61   55.67   63.33   65.00   65.00   65.00   65.00   65.00   65.00   65.00   65.00   65.00   65.00   65.00
              0.30    15.00   15.00   15.00   15.00   16.93   19.28   21.33   23.25   25.14   26.81   28.48   30.20   32.57   34.93   65.00   65.00   65.00   65.00   65.00   65.00   65.00   65.00   65.00   65.00   65.00
              0.40    15.00   15.00   15.00   15.37   17.70   20.02   21.88   23.73   25.51   27.10   28.70   30.31   31.97   33.63   39.96   65.00   65.00   65.00   65.00   65.00   65.00   65.00   65.00   65.00   65.00
              0.50    15.00   15.00   15.00   16.34   18.64   20.74   22.54   24.35   25.99   27.53   29.08   30.55   31.92   33.29   34.66   37.38   65.00   65.00   65.00   65.00   65.00   65.00   65.00   65.00   65.00
              0.60    15.00   15.00   15.25   17.52   19.79   21.61   23.38   25.12   26.60   28.08   29.56   30.93   32.24   33.56   34.87   36.19   37.50   38.82   65.00   65.00   65.00   65.00   65.00   65.00   65.00
              0.70    15.00   15.00   16.58   18.89   20.90   22.62   24.34   25.88   27.31   28.73   30.14   31.41   32.67   33.94   35.18   36.33   37.48   38.64   39.79   65.00   65.00   65.00   65.00   65.00   65.00
              0.80    15.00   15.98   18.20   20.33   22.04   23.76   25.38   26.76   28.14   29.53   30.79   32.00   33.20   34.40   35.55   36.65   37.75   38.85   39.95   41.05   42.15   43.25   44.36   65.00   65.00
              0.90    15.73   17.92   20.08   21.75   23.42   25.08   26.41   27.74   29.08   30.35   31.51   32.66   33.81   34.96   36.01   37.06   38.11   39.16   40.19   41.17   42.15   43.13   44.11   65.00   65.00
              1.00    17.97   20.09   21.68   23.27   24.86   26.19   27.50   28.81   30.10   31.20   32.30   33.40   34.50   35.55   36.55   37.55   38.55   39.55   40.50   41.43   42.35   43.27   44.20   45.69   65.00
              1.10    20.33   21.87   23.41   24.95   26.22   27.48   28.75   30.01   31.06   32.11   33.16   34.22   35.24   36.20   37.15   38.11   39.07   40.02   40.89   41.77   42.64   43.52   44.39   45.26   46.12
              1.20    22.30   23.79   25.23   26.44   27.66   28.87   30.08   31.09   32.10   33.12   34.13   35.13   36.03   36.94   37.84   38.75   39.65   40.51   41.34   42.17   43.00   43.83   44.66   45.46   46.25
              1.30    24.39   25.66   26.80   27.95   29.09   30.20   31.19   32.18   33.16   34.15   35.12   35.98   36.83   37.69   38.55   39.40   40.24   41.03   41.83   42.62   43.41   44.20   45.00   45.73   46.47
              1.40    26.24   27.34   28.44   29.53   30.54   31.49   32.43   33.38   34.32   35.23   36.05   36.86   37.68   38.49   39.31   40.11   40.87   41.62   42.37   43.13   43.88   44.63   45.36   46.06   46.75
              1.50    28.02   29.07   30.11   31.01   31.91   32.82   33.72   34.62   35.45   36.23   37.00   37.78   38.55   39.33   40.10   40.81   41.53   42.25   42.96   43.68   44.39   45.10   45.76   46.42   47.09
              1.60    29.84   30.73   31.59   32.45   33.31   34.17   35.03   35.77   36.51   37.24   37.98   38.72   39.46   40.18   40.86   41.54   42.22   42.90   43.58   44.26   44.95   45.58   46.20   46.83   47.46
              1.70    31.41   32.22   33.02   33.83   34.64   35.40   36.11   36.82   37.53   38.25   38.96   39.67   40.35   41.00   41.64   42.29   42.94   43.58   44.23   44.87   45.48   46.08   46.67   47.27   47.86
              1.80    32.95   33.72   34.49   35.23   35.92   36.60   37.29   37.97   38.66   39.34   40.03   40.64   41.25   41.85   42.46   43.07   43.68   44.29   44.90   45.47   46.04   46.60   47.17   47.74   48.30
              1.90    34.49   35.20   35.85   36.50   37.16   37.81   38.46   39.12   39.77   40.38   40.96   41.54   42.12   42.70   43.28   43.86   44.44   45.02   45.55   46.09   46.62   47.16   47.70   48.23   48.77
              2.00    35.90   36.52   37.15   37.77   38.39   39.01   39.63   40.23   40.78   41.33   41.88   42.43   42.99   43.54   44.09   44.64   45.18   45.69   46.20   46.70   47.21   47.72   48.23   48.74   49.25
              2.10    37.24   37.83   38.43   39.02   39.61   40.18   40.71   41.23   41.76   42.28   42.81   43.33   43.85   44.38   44.90   45.40   45.88   46.36   46.85   47.33   47.81   48.30   48.78   49.26   49.75
              2.20    38.56   39.12   39.69   40.22   40.72   41.22   41.72   42.22   42.72   43.22   43.72   44.22   44.72   45.20   45.66   46.12   46.58   47.04   47.50   47.96   48.42   48.88   49.34   49.80   50.24
              2.30    39.85   40.34   40.82   41.29   41.76   42.24   42.71   43.18   43.66   44.13   44.60   45.07   45.51   45.95   46.39   46.83   47.27   47.71   48.15   48.59   49.02   49.46   49.90   50.32   50.72
              2.40    40.92   41.38   41.84   42.30   42.75   43.21   43.67   44.12   44.58   45.03   45.45   45.87   46.29   46.71   47.13   47.55   47.96   48.38   48.80   49.22   49.64   50.05   50.44   50.82   51.21
              2.50    42.02   42.46   42.89   43.33   43.76   44.20   44.64   45.07   45.46   45.86   46.26   46.66   47.06   47.46   47.86   48.26   48.65   49.05   49.45   49.85   50.23   50.60   50.96   51.33   51.69
              2.60    43.09   43.51   43.92   44.34   44.75   45.15   45.54   45.92   46.30   46.68   47.06   47.44   47.82   48.20   48.58   48.96   49.34   49.72   50.09   50.44   50.79   51.14   51.49   51.83   52.18
              2.70    44.13   44.53   44.93   45.30   45.66   46.02   46.38   46.75   47.11   47.47   47.84   48.20   48.56   48.92   49.29   49.65   50.01   50.34   50.68   51.01   51.34   51.67   52.01   52.34   52.67
              2.80    45.13   45.48   45.83   46.17   46.52   46.87   47.21   47.56   47.91   48.25   48.60   48.95   49.29   49.64   49.99   50.30   50.62   50.94   51.25   51.57   51.89   52.21   52.52   52.84   53.16
              2.90    46.07   46.39   46.72   47.05   47.38   47.71   48.04   48.37   48.70   49.02   49.35   49.68   50.01   50.31   50.61   50.92   51.22   51.52   51.82   52.12   52.43   52.73   53.03   53.33   53.64
              3.00    46.94   47.25   47.56   47.88   48.19   48.51   48.82   49.14   49.45   49.76   50.07   50.36   50.65   50.94   51.23   51.51   51.80   52.09   52.38   52.67   52.96   53.25   53.53   53.82   54.11
              3.10    47.78   48.08   48.38   48.68   48.98   49.28   49.58   49.88   50.17   50.45   50.72   51.00   51.27   51.55   51.82   52.10   52.38   52.65   52.93   53.20   53.48   53.75   54.03   54.31   54.58
              3.20    48.60   48.89   49.18   49.46   49.75   50.04   50.30   50.56   50.83   51.09   51.35   51.62   51.88   52.14   52.41   52.67   52.94   53.20   53.46   53.73   53.99   54.25   54.52   54.78   55.04
              3.30    49.39   49.67   49.94   50.20   50.45   50.71   50.96   51.21   51.46   51.72   51.97   52.22   52.47   52.72   52.98   53.23   53.48   53.73   53.99   54.24   54.49   54.74   55.00   55.23   55.46
              3.40    50.15   50.39   50.63   50.88   51.12   51.36   51.60   51.84   52.08   52.33   52.57   52.81   53.05   53.29   53.53   53.78   54.02   54.26   54.50   54.74   54.98   55.21   55.43   55.65   55.88
              3.50    50.83   51.06   51.29   51.53   51.76   51.99   52.22   52.45   52.68   52.92   53.15   53.38   53.61   53.84   54.08   54.31   54.54   54.77   55.00   55.22   55.43   55.64   55.85   56.07   56.28
              3.60    51.50   51.72   51.94   52.16   52.38   52.61   52.83   53.05   53.27   53.49   53.72   53.94   54.16   54.38   54.60   54.83   55.04   55.25   55.45   55.66   55.86   56.07   56.27   56.48   56.68
              3.70    52.14   52.35   52.56   52.78   52.99   53.20   53.41   53.63   53.84   54.05   54.27   54.48   54.69   54.91   55.11   55.31   55.50   55.70   55.89   56.09   56.29   56.48   56.68   56.87   57.07
              3.80    52.76   52.96   53.17   53.37   53.58   53.78   53.99   54.19   54.39   54.60   54.80   55.01   55.20   55.38   55.57   55.76   55.95   56.14   56.32   56.51   56.70   56.89   57.08   57.26   57.45
              3.90    53.36   53.55   53.75   53.95   54.14   54.34   54.54   54.74   54.93   55.12   55.30   55.48   55.66   55.84   56.02   56.20   56.38   56.56   56.74   56.92   57.10   57.28   57.46   57.65   57.83
              4.00    53.94   54.13   54.32   54.51   54.70   54.89   55.07   55.24   55.42   55.59   55.76   55.94   56.11   56.28   56.46   56.63   56.80   56.98   57.15   57.33   57.50   57.67   57.85   58.02   58.19
                </tableData>
              </table>
            </ifthen>
          </function>
          <output>propulsion/engine[2]/blade-angle</output>
        </fcs_function>
      </channel>
      <channel name="Propeller Governor 3">
        <!-- AE 2100D3 outboard R: the propeller governed at 1020 rpm. The ground range: with weight
             on the wheels and time running, a throttle below 0.2 sets the blades, from
             ground idle's -5.15 deg (no thrust standing still) to the low stop, 15.0,
             and N1 holds the propeller's speed - not below 51.0 %, nor above 54.6 % at
             ground idle rising to the flight range's where it takes over, 62.0 %; past
             1030 rpm the blades open further -->
        <fcs_function name="fcs/propeller-ground-range-3">
          <function>
            <and>
              <gt> <property>simulation/dt</property> <value>0</value> </gt>
              <gt> <property>gear/wow</property> <value>0</value> </gt>
              <lt> <property>fcs/throttle-cmd-norm[3]</property> <value>0.2</value> </lt>
            </and>
          </function>
        </fcs_function>
        <fcs_function name="fcs/propeller-beta-blade-3">
          <function>
            <sum>
              <value>-5.1500</value>
              <product>
                <value>100.75</value>
                <max> <value>0</value> <property>fcs/throttle-cmd-norm[3]</property> </max>
              </product>
            </sum>
          </function>
          <clipto> <min>-5.1500</min> <max>15.0000</max> </clipto>
        </fcs_function>
        <!-- the fuel control: the N1 that holds the governed speed standing still with the
             blades there (sea level), less 0.0501 % for each rpm the propeller runs fast -->
        <fcs_function name="fcs/propeller-beta-n1-3">
          <function>
            <min>
              <sum>
                <value>54.5878</value>
                <product>
                  <value>37.2362</value>
                  <max> <value>0</value> <property>fcs/throttle-cmd-norm[3]</property> </max>
                </product>
              </sum>
              <max>
                <value>51.0000</value>
                <sum>
                  <table>
                    <independentVar>fcs/propeller-beta-blade-3</independentVar>
                    <tableData>
                         -5.15   52.5438
                          0.00   54.9396
                          5.00   59.0637
                         10.00   65.2608
                         15.00   72.7477
                         20.00   80.4850
                    </tableData>
                  </table>
                  <product>
                    <value>0.0500983</value>
                    <difference> <value>1020.0000</value> <property>propulsion/engine[3]/propeller-rpm</property> </difference>
                  </product>
                </sum>
              </max>
            </min>
          </function>
        </fcs_function>
        <!-- JSBSim's turboprop drops its N1 to idle as time runs again after standing still (a
             reset, a trim; its power reads 0 then): in that step the throttle puts N1 back where
             it was, or in the ground range where the fuel control wants it -->
        <fcs_function name="fcs/propeller-throttle-3">
          <function>
            <ifthen>
              <gt> <property>fcs/propeller-ground-range-3</property> <value>0</value> </gt>
              <quotient>
                <difference>
                  <ifthen>
                    <lt> <property>propulsion/engine[3]/power-hp</property> <value>0.5</value> </lt>
                    <ifthen>
                      <gt> <property>fcs/propeller-beta-n1-3</property> <value>52.5438</value> </gt>
                      <sum>
                        <value>52.5438</value>
                        <quotient>
                          <difference> <property>fcs/propeller-beta-n1-3</property> <value>52.5438</value> </difference>
                          <difference>
                            <value>1</value>
                            <exp> <quotient> <property>simulation/dt</property> <value>-1.0000</value> </quotient> </exp>
                          </difference>
                        </quotient>
                      </sum>
                      <quotient>
                        <difference>
                          <property>fcs/propeller-beta-n1-3</property>
                          <product>
                            <value>52.5438</value>
                            <exp> <quotient> <property>simulation/dt</property> <value>-2.4000</value> </quotient> </exp>
                          </product>
                        </difference>
                        <difference>
                          <value>1</value>
                          <exp> <quotient> <property>simulation/dt</property> <value>-2.4000</value> </quotient> </exp>
                        </difference>
                      </quotient>
                    </ifthen>
                    <property>fcs/propeller-beta-n1-3</property>
                  </ifthen>
                  <value>52.5438</value>
                </difference>
                <value>47.4562</value>
              </quotient>
              <ifthen>
                <and>
                  <gt> <property>simulation/dt</property> <value>0</value> </gt>
                  <lt> <property>propulsion/engine[3]/power-hp</property> <value>0.5</value> </lt>
                </and>
                <quotient>
                  <difference> <property>propulsion/engine[3]/n1</property> <value>52.5438</value> </difference>
                  <product>
                    <value>47.4562</value>
                    <difference>
                      <value>1</value>
                      <exp> <quotient> <property>simulation/dt</property> <value>-1.0000</value> </quotient> </exp>
                    </difference>
                  </product>
                </quotient>
                <property>fcs/throttle-cmd-norm[3]</property>
              </ifthen>
            </ifthen>
          </function>
          <output>fcs/throttle-pos-norm[3]</output>
        </fcs_function>
        <!-- the speed's rate of change: the power the engine gives the propeller less the
             power it takes, over its spin inertia (rpm/s); none read while the engine's
             power reads 0 (time stood still) -->
        <fcs_function name="fcs/propeller-rpm-rate-3">
          <function>
            <product>
              <ge> <property>propulsion/engine[3]/power-hp</property> <value>0.5</value> </ge>
              <quotient>
                <difference>
                  <product> <property>propulsion/engine[3]/power-hp</property> <value>550</value> </product>
                  <property>propulsion/engine[3]/propeller-power-ftlbps</property>
                </difference>
                <max>
                  <value>536.251</value>
                  <product> <value>5.25736</value> <property>propulsion/engine[3]/propeller-rpm</property> </product>
                </max>
              </quotient>
            </product>
          </function>
        </fcs_function>
        <fcs_function name="fcs/propeller-advance-3">
          <function>
            <quotient>
              <difference>
                <value>204.0</value>
                <product>
                  <gt> <property>simulation/dt</property> <value>0</value> </gt>
                  <value>0.1500</value>
                  <property>fcs/propeller-rpm-rate-3</property>
                </product>
              </difference>
              <value>306.0</value>
            </quotient>
          </function>
          <clipto> <min>0</min> <max>1</max> </clipto>
          <output>fcs/advance-cmd-norm[3]</output>
        </fcs_function>
        <!-- time standing still: the blades held where they take the engine's power; in the
             ground range: set -->
        <fcs_function name="fcs/propeller-governing-3">
          <function>
            <and>
              <gt> <property>simulation/dt</property> <value>0</value> </gt>
              <lt> <property>fcs/propeller-ground-range-3</property> <value>1</value> </lt>
            </and>
          </function>
          <output>propulsion/engine[3]/constant-speed-mode</output>
        </fcs_function>
        <fcs_function name="fcs/propeller-advance-ratio-3">
          <function>
            <max> <value>0</value> <quotient> <property>velocities/u-aero-fps</property> <value>229.5112</value> </quotient> </max>
          </function>
        </fcs_function>
        <!-- the engine's power coefficient at the governed speed: its core at the throttle's
             N1 (the full one at a start: JSBSim starts engines at full throttle), the lapse -->
        <fcs_function name="fcs/propeller-power-coefficient-3">
          <function>
            <quotient>
              <min>
                <value>4637.3</value>
                <product>
                  <value>5999.7</value>
                  <max>
                    <value>0</value>
                    <quotient>
                      <difference>
                        <pow>
                          <sum>
                            <value>0.5254</value>
                            <product>
                              <value>0.4746</value>
                              <ifthen>
                                <gt> <property>fcs/throttle-pos-norm[3]</property> <value>0.001</value> </gt>
                                <property>fcs/throttle-pos-norm[3]</property>
                                <value>1</value>
                              </ifthen>
                            </product>
                          </sum>
                          <value>3</value>
                        </pow>
                        <value>0.125000</value>
                      </difference>
                      <value>0.875000</value>
                    </quotient>
                  </max>
                  <product>
                    <quotient> <property>atmosphere/P-psf</property> <value>2116.228</value> </quotient>
                    <pow> <sum> <value>1</value> <product> <value>0.2</value> <property>velocities/mach</property> <property>velocities/mach</property> </product> </sum> <value>3.5</value> </pow>
                    <max>
                      <value>0</value>
                      <difference>
                        <value>1</value>
                        <product>
                          <max>
                            <value>0</value>
                            <difference>
                              <product> <quotient> <property>atmosphere/T-R</property> <value>518.67</value> </quotient> <sum> <value>1</value> <product> <value>0.2</value> <property>velocities/mach</property> <property>velocities/mach</property> </product> </sum> </product>
                              <value>1.0000</value>
                            </difference>
                          </max>
                          <table>
                            <independentVar lookup="row">velocities/mach</independentVar>
                            <tableData>
                                0.00    0.0000
                                0.10    0.0000
                                0.20    8.0192
                                0.30    5.1535
                                0.40    4.2484
                                0.50    3.9000
                                0.60    3.8290
                                0.70    3.9654
                                0.80    4.3246
                                0.90    5.0088
                            </tableData>
                          </table>
                        </product>
                      </difference>
                    </max>
                  </product>
                </product>
              </min>
              <product> <property>atmosphere/rho-slugs_ft3</property> <value>4.00644e+06</value> </product>
            </quotient>
          </function>
        </fcs_function>
        <fcs_function name="fcs/propeller-blade-angle-3">
          <function>
            <ifthen>
              <gt> <property>simulation/dt</property> <value>0</value> </gt>
              <ifthen>
                <gt> <property>fcs/propeller-ground-range-3</property> <value>0</value> </gt>
                <min>
                  <value>65.0000</value>
                  <sum>
                    <property>fcs/propeller-beta-blade-3</property>
                    <product>
                      <value>1.10814</value>
                      <max>
                        <value>0</value>
                        <difference> <property>propulsion/engine[3]/propeller-rpm</property> <value>1030.2000</value> </difference>
                      </max>
                    </product>
                  </sum>
                </min>
                <property>propulsion/engine[3]/blade-angle</property>
              </ifthen>
              <table>
                <independentVar lookup="row">fcs/propeller-advance-ratio-3</independentVar>
                <independentVar lookup="column">fcs/propeller-power-coefficient-3</independentVar>
                <tableData>
                    0.00    0.05    0.10    0.15    0.20    0.25    0.30    0.35    0.40    0.45    0.50    0.55    0.60    0.65    0.70    0.75    0.80    0.85    0.90    0.95    1.00    1.05    1.10    1.15    1.20
              0.00    15.00   15.00   15.00   15.00   15.61   18.17   20.66   22.97   25.33   28.11   34.89   57.14   65.00   65.00   65.00   65.00   65.00   65.00   65.00   65.00   65.00   65.00   65.00   65.00   65.00
              0.10    15.00   15.00   15.00   15.00   15.91   18.34   20.68   22.84   25.00   27.24   29.47   34.86   60.26   65.00   65.00   65.00   65.00   65.00   65.00   65.00   65.00   65.00   65.00   65.00   65.00
              0.20    15.00   15.00   15.00   15.00   16.33   18.74   20.93   22.89   24.85   26.87   28.89   31.61   55.67   63.33   65.00   65.00   65.00   65.00   65.00   65.00   65.00   65.00   65.00   65.00   65.00
              0.30    15.00   15.00   15.00   15.00   16.93   19.28   21.33   23.25   25.14   26.81   28.48   30.20   32.57   34.93   65.00   65.00   65.00   65.00   65.00   65.00   65.00   65.00   65.00   65.00   65.00
              0.40    15.00   15.00   15.00   15.37   17.70   20.02   21.88   23.73   25.51   27.10   28.70   30.31   31.97   33.63   39.96   65.00   65.00   65.00   65.00   65.00   65.00   65.00   65.00   65.00   65.00
              0.50    15.00   15.00   15.00   16.34   18.64   20.74   22.54   24.35   25.99   27.53   29.08   30.55   31.92   33.29   34.66   37.38   65.00   65.00   65.00   65.00   65.00   65.00   65.00   65.00   65.00
              0.60    15.00   15.00   15.25   17.52   19.79   21.61   23.38   25.12   26.60   28.08   29.56   30.93   32.24   33.56   34.87   36.19   37.50   38.82   65.00   65.00   65.00   65.00   65.00   65.00   65.00
              0.70    15.00   15.00   16.58   18.89   20.90   22.62   24.34   25.88   27.31   28.73   30.14   31.41   32.67   33.94   35.18   36.33   37.48   38.64   39.79   65.00   65.00   65.00   65.00   65.00   65.00
              0.80    15.00   15.98   18.20   20.33   22.04   23.76   25.38   26.76   28.14   29.53   30.79   32.00   33.20   34.40   35.55   36.65   37.75   38.85   39.95   41.05   42.15   43.25   44.36   65.00   65.00
              0.90    15.73   17.92   20.08   21.75   23.42   25.08   26.41   27.74   29.08   30.35   31.51   32.66   33.81   34.96   36.01   37.06   38.11   39.16   40.19   41.17   42.15   43.13   44.11   65.00   65.00
              1.00    17.97   20.09   21.68   23.27   24.86   26.19   27.50   28.81   30.10   31.20   32.30   33.40   34.50   35.55   36.55   37.55   38.55   39.55   40.50   41.43   42.35   43.27   44.20   45.69   65.00
              1.10    20.33   21.87   23.41   24.95   26.22   27.48   28.75   30.01   31.06   32.11   33.16   34.22   35.24   36.20   37.15   38.11   39.07   40.02   40.89   41.77   42.64   43.52   44.39   45.26   46.12
              1.20    22.30   23.79   25.23   26.44   27.66   28.87   30.08   31.09   32.10   33.12   34.13   35.13   36.03   36.94   37.84   38.75   39.65   40.51   41.34   42.17   43.00   43.83   44.66   45.46   46.25
              1.30    24.39   25.66   26.80   27.95   29.09   30.20   31.19   32.18   33.16   34.15   35.12   35.98   36.83   37.69   38.55   39.40   40.24   41.03   41.83   42.62   43.41   44.20   45.00   45.73   46.47
              1.40    26.24   27.34   28.44   29.53   30.54   31.49   32.43   33.38   34.32   35.23   36.05   36.86   37.68   38.49   39.31   40.11   40.87   41.62   42.37   43.13   43.88   44.63   45.36   46.06   46.75
              1.50    28.02   29.07   30.11   31.01   31.91   32.82   33.72   34.62   35.45   36.23   37.00   37.78   38.55   39.33   40.10   40.81   41.53   42.25   42.96   43.68   44.39   45.10   45.76   46.42   47.09
              1.60    29.84   30.73   31.59   32.45   33.31   34.17   35.03   35.77   36.51   37.24   37.98   38.72   39.46   40.18   40.86   41.54   42.22   42.90   43.58   44.26   44.95   45.58   46.20   46.83   47.46
              1.70    31.41   32.22   33.02   33.83   34.64   35.40   36.11   36.82   37.53   38.25   38.96   39.67   40.35   41.00   41.64   42.29   42.94   43.58   44.23   44.87   45.48   46.08   46.67   47.27   47.86
              1.80    32.95   33.72   34.49   35.23   35.92   36.60   37.29   37.97   38.66   39.34   40.03   40.64   41.25   41.85   42.46   43.07   43.68   44.29   44.90   45.47   46.04   46.60   47.17   47.74   48.30
              1.90    34.49   35.20   35.85   36.50   37.16   37.81   38.46   39.12   39.77   40.38   40.96   41.54   42.12   42.70   43.28   43.86   44.44   45.02   45.55   46.09   46.62   47.16   47.70   48.23   48.77
              2.00    35.90   36.52   37.15   37.77   38.39   39.01   39.63   40.23   40.78   41.33   41.88   42.43   42.99   43.54   44.09   44.64   45.18   45.69   46.20   46.70   47.21   47.72   48.23   48.74   49.25
              2.10    37.24   37.83   38.43   39.02   39.61   40.18   40.71   41.23   41.76   42.28   42.81   43.33   43.85   44.38   44.90   45.40   45.88   46.36   46.85   47.33   47.81   48.30   48.78   49.26   49.75
              2.20    38.56   39.12   39.69   40.22   40.72   41.22   41.72   42.22   42.72   43.22   43.72   44.22   44.72   45.20   45.66   46.12   46.58   47.04   47.50   47.96   48.42   48.88   49.34   49.80   50.24
              2.30    39.85   40.34   40.82   41.29   41.76   42.24   42.71   43.18   43.66   44.13   44.60   45.07   45.51   45.95   46.39   46.83   47.27   47.71   48.15   48.59   49.02   49.46   49.90   50.32   50.72
              2.40    40.92   41.38   41.84   42.30   42.75   43.21   43.67   44.12   44.58   45.03   45.45   45.87   46.29   46.71   47.13   47.55   47.96   48.38   48.80   49.22   49.64   50.05   50.44   50.82   51.21
              2.50    42.02   42.46   42.89   43.33   43.76   44.20   44.64   45.07   45.46   45.86   46.26   46.66   47.06   47.46   47.86   48.26   48.65   49.05   49.45   49.85   50.23   50.60   50.96   51.33   51.69
              2.60    43.09   43.51   43.92   44.34   44.75   45.15   45.54   45.92   46.30   46.68   47.06   47.44   47.82   48.20   48.58   48.96   49.34   49.72   50.09   50.44   50.79   51.14   51.49   51.83   52.18
              2.70    44.13   44.53   44.93   45.30   45.66   46.02   46.38   46.75   47.11   47.47   47.84   48.20   48.56   48.92   49.29   49.65   50.01   50.34   50.68   51.01   51.34   51.67   52.01   52.34   52.67
              2.80    45.13   45.48   45.83   46.17   46.52   46.87   47.21   47.56   47.91   48.25   48.60   48.95   49.29   49.64   49.99   50.30   50.62   50.94   51.25   51.57   51.89   52.21   52.52   52.84   53.16
              2.90    46.07   46.39   46.72   47.05   47.38   47.71   48.04   48.37   48.70   49.02   49.35   49.68   50.01   50.31   50.61   50.92   51.22   51.52   51.82   52.12   52.43   52.73   53.03   53.33   53.64
              3.00    46.94   47.25   47.56   47.88   48.19   48.51   48.82   49.14   49.45   49.76   50.07   50.36   50.65   50.94   51.23   51.51   51.80   52.09   52.38   52.67   52.96   53.25   53.53   53.82   54.11
              3.10    47.78   48.08   48.38   48.68   48.98   49.28   49.58   49.88   50.17   50.45   50.72   51.00   51.27   51.55   51.82   52.10   52.38   52.65   52.93   53.20   53.48   53.75   54.03   54.31   54.58
              3.20    48.60   48.89   49.18   49.46   49.75   50.04   50.30   50.56   50.83   51.09   51.35   51.62   51.88   52.14   52.41   52.67   52.94   53.20   53.46   53.73   53.99   54.25   54.52   54.78   55.04
              3.30    49.39   49.67   49.94   50.20   50.45   50.71   50.96   51.21   51.46   51.72   51.97   52.22   52.47   52.72   52.98   53.23   53.48   53.73   53.99   54.24   54.49   54.74   55.00   55.23   55.46
              3.40    50.15   50.39   50.63   50.88   51.12   51.36   51.60   51.84   52.08   52.33   52.57   52.81   53.05   53.29   53.53   53.78   54.02   54.26   54.50   54.74   54.98   55.21   55.43   55.65   55.88
              3.50    50.83   51.06   51.29   51.53   51.76   51.99   52.22   52.45   52.68   52.92   53.15   53.38   53.61   53.84   54.08   54.31   54.54   54.77   55.00   55.22   55.43   55.64   55.85   56.07   56.28
              3.60    51.50   51.72   51.94   52.16   52.38   52.61   52.83   53.05   53.27   53.49   53.72   53.94   54.16   54.38   54.60   54.83   55.04   55.25   55.45   55.66   55.86   56.07   56.27   56.48   56.68
              3.70    52.14   52.35   52.56   52.78   52.99   53.20   53.41   53.63   53.84   54.05   54.27   54.48   54.69   54.91   55.11   55.31   55.50   55.70   55.89   56.09   56.29   56.48   56.68   56.87   57.07
              3.80    52.76   52.96   53.17   53.37   53.58   53.78   53.99   54.19   54.39   54.60   54.80   55.01   55.20   55.38   55.57   55.76   55.95   56.14   56.32   56.51   56.70   56.89   57.08   57.26   57.45
              3.90    53.36   53.55   53.75   53.95   54.14   54.34   54.54   54.74   54.93   55.12   55.30   55.48   55.66   55.84   56.02   56.20   56.38   56.56   56.74   56.92   57.10   57.28   57.46   57.65   57.83
              4.00    53.94   54.13   54.32   54.51   54.70   54.89   55.07   55.24   55.42   55.59   55.76   55.94   56.11   56.28   56.46   56.63   56.80   56.98   57.15   57.33   57.50   57.67   57.85   58.02   58.19
                </tableData>
              </table>
            </ifthen>
          </function>
          <output>propulsion/engine[3]/blade-angle</output>
        </fcs_function>
      </channel>
      <channel name="Landing Gear">
        <kinematic name="fcs/gear-control">
          <input>gear/gear-cmd-norm</input>
          <traverse>
            <setting> <position>0</position> <time>0</time> </setting>
            <setting> <position>1</position> <time>5</time> </setting>
          </traverse>
          <output>gear/gear-pos-norm</output>
        </kinematic>
      </channel>
    </flight_control>
    <aerodynamics>
        <function name="aero/function/mach-lift">
          <description>lift, and damping, over its low-speed value (hangar: aero/mach.py)</description>
          <table>
            <independentVar lookup="row">velocities/mach</independentVar>
            <tableData>
                 0.000     1.000000
                 0.300     1.035304
                 0.500     1.110231
                 0.600     1.174155
                 0.700     1.269322
                 0.800     1.422821
                 0.850     1.542490
                 0.900     1.721789
            </tableData>
          </table>
        </function>
        <function name="aero/function/mach-side">
          <description>side force, rolling and yawing moment over their low-speed values</description>
          <table>
            <independentVar lookup="row">velocities/mach</independentVar>
            <tableData>
                 0.000     1.000000
                 0.300     1.019840
                 0.500     1.061041
                 0.600     1.095361
                 0.700     1.145348
                 0.800     1.224152
                 0.850     1.284937
                 0.900     1.376759
            </tableData>
          </table>
        </function>
        <function name="aero/function/mach-dCm-dCL">
          <description>pitching moment per unit low-speed lift: the neutral point's move</description>
          <table>
            <independentVar lookup="row">velocities/mach</independentVar>
            <tableData>
                 0.000     0.000000
                 0.300    -0.007571
                 0.500    -0.012136
                 0.600    -0.021260
                 0.700    -0.031355
                 0.800    -0.039215
                 0.850    -0.038873
                 0.900    -0.030695
            </tableData>
          </table>
        </function>
        <function name="aero/function/mach-dCD0">
          <description>zero-lift drag's change: friction and wave drag</description>
          <table>
            <independentVar lookup="row">velocities/mach</independentVar>
            <tableData>
                 0.000     0.000000
                 0.300    -0.000119
                 0.500    -0.000324
                 0.600    -0.000430
                 0.700     0.002779
                 0.800     0.093513
                 0.850     0.171099
                 0.900     0.253360
            </tableData>
          </table>
        </function>
        <function name="aero/function/mach-dK">
          <description>induced-drag factor's change (per CL^2)</description>
          <table>
            <independentVar lookup="row">velocities/mach</independentVar>
            <tableData>
                 0.000     0.000000
                 0.300     0.002404
                 0.500     0.006767
                 0.600     0.009849
                 0.700     0.013603
                 0.800     0.018147
                 0.850     0.020788
                 0.900     0.023764
            </tableData>
          </table>
        </function>
        <function name="aero/function/mach-aileron">
          <description>aileron power over its low-speed value</description>
          <table>
            <independentVar lookup="row">velocities/mach</independentVar>
            <tableData>
                 0.000     1.000000
                 0.300     1.031808
                 0.500     1.098590
                 0.600     1.154837
                 0.700     1.237450
                 0.800     1.368275
                 0.850     1.468604
                 0.900     1.617199
            </tableData>
          </table>
        </function>
        <function name="aero/function/mach-elevator">
          <description>elevator power over its low-speed value</description>
          <table>
            <independentVar lookup="row">velocities/mach</independentVar>
            <tableData>
                 0.000     1.000000
                 0.300     1.032088
                 0.500     1.099461
                 0.600     1.156174
                 0.700     1.239352
                 0.800     1.370627
                 0.850     1.470900
                 0.900     1.619187
            </tableData>
          </table>
        </function>
        <function name="aero/function/mach-flap">
          <description>flap power over its low-speed value</description>
          <table>
            <independentVar lookup="row">velocities/mach</independentVar>
            <tableData>
                 0.000     1.000000
                 0.300     1.038268
                 0.500     1.119864
                 0.600     1.189882
                 0.700     1.294810
                 0.800     1.465842
                 0.850     1.600804
                 0.900     1.806065
            </tableData>
          </table>
        </function>
        <function name="aero/function/mach-rudder">
          <description>rudder power over its low-speed value</description>
          <table>
            <independentVar lookup="row">velocities/mach</independentVar>
            <tableData>
                 0.000     1.000000
                 0.300     1.024068
                 0.500     1.073702
                 0.600     1.114598
                 0.700     1.173227
                 0.800     1.262761
                 0.850     1.328826
                 0.900     1.422772
            </tableData>
          </table>
        </function>
        <function name="aero/function/CL-base">
          <description>CL over alpha and beta at low speed</description>
          <table>
            <independentVar lookup="row">aero/alpha-deg</independentVar>
            <independentVar lookup="column">aero/beta-deg</independentVar>
            <tableData>
                        -90.00    -70.00    -50.00    -40.00    -30.00    -25.00    -20.00    -15.00    -10.00     -6.00     -3.00      0.00      3.00      6.00     10.00     15.00     20.00     25.00     30.00     40.00     50.00     70.00     90.00
             -180.00   0.00000   0.01114   0.07467   0.10806   0.13900   0.15247   0.16408   0.17349   0.18042   0.18403   0.18557   0.18609   0.18557   0.18403   0.18042   0.17349   0.16408   0.15247   0.13900   0.10806   0.07467   0.01114   0.00000
             -120.00  -0.00000   0.19154   0.47303   0.61630   0.74316   0.79672   0.84208   0.87829   0.90464   0.91910   0.92565   0.92588   0.92565   0.91910   0.90464   0.87829   0.84208   0.79672   0.74316   0.61630   0.47303   0.19154  -0.00000
              -70.00  -0.00000  -0.16240  -0.42455  -0.56307  -0.68808  -0.74153  -0.78712  -0.82374  -0.85052  -0.86517  -0.86865  -0.86801  -0.86865  -0.86517  -0.85052  -0.82374  -0.78712  -0.74153  -0.68808  -0.56307  -0.42455  -0.16240  -0.00000
              -46.00  -0.00000  -0.27359  -0.72398  -0.95986  -1.17172  -1.26225  -1.33956  -1.40656  -1.44301  -1.46032  -1.46779  -1.47027  -1.46779  -1.46032  -1.44301  -1.40656  -1.33956  -1.26225  -1.17172  -0.95986  -0.72398  -0.27359  -0.00000
              -32.00  -0.00000  -0.28742  -0.78339  -1.04073  -1.26739  -1.36328  -1.44449  -1.50095  -1.54199  -1.56310  -1.57200  -1.57496  -1.57200  -1.56310  -1.54199  -1.50095  -1.44449  -1.36328  -1.26739  -1.04073  -0.78339  -0.28742  -0.00000
              -22.00  -0.00000  -0.28000  -0.87088  -1.20736  -1.53677  -1.66053  -1.76161  -1.84454  -1.90392  -1.93413  -1.94676  -1.95095  -1.94676  -1.93413  -1.90392  -1.84454  -1.76161  -1.66053  -1.53677  -1.20736  -0.87088  -0.28000  -0.00000
              -17.00  -0.00000  -0.24560  -0.80023  -1.03533  -1.19287  -1.27852  -1.35373  -1.41183  -1.45271  -1.47307  -1.48142  -1.48415  -1.48142  -1.47307  -1.45271  -1.41183  -1.35373  -1.27852  -1.19287  -1.03533  -0.80023  -0.24560  -0.00000
              -13.00  -0.00000  -0.20773  -0.59984  -0.72996  -0.84721  -0.91187  -0.96275  -1.00121  -1.02746  -1.03999  -1.04491  -1.04646  -1.04491  -1.03999  -1.02746  -1.00121  -0.96275  -0.91187  -0.84721  -0.72996  -0.59984  -0.20773  -0.00000
               -9.00  -0.00000  -0.12891  -0.34900  -0.42742  -0.49942  -0.53668  -0.56352  -0.58287  -0.59502  -0.59998  -0.60152  -0.60189  -0.60152  -0.59998  -0.59502  -0.58287  -0.56352  -0.53668  -0.49942  -0.42742  -0.34900  -0.12891  -0.00000
               -5.00  -0.00000  -0.04186  -0.09607  -0.12361  -0.15263  -0.16125  -0.16486  -0.16613  -0.16543  -0.16375  -0.16227  -0.16150  -0.16227  -0.16375  -0.16543  -0.16613  -0.16486  -0.16125  -0.15263  -0.12361  -0.09607  -0.04186  -0.00000
               -1.00  -0.00000   0.04572   0.14760   0.16413   0.18722   0.20771   0.22650   0.24225   0.25440   0.26120   0.26443   0.26569   0.26443   0.26120   0.25440   0.24225   0.22650   0.20771   0.18722   0.16413   0.14760   0.04572  -0.00000
                3.00   0.00000   0.13350   0.39511   0.46011   0.53071   0.57962   0.62101   0.65387   0.67739   0.68911   0.69378   0.69526   0.69378   0.68911   0.67739   0.65387   0.62101   0.57962   0.53071   0.46011   0.39511   0.13350   0.00000
                7.00   0.00000   0.21036   0.64856   0.76951   0.88204   0.95680   1.02116   1.07189   1.10782   1.12560   1.13271   1.13490   1.13271   1.12560   1.10782   1.07189   1.02116   0.95680   0.88204   0.76951   0.64856   0.21036   0.00000
               11.00   0.00000   0.26447   0.88558   1.06631   1.22361   1.32650   1.41455   1.48357   1.53268   1.55726   1.56725   1.57045   1.56725   1.55726   1.53268   1.48357   1.41455   1.32650   1.22361   1.06631   0.88558   0.26447   0.00000
               15.00   0.00000   0.28965   0.96623   1.28766   1.54323   1.66970   1.78225   1.87037   1.93346   1.96537   1.97855   1.98285   1.97855   1.96537   1.93346   1.87037   1.78225   1.66970   1.54323   1.28766   0.96623   0.28965   0.00000
               19.00   0.00000   0.29198   0.87820   1.24101   1.51920   1.64085   1.74961   1.83514   1.89291   1.92094   1.93228   1.93594   1.93228   1.92094   1.89291   1.83514   1.74961   1.64085   1.51920   1.24101   0.87820   0.29198   0.00000
               23.00   0.00000   0.28772   0.80648   1.09891   1.38258   1.50672   1.61060   1.68453   1.73636   1.76254   1.77346   1.77709   1.77346   1.76254   1.73636   1.68453   1.61060   1.50672   1.38258   1.09891   0.80648   0.28772   0.00000
               27.00   0.00000   0.28233   0.78492   1.04885   1.29428   1.40403   1.48945   1.55284   1.59605   1.61493   1.61577   1.61688   1.61577   1.61493   1.59605   1.55284   1.48945   1.40403   1.29428   1.04885   0.78492   0.28233   0.00000
               32.00   0.00000   0.28242   0.76950   1.02236   1.24666   1.34270   1.42330   1.48046   1.52074   1.54137   1.55004   1.55293   1.55004   1.54137   1.52074   1.48046   1.42330   1.34270   1.24666   1.02236   0.76950   0.28242   0.00000
               46.00   0.00000   0.26848   0.70621   0.93446   1.13711   1.22275   1.29538   1.35716   1.39190   1.40722   1.41384   1.41604   1.41384   1.40722   1.39190   1.35716   1.29538   1.22275   1.13711   0.93446   0.70621   0.26848   0.00000
               70.00   0.00000   0.15208   0.38831   0.51163   0.62237   0.66957   0.70976   0.74201   0.76557   0.77854   0.78130   0.78042   0.78130   0.77854   0.76557   0.74201   0.70976   0.66957   0.62237   0.51163   0.38831   0.15208   0.00000
              120.00   0.00000  -0.19700  -0.49210  -0.64335  -0.77772  -0.83456  -0.88275  -0.92126  -0.94930  -0.96465  -0.97157  -0.97193  -0.97157  -0.96465  -0.94930  -0.92126  -0.88275  -0.83456  -0.77772  -0.64335  -0.49210  -0.19700   0.00000
              180.00   0.00000   0.01114   0.07467   0.10806   0.13900   0.15247   0.16408   0.17349   0.18042   0.18403   0.18557   0.18609   0.18557   0.18403   0.18042   0.17349   0.16408   0.15247   0.13900   0.10806   0.07467   0.01114   0.00000
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            </tableData>
          </table>
        </function>
      <axis name="DRAG">
        <function name="aero/coefficient/CD_base">
          <description>CD over alpha and beta (hangar)</description>
          <product>
            <property>aero/qbar-psf</property>
            <property>metrics/Sw-sqft</property>
          <table>
            <independentVar lookup="row">aero/alpha-deg</independentVar>
            <independentVar lookup="column">aero/beta-deg</independentVar>
            <tableData>
                        -90.00    -70.00    -50.00    -40.00    -30.00    -25.00    -20.00    -15.00    -10.00     -6.00     -3.00      0.00      3.00      6.00     10.00     15.00     20.00     25.00     30.00     40.00     50.00     70.00     90.00
             -180.00   0.98986   0.79133   0.42658   0.25926   0.13418   0.09065   0.05958   0.03972   0.02658   0.02427   0.02445   0.02463   0.02445   0.02427   0.02658   0.03972   0.05958   0.09065   0.13418   0.25926   0.42658   0.79133   0.98986
              -35.00   0.98986   0.92881   0.78324   0.73584   0.73270   0.74735   0.77273   0.77469   0.77818   0.78029   0.78119   0.78148   0.78119   0.78029   0.77818   0.77469   0.77273   0.74735   0.73270   0.73584   0.78324   0.92881   0.98986
              -11.00   0.98986   0.87874   0.54927   0.38354   0.26712   0.19267   0.14255   0.10541   0.07959   0.06687   0.06167   0.05997   0.06167   0.06687   0.07959   0.10541   0.14255   0.19267   0.26712   0.38354   0.54927   0.87874   0.98986
                4.00   0.98986   0.87521   0.53647   0.36456   0.24816   0.16758   0.11785   0.08190   0.05873   0.04791   0.04335   0.04186   0.04335   0.04791   0.05873   0.08190   0.11785   0.16758   0.24816   0.36456   0.53647   0.87521   0.98986
               19.00   0.98986   0.89356   0.62144   0.50804   0.43724   0.37587   0.33732   0.31284   0.29419   0.28284   0.27748   0.27546   0.27748   0.28284   0.29419   0.31284   0.33732   0.37587   0.43724   0.50804   0.62144   0.89356   0.98986
               42.00   0.98986   0.95198   0.90317   0.91946   0.97085   1.00559   1.04419   1.07877   1.09308   1.10107   1.10457   1.10573   1.10457   1.10107   1.09308   1.07877   1.04419   1.00559   0.97085   0.91946   0.90317   0.95198   0.98986
              180.00   0.98986   0.79133   0.42658   0.25926   0.13418   0.09065   0.05958   0.03972   0.02658   0.02427   0.02445   0.02463   0.02445   0.02427   0.02658   0.03972   0.05958   0.09065   0.13418   0.25926   0.42658   0.79133   0.98986
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            </tableData>
          </table>
          </product>
        </function>
        <function name="aero/coefficient/CD_mach">
          <description>zero-lift drag's change with Mach: friction, wave drag</description>
          <product>
            <property>aero/qbar-psf</property>
            <property>metrics/Sw-sqft</property>
            <property>aero/function/mach-dCD0</property>
          </product>
        </function>
        <function name="aero/coefficient/CD_induced_mach">
          <description>induced drag's change with Mach (leading-edge suction lost)</description>
          <product>
            <property>aero/qbar-psf</property>
            <property>metrics/Sw-sqft</property>
            <property>aero/cl-squared</property>
            <property>aero/function/mach-dK</property>
          </product>
        </function>
        <function name="aero/coefficient/CD_aileron">
          <description>CD increment from aileron (deg), over alpha</description>
          <product>
            <property>aero/qbar-psf</property>
            <property>metrics/Sw-sqft</property>
            <property>aero/function/mach-aileron</property>
          <table>
            <independentVar lookup="row">aero/alpha-deg</independentVar>
            <independentVar lookup="column">fcs/left-aileron-pos-deg</independentVar>
            <tableData>
                        -20.00    -15.00    -10.00     -5.00      0.00      5.00     10.00     15.00     20.00
             -180.00   0.00363   0.00208   0.00094   0.00024   0.00000   0.00024   0.00094   0.00208   0.00363
              -35.00   0.00971   0.00621   0.00311   0.00084   0.00000   0.00084   0.00311   0.00621   0.00971
              -11.00   0.00951   0.00629   0.00324   0.00088   0.00000   0.00088   0.00324   0.00629   0.00951
                4.00   0.00947   0.00628   0.00323   0.00088   0.00000   0.00088   0.00323   0.00628   0.00947
               19.00   0.04305   0.03169   0.01887   0.00666   0.00000   0.00666   0.01887   0.03169   0.04305
               42.00   0.00977   0.00623   0.00309   0.00083   0.00000   0.00083   0.00309   0.00623   0.00977
              180.00   0.00363   0.00208   0.00094   0.00024   0.00000   0.00024   0.00094   0.00208   0.00363
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            </tableData>
          </table>
          </product>
        </function>
        <function name="aero/coefficient/CD_elevator">
          <description>CD increment from elevator (deg), over alpha</description>
          <product>
            <property>aero/qbar-psf</property>
            <property>metrics/Sw-sqft</property>
            <property>aero/function/mach-elevator</property>
          <table>
            <independentVar lookup="row">aero/alpha-deg</independentVar>
            <independentVar lookup="column">fcs/elevator-pos-deg</independentVar>
            <tableData>
                        -25.00    -20.00    -15.00    -10.00     -5.00      0.00      5.00     10.00     15.00
             -180.00   0.00873   0.00572   0.00327   0.00147   0.00037   0.00000   0.00037   0.00147   0.00327
              -35.00   0.00054  -0.00017  -0.00063  -0.00097  -0.00099   0.00000   0.00274   0.00756   0.01413
              -11.00   0.03669   0.03067   0.02400   0.01614   0.00760   0.00000  -0.00541  -0.00812  -0.00831
                4.00   0.00676   0.00311   0.00008  -0.00193  -0.00217   0.00000   0.00453   0.01057   0.01676
               19.00  -0.02402  -0.02482  -0.02362  -0.01927  -0.01116   0.00000   0.01292   0.02584   0.03689
               42.00   0.03052   0.02228   0.01474   0.00809   0.00297   0.00000  -0.00076   0.00016   0.00189
              180.00   0.00873   0.00572   0.00327   0.00147   0.00037   0.00000   0.00037   0.00147   0.00327
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            </tableData>
          </table>
          </product>
        </function>
        <function name="aero/coefficient/CD_flap">
          <description>CD increment from flap (deg), over alpha</description>
          <product>
            <property>aero/qbar-psf</property>
            <property>metrics/Sw-sqft</property>
            <property>aero/function/mach-flap</property>
          <table>
            <independentVar lookup="row">aero/alpha-deg</independentVar>
            <independentVar lookup="column">fcs/flap-pos-deg</independentVar>
            <tableData>
                          0.00      5.00     10.00     15.00     20.00     25.00     30.00     35.00
             -180.00   0.00000   0.00050   0.00197   0.00438   0.00765   0.01168   0.01635   0.02152
              -35.00   0.00000   0.01887   0.04301   0.07096   0.10155   0.13407   0.16771   0.20131
              -11.00   0.00000  -0.00613  -0.00772  -0.00481   0.00185   0.01130   0.02286   0.03623
                4.00   0.00000   0.01097   0.02608   0.04419   0.06387   0.08416   0.10485   0.12620
               19.00   0.00000   0.01304   0.04520   0.08998   0.14011   0.19050   0.23975   0.28795
               42.00   0.00000  -0.02054  -0.03687  -0.04877  -0.05693  -0.06226  -0.06547  -0.06707
              180.00   0.00000   0.00050   0.00197   0.00438   0.00765   0.01168   0.01635   0.02152
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            </tableData>
          </table>
          </product>
        </function>
        <function name="aero/coefficient/CD_rudder">
          <description>CD increment from rudder (deg), over alpha</description>
          <product>
            <property>aero/qbar-psf</property>
            <property>metrics/Sw-sqft</property>
            <property>aero/function/mach-rudder</property>
          <table>
            <independentVar lookup="row">aero/alpha-deg</independentVar>
            <independentVar lookup="column">fcs/rudder-pos-deg</independentVar>
            <tableData>
                        -35.00    -30.00    -25.00    -20.00    -15.00    -10.00     -5.00      0.00      5.00     10.00     15.00     20.00     25.00     30.00     35.00
             -180.00   0.01089   0.00828   0.00591   0.00387   0.00222   0.00100   0.00025   0.00000   0.00025   0.00100   0.00222   0.00387   0.00591   0.00828   0.01089
              -35.00   0.01651   0.01364   0.01098   0.00839   0.00573   0.00301   0.00083   0.00000   0.00083   0.00301   0.00573   0.00839   0.01098   0.01364   0.01651
              -11.00   0.02450   0.02009   0.01602   0.01213   0.00821   0.00430   0.00119   0.00000   0.00119   0.00430   0.00821   0.01213   0.01602   0.02009   0.02450
                4.00   0.02486   0.02035   0.01619   0.01223   0.00826   0.00431   0.00119   0.00000   0.00119   0.00431   0.00826   0.01223   0.01619   0.02035   0.02486
               19.00   0.02130   0.01746   0.01393   0.01055   0.00714   0.00374   0.00103   0.00000   0.00103   0.00374   0.00714   0.01055   0.01393   0.01746   0.02130
               42.00   0.01465   0.01215   0.00984   0.00759   0.00523   0.00276   0.00076   0.00000   0.00076   0.00276   0.00523   0.00759   0.00984   0.01215   0.01465
              180.00   0.01089   0.00828   0.00591   0.00387   0.00222   0.00100   0.00025   0.00000   0.00025   0.00100   0.00222   0.00387   0.00591   0.00828   0.01089
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            </tableData>
          </table>
          </product>
        </function>
        <function name="aero/coefficient/CD_ground">
          <description>Induced drag change in ground effect</description>
          <product>
            <property>aero/qbar-psf</property>
            <property>metrics/Sw-sqft</property>
            <property>aero/cl-squared</property>
            <value>0.03742</value>
          <table>
            <independentVar lookup="row">aero/h_b-mac-ft</independentVar>
            <tableData>
                    0.00   -1.00000
                    0.10   -0.28090
                    0.20   -0.08897
                    0.40   -0.02383
                    0.60   -0.01073
                    0.80   -0.00607
                    1.00   -0.00389
                    1.10   -0.00322
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            </tableData>
          </table>
          </product>
        </function>
        <function name="aero/coefficient/CD_gear">
          <description>the gear extended: its wheels' and struts' drag by Raymer's components, 1.01 m2 (hangar)</description>
          <product>
            <property>aero/qbar-psf</property>
            <property>metrics/Sw-sqft</property>
            <value>0.00618625</value>
            <property>gear/gear-pos-norm</property>
          </product>
        </function>
      </axis>
      <axis name="SIDE">
        <function name="aero/coefficient/CY_base">
          <description>CY over alpha and beta (hangar)</description>
          <product>
            <property>aero/qbar-psf</property>
            <property>metrics/Sw-sqft</property>
            <property>aero/function/mach-side</property>
          <table>
            <independentVar lookup="row">aero/alpha-deg</independentVar>
            <independentVar lookup="column">aero/beta-deg</independentVar>
            <tableData>
                        -90.00    -70.00    -50.00    -40.00    -30.00    -25.00    -20.00    -15.00    -10.00     -6.00     -3.00      0.00      3.00      6.00     10.00     15.00     20.00     25.00     30.00     40.00     50.00     70.00     90.00
             -180.00  -0.00000   0.28848   0.34885   0.29028   0.19884   0.14974   0.10325   0.06268   0.06263   0.07334   0.03804  -0.00000  -0.03804  -0.07334  -0.06263  -0.06268  -0.10325  -0.14974  -0.19884  -0.29028  -0.34885  -0.28848   0.00000
              -35.00   0.00000   0.17881   0.18412   0.14009   0.09992   0.09233   0.12257   0.08477   0.05212   0.02995   0.01475  -0.00000  -0.01475  -0.02995  -0.05212  -0.08477  -0.12257  -0.09233  -0.09992  -0.14009  -0.18412  -0.17881  -0.00000
              -11.00   0.00000   0.31669   0.43767   0.40830   0.36442   0.36135   0.29186   0.21397   0.13802   0.08058   0.03966  -0.00000  -0.03966  -0.08058  -0.13802  -0.21397  -0.29186  -0.36135  -0.36442  -0.40830  -0.43767  -0.31669  -0.00000
                4.00   0.00000   0.32566   0.44844   0.41662   0.37089   0.36171   0.29247   0.21188   0.13407   0.07645   0.03675  -0.00000  -0.03675  -0.07645  -0.13407  -0.21188  -0.29247  -0.36171  -0.37089  -0.41662  -0.44844  -0.32566  -0.00000
               19.00   0.00000   0.26836   0.35055   0.30578   0.26989   0.23979   0.19914   0.15775   0.10194   0.05917   0.02882  -0.00000  -0.02882  -0.05917  -0.10194  -0.15775  -0.19914  -0.23979  -0.26989  -0.30578  -0.35055  -0.26836  -0.00000
               42.00   0.00000   0.11678   0.05078  -0.00612  -0.04304  -0.04507  -0.03044   0.01384   0.00459   0.00049  -0.00002  -0.00000   0.00002  -0.00049  -0.00459  -0.01384   0.03044   0.04507   0.04304   0.00612  -0.05078  -0.11678  -0.00000
              180.00  -0.00000   0.28848   0.34885   0.29028   0.19884   0.14974   0.10325   0.06268   0.06263   0.07334   0.03804  -0.00000  -0.03804  -0.07334  -0.06263  -0.06268  -0.10325  -0.14974  -0.19884  -0.29028  -0.34885  -0.28848   0.00000
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            </tableData>
          </table>
          </product>
        </function>
        <function name="aero/coefficient/CY_aileron">
          <description>CY increment from aileron (deg), over alpha</description>
          <product>
            <property>aero/qbar-psf</property>
            <property>metrics/Sw-sqft</property>
            <property>aero/function/mach-aileron</property>
          <table>
            <independentVar lookup="row">aero/alpha-deg</independentVar>
            <independentVar lookup="column">fcs/left-aileron-pos-deg</independentVar>
            <tableData>
                        -20.00    -15.00    -10.00     -5.00      0.00      5.00     10.00     15.00     20.00
             -180.00   0.00000   0.00000   0.00000   0.00000   0.00000   0.00000   0.00000   0.00000   0.00000
              -35.00  -0.00236  -0.00211  -0.00162  -0.00088   0.00000   0.00088   0.00162   0.00211   0.00236
              -11.00  -0.00424  -0.00362  -0.00269  -0.00143   0.00000   0.00143   0.00269   0.00362   0.00424
                4.00  -0.00478  -0.00408  -0.00304  -0.00162   0.00000   0.00162   0.00304   0.00408   0.00478
               19.00  -0.02805  -0.02469  -0.01956  -0.01178   0.00000   0.01178   0.01956   0.02469   0.02805
               42.00  -0.00613  -0.00520  -0.00387  -0.00206   0.00000   0.00206   0.00387   0.00520   0.00613
              180.00   0.00000   0.00000   0.00000   0.00000   0.00000   0.00000   0.00000   0.00000   0.00000
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            </tableData>
          </table>
          </product>
        </function>
        <function name="aero/coefficient/CY_rudder">
          <description>CY increment from rudder (deg), over alpha</description>
          <product>
            <property>aero/qbar-psf</property>
            <property>metrics/Sw-sqft</property>
            <property>aero/function/mach-rudder</property>
          <table>
            <independentVar lookup="row">aero/alpha-deg</independentVar>
            <independentVar lookup="column">fcs/rudder-pos-deg</independentVar>
            <tableData>
                        -35.00    -30.00    -25.00    -20.00    -15.00    -10.00     -5.00      0.00      5.00     10.00     15.00     20.00     25.00     30.00     35.00
             -180.00   0.00000   0.00000   0.00000   0.00000   0.00000   0.00000   0.00000   0.00000   0.00000   0.00000   0.00000   0.00000   0.00000   0.00000   0.00000
              -35.00  -0.07689  -0.07182  -0.06657  -0.06027  -0.05140  -0.03814  -0.02027   0.00000   0.02027   0.03814   0.05140   0.06027   0.06657   0.07182   0.07689
              -11.00  -0.11121  -0.10399  -0.09651  -0.08752  -0.07475  -0.05561  -0.02965   0.00000   0.02965   0.05561   0.07475   0.08752   0.09651   0.10399   0.11121
                4.00  -0.11592  -0.10832  -0.10046  -0.09104  -0.07770  -0.05777  -0.03078   0.00000   0.03078   0.05777   0.07770   0.09104   0.10046   0.10832   0.11592
               19.00  -0.10486  -0.09808  -0.09106  -0.08261  -0.07057  -0.05249  -0.02796   0.00000   0.02796   0.05249   0.07057   0.08261   0.09106   0.09808   0.10486
               42.00  -0.08319  -0.07758  -0.07179  -0.06491  -0.05526  -0.04076  -0.02156   0.00000   0.02156   0.04076   0.05526   0.06491   0.07179   0.07758   0.08319
              180.00   0.00000   0.00000   0.00000   0.00000   0.00000   0.00000   0.00000   0.00000   0.00000   0.00000   0.00000   0.00000   0.00000   0.00000   0.00000
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            </tableData>
          </table>
          </product>
        </function>
        <function name="aero/coefficient/CYp">
          <description>CY per p (non-dimensional), over alpha</description>
          <product>
            <property>aero/qbar-psf</property>
            <property>metrics/Sw-sqft</property>
            <property>aero/bi2vel</property>
            <property>velocities/p-aero-rad_sec</property>
            <property>aero/function/mach-lift</property>
          <table>
            <independentVar lookup="row">aero/alpha-deg</independentVar>
            <tableData>
                 -180.00   -0.19995
                 -165.00   -0.11095
                  -32.00   -0.10458
                  -10.00   -0.05885
                    5.00   -0.07310
                   20.00    0.77347
                   46.00    0.00747
                  180.00   -0.19995
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            </tableData>
          </table>
          </product>
        </function>
        <function name="aero/coefficient/CYr">
          <description>CY per r (non-dimensional), over alpha</description>
          <product>
            <property>aero/qbar-psf</property>
            <property>metrics/Sw-sqft</property>
            <property>aero/bi2vel</property>
            <property>velocities/r-aero-rad_sec</property>
            <property>aero/function/mach-lift</property>
          <table>
            <independentVar lookup="row">aero/alpha-deg</independentVar>
            <tableData>
                 -180.00    0.51332
                 -165.00    0.50018
                  -32.00    0.32810
                  -10.00    0.41843
                    5.00    0.43639
                   20.00    0.76930
                   46.00    0.42328
                  180.00    0.51332
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            </tableData>
          </table>
          </product>
        </function>
      </axis>
      <axis name="LIFT">
        <function name="aero/coefficient/CL_base">
          <description>CL over alpha and beta, ground effect, compressibility (hangar)</description>
          <product>
            <property>aero/qbar-psf</property>
            <property>metrics/Sw-sqft</property>
            <property>aero/function/CL-base</property>
            <property>aero/function/mach-lift</property>
          <table>
            <independentVar lookup="row">aero/h_b-mac-ft</independentVar>
            <tableData>
                    0.00    1.20000
                    0.10    1.08692
                    0.20    1.03778
                    0.40    1.00713
                    0.60    1.00135
                    0.80    1.00025
                    1.00    1.00005
                    1.10    1.00000
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            </tableData>
          </table>
          </product>
        </function>
        <function name="aero/coefficient/CL_elevator">
          <description>CL increment from elevator (deg), over alpha</description>
          <product>
            <property>aero/qbar-psf</property>
            <property>metrics/Sw-sqft</property>
            <property>aero/function/mach-elevator</property>
          <table>
            <independentVar lookup="row">aero/alpha-deg</independentVar>
            <independentVar lookup="column">fcs/elevator-pos-deg</independentVar>
            <tableData>
                        -25.00    -20.00    -15.00    -10.00     -5.00      0.00      5.00     10.00     15.00
             -180.00   0.00000   0.00000   0.00000   0.00000   0.00000   0.00000   0.00000   0.00000   0.00000
              -35.00  -0.06387  -0.06071  -0.05458  -0.04303  -0.02434   0.00000   0.02654   0.05075   0.06833
              -11.00  -0.19701  -0.18032  -0.15537  -0.11645  -0.06243   0.00000   0.06293   0.11825   0.15878
                4.00  -0.20772  -0.18924  -0.16228  -0.12102  -0.06452   0.00000   0.06432   0.12026   0.16081
               19.00  -0.17805  -0.15895  -0.13351  -0.09749  -0.05098   0.00000   0.04945   0.09197   0.12320
               42.00  -0.08982  -0.08338  -0.07257  -0.05464  -0.02925   0.00000   0.02894   0.05375   0.07157
              180.00   0.00000   0.00000   0.00000   0.00000   0.00000   0.00000   0.00000   0.00000   0.00000
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            </tableData>
          </table>
          </product>
        </function>
        <function name="aero/coefficient/CL_flap">
          <description>CL increment from flap (deg), over alpha</description>
          <product>
            <property>aero/qbar-psf</property>
            <property>metrics/Sw-sqft</property>
            <property>aero/function/mach-flap</property>
          <table>
            <independentVar lookup="row">aero/alpha-deg</independentVar>
            <independentVar lookup="column">fcs/flap-pos-deg</independentVar>
            <tableData>
                          0.00      5.00     10.00     15.00     20.00     25.00     30.00     35.00
             -180.00   0.00000   0.00000   0.00000   0.00000   0.00000   0.00000   0.00000   0.00000
              -35.00   0.00000   0.06998   0.14251   0.21262   0.27532   0.32812   0.37246   0.41158
              -11.00   0.00000   0.17395   0.34805   0.51227   0.65966   0.78946   0.90575   1.01430
                4.00   0.00000   0.16759   0.33413   0.49009   0.62896   0.75019   0.85811   0.95816
               19.00   0.00000   0.16158   0.31497   0.45281   0.57093   0.67039   0.75449   0.82724
               42.00   0.00000   0.05969   0.11796   0.17116   0.21689   0.25512   0.28733   0.31522
              180.00   0.00000   0.00000   0.00000   0.00000   0.00000   0.00000   0.00000   0.00000
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            </tableData>
          </table>
          <table>
            <independentVar lookup="row">aero/h_b-mac-ft</independentVar>
            <tableData>
                    0.00    1.20000
                    0.10    1.08692
                    0.20    1.03778
                    0.40    1.00713
                    0.60    1.00135
                    0.80    1.00025
                    1.00    1.00005
                    1.10    1.00000
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            </tableData>
          </table>
          </product>
        </function>
        <function name="aero/coefficient/CLq">
          <description>CL per q (non-dimensional), over alpha</description>
          <product>
            <property>aero/qbar-psf</property>
            <property>metrics/Sw-sqft</property>
            <property>aero/ci2vel</property>
            <property>velocities/q-aero-rad_sec</property>
            <property>aero/function/mach-lift</property>
          <table>
            <independentVar lookup="row">aero/alpha-deg</independentVar>
            <tableData>
                 -180.00   -2.96914
                 -165.00   -0.48490
                  -32.00    0.38999
                  -10.00   14.11134
                    5.00   14.30336
                   20.00   -0.27541
                   46.00    2.69776
                  180.00   -2.96914
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            </tableData>
          </table>
          </product>
        </function>
        <function name="aero/coefficient/CLadot">
          <description>CL per alpha-dot (downwash lag at the tail)</description>
          <product>
            <property>aero/qbar-psf</property>
            <property>metrics/Sw-sqft</property>
            <property>aero/ci2vel</property>
            <property>aero/alphadot-rad_sec</property>
            <value>1.78978</value>
            <property>aero/function/mach-lift</property>
          </product>
        </function>
      </axis>
      <axis name="ROLL">
        <function name="aero/coefficient/Cl_base">
          <description>Cl over alpha and beta (hangar)</description>
          <product>
            <property>aero/qbar-psf</property>
            <property>metrics/Sw-sqft</property>
            <property>metrics/bw-ft</property>
            <property>aero/function/mach-side</property>
          <table>
            <independentVar lookup="row">aero/alpha-deg</independentVar>
            <independentVar lookup="column">aero/beta-deg</independentVar>
            <tableData>
                        -90.00    -70.00    -50.00    -40.00    -30.00    -25.00    -20.00    -15.00    -10.00     -6.00     -3.00      0.00      3.00      6.00     10.00     15.00     20.00     25.00     30.00     40.00     50.00     70.00     90.00
             -180.00  -0.03144  -0.01352   0.00958   0.01595   0.01827   0.01780   0.01622   0.01358   0.01173   0.00981   0.00525  -0.00000  -0.00525  -0.00981  -0.01173  -0.01358  -0.01622  -0.01780  -0.01827  -0.01595  -0.00958   0.01352   0.03144
              -35.00  -0.03144  -0.02830  -0.01892  -0.00963  -0.00032   0.00331   0.00805   0.00739   0.00545   0.00343   0.00176  -0.00000  -0.00176  -0.00343  -0.00545  -0.00739  -0.00805  -0.00331   0.00032   0.00963   0.01892   0.02830   0.03144
              -11.00  -0.03144  -0.01304   0.00776   0.01813   0.02249   0.02465   0.02257   0.01834   0.01302   0.00810   0.00412  -0.00000  -0.00412  -0.00810  -0.01302  -0.01834  -0.02257  -0.02465  -0.02249  -0.01813  -0.00776   0.01304   0.03144
                4.00  -0.03144  -0.01255   0.00932   0.02067   0.02516   0.02726   0.02533   0.02057   0.01463   0.00916   0.00470  -0.00000  -0.00470  -0.00916  -0.01463  -0.02057  -0.02533  -0.02726  -0.02516  -0.02067  -0.00932   0.01255   0.03144
               19.00  -0.03144  -0.03531  -0.02846  -0.01680  -0.00348   0.00082   0.00292   0.00465   0.00307   0.00161   0.00070  -0.00000  -0.00070  -0.00161  -0.00307  -0.00465  -0.00292  -0.00082   0.00348   0.01680   0.02846   0.03531   0.03144
               42.00  -0.03144  -0.02694  -0.01777  -0.01154  -0.00412  -0.00102   0.00153   0.00505   0.00422   0.00265   0.00136  -0.00000  -0.00136  -0.00265  -0.00422  -0.00505  -0.00153   0.00102   0.00412   0.01154   0.01777   0.02694   0.03144
              180.00  -0.03144  -0.01352   0.00958   0.01595   0.01827   0.01780   0.01622   0.01358   0.01173   0.00981   0.00525  -0.00000  -0.00525  -0.00981  -0.01173  -0.01358  -0.01622  -0.01780  -0.01827  -0.01595  -0.00958   0.01352   0.03144
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            </tableData>
          </table>
          </product>
        </function>
        <function name="aero/coefficient/Cl_aileron">
          <description>Cl increment from aileron (deg), over alpha</description>
          <product>
            <property>aero/qbar-psf</property>
            <property>metrics/Sw-sqft</property>
            <property>metrics/bw-ft</property>
            <property>aero/function/mach-aileron</property>
          <table>
            <independentVar lookup="row">aero/alpha-deg</independentVar>
            <independentVar lookup="column">fcs/left-aileron-pos-deg</independentVar>
            <tableData>
                        -20.00    -15.00    -10.00     -5.00      0.00      5.00     10.00     15.00     20.00
             -180.00   0.00000   0.00000   0.00000   0.00000   0.00000   0.00000   0.00000   0.00000   0.00000
              -35.00  -0.01406  -0.01293  -0.01016  -0.00559   0.00000   0.00559   0.01016   0.01293   0.01406
              -11.00  -0.05486  -0.04680  -0.03477  -0.01852   0.00000   0.01852   0.03477   0.04680   0.05486
                4.00  -0.05488  -0.04688  -0.03488  -0.01859   0.00000   0.01859   0.03488   0.04688   0.05488
               19.00  -0.07006  -0.05977  -0.04457  -0.02405   0.00000   0.02405   0.04457   0.05977   0.07006
               42.00  -0.01079  -0.01004  -0.00795  -0.00438   0.00000   0.00438   0.00795   0.01004   0.01079
              180.00   0.00000   0.00000   0.00000   0.00000   0.00000   0.00000   0.00000   0.00000   0.00000
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            </tableData>
          </table>
          </product>
        </function>
        <function name="aero/coefficient/Cl_rudder">
          <description>Cl increment from rudder (deg), over alpha</description>
          <product>
            <property>aero/qbar-psf</property>
            <property>metrics/Sw-sqft</property>
            <property>metrics/bw-ft</property>
            <property>aero/function/mach-rudder</property>
          <table>
            <independentVar lookup="row">aero/alpha-deg</independentVar>
            <independentVar lookup="column">fcs/rudder-pos-deg</independentVar>
            <tableData>
                        -35.00    -30.00    -25.00    -20.00    -15.00    -10.00     -5.00      0.00      5.00     10.00     15.00     20.00     25.00     30.00     35.00
             -180.00   0.00000   0.00000   0.00000   0.00000   0.00000   0.00000   0.00000   0.00000   0.00000   0.00000   0.00000   0.00000   0.00000   0.00000   0.00000
              -35.00  -0.00499  -0.00464  -0.00428  -0.00385  -0.00327  -0.00242  -0.00129   0.00000   0.00129   0.00242   0.00327   0.00385   0.00428   0.00464   0.00499
              -11.00  -0.00649  -0.00602  -0.00554  -0.00498  -0.00422  -0.00312  -0.00166   0.00000   0.00166   0.00312   0.00422   0.00498   0.00554   0.00602   0.00649
                4.00  -0.00685  -0.00636  -0.00586  -0.00527  -0.00447  -0.00330  -0.00175   0.00000   0.00175   0.00330   0.00447   0.00527   0.00586   0.00636   0.00685
               19.00  -0.00664  -0.00618  -0.00570  -0.00514  -0.00437  -0.00324  -0.00172   0.00000   0.00172   0.00324   0.00437   0.00514   0.00570   0.00618   0.00664
               42.00  -0.00527  -0.00489  -0.00451  -0.00405  -0.00344  -0.00253  -0.00134   0.00000   0.00134   0.00253   0.00344   0.00405   0.00451   0.00489   0.00527
              180.00   0.00000   0.00000   0.00000   0.00000   0.00000   0.00000   0.00000   0.00000   0.00000   0.00000   0.00000   0.00000   0.00000   0.00000   0.00000
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            </tableData>
          </table>
          </product>
        </function>
        <function name="aero/coefficient/Clp">
          <description>Cl per p (non-dimensional), over alpha</description>
          <product>
            <property>aero/qbar-psf</property>
            <property>metrics/Sw-sqft</property>
            <property>metrics/bw-ft</property>
            <property>aero/bi2vel</property>
            <property>velocities/p-aero-rad_sec</property>
            <property>aero/function/mach-lift</property>
          <table>
            <independentVar lookup="row">aero/alpha-deg</independentVar>
            <tableData>
                 -180.00   -0.73629
                 -165.00   -0.21259
                  -32.00   -0.17057
                  -10.00   -0.56145
                    5.00   -0.56304
                   20.00    0.41121
                   46.00   -0.26145
                  180.00   -0.73629
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            </tableData>
          </table>
          </product>
        </function>
        <function name="aero/coefficient/Clr">
          <description>Cl per r (non-dimensional), over alpha</description>
          <product>
            <property>aero/qbar-psf</property>
            <property>metrics/Sw-sqft</property>
            <property>metrics/bw-ft</property>
            <property>aero/bi2vel</property>
            <property>velocities/r-aero-rad_sec</property>
            <property>aero/function/mach-lift</property>
          <table>
            <independentVar lookup="row">aero/alpha-deg</independentVar>
            <tableData>
                 -180.00    0.06723
                 -165.00    0.08695
                  -32.00   -0.26797
                  -10.00   -0.00906
                    5.00    0.17681
                   20.00    0.68221
                   46.00    0.23491
                  180.00    0.06723
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            </tableData>
          </table>
          </product>
        </function>
      </axis>
      <axis name="PITCH">
        <function name="aero/coefficient/Cm_base">
          <description>Cm over alpha and beta (hangar)</description>
          <product>
            <property>aero/qbar-psf</property>
            <property>metrics/Sw-sqft</property>
            <property>metrics/cbarw-ft</property>
          <table>
            <independentVar lookup="row">aero/alpha-deg</independentVar>
            <independentVar lookup="column">aero/beta-deg</independentVar>
            <tableData>
                        -90.00    -70.00    -50.00    -40.00    -30.00    -25.00    -20.00    -15.00    -10.00     -6.00     -3.00      0.00      3.00      6.00     10.00     15.00     20.00     25.00     30.00     40.00     50.00     70.00     90.00
             -180.00  -0.00000   0.00681   0.04112   0.05937   0.07627   0.08364   0.08998   0.09512   0.10333   0.10491   0.10259   0.10169   0.10259   0.10491   0.10333   0.09512   0.08998   0.08364   0.07627   0.05937   0.04112   0.00681  -0.00000
              -35.00  -0.00000   0.06915   0.25508   0.35773   0.44300   0.47878   0.50567   0.52236   0.53535   0.54169   0.54428   0.54512   0.54428   0.54169   0.53535   0.52236   0.50567   0.47878   0.44300   0.35773   0.25508   0.06915  -0.00000
              -11.00  -0.00000   0.09507   0.28132   0.28208   0.29604   0.30496   0.33829   0.36764   0.38892   0.39987   0.40447   0.40599   0.40447   0.39987   0.38892   0.36764   0.33829   0.30496   0.29604   0.28208   0.28132   0.09507  -0.00000
                4.00  -0.00000  -0.05016  -0.11527  -0.06343  -0.04835  -0.05108  -0.04947  -0.04679  -0.04552  -0.04542  -0.04569  -0.04587  -0.04569  -0.04542  -0.04552  -0.04679  -0.04947  -0.05108  -0.04835  -0.06343  -0.11527  -0.05016  -0.00000
               19.00  -0.00000  -0.09051  -0.35545  -0.56078  -0.55518  -0.54637  -0.57889  -0.60837  -0.62520  -0.63340  -0.63657  -0.63752  -0.63657  -0.63340  -0.62520  -0.60837  -0.57889  -0.54637  -0.55518  -0.56078  -0.35545  -0.09051  -0.00000
               42.00  -0.00000  -0.08132  -0.30068  -0.42905  -0.54089  -0.58678  -0.62830  -0.66010  -0.65553  -0.65260  -0.65129  -0.65077  -0.65129  -0.65260  -0.65553  -0.66010  -0.62830  -0.58678  -0.54089  -0.42905  -0.30068  -0.08132  -0.00000
              180.00  -0.00000   0.00681   0.04112   0.05937   0.07627   0.08364   0.08998   0.09512   0.10333   0.10491   0.10259   0.10169   0.10259   0.10491   0.10333   0.09512   0.08998   0.08364   0.07627   0.05937   0.04112   0.00681  -0.00000
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            </tableData>
          </table>
          </product>
        </function>
        <function name="aero/coefficient/Cm_mach">
          <description>Cm from the neutral point's move with Mach</description>
          <product>
            <property>aero/qbar-psf</property>
            <property>metrics/Sw-sqft</property>
            <property>metrics/cbarw-ft</property>
            <property>aero/function/CL-base</property>
            <property>aero/function/mach-dCm-dCL</property>
          </product>
        </function>
        <function name="aero/coefficient/Cm_elevator">
          <description>Cm increment from elevator (deg), over alpha</description>
          <product>
            <property>aero/qbar-psf</property>
            <property>metrics/Sw-sqft</property>
            <property>metrics/cbarw-ft</property>
            <property>aero/function/mach-elevator</property>
          <table>
            <independentVar lookup="row">aero/alpha-deg</independentVar>
            <independentVar lookup="column">fcs/elevator-pos-deg</independentVar>
            <tableData>
                        -25.00    -20.00    -15.00    -10.00     -5.00      0.00      5.00     10.00     15.00
             -180.00   0.00114   0.00075   0.00043   0.00019   0.00005   0.00000   0.00005   0.00019   0.00043
              -35.00   0.16143   0.15236   0.13618   0.10659   0.05956   0.00000  -0.06219  -0.11505  -0.14815
              -11.00   0.58874   0.53640   0.46021   0.34367   0.18367   0.00000  -0.18425  -0.34570  -0.46385
                4.00   0.60545   0.55141   0.47277   0.35269   0.18827   0.00000  -0.18844  -0.35331  -0.47400
               19.00   0.61085   0.55048   0.46653   0.34365   0.18125   0.00000  -0.17861  -0.33433  -0.45029
               42.00   0.12399   0.12880   0.12258   0.09901   0.05599   0.00000  -0.06013  -0.11500  -0.15665
              180.00   0.00114   0.00075   0.00043   0.00019   0.00005   0.00000   0.00005   0.00019   0.00043
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            </tableData>
          </table>
          </product>
        </function>
        <function name="aero/coefficient/Cm_flap">
          <description>Cm increment from flap (deg), over alpha</description>
          <product>
            <property>aero/qbar-psf</property>
            <property>metrics/Sw-sqft</property>
            <property>metrics/cbarw-ft</property>
            <property>aero/function/mach-flap</property>
          <table>
            <independentVar lookup="row">aero/alpha-deg</independentVar>
            <independentVar lookup="column">fcs/flap-pos-deg</independentVar>
            <tableData>
                          0.00      5.00     10.00     15.00     20.00     25.00     30.00     35.00
             -180.00   0.00000   0.00003   0.00010   0.00022   0.00039   0.00059   0.00083   0.00109
              -35.00   0.00000  -0.00810  -0.01599  -0.02317  -0.02918  -0.03380  -0.03734  -0.04021
              -11.00   0.00000   0.00734   0.01475   0.02172   0.02782   0.03290   0.03710   0.04058
                4.00   0.00000   0.01570   0.03140   0.04607   0.05899   0.07005   0.07976   0.08868
               19.00   0.00000   0.02901   0.05603   0.07948   0.09850   0.11329   0.12442   0.13253
               42.00   0.00000  -0.00148  -0.00336  -0.00535  -0.00715  -0.00864  -0.00991  -0.01115
              180.00   0.00000   0.00003   0.00010   0.00022   0.00039   0.00059   0.00083   0.00109
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            </tableData>
          </table>
          </product>
        </function>
        <function name="aero/coefficient/Cmq">
          <description>Cm per q (non-dimensional), over alpha</description>
          <product>
            <property>aero/qbar-psf</property>
            <property>metrics/Sw-sqft</property>
            <property>metrics/cbarw-ft</property>
            <property>aero/ci2vel</property>
            <property>velocities/q-aero-rad_sec</property>
            <property>aero/function/mach-lift</property>
          <table>
            <independentVar lookup="row">aero/alpha-deg</independentVar>
            <tableData>
                 -180.00  -10.79423
                 -165.00   -3.65125
                  -32.00   -5.25317
                  -10.00  -25.11871
                    5.00  -25.37504
                   20.00  -15.97166
                   46.00  -13.22145
                  180.00  -10.79423
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            </tableData>
          </table>
          </product>
        </function>
        <function name="aero/coefficient/Cmadot">
          <description>Cm per alpha-dot (downwash lag at the tail)</description>
          <product>
            <property>aero/qbar-psf</property>
            <property>metrics/Sw-sqft</property>
            <property>metrics/cbarw-ft</property>
            <property>aero/ci2vel</property>
            <property>aero/alphadot-rad_sec</property>
            <value>-5.53029</value>
            <property>aero/function/mach-lift</property>
          </product>
        </function>
        <function name="aero/coefficient/Cm_gear">
          <description>the gear's drag's pitching moment, -4.44 m from the reference point's height</description>
          <product>
            <property>aero/qbar-psf</property>
            <property>metrics/Sw-sqft</property>
            <property>metrics/cbarw-ft</property>
            <value>-0.00655453</value>
            <property>gear/gear-pos-norm</property>
          </product>
        </function>
      </axis>
      <axis name="YAW">
        <function name="aero/coefficient/Cn_base">
          <description>Cn over alpha and beta (hangar)</description>
          <product>
            <property>aero/qbar-psf</property>
            <property>metrics/Sw-sqft</property>
            <property>metrics/bw-ft</property>
            <property>aero/function/mach-side</property>
          <table>
            <independentVar lookup="row">aero/alpha-deg</independentVar>
            <independentVar lookup="column">aero/beta-deg</independentVar>
            <tableData>
                        -90.00    -70.00    -50.00    -40.00    -30.00    -25.00    -20.00    -15.00    -10.00     -6.00     -3.00      0.00      3.00      6.00     10.00     15.00     20.00     25.00     30.00     40.00     50.00     70.00     90.00
             -180.00  -0.06357  -0.08084  -0.08161  -0.07423  -0.06149  -0.05329  -0.04403  -0.03387  -0.03457  -0.03635  -0.01960  -0.00000   0.01960   0.03635   0.03457   0.03387   0.04403   0.05329   0.06149   0.07423   0.08161   0.08084   0.06357
              -35.00  -0.06357  -0.04247  -0.02255  -0.01481  -0.01308  -0.01618  -0.02993  -0.02116  -0.01331  -0.00777  -0.00386  -0.00000   0.00386   0.00777   0.01331   0.02116   0.02993   0.01618   0.01308   0.01481   0.02255   0.04247   0.06357
              -11.00  -0.06357  -0.04502  -0.02493  -0.01839  -0.02824  -0.03829  -0.03379  -0.02630  -0.01791  -0.01085  -0.00544  -0.00000   0.00544   0.01085   0.01791   0.02630   0.03379   0.03829   0.02824   0.01839   0.02493   0.04502   0.06357
                4.00  -0.06357  -0.03592  -0.01428  -0.01201  -0.02596  -0.03555  -0.03260  -0.02542  -0.01733  -0.01048  -0.00522  -0.00000   0.00522   0.01048   0.01733   0.02542   0.03260   0.03555   0.02596   0.01201   0.01428   0.03592   0.06357
               19.00  -0.06357  -0.04093  -0.02261  -0.01833  -0.02896  -0.02815  -0.02736  -0.02636  -0.01851  -0.01135  -0.00571  -0.00000   0.00571   0.01135   0.01851   0.02636   0.02736   0.02815   0.02896   0.01833   0.02261   0.04093   0.06357
               42.00  -0.06357  -0.04367  -0.02355  -0.01607  -0.01258  -0.01322  -0.01678  -0.02600  -0.01717  -0.00998  -0.00499  -0.00000   0.00499   0.00998   0.01717   0.02600   0.01678   0.01322   0.01258   0.01607   0.02355   0.04367   0.06357
              180.00  -0.06357  -0.08084  -0.08161  -0.07423  -0.06149  -0.05329  -0.04403  -0.03387  -0.03457  -0.03635  -0.01960  -0.00000   0.01960   0.03635   0.03457   0.03387   0.04403   0.05329   0.06149   0.07423   0.08161   0.08084   0.06357
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            </tableData>
          </table>
          </product>
        </function>
        <function name="aero/coefficient/Cn_aileron">
          <description>Cn increment from aileron (deg), over alpha</description>
          <product>
            <property>aero/qbar-psf</property>
            <property>metrics/Sw-sqft</property>
            <property>metrics/bw-ft</property>
            <property>aero/function/mach-aileron</property>
          <table>
            <independentVar lookup="row">aero/alpha-deg</independentVar>
            <independentVar lookup="column">fcs/left-aileron-pos-deg</independentVar>
            <tableData>
                        -20.00    -15.00    -10.00     -5.00      0.00      5.00     10.00     15.00     20.00
             -180.00  -0.00000  -0.00000  -0.00000  -0.00000   0.00000  -0.00000  -0.00000  -0.00000  -0.00000
              -35.00   0.02009   0.01674   0.01223   0.00645   0.00000  -0.00645  -0.01223  -0.01674  -0.02009
              -11.00   0.00626   0.00531   0.00392   0.00208   0.00000  -0.00208  -0.00392  -0.00531  -0.00626
                4.00  -0.00039  -0.00033  -0.00025  -0.00013   0.00000   0.00013   0.00025   0.00033   0.00039
               19.00  -0.01576  -0.01255  -0.00885  -0.00467   0.00000   0.00467   0.00885   0.01255   0.01576
               42.00  -0.02070  -0.01742  -0.01281  -0.00679   0.00000   0.00679   0.01281   0.01742   0.02070
              180.00  -0.00000  -0.00000  -0.00000  -0.00000   0.00000  -0.00000  -0.00000  -0.00000  -0.00000
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            </tableData>
          </table>
          </product>
        </function>
        <function name="aero/coefficient/Cn_rudder">
          <description>Cn increment from rudder (deg), over alpha</description>
          <product>
            <property>aero/qbar-psf</property>
            <property>metrics/Sw-sqft</property>
            <property>metrics/bw-ft</property>
            <property>aero/function/mach-rudder</property>
          <table>
            <independentVar lookup="row">aero/alpha-deg</independentVar>
            <independentVar lookup="column">fcs/rudder-pos-deg</independentVar>
            <tableData>
                        -35.00    -30.00    -25.00    -20.00    -15.00    -10.00     -5.00      0.00      5.00     10.00     15.00     20.00     25.00     30.00     35.00
             -180.00  -0.00000  -0.00000  -0.00000  -0.00000  -0.00000  -0.00000  -0.00000   0.00000  -0.00000  -0.00000  -0.00000  -0.00000  -0.00000  -0.00000  -0.00000
              -35.00   0.02619   0.02444   0.02264   0.02048   0.01745   0.01295   0.00688   0.00000  -0.00688  -0.01295  -0.01745  -0.02048  -0.02264  -0.02444  -0.02619
              -11.00   0.03796   0.03546   0.03288   0.02978   0.02541   0.01889   0.01007   0.00000  -0.01007  -0.01889  -0.02541  -0.02978  -0.03288  -0.03546  -0.03796
                4.00   0.04132   0.03858   0.03575   0.03237   0.02760   0.02051   0.01093   0.00000  -0.01093  -0.02051  -0.02760  -0.03237  -0.03575  -0.03858  -0.04132
               19.00   0.03603   0.03366   0.03120   0.02826   0.02410   0.01791   0.00953   0.00000  -0.00953  -0.01791  -0.02410  -0.02826  -0.03120  -0.03366  -0.03603
               42.00   0.02868   0.02672   0.02470   0.02230   0.01897   0.01399   0.00741   0.00000  -0.00741  -0.01399  -0.01897  -0.02230  -0.02470  -0.02672  -0.02868
              180.00  -0.00000  -0.00000  -0.00000  -0.00000  -0.00000  -0.00000  -0.00000   0.00000  -0.00000  -0.00000  -0.00000  -0.00000  -0.00000  -0.00000  -0.00000
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            </tableData>
          </table>
          </product>
        </function>
        <function name="aero/coefficient/Cnp">
          <description>Cn per p (non-dimensional), over alpha</description>
          <product>
            <property>aero/qbar-psf</property>
            <property>metrics/Sw-sqft</property>
            <property>metrics/bw-ft</property>
            <property>aero/bi2vel</property>
            <property>velocities/p-aero-rad_sec</property>
            <property>aero/function/mach-lift</property>
          <table>
            <independentVar lookup="row">aero/alpha-deg</independentVar>
            <tableData>
                 -180.00    0.01873
                 -165.00    0.03310
                  -32.00    0.06964
                  -10.00    0.12792
                    5.00   -0.10711
                   20.00    0.07296
                   46.00    0.01848
                  180.00    0.01873
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            </tableData>
          </table>
          </product>
        </function>
        <function name="aero/coefficient/Cnr">
          <description>Cn per r (non-dimensional), over alpha</description>
          <product>
            <property>aero/qbar-psf</property>
            <property>metrics/Sw-sqft</property>
            <property>metrics/bw-ft</property>
            <property>aero/bi2vel</property>
            <property>velocities/r-aero-rad_sec</property>
            <property>aero/function/mach-lift</property>
          <table>
            <independentVar lookup="row">aero/alpha-deg</independentVar>
            <tableData>
                 -180.00   -0.19405
                 -165.00   -0.19479
                  -32.00   -0.06584
                  -10.00   -0.14286
                    5.00   -0.14259
                   20.00    0.00972
                   46.00   -0.08659
                  180.00   -0.19405
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            </tableData>
          </table>
          </product>
        </function>
      </axis>
    </aerodynamics>
</fdm_config>
