<?xml version="1.0"?>
<!-- Generated by hangar: a piston engine scaled from 160 hp at 2700 rpm. -->
<piston_engine name="O-320">
  <minmp unit="INHG">        10.0 </minmp>
  <maxmp unit="INHG">        28.5 </maxmp>
  <displacement unit="IN3"> 320.0 </displacement>
  <maxhp>                   160.0 </maxhp>
  <bsfc>                     0.45 </bsfc>
  <cycles>                    4.0 </cycles>
  <idlerpm>                 594 </idlerpm>
  <maxrpm>                  2700 </maxrpm>
  <maxthrottle>               1.0 </maxthrottle>
  <minthrottle>               0.1 </minthrottle>
  <sparkfaildrop>             0.1 </sparkfaildrop>
</piston_engine>
