<?xml version="1.0"?>
<!-- Generated by hangar: blade-element momentum theory for a 2-blade fixed-pitch
     propeller, 1.905 m diameter, 1.452 m geometric pitch (activity factor 83). -->
<propeller name="c172 propeller 0">
  <ixx> 2.342 </ixx>
  <diameter unit="M"> 1.9050 </diameter>
  <numblades> 2 </numblades>
  <table name="C_THRUST" type="internal">
    <tableData>
       0.00    0.11175
       0.10    0.11025
       0.20    0.10639
       0.30    0.09995
       0.40    0.08849
       0.50    0.07387
       0.60    0.05831
       0.70    0.04192
       0.80    0.02479
       0.90    0.00696
       1.00   -0.01153
       1.10   -0.03066
       1.20   -0.05041
       1.30   -0.07077
       1.40   -0.09166
       1.50   -0.11248
       1.60   -0.12979
       1.70   -0.14105
       1.80   -0.14843
       1.90   -0.15364
       2.00   -0.15760
       2.10   -0.16167
       2.20   -0.16698
       2.30   -0.17373
       2.40   -0.18106
      5.00   -0.18106
    </tableData>
  </table>
  <table name="C_POWER" type="internal">
    <tableData>
       0.00    0.04520
       0.10    0.04865
       0.20    0.05164
       0.30    0.05371
       0.40    0.05298
       0.50    0.04923
       0.60    0.04325
       0.70    0.03477
       0.80    0.02358
       0.90    0.00952
       1.00   -0.00758
       1.10   -0.02784
       1.20   -0.05137
       1.30   -0.07826
       1.40   -0.10851
       1.50   -0.14124
       1.60   -0.17044
       1.70   -0.18936
       1.80   -0.20008
       1.90   -0.20585
       2.00   -0.20788
       2.10   -0.20897
       2.20   -0.21181
       2.30   -0.21745
       2.40   -0.22399
      5.00   -0.22399
    </tableData>
  </table>
  <table name="CT_MACH" type="internal">
    <tableData>
      0.85   1.0
      1.05   0.8
    </tableData>
  </table>
  <table name="CP_MACH" type="internal">
    <tableData>
      0.85   1.0
      1.05   1.8
      2.00   1.4
    </tableData>
  </table>
</propeller>
