<?xml version="1.0"?>
<?xml-stylesheet type="text/xsl" href="http://jsbsim.sourceforge.net/JSBSim.xsl"?>
<!-- Generated by hangar 0.1.0 from c172.toml on 2026-10-01. Edit the design and rebuild; changes
     made here are overwritten.  -->
<fdm_config name="c172" version="2.0" release="ALPHA"
            xmlns:xsi="http://www.w3.org/2001/XMLSchema-instance"
            xsi:noNamespaceSchemaLocation="http://jsbsim.sourceforge.net/JSBSim.xsd">
    <fileheader>
      <author>hangar</author>
      <filecreationdate>2026-10-01</filecreationdate>
      <version>0.1.0</version>
      <description>Cessna 172P Skyhawk (hangar rebuild)</description>
      <note>Aerodynamics: vortex lattice with viscous section polars, full-envelope
        strip model, slender-body fuselage (hangar). Mass: Raymer component
        weights on the geometry. Propeller: blade-element momentum theory.</note>
      <reference refID="fsim/applicability/aerobatic" author="the design" title="Cessna 172P Pilot's Operating Handbook: normal and utility categories; aerobatic manoeuvres beyond the utility category's are prohibited" date="n/a"/>
      <reference refID="fsim/applicability/carrier" author="the design" title="Cessna 172P Pilot's Operating Handbook: a civil land aeroplane" date="n/a"/>
      <reference refID="fsim/applicability/drag_devices" author="the design" title="Cessna 172P Pilot's Operating Handbook: no spoilers or airbrakes" date="n/a"/>
      <reference refID="fsim/applicability/flaps" author="the design" title="Cessna 172P Pilot's Operating Handbook: electrically operated single-slot flaps to 30 deg" date="n/a"/>
      <reference refID="fsim/applicability/ground_contact" author="the design" title="Cessna 172P Pilot's Operating Handbook: fixed tricycle wheeled gear" date="n/a"/>
      <reference refID="fsim/applicability/releasable_stores" author="the design" title="FAA type certificate data sheet 3A12 and the Pilot's Operating Handbook: no provisions for external stores" date="n/a"/>
      <reference refID="fsim/applicability/retractable_gear" author="the design" title="Cessna 172P Pilot's Operating Handbook: fixed landing gear" date="n/a"/>
      <reference refID="fsim/applicability/vertical_flight" author="the design" title="Cessna 172P Pilot's Operating Handbook: a conventional light aeroplane. Conventional take-off and landing: no rotors, lift fans or vectored lift to hover" date="n/a"/>
    </fileheader>
    <metrics>
      <wingarea unit="M2"> 16.2195 </wingarea>
      <wingspan unit="M"> 10.9720 </wingspan>
      <chord unit="M"> 1.5063 </chord>
      <htailarea unit="M2"> 3.6052 </htailarea>
      <htailarm unit="M"> 4.7458 </htailarm>
      <vtailarea unit="M2"> 1.4563 </vtailarea>
      <vtailarm unit="M"> 5.0428 </vtailarm>
      <location name="AERORP" unit="M">
        <x> 1.1216 </x>
        <y> 0.0000 </y>
        <z> 1.5768 </z>
      </location>
      <location name="EYEPOINT" unit="M">
        <x> 0.9140 </x>
        <y> -0.3560 </y>
        <z> 1.3100 </z>
      </location>
      <location name="VRP" unit="M">
        <x> 1.0410 </x>
        <y> 0.0000 </y>
        <z> 0.9270 </z>
      </location>
    </metrics>
    <mass_balance negated_crossproduct_inertia="false">
      <ixx unit="KG*M2"> 1622.62 </ixx>
      <iyy unit="KG*M2"> 1641.90 </iyy>
      <izz unit="KG*M2"> 2766.64 </izz>
      <ixy unit="KG*M2"> -0.000 </ixy>
      <ixz unit="KG*M2"> 104.938 </ixz>
      <iyz unit="KG*M2"> -0.001 </iyz>
      <emptywt unit="KG"> 659.50 </emptywt>
      <location name="CG" unit="M">
        <x> 1.0410 </x>
        <y> 0.0000 </y>
        <z> 0.9270 </z>
      </location>
      <pointmass name="PILOT">
        <weight unit="KG"> 86.20 </weight>
        <location unit="M">
          <x> 0.9140 </x>
          <y> -0.3560 </y>
          <z> 0.6100 </z>
        </location>
      </pointmass>
      <pointmass name="CO-PILOT">
        <weight unit="KG"> 63.50 </weight>
        <location unit="M">
          <x> 0.9140 </x>
          <y> 0.3560 </y>
          <z> 0.6100 </z>
        </location>
      </pointmass>
      <pointmass name="PASSENGER 1">
        <weight unit="KG"> 59.00 </weight>
        <location unit="M">
          <x> 1.5240 </x>
          <y> -0.3560 </y>
          <z> 0.6100 </z>
        </location>
      </pointmass>
      <pointmass name="PASSENGER 2">
        <weight unit="KG"> 48.10 </weight>
        <location unit="M">
          <x> 1.5240 </x>
          <y> 0.3560 </y>
          <z> 0.6100 </z>
        </location>
      </pointmass>
      <pointmass name="LUGGAGE">
        <weight unit="KG"> 54.40 </weight>
        <location unit="M">
          <x> 2.4130 </x>
          <y> 0.0000 </y>
          <z> 0.6100 </z>
        </location>
      </pointmass>
    </mass_balance>
    <ground_reactions>
      <contact type="BOGEY" name="Nose Gear">
        <location unit="M">
          <x> -0.1730 </x>
          <y> 0.0000 </y>
          <z> -0.5080 </z>
        </location>
        <static_friction> 0.8 </static_friction>
        <dynamic_friction> 0.5 </dynamic_friction>
        <rolling_friction> 0.02 </rolling_friction>
        <spring_coeff unit="N/M"> 25794 </spring_coeff>
        <damping_coeff unit="N/M/SEC"> 2330 </damping_coeff>
        <damping_coeff_rebound unit="N/M/SEC"> 4659 </damping_coeff_rebound>
        <max_steer unit="DEG"> 10.0 </max_steer>
        <brake_group> NONE </brake_group>
        <retractable> 0 </retractable>
      </contact>
      <contact type="BOGEY" name="Left Main Gear">
        <location unit="M">
          <x> 1.4780 </x>
          <y> -1.2760 </y>
          <z> -0.4690 </z>
        </location>
        <static_friction> 0.8 </static_friction>
        <dynamic_friction> 0.5 </dynamic_friction>
        <rolling_friction> 0.02 </rolling_friction>
        <spring_coeff unit="N/M"> 86130 </spring_coeff>
        <damping_coeff unit="N/M/SEC"> 6150 </damping_coeff>
        <damping_coeff_rebound unit="N/M/SEC"> 12300 </damping_coeff_rebound>
        <max_steer unit="DEG"> 0.0 </max_steer>
        <brake_group> LEFT </brake_group>
        <retractable> 0 </retractable>
      </contact>
      <contact type="BOGEY" name="Right Main Gear">
        <location unit="M">
          <x> 1.4780 </x>
          <y> 1.2760 </y>
          <z> -0.4690 </z>
        </location>
        <static_friction> 0.8 </static_friction>
        <dynamic_friction> 0.5 </dynamic_friction>
        <rolling_friction> 0.02 </rolling_friction>
        <spring_coeff unit="N/M"> 86130 </spring_coeff>
        <damping_coeff unit="N/M/SEC"> 6150 </damping_coeff>
        <damping_coeff_rebound unit="N/M/SEC"> 12300 </damping_coeff_rebound>
        <max_steer unit="DEG"> 0.0 </max_steer>
        <brake_group> RIGHT </brake_group>
        <retractable> 0 </retractable>
      </contact>
      <contact type="STRUCTURE" name="O-320 propeller left front">
        <location unit="M">
          <x> -0.9580 </x>
          <y> -0.9525 </y>
          <z> 0.6760 </z>
        </location>
        <static_friction> 0.8 </static_friction>
        <dynamic_friction> 0.6 </dynamic_friction>
        <spring_coeff unit="N/M"> 197763 </spring_coeff>
        <damping_coeff unit="N/M/SEC"> 6592 </damping_coeff>
        <damping_coeff_rebound unit="N/M/SEC"> 6592 </damping_coeff_rebound>
      </contact>
      <contact type="STRUCTURE" name="O-320 propeller front">
        <location unit="M">
          <x> -0.9580 </x>
          <y> -0.0000 </y>
          <z> -0.2765 </z>
        </location>
        <static_friction> 0.8 </static_friction>
        <dynamic_friction> 0.6 </dynamic_friction>
        <spring_coeff unit="N/M"> 93125 </spring_coeff>
        <damping_coeff unit="N/M/SEC"> 3104 </damping_coeff>
        <damping_coeff_rebound unit="N/M/SEC"> 3104 </damping_coeff_rebound>
      </contact>
      <contact type="STRUCTURE" name="O-320 propeller front 2">
        <location unit="M">
          <x> -0.9580 </x>
          <y> 0.0000 </y>
          <z> 1.6285 </z>
        </location>
        <static_friction> 0.8 </static_friction>
        <dynamic_friction> 0.6 </dynamic_friction>
        <spring_coeff unit="N/M"> 211775 </spring_coeff>
        <damping_coeff unit="N/M/SEC"> 7059 </damping_coeff>
        <damping_coeff_rebound unit="N/M/SEC"> 7059 </damping_coeff_rebound>
      </contact>
      <contact type="STRUCTURE" name="O-320 propeller right front">
        <location unit="M">
          <x> -0.9580 </x>
          <y> 0.9525 </y>
          <z> 0.6760 </z>
        </location>
        <static_friction> 0.8 </static_friction>
        <dynamic_friction> 0.6 </dynamic_friction>
        <spring_coeff unit="N/M"> 197763 </spring_coeff>
        <damping_coeff unit="N/M/SEC"> 6592 </damping_coeff>
        <damping_coeff_rebound unit="N/M/SEC"> 6592 </damping_coeff_rebound>
      </contact>
      <contact type="STRUCTURE" name="fin rear">
        <location unit="M">
          <x> 7.1800 </x>
          <y> 0.0000 </y>
          <z> 2.2500 </z>
        </location>
        <static_friction> 0.8 </static_friction>
        <dynamic_friction> 0.6 </dynamic_friction>
        <spring_coeff unit="N/M"> 35245 </spring_coeff>
        <damping_coeff unit="N/M/SEC"> 1175 </damping_coeff>
        <damping_coeff_rebound unit="N/M/SEC"> 1175 </damping_coeff_rebound>
      </contact>
      <contact type="STRUCTURE" name="fuselage rear">
        <location unit="M">
          <x> 7.2000 </x>
          <y> -0.0000 </y>
          <z> 0.9000 </z>
        </location>
        <static_friction> 0.8 </static_friction>
        <dynamic_friction> 0.6 </dynamic_friction>
        <spring_coeff unit="N/M"> 36556 </spring_coeff>
        <damping_coeff unit="N/M/SEC"> 1219 </damping_coeff>
        <damping_coeff_rebound unit="N/M/SEC"> 1219 </damping_coeff_rebound>
      </contact>
      <contact type="STRUCTURE" name="htail left rear">
        <location unit="M">
          <x> 6.5389 </x>
          <y> -1.7250 </y>
          <z> 0.9629 </z>
        </location>
        <static_friction> 0.8 </static_friction>
        <dynamic_friction> 0.6 </dynamic_friction>
        <spring_coeff unit="N/M"> 41338 </spring_coeff>
        <damping_coeff unit="N/M/SEC"> 1378 </damping_coeff>
        <damping_coeff_rebound unit="N/M/SEC"> 1378 </damping_coeff_rebound>
      </contact>
      <contact type="STRUCTURE" name="htail right rear">
        <location unit="M">
          <x> 6.5389 </x>
          <y> 1.7250 </y>
          <z> 0.9629 </z>
        </location>
        <static_friction> 0.8 </static_friction>
        <dynamic_friction> 0.6 </dynamic_friction>
        <spring_coeff unit="N/M"> 41338 </spring_coeff>
        <damping_coeff unit="N/M/SEC"> 1378 </damping_coeff>
        <damping_coeff_rebound unit="N/M/SEC"> 1378 </damping_coeff_rebound>
      </contact>
      <contact type="STRUCTURE" name="wing left front">
        <location unit="M">
          <x> 0.8680 </x>
          <y> -5.4860 </y>
          <z> 1.6660 </z>
        </location>
        <static_friction> 0.8 </static_friction>
        <dynamic_friction> 0.6 </dynamic_friction>
        <spring_coeff unit="N/M"> 21918 </spring_coeff>
        <damping_coeff unit="N/M/SEC"> 731 </damping_coeff>
        <damping_coeff_rebound unit="N/M/SEC"> 731 </damping_coeff_rebound>
      </contact>
      <contact type="STRUCTURE" name="wing left front 2">
        <location unit="M">
          <x> 1.8837 </x>
          <y> -5.4852 </y>
          <z> 1.6926 </z>
        </location>
        <static_friction> 0.8 </static_friction>
        <dynamic_friction> 0.6 </dynamic_friction>
        <spring_coeff unit="N/M"> 21466 </spring_coeff>
        <damping_coeff unit="N/M/SEC"> 716 </damping_coeff>
        <damping_coeff_rebound unit="N/M/SEC"> 716 </damping_coeff_rebound>
      </contact>
      <contact type="STRUCTURE" name="wing right front">
        <location unit="M">
          <x> 1.8837 </x>
          <y> 5.4852 </y>
          <z> 1.6926 </z>
        </location>
        <static_friction> 0.8 </static_friction>
        <dynamic_friction> 0.6 </dynamic_friction>
        <spring_coeff unit="N/M"> 21466 </spring_coeff>
        <damping_coeff unit="N/M/SEC"> 716 </damping_coeff>
        <damping_coeff_rebound unit="N/M/SEC"> 716 </damping_coeff_rebound>
      </contact>
      <contact type="STRUCTURE" name="wing right front 2">
        <location unit="M">
          <x> 0.8680 </x>
          <y> 5.4860 </y>
          <z> 1.6660 </z>
        </location>
        <static_friction> 0.8 </static_friction>
        <dynamic_friction> 0.6 </dynamic_friction>
        <spring_coeff unit="N/M"> 21918 </spring_coeff>
        <damping_coeff unit="N/M/SEC"> 731 </damping_coeff>
        <damping_coeff_rebound unit="N/M/SEC"> 731 </damping_coeff_rebound>
      </contact>
    </ground_reactions>
    <propulsion>
      <engine file="c172_engine0">
        <location unit="M">
          <x> -0.4500 </x>
          <y> 0.0000 </y>
          <z> 0.6760 </z>
        </location>
        <feed>0</feed>
        <feed>1</feed>
        <thruster file="c172_prop0">
          <location unit="M">
            <x> -0.9580 </x>
            <y> 0.0000 </y>
            <z> 0.6760 </z>
          </location>
          <orient unit="DEG"> <roll>0.00</roll> <pitch>0.00</pitch> <yaw>0.00</yaw> </orient>
          <sense>-1</sense>
        </thruster>
      </engine>
      <tank type="FUEL">
        <location unit="M">
          <x> 1.2190 </x>
          <y> -2.8450 </y>
          <z> 1.5090 </z>
        </location>
        <capacity unit="KG"> 59.00 </capacity>
        <contents unit="KG"> 59.00 </contents>
      </tank>
      <tank type="FUEL">
        <location unit="M">
          <x> 1.2190 </x>
          <y> 2.8450 </y>
          <z> 1.5090 </z>
        </location>
        <capacity unit="KG"> 59.00 </capacity>
        <contents unit="KG"> 59.00 </contents>
      </tank>
    </propulsion>
    <flight_control name="c172">
      <!-- the aircraft's profile for the platform (docs/control-architecture.md, section 7): what
           hangar knows of it - its design, its flight tests, its identified responses -->
      <property value="1">fsim/identity/version</property>
      <property value="1">fsim/identity/provenance</property>
      <property value="1">fsim/identity/class</property>
      <property value="1">fsim/identity/family</property>
      <property value="1">fsim/effectors/version</property>
      <property value="1">fsim/effectors/provenance</property>
      <property value="1">fsim/effectors/flaps</property>
      <property value="8">fsim/effectors/flaps_transit_s</property>
      <property value="0.0">fsim/effectors/neutral</property>
      <property value="0.0">fsim/effectors/pitch</property>
      <property value="1">fsim/effectors/pitch_trim</property>
      <property value="0.0">fsim/effectors/retractable_gear</property>
      <property value="0.0">fsim/effectors/roll</property>
      <property value="0.0">fsim/effectors/speedbrake</property>
      <property value="1">fsim/effectors/wheel_brakes</property>
      <property value="0.0">fsim/effectors/yaw</property>
      <property value="1">fsim/envelope/version</property>
      <property value="1">fsim/envelope/provenance</property>
      <property value="17.8481">fsim/envelope/clean/alpha_max_deg</property>
      <property value="25.4185">fsim/envelope/clean/cas_min_ms</property>
      <property value="7.72">fsim/envelope/crosswind_max_ms</property>
      <property value="43.73">fsim/envelope/flaps/cas_max_ms</property>
      <property value="0.333">fsim/envelope/flaps_threshold</property>
      <property value="12.98">fsim/envelope/ground_pitch_max_deg</property>
      <property value="9.55">fsim/envelope/ground_turn_radius_m</property>
      <property value="0.4245">fsim/envelope/ground_yaw_accel_rad_s2</property>
      <property value="1">fsim/propulsion/version</property>
      <property value="1">fsim/propulsion/provenance</property>
      <property value="0.0">fsim/propulsion/afterburner</property>
      <property value="1">fsim/propulsion/engines</property>
      <property value="1.61941">fsim/propulsion/spool_s</property>
      <property value="0.0">fsim/propulsion/type</property>
      <property value="1">fsim/plant/version</property>
      <property value="1">fsim/plant/provenance</property>
      <property value="-2.89091">fsim/plant/alpha_zero_lift_deg</property>
      <property value="3000">fsim/plant/altitude_m</property>
      <property value="43.5419">fsim/plant/eas_ms</property>
      <property value="0.0908626">fsim/plant/elevator_trim</property>
      <property value="-0.259616">fsim/plant/elevator_trim_lift</property>
      <property value="2.8209">fsim/plant/pitch/gain</property>
      <property value="0.251151">fsim/plant/pitch/tau_s</property>
      <property value="0.985195">fsim/plant/roll/gain</property>
      <property value="0.097766">fsim/plant/roll/tau_s</property>
      <property value="2.74758">fsim/plant/speed/gain</property>
      <property value="1.61941">fsim/plant/speed/tau_s</property>
      <property value="50.4941">fsim/plant/tas_ms</property>
      <property value="0.88871">fsim/plant/throttle_trim</property>
      <property value="0.583711">fsim/plant/yaw/gain</property>
      <property value="1">fsim/performance/version</property>
      <property value="1">fsim/performance/provenance</property>
      <property value="3961.77">fsim/performance/ceiling_m</property>
      <property value="63.1176">fsim/performance/max_tas_ms</property>
      <property value="25.4185">fsim/performance/stall_cas_ms</property>
      <property value="23.4434">fsim/performance/stall_flaps_cas_ms</property>
      <property value="1">fsim/applicability/version</property>
      <property value="1">fsim/applicability/provenance</property>
      <property value="0.0">fsim/applicability/aerobatic</property>
      <property value="1">fsim/applicability/carrier</property>
      <property value="1">fsim/applicability/drag_devices</property>
      <property value="1">fsim/applicability/flaps</property>
      <property value="1">fsim/applicability/ground_contact</property>
      <property value="1">fsim/applicability/releasable_stores</property>
      <property value="0.0">fsim/applicability/retractable_gear</property>
      <property value="0.0">fsim/applicability/vertical_flight</property>
      <property value="1">fsim/tables/version</property>
      <property value="1">fsim/tables/provenance</property>
      <property value="100">fsim/tables/altitude_m/h0</property>
      <property value="790">fsim/tables/altitude_m/h1</property>
      <property value="1580">fsim/tables/altitude_m/h2</property>
      <property value="2380">fsim/tables/altitude_m/h3</property>
      <property value="2970">fsim/tables/altitude_m/h4</property>
      <property value="3370">fsim/tables/altitude_m/h5</property>
      <property value="3760">fsim/tables/altitude_m/h6</property>
      <property value="0.00421184">fsim/tables/best_endurance_fuel_kg_s/h0/w0</property>
      <property value="0.00442593">fsim/tables/best_endurance_fuel_kg_s/h0/w1</property>
      <property value="0.00465872">fsim/tables/best_endurance_fuel_kg_s/h0/w2</property>
      <property value="0.0042557">fsim/tables/best_endurance_fuel_kg_s/h1/w0</property>
      <property value="0.00449817">fsim/tables/best_endurance_fuel_kg_s/h1/w1</property>
      <property value="0.0047447">fsim/tables/best_endurance_fuel_kg_s/h1/w2</property>
      <property value="0.00434685">fsim/tables/best_endurance_fuel_kg_s/h2/w0</property>
      <property value="0.00461359">fsim/tables/best_endurance_fuel_kg_s/h2/w1</property>
      <property value="0.00488858">fsim/tables/best_endurance_fuel_kg_s/h2/w2</property>
      <property value="0.00448301">fsim/tables/best_endurance_fuel_kg_s/h3/w0</property>
      <property value="0.00476541">fsim/tables/best_endurance_fuel_kg_s/h3/w1</property>
      <property value="0.00506746">fsim/tables/best_endurance_fuel_kg_s/h3/w2</property>
      <property value="0.00460386">fsim/tables/best_endurance_fuel_kg_s/h4/w0</property>
      <property value="0.00490841">fsim/tables/best_endurance_fuel_kg_s/h4/w1</property>
      <property value="0.00521369">fsim/tables/best_endurance_fuel_kg_s/h4/w2</property>
      <property value="0.00469818">fsim/tables/best_endurance_fuel_kg_s/h5/w0</property>
      <property value="0.00500852">fsim/tables/best_endurance_fuel_kg_s/h5/w1</property>
      <property value="0.00532727">fsim/tables/best_endurance_fuel_kg_s/h5/w2</property>
      <property value="0.0047926">fsim/tables/best_endurance_fuel_kg_s/h6/w0</property>
      <property value="0.00511312">fsim/tables/best_endurance_fuel_kg_s/h6/w1</property>
      <property value="0.00543375">fsim/tables/best_endurance_fuel_kg_s/h6/w2</property>
      <property value="35.5491">fsim/tables/best_endurance_tas_ms/h0/w0</property>
      <property value="35.6573">fsim/tables/best_endurance_tas_ms/h0/w1</property>
      <property value="35.8062">fsim/tables/best_endurance_tas_ms/h0/w2</property>
      <property value="35.4403">fsim/tables/best_endurance_tas_ms/h1/w0</property>
      <property value="35.629">fsim/tables/best_endurance_tas_ms/h1/w1</property>
      <property value="35.8553">fsim/tables/best_endurance_tas_ms/h1/w2</property>
      <property value="35.4599">fsim/tables/best_endurance_tas_ms/h2/w0</property>
      <property value="35.7439">fsim/tables/best_endurance_tas_ms/h2/w1</property>
      <property value="36.0583">fsim/tables/best_endurance_tas_ms/h2/w2</property>
      <property value="35.6462">fsim/tables/best_endurance_tas_ms/h3/w0</property>
      <property value="36.0266">fsim/tables/best_endurance_tas_ms/h3/w1</property>
      <property value="36.4315">fsim/tables/best_endurance_tas_ms/h3/w2</property>
      <property value="35.8959">fsim/tables/best_endurance_tas_ms/h4/w0</property>
      <property value="36.3487">fsim/tables/best_endurance_tas_ms/h4/w1</property>
      <property value="37.4486">fsim/tables/best_endurance_tas_ms/h4/w2</property>
      <property value="36.1226">fsim/tables/best_endurance_tas_ms/h5/w0</property>
      <property value="36.6313">fsim/tables/best_endurance_tas_ms/h5/w1</property>
      <property value="37.885">fsim/tables/best_endurance_tas_ms/h5/w2</property>
      <property value="36.3961">fsim/tables/best_endurance_tas_ms/h6/w0</property>
      <property value="37.6886">fsim/tables/best_endurance_tas_ms/h6/w1</property>
      <property value="39.1396">fsim/tables/best_endurance_tas_ms/h6/w2</property>
      <property value="0.0045086">fsim/tables/best_range_fuel_kg_s/h0/w0</property>
      <property value="0.00477442">fsim/tables/best_range_fuel_kg_s/h0/w1</property>
      <property value="0.00509906">fsim/tables/best_range_fuel_kg_s/h0/w2</property>
      <property value="0.00464629">fsim/tables/best_range_fuel_kg_s/h1/w0</property>
      <property value="0.00491588">fsim/tables/best_range_fuel_kg_s/h1/w1</property>
      <property value="0.00526086">fsim/tables/best_range_fuel_kg_s/h1/w2</property>
      <property value="0.00481073">fsim/tables/best_range_fuel_kg_s/h2/w0</property>
      <property value="0.00509484">fsim/tables/best_range_fuel_kg_s/h2/w1</property>
      <property value="0.00544445">fsim/tables/best_range_fuel_kg_s/h2/w2</property>
      <property value="0.00498382">fsim/tables/best_range_fuel_kg_s/h3/w0</property>
      <property value="0.00532107">fsim/tables/best_range_fuel_kg_s/h3/w1</property>
      <property value="0.00563269">fsim/tables/best_range_fuel_kg_s/h3/w2</property>
      <property value="0.00511915">fsim/tables/best_range_fuel_kg_s/h4/w0</property>
      <property value="0.00547608">fsim/tables/best_range_fuel_kg_s/h4/w1</property>
      <property value="0.00582471">fsim/tables/best_range_fuel_kg_s/h4/w2</property>
      <property value="0.00523582">fsim/tables/best_range_fuel_kg_s/h5/w0</property>
      <property value="0.00558001">fsim/tables/best_range_fuel_kg_s/h5/w1</property>
      <property value="0.00592312">fsim/tables/best_range_fuel_kg_s/h5/w2</property>
      <property value="0.00533253">fsim/tables/best_range_fuel_kg_s/h6/w0</property>
      <property value="0.00568579">fsim/tables/best_range_fuel_kg_s/h6/w1</property>
      <property value="0.00604821">fsim/tables/best_range_fuel_kg_s/h6/w2</property>
      <property value="38.7678">fsim/tables/best_range_tas_ms/h0/w0</property>
      <property value="39.4892">fsim/tables/best_range_tas_ms/h0/w1</property>
      <property value="40.71">fsim/tables/best_range_tas_ms/h0/w2</property>
      <property value="40.0313">fsim/tables/best_range_tas_ms/h1/w0</property>
      <property value="40.7934">fsim/tables/best_range_tas_ms/h1/w1</property>
      <property value="42.0691">fsim/tables/best_range_tas_ms/h1/w2</property>
      <property value="41.5479">fsim/tables/best_range_tas_ms/h2/w0</property>
      <property value="42.3494">fsim/tables/best_range_tas_ms/h2/w1</property>
      <property value="43.637">fsim/tables/best_range_tas_ms/h2/w2</property>
      <property value="43.1347">fsim/tables/best_range_tas_ms/h3/w0</property>
      <property value="44.2528">fsim/tables/best_range_tas_ms/h3/w1</property>
      <property value="45.1493">fsim/tables/best_range_tas_ms/h3/w2</property>
      <property value="44.3433">fsim/tables/best_range_tas_ms/h4/w0</property>
      <property value="45.5869">fsim/tables/best_range_tas_ms/h4/w1</property>
      <property value="46.7156">fsim/tables/best_range_tas_ms/h4/w2</property>
      <property value="45.3145">fsim/tables/best_range_tas_ms/h5/w0</property>
      <property value="46.4664">fsim/tables/best_range_tas_ms/h5/w1</property>
      <property value="47.4873">fsim/tables/best_range_tas_ms/h5/w2</property>
      <property value="46.1614">fsim/tables/best_range_tas_ms/h6/w0</property>
      <property value="47.2808">fsim/tables/best_range_tas_ms/h6/w1</property>
      <property value="48.4818">fsim/tables/best_range_tas_ms/h6/w2</property>
      <property value="37.2472">fsim/tables/climb_tas_ms/h0/w0</property>
      <property value="37.7054">fsim/tables/climb_tas_ms/h0/w1</property>
      <property value="38.1175">fsim/tables/climb_tas_ms/h0/w2</property>
      <property value="37.8474">fsim/tables/climb_tas_ms/h1/w0</property>
      <property value="38.209">fsim/tables/climb_tas_ms/h1/w1</property>
      <property value="38.9093">fsim/tables/climb_tas_ms/h1/w2</property>
      <property value="38.9217">fsim/tables/climb_tas_ms/h2/w0</property>
      <property value="39.7756">fsim/tables/climb_tas_ms/h2/w1</property>
      <property value="40.7255">fsim/tables/climb_tas_ms/h2/w2</property>
      <property value="40.302">fsim/tables/climb_tas_ms/h3/w0</property>
      <property value="40.9716">fsim/tables/climb_tas_ms/h3/w1</property>
      <property value="41.6239">fsim/tables/climb_tas_ms/h3/w2</property>
      <property value="41.0945">fsim/tables/climb_tas_ms/h4/w0</property>
      <property value="41.7301">fsim/tables/climb_tas_ms/h4/w1</property>
      <property value="42.0401">fsim/tables/climb_tas_ms/h4/w2</property>
      <property value="41.6365">fsim/tables/climb_tas_ms/h5/w0</property>
      <property value="41.867">fsim/tables/climb_tas_ms/h5/w1</property>
      <property value="42.4814">fsim/tables/climb_tas_ms/h5/w2</property>
      <property value="41.5818">fsim/tables/climb_tas_ms/h6/w0</property>
      <property value="42.3486">fsim/tables/climb_tas_ms/h6/w1</property>
      <property value="43.1667">fsim/tables/climb_tas_ms/h6/w2</property>
      <property value="118">fsim/tables/fuel_capacity_kg</property>
      <property value="0.00420254">fsim/tables/fuel_kg_s/h0/w0/v0</property>
      <property value="0.00433678">fsim/tables/fuel_kg_s/h0/w0/v1</property>
      <property value="0.00725548">fsim/tables/fuel_kg_s/h0/w0/v10</property>
      <property value="0.00773045">fsim/tables/fuel_kg_s/h0/w0/v11</property>
      <property value="0.00826047">fsim/tables/fuel_kg_s/h0/w0/v12</property>
      <property value="0.00882595">fsim/tables/fuel_kg_s/h0/w0/v13</property>
      <property value="0.00941778">fsim/tables/fuel_kg_s/h0/w0/v14</property>
      <property value="0.0100392">fsim/tables/fuel_kg_s/h0/w0/v15</property>
      <property value="0.00452353">fsim/tables/fuel_kg_s/h0/w0/v2</property>
      <property value="0.00474954">fsim/tables/fuel_kg_s/h0/w0/v3</property>
      <property value="0.00501253">fsim/tables/fuel_kg_s/h0/w0/v4</property>
      <property value="0.00529923">fsim/tables/fuel_kg_s/h0/w0/v5</property>
      <property value="0.00562991">fsim/tables/fuel_kg_s/h0/w0/v6</property>
      <property value="0.00598612">fsim/tables/fuel_kg_s/h0/w0/v7</property>
      <property value="0.00636756">fsim/tables/fuel_kg_s/h0/w0/v8</property>
      <property value="0.00680131">fsim/tables/fuel_kg_s/h0/w0/v9</property>
      <property value="0.00441845">fsim/tables/fuel_kg_s/h0/w1/v0</property>
      <property value="0.00452992">fsim/tables/fuel_kg_s/h0/w1/v1</property>
      <property value="0.00734998">fsim/tables/fuel_kg_s/h0/w1/v10</property>
      <property value="0.00782301">fsim/tables/fuel_kg_s/h0/w1/v11</property>
      <property value="0.00831717">fsim/tables/fuel_kg_s/h0/w1/v12</property>
      <property value="0.00887286">fsim/tables/fuel_kg_s/h0/w1/v13</property>
      <property value="0.00945995">fsim/tables/fuel_kg_s/h0/w1/v14</property>
      <property value="0.0100731">fsim/tables/fuel_kg_s/h0/w1/v15</property>
      <property value="0.00471111">fsim/tables/fuel_kg_s/h0/w1/v2</property>
      <property value="0.00492683">fsim/tables/fuel_kg_s/h0/w1/v3</property>
      <property value="0.0051653">fsim/tables/fuel_kg_s/h0/w1/v4</property>
      <property value="0.0054553">fsim/tables/fuel_kg_s/h0/w1/v5</property>
      <property value="0.00575807">fsim/tables/fuel_kg_s/h0/w1/v6</property>
      <property value="0.00611573">fsim/tables/fuel_kg_s/h0/w1/v7</property>
      <property value="0.00648798">fsim/tables/fuel_kg_s/h0/w1/v8</property>
      <property value="0.00689714">fsim/tables/fuel_kg_s/h0/w1/v9</property>
      <property value="0.00465168">fsim/tables/fuel_kg_s/h0/w2/v0</property>
      <property value="0.00476125">fsim/tables/fuel_kg_s/h0/w2/v1</property>
      <property value="0.00744689">fsim/tables/fuel_kg_s/h0/w2/v10</property>
      <property value="0.00791734">fsim/tables/fuel_kg_s/h0/w2/v11</property>
      <property value="0.00840819">fsim/tables/fuel_kg_s/h0/w2/v12</property>
      <property value="0.0089205">fsim/tables/fuel_kg_s/h0/w2/v13</property>
      <property value="0.00950091">fsim/tables/fuel_kg_s/h0/w2/v14</property>
      <property value="0.010108">fsim/tables/fuel_kg_s/h0/w2/v15</property>
      <property value="0.00491492">fsim/tables/fuel_kg_s/h0/w2/v2</property>
      <property value="0.0051088">fsim/tables/fuel_kg_s/h0/w2/v3</property>
      <property value="0.00534719">fsim/tables/fuel_kg_s/h0/w2/v4</property>
      <property value="0.00561575">fsim/tables/fuel_kg_s/h0/w2/v5</property>
      <property value="0.0059174">fsim/tables/fuel_kg_s/h0/w2/v6</property>
      <property value="0.00624916">fsim/tables/fuel_kg_s/h0/w2/v7</property>
      <property value="0.00662186">fsim/tables/fuel_kg_s/h0/w2/v8</property>
      <property value="0.00700938">fsim/tables/fuel_kg_s/h0/w2/v9</property>
      <property value="0.00424883">fsim/tables/fuel_kg_s/h1/w0/v0</property>
      <property value="0.00435409">fsim/tables/fuel_kg_s/h1/w0/v1</property>
      <property value="0.0068931">fsim/tables/fuel_kg_s/h1/w0/v10</property>
      <property value="0.00733072">fsim/tables/fuel_kg_s/h1/w0/v11</property>
      <property value="0.00778756">fsim/tables/fuel_kg_s/h1/w0/v12</property>
      <property value="0.00827798">fsim/tables/fuel_kg_s/h1/w0/v13</property>
      <property value="0.00881838">fsim/tables/fuel_kg_s/h1/w0/v14</property>
      <property value="0.00938326">fsim/tables/fuel_kg_s/h1/w0/v15</property>
      <property value="0.00450071">fsim/tables/fuel_kg_s/h1/w0/v2</property>
      <property value="0.00468939">fsim/tables/fuel_kg_s/h1/w0/v3</property>
      <property value="0.00491046">fsim/tables/fuel_kg_s/h1/w0/v4</property>
      <property value="0.00516945">fsim/tables/fuel_kg_s/h1/w0/v5</property>
      <property value="0.00544935">fsim/tables/fuel_kg_s/h1/w0/v6</property>
      <property value="0.00576808">fsim/tables/fuel_kg_s/h1/w0/v7</property>
      <property value="0.00611417">fsim/tables/fuel_kg_s/h1/w0/v8</property>
      <property value="0.00647419">fsim/tables/fuel_kg_s/h1/w0/v9</property>
      <property value="0.00449217">fsim/tables/fuel_kg_s/h1/w1/v0</property>
      <property value="0.00458802">fsim/tables/fuel_kg_s/h1/w1/v1</property>
      <property value="0.00698735">fsim/tables/fuel_kg_s/h1/w1/v10</property>
      <property value="0.00742135">fsim/tables/fuel_kg_s/h1/w1/v11</property>
      <property value="0.0078738">fsim/tables/fuel_kg_s/h1/w1/v12</property>
      <property value="0.00834497">fsim/tables/fuel_kg_s/h1/w1/v13</property>
      <property value="0.00885163">fsim/tables/fuel_kg_s/h1/w1/v14</property>
      <property value="0.00940795">fsim/tables/fuel_kg_s/h1/w1/v15</property>
      <property value="0.00470674">fsim/tables/fuel_kg_s/h1/w1/v2</property>
      <property value="0.00488236">fsim/tables/fuel_kg_s/h1/w1/v3</property>
      <property value="0.00509827">fsim/tables/fuel_kg_s/h1/w1/v4</property>
      <property value="0.0053311">fsim/tables/fuel_kg_s/h1/w1/v5</property>
      <property value="0.0056129">fsim/tables/fuel_kg_s/h1/w1/v6</property>
      <property value="0.00590308">fsim/tables/fuel_kg_s/h1/w1/v7</property>
      <property value="0.00624728">fsim/tables/fuel_kg_s/h1/w1/v8</property>
      <property value="0.0066063">fsim/tables/fuel_kg_s/h1/w1/v9</property>
      <property value="0.00473992">fsim/tables/fuel_kg_s/h1/w2/v0</property>
      <property value="0.0048194">fsim/tables/fuel_kg_s/h1/w2/v1</property>
      <property value="0.00711288">fsim/tables/fuel_kg_s/h1/w2/v10</property>
      <property value="0.00751462">fsim/tables/fuel_kg_s/h1/w2/v11</property>
      <property value="0.00796233">fsim/tables/fuel_kg_s/h1/w2/v12</property>
      <property value="0.00842783">fsim/tables/fuel_kg_s/h1/w2/v13</property>
      <property value="0.00891237">fsim/tables/fuel_kg_s/h1/w2/v14</property>
      <property value="0.00943337">fsim/tables/fuel_kg_s/h1/w2/v15</property>
      <property value="0.00493252">fsim/tables/fuel_kg_s/h1/w2/v2</property>
      <property value="0.00509776">fsim/tables/fuel_kg_s/h1/w2/v3</property>
      <property value="0.00529061">fsim/tables/fuel_kg_s/h1/w2/v4</property>
      <property value="0.00552144">fsim/tables/fuel_kg_s/h1/w2/v5</property>
      <property value="0.00578064">fsim/tables/fuel_kg_s/h1/w2/v6</property>
      <property value="0.00607186">fsim/tables/fuel_kg_s/h1/w2/v7</property>
      <property value="0.00638406">fsim/tables/fuel_kg_s/h1/w2/v8</property>
      <property value="0.00674184">fsim/tables/fuel_kg_s/h1/w2/v9</property>
      <property value="0.00434228">fsim/tables/fuel_kg_s/h2/w0/v0</property>
      <property value="0.00441752">fsim/tables/fuel_kg_s/h2/w0/v1</property>
      <property value="0.00652762">fsim/tables/fuel_kg_s/h2/w0/v10</property>
      <property value="0.00689943">fsim/tables/fuel_kg_s/h2/w0/v11</property>
      <property value="0.00731">fsim/tables/fuel_kg_s/h2/w0/v12</property>
      <property value="0.00773742">fsim/tables/fuel_kg_s/h2/w0/v13</property>
      <property value="0.00818203">fsim/tables/fuel_kg_s/h2/w0/v14</property>
      <property value="0.0086638">fsim/tables/fuel_kg_s/h2/w0/v15</property>
      <property value="0.00452249">fsim/tables/fuel_kg_s/h2/w0/v2</property>
      <property value="0.00466819">fsim/tables/fuel_kg_s/h2/w0/v3</property>
      <property value="0.00484794">fsim/tables/fuel_kg_s/h2/w0/v4</property>
      <property value="0.00506078">fsim/tables/fuel_kg_s/h2/w0/v5</property>
      <property value="0.00530137">fsim/tables/fuel_kg_s/h2/w0/v6</property>
      <property value="0.00556916">fsim/tables/fuel_kg_s/h2/w0/v7</property>
      <property value="0.00585855">fsim/tables/fuel_kg_s/h2/w0/v8</property>
      <property value="0.00618705">fsim/tables/fuel_kg_s/h2/w0/v9</property>
      <property value="0.00460993">fsim/tables/fuel_kg_s/h2/w1/v0</property>
      <property value="0.00467395">fsim/tables/fuel_kg_s/h2/w1/v1</property>
      <property value="0.00666372">fsim/tables/fuel_kg_s/h2/w1/v10</property>
      <property value="0.00701402">fsim/tables/fuel_kg_s/h2/w1/v11</property>
      <property value="0.00740038">fsim/tables/fuel_kg_s/h2/w1/v12</property>
      <property value="0.00782177">fsim/tables/fuel_kg_s/h2/w1/v13</property>
      <property value="0.00825944">fsim/tables/fuel_kg_s/h2/w1/v14</property>
      <property value="0.00871351">fsim/tables/fuel_kg_s/h2/w1/v15</property>
      <property value="0.00477194">fsim/tables/fuel_kg_s/h2/w1/v2</property>
      <property value="0.00488742">fsim/tables/fuel_kg_s/h2/w1/v3</property>
      <property value="0.00505594">fsim/tables/fuel_kg_s/h2/w1/v4</property>
      <property value="0.00525968">fsim/tables/fuel_kg_s/h2/w1/v5</property>
      <property value="0.00547777">fsim/tables/fuel_kg_s/h2/w1/v6</property>
      <property value="0.0057412">fsim/tables/fuel_kg_s/h2/w1/v7</property>
      <property value="0.00601698">fsim/tables/fuel_kg_s/h2/w1/v8</property>
      <property value="0.00632541">fsim/tables/fuel_kg_s/h2/w1/v9</property>
      <property value="0.00488589">fsim/tables/fuel_kg_s/h2/w2/v0</property>
      <property value="0.00493544">fsim/tables/fuel_kg_s/h2/w2/v1</property>
      <property value="0.00679314">fsim/tables/fuel_kg_s/h2/w2/v10</property>
      <property value="0.00713893">fsim/tables/fuel_kg_s/h2/w2/v11</property>
      <property value="0.00749646">fsim/tables/fuel_kg_s/h2/w2/v12</property>
      <property value="0.00789295">fsim/tables/fuel_kg_s/h2/w2/v13</property>
      <property value="0.0083217">fsim/tables/fuel_kg_s/h2/w2/v14</property>
      <property value="0.00876546">fsim/tables/fuel_kg_s/h2/w2/v15</property>
      <property value="0.00501638">fsim/tables/fuel_kg_s/h2/w2/v2</property>
      <property value="0.00512145">fsim/tables/fuel_kg_s/h2/w2/v3</property>
      <property value="0.00528131">fsim/tables/fuel_kg_s/h2/w2/v4</property>
      <property value="0.00545957">fsim/tables/fuel_kg_s/h2/w2/v5</property>
      <property value="0.00567897">fsim/tables/fuel_kg_s/h2/w2/v6</property>
      <property value="0.00591152">fsim/tables/fuel_kg_s/h2/w2/v7</property>
      <property value="0.00618628">fsim/tables/fuel_kg_s/h2/w2/v8</property>
      <property value="0.00646831">fsim/tables/fuel_kg_s/h2/w2/v9</property>
      <property value="0.00448047">fsim/tables/fuel_kg_s/h3/w0/v0</property>
      <property value="0.00452661">fsim/tables/fuel_kg_s/h3/w0/v1</property>
      <property value="0.00620954">fsim/tables/fuel_kg_s/h3/w0/v10</property>
      <property value="0.00652376">fsim/tables/fuel_kg_s/h3/w0/v11</property>
      <property value="0.00684846">fsim/tables/fuel_kg_s/h3/w0/v12</property>
      <property value="0.00720625">fsim/tables/fuel_kg_s/h3/w0/v13</property>
      <property value="0.00759496">fsim/tables/fuel_kg_s/h3/w0/v14</property>
      <property value="0.00799779">fsim/tables/fuel_kg_s/h3/w0/v15</property>
      <property value="0.00460082">fsim/tables/fuel_kg_s/h3/w0/v2</property>
      <property value="0.00469899">fsim/tables/fuel_kg_s/h3/w0/v3</property>
      <property value="0.00483428">fsim/tables/fuel_kg_s/h3/w0/v4</property>
      <property value="0.00499652">fsim/tables/fuel_kg_s/h3/w0/v5</property>
      <property value="0.00519743">fsim/tables/fuel_kg_s/h3/w0/v6</property>
      <property value="0.00540831">fsim/tables/fuel_kg_s/h3/w0/v7</property>
      <property value="0.00565885">fsim/tables/fuel_kg_s/h3/w0/v8</property>
      <property value="0.00591581">fsim/tables/fuel_kg_s/h3/w0/v9</property>
      <property value="0.00476361">fsim/tables/fuel_kg_s/h3/w1/v0</property>
      <property value="0.00479811">fsim/tables/fuel_kg_s/h3/w1/v1</property>
      <property value="0.00630938">fsim/tables/fuel_kg_s/h3/w1/v10</property>
      <property value="0.00660118">fsim/tables/fuel_kg_s/h3/w1/v11</property>
      <property value="0.00691408">fsim/tables/fuel_kg_s/h3/w1/v12</property>
      <property value="0.00723674">fsim/tables/fuel_kg_s/h3/w1/v13</property>
      <property value="0.00758129">fsim/tables/fuel_kg_s/h3/w1/v14</property>
      <property value="0.00796528">fsim/tables/fuel_kg_s/h3/w1/v15</property>
      <property value="0.00486405">fsim/tables/fuel_kg_s/h3/w1/v2</property>
      <property value="0.0049562">fsim/tables/fuel_kg_s/h3/w1/v3</property>
      <property value="0.00505435">fsim/tables/fuel_kg_s/h3/w1/v4</property>
      <property value="0.00521064">fsim/tables/fuel_kg_s/h3/w1/v5</property>
      <property value="0.00538445">fsim/tables/fuel_kg_s/h3/w1/v6</property>
      <property value="0.00558511">fsim/tables/fuel_kg_s/h3/w1/v7</property>
      <property value="0.00580204">fsim/tables/fuel_kg_s/h3/w1/v8</property>
      <property value="0.00605266">fsim/tables/fuel_kg_s/h3/w1/v9</property>
      <property value="0.00506643">fsim/tables/fuel_kg_s/h3/w2/v0</property>
      <property value="0.0050874">fsim/tables/fuel_kg_s/h3/w2/v1</property>
      <property value="0.00643922">fsim/tables/fuel_kg_s/h3/w2/v10</property>
      <property value="0.00669409">fsim/tables/fuel_kg_s/h3/w2/v11</property>
      <property value="0.00697946">fsim/tables/fuel_kg_s/h3/w2/v12</property>
      <property value="0.00728897">fsim/tables/fuel_kg_s/h3/w2/v13</property>
      <property value="0.00760735">fsim/tables/fuel_kg_s/h3/w2/v14</property>
      <property value="0.00793447">fsim/tables/fuel_kg_s/h3/w2/v15</property>
      <property value="0.00513662">fsim/tables/fuel_kg_s/h3/w2/v2</property>
      <property value="0.00520764">fsim/tables/fuel_kg_s/h3/w2/v3</property>
      <property value="0.00530587">fsim/tables/fuel_kg_s/h3/w2/v4</property>
      <property value="0.00543342">fsim/tables/fuel_kg_s/h3/w2/v5</property>
      <property value="0.00558755">fsim/tables/fuel_kg_s/h3/w2/v6</property>
      <property value="0.0057709">fsim/tables/fuel_kg_s/h3/w2/v7</property>
      <property value="0.0059703">fsim/tables/fuel_kg_s/h3/w2/v8</property>
      <property value="0.00619005">fsim/tables/fuel_kg_s/h3/w2/v9</property>
      <property value="0.0046025">fsim/tables/fuel_kg_s/h4/w0/v0</property>
      <property value="0.00462905">fsim/tables/fuel_kg_s/h4/w0/v1</property>
      <property value="0.00595595">fsim/tables/fuel_kg_s/h4/w0/v10</property>
      <property value="0.00620151">fsim/tables/fuel_kg_s/h4/w0/v11</property>
      <property value="0.00648682">fsim/tables/fuel_kg_s/h4/w0/v12</property>
      <property value="0.00678051">fsim/tables/fuel_kg_s/h4/w0/v13</property>
      <property value="0.00708289">fsim/tables/fuel_kg_s/h4/w0/v14</property>
      <property value="0.00741559">fsim/tables/fuel_kg_s/h4/w0/v15</property>
      <property value="0.00468306">fsim/tables/fuel_kg_s/h4/w0/v2</property>
      <property value="0.00475908">fsim/tables/fuel_kg_s/h4/w0/v3</property>
      <property value="0.00484698">fsim/tables/fuel_kg_s/h4/w0/v4</property>
      <property value="0.0049761">fsim/tables/fuel_kg_s/h4/w0/v5</property>
      <property value="0.00512187">fsim/tables/fuel_kg_s/h4/w0/v6</property>
      <property value="0.0053081">fsim/tables/fuel_kg_s/h4/w0/v7</property>
      <property value="0.00549619">fsim/tables/fuel_kg_s/h4/w0/v8</property>
      <property value="0.00572031">fsim/tables/fuel_kg_s/h4/w0/v9</property>
      <property value="0.00490778">fsim/tables/fuel_kg_s/h4/w1/v0</property>
      <property value="0.00492082">fsim/tables/fuel_kg_s/h4/w1/v1</property>
      <property value="0.00608731">fsim/tables/fuel_kg_s/h4/w1/v10</property>
      <property value="0.00632014">fsim/tables/fuel_kg_s/h4/w1/v11</property>
      <property value="0.00655807">fsim/tables/fuel_kg_s/h4/w1/v12</property>
      <property value="0.00683505">fsim/tables/fuel_kg_s/h4/w1/v13</property>
      <property value="0.00712324">fsim/tables/fuel_kg_s/h4/w1/v14</property>
      <property value="0.00741851">fsim/tables/fuel_kg_s/h4/w1/v15</property>
      <property value="0.00495803">fsim/tables/fuel_kg_s/h4/w1/v2</property>
      <property value="0.00502261">fsim/tables/fuel_kg_s/h4/w1/v3</property>
      <property value="0.00511212">fsim/tables/fuel_kg_s/h4/w1/v4</property>
      <property value="0.00520046">fsim/tables/fuel_kg_s/h4/w1/v5</property>
      <property value="0.00534462">fsim/tables/fuel_kg_s/h4/w1/v6</property>
      <property value="0.00549527">fsim/tables/fuel_kg_s/h4/w1/v7</property>
      <property value="0.00567954">fsim/tables/fuel_kg_s/h4/w1/v8</property>
      <property value="0.00586563">fsim/tables/fuel_kg_s/h4/w1/v9</property>
      <property value="0.00521854">fsim/tables/fuel_kg_s/h4/w2/v0</property>
      <property value="0.0052173">fsim/tables/fuel_kg_s/h4/w2/v1</property>
      <property value="0.00620212">fsim/tables/fuel_kg_s/h4/w2/v10</property>
      <property value="0.00640773">fsim/tables/fuel_kg_s/h4/w2/v11</property>
      <property value="0.00663214">fsim/tables/fuel_kg_s/h4/w2/v12</property>
      <property value="0.00686092">fsim/tables/fuel_kg_s/h4/w2/v13</property>
      <property value="0.00710797">fsim/tables/fuel_kg_s/h4/w2/v14</property>
      <property value="0.00738184">fsim/tables/fuel_kg_s/h4/w2/v15</property>
      <property value="0.00524972">fsim/tables/fuel_kg_s/h4/w2/v2</property>
      <property value="0.00530154">fsim/tables/fuel_kg_s/h4/w2/v3</property>
      <property value="0.00536597">fsim/tables/fuel_kg_s/h4/w2/v4</property>
      <property value="0.00545576">fsim/tables/fuel_kg_s/h4/w2/v5</property>
      <property value="0.00555834">fsim/tables/fuel_kg_s/h4/w2/v6</property>
      <property value="0.00569752">fsim/tables/fuel_kg_s/h4/w2/v7</property>
      <property value="0.00584354">fsim/tables/fuel_kg_s/h4/w2/v8</property>
      <property value="0.00602202">fsim/tables/fuel_kg_s/h4/w2/v9</property>
      <property value="0.00469758">fsim/tables/fuel_kg_s/h5/w0/v0</property>
      <property value="0.0047101">fsim/tables/fuel_kg_s/h5/w0/v1</property>
      <property value="0.00581199">fsim/tables/fuel_kg_s/h5/w0/v10</property>
      <property value="0.00603347">fsim/tables/fuel_kg_s/h5/w0/v11</property>
      <property value="0.00625971">fsim/tables/fuel_kg_s/h5/w0/v12</property>
      <property value="0.00652039">fsim/tables/fuel_kg_s/h5/w0/v13</property>
      <property value="0.00679397">fsim/tables/fuel_kg_s/h5/w0/v14</property>
      <property value="0.00707416">fsim/tables/fuel_kg_s/h5/w0/v15</property>
      <property value="0.00474531">fsim/tables/fuel_kg_s/h5/w0/v2</property>
      <property value="0.00480795">fsim/tables/fuel_kg_s/h5/w0/v3</property>
      <property value="0.00489295">fsim/tables/fuel_kg_s/h5/w0/v4</property>
      <property value="0.00497264">fsim/tables/fuel_kg_s/h5/w0/v5</property>
      <property value="0.00510787">fsim/tables/fuel_kg_s/h5/w0/v6</property>
      <property value="0.00524992">fsim/tables/fuel_kg_s/h5/w0/v7</property>
      <property value="0.00542574">fsim/tables/fuel_kg_s/h5/w0/v8</property>
      <property value="0.0056032">fsim/tables/fuel_kg_s/h5/w0/v9</property>
      <property value="0.0050085">fsim/tables/fuel_kg_s/h5/w1/v0</property>
      <property value="0.00500889">fsim/tables/fuel_kg_s/h5/w1/v1</property>
      <property value="0.00592758">fsim/tables/fuel_kg_s/h5/w1/v10</property>
      <property value="0.00611691">fsim/tables/fuel_kg_s/h5/w1/v11</property>
      <property value="0.00632917">fsim/tables/fuel_kg_s/h5/w1/v12</property>
      <property value="0.00654541">fsim/tables/fuel_kg_s/h5/w1/v13</property>
      <property value="0.00677255">fsim/tables/fuel_kg_s/h5/w1/v14</property>
      <property value="0.00703083">fsim/tables/fuel_kg_s/h5/w1/v15</property>
      <property value="0.00503905">fsim/tables/fuel_kg_s/h5/w1/v2</property>
      <property value="0.00508673">fsim/tables/fuel_kg_s/h5/w1/v3</property>
      <property value="0.00514569">fsim/tables/fuel_kg_s/h5/w1/v4</property>
      <property value="0.00523314">fsim/tables/fuel_kg_s/h5/w1/v5</property>
      <property value="0.00531999">fsim/tables/fuel_kg_s/h5/w1/v6</property>
      <property value="0.00545276">fsim/tables/fuel_kg_s/h5/w1/v7</property>
      <property value="0.00558718">fsim/tables/fuel_kg_s/h5/w1/v8</property>
      <property value="0.00575667">fsim/tables/fuel_kg_s/h5/w1/v9</property>
      <property value="0.00533103">fsim/tables/fuel_kg_s/h5/w2/v0</property>
      <property value="0.00532818">fsim/tables/fuel_kg_s/h5/w2/v1</property>
      <property value="0.00604994">fsim/tables/fuel_kg_s/h5/w2/v10</property>
      <property value="0.00621044">fsim/tables/fuel_kg_s/h5/w2/v11</property>
      <property value="0.00637227">fsim/tables/fuel_kg_s/h5/w2/v12</property>
      <property value="0.00656324">fsim/tables/fuel_kg_s/h5/w2/v13</property>
      <property value="0.00676382">fsim/tables/fuel_kg_s/h5/w2/v14</property>
      <property value="0.0069657">fsim/tables/fuel_kg_s/h5/w2/v15</property>
      <property value="0.00534212">fsim/tables/fuel_kg_s/h5/w2/v2</property>
      <property value="0.00536804">fsim/tables/fuel_kg_s/h5/w2/v3</property>
      <property value="0.0054248">fsim/tables/fuel_kg_s/h5/w2/v4</property>
      <property value="0.00548557">fsim/tables/fuel_kg_s/h5/w2/v5</property>
      <property value="0.00556609">fsim/tables/fuel_kg_s/h5/w2/v6</property>
      <property value="0.00565016">fsim/tables/fuel_kg_s/h5/w2/v7</property>
      <property value="0.00577523">fsim/tables/fuel_kg_s/h5/w2/v8</property>
      <property value="0.00589943">fsim/tables/fuel_kg_s/h5/w2/v9</property>
      <property value="0.00479251">fsim/tables/fuel_kg_s/h6/w0/v0</property>
      <property value="0.00479459">fsim/tables/fuel_kg_s/h6/w0/v1</property>
      <property value="0.00566015">fsim/tables/fuel_kg_s/h6/w0/v10</property>
      <property value="0.00583768">fsim/tables/fuel_kg_s/h6/w0/v11</property>
      <property value="0.00603934">fsim/tables/fuel_kg_s/h6/w0/v12</property>
      <property value="0.0062447">fsim/tables/fuel_kg_s/h6/w0/v13</property>
      <property value="0.00645746">fsim/tables/fuel_kg_s/h6/w0/v14</property>
      <property value="0.0067024">fsim/tables/fuel_kg_s/h6/w0/v15</property>
      <property value="0.00482307">fsim/tables/fuel_kg_s/h6/w0/v2</property>
      <property value="0.00486793">fsim/tables/fuel_kg_s/h6/w0/v3</property>
      <property value="0.0049235">fsim/tables/fuel_kg_s/h6/w0/v4</property>
      <property value="0.00500784">fsim/tables/fuel_kg_s/h6/w0/v5</property>
      <property value="0.00508384">fsim/tables/fuel_kg_s/h6/w0/v6</property>
      <property value="0.00520969">fsim/tables/fuel_kg_s/h6/w0/v7</property>
      <property value="0.00533584">fsim/tables/fuel_kg_s/h6/w0/v8</property>
      <property value="0.00549736">fsim/tables/fuel_kg_s/h6/w0/v9</property>
      <property value="0.00511666">fsim/tables/fuel_kg_s/h6/w1/v0</property>
      <property value="0.00511388">fsim/tables/fuel_kg_s/h6/w1/v1</property>
      <property value="0.00578306">fsim/tables/fuel_kg_s/h6/w1/v10</property>
      <property value="0.00593532">fsim/tables/fuel_kg_s/h6/w1/v11</property>
      <property value="0.00608873">fsim/tables/fuel_kg_s/h6/w1/v12</property>
      <property value="0.00626383">fsim/tables/fuel_kg_s/h6/w1/v13</property>
      <property value="0.00645336">fsim/tables/fuel_kg_s/h6/w1/v14</property>
      <property value="0.00664386">fsim/tables/fuel_kg_s/h6/w1/v15</property>
      <property value="0.0051263">fsim/tables/fuel_kg_s/h6/w1/v2</property>
      <property value="0.00515224">fsim/tables/fuel_kg_s/h6/w1/v3</property>
      <property value="0.00520442">fsim/tables/fuel_kg_s/h6/w1/v4</property>
      <property value="0.00525975">fsim/tables/fuel_kg_s/h6/w1/v5</property>
      <property value="0.00533821">fsim/tables/fuel_kg_s/h6/w1/v6</property>
      <property value="0.00540726">fsim/tables/fuel_kg_s/h6/w1/v7</property>
      <property value="0.00552651">fsim/tables/fuel_kg_s/h6/w1/v8</property>
      <property value="0.00564484">fsim/tables/fuel_kg_s/h6/w1/v9</property>
      <property value="0.00544903">fsim/tables/fuel_kg_s/h6/w2/v0</property>
      <property value="0.00543798">fsim/tables/fuel_kg_s/h6/w2/v1</property>
      <property value="0.00592328">fsim/tables/fuel_kg_s/h6/w2/v10</property>
      <property value="0.00603031">fsim/tables/fuel_kg_s/h6/w2/v11</property>
      <property value="0.00616079">fsim/tables/fuel_kg_s/h6/w2/v12</property>
      <property value="0.00629856">fsim/tables/fuel_kg_s/h6/w2/v13</property>
      <property value="0.00643625">fsim/tables/fuel_kg_s/h6/w2/v14</property>
      <property value="0.00657648">fsim/tables/fuel_kg_s/h6/w2/v15</property>
      <property value="0.00543636">fsim/tables/fuel_kg_s/h6/w2/v2</property>
      <property value="0.00546166">fsim/tables/fuel_kg_s/h6/w2/v3</property>
      <property value="0.00548792">fsim/tables/fuel_kg_s/h6/w2/v4</property>
      <property value="0.00553719">fsim/tables/fuel_kg_s/h6/w2/v5</property>
      <property value="0.00558535">fsim/tables/fuel_kg_s/h6/w2/v6</property>
      <property value="0.00565933">fsim/tables/fuel_kg_s/h6/w2/v7</property>
      <property value="0.00571897">fsim/tables/fuel_kg_s/h6/w2/v8</property>
      <property value="0.00581564">fsim/tables/fuel_kg_s/h6/w2/v9</property>
      <property value="4.14476">fsim/tables/max_climb_ms/h0/w0</property>
      <property value="3.78082">fsim/tables/max_climb_ms/h0/w1</property>
      <property value="3.44398">fsim/tables/max_climb_ms/h0/w2</property>
      <property value="3.54983">fsim/tables/max_climb_ms/h1/w0</property>
      <property value="3.20417">fsim/tables/max_climb_ms/h1/w1</property>
      <property value="2.88507">fsim/tables/max_climb_ms/h1/w2</property>
      <property value="2.88693">fsim/tables/max_climb_ms/h2/w0</property>
      <property value="2.56616">fsim/tables/max_climb_ms/h2/w1</property>
      <property value="2.27262">fsim/tables/max_climb_ms/h2/w2</property>
      <property value="2.24592">fsim/tables/max_climb_ms/h3/w0</property>
      <property value="1.9478">fsim/tables/max_climb_ms/h3/w1</property>
      <property value="1.66892">fsim/tables/max_climb_ms/h3/w2</property>
      <property value="1.78504">fsim/tables/max_climb_ms/h4/w0</property>
      <property value="1.49564">fsim/tables/max_climb_ms/h4/w1</property>
      <property value="1.2252">fsim/tables/max_climb_ms/h4/w2</property>
      <property value="1.47258">fsim/tables/max_climb_ms/h5/w0</property>
      <property value="1.19019">fsim/tables/max_climb_ms/h5/w1</property>
      <property value="0.927542">fsim/tables/max_climb_ms/h5/w2</property>
      <property value="1.17043">fsim/tables/max_climb_ms/h6/w0</property>
      <property value="0.896305">fsim/tables/max_climb_ms/h6/w1</property>
      <property value="0.638551">fsim/tables/max_climb_ms/h6/w2</property>
      <property value="63.4545">fsim/tables/max_tas_ms/h0/w0</property>
      <property value="63.2816">fsim/tables/max_tas_ms/h0/w1</property>
      <property value="63.1068">fsim/tables/max_tas_ms/h0/w2</property>
      <property value="62.6809">fsim/tables/max_tas_ms/h1/w0</property>
      <property value="62.4687">fsim/tables/max_tas_ms/h1/w1</property>
      <property value="62.2622">fsim/tables/max_tas_ms/h1/w2</property>
      <property value="61.6959">fsim/tables/max_tas_ms/h2/w0</property>
      <property value="61.4797">fsim/tables/max_tas_ms/h2/w1</property>
      <property value="61.2066">fsim/tables/max_tas_ms/h2/w2</property>
      <property value="60.4658">fsim/tables/max_tas_ms/h3/w0</property>
      <property value="59.8514">fsim/tables/max_tas_ms/h3/w1</property>
      <property value="59.2432">fsim/tables/max_tas_ms/h3/w2</property>
      <property value="58.9641">fsim/tables/max_tas_ms/h4/w0</property>
      <property value="58.3379">fsim/tables/max_tas_ms/h4/w1</property>
      <property value="57.4406">fsim/tables/max_tas_ms/h4/w2</property>
      <property value="57.9156">fsim/tables/max_tas_ms/h5/w0</property>
      <property value="56.9491">fsim/tables/max_tas_ms/h5/w1</property>
      <property value="55.7595">fsim/tables/max_tas_ms/h5/w2</property>
      <property value="56.506">fsim/tables/max_tas_ms/h6/w0</property>
      <property value="55.28">fsim/tables/max_tas_ms/h6/w1</property>
      <property value="53.8504">fsim/tables/max_tas_ms/h6/w2</property>
      <property value="35.5491">fsim/tables/min_tas_ms/h0/w0</property>
      <property value="35.6573">fsim/tables/min_tas_ms/h0/w1</property>
      <property value="35.8062">fsim/tables/min_tas_ms/h0/w2</property>
      <property value="35.4403">fsim/tables/min_tas_ms/h1/w0</property>
      <property value="35.629">fsim/tables/min_tas_ms/h1/w1</property>
      <property value="35.8553">fsim/tables/min_tas_ms/h1/w2</property>
      <property value="35.4599">fsim/tables/min_tas_ms/h2/w0</property>
      <property value="35.7439">fsim/tables/min_tas_ms/h2/w1</property>
      <property value="36.0583">fsim/tables/min_tas_ms/h2/w2</property>
      <property value="35.6462">fsim/tables/min_tas_ms/h3/w0</property>
      <property value="36.0266">fsim/tables/min_tas_ms/h3/w1</property>
      <property value="36.4315">fsim/tables/min_tas_ms/h3/w2</property>
      <property value="35.8959">fsim/tables/min_tas_ms/h4/w0</property>
      <property value="36.3487">fsim/tables/min_tas_ms/h4/w1</property>
      <property value="36.8283">fsim/tables/min_tas_ms/h4/w2</property>
      <property value="36.1226">fsim/tables/min_tas_ms/h5/w0</property>
      <property value="36.6313">fsim/tables/min_tas_ms/h5/w1</property>
      <property value="37.1776">fsim/tables/min_tas_ms/h5/w2</property>
      <property value="36.3961">fsim/tables/min_tas_ms/h6/w0</property>
      <property value="36.9773">fsim/tables/min_tas_ms/h6/w1</property>
      <property value="37.6642">fsim/tables/min_tas_ms/h6/w2</property>
      <property value="4.12126">fsim/tables/ps_full_ms/h0/w0/v0</property>
      <property value="4.14464">fsim/tables/ps_full_ms/h0/w0/v1</property>
      <property value="2.88665">fsim/tables/ps_full_ms/h0/w0/v10</property>
      <property value="2.59309">fsim/tables/ps_full_ms/h0/w0/v11</property>
      <property value="2.23791">fsim/tables/ps_full_ms/h0/w0/v12</property>
      <property value="1.83238">fsim/tables/ps_full_ms/h0/w0/v13</property>
      <property value="1.38714">fsim/tables/ps_full_ms/h0/w0/v14</property>
      <property value="0.889139">fsim/tables/ps_full_ms/h0/w0/v15</property>
      <property value="4.12903">fsim/tables/ps_full_ms/h0/w0/v2</property>
      <property value="4.08998">fsim/tables/ps_full_ms/h0/w0/v3</property>
      <property value="4.02759">fsim/tables/ps_full_ms/h0/w0/v4</property>
      <property value="3.92813">fsim/tables/ps_full_ms/h0/w0/v5</property>
      <property value="3.78599">fsim/tables/ps_full_ms/h0/w0/v6</property>
      <property value="3.60175">fsim/tables/ps_full_ms/h0/w0/v7</property>
      <property value="3.38375">fsim/tables/ps_full_ms/h0/w0/v8</property>
      <property value="3.14491">fsim/tables/ps_full_ms/h0/w0/v9</property>
      <property value="3.75238">fsim/tables/ps_full_ms/h0/w1/v0</property>
      <property value="3.78029">fsim/tables/ps_full_ms/h0/w1/v1</property>
      <property value="2.64461">fsim/tables/ps_full_ms/h0/w1/v10</property>
      <property value="2.36856">fsim/tables/ps_full_ms/h0/w1/v11</property>
      <property value="2.05786">fsim/tables/ps_full_ms/h0/w1/v12</property>
      <property value="1.68255">fsim/tables/ps_full_ms/h0/w1/v13</property>
      <property value="1.26302">fsim/tables/ps_full_ms/h0/w1/v14</property>
      <property value="0.805646">fsim/tables/ps_full_ms/h0/w1/v15</property>
      <property value="3.7708">fsim/tables/ps_full_ms/h0/w1/v2</property>
      <property value="3.74209">fsim/tables/ps_full_ms/h0/w1/v3</property>
      <property value="3.68907">fsim/tables/ps_full_ms/h0/w1/v4</property>
      <property value="3.60208">fsim/tables/ps_full_ms/h0/w1/v5</property>
      <property value="3.47358">fsim/tables/ps_full_ms/h0/w1/v6</property>
      <property value="3.30155">fsim/tables/ps_full_ms/h0/w1/v7</property>
      <property value="3.10321">fsim/tables/ps_full_ms/h0/w1/v8</property>
      <property value="2.88984">fsim/tables/ps_full_ms/h0/w1/v9</property>
      <property value="3.41075">fsim/tables/ps_full_ms/h0/w2/v0</property>
      <property value="3.4422">fsim/tables/ps_full_ms/h0/w2/v1</property>
      <property value="2.42479">fsim/tables/ps_full_ms/h0/w2/v10</property>
      <property value="2.16159">fsim/tables/ps_full_ms/h0/w2/v11</property>
      <property value="1.86979">fsim/tables/ps_full_ms/h0/w2/v12</property>
      <property value="1.54373">fsim/tables/ps_full_ms/h0/w2/v13</property>
      <property value="1.15151">fsim/tables/ps_full_ms/h0/w2/v14</property>
      <property value="0.720818">fsim/tables/ps_full_ms/h0/w2/v15</property>
      <property value="3.43902">fsim/tables/ps_full_ms/h0/w2/v2</property>
      <property value="3.41864">fsim/tables/ps_full_ms/h0/w2/v3</property>
      <property value="3.37565">fsim/tables/ps_full_ms/h0/w2/v4</property>
      <property value="3.29688">fsim/tables/ps_full_ms/h0/w2/v5</property>
      <property value="3.18137">fsim/tables/ps_full_ms/h0/w2/v6</property>
      <property value="3.02495">fsim/tables/ps_full_ms/h0/w2/v7</property>
      <property value="2.83606">fsim/tables/ps_full_ms/h0/w2/v8</property>
      <property value="2.64806">fsim/tables/ps_full_ms/h0/w2/v9</property>
      <property value="3.51363">fsim/tables/ps_full_ms/h1/w0/v0</property>
      <property value="3.54814">fsim/tables/ps_full_ms/h1/w0/v1</property>
      <property value="2.48484">fsim/tables/ps_full_ms/h1/w0/v10</property>
      <property value="2.21736">fsim/tables/ps_full_ms/h1/w0/v11</property>
      <property value="1.92068">fsim/tables/ps_full_ms/h1/w0/v12</property>
      <property value="1.57832">fsim/tables/ps_full_ms/h1/w0/v13</property>
      <property value="1.1754">fsim/tables/ps_full_ms/h1/w0/v14</property>
      <property value="0.736395">fsim/tables/ps_full_ms/h1/w0/v15</property>
      <property value="3.54351">fsim/tables/ps_full_ms/h1/w0/v2</property>
      <property value="3.5187">fsim/tables/ps_full_ms/h1/w0/v3</property>
      <property value="3.47144">fsim/tables/ps_full_ms/h1/w0/v4</property>
      <property value="3.38938">fsim/tables/ps_full_ms/h1/w0/v5</property>
      <property value="3.26898">fsim/tables/ps_full_ms/h1/w0/v6</property>
      <property value="3.1066">fsim/tables/ps_full_ms/h1/w0/v7</property>
      <property value="2.91441">fsim/tables/ps_full_ms/h1/w0/v8</property>
      <property value="2.71745">fsim/tables/ps_full_ms/h1/w0/v9</property>
      <property value="3.16123">fsim/tables/ps_full_ms/h1/w1/v0</property>
      <property value="3.20013">fsim/tables/ps_full_ms/h1/w1/v1</property>
      <property value="2.26228">fsim/tables/ps_full_ms/h1/w1/v10</property>
      <property value="2.01111">fsim/tables/ps_full_ms/h1/w1/v11</property>
      <property value="1.7305">fsim/tables/ps_full_ms/h1/w1/v12</property>
      <property value="1.42223">fsim/tables/ps_full_ms/h1/w1/v13</property>
      <property value="1.06899">fsim/tables/ps_full_ms/h1/w1/v14</property>
      <property value="0.658265">fsim/tables/ps_full_ms/h1/w1/v15</property>
      <property value="3.20227">fsim/tables/ps_full_ms/h1/w1/v2</property>
      <property value="3.18619">fsim/tables/ps_full_ms/h1/w1/v3</property>
      <property value="3.14933">fsim/tables/ps_full_ms/h1/w1/v4</property>
      <property value="3.0763">fsim/tables/ps_full_ms/h1/w1/v5</property>
      <property value="2.96705">fsim/tables/ps_full_ms/h1/w1/v6</property>
      <property value="2.82288">fsim/tables/ps_full_ms/h1/w1/v7</property>
      <property value="2.643">fsim/tables/ps_full_ms/h1/w1/v8</property>
      <property value="2.463">fsim/tables/ps_full_ms/h1/w1/v9</property>
      <property value="2.83391">fsim/tables/ps_full_ms/h1/w2/v0</property>
      <property value="2.87638">fsim/tables/ps_full_ms/h1/w2/v1</property>
      <property value="2.04221">fsim/tables/ps_full_ms/h1/w2/v10</property>
      <property value="1.82315">fsim/tables/ps_full_ms/h1/w2/v11</property>
      <property value="1.55764">fsim/tables/ps_full_ms/h1/w2/v12</property>
      <property value="1.26638">fsim/tables/ps_full_ms/h1/w2/v13</property>
      <property value="0.948757">fsim/tables/ps_full_ms/h1/w2/v14</property>
      <property value="0.587416">fsim/tables/ps_full_ms/h1/w2/v15</property>
      <property value="2.88504">fsim/tables/ps_full_ms/h1/w2/v2</property>
      <property value="2.87851">fsim/tables/ps_full_ms/h1/w2/v3</property>
      <property value="2.84816">fsim/tables/ps_full_ms/h1/w2/v4</property>
      <property value="2.78474">fsim/tables/ps_full_ms/h1/w2/v5</property>
      <property value="2.68571">fsim/tables/ps_full_ms/h1/w2/v6</property>
      <property value="2.55358">fsim/tables/ps_full_ms/h1/w2/v7</property>
      <property value="2.39407">fsim/tables/ps_full_ms/h1/w2/v8</property>
      <property value="2.22306">fsim/tables/ps_full_ms/h1/w2/v9</property>
      <property value="2.82889">fsim/tables/ps_full_ms/h2/w0/v0</property>
      <property value="2.87588">fsim/tables/ps_full_ms/h2/w0/v1</property>
      <property value="2.03424">fsim/tables/ps_full_ms/h2/w0/v10</property>
      <property value="1.8123">fsim/tables/ps_full_ms/h2/w0/v11</property>
      <property value="1.54573">fsim/tables/ps_full_ms/h2/w0/v12</property>
      <property value="1.25358">fsim/tables/ps_full_ms/h2/w0/v13</property>
      <property value="0.935152">fsim/tables/ps_full_ms/h2/w0/v14</property>
      <property value="0.569273">fsim/tables/ps_full_ms/h2/w0/v15</property>
      <property value="2.88689">fsim/tables/ps_full_ms/h2/w0/v2</property>
      <property value="2.87947">fsim/tables/ps_full_ms/h2/w0/v3</property>
      <property value="2.84832">fsim/tables/ps_full_ms/h2/w0/v4</property>
      <property value="2.78423">fsim/tables/ps_full_ms/h2/w0/v5</property>
      <property value="2.68352">fsim/tables/ps_full_ms/h2/w0/v6</property>
      <property value="2.55038">fsim/tables/ps_full_ms/h2/w0/v7</property>
      <property value="2.38897">fsim/tables/ps_full_ms/h2/w0/v8</property>
      <property value="2.21621">fsim/tables/ps_full_ms/h2/w0/v9</property>
      <property value="2.49588">fsim/tables/ps_full_ms/h2/w1/v0</property>
      <property value="2.54321">fsim/tables/ps_full_ms/h2/w1/v1</property>
      <property value="1.80279">fsim/tables/ps_full_ms/h2/w1/v10</property>
      <property value="1.60971">fsim/tables/ps_full_ms/h2/w1/v11</property>
      <property value="1.37391">fsim/tables/ps_full_ms/h2/w1/v12</property>
      <property value="1.09895">fsim/tables/ps_full_ms/h2/w1/v13</property>
      <property value="0.800147">fsim/tables/ps_full_ms/h2/w1/v14</property>
      <property value="0.476566">fsim/tables/ps_full_ms/h2/w1/v15</property>
      <property value="2.5629">fsim/tables/ps_full_ms/h2/w1/v2</property>
      <property value="2.56487">fsim/tables/ps_full_ms/h2/w1/v3</property>
      <property value="2.54159">fsim/tables/ps_full_ms/h2/w1/v4</property>
      <property value="2.48459">fsim/tables/ps_full_ms/h2/w1/v5</property>
      <property value="2.39676">fsim/tables/ps_full_ms/h2/w1/v6</property>
      <property value="2.27273">fsim/tables/ps_full_ms/h2/w1/v7</property>
      <property value="2.12956">fsim/tables/ps_full_ms/h2/w1/v8</property>
      <property value="1.97729">fsim/tables/ps_full_ms/h2/w1/v9</property>
      <property value="2.18714">fsim/tables/ps_full_ms/h2/w2/v0</property>
      <property value="2.23353">fsim/tables/ps_full_ms/h2/w2/v1</property>
      <property value="1.59731">fsim/tables/ps_full_ms/h2/w2/v10</property>
      <property value="1.4135">fsim/tables/ps_full_ms/h2/w2/v11</property>
      <property value="1.21258">fsim/tables/ps_full_ms/h2/w2/v12</property>
      <property value="0.968109">fsim/tables/ps_full_ms/h2/w2/v13</property>
      <property value="0.688778">fsim/tables/ps_full_ms/h2/w2/v14</property>
      <property value="0.387087">fsim/tables/ps_full_ms/h2/w2/v15</property>
      <property value="2.26063">fsim/tables/ps_full_ms/h2/w2/v2</property>
      <property value="2.27262">fsim/tables/ps_full_ms/h2/w2/v3</property>
      <property value="2.2556">fsim/tables/ps_full_ms/h2/w2/v4</property>
      <property value="2.20672">fsim/tables/ps_full_ms/h2/w2/v5</property>
      <property value="2.127">fsim/tables/ps_full_ms/h2/w2/v6</property>
      <property value="2.02019">fsim/tables/ps_full_ms/h2/w2/v7</property>
      <property value="1.88339">fsim/tables/ps_full_ms/h2/w2/v8</property>
      <property value="1.75628">fsim/tables/ps_full_ms/h2/w2/v9</property>
      <property value="2.15562">fsim/tables/ps_full_ms/h3/w0/v0</property>
      <property value="2.20304">fsim/tables/ps_full_ms/h3/w0/v1</property>
      <property value="1.57858">fsim/tables/ps_full_ms/h3/w0/v10</property>
      <property value="1.39611">fsim/tables/ps_full_ms/h3/w0/v11</property>
      <property value="1.19689">fsim/tables/ps_full_ms/h3/w0/v12</property>
      <property value="0.957445">fsim/tables/ps_full_ms/h3/w0/v13</property>
      <property value="0.681198">fsim/tables/ps_full_ms/h3/w0/v14</property>
      <property value="0.383091">fsim/tables/ps_full_ms/h3/w0/v15</property>
      <property value="2.22986">fsim/tables/ps_full_ms/h3/w0/v2</property>
      <property value="2.24579">fsim/tables/ps_full_ms/h3/w0/v3</property>
      <property value="2.23095">fsim/tables/ps_full_ms/h3/w0/v4</property>
      <property value="2.18392">fsim/tables/ps_full_ms/h3/w0/v5</property>
      <property value="2.10433">fsim/tables/ps_full_ms/h3/w0/v6</property>
      <property value="1.99869">fsim/tables/ps_full_ms/h3/w0/v7</property>
      <property value="1.86237">fsim/tables/ps_full_ms/h3/w0/v8</property>
      <property value="1.73498">fsim/tables/ps_full_ms/h3/w0/v9</property>
      <property value="1.84253">fsim/tables/ps_full_ms/h3/w1/v0</property>
      <property value="1.88769">fsim/tables/ps_full_ms/h3/w1/v1</property>
      <property value="1.38966">fsim/tables/ps_full_ms/h3/w1/v10</property>
      <property value="1.23053">fsim/tables/ps_full_ms/h3/w1/v11</property>
      <property value="1.04739">fsim/tables/ps_full_ms/h3/w1/v12</property>
      <property value="0.849373">fsim/tables/ps_full_ms/h3/w1/v13</property>
      <property value="0.623986">fsim/tables/ps_full_ms/h3/w1/v14</property>
      <property value="0.355617">fsim/tables/ps_full_ms/h3/w1/v15</property>
      <property value="1.91972">fsim/tables/ps_full_ms/h3/w1/v2</property>
      <property value="1.94552">fsim/tables/ps_full_ms/h3/w1/v3</property>
      <property value="1.93998">fsim/tables/ps_full_ms/h3/w1/v4</property>
      <property value="1.90289">fsim/tables/ps_full_ms/h3/w1/v5</property>
      <property value="1.83634">fsim/tables/ps_full_ms/h3/w1/v6</property>
      <property value="1.74502">fsim/tables/ps_full_ms/h3/w1/v7</property>
      <property value="1.63168">fsim/tables/ps_full_ms/h3/w1/v8</property>
      <property value="1.51153">fsim/tables/ps_full_ms/h3/w1/v9</property>
      <property value="1.55161">fsim/tables/ps_full_ms/h3/w2/v0</property>
      <property value="1.59506">fsim/tables/ps_full_ms/h3/w2/v1</property>
      <property value="1.1946">fsim/tables/ps_full_ms/h3/w2/v10</property>
      <property value="1.07074">fsim/tables/ps_full_ms/h3/w2/v11</property>
      <property value="0.913773">fsim/tables/ps_full_ms/h3/w2/v12</property>
      <property value="0.732522">fsim/tables/ps_full_ms/h3/w2/v13</property>
      <property value="0.538082">fsim/tables/ps_full_ms/h3/w2/v14</property>
      <property value="0.32961">fsim/tables/ps_full_ms/h3/w2/v15</property>
      <property value="1.63182">fsim/tables/ps_full_ms/h3/w2/v2</property>
      <property value="1.66245">fsim/tables/ps_full_ms/h3/w2/v3</property>
      <property value="1.66709">fsim/tables/ps_full_ms/h3/w2/v4</property>
      <property value="1.6377">fsim/tables/ps_full_ms/h3/w2/v5</property>
      <property value="1.58556">fsim/tables/ps_full_ms/h3/w2/v6</property>
      <property value="1.50484">fsim/tables/ps_full_ms/h3/w2/v7</property>
      <property value="1.40864">fsim/tables/ps_full_ms/h3/w2/v8</property>
      <property value="1.30888">fsim/tables/ps_full_ms/h3/w2/v9</property>
      <property value="1.67277">fsim/tables/ps_full_ms/h4/w0/v0</property>
      <property value="1.71753">fsim/tables/ps_full_ms/h4/w0/v1</property>
      <property value="1.27598">fsim/tables/ps_full_ms/h4/w0/v10</property>
      <property value="1.14179">fsim/tables/ps_full_ms/h4/w0/v11</property>
      <property value="0.968483">fsim/tables/ps_full_ms/h4/w0/v12</property>
      <property value="0.780385">fsim/tables/ps_full_ms/h4/w0/v13</property>
      <property value="0.578238">fsim/tables/ps_full_ms/h4/w0/v14</property>
      <property value="0.340088">fsim/tables/ps_full_ms/h4/w0/v15</property>
      <property value="1.75026">fsim/tables/ps_full_ms/h4/w0/v2</property>
      <property value="1.77795">fsim/tables/ps_full_ms/h4/w0/v3</property>
      <property value="1.78277">fsim/tables/ps_full_ms/h4/w0/v4</property>
      <property value="1.75104">fsim/tables/ps_full_ms/h4/w0/v5</property>
      <property value="1.69468">fsim/tables/ps_full_ms/h4/w0/v6</property>
      <property value="1.60698">fsim/tables/ps_full_ms/h4/w0/v7</property>
      <property value="1.50621">fsim/tables/ps_full_ms/h4/w0/v8</property>
      <property value="1.39335">fsim/tables/ps_full_ms/h4/w0/v9</property>
      <property value="1.37354">fsim/tables/ps_full_ms/h4/w1/v0</property>
      <property value="1.4163">fsim/tables/ps_full_ms/h4/w1/v1</property>
      <property value="1.07775">fsim/tables/ps_full_ms/h4/w1/v10</property>
      <property value="0.958573">fsim/tables/ps_full_ms/h4/w1/v11</property>
      <property value="0.82921">fsim/tables/ps_full_ms/h4/w1/v12</property>
      <property value="0.661346">fsim/tables/ps_full_ms/h4/w1/v13</property>
      <property value="0.478185">fsim/tables/ps_full_ms/h4/w1/v14</property>
      <property value="0.282752">fsim/tables/ps_full_ms/h4/w1/v15</property>
      <property value="1.45419">fsim/tables/ps_full_ms/h4/w1/v2</property>
      <property value="1.4851">fsim/tables/ps_full_ms/h4/w1/v3</property>
      <property value="1.49562">fsim/tables/ps_full_ms/h4/w1/v4</property>
      <property value="1.47859">fsim/tables/ps_full_ms/h4/w1/v5</property>
      <property value="1.43013">fsim/tables/ps_full_ms/h4/w1/v6</property>
      <property value="1.36232">fsim/tables/ps_full_ms/h4/w1/v7</property>
      <property value="1.26807">fsim/tables/ps_full_ms/h4/w1/v8</property>
      <property value="1.18294">fsim/tables/ps_full_ms/h4/w1/v9</property>
      <property value="1.09444">fsim/tables/ps_full_ms/h4/w2/v0</property>
      <property value="1.1367">fsim/tables/ps_full_ms/h4/w2/v1</property>
      <property value="0.905422">fsim/tables/ps_full_ms/h4/w2/v10</property>
      <property value="0.806715">fsim/tables/ps_full_ms/h4/w2/v11</property>
      <property value="0.690745">fsim/tables/ps_full_ms/h4/w2/v12</property>
      <property value="0.567439">fsim/tables/ps_full_ms/h4/w2/v13</property>
      <property value="0.423263">fsim/tables/ps_full_ms/h4/w2/v14</property>
      <property value="0.251592">fsim/tables/ps_full_ms/h4/w2/v15</property>
      <property value="1.17874">fsim/tables/ps_full_ms/h4/w2/v2</property>
      <property value="1.20856">fsim/tables/ps_full_ms/h4/w2/v3</property>
      <property value="1.22488">fsim/tables/ps_full_ms/h4/w2/v4</property>
      <property value="1.22002">fsim/tables/ps_full_ms/h4/w2/v5</property>
      <property value="1.18754">fsim/tables/ps_full_ms/h4/w2/v6</property>
      <property value="1.13109">fsim/tables/ps_full_ms/h4/w2/v7</property>
      <property value="1.06136">fsim/tables/ps_full_ms/h4/w2/v8</property>
      <property value="0.977683">fsim/tables/ps_full_ms/h4/w2/v9</property>
      <property value="1.3521">fsim/tables/ps_full_ms/h5/w0/v0</property>
      <property value="1.39463">fsim/tables/ps_full_ms/h5/w0/v1</property>
      <property value="1.06386">fsim/tables/ps_full_ms/h5/w0/v10</property>
      <property value="0.945077">fsim/tables/ps_full_ms/h5/w0/v11</property>
      <property value="0.817054">fsim/tables/ps_full_ms/h5/w0/v12</property>
      <property value="0.652143">fsim/tables/ps_full_ms/h5/w0/v13</property>
      <property value="0.470318">fsim/tables/ps_full_ms/h5/w0/v14</property>
      <property value="0.276411">fsim/tables/ps_full_ms/h5/w0/v15</property>
      <property value="1.43153">fsim/tables/ps_full_ms/h5/w0/v2</property>
      <property value="1.46168">fsim/tables/ps_full_ms/h5/w0/v3</property>
      <property value="1.47231">fsim/tables/ps_full_ms/h5/w0/v4</property>
      <property value="1.46">fsim/tables/ps_full_ms/h5/w0/v5</property>
      <property value="1.41286">fsim/tables/ps_full_ms/h5/w0/v6</property>
      <property value="1.34654">fsim/tables/ps_full_ms/h5/w0/v7</property>
      <property value="1.25246">fsim/tables/ps_full_ms/h5/w0/v8</property>
      <property value="1.16729">fsim/tables/ps_full_ms/h5/w0/v9</property>
      <property value="1.06111">fsim/tables/ps_full_ms/h5/w1/v0</property>
      <property value="1.10318">fsim/tables/ps_full_ms/h5/w1/v1</property>
      <property value="0.882408">fsim/tables/ps_full_ms/h5/w1/v10</property>
      <property value="0.789603">fsim/tables/ps_full_ms/h5/w1/v11</property>
      <property value="0.675018">fsim/tables/ps_full_ms/h5/w1/v12</property>
      <property value="0.553334">fsim/tables/ps_full_ms/h5/w1/v13</property>
      <property value="0.417327">fsim/tables/ps_full_ms/h5/w1/v14</property>
      <property value="0.248645">fsim/tables/ps_full_ms/h5/w1/v15</property>
      <property value="1.14414">fsim/tables/ps_full_ms/h5/w1/v2</property>
      <property value="1.17329">fsim/tables/ps_full_ms/h5/w1/v3</property>
      <property value="1.18975">fsim/tables/ps_full_ms/h5/w1/v4</property>
      <property value="1.18655">fsim/tables/ps_full_ms/h5/w1/v5</property>
      <property value="1.16024">fsim/tables/ps_full_ms/h5/w1/v6</property>
      <property value="1.10487">fsim/tables/ps_full_ms/h5/w1/v7</property>
      <property value="1.03807">fsim/tables/ps_full_ms/h5/w1/v8</property>
      <property value="0.954539">fsim/tables/ps_full_ms/h5/w1/v9</property>
      <property value="0.791558">fsim/tables/ps_full_ms/h5/w2/v0</property>
      <property value="0.833914">fsim/tables/ps_full_ms/h5/w2/v1</property>
      <property value="0.705135">fsim/tables/ps_full_ms/h5/w2/v10</property>
      <property value="0.635394">fsim/tables/ps_full_ms/h5/w2/v11</property>
      <property value="0.561913">fsim/tables/ps_full_ms/h5/w2/v12</property>
      <property value="0.460258">fsim/tables/ps_full_ms/h5/w2/v13</property>
      <property value="0.348701">fsim/tables/ps_full_ms/h5/w2/v14</property>
      <property value="0.231359">fsim/tables/ps_full_ms/h5/w2/v15</property>
      <property value="0.87368">fsim/tables/ps_full_ms/h5/w2/v2</property>
      <property value="0.905294">fsim/tables/ps_full_ms/h5/w2/v3</property>
      <property value="0.920511">fsim/tables/ps_full_ms/h5/w2/v4</property>
      <property value="0.926482">fsim/tables/ps_full_ms/h5/w2/v5</property>
      <property value="0.915316">fsim/tables/ps_full_ms/h5/w2/v6</property>
      <property value="0.884407">fsim/tables/ps_full_ms/h5/w2/v7</property>
      <property value="0.826986">fsim/tables/ps_full_ms/h5/w2/v8</property>
      <property value="0.768567">fsim/tables/ps_full_ms/h5/w2/v9</property>
      <property value="1.04394">fsim/tables/ps_full_ms/h6/w0/v0</property>
      <property value="1.08519">fsim/tables/ps_full_ms/h6/w0/v1</property>
      <property value="0.870624">fsim/tables/ps_full_ms/h6/w0/v10</property>
      <property value="0.780809">fsim/tables/ps_full_ms/h6/w0/v11</property>
      <property value="0.66687">fsim/tables/ps_full_ms/h6/w0/v12</property>
      <property value="0.545969">fsim/tables/ps_full_ms/h6/w0/v13</property>
      <property value="0.41394">fsim/tables/ps_full_ms/h6/w0/v14</property>
      <property value="0.24691">fsim/tables/ps_full_ms/h6/w0/v15</property>
      <property value="1.12507">fsim/tables/ps_full_ms/h6/w0/v2</property>
      <property value="1.15376">fsim/tables/ps_full_ms/h6/w0/v3</property>
      <property value="1.1699">fsim/tables/ps_full_ms/h6/w0/v4</property>
      <property value="1.16654">fsim/tables/ps_full_ms/h6/w0/v5</property>
      <property value="1.14612">fsim/tables/ps_full_ms/h6/w0/v6</property>
      <property value="1.09218">fsim/tables/ps_full_ms/h6/w0/v7</property>
      <property value="1.02651">fsim/tables/ps_full_ms/h6/w0/v8</property>
      <property value="0.94297">fsim/tables/ps_full_ms/h6/w0/v9</property>
      <property value="0.762697">fsim/tables/ps_full_ms/h6/w1/v0</property>
      <property value="0.804409">fsim/tables/ps_full_ms/h6/w1/v1</property>
      <property value="0.686433">fsim/tables/ps_full_ms/h6/w1/v10</property>
      <property value="0.616973">fsim/tables/ps_full_ms/h6/w1/v11</property>
      <property value="0.544224">fsim/tables/ps_full_ms/h6/w1/v12</property>
      <property value="0.448684">fsim/tables/ps_full_ms/h6/w1/v13</property>
      <property value="0.338631">fsim/tables/ps_full_ms/h6/w1/v14</property>
      <property value="0.222995">fsim/tables/ps_full_ms/h6/w1/v15</property>
      <property value="0.843657">fsim/tables/ps_full_ms/h6/w1/v2</property>
      <property value="0.874477">fsim/tables/ps_full_ms/h6/w1/v3</property>
      <property value="0.888824">fsim/tables/ps_full_ms/h6/w1/v4</property>
      <property value="0.895667">fsim/tables/ps_full_ms/h6/w1/v5</property>
      <property value="0.884501">fsim/tables/ps_full_ms/h6/w1/v6</property>
      <property value="0.86119">fsim/tables/ps_full_ms/h6/w1/v7</property>
      <property value="0.805405">fsim/tables/ps_full_ms/h6/w1/v8</property>
      <property value="0.746693">fsim/tables/ps_full_ms/h6/w1/v9</property>
      <property value="0.506717">fsim/tables/ps_full_ms/h6/w2/v0</property>
      <property value="0.54649">fsim/tables/ps_full_ms/h6/w2/v1</property>
      <property value="0.505181">fsim/tables/ps_full_ms/h6/w2/v10</property>
      <property value="0.467574">fsim/tables/ps_full_ms/h6/w2/v11</property>
      <property value="0.407925">fsim/tables/ps_full_ms/h6/w2/v12</property>
      <property value="0.342032">fsim/tables/ps_full_ms/h6/w2/v13</property>
      <property value="0.273685">fsim/tables/ps_full_ms/h6/w2/v14</property>
      <property value="0.194584">fsim/tables/ps_full_ms/h6/w2/v15</property>
      <property value="0.584796">fsim/tables/ps_full_ms/h6/w2/v2</property>
      <property value="0.608778">fsim/tables/ps_full_ms/h6/w2/v3</property>
      <property value="0.628722">fsim/tables/ps_full_ms/h6/w2/v4</property>
      <property value="0.634428">fsim/tables/ps_full_ms/h6/w2/v5</property>
      <property value="0.636939">fsim/tables/ps_full_ms/h6/w2/v6</property>
      <property value="0.621666">fsim/tables/ps_full_ms/h6/w2/v7</property>
      <property value="0.602585">fsim/tables/ps_full_ms/h6/w2/v8</property>
      <property value="0.554478">fsim/tables/ps_full_ms/h6/w2/v9</property>
      <property value="-3.48378">fsim/tables/ps_idle_ms/h0/w0/v0</property>
      <property value="-3.69512">fsim/tables/ps_idle_ms/h0/w0/v1</property>
      <property value="-7.36803">fsim/tables/ps_idle_ms/h0/w0/v10</property>
      <property value="-7.94255">fsim/tables/ps_idle_ms/h0/w0/v11</property>
      <property value="-8.48691">fsim/tables/ps_idle_ms/h0/w0/v12</property>
      <property value="-8.84133">fsim/tables/ps_idle_ms/h0/w0/v13</property>
      <property value="-8.59285">fsim/tables/ps_idle_ms/h0/w0/v14</property>
      <property value="-7.92299">fsim/tables/ps_idle_ms/h0/w0/v15</property>
      <property value="-3.95091">fsim/tables/ps_idle_ms/h0/w0/v2</property>
      <property value="-4.25079">fsim/tables/ps_idle_ms/h0/w0/v3</property>
      <property value="-4.58755">fsim/tables/ps_idle_ms/h0/w0/v4</property>
      <property value="-4.95984">fsim/tables/ps_idle_ms/h0/w0/v5</property>
      <property value="-5.36881">fsim/tables/ps_idle_ms/h0/w0/v6</property>
      <property value="-5.8128">fsim/tables/ps_idle_ms/h0/w0/v7</property>
      <property value="-6.29576">fsim/tables/ps_idle_ms/h0/w0/v8</property>
      <property value="-6.8154">fsim/tables/ps_idle_ms/h0/w0/v9</property>
      <property value="-3.50205">fsim/tables/ps_idle_ms/h0/w1/v0</property>
      <property value="-3.6908">fsim/tables/ps_idle_ms/h0/w1/v1</property>
      <property value="-7.08476">fsim/tables/ps_idle_ms/h0/w1/v10</property>
      <property value="-7.62224">fsim/tables/ps_idle_ms/h0/w1/v11</property>
      <property value="-8.1404">fsim/tables/ps_idle_ms/h0/w1/v12</property>
      <property value="-8.49038">fsim/tables/ps_idle_ms/h0/w1/v13</property>
      <property value="-8.28475">fsim/tables/ps_idle_ms/h0/w1/v14</property>
      <property value="-7.60432">fsim/tables/ps_idle_ms/h0/w1/v15</property>
      <property value="-3.92028">fsim/tables/ps_idle_ms/h0/w1/v2</property>
      <property value="-4.19245">fsim/tables/ps_idle_ms/h0/w1/v3</property>
      <property value="-4.50311">fsim/tables/ps_idle_ms/h0/w1/v4</property>
      <property value="-4.84725">fsim/tables/ps_idle_ms/h0/w1/v5</property>
      <property value="-5.22659">fsim/tables/ps_idle_ms/h0/w1/v6</property>
      <property value="-5.63875">fsim/tables/ps_idle_ms/h0/w1/v7</property>
      <property value="-6.08583">fsim/tables/ps_idle_ms/h0/w1/v8</property>
      <property value="-6.56941">fsim/tables/ps_idle_ms/h0/w1/v9</property>
      <property value="-3.53101">fsim/tables/ps_idle_ms/h0/w2/v0</property>
      <property value="-3.70074">fsim/tables/ps_idle_ms/h0/w2/v1</property>
      <property value="-6.83822">fsim/tables/ps_idle_ms/h0/w2/v10</property>
      <property value="-7.34164">fsim/tables/ps_idle_ms/h0/w2/v11</property>
      <property value="-7.83119">fsim/tables/ps_idle_ms/h0/w2/v12</property>
      <property value="-8.17593">fsim/tables/ps_idle_ms/h0/w2/v13</property>
      <property value="-7.99872">fsim/tables/ps_idle_ms/h0/w2/v14</property>
      <property value="-7.31081">fsim/tables/ps_idle_ms/h0/w2/v15</property>
      <property value="-3.90704">fsim/tables/ps_idle_ms/h0/w2/v2</property>
      <property value="-4.15326">fsim/tables/ps_idle_ms/h0/w2/v3</property>
      <property value="-4.43915">fsim/tables/ps_idle_ms/h0/w2/v4</property>
      <property value="-4.75842">fsim/tables/ps_idle_ms/h0/w2/v5</property>
      <property value="-5.1086">fsim/tables/ps_idle_ms/h0/w2/v6</property>
      <property value="-5.49278">fsim/tables/ps_idle_ms/h0/w2/v7</property>
      <property value="-5.90742">fsim/tables/ps_idle_ms/h0/w2/v8</property>
      <property value="-6.35645">fsim/tables/ps_idle_ms/h0/w2/v9</property>
      <property value="-3.51048">fsim/tables/ps_idle_ms/h1/w0/v0</property>
      <property value="-3.68781">fsim/tables/ps_idle_ms/h1/w0/v1</property>
      <property value="-6.92168">fsim/tables/ps_idle_ms/h1/w0/v10</property>
      <property value="-7.43494">fsim/tables/ps_idle_ms/h1/w0/v11</property>
      <property value="-7.92891">fsim/tables/ps_idle_ms/h1/w0/v12</property>
      <property value="-8.25971">fsim/tables/ps_idle_ms/h1/w0/v13</property>
      <property value="-8.05489">fsim/tables/ps_idle_ms/h1/w0/v14</property>
      <property value="-7.35387">fsim/tables/ps_idle_ms/h1/w0/v15</property>
      <property value="-3.90184">fsim/tables/ps_idle_ms/h1/w0/v2</property>
      <property value="-4.15762">fsim/tables/ps_idle_ms/h1/w0/v3</property>
      <property value="-4.45271">fsim/tables/ps_idle_ms/h1/w0/v4</property>
      <property value="-4.78174">fsim/tables/ps_idle_ms/h1/w0/v5</property>
      <property value="-5.14351">fsim/tables/ps_idle_ms/h1/w0/v6</property>
      <property value="-5.53883">fsim/tables/ps_idle_ms/h1/w0/v7</property>
      <property value="-5.96561">fsim/tables/ps_idle_ms/h1/w0/v8</property>
      <property value="-6.42756">fsim/tables/ps_idle_ms/h1/w0/v9</property>
      <property value="-3.54684">fsim/tables/ps_idle_ms/h1/w1/v0</property>
      <property value="-3.70591">fsim/tables/ps_idle_ms/h1/w1/v1</property>
      <property value="-6.67143">fsim/tables/ps_idle_ms/h1/w1/v10</property>
      <property value="-7.1498">fsim/tables/ps_idle_ms/h1/w1/v11</property>
      <property value="-7.61233">fsim/tables/ps_idle_ms/h1/w1/v12</property>
      <property value="-7.93889">fsim/tables/ps_idle_ms/h1/w1/v13</property>
      <property value="-7.76038">fsim/tables/ps_idle_ms/h1/w1/v14</property>
      <property value="-7.05063">fsim/tables/ps_idle_ms/h1/w1/v15</property>
      <property value="-3.89714">fsim/tables/ps_idle_ms/h1/w1/v2</property>
      <property value="-4.12622">fsim/tables/ps_idle_ms/h1/w1/v3</property>
      <property value="-4.39434">fsim/tables/ps_idle_ms/h1/w1/v4</property>
      <property value="-4.69724">fsim/tables/ps_idle_ms/h1/w1/v5</property>
      <property value="-5.02959">fsim/tables/ps_idle_ms/h1/w1/v6</property>
      <property value="-5.3941">fsim/tables/ps_idle_ms/h1/w1/v7</property>
      <property value="-5.78906">fsim/tables/ps_idle_ms/h1/w1/v8</property>
      <property value="-6.2145">fsim/tables/ps_idle_ms/h1/w1/v9</property>
      <property value="-3.59063">fsim/tables/ps_idle_ms/h1/w2/v0</property>
      <property value="-3.73435">fsim/tables/ps_idle_ms/h1/w2/v1</property>
      <property value="-6.45584">fsim/tables/ps_idle_ms/h1/w2/v10</property>
      <property value="-6.90018">fsim/tables/ps_idle_ms/h1/w2/v11</property>
      <property value="-7.33431">fsim/tables/ps_idle_ms/h1/w2/v12</property>
      <property value="-7.6528">fsim/tables/ps_idle_ms/h1/w2/v13</property>
      <property value="-7.49398">fsim/tables/ps_idle_ms/h1/w2/v14</property>
      <property value="-6.77838">fsim/tables/ps_idle_ms/h1/w2/v15</property>
      <property value="-3.90643">fsim/tables/ps_idle_ms/h1/w2/v2</property>
      <property value="-4.1123">fsim/tables/ps_idle_ms/h1/w2/v3</property>
      <property value="-4.35449">fsim/tables/ps_idle_ms/h1/w2/v4</property>
      <property value="-4.63204">fsim/tables/ps_idle_ms/h1/w2/v5</property>
      <property value="-4.9398">fsim/tables/ps_idle_ms/h1/w2/v6</property>
      <property value="-5.27502">fsim/tables/ps_idle_ms/h1/w2/v7</property>
      <property value="-5.64105">fsim/tables/ps_idle_ms/h1/w2/v8</property>
      <property value="-6.03446">fsim/tables/ps_idle_ms/h1/w2/v9</property>
      <property value="-3.57472">fsim/tables/ps_idle_ms/h2/w0/v0</property>
      <property value="-3.7211">fsim/tables/ps_idle_ms/h2/w0/v1</property>
      <property value="-6.46643">fsim/tables/ps_idle_ms/h2/w0/v10</property>
      <property value="-6.91158">fsim/tables/ps_idle_ms/h2/w0/v11</property>
      <property value="-7.34042">fsim/tables/ps_idle_ms/h2/w0/v12</property>
      <property value="-7.64423">fsim/tables/ps_idle_ms/h2/w0/v13</property>
      <property value="-7.4633">fsim/tables/ps_idle_ms/h2/w0/v14</property>
      <property value="-6.7283">fsim/tables/ps_idle_ms/h2/w0/v15</property>
      <property value="-3.89508">fsim/tables/ps_idle_ms/h2/w0/v2</property>
      <property value="-4.10225">fsim/tables/ps_idle_ms/h2/w0/v3</property>
      <property value="-4.34675">fsim/tables/ps_idle_ms/h2/w0/v4</property>
      <property value="-4.62664">fsim/tables/ps_idle_ms/h2/w0/v5</property>
      <property value="-4.93725">fsim/tables/ps_idle_ms/h2/w0/v6</property>
      <property value="-5.2758">fsim/tables/ps_idle_ms/h2/w0/v7</property>
      <property value="-5.64529">fsim/tables/ps_idle_ms/h2/w0/v8</property>
      <property value="-6.04195">fsim/tables/ps_idle_ms/h2/w0/v9</property>
      <property value="-3.6286">fsim/tables/ps_idle_ms/h2/w1/v0</property>
      <property value="-3.75925">fsim/tables/ps_idle_ms/h2/w1/v1</property>
      <property value="-6.2615">fsim/tables/ps_idle_ms/h2/w1/v10</property>
      <property value="-6.67084">fsim/tables/ps_idle_ms/h2/w1/v11</property>
      <property value="-7.06921">fsim/tables/ps_idle_ms/h2/w1/v12</property>
      <property value="-7.3532">fsim/tables/ps_idle_ms/h2/w1/v13</property>
      <property value="-7.19536">fsim/tables/ps_idle_ms/h2/w1/v14</property>
      <property value="-6.45734">fsim/tables/ps_idle_ms/h2/w1/v15</property>
      <property value="-3.91603">fsim/tables/ps_idle_ms/h2/w1/v2</property>
      <property value="-4.10076">fsim/tables/ps_idle_ms/h2/w1/v3</property>
      <property value="-4.31955">fsim/tables/ps_idle_ms/h2/w1/v4</property>
      <property value="-4.57265">fsim/tables/ps_idle_ms/h2/w1/v5</property>
      <property value="-4.85701">fsim/tables/ps_idle_ms/h2/w1/v6</property>
      <property value="-5.16796">fsim/tables/ps_idle_ms/h2/w1/v7</property>
      <property value="-5.50589">fsim/tables/ps_idle_ms/h2/w1/v8</property>
      <property value="-5.87194">fsim/tables/ps_idle_ms/h2/w1/v9</property>
      <property value="-3.68835">fsim/tables/ps_idle_ms/h2/w2/v0</property>
      <property value="-3.80386">fsim/tables/ps_idle_ms/h2/w2/v1</property>
      <property value="-6.07808">fsim/tables/ps_idle_ms/h2/w2/v10</property>
      <property value="-6.45231">fsim/tables/ps_idle_ms/h2/w2/v11</property>
      <property value="-6.81643">fsim/tables/ps_idle_ms/h2/w2/v12</property>
      <property value="-7.07209">fsim/tables/ps_idle_ms/h2/w2/v13</property>
      <property value="-6.90661">fsim/tables/ps_idle_ms/h2/w2/v14</property>
      <property value="-6.18081">fsim/tables/ps_idle_ms/h2/w2/v15</property>
      <property value="-3.94515">fsim/tables/ps_idle_ms/h2/w2/v2</property>
      <property value="-4.11075">fsim/tables/ps_idle_ms/h2/w2/v3</property>
      <property value="-4.3058">fsim/tables/ps_idle_ms/h2/w2/v4</property>
      <property value="-4.53319">fsim/tables/ps_idle_ms/h2/w2/v5</property>
      <property value="-4.79109">fsim/tables/ps_idle_ms/h2/w2/v6</property>
      <property value="-5.07619">fsim/tables/ps_idle_ms/h2/w2/v7</property>
      <property value="-5.38478">fsim/tables/ps_idle_ms/h2/w2/v8</property>
      <property value="-5.71924">fsim/tables/ps_idle_ms/h2/w2/v9</property>
      <property value="-3.67454">fsim/tables/ps_idle_ms/h3/w0/v0</property>
      <property value="-3.7898">fsim/tables/ps_idle_ms/h3/w0/v1</property>
      <property value="-6.05195">fsim/tables/ps_idle_ms/h3/w0/v10</property>
      <property value="-6.42094">fsim/tables/ps_idle_ms/h3/w0/v11</property>
      <property value="-6.77411">fsim/tables/ps_idle_ms/h3/w0/v12</property>
      <property value="-7.0105">fsim/tables/ps_idle_ms/h3/w0/v13</property>
      <property value="-6.82617">fsim/tables/ps_idle_ms/h3/w0/v14</property>
      <property value="-6.07825">fsim/tables/ps_idle_ms/h3/w0/v15</property>
      <property value="-3.93149">fsim/tables/ps_idle_ms/h3/w0/v2</property>
      <property value="-4.0968">fsim/tables/ps_idle_ms/h3/w0/v3</property>
      <property value="-4.29025">fsim/tables/ps_idle_ms/h3/w0/v4</property>
      <property value="-4.51546">fsim/tables/ps_idle_ms/h3/w0/v5</property>
      <property value="-4.77155">fsim/tables/ps_idle_ms/h3/w0/v6</property>
      <property value="-5.05565">fsim/tables/ps_idle_ms/h3/w0/v7</property>
      <property value="-5.36316">fsim/tables/ps_idle_ms/h3/w0/v8</property>
      <property value="-5.69597">fsim/tables/ps_idle_ms/h3/w0/v9</property>
      <property value="-3.74408">fsim/tables/ps_idle_ms/h3/w1/v0</property>
      <property value="-3.84287">fsim/tables/ps_idle_ms/h3/w1/v1</property>
      <property value="-5.83183">fsim/tables/ps_idle_ms/h3/w1/v10</property>
      <property value="-6.16067">fsim/tables/ps_idle_ms/h3/w1/v11</property>
      <property value="-6.47255">fsim/tables/ps_idle_ms/h3/w1/v12</property>
      <property value="-6.67559">fsim/tables/ps_idle_ms/h3/w1/v13</property>
      <property value="-6.50139">fsim/tables/ps_idle_ms/h3/w1/v14</property>
      <property value="-5.75929">fsim/tables/ps_idle_ms/h3/w1/v15</property>
      <property value="-3.96696">fsim/tables/ps_idle_ms/h3/w1/v2</property>
      <property value="-4.11214">fsim/tables/ps_idle_ms/h3/w1/v3</property>
      <property value="-4.27977">fsim/tables/ps_idle_ms/h3/w1/v4</property>
      <property value="-4.47482">fsim/tables/ps_idle_ms/h3/w1/v5</property>
      <property value="-4.69822">fsim/tables/ps_idle_ms/h3/w1/v6</property>
      <property value="-4.94837">fsim/tables/ps_idle_ms/h3/w1/v7</property>
      <property value="-5.22245">fsim/tables/ps_idle_ms/h3/w1/v8</property>
      <property value="-5.51664">fsim/tables/ps_idle_ms/h3/w1/v9</property>
      <property value="-3.81698">fsim/tables/ps_idle_ms/h3/w2/v0</property>
      <property value="-3.90147">fsim/tables/ps_idle_ms/h3/w2/v1</property>
      <property value="-5.6458">fsim/tables/ps_idle_ms/h3/w2/v10</property>
      <property value="-5.93553">fsim/tables/ps_idle_ms/h3/w2/v11</property>
      <property value="-6.2106">fsim/tables/ps_idle_ms/h3/w2/v12</property>
      <property value="-6.38177">fsim/tables/ps_idle_ms/h3/w2/v13</property>
      <property value="-6.20842">fsim/tables/ps_idle_ms/h3/w2/v14</property>
      <property value="-5.47918">fsim/tables/ps_idle_ms/h3/w2/v15</property>
      <property value="-4.00951">fsim/tables/ps_idle_ms/h3/w2/v2</property>
      <property value="-4.13743">fsim/tables/ps_idle_ms/h3/w2/v3</property>
      <property value="-4.28397">fsim/tables/ps_idle_ms/h3/w2/v4</property>
      <property value="-4.45221">fsim/tables/ps_idle_ms/h3/w2/v5</property>
      <property value="-4.64562">fsim/tables/ps_idle_ms/h3/w2/v6</property>
      <property value="-4.86418">fsim/tables/ps_idle_ms/h3/w2/v7</property>
      <property value="-5.10582">fsim/tables/ps_idle_ms/h3/w2/v8</property>
      <property value="-5.3679">fsim/tables/ps_idle_ms/h3/w2/v9</property>
      <property value="-3.769">fsim/tables/ps_idle_ms/h4/w0/v0</property>
      <property value="-3.85945">fsim/tables/ps_idle_ms/h4/w0/v1</property>
      <property value="-5.71265">fsim/tables/ps_idle_ms/h4/w0/v10</property>
      <property value="-6.0171">fsim/tables/ps_idle_ms/h4/w0/v11</property>
      <property value="-6.30064">fsim/tables/ps_idle_ms/h4/w0/v12</property>
      <property value="-6.47128">fsim/tables/ps_idle_ms/h4/w0/v13</property>
      <property value="-6.28052">fsim/tables/ps_idle_ms/h4/w0/v14</property>
      <property value="-5.53413">fsim/tables/ps_idle_ms/h4/w0/v15</property>
      <property value="-3.97523">fsim/tables/ps_idle_ms/h4/w0/v2</property>
      <property value="-4.11158">fsim/tables/ps_idle_ms/h4/w0/v3</property>
      <property value="-4.2677">fsim/tables/ps_idle_ms/h4/w0/v4</property>
      <property value="-4.44746">fsim/tables/ps_idle_ms/h4/w0/v5</property>
      <property value="-4.65385">fsim/tables/ps_idle_ms/h4/w0/v6</property>
      <property value="-4.88609">fsim/tables/ps_idle_ms/h4/w0/v7</property>
      <property value="-5.14269">fsim/tables/ps_idle_ms/h4/w0/v8</property>
      <property value="-5.41935">fsim/tables/ps_idle_ms/h4/w0/v9</property>
      <property value="-3.84875">fsim/tables/ps_idle_ms/h4/w1/v0</property>
      <property value="-3.92493">fsim/tables/ps_idle_ms/h4/w1/v1</property>
      <property value="-5.53329">fsim/tables/ps_idle_ms/h4/w1/v10</property>
      <property value="-5.79728">fsim/tables/ps_idle_ms/h4/w1/v11</property>
      <property value="-6.04173">fsim/tables/ps_idle_ms/h4/w1/v12</property>
      <property value="-6.18061">fsim/tables/ps_idle_ms/h4/w1/v13</property>
      <property value="-5.98427">fsim/tables/ps_idle_ms/h4/w1/v14</property>
      <property value="-5.25941">fsim/tables/ps_idle_ms/h4/w1/v15</property>
      <property value="-4.02407">fsim/tables/ps_idle_ms/h4/w1/v2</property>
      <property value="-4.14306">fsim/tables/ps_idle_ms/h4/w1/v3</property>
      <property value="-4.27886">fsim/tables/ps_idle_ms/h4/w1/v4</property>
      <property value="-4.43284">fsim/tables/ps_idle_ms/h4/w1/v5</property>
      <property value="-4.60966">fsim/tables/ps_idle_ms/h4/w1/v6</property>
      <property value="-4.80998">fsim/tables/ps_idle_ms/h4/w1/v7</property>
      <property value="-5.03242">fsim/tables/ps_idle_ms/h4/w1/v8</property>
      <property value="-5.27525">fsim/tables/ps_idle_ms/h4/w1/v9</property>
      <property value="-3.93031">fsim/tables/ps_idle_ms/h4/w2/v0</property>
      <property value="-3.99294">fsim/tables/ps_idle_ms/h4/w2/v1</property>
      <property value="-5.34962">fsim/tables/ps_idle_ms/h4/w2/v10</property>
      <property value="-5.57364">fsim/tables/ps_idle_ms/h4/w2/v11</property>
      <property value="-5.77161">fsim/tables/ps_idle_ms/h4/w2/v12</property>
      <property value="-5.86914">fsim/tables/ps_idle_ms/h4/w2/v13</property>
      <property value="-5.65131">fsim/tables/ps_idle_ms/h4/w2/v14</property>
      <property value="-4.96144">fsim/tables/ps_idle_ms/h4/w2/v15</property>
      <property value="-4.07662">fsim/tables/ps_idle_ms/h4/w2/v2</property>
      <property value="-4.17717">fsim/tables/ps_idle_ms/h4/w2/v3</property>
      <property value="-4.29354">fsim/tables/ps_idle_ms/h4/w2/v4</property>
      <property value="-4.42398">fsim/tables/ps_idle_ms/h4/w2/v5</property>
      <property value="-4.57125">fsim/tables/ps_idle_ms/h4/w2/v6</property>
      <property value="-4.73788">fsim/tables/ps_idle_ms/h4/w2/v7</property>
      <property value="-4.9249">fsim/tables/ps_idle_ms/h4/w2/v8</property>
      <property value="-5.13017">fsim/tables/ps_idle_ms/h4/w2/v9</property>
      <property value="-3.84236">fsim/tables/ps_idle_ms/h5/w0/v0</property>
      <property value="-3.91793">fsim/tables/ps_idle_ms/h5/w0/v1</property>
      <property value="-5.51355">fsim/tables/ps_idle_ms/h5/w0/v10</property>
      <property value="-5.77317">fsim/tables/ps_idle_ms/h5/w0/v11</property>
      <property value="-6.00959">fsim/tables/ps_idle_ms/h5/w0/v12</property>
      <property value="-6.13685">fsim/tables/ps_idle_ms/h5/w0/v13</property>
      <property value="-5.92765">fsim/tables/ps_idle_ms/h5/w0/v14</property>
      <property value="-5.19876">fsim/tables/ps_idle_ms/h5/w0/v15</property>
      <property value="-4.01627">fsim/tables/ps_idle_ms/h5/w0/v2</property>
      <property value="-4.13448">fsim/tables/ps_idle_ms/h5/w0/v3</property>
      <property value="-4.27002">fsim/tables/ps_idle_ms/h5/w0/v4</property>
      <property value="-4.42316">fsim/tables/ps_idle_ms/h5/w0/v5</property>
      <property value="-4.59778">fsim/tables/ps_idle_ms/h5/w0/v6</property>
      <property value="-4.79645">fsim/tables/ps_idle_ms/h5/w0/v7</property>
      <property value="-5.01715">fsim/tables/ps_idle_ms/h5/w0/v8</property>
      <property value="-5.25791">fsim/tables/ps_idle_ms/h5/w0/v9</property>
      <property value="-3.92804">fsim/tables/ps_idle_ms/h5/w1/v0</property>
      <property value="-3.98966">fsim/tables/ps_idle_ms/h5/w1/v1</property>
      <property value="-5.31835">fsim/tables/ps_idle_ms/h5/w1/v10</property>
      <property value="-5.53527">fsim/tables/ps_idle_ms/h5/w1/v11</property>
      <property value="-5.72316">fsim/tables/ps_idle_ms/h5/w1/v12</property>
      <property value="-5.80714">fsim/tables/ps_idle_ms/h5/w1/v13</property>
      <property value="-5.57786">fsim/tables/ps_idle_ms/h5/w1/v14</property>
      <property value="-4.88628">fsim/tables/ps_idle_ms/h5/w1/v15</property>
      <property value="-4.07096">fsim/tables/ps_idle_ms/h5/w1/v2</property>
      <property value="-4.17053">fsim/tables/ps_idle_ms/h5/w1/v3</property>
      <property value="-4.28478">fsim/tables/ps_idle_ms/h5/w1/v4</property>
      <property value="-4.41359">fsim/tables/ps_idle_ms/h5/w1/v5</property>
      <property value="-4.55746">fsim/tables/ps_idle_ms/h5/w1/v6</property>
      <property value="-4.72085">fsim/tables/ps_idle_ms/h5/w1/v7</property>
      <property value="-4.90324">fsim/tables/ps_idle_ms/h5/w1/v8</property>
      <property value="-5.10424">fsim/tables/ps_idle_ms/h5/w1/v9</property>
      <property value="-4.01537">fsim/tables/ps_idle_ms/h5/w2/v0</property>
      <property value="-4.06423">fsim/tables/ps_idle_ms/h5/w2/v1</property>
      <property value="-5.13524">fsim/tables/ps_idle_ms/h5/w2/v10</property>
      <property value="-5.30575">fsim/tables/ps_idle_ms/h5/w2/v11</property>
      <property value="-5.44784">fsim/tables/ps_idle_ms/h5/w2/v12</property>
      <property value="-5.49122">fsim/tables/ps_idle_ms/h5/w2/v13</property>
      <property value="-5.25085">fsim/tables/ps_idle_ms/h5/w2/v14</property>
      <property value="-4.59838">fsim/tables/ps_idle_ms/h5/w2/v15</property>
      <property value="-4.13065">fsim/tables/ps_idle_ms/h5/w2/v2</property>
      <property value="-4.21149">fsim/tables/ps_idle_ms/h5/w2/v3</property>
      <property value="-4.30546">fsim/tables/ps_idle_ms/h5/w2/v4</property>
      <property value="-4.41124">fsim/tables/ps_idle_ms/h5/w2/v5</property>
      <property value="-4.52875">fsim/tables/ps_idle_ms/h5/w2/v6</property>
      <property value="-4.65903">fsim/tables/ps_idle_ms/h5/w2/v7</property>
      <property value="-4.80399">fsim/tables/ps_idle_ms/h5/w2/v8</property>
      <property value="-4.96388">fsim/tables/ps_idle_ms/h5/w2/v9</property>
      <property value="-3.92134">fsim/tables/ps_idle_ms/h6/w0/v0</property>
      <property value="-3.98118">fsim/tables/ps_idle_ms/h6/w0/v1</property>
      <property value="-5.29641">fsim/tables/ps_idle_ms/h6/w0/v10</property>
      <property value="-5.50832">fsim/tables/ps_idle_ms/h6/w0/v11</property>
      <property value="-5.68842">fsim/tables/ps_idle_ms/h6/w0/v12</property>
      <property value="-5.76135">fsim/tables/ps_idle_ms/h6/w0/v13</property>
      <property value="-5.52227">fsim/tables/ps_idle_ms/h6/w0/v14</property>
      <property value="-4.82751">fsim/tables/ps_idle_ms/h6/w0/v15</property>
      <property value="-4.06228">fsim/tables/ps_idle_ms/h6/w0/v2</property>
      <property value="-4.16076">fsim/tables/ps_idle_ms/h6/w0/v3</property>
      <property value="-4.27483">fsim/tables/ps_idle_ms/h6/w0/v4</property>
      <property value="-4.40266">fsim/tables/ps_idle_ms/h6/w0/v5</property>
      <property value="-4.54558">fsim/tables/ps_idle_ms/h6/w0/v6</property>
      <property value="-4.70687">fsim/tables/ps_idle_ms/h6/w0/v7</property>
      <property value="-4.88714">fsim/tables/ps_idle_ms/h6/w0/v8</property>
      <property value="-5.08552">fsim/tables/ps_idle_ms/h6/w0/v9</property>
      <property value="-4.01288">fsim/tables/ps_idle_ms/h6/w1/v0</property>
      <property value="-4.06056">fsim/tables/ps_idle_ms/h6/w1/v1</property>
      <property value="-5.10757">fsim/tables/ps_idle_ms/h6/w1/v10</property>
      <property value="-5.27089">fsim/tables/ps_idle_ms/h6/w1/v11</property>
      <property value="-5.40326">fsim/tables/ps_idle_ms/h6/w1/v12</property>
      <property value="-5.43473">fsim/tables/ps_idle_ms/h6/w1/v13</property>
      <property value="-5.18417">fsim/tables/ps_idle_ms/h6/w1/v14</property>
      <property value="-4.53203">fsim/tables/ps_idle_ms/h6/w1/v15</property>
      <property value="-4.12509">fsim/tables/ps_idle_ms/h6/w1/v2</property>
      <property value="-4.20425">fsim/tables/ps_idle_ms/h6/w1/v3</property>
      <property value="-4.29715">fsim/tables/ps_idle_ms/h6/w1/v4</property>
      <property value="-4.40172">fsim/tables/ps_idle_ms/h6/w1/v5</property>
      <property value="-4.51724">fsim/tables/ps_idle_ms/h6/w1/v6</property>
      <property value="-4.64475">fsim/tables/ps_idle_ms/h6/w1/v7</property>
      <property value="-4.7863">fsim/tables/ps_idle_ms/h6/w1/v8</property>
      <property value="-4.94199">fsim/tables/ps_idle_ms/h6/w1/v9</property>
      <property value="-4.10697">fsim/tables/ps_idle_ms/h6/w2/v0</property>
      <property value="-4.14459">fsim/tables/ps_idle_ms/h6/w2/v1</property>
      <property value="-4.94203">fsim/tables/ps_idle_ms/h6/w2/v10</property>
      <property value="-5.05072">fsim/tables/ps_idle_ms/h6/w2/v11</property>
      <property value="-5.12019">fsim/tables/ps_idle_ms/h6/w2/v12</property>
      <property value="-5.08157">fsim/tables/ps_idle_ms/h6/w2/v13</property>
      <property value="-4.79183">fsim/tables/ps_idle_ms/h6/w2/v14</property>
      <property value="-4.21815">fsim/tables/ps_idle_ms/h6/w2/v15</property>
      <property value="-4.19501">fsim/tables/ps_idle_ms/h6/w2/v2</property>
      <property value="-4.25758">fsim/tables/ps_idle_ms/h6/w2/v3</property>
      <property value="-4.33024">fsim/tables/ps_idle_ms/h6/w2/v4</property>
      <property value="-4.41255">fsim/tables/ps_idle_ms/h6/w2/v5</property>
      <property value="-4.50365">fsim/tables/ps_idle_ms/h6/w2/v6</property>
      <property value="-4.60272">fsim/tables/ps_idle_ms/h6/w2/v7</property>
      <property value="-4.70992">fsim/tables/ps_idle_ms/h6/w2/v8</property>
      <property value="-4.82433">fsim/tables/ps_idle_ms/h6/w2/v9</property>
      <property value="63.4545">fsim/tables/reach_tas_ms/h0/w0</property>
      <property value="63.2816">fsim/tables/reach_tas_ms/h0/w1</property>
      <property value="63.1068">fsim/tables/reach_tas_ms/h0/w2</property>
      <property value="62.6809">fsim/tables/reach_tas_ms/h1/w0</property>
      <property value="62.4687">fsim/tables/reach_tas_ms/h1/w1</property>
      <property value="62.2622">fsim/tables/reach_tas_ms/h1/w2</property>
      <property value="61.6959">fsim/tables/reach_tas_ms/h2/w0</property>
      <property value="61.4797">fsim/tables/reach_tas_ms/h2/w1</property>
      <property value="61.2066">fsim/tables/reach_tas_ms/h2/w2</property>
      <property value="60.4658">fsim/tables/reach_tas_ms/h3/w0</property>
      <property value="59.8514">fsim/tables/reach_tas_ms/h3/w1</property>
      <property value="59.2432">fsim/tables/reach_tas_ms/h3/w2</property>
      <property value="58.9641">fsim/tables/reach_tas_ms/h4/w0</property>
      <property value="58.3379">fsim/tables/reach_tas_ms/h4/w1</property>
      <property value="57.4406">fsim/tables/reach_tas_ms/h4/w2</property>
      <property value="57.9156">fsim/tables/reach_tas_ms/h5/w0</property>
      <property value="56.9491">fsim/tables/reach_tas_ms/h5/w1</property>
      <property value="55.7595">fsim/tables/reach_tas_ms/h5/w2</property>
      <property value="56.506">fsim/tables/reach_tas_ms/h6/w0</property>
      <property value="55.28">fsim/tables/reach_tas_ms/h6/w1</property>
      <property value="53.8504">fsim/tables/reach_tas_ms/h6/w2</property>
      <property value="0.0">fsim/tables/speed_fraction/v0</property>
      <property value="0.0666667">fsim/tables/speed_fraction/v1</property>
      <property value="0.666667">fsim/tables/speed_fraction/v10</property>
      <property value="0.733333">fsim/tables/speed_fraction/v11</property>
      <property value="0.8">fsim/tables/speed_fraction/v12</property>
      <property value="0.866667">fsim/tables/speed_fraction/v13</property>
      <property value="0.933333">fsim/tables/speed_fraction/v14</property>
      <property value="1">fsim/tables/speed_fraction/v15</property>
      <property value="0.133333">fsim/tables/speed_fraction/v2</property>
      <property value="0.2">fsim/tables/speed_fraction/v3</property>
      <property value="0.266667">fsim/tables/speed_fraction/v4</property>
      <property value="0.333333">fsim/tables/speed_fraction/v5</property>
      <property value="0.4">fsim/tables/speed_fraction/v6</property>
      <property value="0.466667">fsim/tables/speed_fraction/v7</property>
      <property value="0.533333">fsim/tables/speed_fraction/v8</property>
      <property value="0.6">fsim/tables/speed_fraction/v9</property>
      <property value="23.9378">fsim/tables/stall_cas_ms/h0/w0</property>
      <property value="24.5761">fsim/tables/stall_cas_ms/h0/w1</property>
      <property value="25.1983">fsim/tables/stall_cas_ms/h0/w2</property>
      <property value="24.0739">fsim/tables/stall_cas_ms/h1/w0</property>
      <property value="24.7159">fsim/tables/stall_cas_ms/h1/w1</property>
      <property value="25.3416">fsim/tables/stall_cas_ms/h1/w2</property>
      <property value="23.9207">fsim/tables/stall_cas_ms/h2/w0</property>
      <property value="24.5586">fsim/tables/stall_cas_ms/h2/w1</property>
      <property value="25.1804">fsim/tables/stall_cas_ms/h2/w2</property>
      <property value="23.9895">fsim/tables/stall_cas_ms/h3/w0</property>
      <property value="24.6293">fsim/tables/stall_cas_ms/h3/w1</property>
      <property value="25.2528">fsim/tables/stall_cas_ms/h3/w2</property>
      <property value="24.1081">fsim/tables/stall_cas_ms/h4/w0</property>
      <property value="24.751">fsim/tables/stall_cas_ms/h4/w1</property>
      <property value="25.3776">fsim/tables/stall_cas_ms/h4/w2</property>
      <property value="23.9666">fsim/tables/stall_cas_ms/h5/w0</property>
      <property value="24.6058">fsim/tables/stall_cas_ms/h5/w1</property>
      <property value="25.2287">fsim/tables/stall_cas_ms/h5/w2</property>
      <property value="24.0079">fsim/tables/stall_cas_ms/h6/w0</property>
      <property value="24.6481">fsim/tables/stall_cas_ms/h6/w1</property>
      <property value="25.2721">fsim/tables/stall_cas_ms/h6/w2</property>
      <property value="982.5">fsim/tables/weight_kg/w0</property>
      <property value="1035.6">fsim/tables/weight_kg/w1</property>
      <property value="1088.7">fsim/tables/weight_kg/w2</property>
      <channel name="Pitch">
        <summer name="fcs/pitch-trim-sum">
          <input>fcs/elevator-cmd-norm</input>
          <input>fcs/pitch-trim-cmd-norm</input>
          <clipto> <min>-1</min> <max>1</max> </clipto>
        </summer>
        <aerosurface_scale name="fcs/elevator-control">
          <input>fcs/pitch-trim-sum</input>
          <range> <min>-28.00</min> <max>23.00</max> </range>
          <gain>0.0174533</gain>
        </aerosurface_scale>
        <actuator name="fcs/elevator-actuator">
          <input>fcs/elevator-control</input>
          <rate_limit>2.0</rate_limit>
          <output>fcs/elevator-pos-rad</output>
        </actuator>
      </channel>
      <channel name="Roll">
        <summer name="fcs/roll-trim-sum">
          <input>fcs/aileron-cmd-norm</input>
          <input>fcs/roll-trim-cmd-norm</input>
          <clipto> <min>-1</min> <max>1</max> </clipto>
        </summer>
        <aerosurface_scale name="fcs/left-aileron-control">
          <input>fcs/roll-trim-sum</input>
          <range> <min>-15.00</min> <max>15.00</max> </range>
          <gain>0.0174533</gain>
        </aerosurface_scale>
        <actuator name="fcs/left-aileron-actuator">
          <input>fcs/left-aileron-control</input>
          <rate_limit>2.0</rate_limit>
          <output>fcs/left-aileron-pos-rad</output>
        </actuator>
        <pure_gain name="fcs/right-aileron">
          <input>fcs/left-aileron-pos-rad</input>
          <gain>-1</gain>
          <output>fcs/right-aileron-pos-rad</output>
        </pure_gain>
      </channel>
      <channel name="Yaw">
        <summer name="fcs/yaw-trim-sum">
          <input>fcs/rudder-cmd-norm</input>
          <input>fcs/yaw-trim-cmd-norm</input>
          <clipto> <min>-1</min> <max>1</max> </clipto>
        </summer>
        <aerosurface_scale name="fcs/rudder-control">
          <input>fcs/yaw-trim-sum</input>
          <range> <min>-16.00</min> <max>16.00</max> </range>
          <gain>0.0174533</gain>
        </aerosurface_scale>
        <actuator name="fcs/rudder-actuator">
          <input>fcs/rudder-control</input>
          <rate_limit>2.0</rate_limit>
          <output>fcs/rudder-pos-rad</output>
        </actuator>
        <!-- the nose or tail wheel steers with the rudder pedals (JSBSim steers from
             fcs/steer-cmd-norm, positive right; the rudder command is positive left) -->
        <pure_gain name="fcs/steer-from-rudder">
          <input>fcs/yaw-trim-sum</input>
          <gain>-1</gain>
          <output>fcs/steer-cmd-norm</output>
        </pure_gain>
      </channel>
      <channel name="Flaps">
        <kinematic name="fcs/flaps-control">
          <input>fcs/flap-cmd-norm</input>
          <traverse>
            <setting> <position>0.0</position> <time>0.0</time> </setting>
            <setting> <position>7.5</position> <time>2.0</time> </setting>
            <setting> <position>15.0</position> <time>2.0</time> </setting>
            <setting> <position>22.5</position> <time>2.0</time> </setting>
            <setting> <position>30.0</position> <time>2.0</time> </setting>
          </traverse>
          <output>fcs/flap-pos-deg</output>
        </kinematic>
        <pure_gain name="fcs/flaps-normalized">
          <input>fcs/flap-pos-deg</input>
          <gain>0.0333333</gain>
          <output>fcs/flap-pos-norm</output>
        </pure_gain>
      </channel>
      <channel name="Automatic Mixture Control">
        <fcs_function name="fcs/auto-mixture">
          <function>
            <table>
              <independentVar lookup="row">atmosphere/P-psf</independentVar>
              <tableData>
                   0  0.0
                2117  1.0
              </tableData>
            </table>
          </function>
          <output>fcs/mixture-cmd-norm[0]</output>
        </fcs_function>
      </channel>
    </flight_control>
    <aerodynamics>
        <function name="aero/function/mach-lift">
          <description>lift, and damping, over its low-speed value (hangar: aero/mach.py)</description>
          <table>
            <independentVar lookup="row">velocities/mach</independentVar>
            <tableData>
                 0.000     1.000000
                 0.300     1.031130
                 0.500     1.096128
                 0.600     1.150438
                 0.700     1.229353
                 0.800     1.351785
                 0.850     1.443102
                 0.900     1.573309
            </tableData>
          </table>
        </function>
        <function name="aero/function/mach-side">
          <description>side force, rolling and yawing moment over their low-speed values</description>
          <table>
            <independentVar lookup="row">velocities/mach</independentVar>
            <tableData>
                 0.000     1.000000
                 0.300     1.012915
                 0.500     1.039002
                 0.600     1.060043
                 0.700     1.089694
                 0.800     1.134386
                 0.850     1.167443
                 0.900     1.215489
            </tableData>
          </table>
        </function>
        <function name="aero/function/mach-dCm-dCL">
          <description>pitching moment per unit low-speed lift: the neutral point's move</description>
          <table>
            <independentVar lookup="row">velocities/mach</independentVar>
            <tableData>
                 0.000     0.000000
                 0.300    -0.002862
                 0.500    -0.007360
                 0.600    -0.009574
                 0.700    -0.010260
                 0.800    -0.005327
                 0.850     0.003171
                 0.900     0.022616
            </tableData>
          </table>
        </function>
        <function name="aero/function/mach-dCD0">
          <description>zero-lift drag's change: friction and wave drag</description>
          <table>
            <independentVar lookup="row">velocities/mach</independentVar>
            <tableData>
                 0.000     0.000000
                 0.300    -0.000145
                 0.500    -0.000396
                 0.600    -0.000563
                 0.700     0.000011
                 0.800     0.038791
                 0.850     0.094811
                 0.900     0.160628
            </tableData>
          </table>
        </function>
        <function name="aero/function/mach-dK">
          <description>induced-drag factor's change (per CL^2)</description>
          <table>
            <independentVar lookup="row">velocities/mach</independentVar>
            <tableData>
                 0.000     0.000000
                 0.300     0.003422
                 0.500     0.009649
                 0.600     0.014064
                 0.700     0.019466
                 0.800     0.026050
                 0.850     0.029909
                 0.900     0.034293
            </tableData>
          </table>
        </function>
        <function name="aero/function/mach-aileron">
          <description>aileron power over its low-speed value</description>
          <table>
            <independentVar lookup="row">velocities/mach</independentVar>
            <tableData>
                 0.000     1.000000
                 0.300     1.027532
                 0.500     1.084601
                 0.600     1.131926
                 0.700     1.200281
                 0.800     1.305955
                 0.850     1.385081
                 0.900     1.499634
            </tableData>
          </table>
        </function>
        <function name="aero/function/mach-elevator">
          <description>elevator power over its low-speed value</description>
          <table>
            <independentVar lookup="row">velocities/mach</independentVar>
            <tableData>
                 0.000     1.000000
                 0.300     1.025302
                 0.500     1.077399
                 0.600     1.120198
                 0.700     1.181273
                 0.800     1.273657
                 0.850     1.340938
                 0.900     1.434987
            </tableData>
          </table>
        </function>
        <function name="aero/function/mach-flap">
          <description>flap power over its low-speed value</description>
          <table>
            <independentVar lookup="row">velocities/mach</independentVar>
            <tableData>
                 0.000     1.000000
                 0.300     1.034775
                 0.500     1.108136
                 0.600     1.170243
                 0.700     1.261893
                 0.800     1.407745
                 0.850     1.519897
                 0.900     1.686022
            </tableData>
          </table>
        </function>
        <function name="aero/function/mach-rudder">
          <description>rudder power over its low-speed value</description>
          <table>
            <independentVar lookup="row">velocities/mach</independentVar>
            <tableData>
                 0.000     1.000000
                 0.300     1.016502
                 0.500     1.049528
                 0.600     1.075719
                 0.700     1.111639
                 0.800     1.162692
                 0.850     1.197296
                 0.900     1.241763
            </tableData>
          </table>
        </function>
        <function name="aero/function/CL-base">
          <description>CL over alpha and beta at low speed</description>
          <table>
            <independentVar lookup="row">aero/alpha-deg</independentVar>
            <independentVar lookup="column">aero/beta-deg</independentVar>
            <tableData>
                        -90.00    -70.00    -50.00    -40.00    -30.00    -25.00    -20.00    -15.00    -10.00     -6.00     -3.00      0.00      3.00      6.00     10.00     15.00     20.00     25.00     30.00     40.00     50.00     70.00     90.00
             -180.00   0.00000   0.00030   0.00621   0.00912   0.01180   0.01297   0.01398   0.01480   0.01540   0.01571   0.01584   0.01589   0.01584   0.01571   0.01540   0.01480   0.01398   0.01297   0.01180   0.00912   0.00621   0.00030   0.00000
             -120.00  -0.00000   0.10703   0.31974   0.43816   0.54717   0.59430   0.63473   0.66737   0.69132   0.70430   0.70988   0.71079   0.70988   0.70430   0.69132   0.66737   0.63473   0.59430   0.54717   0.43816   0.31974   0.10703  -0.00000
              -70.00  -0.00000  -0.08674  -0.26363  -0.36295  -0.45477  -0.49459  -0.52881  -0.55646  -0.57677  -0.58753  -0.59119  -0.59137  -0.59119  -0.58753  -0.57677  -0.55646  -0.52881  -0.49459  -0.45477  -0.36295  -0.26363  -0.08674  -0.00000
              -46.00  -0.00000  -0.15249  -0.46908  -0.64695  -0.81527  -0.89012  -0.95554  -1.01140  -1.04637  -1.06482  -1.07276  -1.07540  -1.07276  -1.06482  -1.04637  -1.01140  -0.95554  -0.89012  -0.81527  -0.64695  -0.46908  -0.15249  -0.00000
              -32.00  -0.00000  -0.16545  -0.51813  -0.71806  -0.90584  -0.99034  -1.05712  -1.11111  -1.15055  -1.17092  -1.17953  -1.18240  -1.17953  -1.17092  -1.15055  -1.11111  -1.05712  -0.99034  -0.90584  -0.71806  -0.51813  -0.16545  -0.00000
              -22.00  -0.00000  -0.18730  -0.59133  -0.85046  -1.10652  -1.21714  -1.30973  -1.38485  -1.44330  -1.47705  -1.51270  -1.50649  -1.51270  -1.47705  -1.44330  -1.38485  -1.30973  -1.21714  -1.10652  -0.85046  -0.59133  -0.18730  -0.00000
              -17.00  -0.00000  -0.16999  -0.65570  -0.89673  -1.03432  -1.11108  -1.18828  -1.25013  -1.29510  -1.31826  -1.32801  -1.33126  -1.32801  -1.31826  -1.29510  -1.25013  -1.18828  -1.11108  -1.03432  -0.89673  -0.65570  -0.16999  -0.00000
              -13.00  -0.00000  -0.16053  -0.54743  -0.65876  -0.75961  -0.82236  -0.87889  -0.92402  -0.95663  -0.97328  -0.98023  -0.98252  -0.98023  -0.97328  -0.95663  -0.92402  -0.87889  -0.82236  -0.75961  -0.65876  -0.54743  -0.16053  -0.00000
               -9.00  -0.00000  -0.12209  -0.35730  -0.41654  -0.48498  -0.52650  -0.56212  -0.59039  -0.61059  -0.62072  -0.62484  -0.62618  -0.62484  -0.62072  -0.61059  -0.59039  -0.56212  -0.52650  -0.48498  -0.41654  -0.35730  -0.12209  -0.00000
               -5.00  -0.00000  -0.05590  -0.15723  -0.18086  -0.21011  -0.22762  -0.24224  -0.25368  -0.26162  -0.26538  -0.26676  -0.26714  -0.26676  -0.26538  -0.26162  -0.25368  -0.24224  -0.22762  -0.21011  -0.18086  -0.15723  -0.05590  -0.00000
               -1.00  -0.00000   0.01178   0.04031   0.05552   0.06689   0.07415   0.08068   0.08613   0.09034   0.09271   0.09385   0.09433   0.09385   0.09271   0.09034   0.08613   0.08068   0.07415   0.06689   0.05552   0.04031   0.01178  -0.00000
                3.00   0.00000   0.07949   0.24500   0.29190   0.34544   0.37766   0.40543   0.42783   0.44418   0.45259   0.45610   0.45725   0.45610   0.45259   0.44418   0.42783   0.40543   0.37766   0.34544   0.29190   0.24500   0.07949   0.00000
                7.00   0.00000   0.14628   0.45023   0.53552   0.62315   0.67985   0.72883   0.76818   0.79679   0.81142   0.81748   0.81943   0.81748   0.81142   0.79679   0.76818   0.72883   0.67985   0.62315   0.53552   0.45023   0.14628   0.00000
               11.00   0.00000   0.18135   0.65856   0.78320   0.89854   0.97752   1.04751   1.10376   1.14467   1.16566   1.17442   1.17730   1.17442   1.16566   1.14467   1.10376   1.04751   0.97752   0.89854   0.78320   0.65856   0.18135   0.00000
               15.00   0.00000   0.20245   0.72495   1.00576   1.17003   1.26533   1.35588   1.42870   1.48178   1.50912   1.52061   1.52442   1.52061   1.50912   1.48178   1.42870   1.35588   1.26533   1.17003   1.00576   0.72495   0.20245   0.00000
               19.00   0.00000   0.20613   0.66032   0.92929   1.16330   1.26633   1.36060   1.43779   1.49574   1.52746   1.54253   1.53933   1.54253   1.52746   1.49574   1.43779   1.36060   1.26633   1.16330   0.92929   0.66032   0.20613   0.00000
               23.00   0.00000   0.17890   0.57138   0.82486   1.02967   1.10870   1.18103   1.24186   1.28615   1.30902   1.31870   1.32193   1.31870   1.30902   1.28615   1.24186   1.18103   1.10870   1.02967   0.82486   0.57138   0.17890   0.00000
               27.00   0.00000   0.17227   0.54642   0.76212   0.97966   1.06661   1.15112   1.22437   1.26911   1.29218   1.30194   1.30520   1.30194   1.29218   1.26911   1.22437   1.15112   1.06661   0.97966   0.76212   0.54642   0.17227   0.00000
               32.00   0.00000   0.16793   0.52709   0.73082   0.92306   1.01047   1.08083   1.13863   1.18066   1.19704   1.20544   1.20835   1.20544   1.19704   1.18066   1.13863   1.08083   1.01047   0.92306   0.73082   0.52709   0.16793   0.00000
               46.00   0.00000   0.15341   0.47239   0.65153   0.81970   0.89384   0.95825   1.01164   1.04617   1.06453   1.07242   1.07503   1.07242   1.06453   1.04617   1.01164   0.95825   0.89384   0.81970   0.65153   0.47239   0.15341   0.00000
               70.00   0.00000   0.08594   0.26088   0.35906   0.44981   0.48916   0.52297   0.55029   0.57037   0.58100   0.58460   0.58477   0.58460   0.58100   0.57037   0.55029   0.52297   0.48916   0.44981   0.35906   0.26088   0.08594   0.00000
              120.00   0.00000  -0.10758  -0.32162  -0.44081  -0.55055  -0.59800  -0.63871  -0.67157  -0.69569  -0.70875  -0.71437  -0.71529  -0.71437  -0.70875  -0.69569  -0.67157  -0.63871  -0.59800  -0.55055  -0.44081  -0.32162  -0.10758   0.00000
              180.00   0.00000   0.00030   0.00621   0.00912   0.01180   0.01297   0.01398   0.01480   0.01540   0.01571   0.01584   0.01589   0.01584   0.01571   0.01540   0.01480   0.01398   0.01297   0.01180   0.00912   0.00621   0.00030   0.00000
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            </tableData>
          </table>
        </function>
      <axis name="DRAG">
        <function name="aero/coefficient/CD_base">
          <description>CD over alpha and beta (hangar)</description>
          <product>
            <property>aero/qbar-psf</property>
            <property>metrics/Sw-sqft</property>
          <table>
            <independentVar lookup="row">aero/alpha-deg</independentVar>
            <independentVar lookup="column">aero/beta-deg</independentVar>
            <tableData>
                        -90.00    -70.00    -50.00    -40.00    -30.00    -25.00    -20.00    -15.00    -10.00     -6.00     -3.00      0.00      3.00      6.00     10.00     15.00     20.00     25.00     30.00     40.00     50.00     70.00     90.00
             -180.00   0.34137   0.27087   0.15575   0.10551   0.06913   0.05681   0.04822   0.04287   0.03889   0.03892   0.03923   0.03935   0.03923   0.03892   0.03889   0.04287   0.04822   0.05681   0.06913   0.10551   0.15575   0.27087   0.34137
             -120.00   0.34137   0.34884   0.53387   0.70692   0.90386   0.99957   1.08663   1.16020   1.21607   1.24569   1.25853   1.26290   1.25853   1.24569   1.21607   1.16020   1.08663   0.99957   0.90386   0.70692   0.53387   0.34884   0.34137
              -70.00   0.34137   0.38035   0.63103   0.84786   1.08959   1.20600   1.31150   1.40044   1.46789   1.50373   1.51910   1.52433   1.51910   1.50373   1.46789   1.40044   1.31150   1.20600   1.08959   0.84786   0.63103   0.38035   0.34137
              -46.00   0.34137   0.35491   0.45784   0.55802   0.67847   0.74042   0.79885   0.85109   0.88878   0.90881   0.91747   0.92038   0.91747   0.90881   0.88878   0.85109   0.79885   0.74042   0.67847   0.55802   0.45784   0.35491   0.34137
              -32.00   0.34137   0.33666   0.34280   0.36644   0.41002   0.44105   0.46097   0.47808   0.49133   0.49841   0.50144   0.50246   0.50144   0.49841   0.49133   0.47808   0.46097   0.44105   0.41002   0.36644   0.34280   0.33666   0.34137
              -22.00   0.34137   0.32460   0.26896   0.24977   0.26222   0.26578   0.26765   0.26886   0.26987   0.27011   0.26762   0.26890   0.26762   0.27011   0.26987   0.26886   0.26765   0.26578   0.26222   0.24977   0.26896   0.32460   0.34137
              -17.00   0.34137   0.32036   0.23512   0.20710   0.20099   0.19100   0.18332   0.17790   0.17449   0.17293   0.17231   0.17211   0.17231   0.17293   0.17449   0.17790   0.18332   0.19100   0.20099   0.20710   0.23512   0.32036   0.34137
              -13.00   0.34137   0.31692   0.22096   0.18033   0.15883   0.14337   0.13104   0.12189   0.11579   0.11288   0.11170   0.11131   0.11170   0.11288   0.11579   0.12189   0.13104   0.14337   0.15883   0.18033   0.22096   0.31692   0.34137
               -9.00   0.34137   0.31510   0.21144   0.15953   0.12834   0.10924   0.09372   0.08205   0.07419   0.07041   0.06890   0.06840   0.06890   0.07041   0.07419   0.08205   0.09372   0.10924   0.12834   0.15953   0.21144   0.31510   0.34137
               -5.00   0.34137   0.31443   0.20463   0.14640   0.11010   0.08897   0.07169   0.05866   0.04988   0.04570   0.04405   0.04351   0.04405   0.04570   0.04988   0.05866   0.07169   0.08897   0.11010   0.14640   0.20463   0.31443   0.34137
               -1.00   0.34137   0.31416   0.20210   0.14152   0.10399   0.08238   0.06472   0.05143   0.04251   0.03831   0.03668   0.03617   0.03668   0.03831   0.04251   0.05143   0.06472   0.08238   0.10399   0.14152   0.20210   0.31416   0.34137
                3.00   0.34137   0.31429   0.20342   0.14496   0.10985   0.08942   0.07278   0.06035   0.05207   0.04820   0.04671   0.04625   0.04671   0.04820   0.05207   0.06035   0.07278   0.08942   0.10985   0.14496   0.20342   0.31429   0.34137
                7.00   0.34137   0.31482   0.20870   0.15646   0.12764   0.11002   0.09585   0.08541   0.07858   0.07542   0.07419   0.07381   0.07419   0.07542   0.07858   0.08541   0.09585   0.11002   0.12764   0.15646   0.20870   0.31482   0.34137
               11.00   0.34137   0.31649   0.21760   0.17540   0.15718   0.14403   0.13377   0.12651   0.12196   0.11994   0.11918   0.11894   0.11918   0.11994   0.12196   0.12651   0.13377   0.14403   0.15718   0.17540   0.21760   0.31649   0.34137
               15.00   0.34137   0.31906   0.23007   0.19954   0.19758   0.19073   0.18576   0.18281   0.18141   0.18099   0.18088   0.18086   0.18088   0.18099   0.18141   0.18281   0.18576   0.19073   0.19758   0.19954   0.23007   0.31906   0.34137
               19.00   0.34137   0.32221   0.25275   0.22656   0.23267   0.23145   0.23156   0.23241   0.23339   0.23383   0.23377   0.22895   0.23377   0.23383   0.23339   0.23241   0.23156   0.23145   0.23267   0.22656   0.25275   0.32221   0.34137
               23.00   0.34137   0.32677   0.27916   0.26469   0.28054   0.28336   0.28739   0.29191   0.29584   0.29811   0.29912   0.29947   0.29912   0.29811   0.29584   0.29191   0.28739   0.28336   0.28054   0.26469   0.27916   0.32677   0.34137
               27.00   0.34137   0.33108   0.30647   0.30593   0.33543   0.34832   0.36228   0.37648   0.38533   0.39013   0.39222   0.39292   0.39222   0.39013   0.38533   0.37648   0.36228   0.34832   0.33543   0.30593   0.30647   0.33108   0.34137
               32.00   0.34137   0.33699   0.34458   0.36741   0.41283   0.44406   0.46599   0.48568   0.50095   0.50787   0.51123   0.51238   0.51123   0.50787   0.50095   0.48568   0.46599   0.44406   0.41283   0.36741   0.34458   0.33699   0.34137
               46.00   0.34137   0.35528   0.46023   0.56184   0.68266   0.74473   0.80338   0.85561   0.89287   0.91286   0.92150   0.92441   0.92150   0.91286   0.89287   0.85561   0.80338   0.74473   0.68266   0.56184   0.46023   0.35528   0.34137
               70.00   0.34137   0.38058   0.63257   0.85045   1.09333   1.21029   1.31628   1.40563   1.47339   1.50939   1.52484   1.53009   1.52484   1.50939   1.47339   1.40563   1.31628   1.21029   1.09333   0.85045   0.63257   0.38058   0.34137
              120.00   0.34137   0.34852   0.53180   0.70342   0.89881   0.99379   1.08018   1.15320   1.20866   1.23805   1.25080   1.25514   1.25080   1.23805   1.20866   1.15320   1.08018   0.99379   0.89881   0.70342   0.53180   0.34852   0.34137
              180.00   0.34137   0.27087   0.15575   0.10551   0.06913   0.05681   0.04822   0.04287   0.03889   0.03892   0.03923   0.03935   0.03923   0.03892   0.03889   0.04287   0.04822   0.05681   0.06913   0.10551   0.15575   0.27087   0.34137
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            </tableData>
          </table>
          </product>
        </function>
        <function name="aero/coefficient/CD_mach">
          <description>zero-lift drag's change with Mach: friction, wave drag</description>
          <product>
            <property>aero/qbar-psf</property>
            <property>metrics/Sw-sqft</property>
            <property>aero/function/mach-dCD0</property>
          </product>
        </function>
        <function name="aero/coefficient/CD_induced_mach">
          <description>induced drag's change with Mach (leading-edge suction lost)</description>
          <product>
            <property>aero/qbar-psf</property>
            <property>metrics/Sw-sqft</property>
            <property>aero/cl-squared</property>
            <property>aero/function/mach-dK</property>
          </product>
        </function>
        <function name="aero/coefficient/CD_aileron">
          <description>CD increment from aileron (deg), over alpha</description>
          <product>
            <property>aero/qbar-psf</property>
            <property>metrics/Sw-sqft</property>
            <property>aero/function/mach-aileron</property>
          <table>
            <independentVar lookup="row">aero/alpha-deg</independentVar>
            <independentVar lookup="column">fcs/left-aileron-pos-deg</independentVar>
            <tableData>
                        -15.00    -10.00     -5.00      0.00      5.00     10.00     15.00
             -180.00   0.00343   0.00154   0.00039   0.00000   0.00039   0.00154   0.00343
             -120.00   0.00342   0.00154   0.00039   0.00000   0.00039   0.00154   0.00342
              -70.00   0.00342   0.00154   0.00039   0.00000   0.00039   0.00154   0.00342
              -46.00   0.00804   0.00390   0.00103   0.00000   0.00103   0.00390   0.00804
              -32.00   0.01646   0.00824   0.00222   0.00000   0.00222   0.00824   0.01646
              -22.00  -0.00038  -0.00202  -0.00139   0.00000  -0.00139  -0.00202  -0.00038
              -17.00   0.01251   0.00653   0.00180   0.00000   0.00180   0.00653   0.01251
              -13.00   0.01313   0.00686   0.00189   0.00000   0.00189   0.00686   0.01313
               -9.00   0.01341   0.00701   0.00193   0.00000   0.00193   0.00701   0.01341
               -5.00   0.01359   0.00711   0.00196   0.00000   0.00196   0.00711   0.01359
               -1.00   0.01367   0.00715   0.00197   0.00000   0.00197   0.00715   0.01367
                3.00   0.01361   0.00712   0.00196   0.00000   0.00196   0.00712   0.01361
                7.00   0.01344   0.00702   0.00194   0.00000   0.00194   0.00702   0.01344
               11.00   0.01314   0.00686   0.00189   0.00000   0.00189   0.00686   0.01314
               15.00   0.01269   0.00658   0.00181   0.00000   0.00181   0.00658   0.01269
               19.00   0.04417   0.02832   0.01332   0.00000   0.01332   0.02832   0.04417
               23.00   0.03461   0.01647   0.00436   0.00000   0.00436   0.01647   0.03461
               27.00   0.02578   0.01295   0.00349   0.00000   0.00349   0.01295   0.02578
               32.00   0.02228   0.01114   0.00299   0.00000   0.00299   0.01114   0.02228
               46.00   0.00920   0.00448   0.00119   0.00000   0.00119   0.00448   0.00920
               70.00   0.00342   0.00154   0.00039   0.00000   0.00039   0.00154   0.00342
              120.00   0.00342   0.00154   0.00039   0.00000   0.00039   0.00154   0.00342
              180.00   0.00343   0.00154   0.00039   0.00000   0.00039   0.00154   0.00343
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            </tableData>
          </table>
          </product>
        </function>
        <function name="aero/coefficient/CD_elevator">
          <description>CD increment from elevator (deg), over alpha</description>
          <product>
            <property>aero/qbar-psf</property>
            <property>metrics/Sw-sqft</property>
            <property>aero/function/mach-elevator</property>
          <table>
            <independentVar lookup="row">aero/alpha-deg</independentVar>
            <independentVar lookup="column">fcs/elevator-pos-deg</independentVar>
            <tableData>
                        -28.00    -25.00    -20.00    -15.00    -10.00     -5.00      0.00      5.00     10.00     15.00     20.00     23.00
             -180.00   0.01290   0.01045   0.00685   0.00392   0.00176   0.00044   0.00000   0.00044   0.00176   0.00392   0.00685   0.00894
             -120.00   0.01290   0.01045   0.00685   0.00392   0.00176   0.00044   0.00000   0.00044   0.00176   0.00392   0.00685   0.00894
              -70.00   0.01290   0.01045   0.00685   0.00392   0.00176   0.00044   0.00000   0.00044   0.00176   0.00392   0.00685   0.00894
              -46.00   0.00522   0.00347   0.00098  -0.00091  -0.00198  -0.00183   0.00000   0.00372   0.00914   0.01569   0.02294   0.02759
              -32.00   0.02998   0.02659   0.02108   0.01552   0.00959   0.00381   0.00000  -0.00009   0.00405   0.01134   0.02038   0.02634
              -22.00   0.05050   0.04628   0.03905   0.03102   0.02114   0.01020   0.00000  -0.01300  -0.02273  -0.02794  -0.02956  -0.02942
              -17.00   0.06868   0.06323   0.05361   0.04252   0.02915   0.01417   0.00000  -0.01120  -0.01833  -0.02135  -0.02140  -0.02052
              -13.00   0.06206   0.05677   0.04775   0.03757   0.02540   0.01205   0.00000  -0.00891  -0.01392  -0.01530  -0.01418  -0.01274
               -9.00   0.05454   0.04951   0.04104   0.03172   0.02096   0.00963   0.00000  -0.00639  -0.00910  -0.00872  -0.00637  -0.00436
               -5.00   0.04617   0.04147   0.03369   0.02539   0.01620   0.00706   0.00000  -0.00375  -0.00409  -0.00190   0.00170   0.00428
               -1.00   0.03721   0.03290   0.02589   0.01870   0.01120   0.00438   0.00000  -0.00102   0.00106   0.00508   0.00992   0.01307
                3.00   0.02784   0.02395   0.01778   0.01178   0.00605   0.00163   0.00000   0.00174   0.00626   0.01208   0.01814   0.02184
                7.00   0.01832   0.01489   0.00960   0.00482   0.00088  -0.00112   0.00000   0.00447   0.01137   0.01894   0.02617   0.03039
               11.00   0.00884   0.00587   0.00147  -0.00207  -0.00420  -0.00381   0.00000   0.00712   0.01630   0.02553   0.03386   0.03855
               15.00  -0.00036  -0.00286  -0.00635  -0.00867  -0.00907  -0.00637   0.00000   0.00961   0.02092   0.03168   0.04099   0.04611
               19.00  -0.00546  -0.00783  -0.01211  -0.01482  -0.01362  -0.00873   0.00000   0.01187   0.02511   0.03732   0.04769   0.05332
               23.00  -0.02150  -0.02273  -0.02395  -0.02334  -0.01965  -0.01182   0.00000   0.01472   0.03027   0.04406   0.05541   0.06146
               27.00  -0.02724  -0.02814  -0.02863  -0.01846  -0.02386  -0.01429   0.00000   0.01692   0.03406   0.04907   0.06126   0.06765
               32.00   0.03127   0.02438   0.01361   0.00391  -0.00349  -0.00575   0.00000   0.01421   0.03318   0.05215   0.06776   0.07556
               46.00   0.03423   0.02899   0.02091   0.01360   0.00723   0.00246   0.00000  -0.00004   0.00187   0.00490   0.00851   0.01088
               70.00   0.01290   0.01045   0.00685   0.00392   0.00176   0.00044   0.00000   0.00044   0.00176   0.00392   0.00685   0.00894
              120.00   0.01290   0.01045   0.00685   0.00392   0.00176   0.00044   0.00000   0.00044   0.00176   0.00392   0.00685   0.00894
              180.00   0.01290   0.01045   0.00685   0.00392   0.00176   0.00044   0.00000   0.00044   0.00176   0.00392   0.00685   0.00894
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            </tableData>
          </table>
          </product>
        </function>
        <function name="aero/coefficient/CD_flap">
          <description>CD increment from flap (deg), over alpha</description>
          <product>
            <property>aero/qbar-psf</property>
            <property>metrics/Sw-sqft</property>
            <property>aero/function/mach-flap</property>
          <table>
            <independentVar lookup="row">aero/alpha-deg</independentVar>
            <independentVar lookup="column">fcs/flap-pos-deg</independentVar>
            <tableData>
                          0.00      5.00     10.00     15.00     20.00     25.00     30.00
             -180.00   0.00000   0.00031   0.00123   0.00274   0.00478   0.00730   0.01022
             -120.00   0.00000   0.00031   0.00123   0.00274   0.00478   0.00730   0.01021
              -70.00   0.00000   0.00031   0.00123   0.00274   0.00478   0.00729   0.01021
              -46.00   0.00000   0.00920   0.02014   0.03221   0.04550   0.05966   0.07457
              -32.00   0.00000   0.00952   0.02378   0.04122   0.06116   0.08271   0.10540
              -22.00   0.00000  -0.01721  -0.03036  -0.04181  -0.04964  -0.05522  -0.05846
              -17.00   0.00000  -0.01209  -0.02047  -0.02484  -0.02556  -0.02338  -0.01903
              -13.00   0.00000  -0.00781  -0.01180  -0.01191  -0.00874  -0.00307   0.00449
               -9.00   0.00000  -0.00363  -0.00340   0.00047   0.00726   0.01614   0.02658
               -5.00   0.00000   0.00038   0.00461   0.01227   0.02247   0.03437   0.04752
               -1.00   0.00000   0.00431   0.01250   0.02391   0.03749   0.05237   0.06821
                3.00   0.00000   0.00827   0.02038   0.03546   0.05232   0.07007   0.08847
                7.00   0.00000   0.01227   0.02830   0.04702   0.06709   0.08764   0.10849
               11.00   0.00000   0.01629   0.03622   0.05850   0.08177   0.10539   0.12936
               15.00   0.00000   0.02024   0.04387   0.06999   0.09749   0.12551   0.15383
               19.00   0.00000   0.01975   0.05224   0.09049   0.12889   0.16555   0.20054
               23.00   0.00000   0.00480   0.01767   0.03775   0.06345   0.09357   0.12830
               27.00   0.00000  -0.00074   0.00546   0.01790   0.03516   0.05588   0.07926
               32.00   0.00000  -0.00598  -0.00570   0.00037   0.01109   0.02524   0.04200
               46.00   0.00000  -0.00876  -0.01512  -0.01911  -0.02100  -0.02122  -0.02013
               70.00   0.00000   0.00031   0.00123   0.00274   0.00478   0.00729   0.01021
              120.00   0.00000   0.00031   0.00123   0.00274   0.00478   0.00730   0.01021
              180.00   0.00000   0.00031   0.00123   0.00274   0.00478   0.00730   0.01022
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            </tableData>
          </table>
          </product>
        </function>
        <function name="aero/coefficient/CD_rudder">
          <description>CD increment from rudder (deg), over alpha</description>
          <product>
            <property>aero/qbar-psf</property>
            <property>metrics/Sw-sqft</property>
            <property>aero/function/mach-rudder</property>
          <table>
            <independentVar lookup="row">aero/alpha-deg</independentVar>
            <independentVar lookup="column">fcs/rudder-pos-deg</independentVar>
            <tableData>
                        -16.00    -15.00    -10.00     -5.00      0.00      5.00     10.00     15.00     16.00
             -180.00   0.00162   0.00142   0.00064   0.00016   0.00000   0.00016   0.00064   0.00142   0.00162
             -120.00   0.00020   0.00018   0.00008   0.00002   0.00000   0.00002   0.00008   0.00018   0.00020
              -70.00   0.00007   0.00007   0.00003   0.00001   0.00000   0.00001   0.00003   0.00007   0.00007
              -46.00   0.00161   0.00146   0.00076   0.00021   0.00000   0.00021   0.00076   0.00146   0.00161
              -32.00   0.00308   0.00280   0.00145   0.00040   0.00000   0.00040   0.00145   0.00280   0.00308
              -22.00   0.00339   0.00305   0.00148   0.00061   0.00000   0.00061   0.00148   0.00305   0.00339
              -17.00   0.00438   0.00398   0.00205   0.00056   0.00000   0.00056   0.00205   0.00398   0.00438
              -13.00   0.00463   0.00421   0.00217   0.00059   0.00000   0.00059   0.00217   0.00421   0.00463
               -9.00   0.00482   0.00438   0.00226   0.00062   0.00000   0.00062   0.00226   0.00438   0.00482
               -5.00   0.00494   0.00449   0.00232   0.00063   0.00000   0.00063   0.00232   0.00449   0.00494
               -1.00   0.00498   0.00453   0.00234   0.00064   0.00000   0.00064   0.00234   0.00453   0.00498
                3.00   0.00496   0.00451   0.00233   0.00064   0.00000   0.00064   0.00233   0.00451   0.00496
                7.00   0.00486   0.00442   0.00228   0.00062   0.00000   0.00062   0.00228   0.00442   0.00486
               11.00   0.00469   0.00426   0.00220   0.00060   0.00000   0.00060   0.00220   0.00426   0.00469
               15.00   0.00445   0.00405   0.00209   0.00057   0.00000   0.00057   0.00209   0.00405   0.00445
               19.00   0.00768   0.00852   0.00654   0.00492   0.00000   0.00492   0.00654   0.00852   0.00768
               23.00   0.00382   0.00347   0.00179   0.00049   0.00000   0.00049   0.00179   0.00347   0.00382
               27.00   0.00335   0.00304   0.00156   0.00043   0.00000   0.00043   0.00156   0.00304   0.00335
               32.00   0.00295   0.00268   0.00138   0.00038   0.00000   0.00038   0.00138   0.00268   0.00295
               46.00   0.00163   0.00148   0.00077   0.00021   0.00000   0.00021   0.00077   0.00148   0.00163
               70.00   0.00007   0.00007   0.00003   0.00001   0.00000   0.00001   0.00003   0.00007   0.00007
              120.00   0.00020   0.00018   0.00008   0.00002   0.00000   0.00002   0.00008   0.00018   0.00020
              180.00   0.00162   0.00142   0.00064   0.00016   0.00000   0.00016   0.00064   0.00142   0.00162
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            </tableData>
          </table>
          </product>
        </function>
        <function name="aero/coefficient/CD_ground">
          <description>Induced drag change in ground effect</description>
          <product>
            <property>aero/qbar-psf</property>
            <property>metrics/Sw-sqft</property>
            <property>aero/cl-squared</property>
            <value>0.05045</value>
          <table>
            <independentVar lookup="row">aero/h_b-mac-ft</independentVar>
            <tableData>
                    0.00   -1.00000
                    0.10   -0.28090
                    0.15   -0.14793
                    0.20   -0.08897
                    0.30   -0.04160
                    0.40   -0.02383
                    0.50   -0.01538
                    0.60   -0.01073
                    0.70   -0.00791
                    0.80   -0.00607
                    0.90   -0.00480
                    1.00   -0.00389
                    1.10   -0.00322
            </tableData>
          </table>
          </product>
        </function>
      </axis>
      <axis name="SIDE">
        <function name="aero/coefficient/CY_base">
          <description>CY over alpha and beta (hangar)</description>
          <product>
            <property>aero/qbar-psf</property>
            <property>metrics/Sw-sqft</property>
            <property>aero/function/mach-side</property>
          <table>
            <independentVar lookup="row">aero/alpha-deg</independentVar>
            <independentVar lookup="column">aero/beta-deg</independentVar>
            <tableData>
                        -90.00    -70.00    -50.00    -40.00    -30.00    -25.00    -20.00    -15.00    -10.00     -6.00     -3.00      0.00      3.00      6.00     10.00     15.00     20.00     25.00     30.00     40.00     50.00     70.00     90.00
             -180.00  -0.00000   0.09330   0.10773   0.08812   0.05946   0.04449   0.03052   0.01847   0.02775   0.03551   0.01871  -0.00000  -0.01871  -0.03551  -0.02775  -0.01847  -0.03052  -0.04449  -0.05946  -0.08812  -0.10773  -0.09330   0.00000
             -120.00  -0.00000  -0.07837  -0.29709  -0.37169  -0.38112  -0.35677  -0.31317  -0.25212  -0.17669  -0.10696  -0.04702  -0.00000   0.04702   0.10696   0.17669   0.25212   0.31317   0.35677   0.38112   0.37169   0.29709   0.07837   0.00000
              -70.00   0.00000  -0.10595  -0.36355  -0.44817  -0.45554  -0.42503  -0.37187  -0.29800  -0.20654  -0.12234  -0.05748  -0.00000   0.05748   0.12234   0.20654   0.29800   0.37187   0.42503   0.45554   0.44817   0.36355   0.10595  -0.00000
              -46.00   0.00000  -0.01701  -0.14260  -0.19168  -0.20509  -0.19281  -0.16580  -0.11111  -0.07954  -0.04997  -0.02515  -0.00000   0.02515   0.04997   0.07954   0.11111   0.16580   0.19281   0.20509   0.19168   0.14260   0.01701  -0.00000
              -32.00   0.00000   0.04009  -0.00289  -0.03322  -0.04396  -0.02275  -0.02883  -0.02849  -0.02220  -0.01432  -0.00744  -0.00000   0.00744   0.01432   0.02220   0.02849   0.02883   0.02275   0.04396   0.03322   0.00289  -0.04009  -0.00000
              -22.00   0.00000   0.07501   0.07996   0.06122   0.06941   0.05435   0.04169   0.03108   0.02182   0.01521   0.00016  -0.00000  -0.00016  -0.01521  -0.02182  -0.03108  -0.04169  -0.05435  -0.06941  -0.06122  -0.07996  -0.07501  -0.00000
              -17.00   0.00000   0.08999   0.12173   0.10222   0.10586   0.08605   0.06777   0.04942   0.03182   0.01859   0.00916  -0.00000  -0.00916  -0.01859  -0.03182  -0.04942  -0.06777  -0.08605  -0.10586  -0.10222  -0.12173  -0.08999  -0.00000
              -13.00   0.00000   0.10360   0.13923   0.12401   0.12636   0.10590   0.08439   0.06216   0.04030   0.02361   0.01164  -0.00000  -0.01164  -0.02361  -0.04030  -0.06216  -0.08439  -0.10590  -0.12636  -0.12401  -0.13923  -0.10360  -0.00000
               -9.00   0.00000   0.11017   0.15002   0.14038   0.14089   0.11946   0.09562   0.07061   0.04576   0.02672   0.01313  -0.00000  -0.01313  -0.02672  -0.04576  -0.07061  -0.09562  -0.11946  -0.14089  -0.14038  -0.15002  -0.11017  -0.00000
               -5.00   0.00000   0.11240   0.15680   0.14988   0.14915   0.12694   0.10173   0.07511   0.04851   0.02813   0.01372  -0.00000  -0.01372  -0.02813  -0.04851  -0.07511  -0.10173  -0.12694  -0.14915  -0.14988  -0.15680  -0.11240  -0.00000
               -1.00   0.00000   0.11330   0.15983   0.15271   0.15129   0.12878   0.10315   0.07604   0.04894   0.02819   0.01359  -0.00000  -0.01359  -0.02819  -0.04894  -0.07604  -0.10315  -0.12878  -0.15129  -0.15271  -0.15983  -0.11330  -0.00000
                3.00   0.00000   0.11292   0.15723   0.14778   0.14670   0.12459   0.09953   0.07317   0.04697   0.02701   0.01302  -0.00000  -0.01302  -0.02701  -0.04697  -0.07317  -0.09953  -0.12459  -0.14670  -0.14778  -0.15723  -0.11292  -0.00000
                7.00   0.00000   0.11117   0.15087   0.13621   0.13483   0.11385   0.09041   0.06611   0.04228   0.02432   0.01177  -0.00000  -0.01177  -0.02432  -0.04228  -0.06611  -0.09041  -0.11385  -0.13483  -0.13621  -0.15087  -0.11117  -0.00000
               11.00   0.00000   0.10340   0.14131   0.11875   0.11567   0.09610   0.07537   0.05446   0.03449   0.01976   0.00958  -0.00000  -0.00958  -0.01976  -0.03449  -0.05446  -0.07537  -0.09610  -0.11567  -0.11875  -0.14131  -0.10340  -0.00000
               15.00   0.00000   0.09208   0.11765   0.09572   0.09037   0.07184   0.05479   0.03846   0.02370   0.01334   0.00642  -0.00000  -0.00642  -0.01334  -0.02370  -0.03846  -0.05479  -0.07184  -0.09037  -0.09572  -0.11765  -0.09208  -0.00000
               19.00   0.00000   0.08162   0.09319   0.06498   0.05538   0.03641   0.02392   0.01333   0.00474  -0.00101  -0.00603  -0.00000   0.00603   0.00101  -0.00474  -0.01333  -0.02392  -0.03641  -0.05538  -0.06498  -0.09319  -0.08162  -0.00000
               23.00   0.00000   0.06976   0.06652   0.04061   0.04418   0.02787   0.01662   0.00942   0.00448   0.00202   0.00081  -0.00000  -0.00081  -0.00202  -0.00448  -0.00942  -0.01662  -0.02787  -0.04418  -0.04061  -0.06652  -0.06976  -0.00000
               27.00   0.00000   0.05709   0.03684   0.00873   0.00685  -0.00409  -0.01190  -0.01278  -0.01072  -0.00720  -0.00383  -0.00000   0.00383   0.00720   0.01072   0.01278   0.01190   0.00409  -0.00685  -0.00873  -0.03684  -0.05709  -0.00000
               32.00   0.00000   0.03920  -0.00575  -0.03952  -0.05208  -0.04081  -0.04643  -0.04379  -0.03391  -0.02077  -0.01078  -0.00000   0.01078   0.02077   0.03391   0.04379   0.04643   0.04081   0.05208   0.03952   0.00575  -0.03920  -0.00000
               46.00   0.00000  -0.01801  -0.14544  -0.19522  -0.20954  -0.19719  -0.16921  -0.11815  -0.08610  -0.05389  -0.02695  -0.00000   0.02695   0.05389   0.08610   0.11815   0.16921   0.19719   0.20954   0.19522   0.14544   0.01801  -0.00000
               70.00   0.00000  -0.10659  -0.36537  -0.45035  -0.45770  -0.42703  -0.37360  -0.29939  -0.20750  -0.12294  -0.05778  -0.00000   0.05778   0.12294   0.20750   0.29939   0.37360   0.42703   0.45770   0.45035   0.36537   0.10659  -0.00000
              120.00  -0.00000  -0.07751  -0.29463  -0.36877  -0.37822  -0.35408  -0.31083  -0.25025  -0.17539  -0.10616  -0.04662  -0.00000   0.04662   0.10616   0.17539   0.25025   0.31083   0.35408   0.37822   0.36877   0.29463   0.07751   0.00000
              180.00  -0.00000   0.09330   0.10773   0.08812   0.05946   0.04449   0.03052   0.01847   0.02775   0.03551   0.01871  -0.00000  -0.01871  -0.03551  -0.02775  -0.01847  -0.03052  -0.04449  -0.05946  -0.08812  -0.10773  -0.09330   0.00000
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            </tableData>
          </table>
          </product>
        </function>
        <function name="aero/coefficient/CY_aileron">
          <description>CY increment from aileron (deg), over alpha</description>
          <product>
            <property>aero/qbar-psf</property>
            <property>metrics/Sw-sqft</property>
            <property>aero/function/mach-aileron</property>
          <table>
            <independentVar lookup="row">aero/alpha-deg</independentVar>
            <independentVar lookup="column">fcs/left-aileron-pos-deg</independentVar>
            <tableData>
                        -15.00    -10.00     -5.00      0.00      5.00     10.00     15.00
             -180.00   0.00000   0.00000   0.00000   0.00000   0.00000   0.00000   0.00000
             -120.00   0.00064   0.00047   0.00025   0.00000  -0.00025  -0.00047  -0.00064
              -70.00  -0.00020  -0.00015  -0.00008   0.00000   0.00008   0.00015   0.00020
              -46.00   0.00038   0.00021   0.00009   0.00000  -0.00009  -0.00021  -0.00038
              -32.00   0.00208   0.00147   0.00076   0.00000  -0.00076  -0.00147  -0.00208
              -22.00  -0.01517  -0.01508  -0.01387   0.00000   0.01387   0.01508   0.01517
              -17.00  -0.00208  -0.00154  -0.00082   0.00000   0.00082   0.00154   0.00208
              -13.00  -0.00212  -0.00157  -0.00083   0.00000   0.00083   0.00157   0.00212
               -9.00  -0.00224  -0.00166  -0.00088   0.00000   0.00088   0.00166   0.00224
               -5.00  -0.00293  -0.00217  -0.00115   0.00000   0.00115   0.00217   0.00293
               -1.00  -0.00442  -0.00329  -0.00175   0.00000   0.00175   0.00329   0.00442
                3.00  -0.00619  -0.00462  -0.00246   0.00000   0.00246   0.00462   0.00619
                7.00  -0.00765  -0.00572  -0.00306   0.00000   0.00306   0.00572   0.00765
               11.00  -0.00828  -0.00619  -0.00331   0.00000   0.00331   0.00619   0.00828
               15.00  -0.00821  -0.00612  -0.00326   0.00000   0.00326   0.00612   0.00821
               19.00  -0.03642  -0.03422  -0.02877   0.00000   0.02877   0.03422   0.03642
               23.00  -0.01836  -0.01284  -0.00680   0.00000   0.00680   0.01284   0.01836
               27.00  -0.00930  -0.00701  -0.00382   0.00000   0.00382   0.00701   0.00930
               32.00  -0.00319  -0.00238  -0.00127   0.00000   0.00127   0.00238   0.00319
               46.00  -0.00075  -0.00058  -0.00031   0.00000   0.00031   0.00058   0.00075
               70.00  -0.00023  -0.00017  -0.00009   0.00000   0.00009   0.00017   0.00023
              120.00   0.00066   0.00049   0.00026   0.00000  -0.00026  -0.00049  -0.00066
              180.00   0.00000   0.00000   0.00000   0.00000   0.00000   0.00000   0.00000
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            </tableData>
          </table>
          </product>
        </function>
        <function name="aero/coefficient/CY_rudder">
          <description>CY increment from rudder (deg), over alpha</description>
          <product>
            <property>aero/qbar-psf</property>
            <property>metrics/Sw-sqft</property>
            <property>aero/function/mach-rudder</property>
          <table>
            <independentVar lookup="row">aero/alpha-deg</independentVar>
            <independentVar lookup="column">fcs/rudder-pos-deg</independentVar>
            <tableData>
                        -16.00    -15.00    -10.00     -5.00      0.00      5.00     10.00     15.00     16.00
             -180.00   0.00000   0.00000   0.00000   0.00000   0.00000   0.00000   0.00000   0.00000   0.00000
             -120.00   0.00000   0.00000   0.00000   0.00000   0.00000   0.00000   0.00000   0.00000   0.00000
              -70.00  -0.01014  -0.00974  -0.00722  -0.00384   0.00000   0.00384   0.00722   0.00974   0.01014
              -46.00  -0.02995  -0.02876  -0.02126  -0.01129   0.00000   0.01129   0.02126   0.02876   0.02995
              -32.00  -0.02307  -0.02211  -0.01623  -0.00859   0.00000   0.00859   0.01623   0.02211   0.02307
              -22.00  -0.01852  -0.01738  -0.01028  -0.02029   0.00000   0.02029   0.01028   0.01738   0.01852
              -17.00  -0.03095  -0.02971  -0.02195  -0.01165   0.00000   0.01165   0.02195   0.02971   0.03095
              -13.00  -0.03203  -0.03074  -0.02270  -0.01206   0.00000   0.01206   0.02270   0.03074   0.03203
               -9.00  -0.03275  -0.03143  -0.02322  -0.01233   0.00000   0.01233   0.02322   0.03143   0.03275
               -5.00  -0.03311  -0.03178  -0.02348  -0.01246   0.00000   0.01246   0.02348   0.03178   0.03311
               -1.00  -0.03313  -0.03180  -0.02349  -0.01247   0.00000   0.01247   0.02349   0.03180   0.03313
                3.00  -0.03279  -0.03147  -0.02325  -0.01234   0.00000   0.01234   0.02325   0.03147   0.03279
                7.00  -0.03212  -0.03084  -0.02278  -0.01210   0.00000   0.01210   0.02278   0.03084   0.03212
               11.00  -0.03113  -0.02988  -0.02208  -0.01173   0.00000   0.01173   0.02208   0.02988   0.03113
               15.00  -0.02982  -0.02862  -0.02116  -0.01124   0.00000   0.01124   0.02116   0.02862   0.02982
               19.00  -0.01100  -0.04449  -0.03750  -0.02790   0.00000   0.02790   0.03750   0.04449   0.01100
               23.00  -0.02649  -0.02543  -0.01881  -0.00999   0.00000   0.00999   0.01881   0.02543   0.02649
               27.00  -0.02389  -0.02294  -0.01696  -0.00901   0.00000   0.00901   0.01696   0.02294   0.02389
               32.00  -0.01862  -0.01783  -0.01303  -0.00689   0.00000   0.00689   0.01303   0.01783   0.01862
               46.00  -0.02842  -0.02729  -0.02019  -0.01068   0.00000   0.01068   0.02019   0.02729   0.02842
               70.00  -0.01014  -0.00974  -0.00722  -0.00384   0.00000   0.00384   0.00722   0.00974   0.01014
              120.00   0.00000   0.00000   0.00000   0.00000   0.00000   0.00000   0.00000   0.00000   0.00000
              180.00   0.00000   0.00000   0.00000   0.00000   0.00000   0.00000   0.00000   0.00000   0.00000
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            </tableData>
          </table>
          </product>
        </function>
        <function name="aero/coefficient/CYp">
          <description>CY per p (non-dimensional), over alpha</description>
          <product>
            <property>aero/qbar-psf</property>
            <property>metrics/Sw-sqft</property>
            <property>aero/bi2vel</property>
            <property>velocities/p-aero-rad_sec</property>
            <property>aero/function/mach-lift</property>
          <table>
            <independentVar lookup="row">aero/alpha-deg</independentVar>
            <tableData>
                 -180.00   -0.07753
                 -165.00   -0.01583
                 -105.00   -0.00612
                  -60.00    0.00368
                  -42.00   -0.03122
                  -30.00   -0.09454
                  -20.00    0.01200
                  -16.00    0.02390
                  -12.00    0.02209
                   -8.00    0.02044
                   -4.00    0.00976
                    0.00   -0.01425
                    4.00   -0.03908
                    8.00   -0.05591
                   12.00   -0.05731
                   16.00   -0.03661
                   20.00    0.71628
                   24.00    0.13938
                   28.00    0.06581
                   35.00    0.02920
                   50.00    0.00812
                   80.00   -0.00161
                  135.00   -0.01027
                  180.00   -0.07753
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            </tableData>
          </table>
          </product>
        </function>
        <function name="aero/coefficient/CYr">
          <description>CY per r (non-dimensional), over alpha</description>
          <product>
            <property>aero/qbar-psf</property>
            <property>metrics/Sw-sqft</property>
            <property>aero/bi2vel</property>
            <property>velocities/r-aero-rad_sec</property>
            <property>aero/function/mach-lift</property>
          <table>
            <independentVar lookup="row">aero/alpha-deg</independentVar>
            <tableData>
                 -180.00    0.44026
                 -165.00    0.43860
                 -105.00    0.14669
                  -60.00    0.25599
                  -42.00    0.20457
                  -30.00    0.18130
                  -20.00    0.15553
                  -16.00    0.15678
                  -12.00    0.16047
                   -8.00    0.16339
                   -4.00    0.16692
                    0.00    0.17078
                    4.00    0.17272
                    8.00    0.17648
                   12.00    0.17853
                   16.00    0.18260
                   20.00    0.47575
                   24.00    0.21478
                   28.00    0.15677
                   35.00    0.14656
                   50.00    0.25354
                   80.00    0.12256
                  135.00    0.32799
                  180.00    0.44026
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            </tableData>
          </table>
          </product>
        </function>
      </axis>
      <axis name="LIFT">
        <function name="aero/coefficient/CL_base">
          <description>CL over alpha and beta, ground effect, compressibility (hangar)</description>
          <product>
            <property>aero/qbar-psf</property>
            <property>metrics/Sw-sqft</property>
            <property>aero/function/CL-base</property>
            <property>aero/function/mach-lift</property>
          <table>
            <independentVar lookup="row">aero/h_b-mac-ft</independentVar>
            <tableData>
                    0.00    1.20000
                    0.10    1.08692
                    0.15    1.05730
                    0.20    1.03778
                    0.30    1.01642
                    0.40    1.00713
                    0.50    1.00310
                    0.60    1.00135
                    0.70    1.00059
                    0.80    1.00025
                    0.90    1.00011
                    1.00    1.00005
                    1.10    1.00000
            </tableData>
          </table>
          </product>
        </function>
        <function name="aero/coefficient/CL_elevator">
          <description>CL increment from elevator (deg), over alpha</description>
          <product>
            <property>aero/qbar-psf</property>
            <property>metrics/Sw-sqft</property>
            <property>aero/function/mach-elevator</property>
          <table>
            <independentVar lookup="row">aero/alpha-deg</independentVar>
            <independentVar lookup="column">fcs/elevator-pos-deg</independentVar>
            <tableData>
                        -28.00    -25.00    -20.00    -15.00    -10.00     -5.00      0.00      5.00     10.00     15.00     20.00     23.00
             -180.00   0.00000   0.00000   0.00000   0.00000   0.00000   0.00000   0.00000   0.00000   0.00000   0.00000   0.00000   0.00000
             -120.00  -0.04148  -0.03947  -0.03560  -0.03026  -0.02242  -0.01192   0.00000   0.01192   0.02242   0.03026   0.03560   0.03803
              -70.00  -0.00993  -0.00950  -0.00867  -0.00748  -0.00566  -0.00310   0.00000   0.00330   0.00636   0.00876   0.01045   0.01123
              -46.00  -0.03950  -0.03848  -0.03607  -0.03187  -0.02456  -0.01353   0.00000   0.01413   0.02659   0.03533   0.04039   0.04222
              -32.00  -0.05019  -0.05056  -0.04989  -0.04648  -0.03786  -0.02194   0.00000   0.02411   0.04553   0.06015   0.06803   0.07051
              -22.00  -0.02767  -0.02844  -0.02834  -0.02581  -0.01881  -0.00944   0.00000   0.02616   0.05218   0.07303   0.08804   0.09515
              -17.00  -0.12756  -0.12322  -0.11320  -0.09784  -0.07384  -0.03999   0.00000   0.04108   0.07796   0.10580   0.12487   0.13356
              -13.00  -0.13932  -0.13383  -0.12248  -0.10548  -0.07914  -0.04256   0.00000   0.04336   0.08205   0.11113   0.13095   0.13994
               -9.00  -0.14823  -0.14192  -0.12927  -0.11090  -0.08292  -0.04446   0.00000   0.04505   0.08507   0.11500   0.13531   0.14448
               -5.00  -0.15451  -0.14772  -0.13425  -0.11492  -0.08573  -0.04585   0.00000   0.04624   0.08713   0.11759   0.13815   0.14739
               -1.00  -0.15894  -0.15180  -0.13772  -0.11768  -0.08761  -0.04675   0.00000   0.04694   0.08826   0.11890   0.13948   0.14868
                3.00  -0.16151  -0.15411  -0.13960  -0.11909  -0.08850  -0.04713   0.00000   0.04710   0.08840   0.11889   0.13927   0.14833
                7.00  -0.16234  -0.15478  -0.14001  -0.11927  -0.08848  -0.04703   0.00000   0.04681   0.08767   0.11769   0.13763   0.14645
               11.00  -0.16132  -0.15369  -0.13885  -0.11811  -0.08748  -0.04640   0.00000   0.04598   0.08593   0.11514   0.13442   0.14290
               15.00  -0.15807  -0.15047  -0.13572  -0.11522  -0.08531  -0.04520   0.00000   0.04457   0.08310   0.11113   0.12953   0.13757
               19.00  -0.08917  -0.07718  -0.08900  -0.08880  -0.06556  -0.03426   0.00000   0.03312   0.06179   0.08346   0.09900   0.10655
               23.00  -0.17177  -0.16134  -0.14239  -0.11807  -0.08500  -0.04386   0.00000   0.04177   0.07735   0.10338   0.12177   0.13080
               27.00  -0.17050  -0.16270  -0.14866  -0.17422  -0.08731  -0.04418   0.00000   0.03957   0.07053   0.09276   0.10875   0.11666
               32.00  -0.13777  -0.13510  -0.12794  -0.11409  -0.08879  -0.04996   0.00000   0.05302   0.09935   0.13511   0.15865   0.16843
               46.00  -0.07839  -0.07607  -0.07064  -0.06146  -0.04621  -0.02466   0.00000   0.02418   0.04467   0.05917   0.06845   0.07243
               70.00  -0.02663  -0.02522  -0.02255  -0.01894  -0.01379  -0.00716   0.00000   0.00679   0.01247   0.01653   0.01921   0.02040
              120.00  -0.02882  -0.02743  -0.02474  -0.02102  -0.01558  -0.00829   0.00000   0.00829   0.01558   0.02102   0.02474   0.02643
              180.00   0.00000   0.00000   0.00000   0.00000   0.00000   0.00000   0.00000   0.00000   0.00000   0.00000   0.00000   0.00000
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            </tableData>
          </table>
          </product>
        </function>
        <function name="aero/coefficient/CL_flap">
          <description>CL increment from flap (deg), over alpha</description>
          <product>
            <property>aero/qbar-psf</property>
            <property>metrics/Sw-sqft</property>
            <property>aero/function/mach-flap</property>
          <table>
            <independentVar lookup="row">aero/alpha-deg</independentVar>
            <independentVar lookup="column">fcs/flap-pos-deg</independentVar>
            <tableData>
                          0.00      5.00     10.00     15.00     20.00     25.00     30.00
             -180.00   0.00000   0.00000   0.00000   0.00000   0.00000   0.00000   0.00000
             -120.00   0.00000   0.01648   0.03293   0.04845   0.06245   0.07484   0.08601
              -70.00   0.00000   0.00938   0.01923   0.02900   0.03821   0.04672   0.05468
              -46.00   0.00000   0.02700   0.05481   0.08153   0.10495   0.12471   0.14144
              -32.00   0.00000   0.04167   0.08326   0.12228   0.15509   0.18104   0.20123
              -22.00   0.00000  -0.08515  -0.03264   0.04483   0.12714   0.21154   0.29846
              -17.00   0.00000   0.09333   0.18733   0.27657   0.35716   0.42864   0.49324
              -13.00   0.00000   0.09525   0.19081   0.28120   0.36256   0.43437   0.49883
               -9.00   0.00000   0.09625   0.19260   0.28353   0.36519   0.43709   0.50148
               -5.00   0.00000   0.09670   0.19328   0.28423   0.36571   0.43730   0.50127
               -1.00   0.00000   0.09641   0.19248   0.28272   0.36336   0.43401   0.49697
                3.00   0.00000   0.09568   0.19080   0.27992   0.35932   0.42869   0.49034
                7.00   0.00000   0.09411   0.18748   0.27476   0.35231   0.41983   0.47962
               11.00   0.00000   0.09160   0.18218   0.26637   0.34004   0.40171   0.45325
               15.00   0.00000   0.08612   0.16517   0.23057   0.28083   0.31890   0.34905
               19.00   0.00000   0.11824   0.22576   0.30623   0.36265   0.40260   0.43205
               23.00   0.00000   0.07746   0.15558   0.22994   0.29797   0.36074   0.42248
               27.00   0.00000   0.06334   0.12669   0.18580   0.23805   0.28326   0.32281
               32.00   0.00000   0.05236   0.10571   0.15610   0.20086   0.23948   0.27295
               46.00   0.00000   0.02973   0.05928   0.08671   0.11078   0.13143   0.14940
               70.00   0.00000   0.00797   0.01556   0.02240   0.02830   0.03332   0.03768
              120.00   0.00000   0.01976   0.03948   0.05810   0.07487   0.08974   0.10313
              180.00   0.00000   0.00000   0.00000   0.00000   0.00000   0.00000   0.00000
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            </tableData>
          </table>
          <table>
            <independentVar lookup="row">aero/h_b-mac-ft</independentVar>
            <tableData>
                    0.00    1.20000
                    0.10    1.08692
                    0.15    1.05730
                    0.20    1.03778
                    0.30    1.01642
                    0.40    1.00713
                    0.50    1.00310
                    0.60    1.00135
                    0.70    1.00059
                    0.80    1.00025
                    0.90    1.00011
                    1.00    1.00005
                    1.10    1.00000
            </tableData>
          </table>
          </product>
        </function>
        <function name="aero/coefficient/CLq">
          <description>CL per q (non-dimensional), over alpha</description>
          <product>
            <property>aero/qbar-psf</property>
            <property>metrics/Sw-sqft</property>
            <property>aero/ci2vel</property>
            <property>velocities/q-aero-rad_sec</property>
            <property>aero/function/mach-lift</property>
          <table>
            <independentVar lookup="row">aero/alpha-deg</independentVar>
            <tableData>
                 -180.00   -3.22574
                 -165.00   -1.70977
                 -105.00   -1.10969
                  -60.00    1.38052
                  -42.00    1.84005
                  -30.00    0.64906
                  -20.00    4.68663
                  -16.00    7.85430
                  -12.00    8.81763
                   -8.00    9.81278
                   -4.00    9.91928
                    0.00    9.99049
                    4.00   10.06764
                    8.00   10.18479
                   12.00   10.33315
                   16.00    9.04939
                   20.00   -1.18534
                   24.00    2.59002
                   28.00    2.40845
                   35.00    1.52148
                   50.00    2.23725
                   80.00    0.85538
                  135.00   -1.96078
                  180.00   -3.22574
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            </tableData>
          </table>
          </product>
        </function>
        <function name="aero/coefficient/CLadot">
          <description>CL per alpha-dot (downwash lag at the tail)</description>
          <product>
            <property>aero/qbar-psf</property>
            <property>metrics/Sw-sqft</property>
            <property>aero/ci2vel</property>
            <property>aero/alphadot-rad_sec</property>
            <value>1.09942</value>
            <property>aero/function/mach-lift</property>
          </product>
        </function>
      </axis>
      <axis name="ROLL">
        <function name="aero/coefficient/Cl_base">
          <description>Cl over alpha and beta (hangar)</description>
          <product>
            <property>aero/qbar-psf</property>
            <property>metrics/Sw-sqft</property>
            <property>metrics/bw-ft</property>
            <property>aero/function/mach-side</property>
          <table>
            <independentVar lookup="row">aero/alpha-deg</independentVar>
            <independentVar lookup="column">aero/beta-deg</independentVar>
            <tableData>
                        -90.00    -70.00    -50.00    -40.00    -30.00    -25.00    -20.00    -15.00    -10.00     -6.00     -3.00      0.00      3.00      6.00     10.00     15.00     20.00     25.00     30.00     40.00     50.00     70.00     90.00
             -180.00  -0.01691  -0.00215   0.01055   0.01356   0.01387   0.01300   0.01147   0.00933   0.00661   0.00408   0.00209  -0.00000  -0.00209  -0.00408  -0.00661  -0.00933  -0.01147  -0.01300  -0.01387  -0.01356  -0.01055   0.00215   0.01691
             -120.00  -0.01691  -0.00968  -0.00274  -0.00039   0.00096   0.00126   0.00133   0.00119   0.00089   0.00056   0.00027  -0.00000  -0.00027  -0.00056  -0.00089  -0.00119  -0.00133  -0.00126  -0.00096   0.00039   0.00274   0.00968   0.01691
              -70.00  -0.01691  -0.01147  -0.00563  -0.00335  -0.00170  -0.00112  -0.00069  -0.00039  -0.00021  -0.00012  -0.00007  -0.00000   0.00007   0.00012   0.00021   0.00039   0.00069   0.00112   0.00170   0.00335   0.00563   0.01147   0.01691
              -46.00  -0.01691  -0.01341  -0.00818  -0.00536  -0.00122   0.00042   0.00142   0.00168   0.00156   0.00106   0.00055  -0.00000  -0.00055  -0.00106  -0.00156  -0.00168  -0.00142  -0.00042   0.00122   0.00536   0.00818   0.01341   0.01691
              -32.00  -0.01691  -0.01520  -0.00963  -0.00016   0.00761   0.00925   0.00936   0.00803   0.00577   0.00357   0.00181  -0.00000  -0.00181  -0.00357  -0.00577  -0.00803  -0.00936  -0.00925  -0.00761   0.00016   0.00963   0.01520   0.01691
              -22.00  -0.01691  -0.01997  -0.01403  -0.00847  -0.00674  -0.00765  -0.01005  -0.01242  -0.01396  -0.01444   0.01190  -0.00000  -0.01190   0.01444   0.01396   0.01242   0.01005   0.00765   0.00674   0.00847   0.01403   0.01997   0.01691
              -17.00  -0.01691  -0.01602  -0.00151   0.01975   0.02358   0.02145   0.01786   0.01388   0.00951   0.00580   0.00292  -0.00000  -0.00292  -0.00580  -0.00951  -0.01388  -0.01786  -0.02145  -0.02358  -0.01975   0.00151   0.01602   0.01691
              -13.00  -0.01691  -0.00741   0.01140   0.02156   0.02510   0.02225   0.01857   0.01445   0.00992   0.00606   0.00306  -0.00000  -0.00306  -0.00606  -0.00992  -0.01445  -0.01857  -0.02225  -0.02510  -0.02156  -0.01140   0.00741   0.01691
               -9.00  -0.01691  -0.00370   0.01119   0.02298   0.02605   0.02285   0.01910   0.01489   0.01025   0.00628   0.00317  -0.00000  -0.00317  -0.00628  -0.01025  -0.01489  -0.01910  -0.02285  -0.02605  -0.02298  -0.01119   0.00370   0.01691
               -5.00  -0.01691  -0.00361   0.01171   0.02396   0.02664   0.02332   0.01951   0.01523   0.01051   0.00645   0.00327  -0.00000  -0.00327  -0.00645  -0.01051  -0.01523  -0.01951  -0.02332  -0.02664  -0.02396  -0.01171   0.00361   0.01691
               -1.00  -0.01691  -0.00359   0.01450   0.02568   0.02702   0.02366   0.01981   0.01547   0.01069   0.00658   0.00334  -0.00000  -0.00334  -0.00658  -0.01069  -0.01547  -0.01981  -0.02366  -0.02702  -0.02568  -0.01450   0.00359   0.01691
                3.00  -0.01691  -0.00353   0.01361   0.02585   0.02724   0.02387   0.01998   0.01560   0.01078   0.00663   0.00336  -0.00000  -0.00336  -0.00663  -0.01078  -0.01560  -0.01998  -0.02387  -0.02724  -0.02585  -0.01361   0.00353   0.01691
                7.00  -0.01691  -0.00358   0.01310   0.02522   0.02726   0.02394   0.02003   0.01562   0.01078   0.00661   0.00335  -0.00000  -0.00335  -0.00661  -0.01078  -0.01562  -0.02003  -0.02394  -0.02726  -0.02522  -0.01310   0.00358   0.01691
               11.00  -0.01691  -0.00945   0.01259   0.02426   0.02695   0.02383   0.01993   0.01553   0.01069   0.00654   0.00331  -0.00000  -0.00331  -0.00654  -0.01069  -0.01553  -0.01993  -0.02383  -0.02695  -0.02426  -0.01259   0.00945   0.01691
               15.00  -0.01691  -0.01929  -0.01053   0.02043   0.02604   0.02348   0.01962   0.01527   0.01049   0.00641   0.00323  -0.00000  -0.00323  -0.00641  -0.01049  -0.01527  -0.01962  -0.02348  -0.02604  -0.02043   0.01053   0.01929   0.01691
               19.00  -0.01691  -0.02260  -0.01776  -0.01112  -0.00648  -0.00676  -0.00930  -0.01148  -0.01302  -0.01370  -0.01380  -0.00000   0.01380   0.01370   0.01302   0.01148   0.00930   0.00676   0.00648   0.01112   0.01776   0.02260   0.01691
               23.00  -0.01691  -0.01788  -0.00983   0.00343   0.01027   0.01124   0.00993   0.00768   0.00524   0.00319   0.00161  -0.00000  -0.00161  -0.00319  -0.00524  -0.00768  -0.00993  -0.01124  -0.01027  -0.00343   0.00983   0.01788   0.01691
               27.00  -0.01691  -0.01630  -0.00954   0.00268   0.01244   0.01344   0.01156   0.00892   0.00608   0.00369   0.00186  -0.00000  -0.00186  -0.00369  -0.00608  -0.00892  -0.01156  -0.01344  -0.01244  -0.00268   0.00954   0.01630   0.01691
               32.00  -0.01691  -0.01523  -0.00964   0.00008   0.00818   0.01036   0.01058   0.00920   0.00673   0.00406   0.00205  -0.00000  -0.00205  -0.00406  -0.00673  -0.00920  -0.01058  -0.01036  -0.00818  -0.00008   0.00964   0.01523   0.01691
               46.00  -0.01691  -0.01341  -0.00818  -0.00535  -0.00115   0.00051   0.00150   0.00191   0.00171   0.00116   0.00060  -0.00000  -0.00060  -0.00116  -0.00171  -0.00191  -0.00150  -0.00051   0.00115   0.00535   0.00818   0.01341   0.01691
               70.00  -0.01691  -0.01146  -0.00562  -0.00334  -0.00169  -0.00111  -0.00068  -0.00039  -0.00020  -0.00012  -0.00006  -0.00000   0.00006   0.00012   0.00020   0.00039   0.00068   0.00111   0.00169   0.00334   0.00562   0.01146   0.01691
              120.00  -0.01691  -0.00969  -0.00276  -0.00041   0.00095   0.00124   0.00131   0.00118   0.00088   0.00055   0.00026  -0.00000  -0.00026  -0.00055  -0.00088  -0.00118  -0.00131  -0.00124  -0.00095   0.00041   0.00276   0.00969   0.01691
              180.00  -0.01691  -0.00215   0.01055   0.01356   0.01387   0.01300   0.01147   0.00933   0.00661   0.00408   0.00209  -0.00000  -0.00209  -0.00408  -0.00661  -0.00933  -0.01147  -0.01300  -0.01387  -0.01356  -0.01055   0.00215   0.01691
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            </tableData>
          </table>
          </product>
        </function>
        <function name="aero/coefficient/Cl_aileron">
          <description>Cl increment from aileron (deg), over alpha</description>
          <product>
            <property>aero/qbar-psf</property>
            <property>metrics/Sw-sqft</property>
            <property>metrics/bw-ft</property>
            <property>aero/function/mach-aileron</property>
          <table>
            <independentVar lookup="row">aero/alpha-deg</independentVar>
            <independentVar lookup="column">fcs/left-aileron-pos-deg</independentVar>
            <tableData>
                        -15.00    -10.00     -5.00      0.00      5.00     10.00     15.00
             -180.00  -0.00000  -0.00000  -0.00000   0.00000  -0.00000  -0.00000  -0.00000
              -35.00  -0.01593  -0.01260  -0.00695   0.00000   0.00695   0.01260   0.01593
              -11.00  -0.06423  -0.04776  -0.02544   0.00000   0.02544   0.04776   0.06423
                4.00  -0.06492  -0.04830  -0.02574   0.00000   0.02574   0.04830   0.06492
               19.00  -0.10340  -0.08343  -0.05330   0.00000   0.05330   0.08343   0.10340
               42.00  -0.01345  -0.01067  -0.00589   0.00000   0.00589   0.01067   0.01345
              180.00  -0.00000  -0.00000  -0.00000   0.00000  -0.00000  -0.00000  -0.00000
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            </tableData>
          </table>
          </product>
        </function>
        <function name="aero/coefficient/Cl_rudder">
          <description>Cl increment from rudder (deg), over alpha</description>
          <product>
            <property>aero/qbar-psf</property>
            <property>metrics/Sw-sqft</property>
            <property>metrics/bw-ft</property>
            <property>aero/function/mach-rudder</property>
          <table>
            <independentVar lookup="row">aero/alpha-deg</independentVar>
            <independentVar lookup="column">fcs/rudder-pos-deg</independentVar>
            <tableData>
                        -16.00    -15.00    -10.00     -5.00      0.00      5.00     10.00     15.00     16.00
             -180.00  -0.00000  -0.00000  -0.00000  -0.00000   0.00000  -0.00000  -0.00000  -0.00000  -0.00000
              -35.00   0.00005   0.00004   0.00003   0.00002   0.00000  -0.00002  -0.00003  -0.00004  -0.00005
              -11.00   0.00018   0.00018   0.00014   0.00008   0.00000  -0.00008  -0.00014  -0.00018  -0.00018
                4.00   0.00014   0.00014   0.00011   0.00006   0.00000  -0.00006  -0.00011  -0.00014  -0.00014
               19.00   0.01348  -0.01328  -0.01330  -0.01335   0.00000   0.01335   0.01330   0.01328  -0.01348
               42.00  -0.00005  -0.00004  -0.00003  -0.00002   0.00000   0.00002   0.00003   0.00004   0.00005
              180.00  -0.00000  -0.00000  -0.00000  -0.00000   0.00000  -0.00000  -0.00000  -0.00000  -0.00000
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            </tableData>
          </table>
          </product>
        </function>
        <function name="aero/coefficient/Clp">
          <description>Cl per p (non-dimensional), over alpha</description>
          <product>
            <property>aero/qbar-psf</property>
            <property>metrics/Sw-sqft</property>
            <property>metrics/bw-ft</property>
            <property>aero/bi2vel</property>
            <property>velocities/p-aero-rad_sec</property>
            <property>aero/function/mach-lift</property>
          <table>
            <independentVar lookup="row">aero/alpha-deg</independentVar>
            <tableData>
                 -180.00   -0.73694
                 -165.00   -0.14489
                  -32.00   -0.16756
                  -10.00   -0.48524
                    5.00   -0.48951
                   20.00    0.72058
                   46.00   -0.25581
                  180.00   -0.73694
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            </tableData>
          </table>
          </product>
        </function>
        <function name="aero/coefficient/Clr">
          <description>Cl per r (non-dimensional), over alpha</description>
          <product>
            <property>aero/qbar-psf</property>
            <property>metrics/Sw-sqft</property>
            <property>metrics/bw-ft</property>
            <property>aero/bi2vel</property>
            <property>velocities/r-aero-rad_sec</property>
            <property>aero/function/mach-lift</property>
          <table>
            <independentVar lookup="row">aero/alpha-deg</independentVar>
            <tableData>
                 -180.00   -0.00547
                 -165.00    0.05306
                  -32.00   -0.23067
                  -10.00   -0.05886
                    5.00    0.10326
                   20.00    0.81268
                   46.00    0.17862
                  180.00   -0.00547
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            </tableData>
          </table>
          </product>
        </function>
      </axis>
      <axis name="PITCH">
        <function name="aero/coefficient/Cm_base">
          <description>Cm over alpha and beta (hangar)</description>
          <product>
            <property>aero/qbar-psf</property>
            <property>metrics/Sw-sqft</property>
            <property>metrics/cbarw-ft</property>
          <table>
            <independentVar lookup="row">aero/alpha-deg</independentVar>
            <independentVar lookup="column">aero/beta-deg</independentVar>
            <tableData>
                        -90.00    -70.00    -50.00    -40.00    -30.00    -25.00    -20.00    -15.00    -10.00     -6.00     -3.00      0.00      3.00      6.00     10.00     15.00     20.00     25.00     30.00     40.00     50.00     70.00     90.00
             -180.00  -0.00000  -0.01869  -0.06299  -0.08927  -0.11399  -0.12481  -0.13416  -0.14173  -0.14740  -0.15031  -0.15149  -0.15189  -0.15149  -0.15031  -0.14740  -0.14173  -0.13416  -0.12481  -0.11399  -0.08927  -0.06299  -0.01869  -0.00000
              -35.00  -0.00000   0.10051   0.29757   0.39445   0.47244   0.50648   0.53347   0.55344   0.56798   0.57553   0.57873   0.57980   0.57873   0.57553   0.56798   0.55344   0.53347   0.50648   0.47244   0.39445   0.29757   0.10051  -0.00000
              -11.00  -0.00000   0.09628   0.30428   0.29130   0.29311   0.31576   0.33634   0.35254   0.36402   0.36969   0.37196   0.37268   0.37196   0.36969   0.36402   0.35254   0.33634   0.31576   0.29311   0.29130   0.30428   0.09628  -0.00000
                4.00  -0.00000  -0.01579  -0.02233   0.01268   0.02638   0.02812   0.02930   0.03021   0.03082   0.03111   0.03123   0.03131   0.03123   0.03111   0.03082   0.03021   0.02930   0.02812   0.02638   0.01268  -0.02233  -0.01579  -0.00000
               19.00  -0.00000  -0.09882  -0.34825  -0.37123  -0.34251  -0.34935  -0.37148  -0.38962  -0.40226  -0.40835  -0.41064  -0.41099  -0.41064  -0.40835  -0.40226  -0.38962  -0.37148  -0.34935  -0.34251  -0.37123  -0.34825  -0.09882  -0.00000
               42.00  -0.00000  -0.10823  -0.31664  -0.42720  -0.51830  -0.55521  -0.58721  -0.61132  -0.62762  -0.63596  -0.63946  -0.64064  -0.63946  -0.63596  -0.62762  -0.61132  -0.58721  -0.55521  -0.51830  -0.42720  -0.31664  -0.10823  -0.00000
              180.00  -0.00000  -0.01869  -0.06299  -0.08927  -0.11399  -0.12481  -0.13416  -0.14173  -0.14740  -0.15031  -0.15149  -0.15189  -0.15149  -0.15031  -0.14740  -0.14173  -0.13416  -0.12481  -0.11399  -0.08927  -0.06299  -0.01869  -0.00000
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            </tableData>
          </table>
          </product>
        </function>
        <function name="aero/coefficient/Cm_mach">
          <description>Cm from the neutral point's move with Mach</description>
          <product>
            <property>aero/qbar-psf</property>
            <property>metrics/Sw-sqft</property>
            <property>metrics/cbarw-ft</property>
            <property>aero/function/CL-base</property>
            <property>aero/function/mach-dCm-dCL</property>
          </product>
        </function>
        <function name="aero/coefficient/Cm_elevator">
          <description>Cm increment from elevator (deg), over alpha</description>
          <product>
            <property>aero/qbar-psf</property>
            <property>metrics/Sw-sqft</property>
            <property>metrics/cbarw-ft</property>
            <property>aero/function/mach-elevator</property>
          <table>
            <independentVar lookup="row">aero/alpha-deg</independentVar>
            <independentVar lookup="column">fcs/elevator-pos-deg</independentVar>
            <tableData>
                        -28.00    -25.00    -20.00    -15.00    -10.00     -5.00      0.00      5.00     10.00     15.00     20.00     23.00
             -180.00   0.00528   0.00428   0.00280   0.00160   0.00072   0.00018   0.00000   0.00018   0.00072   0.00160   0.00280   0.00366
              -35.00   0.16717   0.16353   0.15405   0.13702   0.10637   0.05858   0.00000  -0.05774  -0.10238  -0.12546  -0.12905  -0.12469
              -11.00   0.45720   0.43740   0.39785   0.34085   0.25455   0.13635   0.00000  -0.13802  -0.26060  -0.35238  -0.41476  -0.44297
                4.00   0.47999   0.45929   0.41791   0.35817   0.26757   0.14339   0.00000  -0.14536  -0.27473  -0.37199  -0.43859  -0.46897
               19.00   0.38571   0.35121   0.37986   0.36673   0.27455   0.14598   0.00000  -0.14626  -0.27667  -0.37721  -0.45026  -0.48600
               42.00   0.08042   0.09237   0.10636   0.10874   0.09288   0.05503   0.00000  -0.06335  -0.12428  -0.17317  -0.20969  -0.22787
              180.00   0.00528   0.00428   0.00280   0.00160   0.00072   0.00018   0.00000   0.00018   0.00072   0.00160   0.00280   0.00366
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            </tableData>
          </table>
          </product>
        </function>
        <function name="aero/coefficient/Cm_flap">
          <description>Cm increment from flap (deg), over alpha</description>
          <product>
            <property>aero/qbar-psf</property>
            <property>metrics/Sw-sqft</property>
            <property>metrics/cbarw-ft</property>
            <property>aero/function/mach-flap</property>
          <table>
            <independentVar lookup="row">aero/alpha-deg</independentVar>
            <independentVar lookup="column">fcs/flap-pos-deg</independentVar>
            <tableData>
                          0.00      5.00     10.00     15.00     20.00     25.00     30.00
             -180.00   0.00000   0.00001   0.00005   0.00011   0.00020   0.00030   0.00042
              -35.00   0.00000  -0.00670  -0.01327  -0.01897  -0.02334  -0.02632  -0.02811
              -11.00   0.00000   0.00630   0.01237   0.01772   0.02202   0.02528   0.02770
                4.00   0.00000   0.00519   0.01035   0.01508   0.01912   0.02243   0.02516
               19.00   0.00000   0.01010   0.01566   0.01517   0.01071   0.00436  -0.00290
               42.00   0.00000  -0.00353  -0.00741  -0.01128  -0.01481  -0.01789  -0.02063
              180.00   0.00000   0.00001   0.00005   0.00011   0.00020   0.00030   0.00042
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            </tableData>
          </table>
          </product>
        </function>
        <function name="aero/coefficient/Cmq">
          <description>Cm per q (non-dimensional), over alpha</description>
          <product>
            <property>aero/qbar-psf</property>
            <property>metrics/Sw-sqft</property>
            <property>metrics/cbarw-ft</property>
            <property>aero/ci2vel</property>
            <property>velocities/q-aero-rad_sec</property>
            <property>aero/function/mach-lift</property>
          <table>
            <independentVar lookup="row">aero/alpha-deg</independentVar>
            <tableData>
                 -180.00  -10.60956
                 -165.00   -5.68702
                  -32.00   -1.14546
                  -10.00  -14.58176
                    5.00  -15.72372
                   20.00  -15.45277
                   46.00   -8.39228
                  180.00  -10.60956
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            </tableData>
          </table>
          </product>
        </function>
        <function name="aero/coefficient/Cmadot">
          <description>Cm per alpha-dot (downwash lag at the tail)</description>
          <product>
            <property>aero/qbar-psf</property>
            <property>metrics/Sw-sqft</property>
            <property>metrics/cbarw-ft</property>
            <property>aero/ci2vel</property>
            <property>aero/alphadot-rad_sec</property>
            <value>-3.46393</value>
            <property>aero/function/mach-lift</property>
          </product>
        </function>
      </axis>
      <axis name="YAW">
        <function name="aero/coefficient/Cn_base">
          <description>Cn over alpha and beta (hangar)</description>
          <product>
            <property>aero/qbar-psf</property>
            <property>metrics/Sw-sqft</property>
            <property>metrics/bw-ft</property>
            <property>aero/function/mach-side</property>
          <table>
            <independentVar lookup="row">aero/alpha-deg</independentVar>
            <independentVar lookup="column">aero/beta-deg</independentVar>
            <tableData>
                        -90.00    -70.00    -50.00    -40.00    -30.00    -25.00    -20.00    -15.00    -10.00     -6.00     -3.00      0.00      3.00      6.00     10.00     15.00     20.00     25.00     30.00     40.00     50.00     70.00     90.00
             -180.00  -0.07116  -0.08202  -0.07619  -0.06652  -0.05295  -0.04499  -0.03645  -0.02749  -0.02768  -0.02714  -0.01439  -0.00000   0.01439   0.02714   0.02768   0.02749   0.03645   0.04499   0.05295   0.06652   0.07619   0.08202   0.07116
              -35.00  -0.07116  -0.05202  -0.02987  -0.01850  -0.01318  -0.01860  -0.01826  -0.01243  -0.00775  -0.00450  -0.00222  -0.00000   0.00222   0.00450   0.00775   0.01243   0.01826   0.01860   0.01318   0.01850   0.02987   0.05202   0.07116
              -11.00  -0.07116  -0.05409  -0.02858  -0.01743  -0.02431  -0.02027  -0.01620  -0.01204  -0.00789  -0.00466  -0.00231  -0.00000   0.00231   0.00466   0.00789   0.01204   0.01620   0.02027   0.02431   0.01743   0.02858   0.05409   0.07116
                4.00  -0.07116  -0.04739  -0.02112  -0.01364  -0.02201  -0.01848  -0.01464  -0.01075  -0.00694  -0.00402  -0.00194  -0.00000   0.00194   0.00402   0.00694   0.01075   0.01464   0.01848   0.02201   0.01364   0.02112   0.04739   0.07116
               19.00  -0.07116  -0.05167  -0.02820  -0.01958  -0.02394  -0.01814  -0.01468  -0.01121  -0.00765  -0.00463  -0.00175  -0.00000   0.00175   0.00463   0.00765   0.01121   0.01468   0.01814   0.02394   0.01958   0.02820   0.05167   0.07116
               42.00  -0.07116  -0.05300  -0.03102  -0.02080  -0.01364  -0.01285  -0.01901  -0.01453  -0.00892  -0.00520  -0.00270  -0.00000   0.00270   0.00520   0.00892   0.01453   0.01901   0.01285   0.01364   0.02080   0.03102   0.05300   0.07116
              180.00  -0.07116  -0.08202  -0.07619  -0.06652  -0.05295  -0.04499  -0.03645  -0.02749  -0.02768  -0.02714  -0.01439  -0.00000   0.01439   0.02714   0.02768   0.02749   0.03645   0.04499   0.05295   0.06652   0.07619   0.08202   0.07116
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            </tableData>
          </table>
          </product>
        </function>
        <function name="aero/coefficient/Cn_aileron">
          <description>Cn increment from aileron (deg), over alpha</description>
          <product>
            <property>aero/qbar-psf</property>
            <property>metrics/Sw-sqft</property>
            <property>metrics/bw-ft</property>
            <property>aero/function/mach-aileron</property>
          <table>
            <independentVar lookup="row">aero/alpha-deg</independentVar>
            <independentVar lookup="column">fcs/left-aileron-pos-deg</independentVar>
            <tableData>
                        -15.00    -10.00     -5.00      0.00      5.00     10.00     15.00
             -180.00  -0.00000  -0.00000  -0.00000   0.00000  -0.00000  -0.00000  -0.00000
              -35.00   0.02091   0.01559   0.00834   0.00000  -0.00834  -0.01559  -0.02091
              -11.00   0.00190   0.00141   0.00075   0.00000  -0.00075  -0.00141  -0.00190
                4.00   0.00189   0.00139   0.00073   0.00000  -0.00073  -0.00139  -0.00189
               19.00  -0.00782  -0.00383   0.00068   0.00000  -0.00068   0.00383   0.00782
               42.00  -0.02616  -0.01944  -0.01036   0.00000   0.01036   0.01944   0.02616
              180.00  -0.00000  -0.00000  -0.00000   0.00000  -0.00000  -0.00000  -0.00000
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            </tableData>
          </table>
          </product>
        </function>
        <function name="aero/coefficient/Cn_rudder">
          <description>Cn increment from rudder (deg), over alpha</description>
          <product>
            <property>aero/qbar-psf</property>
            <property>metrics/Sw-sqft</property>
            <property>metrics/bw-ft</property>
            <property>aero/function/mach-rudder</property>
          <table>
            <independentVar lookup="row">aero/alpha-deg</independentVar>
            <independentVar lookup="column">fcs/rudder-pos-deg</independentVar>
            <tableData>
                        -16.00    -15.00    -10.00     -5.00      0.00      5.00     10.00     15.00     16.00
             -180.00  -0.00000  -0.00000  -0.00000  -0.00000   0.00000  -0.00000  -0.00000  -0.00000  -0.00000
              -35.00   0.01187   0.01138   0.00837   0.00444   0.00000  -0.00444  -0.00837  -0.01138  -0.01187
              -11.00   0.01617   0.01552   0.01146   0.00609   0.00000  -0.00609  -0.01146  -0.01552  -0.01617
                4.00   0.01645   0.01579   0.01167   0.00619   0.00000  -0.00619  -0.01167  -0.01579  -0.01645
               19.00   0.01037   0.01804   0.01445   0.00955   0.00000  -0.00955  -0.01445  -0.01804  -0.01037
               42.00   0.01301   0.01248   0.00922   0.00488   0.00000  -0.00488  -0.00922  -0.01248  -0.01301
              180.00  -0.00000  -0.00000  -0.00000  -0.00000   0.00000  -0.00000  -0.00000  -0.00000  -0.00000
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            </tableData>
          </table>
          </product>
        </function>
        <function name="aero/coefficient/Cnp">
          <description>Cn per p (non-dimensional), over alpha</description>
          <product>
            <property>aero/qbar-psf</property>
            <property>metrics/Sw-sqft</property>
            <property>metrics/bw-ft</property>
            <property>aero/bi2vel</property>
            <property>velocities/p-aero-rad_sec</property>
            <property>aero/function/mach-lift</property>
          <table>
            <independentVar lookup="row">aero/alpha-deg</independentVar>
            <tableData>
                 -180.00   -0.00352
                 -165.00    0.01333
                  -32.00    0.04272
                  -10.00    0.07738
                    5.00   -0.05629
                   20.00   -0.09704
                   46.00    0.00010
                  180.00   -0.00352
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            </tableData>
          </table>
          </product>
        </function>
        <function name="aero/coefficient/Cnr">
          <description>Cn per r (non-dimensional), over alpha</description>
          <product>
            <property>aero/qbar-psf</property>
            <property>metrics/Sw-sqft</property>
            <property>metrics/bw-ft</property>
            <property>aero/bi2vel</property>
            <property>velocities/r-aero-rad_sec</property>
            <property>aero/function/mach-lift</property>
          <table>
            <independentVar lookup="row">aero/alpha-deg</independentVar>
            <tableData>
                 -180.00   -0.21215
                 -165.00   -0.20316
                  -32.00   -0.03736
                  -10.00   -0.09756
                    5.00   -0.09420
                   20.00    0.00282
                   46.00   -0.04694
                  180.00   -0.21215
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            </tableData>
          </table>
          </product>
        </function>
      </axis>
    </aerodynamics>
</fdm_config>
