<?xml version="1.0"?>
<?xml-stylesheet type="text/xsl" href="http://jsbsim.sourceforge.net/JSBSim.xsl"?>
<!-- Generated by hangar 0.1.0 from c17a.toml on 2026-10-01. Edit the design and rebuild; changes
     made here are overwritten.  -->
<fdm_config name="c17a" version="2.0" release="ALPHA"
            xmlns:xsi="http://www.w3.org/2001/XMLSchema-instance"
            xsi:noNamespaceSchemaLocation="http://jsbsim.sourceforge.net/JSBSim.xsd">
    <fileheader>
      <author>hangar</author>
      <filecreationdate>2026-10-01</filecreationdate>
      <version>0.1.0</version>
      <description>Boeing C-17A Globemaster III (hangar build)</description>
      <note>Aerodynamics: vortex lattice with viscous section polars, full-envelope
        strip model, slender-body fuselage (hangar). Mass: Raymer component
        weights on the geometry. Propeller: blade-element momentum theory.</note>
      <reference refID="fsim/applicability/aerobatic" author="the design" title="T.O. 1C-17A-1: +2.5 g (fsim/envelope/clean/n_max); a transport, not cleared for aerobatics" date="n/a"/>
      <reference refID="fsim/applicability/carrier" author="the design" title="USAF C-17 fact sheet: a land-based strategic airlifter" date="n/a"/>
      <reference refID="fsim/applicability/drag_devices" author="the design" title="T.O. 1C-17A-1: spoilers that serve as speed brakes and ground spoilers" date="n/a"/>
      <reference refID="fsim/applicability/flaps" author="the design" title="T.O. 1C-17A-1: externally blown flaps" date="n/a"/>
      <reference refID="fsim/applicability/ground_contact" author="the design" title="T.O. 1C-17A-1: tandem main gear either side in sponsons, twin nose wheels" date="n/a"/>
      <reference refID="fsim/applicability/releasable_stores" author="the design" title="US Air Force Research Laboratory, Rapid Dragon (2021): a palletized JASSM released from a C-17A's hold; cargo airdrop over the ramp" date="n/a"/>
      <reference refID="fsim/applicability/retractable_gear" author="the design" title="T.O. 1C-17A-1: the main gear retracts into the sponsons, the nose gear forward" date="n/a"/>
      <reference refID="fsim/applicability/vertical_flight" author="the design" title="USAF flight manual T.O. 1C-17A-1: a conventional take-off and landing jet. Conventional take-off and landing: no rotors, lift fans or vectored lift to hover" date="n/a"/>
    </fileheader>
    <metrics>
      <wingarea unit="M2"> 353.0000 </wingarea>
      <wingspan unit="M"> 50.2900 </wingspan>
      <chord unit="M"> 7.8600 </chord>
      <htailarea unit="M2"> 79.4320 </htailarea>
      <htailarm unit="M"> 27.7943 </htailarm>
      <vtailarea unit="M2"> 65.5875 </vtailarea>
      <vtailarm unit="M"> 22.1389 </vtailarm>
      <location name="AERORP" unit="M">
        <x> 20.1000 </x>
        <y> 0.0000 </y>
        <z> 4.6000 </z>
      </location>
      <location name="EYEPOINT" unit="M">
        <x> 3.6000 </x>
        <y> 0.0000 </y>
        <z> 6.0000 </z>
      </location>
      <location name="VRP" unit="M">
        <x> 20.5000 </x>
        <y> 0.0000 </y>
        <z> 4.3000 </z>
      </location>
    </metrics>
    <mass_balance negated_crossproduct_inertia="false">
      <ixx unit="KG*M2"> 6240189.13 </ixx>
      <iyy unit="KG*M2"> 11676190.47 </iyy>
      <izz unit="KG*M2"> 17786042.01 </izz>
      <ixy unit="KG*M2"> 18.886 </ixy>
      <ixz unit="KG*M2"> 1986285.943 </ixz>
      <iyz unit="KG*M2"> 45.475 </iyz>
      <emptywt unit="KG"> 128100.00 </emptywt>
      <location name="CG" unit="M">
        <x> 20.5000 </x>
        <y> 0.0000 </y>
        <z> 4.3000 </z>
      </location>
      <pointmass name="pilots">
        <weight unit="KG"> 200.00 </weight>
        <location unit="M">
          <x> 3.6000 </x>
          <y> 0.0000 </y>
          <z> 5.3000 </z>
        </location>
      </pointmass>
      <pointmass name="loadmaster">
        <weight unit="KG"> 100.00 </weight>
        <location unit="M">
          <x> 9.0000 </x>
          <y> -1.5000 </y>
          <z> 2.2000 </z>
        </location>
      </pointmass>
    </mass_balance>
    <ground_reactions>
      <contact type="BOGEY" name="Nose Gear">
        <location unit="M">
          <x> 3.3500 </x>
          <y> 0.0000 </y>
          <z> -0.1500 </z>
        </location>
        <static_friction> 0.8 </static_friction>
        <dynamic_friction> 0.5 </dynamic_friction>
        <rolling_friction> 0.02 </rolling_friction>
        <spring_coeff unit="N/M"> 1435012 </spring_coeff>
        <damping_coeff unit="N/M/SEC"> 177476 </damping_coeff>
        <damping_coeff_rebound unit="N/M/SEC"> 354953 </damping_coeff_rebound>
        <max_steer unit="DEG"> 60.0 </max_steer>
        <brake_group> NONE </brake_group>
        <retractable> 1 </retractable>
      </contact>
      <contact type="BOGEY" name="Left Main Gear Fwd">
        <location unit="M">
          <x> 20.9600 </x>
          <y> -3.7500 </y>
          <z> -0.1500 </z>
        </location>
        <static_friction> 0.8 </static_friction>
        <dynamic_friction> 0.5 </dynamic_friction>
        <rolling_friction> 0.02 </rolling_friction>
        <spring_coeff unit="N/M"> 3498529 </spring_coeff>
        <damping_coeff unit="N/M/SEC"> 432684 </damping_coeff>
        <damping_coeff_rebound unit="N/M/SEC"> 865368 </damping_coeff_rebound>
        <max_steer unit="DEG"> 0.0 </max_steer>
        <brake_group> LEFT </brake_group>
        <retractable> 1 </retractable>
      </contact>
      <contact type="BOGEY" name="Right Main Gear Fwd">
        <location unit="M">
          <x> 20.9600 </x>
          <y> 3.7500 </y>
          <z> -0.1500 </z>
        </location>
        <static_friction> 0.8 </static_friction>
        <dynamic_friction> 0.5 </dynamic_friction>
        <rolling_friction> 0.02 </rolling_friction>
        <spring_coeff unit="N/M"> 3498529 </spring_coeff>
        <damping_coeff unit="N/M/SEC"> 432684 </damping_coeff>
        <damping_coeff_rebound unit="N/M/SEC"> 865368 </damping_coeff_rebound>
        <max_steer unit="DEG"> 0.0 </max_steer>
        <brake_group> RIGHT </brake_group>
        <retractable> 1 </retractable>
      </contact>
      <contact type="BOGEY" name="Left Main Gear Aft">
        <location unit="M">
          <x> 23.4200 </x>
          <y> -3.7500 </y>
          <z> -0.1500 </z>
        </location>
        <static_friction> 0.8 </static_friction>
        <dynamic_friction> 0.5 </dynamic_friction>
        <rolling_friction> 0.02 </rolling_friction>
        <spring_coeff unit="N/M"> 3498529 </spring_coeff>
        <damping_coeff unit="N/M/SEC"> 432684 </damping_coeff>
        <damping_coeff_rebound unit="N/M/SEC"> 865368 </damping_coeff_rebound>
        <max_steer unit="DEG"> 0.0 </max_steer>
        <brake_group> LEFT </brake_group>
        <retractable> 1 </retractable>
      </contact>
      <contact type="BOGEY" name="Right Main Gear Aft">
        <location unit="M">
          <x> 23.4200 </x>
          <y> 3.7500 </y>
          <z> -0.1500 </z>
        </location>
        <static_friction> 0.8 </static_friction>
        <dynamic_friction> 0.5 </dynamic_friction>
        <rolling_friction> 0.02 </rolling_friction>
        <spring_coeff unit="N/M"> 3498529 </spring_coeff>
        <damping_coeff unit="N/M/SEC"> 432684 </damping_coeff>
        <damping_coeff_rebound unit="N/M/SEC"> 865368 </damping_coeff_rebound>
        <max_steer unit="DEG"> 0.0 </max_steer>
        <brake_group> RIGHT </brake_group>
        <retractable> 1 </retractable>
      </contact>
      <contact type="STRUCTURE" name="fuselage front">
        <location unit="M">
          <x> 0.0000 </x>
          <y> 0.0000 </y>
          <z> 3.5000 </z>
        </location>
        <static_friction> 0.8 </static_friction>
        <dynamic_friction> 0.6 </dynamic_friction>
        <spring_coeff unit="N/M"> 5130747 </spring_coeff>
        <damping_coeff unit="N/M/SEC"> 171025 </damping_coeff>
        <damping_coeff_rebound unit="N/M/SEC"> 171025 </damping_coeff_rebound>
      </contact>
      <contact type="STRUCTURE" name="fuselage front 2">
        <location unit="M">
          <x> 2.8575 </x>
          <y> 0.0000 </y>
          <z> 6.0580 </z>
        </location>
        <static_friction> 0.8 </static_friction>
        <dynamic_friction> 0.6 </dynamic_friction>
        <spring_coeff unit="N/M"> 8638425 </spring_coeff>
        <damping_coeff unit="N/M/SEC"> 287948 </damping_coeff>
        <damping_coeff_rebound unit="N/M/SEC"> 287948 </damping_coeff_rebound>
      </contact>
      <contact type="STRUCTURE" name="fuselage front 3">
        <location unit="M">
          <x> 3.0000 </x>
          <y> -0.0000 </y>
          <z> 1.2600 </z>
        </location>
        <static_friction> 0.8 </static_friction>
        <dynamic_friction> 0.6 </dynamic_friction>
        <spring_coeff unit="N/M"> 6460601 </spring_coeff>
        <damping_coeff unit="N/M/SEC"> 215353 </damping_coeff>
        <damping_coeff_rebound unit="N/M/SEC"> 215353 </damping_coeff_rebound>
      </contact>
      <contact type="STRUCTURE" name="fuselage rear">
        <location unit="M">
          <x> 48.4000 </x>
          <y> 0.0000 </y>
          <z> 6.3500 </z>
        </location>
        <static_friction> 0.8 </static_friction>
        <dynamic_friction> 0.6 </dynamic_friction>
        <spring_coeff unit="N/M"> 12026819 </spring_coeff>
        <damping_coeff unit="N/M/SEC"> 400894 </damping_coeff>
        <damping_coeff_rebound unit="N/M/SEC"> 400894 </damping_coeff_rebound>
      </contact>
      <contact type="STRUCTURE" name="htail left rear">
        <location unit="M">
          <x> 52.3700 </x>
          <y> -9.9050 </y>
          <z> 15.1604 </z>
        </location>
        <static_friction> 0.8 </static_friction>
        <dynamic_friction> 0.6 </dynamic_friction>
        <spring_coeff unit="N/M"> 7367912 </spring_coeff>
        <damping_coeff unit="N/M/SEC"> 245597 </damping_coeff>
        <damping_coeff_rebound unit="N/M/SEC"> 245597 </damping_coeff_rebound>
      </contact>
      <contact type="STRUCTURE" name="htail right rear">
        <location unit="M">
          <x> 52.3700 </x>
          <y> 9.9050 </y>
          <z> 15.1604 </z>
        </location>
        <static_friction> 0.8 </static_friction>
        <dynamic_friction> 0.6 </dynamic_friction>
        <spring_coeff unit="N/M"> 7367939 </spring_coeff>
        <damping_coeff unit="N/M/SEC"> 245598 </damping_coeff>
        <damping_coeff_rebound unit="N/M/SEC"> 245598 </damping_coeff_rebound>
      </contact>
      <contact type="STRUCTURE" name="outboard nacelle left front">
        <location unit="M">
          <x> 14.5800 </x>
          <y> -15.0937 </y>
          <z> 3.0052 </z>
        </location>
        <static_friction> 0.8 </static_friction>
        <dynamic_friction> 0.6 </dynamic_friction>
        <spring_coeff unit="N/M"> 18174513 </spring_coeff>
        <damping_coeff unit="N/M/SEC"> 605817 </damping_coeff>
        <damping_coeff_rebound unit="N/M/SEC"> 605817 </damping_coeff_rebound>
      </contact>
      <contact type="STRUCTURE" name="outboard nacelle right front">
        <location unit="M">
          <x> 14.5800 </x>
          <y> 15.0937 </y>
          <z> 3.0052 </z>
        </location>
        <static_friction> 0.8 </static_friction>
        <dynamic_friction> 0.6 </dynamic_friction>
        <spring_coeff unit="N/M"> 18174462 </spring_coeff>
        <damping_coeff unit="N/M/SEC"> 605815 </damping_coeff>
        <damping_coeff_rebound unit="N/M/SEC"> 605815 </damping_coeff_rebound>
      </contact>
      <contact type="STRUCTURE" name="sponson left bottom">
        <location unit="M">
          <x> 25.8000 </x>
          <y> -4.5942 </y>
          <z> 0.3973 </z>
        </location>
        <static_friction> 0.8 </static_friction>
        <dynamic_friction> 0.6 </dynamic_friction>
        <spring_coeff unit="N/M"> 17965828 </spring_coeff>
        <damping_coeff unit="N/M/SEC"> 598861 </damping_coeff>
        <damping_coeff_rebound unit="N/M/SEC"> 598861 </damping_coeff_rebound>
      </contact>
      <contact type="STRUCTURE" name="sponson right bottom">
        <location unit="M">
          <x> 25.8000 </x>
          <y> 4.5942 </y>
          <z> 0.3973 </z>
        </location>
        <static_friction> 0.8 </static_friction>
        <dynamic_friction> 0.6 </dynamic_friction>
        <spring_coeff unit="N/M"> 17965878 </spring_coeff>
        <damping_coeff unit="N/M/SEC"> 598863 </damping_coeff>
        <damping_coeff_rebound unit="N/M/SEC"> 598863 </damping_coeff_rebound>
      </contact>
      <contact type="STRUCTURE" name="tail fairing rear">
        <location unit="M">
          <x> 45.1622 </x>
          <y> 0.0000 </y>
          <z> 16.6255 </z>
        </location>
        <static_friction> 0.8 </static_friction>
        <dynamic_friction> 0.6 </dynamic_friction>
        <spring_coeff unit="N/M"> 12344267 </spring_coeff>
        <damping_coeff unit="N/M/SEC"> 411476 </damping_coeff>
        <damping_coeff_rebound unit="N/M/SEC"> 411476 </damping_coeff_rebound>
      </contact>
      <contact type="STRUCTURE" name="tail fairing rear 2">
        <location unit="M">
          <x> 52.4709 </x>
          <y> 0.0000 </y>
          <z> 16.4892 </z>
        </location>
        <static_friction> 0.8 </static_friction>
        <dynamic_friction> 0.6 </dynamic_friction>
        <spring_coeff unit="N/M"> 8327838 </spring_coeff>
        <damping_coeff unit="N/M/SEC"> 277595 </damping_coeff>
        <damping_coeff_rebound unit="N/M/SEC"> 277595 </damping_coeff_rebound>
      </contact>
      <contact type="STRUCTURE" name="wing left rear">
        <location unit="M">
          <x> 29.2700 </x>
          <y> -25.8502 </y>
          <z> 6.9900 </z>
        </location>
        <static_friction> 0.8 </static_friction>
        <dynamic_friction> 0.6 </dynamic_friction>
        <spring_coeff unit="N/M"> 2339421 </spring_coeff>
        <damping_coeff unit="N/M/SEC"> 77981 </damping_coeff>
        <damping_coeff_rebound unit="N/M/SEC"> 77981 </damping_coeff_rebound>
      </contact>
      <contact type="STRUCTURE" name="wing left bottom">
        <location unit="M">
          <x> 26.1543 </x>
          <y> -25.1816 </y>
          <z> 4.3715 </z>
        </location>
        <static_friction> 0.8 </static_friction>
        <dynamic_friction> 0.6 </dynamic_friction>
        <spring_coeff unit="N/M"> 2543739 </spring_coeff>
        <damping_coeff unit="N/M/SEC"> 84791 </damping_coeff>
        <damping_coeff_rebound unit="N/M/SEC"> 84791 </damping_coeff_rebound>
      </contact>
      <contact type="STRUCTURE" name="wing left bottom 2">
        <location unit="M">
          <x> 28.7891 </x>
          <y> -25.0831 </y>
          <z> 4.3979 </z>
        </location>
        <static_friction> 0.8 </static_friction>
        <dynamic_friction> 0.6 </dynamic_friction>
        <spring_coeff unit="N/M"> 2493431 </spring_coeff>
        <damping_coeff unit="N/M/SEC"> 83114 </damping_coeff>
        <damping_coeff_rebound unit="N/M/SEC"> 83114 </damping_coeff_rebound>
      </contact>
      <contact type="STRUCTURE" name="wing right bottom">
        <location unit="M">
          <x> 28.7891 </x>
          <y> 25.0831 </y>
          <z> 4.3979 </z>
        </location>
        <static_friction> 0.8 </static_friction>
        <dynamic_friction> 0.6 </dynamic_friction>
        <spring_coeff unit="N/M"> 2493437 </spring_coeff>
        <damping_coeff unit="N/M/SEC"> 83115 </damping_coeff>
        <damping_coeff_rebound unit="N/M/SEC"> 83115 </damping_coeff_rebound>
      </contact>
      <contact type="STRUCTURE" name="wing right bottom 2">
        <location unit="M">
          <x> 26.1543 </x>
          <y> 25.1816 </y>
          <z> 4.3715 </z>
        </location>
        <static_friction> 0.8 </static_friction>
        <dynamic_friction> 0.6 </dynamic_friction>
        <spring_coeff unit="N/M"> 2543743 </spring_coeff>
        <damping_coeff unit="N/M/SEC"> 84791 </damping_coeff>
        <damping_coeff_rebound unit="N/M/SEC"> 84791 </damping_coeff_rebound>
      </contact>
      <contact type="STRUCTURE" name="wing right rear">
        <location unit="M">
          <x> 29.2700 </x>
          <y> 25.8502 </y>
          <z> 6.9900 </z>
        </location>
        <static_friction> 0.8 </static_friction>
        <dynamic_friction> 0.6 </dynamic_friction>
        <spring_coeff unit="N/M"> 2339428 </spring_coeff>
        <damping_coeff unit="N/M/SEC"> 77981 </damping_coeff>
        <damping_coeff_rebound unit="N/M/SEC"> 77981 </damping_coeff_rebound>
      </contact>
    </ground_reactions>
    <propulsion>
      <engine file="c17a_engine0">
        <location unit="M">
          <x> 13.1000 </x>
          <y> -7.5700 </y>
          <z> 4.0200 </z>
        </location>
        <feed>0</feed>
        <feed>1</feed>
        <feed>2</feed>
        <feed>3</feed>
        <feed>4</feed>
        <thruster file="c17a_nozzle0">
          <location unit="M">
            <x> 17.3200 </x>
            <y> -7.5700 </y>
            <z> 4.0200 </z>
          </location>
          <orient unit="DEG"> <roll>0.00</roll> <pitch>0.00</pitch> <yaw>0.00</yaw> </orient>

        </thruster>
      </engine>
      <engine file="c17a_engine0">
        <location unit="M">
          <x> 13.1000 </x>
          <y> 7.5700 </y>
          <z> 4.0200 </z>
        </location>
        <feed>0</feed>
        <feed>1</feed>
        <feed>2</feed>
        <feed>3</feed>
        <feed>4</feed>
        <thruster file="c17a_nozzle0">
          <location unit="M">
            <x> 17.3200 </x>
            <y> 7.5700 </y>
            <z> 4.0200 </z>
          </location>
          <orient unit="DEG"> <roll>0.00</roll> <pitch>0.00</pitch> <yaw>0.00</yaw> </orient>

        </thruster>
      </engine>
      <engine file="c17a_engine1">
        <location unit="M">
          <x> 17.1100 </x>
          <y> -14.2200 </y>
          <z> 3.6400 </z>
        </location>
        <feed>0</feed>
        <feed>1</feed>
        <feed>2</feed>
        <feed>3</feed>
        <feed>4</feed>
        <thruster file="c17a_nozzle1">
          <location unit="M">
            <x> 21.3300 </x>
            <y> -14.2200 </y>
            <z> 3.6400 </z>
          </location>
          <orient unit="DEG"> <roll>0.00</roll> <pitch>0.00</pitch> <yaw>0.00</yaw> </orient>

        </thruster>
      </engine>
      <engine file="c17a_engine1">
        <location unit="M">
          <x> 17.1100 </x>
          <y> 14.2200 </y>
          <z> 3.6400 </z>
        </location>
        <feed>0</feed>
        <feed>1</feed>
        <feed>2</feed>
        <feed>3</feed>
        <feed>4</feed>
        <thruster file="c17a_nozzle1">
          <location unit="M">
            <x> 21.3300 </x>
            <y> 14.2200 </y>
            <z> 3.6400 </z>
          </location>
          <orient unit="DEG"> <roll>0.00</roll> <pitch>0.00</pitch> <yaw>0.00</yaw> </orient>

        </thruster>
      </engine>
      <tank type="FUEL">
        <location unit="M">
          <x> 16.9000 </x>
          <y> 0.0000 </y>
          <z> 6.6000 </z>
        </location>
        <capacity unit="KG"> 17600.00 </capacity>
        <contents unit="KG"> 17600.00 </contents>
      </tank>
      <tank type="FUEL">
        <location unit="M">
          <x> 19.6000 </x>
          <y> -6.5000 </y>
          <z> 6.1000 </z>
        </location>
        <capacity unit="KG"> 23000.00 </capacity>
        <contents unit="KG"> 23000.00 </contents>
      </tank>
      <tank type="FUEL">
        <location unit="M">
          <x> 19.6000 </x>
          <y> 6.5000 </y>
          <z> 6.1000 </z>
        </location>
        <capacity unit="KG"> 23000.00 </capacity>
        <contents unit="KG"> 23000.00 </contents>
      </tank>
      <tank type="FUEL">
        <location unit="M">
          <x> 22.6500 </x>
          <y> -14.0000 </y>
          <z> 5.4500 </z>
        </location>
        <capacity unit="KG"> 22000.00 </capacity>
        <contents unit="KG"> 22000.00 </contents>
      </tank>
      <tank type="FUEL">
        <location unit="M">
          <x> 22.6500 </x>
          <y> 14.0000 </y>
          <z> 5.4500 </z>
        </location>
        <capacity unit="KG"> 22000.00 </capacity>
        <contents unit="KG"> 22000.00 </contents>
      </tank>
    </propulsion>
    <flight_control name="c17a">
      <!-- the aircraft's profile for the platform (docs/control-architecture.md, section 7): what
           hangar knows of it - its design, its flight tests, its identified responses -->
      <property value="1">fsim/identity/version</property>
      <property value="1">fsim/identity/provenance</property>
      <property value="5">fsim/identity/class</property>
      <property value="2">fsim/identity/family</property>
      <property value="1">fsim/effectors/version</property>
      <property value="1">fsim/effectors/provenance</property>
      <property value="1">fsim/effectors/flaps</property>
      <property value="8">fsim/effectors/flaps_transit_s</property>
      <property value="1">fsim/effectors/neutral</property>
      <property value="1">fsim/effectors/pitch</property>
      <property value="0.0">fsim/effectors/pitch_trim</property>
      <property value="1">fsim/effectors/retractable_gear</property>
      <property value="1">fsim/effectors/roll</property>
      <property value="1">fsim/effectors/speedbrake</property>
      <property value="1">fsim/effectors/wheel_brakes</property>
      <property value="0.0">fsim/effectors/yaw</property>
      <property value="1">fsim/envelope/version</property>
      <property value="1">fsim/envelope/provenance</property>
      <property value="14">fsim/envelope/clean/alpha_max_deg</property>
      <property value="86.1628">fsim/envelope/clean/cas_min_ms</property>
      <property value="2.5">fsim/envelope/clean/n_max</property>
      <property value="-1">fsim/envelope/clean/n_min</property>
      <property value="35">fsim/envelope/clean/roll_rate_max_deg_s</property>
      <property value="12.86">fsim/envelope/crosswind_max_ms</property>
      <property value="90.03">fsim/envelope/flaps/cas_max_ms</property>
      <property value="0.75">fsim/envelope/flaps_threshold</property>
      <property value="128.61">fsim/envelope/gear_cas_max_ms</property>
      <property value="9.48">fsim/envelope/ground_pitch_max_deg</property>
      <property value="14.82">fsim/envelope/ground_turn_radius_m</property>
      <property value="0.0345">fsim/envelope/ground_yaw_accel_rad_s2</property>
      <property value="1">fsim/envelope/law_alpha</property>
      <property value="1">fsim/envelope/law_load_factor</property>
      <property value="1">fsim/envelope/law_roll_rate</property>
      <property value="1">fsim/propulsion/version</property>
      <property value="1">fsim/propulsion/provenance</property>
      <property value="0.0">fsim/propulsion/afterburner</property>
      <property value="4">fsim/propulsion/engines</property>
      <property value="0.3058">fsim/propulsion/spool_s</property>
      <property value="2">fsim/propulsion/type</property>
      <property value="1">fsim/plant/version</property>
      <property value="1">fsim/plant/provenance</property>
      <property value="-4.1222">fsim/plant/alpha_zero_lift_deg</property>
      <property value="3000">fsim/plant/altitude_m</property>
      <property value="176.982">fsim/plant/eas_ms</property>
      <property value="0.0">fsim/plant/elevator_trim</property>
      <property value="0.0">fsim/plant/elevator_trim_lift</property>
      <property value="1.67921">fsim/plant/pitch/gain</property>
      <property value="0.555785">fsim/plant/pitch/tau_s</property>
      <property value="0.561699">fsim/plant/roll/gain</property>
      <property value="0.218957">fsim/plant/roll/tau_s</property>
      <property value="2.23318">fsim/plant/speed/gain</property>
      <property value="0.3058">fsim/plant/speed/tau_s</property>
      <property value="202.986">fsim/plant/tas_ms</property>
      <property value="0.586299">fsim/plant/throttle_trim</property>
      <property value="0.177624">fsim/plant/yaw/gain</property>
      <property value="1">fsim/performance/version</property>
      <property value="1">fsim/performance/provenance</property>
      <property value="11212.5">fsim/performance/ceiling_m</property>
      <property value="31.4204">fsim/performance/climb_ms</property>
      <property value="295.161">fsim/performance/max_tas_ms</property>
      <property value="1">fsim/applicability/version</property>
      <property value="1">fsim/applicability/provenance</property>
      <property value="0.0">fsim/applicability/aerobatic</property>
      <property value="1">fsim/applicability/carrier</property>
      <property value="2">fsim/applicability/drag_devices</property>
      <property value="1">fsim/applicability/flaps</property>
      <property value="1">fsim/applicability/ground_contact</property>
      <property value="3">fsim/applicability/releasable_stores</property>
      <property value="1">fsim/applicability/retractable_gear</property>
      <property value="0.0">fsim/applicability/vertical_flight</property>
      <property value="1">fsim/tables/version</property>
      <property value="1">fsim/tables/provenance</property>
      <property value="100">fsim/tables/altitude_m/h0</property>
      <property value="2240">fsim/tables/altitude_m/h1</property>
      <property value="4480">fsim/tables/altitude_m/h2</property>
      <property value="6730">fsim/tables/altitude_m/h3</property>
      <property value="8410">fsim/tables/altitude_m/h4</property>
      <property value="9530">fsim/tables/altitude_m/h5</property>
      <property value="10650">fsim/tables/altitude_m/h6</property>
      <property value="1.17831">fsim/tables/best_endurance_fuel_kg_s/h0/w0</property>
      <property value="1.36922">fsim/tables/best_endurance_fuel_kg_s/h0/w1</property>
      <property value="1.57057">fsim/tables/best_endurance_fuel_kg_s/h0/w2</property>
      <property value="1.03475">fsim/tables/best_endurance_fuel_kg_s/h1/w0</property>
      <property value="1.23478">fsim/tables/best_endurance_fuel_kg_s/h1/w1</property>
      <property value="1.47147">fsim/tables/best_endurance_fuel_kg_s/h1/w2</property>
      <property value="0.919947">fsim/tables/best_endurance_fuel_kg_s/h2/w0</property>
      <property value="1.12382">fsim/tables/best_endurance_fuel_kg_s/h2/w1</property>
      <property value="1.33069">fsim/tables/best_endurance_fuel_kg_s/h2/w2</property>
      <property value="0.827936">fsim/tables/best_endurance_fuel_kg_s/h3/w0</property>
      <property value="1.00636">fsim/tables/best_endurance_fuel_kg_s/h3/w1</property>
      <property value="1.19427">fsim/tables/best_endurance_fuel_kg_s/h3/w2</property>
      <property value="0.74132">fsim/tables/best_endurance_fuel_kg_s/h4/w0</property>
      <property value="0.928088">fsim/tables/best_endurance_fuel_kg_s/h4/w1</property>
      <property value="1.11634">fsim/tables/best_endurance_fuel_kg_s/h4/w2</property>
      <property value="0.702119">fsim/tables/best_endurance_fuel_kg_s/h5/w0</property>
      <property value="0.880284">fsim/tables/best_endurance_fuel_kg_s/h5/w1</property>
      <property value="1.07054">fsim/tables/best_endurance_fuel_kg_s/h5/w2</property>
      <property value="0.65681">fsim/tables/best_endurance_fuel_kg_s/h6/w0</property>
      <property value="0.842744">fsim/tables/best_endurance_fuel_kg_s/h6/w1</property>
      <property value="1.03795">fsim/tables/best_endurance_fuel_kg_s/h6/w2</property>
      <property value="130.643">fsim/tables/best_endurance_tas_ms/h0/w0</property>
      <property value="122.978">fsim/tables/best_endurance_tas_ms/h0/w1</property>
      <property value="120.374">fsim/tables/best_endurance_tas_ms/h0/w2</property>
      <property value="138.279">fsim/tables/best_endurance_tas_ms/h1/w0</property>
      <property value="136.173">fsim/tables/best_endurance_tas_ms/h1/w1</property>
      <property value="150.661">fsim/tables/best_endurance_tas_ms/h1/w2</property>
      <property value="148.003">fsim/tables/best_endurance_tas_ms/h2/w0</property>
      <property value="150.349">fsim/tables/best_endurance_tas_ms/h2/w1</property>
      <property value="169.339">fsim/tables/best_endurance_tas_ms/h2/w2</property>
      <property value="168.311">fsim/tables/best_endurance_tas_ms/h3/w0</property>
      <property value="169.786">fsim/tables/best_endurance_tas_ms/h3/w1</property>
      <property value="189.241">fsim/tables/best_endurance_tas_ms/h3/w2</property>
      <property value="177.106">fsim/tables/best_endurance_tas_ms/h4/w0</property>
      <property value="186.71">fsim/tables/best_endurance_tas_ms/h4/w1</property>
      <property value="206.189">fsim/tables/best_endurance_tas_ms/h4/w2</property>
      <property value="188.266">fsim/tables/best_endurance_tas_ms/h5/w0</property>
      <property value="197.454">fsim/tables/best_endurance_tas_ms/h5/w1</property>
      <property value="217.38">fsim/tables/best_endurance_tas_ms/h5/w2</property>
      <property value="192.629">fsim/tables/best_endurance_tas_ms/h6/w0</property>
      <property value="208.592">fsim/tables/best_endurance_tas_ms/h6/w1</property>
      <property value="230.257">fsim/tables/best_endurance_tas_ms/h6/w2</property>
      <property value="1.3323">fsim/tables/best_range_fuel_kg_s/h0/w0</property>
      <property value="1.67276">fsim/tables/best_range_fuel_kg_s/h0/w1</property>
      <property value="1.97816">fsim/tables/best_range_fuel_kg_s/h0/w2</property>
      <property value="1.22443">fsim/tables/best_range_fuel_kg_s/h1/w0</property>
      <property value="1.5102">fsim/tables/best_range_fuel_kg_s/h1/w1</property>
      <property value="1.76773">fsim/tables/best_range_fuel_kg_s/h1/w2</property>
      <property value="1.09362">fsim/tables/best_range_fuel_kg_s/h2/w0</property>
      <property value="1.34147">fsim/tables/best_range_fuel_kg_s/h2/w1</property>
      <property value="1.57128">fsim/tables/best_range_fuel_kg_s/h2/w2</property>
      <property value="0.968647">fsim/tables/best_range_fuel_kg_s/h3/w0</property>
      <property value="1.17545">fsim/tables/best_range_fuel_kg_s/h3/w1</property>
      <property value="1.35888">fsim/tables/best_range_fuel_kg_s/h3/w2</property>
      <property value="0.873945">fsim/tables/best_range_fuel_kg_s/h4/w0</property>
      <property value="1.05173">fsim/tables/best_range_fuel_kg_s/h4/w1</property>
      <property value="1.1829">fsim/tables/best_range_fuel_kg_s/h4/w2</property>
      <property value="0.811958">fsim/tables/best_range_fuel_kg_s/h5/w0</property>
      <property value="0.948423">fsim/tables/best_range_fuel_kg_s/h5/w1</property>
      <property value="1.12071">fsim/tables/best_range_fuel_kg_s/h5/w2</property>
      <property value="0.73552">fsim/tables/best_range_fuel_kg_s/h6/w0</property>
      <property value="0.8827">fsim/tables/best_range_fuel_kg_s/h6/w1</property>
      <property value="1.06864">fsim/tables/best_range_fuel_kg_s/h6/w2</property>
      <property value="150.377">fsim/tables/best_range_tas_ms/h0/w0</property>
      <property value="176.548">fsim/tables/best_range_tas_ms/h0/w1</property>
      <property value="197.935">fsim/tables/best_range_tas_ms/h0/w2</property>
      <property value="167.915">fsim/tables/best_range_tas_ms/h1/w0</property>
      <property value="192.818">fsim/tables/best_range_tas_ms/h1/w1</property>
      <property value="214.204">fsim/tables/best_range_tas_ms/h1/w2</property>
      <property value="186.086">fsim/tables/best_range_tas_ms/h2/w0</property>
      <property value="211.613">fsim/tables/best_range_tas_ms/h2/w1</property>
      <property value="232.476">fsim/tables/best_range_tas_ms/h2/w2</property>
      <property value="207.143">fsim/tables/best_range_tas_ms/h3/w0</property>
      <property value="230.962">fsim/tables/best_range_tas_ms/h3/w1</property>
      <property value="247.304">fsim/tables/best_range_tas_ms/h3/w2</property>
      <property value="221.944">fsim/tables/best_range_tas_ms/h4/w0</property>
      <property value="242.049">fsim/tables/best_range_tas_ms/h4/w1</property>
      <property value="245.796">fsim/tables/best_range_tas_ms/h4/w2</property>
      <property value="231.959">fsim/tables/best_range_tas_ms/h5/w0</property>
      <property value="240.454">fsim/tables/best_range_tas_ms/h5/w1</property>
      <property value="247.958">fsim/tables/best_range_tas_ms/h5/w2</property>
      <property value="234.499">fsim/tables/best_range_tas_ms/h6/w0</property>
      <property value="241.13">fsim/tables/best_range_tas_ms/h6/w1</property>
      <property value="247.497">fsim/tables/best_range_tas_ms/h6/w2</property>
      <property value="202.55">fsim/tables/climb_tas_ms/h0/w0</property>
      <property value="204.738">fsim/tables/climb_tas_ms/h0/w1</property>
      <property value="203.431">fsim/tables/climb_tas_ms/h0/w2</property>
      <property value="228.06">fsim/tables/climb_tas_ms/h1/w0</property>
      <property value="233.071">fsim/tables/climb_tas_ms/h1/w1</property>
      <property value="230.912">fsim/tables/climb_tas_ms/h1/w2</property>
      <property value="243.819">fsim/tables/climb_tas_ms/h2/w0</property>
      <property value="253.252">fsim/tables/climb_tas_ms/h2/w1</property>
      <property value="248.919">fsim/tables/climb_tas_ms/h2/w2</property>
      <property value="244.137">fsim/tables/climb_tas_ms/h3/w0</property>
      <property value="237.648">fsim/tables/climb_tas_ms/h3/w1</property>
      <property value="250.025">fsim/tables/climb_tas_ms/h3/w2</property>
      <property value="233.525">fsim/tables/climb_tas_ms/h4/w0</property>
      <property value="244.364">fsim/tables/climb_tas_ms/h4/w1</property>
      <property value="244.455">fsim/tables/climb_tas_ms/h4/w2</property>
      <property value="235.164">fsim/tables/climb_tas_ms/h5/w0</property>
      <property value="240.602">fsim/tables/climb_tas_ms/h5/w1</property>
      <property value="242.357">fsim/tables/climb_tas_ms/h5/w2</property>
      <property value="236.163">fsim/tables/climb_tas_ms/h6/w0</property>
      <property value="238.26">fsim/tables/climb_tas_ms/h6/w1</property>
      <property value="235.139">fsim/tables/climb_tas_ms/h6/w2</property>
      <property value="107600">fsim/tables/fuel_capacity_kg</property>
      <property value="1.17824">fsim/tables/fuel_kg_s/h0/w0/v0</property>
      <property value="1.2546">fsim/tables/fuel_kg_s/h0/w0/v1</property>
      <property value="2.31678">fsim/tables/fuel_kg_s/h0/w0/v10</property>
      <property value="2.46082">fsim/tables/fuel_kg_s/h0/w0/v11</property>
      <property value="2.61131">fsim/tables/fuel_kg_s/h0/w0/v12</property>
      <property value="2.7676">fsim/tables/fuel_kg_s/h0/w0/v13</property>
      <property value="2.96865">fsim/tables/fuel_kg_s/h0/w0/v14</property>
      <property value="3.23681">fsim/tables/fuel_kg_s/h0/w0/v15</property>
      <property value="1.3415">fsim/tables/fuel_kg_s/h0/w0/v2</property>
      <property value="1.44338">fsim/tables/fuel_kg_s/h0/w0/v3</property>
      <property value="1.55422">fsim/tables/fuel_kg_s/h0/w0/v4</property>
      <property value="1.66695">fsim/tables/fuel_kg_s/h0/w0/v5</property>
      <property value="1.78289">fsim/tables/fuel_kg_s/h0/w0/v6</property>
      <property value="1.91483">fsim/tables/fuel_kg_s/h0/w0/v7</property>
      <property value="2.04626">fsim/tables/fuel_kg_s/h0/w0/v8</property>
      <property value="2.18006">fsim/tables/fuel_kg_s/h0/w0/v9</property>
      <property value="1.36921">fsim/tables/fuel_kg_s/h0/w1/v0</property>
      <property value="1.38376">fsim/tables/fuel_kg_s/h0/w1/v1</property>
      <property value="2.30845">fsim/tables/fuel_kg_s/h0/w1/v10</property>
      <property value="2.45683">fsim/tables/fuel_kg_s/h0/w1/v11</property>
      <property value="2.61324">fsim/tables/fuel_kg_s/h0/w1/v12</property>
      <property value="2.77583">fsim/tables/fuel_kg_s/h0/w1/v13</property>
      <property value="2.97607">fsim/tables/fuel_kg_s/h0/w1/v14</property>
      <property value="3.2552">fsim/tables/fuel_kg_s/h0/w1/v15</property>
      <property value="1.43028">fsim/tables/fuel_kg_s/h0/w1/v2</property>
      <property value="1.49316">fsim/tables/fuel_kg_s/h0/w1/v3</property>
      <property value="1.58643">fsim/tables/fuel_kg_s/h0/w1/v4</property>
      <property value="1.68102">fsim/tables/fuel_kg_s/h0/w1/v5</property>
      <property value="1.79833">fsim/tables/fuel_kg_s/h0/w1/v6</property>
      <property value="1.91941">fsim/tables/fuel_kg_s/h0/w1/v7</property>
      <property value="2.04101">fsim/tables/fuel_kg_s/h0/w1/v8</property>
      <property value="2.16624">fsim/tables/fuel_kg_s/h0/w1/v9</property>
      <property value="1.67083">fsim/tables/fuel_kg_s/h0/w2/v0</property>
      <property value="1.57316">fsim/tables/fuel_kg_s/h0/w2/v1</property>
      <property value="2.28822">fsim/tables/fuel_kg_s/h0/w2/v10</property>
      <property value="2.42773">fsim/tables/fuel_kg_s/h0/w2/v11</property>
      <property value="2.5925">fsim/tables/fuel_kg_s/h0/w2/v12</property>
      <property value="2.77">fsim/tables/fuel_kg_s/h0/w2/v13</property>
      <property value="2.97461">fsim/tables/fuel_kg_s/h0/w2/v14</property>
      <property value="3.28051">fsim/tables/fuel_kg_s/h0/w2/v15</property>
      <property value="1.61654">fsim/tables/fuel_kg_s/h0/w2/v2</property>
      <property value="1.61612">fsim/tables/fuel_kg_s/h0/w2/v3</property>
      <property value="1.64795">fsim/tables/fuel_kg_s/h0/w2/v4</property>
      <property value="1.71084">fsim/tables/fuel_kg_s/h0/w2/v5</property>
      <property value="1.79625">fsim/tables/fuel_kg_s/h0/w2/v6</property>
      <property value="1.90162">fsim/tables/fuel_kg_s/h0/w2/v7</property>
      <property value="2.01962">fsim/tables/fuel_kg_s/h0/w2/v8</property>
      <property value="2.15266">fsim/tables/fuel_kg_s/h0/w2/v9</property>
      <property value="1.14943">fsim/tables/fuel_kg_s/h1/w0/v0</property>
      <property value="1.15725">fsim/tables/fuel_kg_s/h1/w0/v1</property>
      <property value="1.76632">fsim/tables/fuel_kg_s/h1/w0/v10</property>
      <property value="1.89399">fsim/tables/fuel_kg_s/h1/w0/v11</property>
      <property value="2.02833">fsim/tables/fuel_kg_s/h1/w0/v12</property>
      <property value="2.16762">fsim/tables/fuel_kg_s/h1/w0/v13</property>
      <property value="2.34993">fsim/tables/fuel_kg_s/h1/w0/v14</property>
      <property value="2.69612">fsim/tables/fuel_kg_s/h1/w0/v15</property>
      <property value="1.03873">fsim/tables/fuel_kg_s/h1/w0/v2</property>
      <property value="1.08484">fsim/tables/fuel_kg_s/h1/w0/v3</property>
      <property value="1.1601">fsim/tables/fuel_kg_s/h1/w0/v4</property>
      <property value="1.23693">fsim/tables/fuel_kg_s/h1/w0/v5</property>
      <property value="1.33224">fsim/tables/fuel_kg_s/h1/w0/v6</property>
      <property value="1.43141">fsim/tables/fuel_kg_s/h1/w0/v7</property>
      <property value="1.53349">fsim/tables/fuel_kg_s/h1/w0/v8</property>
      <property value="1.64438">fsim/tables/fuel_kg_s/h1/w0/v9</property>
      <property value="1.32623">fsim/tables/fuel_kg_s/h1/w1/v0</property>
      <property value="1.3509">fsim/tables/fuel_kg_s/h1/w1/v1</property>
      <property value="1.79203">fsim/tables/fuel_kg_s/h1/w1/v10</property>
      <property value="1.90693">fsim/tables/fuel_kg_s/h1/w1/v11</property>
      <property value="2.04147">fsim/tables/fuel_kg_s/h1/w1/v12</property>
      <property value="2.18446">fsim/tables/fuel_kg_s/h1/w1/v13</property>
      <property value="2.3652">fsim/tables/fuel_kg_s/h1/w1/v14</property>
      <property value="2.65832">fsim/tables/fuel_kg_s/h1/w1/v15</property>
      <property value="1.24609">fsim/tables/fuel_kg_s/h1/w1/v2</property>
      <property value="1.25114">fsim/tables/fuel_kg_s/h1/w1/v3</property>
      <property value="1.28007">fsim/tables/fuel_kg_s/h1/w1/v4</property>
      <property value="1.32898">fsim/tables/fuel_kg_s/h1/w1/v5</property>
      <property value="1.39905">fsim/tables/fuel_kg_s/h1/w1/v6</property>
      <property value="1.48083">fsim/tables/fuel_kg_s/h1/w1/v7</property>
      <property value="1.57453">fsim/tables/fuel_kg_s/h1/w1/v8</property>
      <property value="1.68174">fsim/tables/fuel_kg_s/h1/w1/v9</property>
      <property value="1.56982">fsim/tables/fuel_kg_s/h1/w2/v0</property>
      <property value="1.55201">fsim/tables/fuel_kg_s/h1/w2/v1</property>
      <property value="1.87853">fsim/tables/fuel_kg_s/h1/w2/v10</property>
      <property value="1.98975">fsim/tables/fuel_kg_s/h1/w2/v11</property>
      <property value="2.10693">fsim/tables/fuel_kg_s/h1/w2/v12</property>
      <property value="2.22871">fsim/tables/fuel_kg_s/h1/w2/v13</property>
      <property value="2.40452">fsim/tables/fuel_kg_s/h1/w2/v14</property>
      <property value="2.6591">fsim/tables/fuel_kg_s/h1/w2/v15</property>
      <property value="1.49363">fsim/tables/fuel_kg_s/h1/w2/v2</property>
      <property value="1.47248">fsim/tables/fuel_kg_s/h1/w2/v3</property>
      <property value="1.47875">fsim/tables/fuel_kg_s/h1/w2/v4</property>
      <property value="1.50356">fsim/tables/fuel_kg_s/h1/w2/v5</property>
      <property value="1.55023">fsim/tables/fuel_kg_s/h1/w2/v6</property>
      <property value="1.60884">fsim/tables/fuel_kg_s/h1/w2/v7</property>
      <property value="1.68967">fsim/tables/fuel_kg_s/h1/w2/v8</property>
      <property value="1.7727">fsim/tables/fuel_kg_s/h1/w2/v9</property>
      <property value="0.980147">fsim/tables/fuel_kg_s/h2/w0/v0</property>
      <property value="0.977363">fsim/tables/fuel_kg_s/h2/w0/v1</property>
      <property value="1.38584">fsim/tables/fuel_kg_s/h2/w0/v10</property>
      <property value="1.47337">fsim/tables/fuel_kg_s/h2/w0/v11</property>
      <property value="1.56755">fsim/tables/fuel_kg_s/h2/w0/v12</property>
      <property value="1.66476">fsim/tables/fuel_kg_s/h2/w0/v13</property>
      <property value="1.80777">fsim/tables/fuel_kg_s/h2/w0/v14</property>
      <property value="2.19836">fsim/tables/fuel_kg_s/h2/w0/v15</property>
      <property value="0.920773">fsim/tables/fuel_kg_s/h2/w0/v2</property>
      <property value="0.953088">fsim/tables/fuel_kg_s/h2/w0/v3</property>
      <property value="0.990656">fsim/tables/fuel_kg_s/h2/w0/v4</property>
      <property value="1.04341">fsim/tables/fuel_kg_s/h2/w0/v5</property>
      <property value="1.09743">fsim/tables/fuel_kg_s/h2/w0/v6</property>
      <property value="1.16376">fsim/tables/fuel_kg_s/h2/w0/v7</property>
      <property value="1.2357">fsim/tables/fuel_kg_s/h2/w0/v8</property>
      <property value="1.30959">fsim/tables/fuel_kg_s/h2/w0/v9</property>
      <property value="1.21715">fsim/tables/fuel_kg_s/h2/w1/v0</property>
      <property value="1.16764">fsim/tables/fuel_kg_s/h2/w1/v1</property>
      <property value="1.42886">fsim/tables/fuel_kg_s/h2/w1/v10</property>
      <property value="1.51249">fsim/tables/fuel_kg_s/h2/w1/v11</property>
      <property value="1.59955">fsim/tables/fuel_kg_s/h2/w1/v12</property>
      <property value="1.6898">fsim/tables/fuel_kg_s/h2/w1/v13</property>
      <property value="1.83005">fsim/tables/fuel_kg_s/h2/w1/v14</property>
      <property value="2.19941">fsim/tables/fuel_kg_s/h2/w1/v15</property>
      <property value="1.13399">fsim/tables/fuel_kg_s/h2/w1/v2</property>
      <property value="1.12385">fsim/tables/fuel_kg_s/h2/w1/v3</property>
      <property value="1.132">fsim/tables/fuel_kg_s/h2/w1/v4</property>
      <property value="1.15171">fsim/tables/fuel_kg_s/h2/w1/v5</property>
      <property value="1.18558">fsim/tables/fuel_kg_s/h2/w1/v6</property>
      <property value="1.22888">fsim/tables/fuel_kg_s/h2/w1/v7</property>
      <property value="1.28916">fsim/tables/fuel_kg_s/h2/w1/v8</property>
      <property value="1.35126">fsim/tables/fuel_kg_s/h2/w1/v9</property>
      <property value="1.50768">fsim/tables/fuel_kg_s/h2/w2/v0</property>
      <property value="1.44524">fsim/tables/fuel_kg_s/h2/w2/v1</property>
      <property value="1.52466">fsim/tables/fuel_kg_s/h2/w2/v10</property>
      <property value="1.59006">fsim/tables/fuel_kg_s/h2/w2/v11</property>
      <property value="1.67464">fsim/tables/fuel_kg_s/h2/w2/v12</property>
      <property value="1.76207">fsim/tables/fuel_kg_s/h2/w2/v13</property>
      <property value="1.88941">fsim/tables/fuel_kg_s/h2/w2/v14</property>
      <property value="2.20839">fsim/tables/fuel_kg_s/h2/w2/v15</property>
      <property value="1.38513">fsim/tables/fuel_kg_s/h2/w2/v2</property>
      <property value="1.34896">fsim/tables/fuel_kg_s/h2/w2/v3</property>
      <property value="1.33286">fsim/tables/fuel_kg_s/h2/w2/v4</property>
      <property value="1.33214">fsim/tables/fuel_kg_s/h2/w2/v5</property>
      <property value="1.34575">fsim/tables/fuel_kg_s/h2/w2/v6</property>
      <property value="1.37568">fsim/tables/fuel_kg_s/h2/w2/v7</property>
      <property value="1.41068">fsim/tables/fuel_kg_s/h2/w2/v8</property>
      <property value="1.46276">fsim/tables/fuel_kg_s/h2/w2/v9</property>
      <property value="0.849856">fsim/tables/fuel_kg_s/h3/w0/v0</property>
      <property value="0.88952">fsim/tables/fuel_kg_s/h3/w0/v1</property>
      <property value="1.078">fsim/tables/fuel_kg_s/h3/w0/v10</property>
      <property value="1.12957">fsim/tables/fuel_kg_s/h3/w0/v11</property>
      <property value="1.18271">fsim/tables/fuel_kg_s/h3/w0/v12</property>
      <property value="1.24569">fsim/tables/fuel_kg_s/h3/w0/v13</property>
      <property value="1.34464">fsim/tables/fuel_kg_s/h3/w0/v14</property>
      <property value="1.65368">fsim/tables/fuel_kg_s/h3/w0/v15</property>
      <property value="0.867053">fsim/tables/fuel_kg_s/h3/w0/v2</property>
      <property value="0.828667">fsim/tables/fuel_kg_s/h3/w0/v3</property>
      <property value="0.848587">fsim/tables/fuel_kg_s/h3/w0/v4</property>
      <property value="0.871055">fsim/tables/fuel_kg_s/h3/w0/v5</property>
      <property value="0.905743">fsim/tables/fuel_kg_s/h3/w0/v6</property>
      <property value="0.942166">fsim/tables/fuel_kg_s/h3/w0/v7</property>
      <property value="0.980703">fsim/tables/fuel_kg_s/h3/w0/v8</property>
      <property value="1.02806">fsim/tables/fuel_kg_s/h3/w0/v9</property>
      <property value="1.14971">fsim/tables/fuel_kg_s/h3/w1/v0</property>
      <property value="1.08674">fsim/tables/fuel_kg_s/h3/w1/v1</property>
      <property value="1.13765">fsim/tables/fuel_kg_s/h3/w1/v10</property>
      <property value="1.18139">fsim/tables/fuel_kg_s/h3/w1/v11</property>
      <property value="1.235">fsim/tables/fuel_kg_s/h3/w1/v12</property>
      <property value="1.29377">fsim/tables/fuel_kg_s/h3/w1/v13</property>
      <property value="1.39076">fsim/tables/fuel_kg_s/h3/w1/v14</property>
      <property value="1.66543">fsim/tables/fuel_kg_s/h3/w1/v15</property>
      <property value="1.03348">fsim/tables/fuel_kg_s/h3/w1/v2</property>
      <property value="1.01404">fsim/tables/fuel_kg_s/h3/w1/v3</property>
      <property value="1.00669">fsim/tables/fuel_kg_s/h3/w1/v4</property>
      <property value="1.00897">fsim/tables/fuel_kg_s/h3/w1/v5</property>
      <property value="1.01751">fsim/tables/fuel_kg_s/h3/w1/v6</property>
      <property value="1.03929">fsim/tables/fuel_kg_s/h3/w1/v7</property>
      <property value="1.0627">fsim/tables/fuel_kg_s/h3/w1/v8</property>
      <property value="1.0962">fsim/tables/fuel_kg_s/h3/w1/v9</property>
      <property value="1.42481">fsim/tables/fuel_kg_s/h3/w2/v0</property>
      <property value="1.33361">fsim/tables/fuel_kg_s/h3/w2/v1</property>
      <property value="1.25881">fsim/tables/fuel_kg_s/h3/w2/v10</property>
      <property value="1.2928">fsim/tables/fuel_kg_s/h3/w2/v11</property>
      <property value="1.3324">fsim/tables/fuel_kg_s/h3/w2/v12</property>
      <property value="1.37686">fsim/tables/fuel_kg_s/h3/w2/v13</property>
      <property value="1.46134">fsim/tables/fuel_kg_s/h3/w2/v14</property>
      <property value="1.67184">fsim/tables/fuel_kg_s/h3/w2/v15</property>
      <property value="1.27995">fsim/tables/fuel_kg_s/h3/w2/v2</property>
      <property value="1.24042">fsim/tables/fuel_kg_s/h3/w2/v3</property>
      <property value="1.21573">fsim/tables/fuel_kg_s/h3/w2/v4</property>
      <property value="1.20142">fsim/tables/fuel_kg_s/h3/w2/v5</property>
      <property value="1.19429">fsim/tables/fuel_kg_s/h3/w2/v6</property>
      <property value="1.20294">fsim/tables/fuel_kg_s/h3/w2/v7</property>
      <property value="1.21334">fsim/tables/fuel_kg_s/h3/w2/v8</property>
      <property value="1.23616">fsim/tables/fuel_kg_s/h3/w2/v9</property>
      <property value="0.805722">fsim/tables/fuel_kg_s/h4/w0/v0</property>
      <property value="0.805736">fsim/tables/fuel_kg_s/h4/w0/v1</property>
      <property value="0.891607">fsim/tables/fuel_kg_s/h4/w0/v10</property>
      <property value="0.927112">fsim/tables/fuel_kg_s/h4/w0/v11</property>
      <property value="0.963533">fsim/tables/fuel_kg_s/h4/w0/v12</property>
      <property value="1.01125">fsim/tables/fuel_kg_s/h4/w0/v13</property>
      <property value="1.07344">fsim/tables/fuel_kg_s/h4/w0/v14</property>
      <property value="1.27812">fsim/tables/fuel_kg_s/h4/w0/v15</property>
      <property value="0.814307">fsim/tables/fuel_kg_s/h4/w0/v2</property>
      <property value="0.746068">fsim/tables/fuel_kg_s/h4/w0/v3</property>
      <property value="0.758879">fsim/tables/fuel_kg_s/h4/w0/v4</property>
      <property value="0.772902">fsim/tables/fuel_kg_s/h4/w0/v5</property>
      <property value="0.787246">fsim/tables/fuel_kg_s/h4/w0/v6</property>
      <property value="0.809944">fsim/tables/fuel_kg_s/h4/w0/v7</property>
      <property value="0.835624">fsim/tables/fuel_kg_s/h4/w0/v8</property>
      <property value="0.862162">fsim/tables/fuel_kg_s/h4/w0/v9</property>
      <property value="1.06723">fsim/tables/fuel_kg_s/h4/w1/v0</property>
      <property value="1.01892">fsim/tables/fuel_kg_s/h4/w1/v1</property>
      <property value="0.977374">fsim/tables/fuel_kg_s/h4/w1/v10</property>
      <property value="1.00369">fsim/tables/fuel_kg_s/h4/w1/v11</property>
      <property value="1.03321">fsim/tables/fuel_kg_s/h4/w1/v12</property>
      <property value="1.06796">fsim/tables/fuel_kg_s/h4/w1/v13</property>
      <property value="1.13022">fsim/tables/fuel_kg_s/h4/w1/v14</property>
      <property value="1.28854">fsim/tables/fuel_kg_s/h4/w1/v15</property>
      <property value="0.974409">fsim/tables/fuel_kg_s/h4/w1/v2</property>
      <property value="0.952779">fsim/tables/fuel_kg_s/h4/w1/v3</property>
      <property value="0.936904">fsim/tables/fuel_kg_s/h4/w1/v4</property>
      <property value="0.930578">fsim/tables/fuel_kg_s/h4/w1/v5</property>
      <property value="0.928291">fsim/tables/fuel_kg_s/h4/w1/v6</property>
      <property value="0.934225">fsim/tables/fuel_kg_s/h4/w1/v7</property>
      <property value="0.944067">fsim/tables/fuel_kg_s/h4/w1/v8</property>
      <property value="0.960789">fsim/tables/fuel_kg_s/h4/w1/v9</property>
      <property value="1.60027">fsim/tables/fuel_kg_s/h4/w2/v0</property>
      <property value="1.23912">fsim/tables/fuel_kg_s/h4/w2/v1</property>
      <property value="1.12801">fsim/tables/fuel_kg_s/h4/w2/v10</property>
      <property value="1.14382">fsim/tables/fuel_kg_s/h4/w2/v11</property>
      <property value="1.15984">fsim/tables/fuel_kg_s/h4/w2/v12</property>
      <property value="1.18318">fsim/tables/fuel_kg_s/h4/w2/v13</property>
      <property value="1.23338">fsim/tables/fuel_kg_s/h4/w2/v14</property>
      <property value="1.30797">fsim/tables/fuel_kg_s/h4/w2/v15</property>
      <property value="1.22732">fsim/tables/fuel_kg_s/h4/w2/v2</property>
      <property value="1.18823">fsim/tables/fuel_kg_s/h4/w2/v3</property>
      <property value="1.15965">fsim/tables/fuel_kg_s/h4/w2/v4</property>
      <property value="1.1399">fsim/tables/fuel_kg_s/h4/w2/v5</property>
      <property value="1.12466">fsim/tables/fuel_kg_s/h4/w2/v6</property>
      <property value="1.11775">fsim/tables/fuel_kg_s/h4/w2/v7</property>
      <property value="1.1166">fsim/tables/fuel_kg_s/h4/w2/v8</property>
      <property value="1.12121">fsim/tables/fuel_kg_s/h4/w2/v9</property>
      <property value="0.735142">fsim/tables/fuel_kg_s/h5/w0/v0</property>
      <property value="0.751123">fsim/tables/fuel_kg_s/h5/w0/v1</property>
      <property value="0.791218">fsim/tables/fuel_kg_s/h5/w0/v10</property>
      <property value="0.812554">fsim/tables/fuel_kg_s/h5/w0/v11</property>
      <property value="0.837558">fsim/tables/fuel_kg_s/h5/w0/v12</property>
      <property value="0.875998">fsim/tables/fuel_kg_s/h5/w0/v13</property>
      <property value="0.922947">fsim/tables/fuel_kg_s/h5/w0/v14</property>
      <property value="1.05555">fsim/tables/fuel_kg_s/h5/w0/v15</property>
      <property value="0.76186">fsim/tables/fuel_kg_s/h5/w0/v2</property>
      <property value="0.74744">fsim/tables/fuel_kg_s/h5/w0/v3</property>
      <property value="0.70488">fsim/tables/fuel_kg_s/h5/w0/v4</property>
      <property value="0.713747">fsim/tables/fuel_kg_s/h5/w0/v5</property>
      <property value="0.72458">fsim/tables/fuel_kg_s/h5/w0/v6</property>
      <property value="0.735576">fsim/tables/fuel_kg_s/h5/w0/v7</property>
      <property value="0.751291">fsim/tables/fuel_kg_s/h5/w0/v8</property>
      <property value="0.770386">fsim/tables/fuel_kg_s/h5/w0/v9</property>
      <property value="0.991338">fsim/tables/fuel_kg_s/h5/w1/v1</property>
      <property value="0.900866">fsim/tables/fuel_kg_s/h5/w1/v10</property>
      <property value="0.913952">fsim/tables/fuel_kg_s/h5/w1/v11</property>
      <property value="0.929209">fsim/tables/fuel_kg_s/h5/w1/v12</property>
      <property value="0.953818">fsim/tables/fuel_kg_s/h5/w1/v13</property>
      <property value="0.995764">fsim/tables/fuel_kg_s/h5/w1/v14</property>
      <property value="1.0665">fsim/tables/fuel_kg_s/h5/w1/v15</property>
      <property value="0.95433">fsim/tables/fuel_kg_s/h5/w1/v2</property>
      <property value="0.923265">fsim/tables/fuel_kg_s/h5/w1/v3</property>
      <property value="0.903639">fsim/tables/fuel_kg_s/h5/w1/v4</property>
      <property value="0.889518">fsim/tables/fuel_kg_s/h5/w1/v5</property>
      <property value="0.884251">fsim/tables/fuel_kg_s/h5/w1/v6</property>
      <property value="0.880285">fsim/tables/fuel_kg_s/h5/w1/v7</property>
      <property value="0.884476">fsim/tables/fuel_kg_s/h5/w1/v8</property>
      <property value="0.888178">fsim/tables/fuel_kg_s/h5/w1/v9</property>
      <property value="1.10346">fsim/tables/fuel_kg_s/h5/w2/v0</property>
      <property value="1.128">fsim/tables/fuel_kg_s/h5/w2/v1</property>
      <property value="1.07384">fsim/tables/fuel_kg_s/h5/w2/v10</property>
      <property value="1.07932">fsim/tables/fuel_kg_s/h5/w2/v11</property>
      <property value="1.08869">fsim/tables/fuel_kg_s/h5/w2/v12</property>
      <property value="1.10556">fsim/tables/fuel_kg_s/h5/w2/v13</property>
      <property value="1.12763">fsim/tables/fuel_kg_s/h5/w2/v14</property>
      <property value="1.1538">fsim/tables/fuel_kg_s/h5/w2/v15</property>
      <property value="1.116">fsim/tables/fuel_kg_s/h5/w2/v2</property>
      <property value="1.10472">fsim/tables/fuel_kg_s/h5/w2/v3</property>
      <property value="1.09196">fsim/tables/fuel_kg_s/h5/w2/v4</property>
      <property value="1.08284">fsim/tables/fuel_kg_s/h5/w2/v5</property>
      <property value="1.07752">fsim/tables/fuel_kg_s/h5/w2/v6</property>
      <property value="1.07091">fsim/tables/fuel_kg_s/h5/w2/v7</property>
      <property value="1.07067">fsim/tables/fuel_kg_s/h5/w2/v8</property>
      <property value="1.07231">fsim/tables/fuel_kg_s/h5/w2/v9</property>
      <property value="0.697125">fsim/tables/fuel_kg_s/h6/w0/v0</property>
      <property value="0.69912">fsim/tables/fuel_kg_s/h6/w0/v1</property>
      <property value="0.710037">fsim/tables/fuel_kg_s/h6/w0/v10</property>
      <property value="0.724296">fsim/tables/fuel_kg_s/h6/w0/v11</property>
      <property value="0.74043">fsim/tables/fuel_kg_s/h6/w0/v12</property>
      <property value="0.76649">fsim/tables/fuel_kg_s/h6/w0/v13</property>
      <property value="0.797976">fsim/tables/fuel_kg_s/h6/w0/v14</property>
      <property value="0.876598">fsim/tables/fuel_kg_s/h6/w0/v15</property>
      <property value="0.701141">fsim/tables/fuel_kg_s/h6/w0/v2</property>
      <property value="0.705774">fsim/tables/fuel_kg_s/h6/w0/v3</property>
      <property value="0.660847">fsim/tables/fuel_kg_s/h6/w0/v4</property>
      <property value="0.665744">fsim/tables/fuel_kg_s/h6/w0/v5</property>
      <property value="0.671088">fsim/tables/fuel_kg_s/h6/w0/v6</property>
      <property value="0.679133">fsim/tables/fuel_kg_s/h6/w0/v7</property>
      <property value="0.687245">fsim/tables/fuel_kg_s/h6/w0/v8</property>
      <property value="0.696062">fsim/tables/fuel_kg_s/h6/w0/v9</property>
      <property value="1.08891">fsim/tables/fuel_kg_s/h6/w1/v0</property>
      <property value="0.999199">fsim/tables/fuel_kg_s/h6/w1/v1</property>
      <property value="0.845704">fsim/tables/fuel_kg_s/h6/w1/v10</property>
      <property value="0.850513">fsim/tables/fuel_kg_s/h6/w1/v11</property>
      <property value="0.860344">fsim/tables/fuel_kg_s/h6/w1/v12</property>
      <property value="0.872183">fsim/tables/fuel_kg_s/h6/w1/v13</property>
      <property value="0.896522">fsim/tables/fuel_kg_s/h6/w1/v14</property>
      <property value="0.929362">fsim/tables/fuel_kg_s/h6/w1/v15</property>
      <property value="0.890152">fsim/tables/fuel_kg_s/h6/w1/v2</property>
      <property value="0.887545">fsim/tables/fuel_kg_s/h6/w1/v3</property>
      <property value="0.878068">fsim/tables/fuel_kg_s/h6/w1/v4</property>
      <property value="0.865143">fsim/tables/fuel_kg_s/h6/w1/v5</property>
      <property value="0.852653">fsim/tables/fuel_kg_s/h6/w1/v6</property>
      <property value="0.848316">fsim/tables/fuel_kg_s/h6/w1/v7</property>
      <property value="0.843129">fsim/tables/fuel_kg_s/h6/w1/v8</property>
      <property value="0.843999">fsim/tables/fuel_kg_s/h6/w1/v9</property>
      <property value="1.05004">fsim/tables/fuel_kg_s/h6/w2/v0</property>
      <property value="1.05116">fsim/tables/fuel_kg_s/h6/w2/v1</property>
      <property value="1.03877">fsim/tables/fuel_kg_s/h6/w2/v10</property>
      <property value="1.04083">fsim/tables/fuel_kg_s/h6/w2/v11</property>
      <property value="1.04533">fsim/tables/fuel_kg_s/h6/w2/v12</property>
      <property value="1.05096">fsim/tables/fuel_kg_s/h6/w2/v13</property>
      <property value="1.0597">fsim/tables/fuel_kg_s/h6/w2/v14</property>
      <property value="1.06869">fsim/tables/fuel_kg_s/h6/w2/v15</property>
      <property value="1.05004">fsim/tables/fuel_kg_s/h6/w2/v2</property>
      <property value="1.04791">fsim/tables/fuel_kg_s/h6/w2/v3</property>
      <property value="1.04524">fsim/tables/fuel_kg_s/h6/w2/v4</property>
      <property value="1.04223">fsim/tables/fuel_kg_s/h6/w2/v5</property>
      <property value="1.04037">fsim/tables/fuel_kg_s/h6/w2/v6</property>
      <property value="1.03819">fsim/tables/fuel_kg_s/h6/w2/v7</property>
      <property value="1.03829">fsim/tables/fuel_kg_s/h6/w2/v8</property>
      <property value="1.03852">fsim/tables/fuel_kg_s/h6/w2/v9</property>
      <property value="55.0445">fsim/tables/max_climb_ms/h0/w0</property>
      <property value="40.2082">fsim/tables/max_climb_ms/h0/w1</property>
      <property value="31.2834">fsim/tables/max_climb_ms/h0/w2</property>
      <property value="44.4438">fsim/tables/max_climb_ms/h1/w0</property>
      <property value="32.5209">fsim/tables/max_climb_ms/h1/w1</property>
      <property value="25.0337">fsim/tables/max_climb_ms/h1/w2</property>
      <property value="34.6171">fsim/tables/max_climb_ms/h2/w0</property>
      <property value="25.0547">fsim/tables/max_climb_ms/h2/w1</property>
      <property value="18.9369">fsim/tables/max_climb_ms/h2/w2</property>
      <property value="23.8235">fsim/tables/max_climb_ms/h3/w0</property>
      <property value="16.4934">fsim/tables/max_climb_ms/h3/w1</property>
      <property value="11.831">fsim/tables/max_climb_ms/h3/w2</property>
      <property value="17.4536">fsim/tables/max_climb_ms/h4/w0</property>
      <property value="11.432">fsim/tables/max_climb_ms/h4/w1</property>
      <property value="7.40949">fsim/tables/max_climb_ms/h4/w2</property>
      <property value="13.4641">fsim/tables/max_climb_ms/h5/w0</property>
      <property value="8.07949">fsim/tables/max_climb_ms/h5/w1</property>
      <property value="4.35694">fsim/tables/max_climb_ms/h5/w2</property>
      <property value="10.0735">fsim/tables/max_climb_ms/h6/w0</property>
      <property value="5.19024">fsim/tables/max_climb_ms/h6/w1</property>
      <property value="1.67049">fsim/tables/max_climb_ms/h6/w2</property>
      <property value="295.869">fsim/tables/max_tas_ms/h0/w0</property>
      <property value="295.418">fsim/tables/max_tas_ms/h0/w1</property>
      <property value="295.093">fsim/tables/max_tas_ms/h0/w2</property>
      <property value="291.72">fsim/tables/max_tas_ms/h1/w0</property>
      <property value="291.147">fsim/tables/max_tas_ms/h1/w1</property>
      <property value="290.85">fsim/tables/max_tas_ms/h1/w2</property>
      <property value="285.717">fsim/tables/max_tas_ms/h2/w0</property>
      <property value="285.341">fsim/tables/max_tas_ms/h2/w1</property>
      <property value="284.939">fsim/tables/max_tas_ms/h2/w2</property>
      <property value="278.185">fsim/tables/max_tas_ms/h3/w0</property>
      <property value="277.616">fsim/tables/max_tas_ms/h3/w1</property>
      <property value="276.609">fsim/tables/max_tas_ms/h3/w2</property>
      <property value="271.527">fsim/tables/max_tas_ms/h4/w0</property>
      <property value="270.362">fsim/tables/max_tas_ms/h4/w1</property>
      <property value="268.921">fsim/tables/max_tas_ms/h4/w2</property>
      <property value="266.43">fsim/tables/max_tas_ms/h5/w0</property>
      <property value="264.858">fsim/tables/max_tas_ms/h5/w1</property>
      <property value="262.447">fsim/tables/max_tas_ms/h5/w2</property>
      <property value="261.295">fsim/tables/max_tas_ms/h6/w0</property>
      <property value="258.937">fsim/tables/max_tas_ms/h6/w1</property>
      <property value="255.151">fsim/tables/max_tas_ms/h6/w2</property>
      <property value="130.643">fsim/tables/min_tas_ms/h0/w0</property>
      <property value="122.978">fsim/tables/min_tas_ms/h0/w1</property>
      <property value="106.063">fsim/tables/min_tas_ms/h0/w2</property>
      <property value="113.154">fsim/tables/min_tas_ms/h1/w0</property>
      <property value="107.576">fsim/tables/min_tas_ms/h1/w1</property>
      <property value="113.998">fsim/tables/min_tas_ms/h1/w2</property>
      <property value="126.559">fsim/tables/min_tas_ms/h2/w0</property>
      <property value="118.027">fsim/tables/min_tas_ms/h2/w1</property>
      <property value="122.728">fsim/tables/min_tas_ms/h2/w2</property>
      <property value="141.231">fsim/tables/min_tas_ms/h3/w0</property>
      <property value="130.27">fsim/tables/min_tas_ms/h3/w1</property>
      <property value="137.222">fsim/tables/min_tas_ms/h3/w2</property>
      <property value="152.372">fsim/tables/min_tas_ms/h4/w0</property>
      <property value="139.369">fsim/tables/min_tas_ms/h4/w1</property>
      <property value="148.517">fsim/tables/min_tas_ms/h4/w2</property>
      <property value="159.805">fsim/tables/min_tas_ms/h5/w0</property>
      <property value="145.606">fsim/tables/min_tas_ms/h5/w1</property>
      <property value="178.877">fsim/tables/min_tas_ms/h5/w2</property>
      <property value="167.361">fsim/tables/min_tas_ms/h6/w0</property>
      <property value="155.017">fsim/tables/min_tas_ms/h6/w1</property>
      <property value="213.199">fsim/tables/min_tas_ms/h6/w2</property>
      <property value="43.4133">fsim/tables/ps_full_ms/h0/w0/v0</property>
      <property value="46.8921">fsim/tables/ps_full_ms/h0/w0/v1</property>
      <property value="51.9772">fsim/tables/ps_full_ms/h0/w0/v10</property>
      <property value="49.9021">fsim/tables/ps_full_ms/h0/w0/v11</property>
      <property value="47.2637">fsim/tables/ps_full_ms/h0/w0/v12</property>
      <property value="44.0723">fsim/tables/ps_full_ms/h0/w0/v13</property>
      <property value="39.0355">fsim/tables/ps_full_ms/h0/w0/v14</property>
      <property value="31.1777">fsim/tables/ps_full_ms/h0/w0/v15</property>
      <property value="49.4441">fsim/tables/ps_full_ms/h0/w0/v2</property>
      <property value="51.3234">fsim/tables/ps_full_ms/h0/w0/v3</property>
      <property value="52.7811">fsim/tables/ps_full_ms/h0/w0/v4</property>
      <property value="53.9483">fsim/tables/ps_full_ms/h0/w0/v5</property>
      <property value="54.7758">fsim/tables/ps_full_ms/h0/w0/v6</property>
      <property value="55.035">fsim/tables/ps_full_ms/h0/w0/v7</property>
      <property value="54.5272">fsim/tables/ps_full_ms/h0/w0/v8</property>
      <property value="53.487">fsim/tables/ps_full_ms/h0/w0/v9</property>
      <property value="29.021">fsim/tables/ps_full_ms/h0/w1/v0</property>
      <property value="31.8949">fsim/tables/ps_full_ms/h0/w1/v1</property>
      <property value="38.4778">fsim/tables/ps_full_ms/h0/w1/v10</property>
      <property value="36.9503">fsim/tables/ps_full_ms/h0/w1/v11</property>
      <property value="34.9536">fsim/tables/ps_full_ms/h0/w1/v12</property>
      <property value="32.5127">fsim/tables/ps_full_ms/h0/w1/v13</property>
      <property value="28.861">fsim/tables/ps_full_ms/h0/w1/v14</property>
      <property value="22.9634">fsim/tables/ps_full_ms/h0/w1/v15</property>
      <property value="34.6148">fsim/tables/ps_full_ms/h0/w1/v2</property>
      <property value="36.3367">fsim/tables/ps_full_ms/h0/w1/v3</property>
      <property value="37.7272">fsim/tables/ps_full_ms/h0/w1/v4</property>
      <property value="38.8931">fsim/tables/ps_full_ms/h0/w1/v5</property>
      <property value="39.6599">fsim/tables/ps_full_ms/h0/w1/v6</property>
      <property value="40.129">fsim/tables/ps_full_ms/h0/w1/v7</property>
      <property value="40.1099">fsim/tables/ps_full_ms/h0/w1/v8</property>
      <property value="39.566">fsim/tables/ps_full_ms/h0/w1/v9</property>
      <property value="18.1366">fsim/tables/ps_full_ms/h0/w2/v0</property>
      <property value="20.5585">fsim/tables/ps_full_ms/h0/w2/v1</property>
      <property value="30.434">fsim/tables/ps_full_ms/h0/w2/v10</property>
      <property value="29.4905">fsim/tables/ps_full_ms/h0/w2/v11</property>
      <property value="27.9231">fsim/tables/ps_full_ms/h0/w2/v12</property>
      <property value="25.8658">fsim/tables/ps_full_ms/h0/w2/v13</property>
      <property value="23.0073">fsim/tables/ps_full_ms/h0/w2/v14</property>
      <property value="17.8825">fsim/tables/ps_full_ms/h0/w2/v15</property>
      <property value="23.7199">fsim/tables/ps_full_ms/h0/w2/v2</property>
      <property value="25.8596">fsim/tables/ps_full_ms/h0/w2/v3</property>
      <property value="27.5813">fsim/tables/ps_full_ms/h0/w2/v4</property>
      <property value="29.0137">fsim/tables/ps_full_ms/h0/w2/v5</property>
      <property value="30.0751">fsim/tables/ps_full_ms/h0/w2/v6</property>
      <property value="30.8419">fsim/tables/ps_full_ms/h0/w2/v7</property>
      <property value="31.277">fsim/tables/ps_full_ms/h0/w2/v8</property>
      <property value="31.0418">fsim/tables/ps_full_ms/h0/w2/v9</property>
      <property value="28.7764">fsim/tables/ps_full_ms/h1/w0/v0</property>
      <property value="32.5124">fsim/tables/ps_full_ms/h1/w0/v1</property>
      <property value="44.4415">fsim/tables/ps_full_ms/h1/w0/v10</property>
      <property value="44.2731">fsim/tables/ps_full_ms/h1/w0/v11</property>
      <property value="43.7089">fsim/tables/ps_full_ms/h1/w0/v12</property>
      <property value="42.765">fsim/tables/ps_full_ms/h1/w0/v13</property>
      <property value="39.3988">fsim/tables/ps_full_ms/h1/w0/v14</property>
      <property value="29.6435">fsim/tables/ps_full_ms/h1/w0/v15</property>
      <property value="34.9735">fsim/tables/ps_full_ms/h1/w0/v2</property>
      <property value="37.3699">fsim/tables/ps_full_ms/h1/w0/v3</property>
      <property value="39.3897">fsim/tables/ps_full_ms/h1/w0/v4</property>
      <property value="40.6985">fsim/tables/ps_full_ms/h1/w0/v5</property>
      <property value="41.8651">fsim/tables/ps_full_ms/h1/w0/v6</property>
      <property value="42.817">fsim/tables/ps_full_ms/h1/w0/v7</property>
      <property value="43.6288">fsim/tables/ps_full_ms/h1/w0/v8</property>
      <property value="44.2489">fsim/tables/ps_full_ms/h1/w0/v9</property>
      <property value="16.3147">fsim/tables/ps_full_ms/h1/w1/v0</property>
      <property value="21.0562">fsim/tables/ps_full_ms/h1/w1/v1</property>
      <property value="32.4203">fsim/tables/ps_full_ms/h1/w1/v10</property>
      <property value="32.5123">fsim/tables/ps_full_ms/h1/w1/v11</property>
      <property value="32.0995">fsim/tables/ps_full_ms/h1/w1/v12</property>
      <property value="31.3242">fsim/tables/ps_full_ms/h1/w1/v13</property>
      <property value="28.9984">fsim/tables/ps_full_ms/h1/w1/v14</property>
      <property value="22.9638">fsim/tables/ps_full_ms/h1/w1/v15</property>
      <property value="23.4091">fsim/tables/ps_full_ms/h1/w1/v2</property>
      <property value="25.4477">fsim/tables/ps_full_ms/h1/w1/v3</property>
      <property value="27.1215">fsim/tables/ps_full_ms/h1/w1/v4</property>
      <property value="28.6531">fsim/tables/ps_full_ms/h1/w1/v5</property>
      <property value="29.8574">fsim/tables/ps_full_ms/h1/w1/v6</property>
      <property value="30.8268">fsim/tables/ps_full_ms/h1/w1/v7</property>
      <property value="31.5369">fsim/tables/ps_full_ms/h1/w1/v8</property>
      <property value="32.0824">fsim/tables/ps_full_ms/h1/w1/v9</property>
      <property value="13.5562">fsim/tables/ps_full_ms/h1/w2/v0</property>
      <property value="15.7362">fsim/tables/ps_full_ms/h1/w2/v1</property>
      <property value="25.0117">fsim/tables/ps_full_ms/h1/w2/v10</property>
      <property value="24.9946">fsim/tables/ps_full_ms/h1/w2/v11</property>
      <property value="24.7692">fsim/tables/ps_full_ms/h1/w2/v12</property>
      <property value="24.3378">fsim/tables/ps_full_ms/h1/w2/v13</property>
      <property value="22.4678">fsim/tables/ps_full_ms/h1/w2/v14</property>
      <property value="18.2249">fsim/tables/ps_full_ms/h1/w2/v15</property>
      <property value="17.7081">fsim/tables/ps_full_ms/h1/w2/v2</property>
      <property value="19.3275">fsim/tables/ps_full_ms/h1/w2/v3</property>
      <property value="20.7655">fsim/tables/ps_full_ms/h1/w2/v4</property>
      <property value="21.9865">fsim/tables/ps_full_ms/h1/w2/v5</property>
      <property value="22.983">fsim/tables/ps_full_ms/h1/w2/v6</property>
      <property value="23.7345">fsim/tables/ps_full_ms/h1/w2/v7</property>
      <property value="24.3026">fsim/tables/ps_full_ms/h1/w2/v8</property>
      <property value="24.83">fsim/tables/ps_full_ms/h1/w2/v9</property>
      <property value="18.8708">fsim/tables/ps_full_ms/h2/w0/v0</property>
      <property value="25.0436">fsim/tables/ps_full_ms/h2/w0/v1</property>
      <property value="34.2776">fsim/tables/ps_full_ms/h2/w0/v10</property>
      <property value="34.5769">fsim/tables/ps_full_ms/h2/w0/v11</property>
      <property value="34.606">fsim/tables/ps_full_ms/h2/w0/v12</property>
      <property value="34.3647">fsim/tables/ps_full_ms/h2/w0/v13</property>
      <property value="32.3216">fsim/tables/ps_full_ms/h2/w0/v14</property>
      <property value="23.3103">fsim/tables/ps_full_ms/h2/w0/v15</property>
      <property value="26.5421">fsim/tables/ps_full_ms/h2/w0/v2</property>
      <property value="28.06">fsim/tables/ps_full_ms/h2/w0/v3</property>
      <property value="29.2813">fsim/tables/ps_full_ms/h2/w0/v4</property>
      <property value="30.4015">fsim/tables/ps_full_ms/h2/w0/v5</property>
      <property value="31.2994">fsim/tables/ps_full_ms/h2/w0/v6</property>
      <property value="32.0565">fsim/tables/ps_full_ms/h2/w0/v7</property>
      <property value="32.9157">fsim/tables/ps_full_ms/h2/w0/v8</property>
      <property value="33.662">fsim/tables/ps_full_ms/h2/w0/v9</property>
      <property value="10.404">fsim/tables/ps_full_ms/h2/w1/v0</property>
      <property value="15.6534">fsim/tables/ps_full_ms/h2/w1/v1</property>
      <property value="24.5072">fsim/tables/ps_full_ms/h2/w1/v10</property>
      <property value="24.8304">fsim/tables/ps_full_ms/h2/w1/v11</property>
      <property value="25.012">fsim/tables/ps_full_ms/h2/w1/v12</property>
      <property value="25.0495">fsim/tables/ps_full_ms/h2/w1/v13</property>
      <property value="23.6037">fsim/tables/ps_full_ms/h2/w1/v14</property>
      <property value="17.3774">fsim/tables/ps_full_ms/h2/w1/v15</property>
      <property value="16.9225">fsim/tables/ps_full_ms/h2/w1/v2</property>
      <property value="18.3111">fsim/tables/ps_full_ms/h2/w1/v3</property>
      <property value="19.5989">fsim/tables/ps_full_ms/h2/w1/v4</property>
      <property value="20.7393">fsim/tables/ps_full_ms/h2/w1/v5</property>
      <property value="21.6862">fsim/tables/ps_full_ms/h2/w1/v6</property>
      <property value="22.43">fsim/tables/ps_full_ms/h2/w1/v7</property>
      <property value="23.2324">fsim/tables/ps_full_ms/h2/w1/v8</property>
      <property value="24.0092">fsim/tables/ps_full_ms/h2/w1/v9</property>
      <property value="9.11199">fsim/tables/ps_full_ms/h2/w2/v0</property>
      <property value="10.5402">fsim/tables/ps_full_ms/h2/w2/v1</property>
      <property value="18.4695">fsim/tables/ps_full_ms/h2/w2/v10</property>
      <property value="18.8457">fsim/tables/ps_full_ms/h2/w2/v11</property>
      <property value="18.9322">fsim/tables/ps_full_ms/h2/w2/v12</property>
      <property value="18.9107">fsim/tables/ps_full_ms/h2/w2/v13</property>
      <property value="17.8693">fsim/tables/ps_full_ms/h2/w2/v14</property>
      <property value="13.6467">fsim/tables/ps_full_ms/h2/w2/v15</property>
      <property value="11.9338">fsim/tables/ps_full_ms/h2/w2/v2</property>
      <property value="13.1586">fsim/tables/ps_full_ms/h2/w2/v3</property>
      <property value="14.2177">fsim/tables/ps_full_ms/h2/w2/v4</property>
      <property value="15.1562">fsim/tables/ps_full_ms/h2/w2/v5</property>
      <property value="15.9648">fsim/tables/ps_full_ms/h2/w2/v6</property>
      <property value="16.6064">fsim/tables/ps_full_ms/h2/w2/v7</property>
      <property value="17.429">fsim/tables/ps_full_ms/h2/w2/v8</property>
      <property value="18">fsim/tables/ps_full_ms/h2/w2/v9</property>
      <property value="11.0197">fsim/tables/ps_full_ms/h3/w0/v0</property>
      <property value="17.4016">fsim/tables/ps_full_ms/h3/w0/v1</property>
      <property value="23.5719">fsim/tables/ps_full_ms/h3/w0/v10</property>
      <property value="23.7651">fsim/tables/ps_full_ms/h3/w0/v11</property>
      <property value="23.8235">fsim/tables/ps_full_ms/h3/w0/v12</property>
      <property value="23.6518">fsim/tables/ps_full_ms/h3/w0/v13</property>
      <property value="22.8019">fsim/tables/ps_full_ms/h3/w0/v14</property>
      <property value="16.3016">fsim/tables/ps_full_ms/h3/w0/v15</property>
      <property value="17.8384">fsim/tables/ps_full_ms/h3/w0/v2</property>
      <property value="19.1138">fsim/tables/ps_full_ms/h3/w0/v3</property>
      <property value="20.353">fsim/tables/ps_full_ms/h3/w0/v4</property>
      <property value="21.1364">fsim/tables/ps_full_ms/h3/w0/v5</property>
      <property value="21.7491">fsim/tables/ps_full_ms/h3/w0/v6</property>
      <property value="22.3995">fsim/tables/ps_full_ms/h3/w0/v7</property>
      <property value="22.982">fsim/tables/ps_full_ms/h3/w0/v8</property>
      <property value="23.3503">fsim/tables/ps_full_ms/h3/w0/v9</property>
      <property value="10.3063">fsim/tables/ps_full_ms/h3/w1/v0</property>
      <property value="9.7213">fsim/tables/ps_full_ms/h3/w1/v1</property>
      <property value="16.1559">fsim/tables/ps_full_ms/h3/w1/v10</property>
      <property value="16.4267">fsim/tables/ps_full_ms/h3/w1/v11</property>
      <property value="16.4866">fsim/tables/ps_full_ms/h3/w1/v12</property>
      <property value="16.3968">fsim/tables/ps_full_ms/h3/w1/v13</property>
      <property value="15.8743">fsim/tables/ps_full_ms/h3/w1/v14</property>
      <property value="11.806">fsim/tables/ps_full_ms/h3/w1/v15</property>
      <property value="10.9105">fsim/tables/ps_full_ms/h3/w1/v2</property>
      <property value="11.9122">fsim/tables/ps_full_ms/h3/w1/v3</property>
      <property value="12.7498">fsim/tables/ps_full_ms/h3/w1/v4</property>
      <property value="13.4599">fsim/tables/ps_full_ms/h3/w1/v5</property>
      <property value="14.0905">fsim/tables/ps_full_ms/h3/w1/v6</property>
      <property value="14.7128">fsim/tables/ps_full_ms/h3/w1/v7</property>
      <property value="15.3624">fsim/tables/ps_full_ms/h3/w1/v8</property>
      <property value="15.8247">fsim/tables/ps_full_ms/h3/w1/v9</property>
      <property value="4.995">fsim/tables/ps_full_ms/h3/w2/v0</property>
      <property value="5.95204">fsim/tables/ps_full_ms/h3/w2/v1</property>
      <property value="11.4272">fsim/tables/ps_full_ms/h3/w2/v10</property>
      <property value="11.6584">fsim/tables/ps_full_ms/h3/w2/v11</property>
      <property value="11.7771">fsim/tables/ps_full_ms/h3/w2/v12</property>
      <property value="11.827">fsim/tables/ps_full_ms/h3/w2/v13</property>
      <property value="11.4931">fsim/tables/ps_full_ms/h3/w2/v14</property>
      <property value="9.17955">fsim/tables/ps_full_ms/h3/w2/v15</property>
      <property value="6.8649">fsim/tables/ps_full_ms/h3/w2/v2</property>
      <property value="7.67169">fsim/tables/ps_full_ms/h3/w2/v3</property>
      <property value="8.36627">fsim/tables/ps_full_ms/h3/w2/v4</property>
      <property value="8.96456">fsim/tables/ps_full_ms/h3/w2/v5</property>
      <property value="9.53054">fsim/tables/ps_full_ms/h3/w2/v6</property>
      <property value="10.0914">fsim/tables/ps_full_ms/h3/w2/v7</property>
      <property value="10.6306">fsim/tables/ps_full_ms/h3/w2/v8</property>
      <property value="11.0292">fsim/tables/ps_full_ms/h3/w2/v9</property>
      <property value="6.43604">fsim/tables/ps_full_ms/h4/w0/v0</property>
      <property value="12.2594">fsim/tables/ps_full_ms/h4/w0/v1</property>
      <property value="17.4258">fsim/tables/ps_full_ms/h4/w0/v10</property>
      <property value="17.4535">fsim/tables/ps_full_ms/h4/w0/v11</property>
      <property value="17.4233">fsim/tables/ps_full_ms/h4/w0/v12</property>
      <property value="17.1983">fsim/tables/ps_full_ms/h4/w0/v13</property>
      <property value="16.7">fsim/tables/ps_full_ms/h4/w0/v14</property>
      <property value="12.4051">fsim/tables/ps_full_ms/h4/w0/v15</property>
      <property value="12.6241">fsim/tables/ps_full_ms/h4/w0/v2</property>
      <property value="13.48">fsim/tables/ps_full_ms/h4/w0/v3</property>
      <property value="14.6412">fsim/tables/ps_full_ms/h4/w0/v4</property>
      <property value="15.5459">fsim/tables/ps_full_ms/h4/w0/v5</property>
      <property value="16.0634">fsim/tables/ps_full_ms/h4/w0/v6</property>
      <property value="16.5878">fsim/tables/ps_full_ms/h4/w0/v7</property>
      <property value="16.9397">fsim/tables/ps_full_ms/h4/w0/v8</property>
      <property value="17.2273">fsim/tables/ps_full_ms/h4/w0/v9</property>
      <property value="4.45603">fsim/tables/ps_full_ms/h4/w1/v0</property>
      <property value="6.02649">fsim/tables/ps_full_ms/h4/w1/v1</property>
      <property value="11.1064">fsim/tables/ps_full_ms/h4/w1/v10</property>
      <property value="11.2939">fsim/tables/ps_full_ms/h4/w1/v11</property>
      <property value="11.3934">fsim/tables/ps_full_ms/h4/w1/v12</property>
      <property value="11.4176">fsim/tables/ps_full_ms/h4/w1/v13</property>
      <property value="11.0978">fsim/tables/ps_full_ms/h4/w1/v14</property>
      <property value="8.88649">fsim/tables/ps_full_ms/h4/w1/v15</property>
      <property value="6.87708">fsim/tables/ps_full_ms/h4/w1/v2</property>
      <property value="7.70625">fsim/tables/ps_full_ms/h4/w1/v3</property>
      <property value="8.33707">fsim/tables/ps_full_ms/h4/w1/v4</property>
      <property value="8.84453">fsim/tables/ps_full_ms/h4/w1/v5</property>
      <property value="9.39233">fsim/tables/ps_full_ms/h4/w1/v6</property>
      <property value="9.91283">fsim/tables/ps_full_ms/h4/w1/v7</property>
      <property value="10.3777">fsim/tables/ps_full_ms/h4/w1/v8</property>
      <property value="10.7427">fsim/tables/ps_full_ms/h4/w1/v9</property>
      <property value="1.89402">fsim/tables/ps_full_ms/h4/w2/v0</property>
      <property value="2.69182">fsim/tables/ps_full_ms/h4/w2/v1</property>
      <property value="6.93504">fsim/tables/ps_full_ms/h4/w2/v10</property>
      <property value="7.12489">fsim/tables/ps_full_ms/h4/w2/v11</property>
      <property value="7.30979">fsim/tables/ps_full_ms/h4/w2/v12</property>
      <property value="7.39621">fsim/tables/ps_full_ms/h4/w2/v13</property>
      <property value="7.22372">fsim/tables/ps_full_ms/h4/w2/v14</property>
      <property value="6.64611">fsim/tables/ps_full_ms/h4/w2/v15</property>
      <property value="3.36969">fsim/tables/ps_full_ms/h4/w2/v2</property>
      <property value="3.97109">fsim/tables/ps_full_ms/h4/w2/v3</property>
      <property value="4.48767">fsim/tables/ps_full_ms/h4/w2/v4</property>
      <property value="4.95444">fsim/tables/ps_full_ms/h4/w2/v5</property>
      <property value="5.47249">fsim/tables/ps_full_ms/h4/w2/v6</property>
      <property value="5.91751">fsim/tables/ps_full_ms/h4/w2/v7</property>
      <property value="6.30243">fsim/tables/ps_full_ms/h4/w2/v8</property>
      <property value="6.63266">fsim/tables/ps_full_ms/h4/w2/v9</property>
      <property value="3.32688">fsim/tables/ps_full_ms/h5/w0/v0</property>
      <property value="9.33771">fsim/tables/ps_full_ms/h5/w0/v1</property>
      <property value="13.3424">fsim/tables/ps_full_ms/h5/w0/v10</property>
      <property value="13.4379">fsim/tables/ps_full_ms/h5/w0/v11</property>
      <property value="13.4259">fsim/tables/ps_full_ms/h5/w0/v12</property>
      <property value="13.1781">fsim/tables/ps_full_ms/h5/w0/v13</property>
      <property value="12.7578">fsim/tables/ps_full_ms/h5/w0/v14</property>
      <property value="10.0705">fsim/tables/ps_full_ms/h5/w0/v15</property>
      <property value="9.57859">fsim/tables/ps_full_ms/h5/w0/v2</property>
      <property value="9.84106">fsim/tables/ps_full_ms/h5/w0/v3</property>
      <property value="10.9235">fsim/tables/ps_full_ms/h5/w0/v4</property>
      <property value="11.9293">fsim/tables/ps_full_ms/h5/w0/v5</property>
      <property value="12.4035">fsim/tables/ps_full_ms/h5/w0/v6</property>
      <property value="12.7956">fsim/tables/ps_full_ms/h5/w0/v7</property>
      <property value="13.0571">fsim/tables/ps_full_ms/h5/w0/v8</property>
      <property value="13.2196">fsim/tables/ps_full_ms/h5/w0/v9</property>
      <property value="2.56576">fsim/tables/ps_full_ms/h5/w1/v0</property>
      <property value="3.37096">fsim/tables/ps_full_ms/h5/w1/v1</property>
      <property value="7.67786">fsim/tables/ps_full_ms/h5/w1/v10</property>
      <property value="7.88926">fsim/tables/ps_full_ms/h5/w1/v11</property>
      <property value="8.05534">fsim/tables/ps_full_ms/h5/w1/v12</property>
      <property value="8.06589">fsim/tables/ps_full_ms/h5/w1/v13</property>
      <property value="7.87371">fsim/tables/ps_full_ms/h5/w1/v14</property>
      <property value="7.12106">fsim/tables/ps_full_ms/h5/w1/v15</property>
      <property value="3.86517">fsim/tables/ps_full_ms/h5/w1/v2</property>
      <property value="4.84009">fsim/tables/ps_full_ms/h5/w1/v3</property>
      <property value="5.35027">fsim/tables/ps_full_ms/h5/w1/v4</property>
      <property value="5.83325">fsim/tables/ps_full_ms/h5/w1/v5</property>
      <property value="6.29891">fsim/tables/ps_full_ms/h5/w1/v6</property>
      <property value="6.75221">fsim/tables/ps_full_ms/h5/w1/v7</property>
      <property value="7.09909">fsim/tables/ps_full_ms/h5/w1/v8</property>
      <property value="7.45722">fsim/tables/ps_full_ms/h5/w1/v9</property>
      <property value="1.57795">fsim/tables/ps_full_ms/h5/w2/v0</property>
      <property value="1.90522">fsim/tables/ps_full_ms/h5/w2/v1</property>
      <property value="4.08904">fsim/tables/ps_full_ms/h5/w2/v10</property>
      <property value="4.21185">fsim/tables/ps_full_ms/h5/w2/v11</property>
      <property value="4.33466">fsim/tables/ps_full_ms/h5/w2/v12</property>
      <property value="4.34979">fsim/tables/ps_full_ms/h5/w2/v13</property>
      <property value="4.31353">fsim/tables/ps_full_ms/h5/w2/v14</property>
      <property value="4.20761">fsim/tables/ps_full_ms/h5/w2/v15</property>
      <property value="2.23248">fsim/tables/ps_full_ms/h5/w2/v2</property>
      <property value="2.55974">fsim/tables/ps_full_ms/h5/w2/v3</property>
      <property value="2.887">fsim/tables/ps_full_ms/h5/w2/v4</property>
      <property value="3.14506">fsim/tables/ps_full_ms/h5/w2/v5</property>
      <property value="3.36726">fsim/tables/ps_full_ms/h5/w2/v6</property>
      <property value="3.58945">fsim/tables/ps_full_ms/h5/w2/v7</property>
      <property value="3.81165">fsim/tables/ps_full_ms/h5/w2/v8</property>
      <property value="3.96622">fsim/tables/ps_full_ms/h5/w2/v9</property>
      <property value="0.728418">fsim/tables/ps_full_ms/h6/w0/v0</property>
      <property value="6.70489">fsim/tables/ps_full_ms/h6/w0/v1</property>
      <property value="9.99967">fsim/tables/ps_full_ms/h6/w0/v10</property>
      <property value="10.0599">fsim/tables/ps_full_ms/h6/w0/v11</property>
      <property value="10.0735">fsim/tables/ps_full_ms/h6/w0/v12</property>
      <property value="9.94521">fsim/tables/ps_full_ms/h6/w0/v13</property>
      <property value="9.68804">fsim/tables/ps_full_ms/h6/w0/v14</property>
      <property value="8.19627">fsim/tables/ps_full_ms/h6/w0/v15</property>
      <property value="6.83576">fsim/tables/ps_full_ms/h6/w0/v2</property>
      <property value="7.09152">fsim/tables/ps_full_ms/h6/w0/v3</property>
      <property value="7.72556">fsim/tables/ps_full_ms/h6/w0/v4</property>
      <property value="8.68119">fsim/tables/ps_full_ms/h6/w0/v5</property>
      <property value="9.22413">fsim/tables/ps_full_ms/h6/w0/v6</property>
      <property value="9.4776">fsim/tables/ps_full_ms/h6/w0/v7</property>
      <property value="9.70874">fsim/tables/ps_full_ms/h6/w0/v8</property>
      <property value="9.91396">fsim/tables/ps_full_ms/h6/w0/v9</property>
      <property value="0.513386">fsim/tables/ps_full_ms/h6/w1/v0</property>
      <property value="1.05627">fsim/tables/ps_full_ms/h6/w1/v1</property>
      <property value="4.8214">fsim/tables/ps_full_ms/h6/w1/v10</property>
      <property value="5.00547">fsim/tables/ps_full_ms/h6/w1/v11</property>
      <property value="5.10755">fsim/tables/ps_full_ms/h6/w1/v12</property>
      <property value="5.19024">fsim/tables/ps_full_ms/h6/w1/v13</property>
      <property value="5.13676">fsim/tables/ps_full_ms/h6/w1/v14</property>
      <property value="4.91735">fsim/tables/ps_full_ms/h6/w1/v15</property>
      <property value="1.91884">fsim/tables/ps_full_ms/h6/w1/v2</property>
      <property value="2.44061">fsim/tables/ps_full_ms/h6/w1/v3</property>
      <property value="2.86855">fsim/tables/ps_full_ms/h6/w1/v4</property>
      <property value="3.29174">fsim/tables/ps_full_ms/h6/w1/v5</property>
      <property value="3.70894">fsim/tables/ps_full_ms/h6/w1/v6</property>
      <property value="4.01999">fsim/tables/ps_full_ms/h6/w1/v7</property>
      <property value="4.35226">fsim/tables/ps_full_ms/h6/w1/v8</property>
      <property value="4.58723">fsim/tables/ps_full_ms/h6/w1/v9</property>
      <property value="0.980811">fsim/tables/ps_full_ms/h6/w2/v0</property>
      <property value="1.05269">fsim/tables/ps_full_ms/h6/w2/v1</property>
      <property value="1.59786">fsim/tables/ps_full_ms/h6/w2/v10</property>
      <property value="1.41829">fsim/tables/ps_full_ms/h6/w2/v11</property>
      <property value="1.23872">fsim/tables/ps_full_ms/h6/w2/v12</property>
      <property value="1.05916">fsim/tables/ps_full_ms/h6/w2/v13</property>
      <property value="0.879589">fsim/tables/ps_full_ms/h6/w2/v14</property>
      <property value="0.700022">fsim/tables/ps_full_ms/h6/w2/v15</property>
      <property value="1.12456">fsim/tables/ps_full_ms/h6/w2/v2</property>
      <property value="1.19644">fsim/tables/ps_full_ms/h6/w2/v3</property>
      <property value="1.26831">fsim/tables/ps_full_ms/h6/w2/v4</property>
      <property value="1.34018">fsim/tables/ps_full_ms/h6/w2/v5</property>
      <property value="1.41206">fsim/tables/ps_full_ms/h6/w2/v6</property>
      <property value="1.48393">fsim/tables/ps_full_ms/h6/w2/v7</property>
      <property value="1.55581">fsim/tables/ps_full_ms/h6/w2/v8</property>
      <property value="1.62768">fsim/tables/ps_full_ms/h6/w2/v9</property>
      <property value="-6.8346">fsim/tables/ps_idle_ms/h0/w0/v0</property>
      <property value="-8.36204">fsim/tables/ps_idle_ms/h0/w0/v1</property>
      <property value="-37.9235">fsim/tables/ps_idle_ms/h0/w0/v10</property>
      <property value="-43.2856">fsim/tables/ps_idle_ms/h0/w0/v11</property>
      <property value="-49.1466">fsim/tables/ps_idle_ms/h0/w0/v12</property>
      <property value="-55.498">fsim/tables/ps_idle_ms/h0/w0/v13</property>
      <property value="-63.4075">fsim/tables/ps_idle_ms/h0/w0/v14</property>
      <property value="-74.6018">fsim/tables/ps_idle_ms/h0/w0/v15</property>
      <property value="-10.1719">fsim/tables/ps_idle_ms/h0/w0/v2</property>
      <property value="-12.3558">fsim/tables/ps_idle_ms/h0/w0/v3</property>
      <property value="-14.8899">fsim/tables/ps_idle_ms/h0/w0/v4</property>
      <property value="-17.7102">fsim/tables/ps_idle_ms/h0/w0/v5</property>
      <property value="-20.8621">fsim/tables/ps_idle_ms/h0/w0/v6</property>
      <property value="-24.5508">fsim/tables/ps_idle_ms/h0/w0/v7</property>
      <property value="-28.6151">fsim/tables/ps_idle_ms/h0/w0/v8</property>
      <property value="-33.0667">fsim/tables/ps_idle_ms/h0/w0/v9</property>
      <property value="-5.85767">fsim/tables/ps_idle_ms/h0/w1/v0</property>
      <property value="-6.69984">fsim/tables/ps_idle_ms/h0/w1/v1</property>
      <property value="-27.5678">fsim/tables/ps_idle_ms/h0/w1/v10</property>
      <property value="-31.652">fsim/tables/ps_idle_ms/h0/w1/v11</property>
      <property value="-36.1533">fsim/tables/ps_idle_ms/h0/w1/v12</property>
      <property value="-41.0462">fsim/tables/ps_idle_ms/h0/w1/v13</property>
      <property value="-46.957">fsim/tables/ps_idle_ms/h0/w1/v14</property>
      <property value="-55.5547">fsim/tables/ps_idle_ms/h0/w1/v15</property>
      <property value="-7.80636">fsim/tables/ps_idle_ms/h0/w1/v2</property>
      <property value="-9.13051">fsim/tables/ps_idle_ms/h0/w1/v3</property>
      <property value="-10.8698">fsim/tables/ps_idle_ms/h0/w1/v4</property>
      <property value="-12.7986">fsim/tables/ps_idle_ms/h0/w1/v5</property>
      <property value="-15.1536">fsim/tables/ps_idle_ms/h0/w1/v6</property>
      <property value="-17.7791">fsim/tables/ps_idle_ms/h0/w1/v7</property>
      <property value="-20.6641">fsim/tables/ps_idle_ms/h0/w1/v8</property>
      <property value="-23.863">fsim/tables/ps_idle_ms/h0/w1/v9</property>
      <property value="-5.82972">fsim/tables/ps_idle_ms/h0/w2/v0</property>
      <property value="-6.00519">fsim/tables/ps_idle_ms/h0/w2/v1</property>
      <property value="-20.9662">fsim/tables/ps_idle_ms/h0/w2/v10</property>
      <property value="-24.1679">fsim/tables/ps_idle_ms/h0/w2/v11</property>
      <property value="-27.9398">fsim/tables/ps_idle_ms/h0/w2/v12</property>
      <property value="-32.154">fsim/tables/ps_idle_ms/h0/w2/v13</property>
      <property value="-37.0597">fsim/tables/ps_idle_ms/h0/w2/v14</property>
      <property value="-44.0105">fsim/tables/ps_idle_ms/h0/w2/v15</property>
      <property value="-6.46853">fsim/tables/ps_idle_ms/h0/w2/v2</property>
      <property value="-7.23641">fsim/tables/ps_idle_ms/h0/w2/v3</property>
      <property value="-8.25715">fsim/tables/ps_idle_ms/h0/w2/v4</property>
      <property value="-9.5867">fsim/tables/ps_idle_ms/h0/w2/v5</property>
      <property value="-11.1905">fsim/tables/ps_idle_ms/h0/w2/v6</property>
      <property value="-13.1445">fsim/tables/ps_idle_ms/h0/w2/v7</property>
      <property value="-15.3998">fsim/tables/ps_idle_ms/h0/w2/v8</property>
      <property value="-18.0505">fsim/tables/ps_idle_ms/h0/w2/v9</property>
      <property value="-5.25834">fsim/tables/ps_idle_ms/h1/w0/v0</property>
      <property value="-6.0262">fsim/tables/ps_idle_ms/h1/w0/v1</property>
      <property value="-27.875">fsim/tables/ps_idle_ms/h1/w0/v10</property>
      <property value="-32.2925">fsim/tables/ps_idle_ms/h1/w0/v11</property>
      <property value="-37.1839">fsim/tables/ps_idle_ms/h1/w0/v12</property>
      <property value="-42.5266">fsim/tables/ps_idle_ms/h1/w0/v13</property>
      <property value="-49.4413">fsim/tables/ps_idle_ms/h1/w0/v14</property>
      <property value="-63.3326">fsim/tables/ps_idle_ms/h1/w0/v15</property>
      <property value="-7.07519">fsim/tables/ps_idle_ms/h1/w0/v2</property>
      <property value="-8.38404">fsim/tables/ps_idle_ms/h1/w0/v3</property>
      <property value="-10.1516">fsim/tables/ps_idle_ms/h1/w0/v4</property>
      <property value="-12.1466">fsim/tables/ps_idle_ms/h1/w0/v5</property>
      <property value="-14.5981">fsim/tables/ps_idle_ms/h1/w0/v6</property>
      <property value="-17.3581">fsim/tables/ps_idle_ms/h1/w0/v7</property>
      <property value="-20.4163">fsim/tables/ps_idle_ms/h1/w0/v8</property>
      <property value="-23.893">fsim/tables/ps_idle_ms/h1/w0/v9</property>
      <property value="-5.79855">fsim/tables/ps_idle_ms/h1/w1/v0</property>
      <property value="-6.02912">fsim/tables/ps_idle_ms/h1/w1/v1</property>
      <property value="-20.8198">fsim/tables/ps_idle_ms/h1/w1/v10</property>
      <property value="-23.9366">fsim/tables/ps_idle_ms/h1/w1/v11</property>
      <property value="-27.607">fsim/tables/ps_idle_ms/h1/w1/v12</property>
      <property value="-31.6795">fsim/tables/ps_idle_ms/h1/w1/v13</property>
      <property value="-36.8085">fsim/tables/ps_idle_ms/h1/w1/v14</property>
      <property value="-46.2107">fsim/tables/ps_idle_ms/h1/w1/v15</property>
      <property value="-6.55601">fsim/tables/ps_idle_ms/h1/w1/v2</property>
      <property value="-7.34248">fsim/tables/ps_idle_ms/h1/w1/v3</property>
      <property value="-8.37418">fsim/tables/ps_idle_ms/h1/w1/v4</property>
      <property value="-9.67453">fsim/tables/ps_idle_ms/h1/w1/v5</property>
      <property value="-11.2851">fsim/tables/ps_idle_ms/h1/w1/v6</property>
      <property value="-13.193">fsim/tables/ps_idle_ms/h1/w1/v7</property>
      <property value="-15.4134">fsim/tables/ps_idle_ms/h1/w1/v8</property>
      <property value="-17.99">fsim/tables/ps_idle_ms/h1/w1/v9</property>
      <property value="-6.74686">fsim/tables/ps_idle_ms/h1/w2/v0</property>
      <property value="-6.81997">fsim/tables/ps_idle_ms/h1/w2/v1</property>
      <property value="-17.7689">fsim/tables/ps_idle_ms/h1/w2/v10</property>
      <property value="-20.2363">fsim/tables/ps_idle_ms/h1/w2/v11</property>
      <property value="-22.9429">fsim/tables/ps_idle_ms/h1/w2/v12</property>
      <property value="-25.888">fsim/tables/ps_idle_ms/h1/w2/v13</property>
      <property value="-29.8652">fsim/tables/ps_idle_ms/h1/w2/v14</property>
      <property value="-36.4946">fsim/tables/ps_idle_ms/h1/w2/v15</property>
      <property value="-7.14933">fsim/tables/ps_idle_ms/h1/w2/v2</property>
      <property value="-7.70125">fsim/tables/ps_idle_ms/h1/w2/v3</property>
      <property value="-8.46444">fsim/tables/ps_idle_ms/h1/w2/v4</property>
      <property value="-9.41129">fsim/tables/ps_idle_ms/h1/w2/v5</property>
      <property value="-10.6094">fsim/tables/ps_idle_ms/h1/w2/v6</property>
      <property value="-11.9897">fsim/tables/ps_idle_ms/h1/w2/v7</property>
      <property value="-13.6822">fsim/tables/ps_idle_ms/h1/w2/v8</property>
      <property value="-15.5319">fsim/tables/ps_idle_ms/h1/w2/v9</property>
      <property value="-6.31315">fsim/tables/ps_idle_ms/h2/w0/v0</property>
      <property value="-6.97035">fsim/tables/ps_idle_ms/h2/w0/v1</property>
      <property value="-22.8077">fsim/tables/ps_idle_ms/h2/w0/v10</property>
      <property value="-25.8898">fsim/tables/ps_idle_ms/h2/w0/v11</property>
      <property value="-29.3147">fsim/tables/ps_idle_ms/h2/w0/v12</property>
      <property value="-33.0588">fsim/tables/ps_idle_ms/h2/w0/v13</property>
      <property value="-38.1935">fsim/tables/ps_idle_ms/h2/w0/v14</property>
      <property value="-50.9919">fsim/tables/ps_idle_ms/h2/w0/v15</property>
      <property value="-7.80795">fsim/tables/ps_idle_ms/h2/w0/v2</property>
      <property value="-8.89633">fsim/tables/ps_idle_ms/h2/w0/v3</property>
      <property value="-10.1335">fsim/tables/ps_idle_ms/h2/w0/v4</property>
      <property value="-11.6986">fsim/tables/ps_idle_ms/h2/w0/v5</property>
      <property value="-13.4044">fsim/tables/ps_idle_ms/h2/w0/v6</property>
      <property value="-15.4376">fsim/tables/ps_idle_ms/h2/w0/v7</property>
      <property value="-17.6933">fsim/tables/ps_idle_ms/h2/w0/v8</property>
      <property value="-20.1446">fsim/tables/ps_idle_ms/h2/w0/v9</property>
      <property value="-6.79846">fsim/tables/ps_idle_ms/h2/w1/v0</property>
      <property value="-6.95304">fsim/tables/ps_idle_ms/h2/w1/v1</property>
      <property value="-17.33">fsim/tables/ps_idle_ms/h2/w1/v10</property>
      <property value="-19.6186">fsim/tables/ps_idle_ms/h2/w1/v11</property>
      <property value="-22.1059">fsim/tables/ps_idle_ms/h2/w1/v12</property>
      <property value="-24.796">fsim/tables/ps_idle_ms/h2/w1/v13</property>
      <property value="-28.6449">fsim/tables/ps_idle_ms/h2/w1/v14</property>
      <property value="-37.5497">fsim/tables/ps_idle_ms/h2/w1/v15</property>
      <property value="-7.31715">fsim/tables/ps_idle_ms/h2/w1/v2</property>
      <property value="-7.87915">fsim/tables/ps_idle_ms/h2/w1/v3</property>
      <property value="-8.63787">fsim/tables/ps_idle_ms/h2/w1/v4</property>
      <property value="-9.54889">fsim/tables/ps_idle_ms/h2/w1/v5</property>
      <property value="-10.6759">fsim/tables/ps_idle_ms/h2/w1/v6</property>
      <property value="-11.9785">fsim/tables/ps_idle_ms/h2/w1/v7</property>
      <property value="-13.5568">fsim/tables/ps_idle_ms/h2/w1/v8</property>
      <property value="-15.2719">fsim/tables/ps_idle_ms/h2/w1/v9</property>
      <property value="-7.86892">fsim/tables/ps_idle_ms/h2/w2/v0</property>
      <property value="-7.81853">fsim/tables/ps_idle_ms/h2/w2/v1</property>
      <property value="-15.0704">fsim/tables/ps_idle_ms/h2/w2/v10</property>
      <property value="-16.6988">fsim/tables/ps_idle_ms/h2/w2/v11</property>
      <property value="-18.6649">fsim/tables/ps_idle_ms/h2/w2/v12</property>
      <property value="-20.7853">fsim/tables/ps_idle_ms/h2/w2/v13</property>
      <property value="-23.6621">fsim/tables/ps_idle_ms/h2/w2/v14</property>
      <property value="-29.8347">fsim/tables/ps_idle_ms/h2/w2/v15</property>
      <property value="-7.98566">fsim/tables/ps_idle_ms/h2/w2/v2</property>
      <property value="-8.32234">fsim/tables/ps_idle_ms/h2/w2/v3</property>
      <property value="-8.81813">fsim/tables/ps_idle_ms/h2/w2/v4</property>
      <property value="-9.45234">fsim/tables/ps_idle_ms/h2/w2/v5</property>
      <property value="-10.2442">fsim/tables/ps_idle_ms/h2/w2/v6</property>
      <property value="-11.2309">fsim/tables/ps_idle_ms/h2/w2/v7</property>
      <property value="-12.2905">fsim/tables/ps_idle_ms/h2/w2/v8</property>
      <property value="-13.592">fsim/tables/ps_idle_ms/h2/w2/v9</property>
      <property value="-7.40063">fsim/tables/ps_idle_ms/h3/w0/v0</property>
      <property value="-7.90818">fsim/tables/ps_idle_ms/h3/w0/v1</property>
      <property value="-18.7892">fsim/tables/ps_idle_ms/h3/w0/v10</property>
      <property value="-20.7658">fsim/tables/ps_idle_ms/h3/w0/v11</property>
      <property value="-22.8759">fsim/tables/ps_idle_ms/h3/w0/v12</property>
      <property value="-25.335">fsim/tables/ps_idle_ms/h3/w0/v13</property>
      <property value="-28.7808">fsim/tables/ps_idle_ms/h3/w0/v14</property>
      <property value="-38.2654">fsim/tables/ps_idle_ms/h3/w0/v15</property>
      <property value="-8.5843">fsim/tables/ps_idle_ms/h3/w0/v2</property>
      <property value="-9.34244">fsim/tables/ps_idle_ms/h3/w0/v3</property>
      <property value="-10.2495">fsim/tables/ps_idle_ms/h3/w0/v4</property>
      <property value="-11.2421">fsim/tables/ps_idle_ms/h3/w0/v5</property>
      <property value="-12.4744">fsim/tables/ps_idle_ms/h3/w0/v6</property>
      <property value="-13.8038">fsim/tables/ps_idle_ms/h3/w0/v7</property>
      <property value="-15.2455">fsim/tables/ps_idle_ms/h3/w0/v8</property>
      <property value="-16.9447">fsim/tables/ps_idle_ms/h3/w0/v9</property>
      <property value="-7.93066">fsim/tables/ps_idle_ms/h3/w1/v0</property>
      <property value="-8.002">fsim/tables/ps_idle_ms/h3/w1/v1</property>
      <property value="-14.6367">fsim/tables/ps_idle_ms/h3/w1/v10</property>
      <property value="-16.0494">fsim/tables/ps_idle_ms/h3/w1/v11</property>
      <property value="-17.7009">fsim/tables/ps_idle_ms/h3/w1/v12</property>
      <property value="-19.5569">fsim/tables/ps_idle_ms/h3/w1/v13</property>
      <property value="-22.1303">fsim/tables/ps_idle_ms/h3/w1/v14</property>
      <property value="-28.4565">fsim/tables/ps_idle_ms/h3/w1/v15</property>
      <property value="-8.21589">fsim/tables/ps_idle_ms/h3/w1/v2</property>
      <property value="-8.57602">fsim/tables/ps_idle_ms/h3/w1/v3</property>
      <property value="-9.06527">fsim/tables/ps_idle_ms/h3/w1/v4</property>
      <property value="-9.67767">fsim/tables/ps_idle_ms/h3/w1/v5</property>
      <property value="-10.3864">fsim/tables/ps_idle_ms/h3/w1/v6</property>
      <property value="-11.2732">fsim/tables/ps_idle_ms/h3/w1/v7</property>
      <property value="-12.2146">fsim/tables/ps_idle_ms/h3/w1/v8</property>
      <property value="-13.3467">fsim/tables/ps_idle_ms/h3/w1/v9</property>
      <property value="-9.11481">fsim/tables/ps_idle_ms/h3/w2/v0</property>
      <property value="-9.04539">fsim/tables/ps_idle_ms/h3/w2/v1</property>
      <property value="-13.3545">fsim/tables/ps_idle_ms/h3/w2/v10</property>
      <property value="-14.3814">fsim/tables/ps_idle_ms/h3/w2/v11</property>
      <property value="-15.5126">fsim/tables/ps_idle_ms/h3/w2/v12</property>
      <property value="-16.7703">fsim/tables/ps_idle_ms/h3/w2/v13</property>
      <property value="-18.6343">fsim/tables/ps_idle_ms/h3/w2/v14</property>
      <property value="-22.6074">fsim/tables/ps_idle_ms/h3/w2/v15</property>
      <property value="-9.11215">fsim/tables/ps_idle_ms/h3/w2/v2</property>
      <property value="-9.27965">fsim/tables/ps_idle_ms/h3/w2/v3</property>
      <property value="-9.56586">fsim/tables/ps_idle_ms/h3/w2/v4</property>
      <property value="-9.95531">fsim/tables/ps_idle_ms/h3/w2/v5</property>
      <property value="-10.4195">fsim/tables/ps_idle_ms/h3/w2/v6</property>
      <property value="-11.0326">fsim/tables/ps_idle_ms/h3/w2/v7</property>
      <property value="-11.6826">fsim/tables/ps_idle_ms/h3/w2/v8</property>
      <property value="-12.5068">fsim/tables/ps_idle_ms/h3/w2/v9</property>
      <property value="-8.19625">fsim/tables/ps_idle_ms/h4/w0/v0</property>
      <property value="-8.60952">fsim/tables/ps_idle_ms/h4/w0/v1</property>
      <property value="-16.1959">fsim/tables/ps_idle_ms/h4/w0/v10</property>
      <property value="-17.6178">fsim/tables/ps_idle_ms/h4/w0/v11</property>
      <property value="-19.1194">fsim/tables/ps_idle_ms/h4/w0/v12</property>
      <property value="-20.9499">fsim/tables/ps_idle_ms/h4/w0/v13</property>
      <property value="-23.2145">fsim/tables/ps_idle_ms/h4/w0/v14</property>
      <property value="-29.4759">fsim/tables/ps_idle_ms/h4/w0/v15</property>
      <property value="-9.09751">fsim/tables/ps_idle_ms/h4/w0/v2</property>
      <property value="-9.66372">fsim/tables/ps_idle_ms/h4/w0/v3</property>
      <property value="-10.3252">fsim/tables/ps_idle_ms/h4/w0/v4</property>
      <property value="-11.0701">fsim/tables/ps_idle_ms/h4/w0/v5</property>
      <property value="-11.8419">fsim/tables/ps_idle_ms/h4/w0/v6</property>
      <property value="-12.7913">fsim/tables/ps_idle_ms/h4/w0/v7</property>
      <property value="-13.8441">fsim/tables/ps_idle_ms/h4/w0/v8</property>
      <property value="-14.9649">fsim/tables/ps_idle_ms/h4/w0/v9</property>
      <property value="-8.88984">fsim/tables/ps_idle_ms/h4/w1/v0</property>
      <property value="-8.89175">fsim/tables/ps_idle_ms/h4/w1/v1</property>
      <property value="-13.1778">fsim/tables/ps_idle_ms/h4/w1/v10</property>
      <property value="-14.1615">fsim/tables/ps_idle_ms/h4/w1/v11</property>
      <property value="-15.2214">fsim/tables/ps_idle_ms/h4/w1/v12</property>
      <property value="-16.4292">fsim/tables/ps_idle_ms/h4/w1/v13</property>
      <property value="-18.177">fsim/tables/ps_idle_ms/h4/w1/v14</property>
      <property value="-21.9421">fsim/tables/ps_idle_ms/h4/w1/v15</property>
      <property value="-9.00317">fsim/tables/ps_idle_ms/h4/w1/v2</property>
      <property value="-9.19818">fsim/tables/ps_idle_ms/h4/w1/v3</property>
      <property value="-9.50044">fsim/tables/ps_idle_ms/h4/w1/v4</property>
      <property value="-9.9178">fsim/tables/ps_idle_ms/h4/w1/v5</property>
      <property value="-10.3822">fsim/tables/ps_idle_ms/h4/w1/v6</property>
      <property value="-10.9631">fsim/tables/ps_idle_ms/h4/w1/v7</property>
      <property value="-11.6085">fsim/tables/ps_idle_ms/h4/w1/v8</property>
      <property value="-12.3842">fsim/tables/ps_idle_ms/h4/w1/v9</property>
      <property value="-10.2096">fsim/tables/ps_idle_ms/h4/w2/v0</property>
      <property value="-10.0808">fsim/tables/ps_idle_ms/h4/w2/v1</property>
      <property value="-12.6144">fsim/tables/ps_idle_ms/h4/w2/v10</property>
      <property value="-13.2856">fsim/tables/ps_idle_ms/h4/w2/v11</property>
      <property value="-13.9737">fsim/tables/ps_idle_ms/h4/w2/v12</property>
      <property value="-14.7857">fsim/tables/ps_idle_ms/h4/w2/v13</property>
      <property value="-15.9989">fsim/tables/ps_idle_ms/h4/w2/v14</property>
      <property value="-17.7962">fsim/tables/ps_idle_ms/h4/w2/v15</property>
      <property value="-10.0592">fsim/tables/ps_idle_ms/h4/w2/v2</property>
      <property value="-10.1258">fsim/tables/ps_idle_ms/h4/w2/v3</property>
      <property value="-10.2833">fsim/tables/ps_idle_ms/h4/w2/v4</property>
      <property value="-10.5164">fsim/tables/ps_idle_ms/h4/w2/v5</property>
      <property value="-10.7826">fsim/tables/ps_idle_ms/h4/w2/v6</property>
      <property value="-11.1481">fsim/tables/ps_idle_ms/h4/w2/v7</property>
      <property value="-11.5729">fsim/tables/ps_idle_ms/h4/w2/v8</property>
      <property value="-12.0787">fsim/tables/ps_idle_ms/h4/w2/v9</property>
      <property value="-8.73098">fsim/tables/ps_idle_ms/h5/w0/v0</property>
      <property value="-9.07077">fsim/tables/ps_idle_ms/h5/w0/v1</property>
      <property value="-14.8402">fsim/tables/ps_idle_ms/h5/w0/v10</property>
      <property value="-15.8232">fsim/tables/ps_idle_ms/h5/w0/v11</property>
      <property value="-16.9289">fsim/tables/ps_idle_ms/h5/w0/v12</property>
      <property value="-18.394">fsim/tables/ps_idle_ms/h5/w0/v13</property>
      <property value="-20.1269">fsim/tables/ps_idle_ms/h5/w0/v14</property>
      <property value="-24.2648">fsim/tables/ps_idle_ms/h5/w0/v15</property>
      <property value="-9.42834">fsim/tables/ps_idle_ms/h5/w0/v2</property>
      <property value="-9.91071">fsim/tables/ps_idle_ms/h5/w0/v3</property>
      <property value="-10.3889">fsim/tables/ps_idle_ms/h5/w0/v4</property>
      <property value="-10.9714">fsim/tables/ps_idle_ms/h5/w0/v5</property>
      <property value="-11.6101">fsim/tables/ps_idle_ms/h5/w0/v6</property>
      <property value="-12.2657">fsim/tables/ps_idle_ms/h5/w0/v7</property>
      <property value="-13.0403">fsim/tables/ps_idle_ms/h5/w0/v8</property>
      <property value="-13.9006">fsim/tables/ps_idle_ms/h5/w0/v9</property>
      <property value="-9.60663">fsim/tables/ps_idle_ms/h5/w1/v0</property>
      <property value="-9.58086">fsim/tables/ps_idle_ms/h5/w1/v1</property>
      <property value="-12.5841">fsim/tables/ps_idle_ms/h5/w1/v10</property>
      <property value="-13.268">fsim/tables/ps_idle_ms/h5/w1/v11</property>
      <property value="-14.0042">fsim/tables/ps_idle_ms/h5/w1/v12</property>
      <property value="-14.9368">fsim/tables/ps_idle_ms/h5/w1/v13</property>
      <property value="-16.2003">fsim/tables/ps_idle_ms/h5/w1/v14</property>
      <property value="-18.2041">fsim/tables/ps_idle_ms/h5/w1/v15</property>
      <property value="-9.61215">fsim/tables/ps_idle_ms/h5/w1/v2</property>
      <property value="-9.73202">fsim/tables/ps_idle_ms/h5/w1/v3</property>
      <property value="-9.92405">fsim/tables/ps_idle_ms/h5/w1/v4</property>
      <property value="-10.1803">fsim/tables/ps_idle_ms/h5/w1/v5</property>
      <property value="-10.5334">fsim/tables/ps_idle_ms/h5/w1/v6</property>
      <property value="-10.9123">fsim/tables/ps_idle_ms/h5/w1/v7</property>
      <property value="-11.4202">fsim/tables/ps_idle_ms/h5/w1/v8</property>
      <property value="-11.93">fsim/tables/ps_idle_ms/h5/w1/v9</property>
      <property value="-10.8477">fsim/tables/ps_idle_ms/h5/w2/v0</property>
      <property value="-10.9108">fsim/tables/ps_idle_ms/h5/w2/v1</property>
      <property value="-12.8658">fsim/tables/ps_idle_ms/h5/w2/v10</property>
      <property value="-13.2395">fsim/tables/ps_idle_ms/h5/w2/v11</property>
      <property value="-13.6784">fsim/tables/ps_idle_ms/h5/w2/v12</property>
      <property value="-14.2213">fsim/tables/ps_idle_ms/h5/w2/v13</property>
      <property value="-14.8491">fsim/tables/ps_idle_ms/h5/w2/v14</property>
      <property value="-15.5547">fsim/tables/ps_idle_ms/h5/w2/v15</property>
      <property value="-10.9906">fsim/tables/ps_idle_ms/h5/w2/v2</property>
      <property value="-11.1274">fsim/tables/ps_idle_ms/h5/w2/v3</property>
      <property value="-11.2823">fsim/tables/ps_idle_ms/h5/w2/v4</property>
      <property value="-11.469">fsim/tables/ps_idle_ms/h5/w2/v5</property>
      <property value="-11.7115">fsim/tables/ps_idle_ms/h5/w2/v6</property>
      <property value="-11.9295">fsim/tables/ps_idle_ms/h5/w2/v7</property>
      <property value="-12.2217">fsim/tables/ps_idle_ms/h5/w2/v8</property>
      <property value="-12.5442">fsim/tables/ps_idle_ms/h5/w2/v9</property>
      <property value="-9.30147">fsim/tables/ps_idle_ms/h6/w0/v0</property>
      <property value="-9.54417">fsim/tables/ps_idle_ms/h6/w0/v1</property>
      <property value="-13.7704">fsim/tables/ps_idle_ms/h6/w0/v10</property>
      <property value="-14.4952">fsim/tables/ps_idle_ms/h6/w0/v11</property>
      <property value="-15.272">fsim/tables/ps_idle_ms/h6/w0/v12</property>
      <property value="-16.3158">fsim/tables/ps_idle_ms/h6/w0/v13</property>
      <property value="-17.5373">fsim/tables/ps_idle_ms/h6/w0/v14</property>
      <property value="-20.1238">fsim/tables/ps_idle_ms/h6/w0/v15</property>
      <property value="-9.84646">fsim/tables/ps_idle_ms/h6/w0/v2</property>
      <property value="-10.1549">fsim/tables/ps_idle_ms/h6/w0/v3</property>
      <property value="-10.5563">fsim/tables/ps_idle_ms/h6/w0/v4</property>
      <property value="-10.9571">fsim/tables/ps_idle_ms/h6/w0/v5</property>
      <property value="-11.4273">fsim/tables/ps_idle_ms/h6/w0/v6</property>
      <property value="-11.962">fsim/tables/ps_idle_ms/h6/w0/v7</property>
      <property value="-12.5028">fsim/tables/ps_idle_ms/h6/w0/v8</property>
      <property value="-13.0725">fsim/tables/ps_idle_ms/h6/w0/v9</property>
      <property value="-10.3777">fsim/tables/ps_idle_ms/h6/w1/v0</property>
      <property value="-10.3153">fsim/tables/ps_idle_ms/h6/w1/v1</property>
      <property value="-12.2615">fsim/tables/ps_idle_ms/h6/w1/v10</property>
      <property value="-12.7234">fsim/tables/ps_idle_ms/h6/w1/v11</property>
      <property value="-13.2828">fsim/tables/ps_idle_ms/h6/w1/v12</property>
      <property value="-13.8896">fsim/tables/ps_idle_ms/h6/w1/v13</property>
      <property value="-14.7276">fsim/tables/ps_idle_ms/h6/w1/v14</property>
      <property value="-15.8054">fsim/tables/ps_idle_ms/h6/w1/v15</property>
      <property value="-10.318">fsim/tables/ps_idle_ms/h6/w1/v2</property>
      <property value="-10.3754">fsim/tables/ps_idle_ms/h6/w1/v3</property>
      <property value="-10.4993">fsim/tables/ps_idle_ms/h6/w1/v4</property>
      <property value="-10.6679">fsim/tables/ps_idle_ms/h6/w1/v5</property>
      <property value="-10.8632">fsim/tables/ps_idle_ms/h6/w1/v6</property>
      <property value="-11.1612">fsim/tables/ps_idle_ms/h6/w1/v7</property>
      <property value="-11.4607">fsim/tables/ps_idle_ms/h6/w1/v8</property>
      <property value="-11.8505">fsim/tables/ps_idle_ms/h6/w1/v9</property>
      <property value="-12.1116">fsim/tables/ps_idle_ms/h6/w2/v0</property>
      <property value="-12.2089">fsim/tables/ps_idle_ms/h6/w2/v1</property>
      <property value="-13.2741">fsim/tables/ps_idle_ms/h6/w2/v10</property>
      <property value="-13.4377">fsim/tables/ps_idle_ms/h6/w2/v11</property>
      <property value="-13.6353">fsim/tables/ps_idle_ms/h6/w2/v12</property>
      <property value="-13.851">fsim/tables/ps_idle_ms/h6/w2/v13</property>
      <property value="-14.1098">fsim/tables/ps_idle_ms/h6/w2/v14</property>
      <property value="-14.3793">fsim/tables/ps_idle_ms/h6/w2/v15</property>
      <property value="-12.3075">fsim/tables/ps_idle_ms/h6/w2/v2</property>
      <property value="-12.4043">fsim/tables/ps_idle_ms/h6/w2/v3</property>
      <property value="-12.4993">fsim/tables/ps_idle_ms/h6/w2/v4</property>
      <property value="-12.5927">fsim/tables/ps_idle_ms/h6/w2/v5</property>
      <property value="-12.7037">fsim/tables/ps_idle_ms/h6/w2/v6</property>
      <property value="-12.8444">fsim/tables/ps_idle_ms/h6/w2/v7</property>
      <property value="-12.9863">fsim/tables/ps_idle_ms/h6/w2/v8</property>
      <property value="-13.1291">fsim/tables/ps_idle_ms/h6/w2/v9</property>
      <property value="295.869">fsim/tables/reach_tas_ms/h0/w0</property>
      <property value="295.418">fsim/tables/reach_tas_ms/h0/w1</property>
      <property value="295.093">fsim/tables/reach_tas_ms/h0/w2</property>
      <property value="291.72">fsim/tables/reach_tas_ms/h1/w0</property>
      <property value="291.147">fsim/tables/reach_tas_ms/h1/w1</property>
      <property value="290.85">fsim/tables/reach_tas_ms/h1/w2</property>
      <property value="285.717">fsim/tables/reach_tas_ms/h2/w0</property>
      <property value="285.341">fsim/tables/reach_tas_ms/h2/w1</property>
      <property value="284.939">fsim/tables/reach_tas_ms/h2/w2</property>
      <property value="278.185">fsim/tables/reach_tas_ms/h3/w0</property>
      <property value="277.616">fsim/tables/reach_tas_ms/h3/w1</property>
      <property value="276.609">fsim/tables/reach_tas_ms/h3/w2</property>
      <property value="271.527">fsim/tables/reach_tas_ms/h4/w0</property>
      <property value="270.362">fsim/tables/reach_tas_ms/h4/w1</property>
      <property value="268.921">fsim/tables/reach_tas_ms/h4/w2</property>
      <property value="266.43">fsim/tables/reach_tas_ms/h5/w0</property>
      <property value="264.858">fsim/tables/reach_tas_ms/h5/w1</property>
      <property value="262.447">fsim/tables/reach_tas_ms/h5/w2</property>
      <property value="261.295">fsim/tables/reach_tas_ms/h6/w0</property>
      <property value="258.937">fsim/tables/reach_tas_ms/h6/w1</property>
      <property value="0.0">fsim/tables/speed_fraction/v0</property>
      <property value="0.0666667">fsim/tables/speed_fraction/v1</property>
      <property value="0.666667">fsim/tables/speed_fraction/v10</property>
      <property value="0.733333">fsim/tables/speed_fraction/v11</property>
      <property value="0.8">fsim/tables/speed_fraction/v12</property>
      <property value="0.866667">fsim/tables/speed_fraction/v13</property>
      <property value="0.933333">fsim/tables/speed_fraction/v14</property>
      <property value="1">fsim/tables/speed_fraction/v15</property>
      <property value="0.133333">fsim/tables/speed_fraction/v2</property>
      <property value="0.2">fsim/tables/speed_fraction/v3</property>
      <property value="0.266667">fsim/tables/speed_fraction/v4</property>
      <property value="0.333333">fsim/tables/speed_fraction/v5</property>
      <property value="0.4">fsim/tables/speed_fraction/v6</property>
      <property value="0.466667">fsim/tables/speed_fraction/v7</property>
      <property value="0.533333">fsim/tables/speed_fraction/v8</property>
      <property value="0.6">fsim/tables/speed_fraction/v9</property>
      <property value="66.1639">fsim/tables/stall_cas_ms/h0/w0</property>
      <property value="76.8169">fsim/tables/stall_cas_ms/h0/w1</property>
      <property value="86.1628">fsim/tables/stall_cas_ms/h0/w2</property>
      <property value="66.0705">fsim/tables/stall_cas_ms/h1/w0</property>
      <property value="76.7085">fsim/tables/stall_cas_ms/h1/w1</property>
      <property value="86.0412">fsim/tables/stall_cas_ms/h1/w2</property>
      <property value="65.9978">fsim/tables/stall_cas_ms/h2/w0</property>
      <property value="76.6242">fsim/tables/stall_cas_ms/h2/w1</property>
      <property value="85.9466">fsim/tables/stall_cas_ms/h2/w2</property>
      <property value="65.9454">fsim/tables/stall_cas_ms/h3/w0</property>
      <property value="76.5633">fsim/tables/stall_cas_ms/h3/w1</property>
      <property value="85.8783">fsim/tables/stall_cas_ms/h3/w2</property>
      <property value="65.5942">fsim/tables/stall_cas_ms/h4/w0</property>
      <property value="76.1556">fsim/tables/stall_cas_ms/h4/w1</property>
      <property value="85.421">fsim/tables/stall_cas_ms/h4/w2</property>
      <property value="65.2392">fsim/tables/stall_cas_ms/h5/w0</property>
      <property value="75.7434">fsim/tables/stall_cas_ms/h5/w1</property>
      <property value="84.9586">fsim/tables/stall_cas_ms/h5/w2</property>
      <property value="64.8705">fsim/tables/stall_cas_ms/h6/w0</property>
      <property value="75.3154">fsim/tables/stall_cas_ms/h6/w1</property>
      <property value="84.4785">fsim/tables/stall_cas_ms/h6/w2</property>
      <property value="139160">fsim/tables/weight_kg/w0</property>
      <property value="187580">fsim/tables/weight_kg/w1</property>
      <property value="236000">fsim/tables/weight_kg/w2</property>
      <channel name="Pitch (fly-by-wire)">
        <!-- hangar: load factor command, alpha and pitch-rate inner loop (hangar/fcs.py) -->
        <summer name="fcs/pitch-trim-sum">
          <input>fcs/elevator-cmd-norm</input>
          <input>fcs/pitch-trim-cmd-norm</input>
          <clipto> <min>-1</min> <max>1</max> </clipto>
        </summer>
        <!-- the integrators are reset below 60 kt and while a wheel carries weight
             (on the ground, taking off and landing) -->
        <switch name="fcs/fbw/reset">
          <default value="0"/>
          <test logic="OR" value="-1">
            velocities/vc-kts lt 60
            gear/wow gt 0
          </test>
        </switch>
        <fcs_function name="fcs/fbw/k-alpha">
          <function>
            <table>
              <independentVar lookup="row">aero/qbar-psf</independentVar>
              <independentVar lookup="column">velocities/mach</independentVar>
              <tableData>
                       0.150     0.400     0.700     0.900     1.100
              10.0  -6.00000  -6.00000  -6.00000  -6.00000  -6.00000
              20.0  -3.91036  -4.20706  -3.69974  -2.84899  -3.84744
              40.0  -1.25494  -1.61512  -1.42776  -1.03679  -1.17902
              80.0  -0.26351  -0.74774  -0.96280  -1.05412  -0.93040
             150.0  -0.13044  -0.72443  -0.93532  -1.01413  -0.90118
             300.0   0.06904  -0.56130  -0.82993  -0.91790  -0.80407
             600.0   0.14222  -0.34074  -0.66903  -0.65953  -0.65030
            1200.0  -0.09350   0.21006   0.10556   0.19539   0.59414
            2400.0  -0.92452   0.36093   0.48141   0.50248   1.16718
              </tableData>
            </table>
          </function>
        </fcs_function>
        <fcs_function name="fcs/fbw/k-q">
          <function>
            <table>
              <independentVar lookup="row">aero/qbar-psf</independentVar>
              <independentVar lookup="column">velocities/mach</independentVar>
              <tableData>
                       0.150     0.400     0.700     0.900     1.100
              10.0  -3.00000  -3.00000  -3.00000  -3.00000  -3.00000
              20.0  -3.00000  -3.00000  -3.00000  -3.00000  -3.00000
              40.0  -1.24051  -2.14577  -2.06678  -1.65649  -2.54580
              80.0  -0.01870  -0.99792  -1.17300  -1.09104  -1.61645
             150.0   0.43203  -0.56708  -0.76250  -0.72797  -1.10731
             300.0   0.78007  -0.22574  -0.44110  -0.43864  -0.70382
             600.0   1.03515   0.01869  -0.20994  -0.21308  -0.41295
            1200.0   1.30067   0.26643   0.04706   0.03161  -0.06411
            2400.0   1.52440   0.44479   0.20162   0.15550   0.11787
              </tableData>
            </table>
          </function>
        </fcs_function>
        <fcs_function name="fcs/fbw/k-ff">
          <function>
            <table>
              <independentVar lookup="row">aero/qbar-psf</independentVar>
              <independentVar lookup="column">velocities/mach</independentVar>
              <tableData>
                       0.150     0.400     0.700     0.900     1.100
              10.0  -0.30000  -0.30000  -0.30000  -0.30000  -0.30000
              20.0  -0.30000  -0.30000  -0.30000  -0.30000  -0.30000
              40.0  -0.30000  -0.30000  -0.30000  -0.30000  -0.30000
              80.0  -0.30000  -0.30000  -0.30000  -0.30000  -0.30000
             150.0  -0.30000  -0.30000  -0.27423  -0.21897  -0.30000
             300.0  -0.16446  -0.15770  -0.13829  -0.11047  -0.16955
             600.0  -0.08295  -0.07953  -0.06970  -0.05189  -0.08542
            1200.0  -0.02963  -0.02712  -0.02058  -0.01299  -0.02212
            2400.0  -0.00742  -0.00679  -0.00515  -0.00325  -0.00553
              </tableData>
            </table>
          </function>
        </fcs_function>
        <fcs_function name="fcs/fbw/k-i">
          <function>
            <table>
              <independentVar lookup="row">aero/qbar-psf</independentVar>
              <independentVar lookup="column">velocities/mach</independentVar>
              <tableData>
                       0.150     0.400     0.700     0.900     1.100
              10.0  -0.60000  -0.60000  -0.60000  -0.60000  -0.60000
              20.0  -0.60000  -0.60000  -0.60000  -0.60000  -0.60000
              40.0  -0.60000  -0.60000  -0.60000  -0.60000  -0.60000
              80.0  -0.60000  -0.60000  -0.52013  -0.41080  -0.60000
             150.0  -0.32657  -0.31303  -0.27423  -0.21897  -0.33593
             300.0  -0.16446  -0.15770  -0.13829  -0.11047  -0.16955
             600.0  -0.08295  -0.07953  -0.06970  -0.05189  -0.08542
            1200.0  -0.02963  -0.02712  -0.02058  -0.01299  -0.02212
            2400.0  -0.00742  -0.00679  -0.00515  -0.00325  -0.00553
              </tableData>
            </table>
          </function>
        </fcs_function>
        <fcs_function name="fcs/fbw/n-alpha">
          <function>
            <table>
              <independentVar lookup="row">aero/qbar-psf</independentVar>
              <independentVar lookup="column">velocities/mach</independentVar>
              <tableData>
                       0.150     0.400     0.700     0.900     1.100
              10.0   1.00000   1.00000   1.00000   1.00000   1.00000
              20.0   1.00000   1.00000   1.00000   1.09410   1.00000
              40.0   1.43521   1.50306   1.73330   2.18821   1.97566
              80.0   2.87041   3.09297   3.77246   4.91173   4.38512
             150.0   6.13360   6.43944   7.47191   9.49496   8.55137
             300.0  12.51786  13.11893  15.15848  19.18919  17.30564
             600.0  25.23506  26.43785  30.51925  38.58330  34.81559
            1200.0  50.67590  53.08133  61.24360  77.37066  69.83573
            2400.0 101.55553 106.36639 122.69093 154.94410 139.87518
              </tableData>
            </table>
          </function>
        </fcs_function>
        <!-- the pitching moment's departures from a straight line through the
             angle-of-attack envelope (-1.306 per rad about the CG), cancelled by the
             elevator: the gains are designed on the line -->
        <fcs_function name="fcs/fbw/moment-comp">
          <function>
            <table>
              <independentVar lookup="row">aero/alpha-rad</independentVar>
              <independentVar lookup="column">velocities/mach</independentVar>
              <tableData>
                       0.150     0.400     0.700     0.900     1.100
          -0.17453   0.00321   0.00307   0.00269   0.00214   0.00316
          -0.15708   0.00400   0.00383   0.00335   0.00267   0.00394
          -0.13963   0.00434   0.00416   0.00364   0.00290   0.00427
          -0.12217   0.00424   0.00406   0.00355   0.00283   0.00417
          -0.10472   0.00378   0.00362   0.00317   0.00253   0.00372
          -0.08727   0.00302   0.00290   0.00254   0.00202   0.00298
          -0.06981   0.00201   0.00193   0.00169   0.00135   0.00198
          -0.05236   0.00081   0.00078   0.00068   0.00054   0.00080
          -0.03491  -0.00055  -0.00053  -0.00046  -0.00037  -0.00054
          -0.01745  -0.00200  -0.00191  -0.00167  -0.00134  -0.00197
           0.00000  -0.00347  -0.00332  -0.00291  -0.00232  -0.00341
           0.01745  -0.00468  -0.00449  -0.00393  -0.00313  -0.00461
           0.03491  -0.00564  -0.00540  -0.00473  -0.00377  -0.00555
           0.05236  -0.00628  -0.00602  -0.00527  -0.00420  -0.00618
           0.06981  -0.00662  -0.00635  -0.00555  -0.00443  -0.00652
           0.08727  -0.00660  -0.00633  -0.00553  -0.00441  -0.00650
           0.10472  -0.00623  -0.00597  -0.00522  -0.00416  -0.00613
           0.12217  -0.00538  -0.00515  -0.00451  -0.00360  -0.00529
           0.13963  -0.00416  -0.00399  -0.00349  -0.00278  -0.00409
           0.15708  -0.00243  -0.00233  -0.00204  -0.00163  -0.00239
           0.17453  -0.00030  -0.00029  -0.00025  -0.00020  -0.00030
           0.19199   0.00241   0.00231   0.00202   0.00161   0.00237
           0.20944   0.00559   0.00536   0.00469   0.00374   0.00551
           0.22689   0.00941   0.00901   0.00789   0.00629   0.00926
           0.24435   0.01380   0.01322   0.01157   0.00923   0.01358
              </tableData>
            </table>
          </function>
        </fcs_function>
        <!-- the gravity reference: the load factor that holds the flight path -->
        <fcs_function name="fcs/fbw/g-ref">
          <function>
            <product>
              <cos><property>attitude/theta-rad</property></cos>
              <cos><property>attitude/phi-rad</property></cos>
            </product>
          </function>
        </fcs_function>
        <!-- stick to load factor beyond the gravity reference, aft (negative) to n_max,
             no more than the lift at the angle-of-attack limits gives - beyond the
             gravity reference of the moment, so that full aft stick still reaches
             the limit in a steep climb or inverted - through a 0.2 s prefilter and
             a 12 g/s onset limit (a full pull at once pitches an agile airframe
             faster than its nose-down control can stop at the angle-of-attack
             limit) -->
        <fcs_function name="fcs/fbw/dn-stick">
          <function>
            <max>
              <min>
                <table>
                  <independentVar lookup="row">fcs/pitch-trim-sum</independentVar>
                  <tableData>
                    -1.0  1.500
                     0.0  0.0
                     1.0  -2.000
                  </tableData>
                </table>
                <difference><product><property>fcs/fbw/n-alpha</property><value>0.24435</value></product><property>fcs/fbw/g-ref</property></difference>
              </min>
              <difference><product><property>fcs/fbw/n-alpha</property><value>-0.17453</value></product><property>fcs/fbw/g-ref</property></difference>
            </max>
          </function>
        </fcs_function>
        <lag_filter name="fcs/fbw/dn-lag">
          <input>fcs/fbw/dn-stick</input>
          <c1>5.0</c1>
        </lag_filter>
        <actuator name="fcs/fbw/dn-cmd">
          <input>fcs/fbw/dn-lag</input>
          <rate_limit>12.0</rate_limit>
        </actuator>
        <!-- the response the command should produce (the short period's rise): the
             integrator trims away what differs from it, not the rise itself -->
        <lag_filter name="fcs/fbw/dn-model">
          <input>fcs/fbw/dn-cmd</input>
          <c1>2.5</c1>
        </lag_filter>
        <fcs_function name="fcs/fbw/dn">
          <function>
            <difference><property>accelerations/Nz</property><property>fcs/fbw/g-ref</property></difference>
          </function>
        </fcs_function>
        <!-- the angle of attack with its rise over the next 0.35 s counted as spent
             (the rise, not the pitch rate: in a steady pull the nose turns with the
             flight path and the angle of attack holds), and the load factor the
             angle of attack left to each limit gives -->
        <fcs_function name="fcs/fbw/alpha-ahead">
          <function>
            <sum>
              <property>aero/alpha-rad</property>
              <product><value>0.35</value><property>aero/alphadot-rad_sec</property></product>
            </sum>
          </function>
        </fcs_function>
        <fcs_function name="fcs/fbw/dn-room-up">
          <function>
            <product><property>fcs/fbw/n-alpha</property>
              <difference><value>0.24435</value><property>fcs/fbw/alpha-ahead</property></difference></product>
          </function>
        </fcs_function>
        <fcs_function name="fcs/fbw/dn-room-down">
          <function>
            <product><property>fcs/fbw/n-alpha</property>
              <difference><value>-0.17453</value><property>fcs/fbw/alpha-ahead</property></difference></product>
          </function>
        </fcs_function>
        <!-- the command limited to the load factor the aircraft pulls now plus what
             the angle of attack left gives: at a limit the feedforward asks for the
             load factor the airframe gives there, whatever elevator holds it - a
             steady pull on a stable airframe, a push on an unstable one (a
             feedforward faded out past the limit instead took about 10 deg of
             elevator per deg of alpha, on one side of it only: the actuator's rate
             limit could not follow, and the MiG-29A cycled between 24 and 29 deg) -->
        <fcs_function name="fcs/fbw/dn-limited">
          <function>
            <max>
              <min>
                <property>fcs/fbw/dn-cmd</property>
                <sum><property>fcs/fbw/dn</property><property>fcs/fbw/dn-room-up</property></sum>
              </min>
              <sum><property>fcs/fbw/dn</property><property>fcs/fbw/dn-room-down</property></sum>
            </max>
          </function>
        </fcs_function>
        <!-- the integrator's error: the load factor's departure from the model
             response, and at a limit the angle of attack left, counted five times -
             it trims what the airframe needs there beyond the linear design (vortex
             lift, the tail's power at high alpha) in a fraction of a second, not
             over the pull -->
        <fcs_function name="fcs/fbw/pitch-error">
          <function>
            <max>
              <min>
                <difference><property>fcs/fbw/dn-model</property><property>fcs/fbw/dn</property></difference>
                <product><value>5.0</value><property>fcs/fbw/dn-room-up</property></product>
              </min>
              <product><value>5.0</value><property>fcs/fbw/dn-room-down</property></product>
            </max>
          </function>
        </fcs_function>
        <fcs_function name="fcs/fbw/pitch-error-rate">
          <function><product><property>fcs/fbw/k-i</property><property>fcs/fbw/pitch-error</property></product></function>
        </fcs_function>
        <!-- the integrator: reset below 60 kt and on the wheels, held while the
             elevator is at a stop it would push further into (anti-windup) -->
        <switch name="fcs/fbw/pitch-hold">
          <default value="0"/>
          <test logic="OR" value="-1">
            velocities/vc-kts lt 60
            gear/wow gt 0
          </test>
          <test logic="AND" value="1">
            fcs/fbw/elevator-raw gt 0.34907
            fcs/fbw/pitch-error-rate gt 0
          </test>
          <test logic="AND" value="1">
            fcs/fbw/elevator-raw lt -0.43633
            fcs/fbw/pitch-error-rate lt 0
          </test>
        </switch>
        <integrator name="fcs/fbw/pitch-integral">
          <input>fcs/fbw/pitch-error-rate</input>
          <c1>1.0</c1>
          <trigger>fcs/fbw/pitch-hold</trigger>
          <clipto> <min>-0.5</min> <max>0.5</max> </clipto>
        </integrator>
        <!-- past an angle-of-attack limit (the next 0.35 s counted) a push back
             in proportion, all the travel 4 deg beyond: an unstable airframe
             pitching up fast needs it at once, not when an integrator winds -->
        <fcs_function name="fcs/fbw/alpha-push">
          <function>
            <difference>
              <product><value>5.00000</value>
                <max><value>0</value><difference><property>fcs/fbw/alpha-ahead</property><value>0.24435</value></difference></max></product>
              <product><value>6.25000</value>
                <max><value>0</value><difference><value>-0.17453</value><property>fcs/fbw/alpha-ahead</property></difference></max></product>
            </difference>
          </function>
        </fcs_function>
        <lag_filter name="fcs/fbw/ground">
          <input>gear/wow</input>
          <c1>2.0</c1>
        </lag_filter>
        <fcs_function name="fcs/fbw/ground-direct">
          <function>
            <product>
              <property>fcs/fbw/ground</property>
              <table>
                <independentVar lookup="row">fcs/pitch-trim-sum</independentVar>
                <tableData>
                  -1.0  -0.43633
                   0.0  0.0
                   1.0  0.34907
                </tableData>
              </table>
            </product>
          </function>
        </fcs_function>
        <!-- the elevator: the push, the moment compensation, angle-of-attack and
             pitch-rate feedback, the feedforward of the limited command, the
             integrator, the ground mode's direct stick -->
        <fcs_function name="fcs/fbw/elevator-raw">
          <function>
            <sum>
              <property>fcs/fbw/alpha-push</property>
              <property>fcs/fbw/moment-comp</property>
              <product><value>-1</value><property>fcs/fbw/k-alpha</property><property>aero/alpha-rad</property></product>
              <product><value>-1</value><property>fcs/fbw/k-q</property><property>velocities/q-rad_sec</property></product>
              <product><property>fcs/fbw/k-ff</property><property>fcs/fbw/dn-limited</property></product>
              <property>fcs/fbw/pitch-integral</property>
              <property>fcs/fbw/ground-direct</property>
            </sum>
          </function>
        </fcs_function>
        <pure_gain name="fcs/fbw/elevator">
          <input>fcs/fbw/elevator-raw</input>
          <gain>1.0</gain>
          <clipto> <min>-0.43633</min> <max>0.34907</max> </clipto>
        </pure_gain>
        <!-- full travel in 0.83 s: 60 deg/s for a +-25 deg tail, faster for a
             canard's longer throw -->
        <actuator name="fcs/elevator-actuator">
          <input>fcs/fbw/elevator</input>
          <lag>40</lag>
          <rate_limit>1.050</rate_limit>
          <output>fcs/elevator-pos-rad</output>
        </actuator>
      </channel>
      <channel name="Roll (fly-by-wire)">
        <!-- hangar: roll-rate command about the flight path, limited to what the rudder can
             coordinate; bank hold at neutral stick -->
        <summer name="fcs/roll-trim-sum">
          <input>fcs/aileron-cmd-norm</input>
          <input>fcs/roll-trim-cmd-norm</input>
          <clipto> <min>-1</min> <max>1</max> </clipto>
        </summer>
        <fcs_function name="fcs/fbw/k-roll">
          <function>
            <table>
              <independentVar lookup="row">aero/qbar-psf</independentVar>
              <independentVar lookup="column">velocities/mach</independentVar>
              <tableData>
                       0.150     0.400     0.700     0.900     1.100
              10.0   1.50000   1.50000   1.50000   1.50000   1.50000
              20.0   1.50000   1.50000   1.50000   1.50000   1.50000
              40.0   1.50000   1.50000   1.50000   1.50000   1.50000
              80.0   1.50000   1.50000   1.50000   1.50000   1.50000
             150.0   1.50000   1.50000   1.50000   1.50000   1.50000
             300.0   0.63920   1.50000   1.50000   1.45460   1.50000
             600.0   0.00000   0.52066   0.68397   0.55541   1.08279
            1200.0   0.00000   0.00000   0.12199   0.10432   0.32708
            2400.0   0.00000   0.00000   0.00000   0.00000   0.00000
              </tableData>
            </table>
          </function>
        </fcs_function>
        <fcs_function name="fcs/fbw/k-roll-ff">
          <function>
            <table>
              <independentVar lookup="row">aero/qbar-psf</independentVar>
              <independentVar lookup="column">velocities/mach</independentVar>
              <tableData>
                       0.150     0.400     0.700     0.900     1.100
              10.0   1.50000   0.80795   0.46572   0.36678   0.45416
              20.0   1.50000   0.80795   0.46572   0.36678   0.45416
              40.0   1.50000   0.80795   0.46572   0.36678   0.45416
              80.0   1.50000   0.80974   0.46347   0.35788   0.44662
             150.0   1.50000   0.77811   0.44634   0.34966   0.43385
             300.0   1.50000   0.76694   0.44154   0.34730   0.43020
             600.0   1.50000   0.76466   0.44087   0.34731   0.43000
            1200.0   1.50000   0.76550   0.44136   0.34770   0.43048
            2400.0   1.50000   0.76617   0.44169   0.34791   0.43077
              </tableData>
            </table>
          </function>
        </fcs_function>
        <fcs_function name="fcs/fbw/k-roll-i">
          <function>
            <table>
              <independentVar lookup="row">aero/qbar-psf</independentVar>
              <independentVar lookup="column">velocities/mach</independentVar>
              <tableData>
                       0.150     0.400     0.700     0.900     1.100
              10.0   1.00000   1.00000   1.00000   1.00000   1.00000
              20.0   1.00000   1.00000   1.00000   1.00000   1.00000
              40.0   1.00000   1.00000   1.00000   1.00000   1.00000
              80.0   0.93214   0.89003   0.76766   0.60721   1.00000
             150.0   0.47889   0.45818   0.39992   0.32019   0.53700
             300.0   0.23816   0.22808   0.19958   0.16017   0.26840
             600.0   0.11928   0.11425   0.09999   0.08024   0.13447
            1200.0   0.05975   0.05723   0.05008   0.04018   0.06734
            2400.0   0.02991   0.02865   0.02506   0.02010   0.03370
              </tableData>
            </table>
          </function>
        </fcs_function>
        <fcs_function name="fcs/fbw/p-max">
          <function>
            <table>
              <independentVar lookup="row">aero/qbar-psf</independentVar>
              <independentVar lookup="column">velocities/mach</independentVar>
              <tableData>
                       0.150     0.400     0.700     0.900     1.100
              10.0   0.12999   0.34563   0.59961   0.61087   0.61087
              20.0   0.12999   0.34563   0.59961   0.61087   0.61087
              40.0   0.12999   0.34563   0.59961   0.61087   0.61087
              80.0   0.12999   0.34487   0.60253   0.61087   0.61087
             150.0   0.13473   0.35888   0.61087   0.61087   0.61087
             300.0   0.13688   0.36411   0.61087   0.61087   0.61087
             600.0   0.13736   0.36520   0.61087   0.61087   0.61087
            1200.0   0.13721   0.36480   0.61087   0.61087   0.61087
            2400.0   0.13709   0.36448   0.61087   0.61087   0.61087
              </tableData>
            </table>
          </function>
        </fcs_function>
        <!-- the stick's rate halves towards alpha_max -->
        <fcs_function name="fcs/fbw/p-stick">
          <function>
            <product>
              <property>fcs/roll-trim-sum</property>
              <property>fcs/fbw/p-max</property>
              <table>
                <independentVar lookup="row">aero/alpha-rad</independentVar>
                <tableData>
                  0.09774 1.0
                  0.24435 0.5
                </tableData>
              </table>
            </product>
          </function>
        </fcs_function>
        <!-- the rudder's yaw acceleration at full travel (1/s^2), and the yaw damping (1/s) -->
        <fcs_function name="fcs/fbw/yaw-accel">
          <function>
            <table>
              <independentVar lookup="row">aero/qbar-psf</independentVar>
              <independentVar lookup="column">velocities/mach</independentVar>
              <tableData>
                       0.150     0.400     0.700     0.900     1.100
              10.0   0.01324   0.01347   0.01417   0.01512   0.00911
              20.0   0.02648   0.02694   0.02834   0.03024   0.01822
              40.0   0.05296   0.05389   0.05668   0.06048   0.03645
              80.0   0.10591   0.10896   0.11911   0.13234   0.07856
             150.0   0.22207   0.22682   0.24085   0.25981   0.15591
             300.0   0.45864   0.46720   0.49275   0.52769   0.31755
             600.0   0.92674   0.94338   0.99329   1.06151   0.63927
            1200.0   1.86096   1.89397   1.99301   2.12819   1.28208
            2400.0   3.72873   3.79455   3.99205   4.26143   2.56756
              </tableData>
            </table>
          </function>
        </fcs_function>
        <fcs_function name="fcs/fbw/yaw-damping">
          <function>
            <table>
              <independentVar lookup="row">aero/qbar-psf</independentVar>
              <independentVar lookup="column">velocities/mach</independentVar>
              <tableData>
                       0.150     0.400     0.700     0.900     1.100
              10.0   0.02709   0.01064   0.00701   0.00688   0.00509
              20.0   0.05418   0.02128   0.01402   0.01377   0.01017
              40.0   0.10836   0.04255   0.02804   0.02753   0.02034
              80.0   0.21671   0.08600   0.05879   0.06008   0.04370
             150.0   0.45525   0.17971   0.12008   0.11988   0.08798
             300.0   0.95664   0.37643   0.24940   0.24681   0.18170
             600.0   1.95744   0.76967   0.50891   0.50200   0.37014
            1200.0   3.96732   1.55901   1.02904   1.01271   0.74741
            2400.0   7.98689   3.13761   2.06928   2.03410   1.50194
              </tableData>
            </table>
          </function>
        </fcs_function>
        <!-- the rudder's share of the yaw a roll about the flight path needs, per unit of
             its roll acceleration: sin(alpha), less the ailerons' own yaw and what a
             principal axis inclined to the body axis gives -->
        <fcs_function name="fcs/fbw/roll-yaw-share">
          <function>
            <table>
              <independentVar lookup="row">aero/alpha-rad</independentVar>
              <tableData>
                   -0.34907  -0.27599
                   -0.26180  -0.22593
                   -0.17453  -0.17347
                   -0.08727  -0.11721
                    0.00000  -0.05760
                    0.08727   0.00560
                    0.17453   0.07305
                    0.26180   0.13601
                    0.34907   0.07677
                    0.43633   0.29661
                    0.52360   0.16204
                    0.61087   0.14748
                    0.69813   0.15341
                    0.78540   0.18241
                    0.87266   0.23586
              </tableData>
            </table>
          </function>
        </fcs_function>
        <!-- the yaw acceleration each rad/s of roll rate needs while the aircraft pitches
             under it: the pitch rate's inertia coupling, the angle of attack rising, and
             the yaw damping the roll's yaw rate meets -->
        <fcs_function name="fcs/fbw/p-yaw-need">
          <function>
            <abs>
              <sum>
                <product>
                  <sum>
                    <property>aero/alphadot-rad_sec</property>
                    <product><value>-0.15899</value><property>velocities/q-rad_sec</property></product>
                  </sum>
                  <cos><property>aero/alpha-rad</property></cos>
                </product>
                <product><property>fcs/fbw/yaw-damping</property><sin><property>aero/alpha-rad</property></sin></product>
              </sum>
            </abs>
          </function>
        </fcs_function>
        <!-- no more roll rate than 0.5 of the rudder's yaw holds: a roll the rudder cannot
             follow turns the angle of attack into sideslip -->
        <fcs_function name="fcs/fbw/p-yaw-max">
          <function>
            <quotient>
              <product><value>0.5</value><property>fcs/fbw/yaw-accel</property></product>
              <max><value>0.001</value><property>fcs/fbw/p-yaw-need</property></max>
            </quotient>
          </function>
        </fcs_function>
        <fcs_function name="fcs/fbw/p-limited">
          <function>
            <max>
              <min><property>fcs/fbw/p-stick</property><property>fcs/fbw/p-yaw-max</property></min>
              <product><value>-1</value><property>fcs/fbw/p-yaw-max</property></product>
            </max>
          </function>
        </fcs_function>
        <!-- and while the rate grows, no faster roll acceleration than all of it
             coordinates, unless the roll asked for could not leave 2.0 deg of sideslip
             even uncoordinated: at worst c^2 p^2 / (8 Y), c the rudder's share, Y its yaw
             acceleration, p the rate asked for -->
        <fcs_function name="fcs/fbw/p-accel">
          <function>
            <product>
              <quotient>
                <property>fcs/fbw/yaw-accel</property>
                <max><value>0.01</value><abs><property>fcs/fbw/roll-yaw-share</property></abs></max>
              </quotient>
              <max>
                <value>1</value>
                <quotient>
                  <product><value>0.27925</value><property>fcs/fbw/yaw-accel</property></product>
                  <sum>
                    <value>1e-9</value>
                    <product>
                      <property>fcs/fbw/roll-yaw-share</property><property>fcs/fbw/roll-yaw-share</property>
                      <property>fcs/fbw/p-limited</property><property>fcs/fbw/p-limited</property>
                    </product>
                  </sum>
                </quotient>
              </max>
            </product>
          </function>
        </fcs_function>
        <!-- a roll is stopped as fast as the ailerons can -->
        <fcs_function name="fcs/fbw/p-accel-up">
          <function>
            <sum><property>fcs/fbw/p-accel</property>
              <product><value>1000</value><lt><property>fcs/fbw/p-cmd</property><value>0</value></lt></product></sum>
          </function>
        </fcs_function>
        <fcs_function name="fcs/fbw/p-accel-down">
          <function>
            <sum><property>fcs/fbw/p-accel</property>
              <product><value>1000</value><gt><property>fcs/fbw/p-cmd</property><value>0</value></gt></product></sum>
          </function>
        </fcs_function>
        <actuator name="fcs/fbw/p-cmd">
          <input>fcs/fbw/p-limited</input>
          <rate_limit sense="incr">fcs/fbw/p-accel-up</rate_limit>
          <rate_limit sense="decr">fcs/fbw/p-accel-down</rate_limit>
        </actuator>
        <fcs_function name="fcs/fbw/p-stability">
          <function>
            <sum>
              <product><property>velocities/p-rad_sec</property><cos><property>aero/alpha-rad</property></cos></product>
              <product><property>velocities/r-rad_sec</property><sin><property>aero/alpha-rad</property></sin></product>
            </sum>
          </function>
        </fcs_function>
        <fcs_function name="fcs/fbw/roll-error-rate">
          <function>
            <product><property>fcs/fbw/k-roll-i</property>
              <difference><property>fcs/fbw/p-cmd</property><property>fcs/fbw/p-stability</property></difference></product>
          </function>
        </fcs_function>
        <integrator name="fcs/fbw/roll-integral">
          <input>fcs/fbw/roll-error-rate</input>
          <c1>1.0</c1>
          <trigger>fcs/fbw/reset</trigger>
          <clipto> <min>-0.17453</min> <max>0.17453</max> </clipto>
        </integrator>
        <fcs_function name="fcs/fbw/aileron">
          <function>
            <sum>
              <product><property>fcs/fbw/k-roll-ff</property><property>fcs/fbw/p-cmd</property></product>
              <product><property>fcs/fbw/k-roll</property>
                <difference><property>fcs/fbw/p-cmd</property><property>fcs/fbw/p-stability</property></difference></product>
              <property>fcs/fbw/roll-integral</property>
            </sum>
          </function>
          <clipto> <min>-0.34907</min> <max>0.34907</max> </clipto>
        </fcs_function>
        <actuator name="fcs/left-aileron-actuator">
          <input>fcs/fbw/aileron</input>
          <lag>40</lag>
          <rate_limit>1.4</rate_limit>
          <output>fcs/left-aileron-pos-rad</output>
        </actuator>
        <pure_gain name="fcs/right-aileron">
          <input>fcs/left-aileron-pos-rad</input>
          <gain>-1</gain>
          <output>fcs/right-aileron-pos-rad</output>
        </pure_gain>
      </channel>
      <channel name="Yaw (fly-by-wire)">
        <!-- hangar: yaw damper, sideslip feedback, pedals command sideslip -->
        <summer name="fcs/yaw-trim-sum">
          <input>fcs/rudder-cmd-norm</input>
          <input>fcs/yaw-trim-cmd-norm</input>
          <clipto> <min>-1</min> <max>1</max> </clipto>
        </summer>
        <fcs_function name="fcs/fbw/k-yaw-r">
          <function>
            <table>
              <independentVar lookup="row">aero/qbar-psf</independentVar>
              <independentVar lookup="column">velocities/mach</independentVar>
              <tableData>
                       0.150     0.400     0.700     0.900     1.100
              10.0  -3.00000  -3.00000  -3.00000  -3.00000  -3.00000
              20.0  -3.00000  -3.00000  -3.00000  -3.00000  -3.00000
              40.0  -3.00000  -3.00000  -3.00000  -3.00000  -3.00000
              80.0  -3.00000  -3.00000  -3.00000  -3.00000  -3.00000
             150.0  -1.81953  -2.45199  -2.44903  -2.27702  -3.00000
             300.0  -0.26799  -0.95599  -1.05396  -0.99382  -1.76114
             600.0   0.00000  -0.24154  -0.38039  -0.36681  -0.71955
            1200.0   0.00000   0.00000  -0.13426  -0.15149  -0.32064
            2400.0   0.00000   0.00000  -0.00986  -0.03146  -0.13384
              </tableData>
            </table>
          </function>
        </fcs_function>
        <fcs_function name="fcs/fbw/k-yaw-beta">
          <function>
            <table>
              <independentVar lookup="row">aero/qbar-psf</independentVar>
              <independentVar lookup="column">velocities/mach</independentVar>
              <tableData>
                       0.150     0.400     0.700     0.900     1.100
              10.0   3.00000   3.00000   3.00000   3.00000   3.00000
              20.0   3.00000   3.00000   3.00000   3.00000   3.00000
              40.0   3.00000   3.00000   3.00000   3.00000   3.00000
              80.0   3.00000   3.00000   3.00000   3.00000   3.00000
             150.0   3.00000   3.00000   3.00000   2.89608   3.00000
             300.0   1.28711   1.25380   1.15966   1.03353   1.87865
             600.0   0.24441   0.22957   0.18623   0.12141   0.36156
            1200.0   0.00000   0.00000   0.00000   0.00000   0.00000
            2400.0   0.00000   0.00000   0.00000   0.00000   0.00000
              </tableData>
            </table>
          </function>
        </fcs_function>
        <fcs_function name="fcs/fbw/k-pedal">
          <function>
            <table>
              <independentVar lookup="row">aero/qbar-psf</independentVar>
              <independentVar lookup="column">velocities/mach</independentVar>
              <tableData>
                       0.150     0.400     0.700     0.900     1.100
              10.0   0.09807   0.09781   0.09729   0.09816   0.14303
              20.0   0.09807   0.09781   0.09729   0.09816   0.14303
              40.0   0.09807   0.09781   0.09729   0.09816   0.14303
              80.0   0.09807   0.10112   0.11159   0.12462   0.17471
             150.0   0.13183   0.13275   0.13554   0.14069   0.20275
             300.0   0.14356   0.14357   0.14373   0.14606   0.21231
             600.0   0.14664   0.14632   0.14569   0.14719   0.21436
            1200.0   0.14714   0.14677   0.14601   0.14734   0.21468
            2400.0   0.14723   0.14685   0.14608   0.14739   0.21477
              </tableData>
            </table>
          </function>
        </fcs_function>
        <!-- the yaw damper damps the sideslip's rate, the stability-axis yaw rate less
             the one that coordinates the bank and the side force: in the dutch roll the
             yaw rate itself, and zero in a steady coordinated turn, in a roll about the
             flight path and in a steady sideslip - it coordinates those as long as they
             last (a damper on the washed-out yaw rate stopped coordinating a sustained
             roll, and at low speed the roll turned the angle of attack into sideslip) -->
        <!-- on the wheels (the pitch's ground mode, fcs/fbw/ground) the pedals move the rudder
             directly over its travel, a ground law: the sideslip feedback, there the
             crosswind's, turned the nose into it, and as the C-17A's nose wheel unloaded
             towards its rotation it ran 8.6 m off its line across 10 m/s -->
        <fcs_function name="fcs/fbw/rudder">
          <function>
            <sum>
              <product>
                <difference><value>1</value><property>fcs/fbw/ground</property></difference>
                <sum>
                  <product><property>fcs/fbw/k-pedal</property><property>fcs/yaw-trim-sum</property></product>
                  <product><value>-1</value><property>fcs/fbw/k-yaw-beta</property>
                    <difference><property>aero/beta-rad</property>
                      <product><value>0.17453</value><property>fcs/yaw-trim-sum</property></product></difference></product>
                  <product><property>fcs/fbw/k-yaw-r</property><property>aero/betadot-rad_sec</property></product>
                </sum>
              </product>
              <product><property>fcs/fbw/ground</property><value>0.43633</value><property>fcs/yaw-trim-sum</property></product>
            </sum>
          </function>
          <clipto> <min>-0.43633</min> <max>0.43633</max> </clipto>
        </fcs_function>
        <actuator name="fcs/rudder-actuator">
          <input>fcs/fbw/rudder</input>
          <lag>40</lag>
          <rate_limit>1.4</rate_limit>
          <output>fcs/rudder-pos-rad</output>
        </actuator>
        <!-- the nose wheel steers with the pedals (JSBSim steers from fcs/steer-cmd-norm,
             positive right; the rudder command is positive left) -->
        <pure_gain name="fcs/steer-from-rudder">
          <input>fcs/yaw-trim-sum</input>
          <gain>-1</gain>
          <output>fcs/steer-cmd-norm</output>
        </pure_gain>
      </channel>
      <channel name="Flaps">
        <kinematic name="fcs/flaps-control">
          <input>fcs/flap-cmd-norm</input>
          <traverse>
            <setting> <position>0.0</position> <time>0.0</time> </setting>
            <setting> <position>10.0</position> <time>2.0</time> </setting>
            <setting> <position>20.0</position> <time>2.0</time> </setting>
            <setting> <position>30.0</position> <time>2.0</time> </setting>
            <setting> <position>40.0</position> <time>2.0</time> </setting>
          </traverse>
          <output>fcs/flap-pos-deg</output>
        </kinematic>
        <pure_gain name="fcs/flaps-normalized">
          <input>fcs/flap-pos-deg</input>
          <gain>0.025</gain>
          <output>fcs/flap-pos-norm</output>
        </pure_gain>
      </channel>
      <channel name="Speedbrake">
        <kinematic name="fcs/speedbrake-control">
          <input>fcs/speedbrake-cmd-norm</input>
          <traverse>
            <setting> <position>0</position> <time>0</time> </setting>
            <setting> <position>1</position> <time>2.00</time> </setting>
          </traverse>
          <output>fcs/speedbrake-pos-norm</output>
        </kinematic>
      </channel>
      <channel name="Landing Gear">
        <kinematic name="fcs/gear-control">
          <input>gear/gear-cmd-norm</input>
          <traverse>
            <setting> <position>0</position> <time>0</time> </setting>
            <setting> <position>1</position> <time>5</time> </setting>
          </traverse>
          <output>gear/gear-pos-norm</output>
        </kinematic>
      </channel>
    </flight_control>
    <aerodynamics>
        <function name="aero/function/mach-lift">
          <description>lift, and damping, over its low-speed value (hangar: aero/mach.py)</description>
          <table>
            <independentVar lookup="row">velocities/mach</independentVar>
            <tableData>
                 0.000     1.000000
                 0.300     1.031255
                 0.500     1.096031
                 0.600     1.149623
                 0.700     1.226574
                 0.800     1.343685
                 0.850     1.429190
                 0.900     1.548492
                 0.950     1.559346
                 1.000     1.528666
                 1.050     1.470298
                 1.100     1.398084
                 1.200     1.267503
            </tableData>
          </table>
        </function>
        <function name="aero/function/mach-side">
          <description>side force, rolling and yawing moment over their low-speed values</description>
          <table>
            <independentVar lookup="row">velocities/mach</independentVar>
            <tableData>
                 0.000     1.000000
                 0.300     1.010078
                 0.500     1.030032
                 0.600     1.045720
                 0.700     1.067179
                 0.800     1.098015
                 0.850     1.119580
                 0.900     1.148974
                 0.950     1.133845
                 1.000     1.101665
                 1.050     1.058118
                 1.100     1.008887
                 1.200     0.916108
            </tableData>
          </table>
        </function>
        <function name="aero/function/mach-dCm-dCL">
          <description>pitching moment per unit low-speed lift: the neutral point's move</description>
          <table>
            <independentVar lookup="row">velocities/mach</independentVar>
            <tableData>
                 0.000     0.000000
                 0.300    -0.008788
                 0.500    -0.026539
                 0.600    -0.040777
                 0.700    -0.060570
                 0.800    -0.089415
                 0.850    -0.109694
                 0.900    -0.137273
                 0.950    -0.171023
                 1.000    -0.212870
                 1.050    -0.255954
                 1.100    -0.294686
                 1.200    -0.353157
            </tableData>
          </table>
        </function>
        <function name="aero/function/mach-dCD0">
          <description>zero-lift drag's change: friction and wave drag</description>
          <table>
            <independentVar lookup="row">velocities/mach</independentVar>
            <tableData>
                 0.000     0.000000
                 0.300    -0.000120
                 0.500    -0.000326
                 0.600    -0.000464
                 0.700    -0.000622
                 0.800    -0.000610
                 0.850     0.000495
                 0.900     0.017600
                 0.950     0.068165
                 1.000     0.121968
                 1.050     0.146952
                 1.100     0.146840
                 1.200     0.146609
            </tableData>
          </table>
        </function>
        <function name="aero/function/mach-dK">
          <description>induced-drag factor's change (per CL^2)</description>
          <table>
            <independentVar lookup="row">velocities/mach</independentVar>
            <tableData>
                 0.000     0.000000
                 0.300     0.002781
                 0.500     0.007806
                 0.600     0.011337
                 0.700     0.015621
                 0.800     0.020783
                 0.850     0.023778
                 0.900     0.027157
                 0.950     0.027426
                 1.000     0.026650
                 1.050     0.039649
                 1.100     0.071287
                 1.200     0.111191
            </tableData>
          </table>
        </function>
        <function name="aero/function/mach-aileron">
          <description>aileron power over its low-speed value</description>
          <table>
            <independentVar lookup="row">velocities/mach</independentVar>
            <tableData>
                 0.000     1.000000
                 0.300     1.029228
                 0.500     1.089684
                 0.600     1.139598
                 0.700     1.211152
                 0.800     1.319912
                 0.850     1.399305
                 0.900     1.510063
                 0.950     1.439002
                 1.000     1.298308
                 1.050     1.111193
                 1.100     0.900866
                 1.200     0.503423
            </tableData>
          </table>
        </function>
        <function name="aero/function/mach-elevator">
          <description>elevator power over its low-speed value</description>
          <table>
            <independentVar lookup="row">velocities/mach</independentVar>
            <tableData>
                 0.000     1.000000
                 0.300     1.028832
                 0.500     1.088677
                 0.600     1.138324
                 0.700     1.209929
                 0.800     1.319946
                 0.850     1.401366
                 0.900     1.517000
                 0.950     1.468705
                 1.000     1.357628
                 1.050     1.204697
                 1.100     1.030839
                 1.200     0.704050
            </tableData>
          </table>
        </function>
        <function name="aero/function/mach-flap">
          <description>flap power over its low-speed value</description>
          <table>
            <independentVar lookup="row">velocities/mach</independentVar>
            <tableData>
                 0.000     1.000000
                 0.300     1.034769
                 0.500     1.107992
                 0.600     1.169840
                 0.700     1.260836
                 0.800     1.404859
                 0.850     1.514785
                 0.900     1.675839
                 0.950     1.612756
                 1.000     1.463832
                 1.050     1.257682
                 1.100     1.022919
                 1.200     0.582005
            </tableData>
          </table>
        </function>
        <function name="aero/function/mach-rudder">
          <description>rudder power over its low-speed value</description>
          <table>
            <independentVar lookup="row">velocities/mach</independentVar>
            <tableData>
                 0.000     1.000000
                 0.300     1.011988
                 0.500     1.035349
                 0.600     1.053225
                 0.700     1.076700
                 0.800     1.107700
                 0.850     1.126886
                 0.900     1.149007
                 0.950     1.076934
                 1.000     0.968788
                 1.050     0.836592
                 1.100     0.692371
                 1.200     0.415955
            </tableData>
          </table>
        </function>
        <function name="aero/function/CL-base">
          <description>CL over alpha and beta at low speed</description>
          <table>
            <independentVar lookup="row">aero/alpha-deg</independentVar>
            <independentVar lookup="column">aero/beta-deg</independentVar>
            <tableData>
                        -90.00    -70.00    -50.00    -40.00    -30.00    -25.00    -20.00    -15.00    -10.00     -6.00     -3.00      0.00      3.00      6.00     10.00     15.00     20.00     25.00     30.00     40.00     50.00     70.00     90.00
             -180.00  -0.00000  -0.00147   0.01426   0.02915   0.04014   0.04456   0.04826   0.05123   0.05378   0.05429   0.05456   0.05470   0.05456   0.05429   0.05378   0.05123   0.04826   0.04456   0.04014   0.02915   0.01426  -0.00147  -0.00000
             -120.00  -0.00000   0.16146   0.42956   0.57452   0.70692   0.76398   0.81286   0.85222   0.88144   0.89716   0.90447   0.90468   0.90447   0.89716   0.88144   0.85222   0.81286   0.76398   0.70692   0.57452   0.42956   0.16146  -0.00000
              -70.00  -0.00000  -0.12660  -0.34483  -0.46444  -0.57453  -0.62215  -0.66302  -0.69570  -0.72045  -0.73378  -0.73656  -0.73537  -0.73656  -0.73378  -0.72045  -0.69570  -0.66302  -0.62215  -0.57453  -0.46444  -0.34483  -0.12660  -0.00000
              -46.00  -0.00000  -0.22800  -0.63829  -0.86587  -1.07318  -1.16232  -1.23824  -1.29982  -1.34944  -1.36178  -1.36594  -1.36733  -1.36594  -1.36178  -1.34944  -1.29982  -1.23824  -1.16232  -1.07318  -0.86587  -0.63829  -0.22800  -0.00000
              -32.00  -0.00000  -0.26690  -0.71394  -0.95381  -1.16060  -1.25328  -1.34258  -1.41135  -1.46185  -1.48761  -1.49825  -1.50174  -1.49825  -1.48761  -1.46185  -1.41135  -1.34258  -1.25328  -1.16060  -0.95381  -0.71394  -0.26690  -0.00000
              -22.00  -0.00000  -0.21105  -0.73553  -1.03645  -1.32087  -1.42058  -1.50111  -1.58239  -1.64312  -1.67650  -1.69142  -1.69648  -1.69142  -1.67650  -1.64312  -1.58239  -1.50111  -1.42058  -1.32087  -1.03645  -0.73553  -0.21105  -0.00000
              -17.00  -0.00000  -0.16390  -0.66339  -0.91172  -1.06604  -1.14533  -1.21142  -1.27168  -1.31461  -1.33621  -1.34518  -1.34815  -1.34518  -1.33621  -1.31461  -1.27168  -1.21142  -1.14533  -1.06604  -0.91172  -0.66339  -0.16390  -0.00000
              -13.00  -0.00000  -0.12613  -0.52593  -0.66889  -0.77104  -0.82857  -0.87426  -0.91366  -0.94122  -0.95486  -0.96046  -0.96230  -0.96046  -0.95486  -0.94122  -0.91366  -0.87426  -0.82857  -0.77104  -0.66889  -0.52593  -0.12613  -0.00000
               -9.00  -0.00000  -0.08773  -0.31273  -0.41298  -0.46116  -0.49369  -0.51923  -0.53995  -0.55392  -0.56044  -0.56294  -0.56373  -0.56294  -0.56044  -0.55392  -0.53995  -0.51923  -0.49369  -0.46116  -0.41298  -0.31273  -0.08773  -0.00000
               -5.00  -0.00000  -0.03560  -0.08479  -0.12963  -0.14813  -0.15435  -0.15827  -0.16112  -0.16222  -0.16202  -0.16155  -0.16129  -0.16155  -0.16202  -0.16222  -0.16112  -0.15827  -0.15435  -0.14813  -0.12963  -0.08479  -0.03560  -0.00000
               -1.00  -0.00000   0.03805   0.11461   0.12998   0.16593   0.18500   0.20231   0.21663   0.22760   0.23367   0.23645   0.23747   0.23645   0.23367   0.22760   0.21663   0.20231   0.18500   0.16593   0.12998   0.11461   0.03805  -0.00000
                3.00   0.00000   0.09455   0.33029   0.39412   0.47303   0.51820   0.55783   0.58927   0.61212   0.62384   0.62874   0.63037   0.62874   0.62384   0.61212   0.58927   0.55783   0.51820   0.47303   0.39412   0.33029   0.09455   0.00000
                7.00   0.00000   0.12400   0.53908   0.64665   0.77133   0.84225   0.90531   0.95415   0.98938   1.00735   1.01489   1.01741   1.01489   1.00735   0.98938   0.95415   0.90531   0.84225   0.77133   0.64665   0.53908   0.12400   0.00000
               11.00   0.00000   0.15943   0.71728   0.89738   1.05849   1.15323   1.24103   1.30710   1.35513   1.37975   1.39001   1.39339   1.39001   1.37975   1.35513   1.30710   1.24103   1.15323   1.05849   0.89738   0.71728   0.15943   0.00000
               15.00   0.00000   0.19867   0.75661   1.11437   1.32823   1.44294   1.55806   1.64174   1.70268   1.73423   1.74761   1.75209   1.74761   1.73423   1.70268   1.64174   1.55806   1.44294   1.32823   1.11437   0.75661   0.19867   0.00000
               19.00   0.00000   0.23671   0.81468   1.10909   1.50601   1.64260   1.77753   1.87275   1.94259   1.97879   1.99395   1.99896   1.99395   1.97879   1.94259   1.87275   1.77753   1.64260   1.50601   1.10909   0.81468   0.23671   0.00000
               23.00   0.00000   0.27131   0.77454   1.06241   1.37921   1.51102   1.63239   1.71317   1.77548   1.81175   1.83149   1.86883   1.83149   1.81175   1.77548   1.71317   1.63239   1.51102   1.37921   1.06241   0.77454   0.27131   0.00000
               27.00   0.00000   0.27947   0.71768   0.97694   1.25896   1.37956   1.47775   1.53176   1.57113   1.59288   1.60213   1.60521   1.60213   1.59288   1.57113   1.53176   1.47775   1.37956   1.25896   0.97694   0.71768   0.27947   0.00000
               32.00   0.00000   0.26207   0.70287   0.94696   1.19343   1.29178   1.37294   1.42839   1.46874   1.48966   1.49850   1.50143   1.49850   1.48966   1.46874   1.42839   1.37294   1.29178   1.19343   0.94696   0.70287   0.26207   0.00000
               46.00   0.00000   0.22542   0.64252   0.86331   1.06337   1.15002   1.21311   1.26634   1.30429   1.32446   1.33302   1.33563   1.33302   1.32446   1.30429   1.26634   1.21311   1.15002   1.06337   0.86331   0.64252   0.22542   0.00000
               70.00   0.00000   0.12371   0.33479   0.45016   0.55619   0.60199   0.64135   0.67285   0.69678   0.70957   0.71211   0.71086   0.71211   0.70957   0.69678   0.67285   0.64135   0.60199   0.55619   0.45016   0.33479   0.12371   0.00000
              120.00   0.00000  -0.16303  -0.43498  -0.58223  -0.71681  -0.77482  -0.82454  -0.86457  -0.89432  -0.91023  -0.91768  -0.91793  -0.91768  -0.91023  -0.89432  -0.86457  -0.82454  -0.77482  -0.71681  -0.58223  -0.43498  -0.16303   0.00000
              180.00   0.00000  -0.00147   0.01426   0.02915   0.04014   0.04456   0.04826   0.05123   0.05378   0.05429   0.05456   0.05470   0.05456   0.05429   0.05378   0.05123   0.04826   0.04456   0.04014   0.02915   0.01426  -0.00147   0.00000
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            </tableData>
          </table>
        </function>
      <axis name="DRAG">
        <function name="aero/coefficient/CD_base">
          <description>CD over alpha and beta (hangar)</description>
          <product>
            <property>aero/qbar-psf</property>
            <property>metrics/Sw-sqft</property>
          <table>
            <independentVar lookup="row">aero/alpha-deg</independentVar>
            <independentVar lookup="column">aero/beta-deg</independentVar>
            <tableData>
                        -90.00    -70.00    -50.00    -40.00    -30.00    -25.00    -20.00    -15.00    -10.00     -6.00     -3.00      0.00      3.00      6.00     10.00     15.00     20.00     25.00     30.00     40.00     50.00     70.00     90.00
             -180.00   0.77362   0.61757   0.33798   0.21022   0.11329   0.07877   0.05351   0.03667   0.02386   0.02177   0.02209   0.02226   0.02209   0.02177   0.02386   0.03667   0.05351   0.07877   0.11329   0.21022   0.33798   0.61757   0.77362
             -120.00   0.77362   0.75829   0.90475   1.06178   1.24788   1.34016   1.42495   1.49716   1.55233   1.58159   1.59432   1.59880   1.59432   1.58159   1.55233   1.49716   1.42495   1.34016   1.24788   1.06178   0.90475   0.75829   0.77362
              -70.00   0.77362   0.81032   1.02584   1.21839   1.43695   1.54361   1.64081   1.72319   1.78588   1.81925   1.83362   1.83860   1.83362   1.81925   1.78588   1.72319   1.64081   1.54361   1.43695   1.21839   1.02584   0.81032   0.77362
              -46.00   0.77362   0.76853   0.81327   0.87567   0.95119   0.98796   1.02115   1.05360   1.08739   1.08308   1.08033   1.07931   1.08033   1.08308   1.08739   1.05360   1.02115   0.98796   0.95119   0.87567   0.81327   0.76853   0.77362
              -32.00   0.77362   0.73934   0.66669   0.64957   0.63169   0.62913   0.64882   0.63171   0.61488   0.60481   0.60026   0.59871   0.60026   0.60481   0.61488   0.63171   0.64882   0.62913   0.63169   0.64957   0.66669   0.73934   0.77362
              -22.00   0.77362   0.71876   0.55014   0.49047   0.44366   0.38491   0.33211   0.28913   0.25528   0.23693   0.22899   0.22629   0.22899   0.23693   0.25528   0.28913   0.33211   0.38491   0.44366   0.49047   0.55014   0.71876   0.77362
              -17.00   0.77362   0.71101   0.49908   0.42214   0.30547   0.25457   0.20970   0.17253   0.14469   0.13008   0.12386   0.12178   0.12386   0.13008   0.14469   0.17253   0.20970   0.25457   0.30547   0.42214   0.49908   0.71101   0.77362
              -13.00   0.77362   0.70536   0.47581   0.36445   0.24173   0.19492   0.15284   0.11834   0.09285   0.07964   0.07408   0.07223   0.07408   0.07964   0.09285   0.11834   0.15284   0.19492   0.24173   0.36445   0.47581   0.70536   0.77362
               -9.00   0.77362   0.70043   0.45645   0.31878   0.19708   0.15200   0.11227   0.08015   0.05689   0.04510   0.04020   0.03858   0.04020   0.04510   0.05689   0.08015   0.11227   0.15200   0.19708   0.31878   0.45645   0.70043   0.77362
               -5.00   0.77362   0.69727   0.43834   0.29508   0.16897   0.12543   0.08811   0.05839   0.03731   0.02685   0.02259   0.02120   0.02259   0.02685   0.03731   0.05839   0.08811   0.12543   0.16897   0.29508   0.43834   0.69727   0.77362
               -1.00   0.77362   0.69630   0.43102   0.27774   0.15663   0.11555   0.08074   0.05339   0.03426   0.02496   0.02126   0.02008   0.02126   0.02496   0.03426   0.05339   0.08074   0.11555   0.15663   0.27774   0.43102   0.69630   0.77362
                3.00   0.77362   0.69721   0.42830   0.27819   0.16041   0.12264   0.09043   0.06524   0.04757   0.03916   0.03582   0.03472   0.03582   0.03916   0.04757   0.06524   0.09043   0.12264   0.16041   0.27819   0.42830   0.69721   0.77362
                7.00   0.77362   0.70037   0.43719   0.29337   0.18114   0.14766   0.11784   0.09440   0.07774   0.06969   0.06641   0.06532   0.06641   0.06969   0.07774   0.09440   0.11784   0.14766   0.18114   0.29337   0.43719   0.70037   0.77362
               11.00   0.77362   0.70447   0.45432   0.32160   0.22011   0.19099   0.16369   0.14125   0.12481   0.11653   0.11308   0.11193   0.11308   0.11653   0.12481   0.14125   0.16369   0.19099   0.22011   0.32160   0.45432   0.70447   0.77362
               15.00   0.77362   0.70933   0.48026   0.35958   0.27524   0.25030   0.22649   0.20523   0.18783   0.17856   0.17464   0.17335   0.17464   0.17856   0.18783   0.20523   0.22649   0.25030   0.27524   0.35958   0.48026   0.70933   0.77362
               19.00   0.77362   0.71517   0.51039   0.42681   0.34216   0.31773   0.30017   0.27993   0.26463   0.25622   0.25272   0.25148   0.25272   0.25622   0.26463   0.27993   0.30017   0.31773   0.34216   0.42681   0.51039   0.71517   0.77362
               23.00   0.77362   0.72190   0.54917   0.48349   0.45658   0.44180   0.42734   0.40424   0.38068   0.36426   0.35515   0.33537   0.35515   0.36426   0.38068   0.40424   0.42734   0.44180   0.45658   0.48349   0.54917   0.72190   0.77362
               27.00   0.77362   0.72973   0.58073   0.51464   0.49514   0.48102   0.46493   0.44319   0.42963   0.42272   0.41964   0.41851   0.41964   0.42272   0.42963   0.44319   0.46493   0.48102   0.49514   0.51464   0.58073   0.72973   0.77362
               32.00   0.77362   0.74115   0.63506   0.58867   0.58529   0.57163   0.56518   0.56009   0.55712   0.55594   0.55546   0.55527   0.55546   0.55594   0.55712   0.56009   0.56518   0.57163   0.58529   0.58867   0.63506   0.74115   0.77362
               46.00   0.77362   0.76913   0.80518   0.85856   0.92794   0.97493   1.00166   1.02267   1.04181   1.05194   1.05586   1.05666   1.05586   1.05194   1.04181   1.02267   1.00166   0.97493   0.92794   0.85856   0.80518   0.76913   0.77362
               70.00   0.77362   0.81100   1.03044   1.22620   1.44823   1.55644   1.65508   1.73871   1.80237   1.83627   1.85083   1.85590   1.85083   1.83627   1.80237   1.73871   1.65508   1.55644   1.44823   1.22620   1.03044   0.81100   0.77362
              120.00   0.77362   0.75738   0.89873   1.05158   1.23309   1.32320   1.40602   1.47660   1.53051   1.55913   1.57157   1.57595   1.57157   1.55913   1.53051   1.47660   1.40602   1.32320   1.23309   1.05158   0.89873   0.75738   0.77362
              180.00   0.77362   0.61757   0.33798   0.21022   0.11329   0.07877   0.05351   0.03667   0.02386   0.02177   0.02209   0.02226   0.02209   0.02177   0.02386   0.03667   0.05351   0.07877   0.11329   0.21022   0.33798   0.61757   0.77362
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            </tableData>
          </table>
          </product>
        </function>
        <function name="aero/coefficient/CD_mach">
          <description>zero-lift drag's change with Mach: friction, wave drag</description>
          <product>
            <property>aero/qbar-psf</property>
            <property>metrics/Sw-sqft</property>
            <property>aero/function/mach-dCD0</property>
          </product>
        </function>
        <function name="aero/coefficient/CD_induced_mach">
          <description>induced drag's change with Mach (leading-edge suction lost)</description>
          <product>
            <property>aero/qbar-psf</property>
            <property>metrics/Sw-sqft</property>
            <property>aero/cl-squared</property>
            <property>aero/function/mach-dK</property>
          </product>
        </function>
        <function name="aero/coefficient/CD_aileron">
          <description>CD increment from aileron (deg), over alpha</description>
          <product>
            <property>aero/qbar-psf</property>
            <property>metrics/Sw-sqft</property>
            <property>aero/function/mach-aileron</property>
          <table>
            <independentVar lookup="row">aero/alpha-deg</independentVar>
            <independentVar lookup="column">fcs/left-aileron-pos-deg</independentVar>
            <tableData>
                        -20.00    -15.00    -10.00     -5.00      0.00      5.00     10.00     15.00     20.00
             -180.00   0.00187   0.00107   0.00048   0.00012   0.00000   0.00012   0.00048   0.00107   0.00187
             -120.00   0.00186   0.00106   0.00048   0.00012   0.00000   0.00012   0.00048   0.00106   0.00186
              -70.00   0.00185   0.00106   0.00048   0.00012   0.00000   0.00012   0.00048   0.00106   0.00185
              -46.00   0.00330   0.00207   0.00101   0.00027   0.00000   0.00027   0.00101   0.00207   0.00330
              -32.00   0.00543   0.00359   0.00184   0.00050   0.00000   0.00050   0.00184   0.00359   0.00543
              -22.00   0.00437   0.00305   0.00168   0.00049   0.00000   0.00049   0.00168   0.00305   0.00437
              -17.00   0.00407   0.00267   0.00138   0.00039   0.00000   0.00039   0.00138   0.00267   0.00407
              -13.00   0.00429   0.00280   0.00142   0.00039   0.00000   0.00039   0.00142   0.00280   0.00429
               -9.00   0.00456   0.00299   0.00153   0.00042   0.00000   0.00042   0.00153   0.00299   0.00456
               -5.00   0.00475   0.00313   0.00160   0.00044   0.00000   0.00044   0.00160   0.00313   0.00475
               -1.00   0.00486   0.00320   0.00164   0.00045   0.00000   0.00045   0.00164   0.00320   0.00486
                3.00   0.00486   0.00321   0.00165   0.00045   0.00000   0.00045   0.00165   0.00321   0.00486
                7.00   0.00478   0.00315   0.00161   0.00044   0.00000   0.00044   0.00161   0.00315   0.00478
               11.00   0.00460   0.00303   0.00155   0.00042   0.00000   0.00042   0.00155   0.00303   0.00460
               15.00   0.00618   0.00397   0.00195   0.00051   0.00000   0.00051   0.00195   0.00397   0.00618
               19.00   0.02275   0.01669   0.00946   0.00278   0.00000   0.00278   0.00946   0.01669   0.02275
               23.00   0.02708   0.02191   0.01726   0.01423   0.00000   0.01423   0.01726   0.02191   0.02708
               27.00   0.01015   0.00689   0.00363   0.00101   0.00000   0.00101   0.00363   0.00689   0.01015
               32.00   0.00758   0.00510   0.00266   0.00073   0.00000   0.00073   0.00266   0.00510   0.00758
               46.00   0.00385   0.00244   0.00121   0.00032   0.00000   0.00032   0.00121   0.00244   0.00385
               70.00   0.00185   0.00106   0.00048   0.00012   0.00000   0.00012   0.00048   0.00106   0.00185
              120.00   0.00186   0.00106   0.00048   0.00012   0.00000   0.00012   0.00048   0.00106   0.00186
              180.00   0.00187   0.00107   0.00048   0.00012   0.00000   0.00012   0.00048   0.00107   0.00187
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            </tableData>
          </table>
          </product>
        </function>
        <function name="aero/coefficient/CD_elevator">
          <description>CD increment from elevator (deg), over alpha</description>
          <product>
            <property>aero/qbar-psf</property>
            <property>metrics/Sw-sqft</property>
            <property>aero/function/mach-elevator</property>
          <table>
            <independentVar lookup="row">aero/alpha-deg</independentVar>
            <independentVar lookup="column">fcs/elevator-pos-deg</independentVar>
            <tableData>
                        -25.00    -20.00    -15.00    -10.00     -5.00      0.00      5.00     10.00     15.00     20.00
             -180.00   0.00763   0.00500   0.00286   0.00129   0.00032   0.00000   0.00032   0.00129   0.00286   0.00500
             -120.00   0.00759   0.00497   0.00285   0.00128   0.00032   0.00000   0.00032   0.00128   0.00285   0.00497
              -70.00   0.00738   0.00480   0.00270   0.00116   0.00024   0.00000   0.00042   0.00144   0.00303   0.00515
              -46.00  -0.00172  -0.00156  -0.00114  -0.00055  -0.00010   0.00000  -0.00012  -0.00004   0.00084   0.00271
              -32.00   0.00123   0.00112   0.00113   0.00106   0.00068   0.00000  -0.00079  -0.00120  -0.00059   0.00124
              -22.00   0.02164   0.01855   0.01508   0.01074   0.00551   0.00000  -0.00542  -0.00999  -0.01272  -0.01351
              -17.00   0.02820   0.02411   0.01947   0.01374   0.00693   0.00000  -0.00599  -0.01025  -0.01223  -0.01227
              -13.00   0.03071   0.02583   0.02038   0.01388   0.00667   0.00000  -0.00502  -0.00785  -0.00846  -0.00742
               -9.00   0.02789   0.02293   0.01758   0.01151   0.00522   0.00000  -0.00328  -0.00435  -0.00354  -0.00154
               -5.00   0.02255   0.01794   0.01319   0.00813   0.00336   0.00000  -0.00128  -0.00051   0.00167   0.00458
               -1.00   0.01601   0.01193   0.00799   0.00421   0.00123   0.00000   0.00090   0.00360   0.00720   0.01104
                3.00   0.00859   0.00516   0.00217  -0.00014  -0.00109   0.00000   0.00322   0.00791   0.01294   0.01771
                7.00   0.00049  -0.00219  -0.00410  -0.00479  -0.00355   0.00000   0.00561   0.01231   0.01875   0.02440
               11.00  -0.00799  -0.00985  -0.01060  -0.00958  -0.00605   0.00000   0.00797   0.01662   0.02439   0.03086
               15.00  -0.01567  -0.01675  -0.01642  -0.01382  -0.00823   0.00000   0.00995   0.02017   0.02898   0.03604
               19.00  -0.02050  -0.02225  -0.02165  -0.01761  -0.01013   0.00000   0.01163   0.02316   0.03285   0.04048
               23.00  -0.02734  -0.02701  -0.02450  -0.01909  -0.01068   0.00000   0.01197   0.02382   0.03401   0.04241
               27.00  -0.02175  -0.01991  -0.01679  -0.01237  -0.00685   0.00000   0.00839   0.01761   0.02621   0.03361
               32.00  -0.00072  -0.00135  -0.00130  -0.00074  -0.00027   0.00000   0.00119   0.00406   0.00790   0.01185
               46.00   0.00831   0.00630   0.00481   0.00370   0.00233   0.00000  -0.00338  -0.00708  -0.00993  -0.01148
               70.00   0.00784   0.00522   0.00308   0.00147   0.00043   0.00000   0.00021   0.00109   0.00261   0.00468
              120.00   0.00759   0.00497   0.00285   0.00128   0.00032   0.00000   0.00032   0.00128   0.00285   0.00497
              180.00   0.00763   0.00500   0.00286   0.00129   0.00032   0.00000   0.00032   0.00129   0.00286   0.00500
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            </tableData>
          </table>
          </product>
        </function>
        <function name="aero/coefficient/CD_flap">
          <description>CD increment from flap (deg), over alpha</description>
          <product>
            <property>aero/qbar-psf</property>
            <property>metrics/Sw-sqft</property>
            <property>aero/function/mach-flap</property>
          <table>
            <independentVar lookup="row">aero/alpha-deg</independentVar>
            <independentVar lookup="column">fcs/flap-pos-deg</independentVar>
            <tableData>
                          0.00      5.00     10.00     15.00     20.00     25.00     30.00     35.00     40.00
             -180.00   0.00000   0.00046   0.00183   0.00407   0.00710   0.01084   0.01518   0.01997   0.02508
             -120.00   0.00000   0.00046   0.00182   0.00404   0.00705   0.01077   0.01508   0.01984   0.02491
              -70.00   0.00000   0.00046   0.00182   0.00404   0.00705   0.01077   0.01507   0.01983   0.02490
              -46.00   0.00000   0.01289   0.02868   0.04677   0.06630   0.08648   0.10735   0.12896   0.15140
              -32.00   0.00000   0.01569   0.03713   0.06321   0.09208   0.12195   0.15216   0.18251   0.21297
              -22.00   0.00000  -0.02593  -0.04640  -0.05989  -0.06635  -0.06806  -0.06680  -0.06358  -0.05897
              -17.00   0.00000  -0.01388  -0.02344  -0.02854  -0.02964  -0.02764  -0.02338  -0.01749  -0.01033
              -13.00   0.00000  -0.00988  -0.01536  -0.01652  -0.01410  -0.00905  -0.00215   0.00612   0.01553
               -9.00   0.00000  -0.00525  -0.00610  -0.00297   0.00320   0.01141   0.02101   0.03167   0.04330
               -5.00   0.00000  -0.00015   0.00397   0.01161   0.02161   0.03299   0.04522   0.05818   0.07190
               -1.00   0.00000   0.00499   0.01398   0.02591   0.03949   0.05374   0.06831   0.08323   0.09869
                3.00   0.00000   0.00983   0.02329   0.03909   0.05577   0.07244   0.08891   0.10539   0.12219
                7.00   0.00000   0.01425   0.03168   0.05076   0.07000   0.08856   0.10643   0.12397   0.14164
               11.00   0.00000   0.01810   0.03885   0.06056   0.08173   0.10200   0.12185   0.14191   0.16272
               15.00   0.00000   0.02150   0.04606   0.07351   0.10238   0.13046   0.15677   0.18150   0.20519
               19.00   0.00000   0.02685   0.06095   0.09642   0.12875   0.15766   0.18398   0.20869   0.23272
               23.00   0.00000   0.01716   0.04819   0.08391   0.11790   0.14805   0.17481   0.19952   0.22367
               27.00   0.00000  -0.00072   0.01220   0.03742   0.07048   0.10619   0.14102   0.17335   0.20250
               32.00   0.00000  -0.01361  -0.01863  -0.01699  -0.01106  -0.00261   0.00773   0.02084   0.03725
               46.00   0.00000  -0.01104  -0.01855  -0.02301  -0.02515  -0.02563  -0.02494  -0.02338  -0.02116
               70.00   0.00000   0.00045   0.00181   0.00403   0.00704   0.01075   0.01505   0.01980   0.02487
              120.00   0.00000   0.00046   0.00182   0.00404   0.00705   0.01077   0.01508   0.01984   0.02491
              180.00   0.00000   0.00046   0.00183   0.00407   0.00710   0.01084   0.01518   0.01997   0.02508
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            </tableData>
          </table>
          </product>
        </function>
        <function name="aero/coefficient/CD_rudder">
          <description>CD increment from rudder (deg), over alpha</description>
          <product>
            <property>aero/qbar-psf</property>
            <property>metrics/Sw-sqft</property>
            <property>aero/function/mach-rudder</property>
          <table>
            <independentVar lookup="row">aero/alpha-deg</independentVar>
            <independentVar lookup="column">fcs/rudder-pos-deg</independentVar>
            <tableData>
                        -25.00    -20.00    -15.00    -10.00     -5.00      0.00      5.00     10.00     15.00     20.00     25.00
             -180.00   0.00510   0.00334   0.00191   0.00086   0.00022   0.00000   0.00022   0.00086   0.00191   0.00334   0.00510
             -120.00   0.00064   0.00042   0.00024   0.00011   0.00003   0.00000   0.00003   0.00011   0.00024   0.00042   0.00064
              -70.00   0.00024   0.00016   0.00010   0.00005   0.00001   0.00000   0.00001   0.00005   0.00010   0.00016   0.00024
              -46.00   0.01596   0.01276   0.00908   0.00493   0.00138   0.00000   0.00138   0.00493   0.00908   0.01276   0.01596
              -32.00   0.02042   0.01627   0.01155   0.00627   0.00177   0.00000   0.00177   0.00627   0.01155   0.01627   0.02042
              -22.00   0.01822   0.01435   0.01011   0.00551   0.00157   0.00000   0.00157   0.00551   0.01011   0.01435   0.01822
              -17.00   0.01469   0.01125   0.00769   0.00406   0.00113   0.00000   0.00113   0.00406   0.00769   0.01125   0.01469
              -13.00   0.01406   0.01068   0.00725   0.00381   0.00105   0.00000   0.00105   0.00381   0.00725   0.01068   0.01406
               -9.00   0.01352   0.01020   0.00688   0.00359   0.00099   0.00000   0.00099   0.00359   0.00688   0.01020   0.01352
               -5.00   0.01305   0.00979   0.00656   0.00341   0.00094   0.00000   0.00094   0.00341   0.00656   0.00979   0.01305
               -1.00   0.01255   0.00937   0.00625   0.00324   0.00089   0.00000   0.00089   0.00324   0.00625   0.00937   0.01255
                3.00   0.01198   0.00890   0.00591   0.00305   0.00084   0.00000   0.00084   0.00305   0.00591   0.00890   0.01198
                7.00   0.01132   0.00838   0.00554   0.00285   0.00078   0.00000   0.00078   0.00285   0.00554   0.00838   0.01132
               11.00   0.01058   0.00781   0.00514   0.00264   0.00072   0.00000   0.00072   0.00264   0.00514   0.00781   0.01058
               15.00   0.00977   0.00718   0.00472   0.00241   0.00066   0.00000   0.00066   0.00241   0.00472   0.00718   0.00977
               19.00   0.00893   0.00655   0.00429   0.00219   0.00059   0.00000   0.00059   0.00219   0.00429   0.00655   0.00893
               23.00   0.00810   0.00591   0.00385   0.00196   0.00053   0.00000   0.00053   0.00196   0.00385   0.00591   0.00810
               27.00   0.00812   0.00606   0.00405   0.00211   0.00058   0.00000   0.00058   0.00211   0.00405   0.00606   0.00812
               32.00   0.00609   0.00445   0.00290   0.00148   0.00040   0.00000   0.00040   0.00148   0.00290   0.00445   0.00609
               46.00   0.01035   0.00798   0.00554   0.00290   0.00079   0.00000   0.00079   0.00290   0.00554   0.00798   0.01035
               70.00   0.00022   0.00015   0.00009   0.00004   0.00001   0.00000   0.00001   0.00004   0.00009   0.00015   0.00022
              120.00   0.00064   0.00042   0.00024   0.00011   0.00003   0.00000   0.00003   0.00011   0.00024   0.00042   0.00064
              180.00   0.00510   0.00334   0.00191   0.00086   0.00022   0.00000   0.00022   0.00086   0.00191   0.00334   0.00510
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            </tableData>
          </table>
          </product>
        </function>
        <function name="aero/coefficient/CD_ground">
          <description>Induced drag change in ground effect</description>
          <product>
            <property>aero/qbar-psf</property>
            <property>metrics/Sw-sqft</property>
            <property>aero/cl-squared</property>
            <value>0.05227</value>
          <table>
            <independentVar lookup="row">aero/h_b-mac-ft</independentVar>
            <tableData>
                    0.00   -1.00000
                    0.10   -0.28090
                    0.15   -0.14793
                    0.20   -0.08897
                    0.30   -0.04160
                    0.40   -0.02383
                    0.50   -0.01538
                    0.60   -0.01073
                    0.70   -0.00791
                    0.80   -0.00607
                    0.90   -0.00480
                    1.00   -0.00389
                    1.10   -0.00322
            </tableData>
          </table>
          </product>
        </function>
        <function name="aero/coefficient/CD_spoilers">
          <description>spoilers: drag of its spoiler panels, 27.4 m2 opened to 60 deg (hangar)</description>
          <product>
            <property>aero/qbar-psf</property>
            <property>metrics/Sw-sqft</property>
            <value>0.092979</value>
            <pow>
              <sin>
                <product>
                  <property>fcs/speedbrake-pos-norm</property>
                  <value>1.0472</value>
                </product>
              </sin>
              <value>2</value>
            </pow>
          </product>
        </function>
        <function name="aero/coefficient/CD_gear">
          <description>the gear extended: its wheels' and struts' drag by Raymer's components, 2.41 m2 (hangar)</description>
          <product>
            <property>aero/qbar-psf</property>
            <property>metrics/Sw-sqft</property>
            <value>0.00683119</value>
            <property>gear/gear-pos-norm</property>
          </product>
        </function>
      </axis>
      <axis name="SIDE">
        <function name="aero/coefficient/CY_base">
          <description>CY over alpha and beta (hangar)</description>
          <product>
            <property>aero/qbar-psf</property>
            <property>metrics/Sw-sqft</property>
            <property>aero/function/mach-side</property>
          <table>
            <independentVar lookup="row">aero/alpha-deg</independentVar>
            <independentVar lookup="column">aero/beta-deg</independentVar>
            <tableData>
                        -90.00    -70.00    -50.00    -40.00    -30.00    -25.00    -20.00    -15.00    -10.00     -6.00     -3.00      0.00      3.00      6.00     10.00     15.00     20.00     25.00     30.00     40.00     50.00     70.00     90.00
             -180.00  -0.00000   0.22592   0.29552   0.25168   0.18026   0.14084   0.10246   0.06755   0.07828   0.09587   0.05122  -0.00000  -0.05122  -0.09587  -0.07828  -0.06755  -0.10246  -0.14084  -0.18026  -0.25168  -0.29552  -0.22592   0.00000
             -120.00  -0.00000  -0.02597  -0.22943  -0.31173  -0.33490  -0.31848  -0.28297  -0.22895  -0.16316  -0.09721  -0.03355  -0.00000   0.03355   0.09721   0.16316   0.22895   0.28297   0.31848   0.33490   0.31173   0.22943   0.02597   0.00000
              -70.00   0.00000  -0.05151  -0.27167  -0.35591  -0.37517  -0.35416  -0.31152  -0.25062  -0.17301  -0.09461  -0.03939  -0.00000   0.03939   0.09461   0.17301   0.25062   0.31152   0.35416   0.37517   0.35591   0.27167   0.05151  -0.00000
              -46.00   0.00000   0.07043  -0.00298  -0.05164  -0.07470  -0.06851  -0.05711  -0.03014   0.03311   0.01751   0.00874  -0.00000  -0.00874  -0.01751  -0.03311   0.03014   0.05711   0.06851   0.07470   0.05164   0.00298  -0.07043  -0.00000
              -32.00   0.00000   0.14763   0.17140   0.14665   0.12706   0.11998   0.15407   0.11097   0.06888   0.03959   0.01942  -0.00000  -0.01942  -0.03959  -0.06888  -0.11097  -0.15407  -0.11998  -0.12706  -0.14665  -0.17140  -0.14763  -0.00000
              -22.00   0.00000   0.20899   0.28408   0.27163   0.29215   0.26751   0.21528   0.16186   0.10826   0.06558   0.03316  -0.00000  -0.03316  -0.06558  -0.10826  -0.16186  -0.21528  -0.26751  -0.29215  -0.27163  -0.28408  -0.20899  -0.00000
              -17.00   0.00000   0.23660   0.34428   0.33629   0.35112   0.29833   0.24408   0.18536   0.12446   0.07466   0.03722  -0.00000  -0.03722  -0.07466  -0.12446  -0.18536  -0.24408  -0.29833  -0.35112  -0.33629  -0.34428  -0.23660  -0.00000
              -13.00   0.00000   0.25841   0.37319   0.35886   0.36098   0.31012   0.25311   0.19118   0.12672   0.07530   0.03743  -0.00000  -0.03743  -0.07530  -0.12672  -0.19118  -0.25311  -0.31012  -0.36098  -0.35886  -0.37319  -0.25841  -0.00000
               -9.00   0.00000   0.27922   0.38326   0.37028   0.36350   0.31293   0.25401   0.19001   0.12465   0.07358   0.03643  -0.00000  -0.03643  -0.07358  -0.12465  -0.19001  -0.25401  -0.31293  -0.36350  -0.37028  -0.38326  -0.27922  -0.00000
               -5.00   0.00000   0.29322   0.38876   0.37397   0.35833   0.30740   0.24782   0.18394   0.11964   0.06996   0.03437  -0.00000  -0.03437  -0.06996  -0.11964  -0.18394  -0.24782  -0.30740  -0.35833  -0.37397  -0.38876  -0.29322  -0.00000
               -1.00   0.00000   0.29700   0.38811   0.36655   0.34436   0.29397   0.23604   0.17443   0.11268   0.06525   0.03167  -0.00000  -0.03167  -0.06525  -0.11268  -0.17443  -0.23604  -0.29397  -0.34436  -0.36655  -0.38811  -0.29700  -0.00000
                3.00   0.00000   0.29000   0.37854   0.35283   0.32198   0.27343   0.21980   0.16228   0.10461   0.06055   0.02945  -0.00000  -0.02945  -0.06055  -0.10461  -0.16228  -0.21980  -0.27343  -0.32198  -0.35283  -0.37854  -0.29000  -0.00000
                7.00   0.00000   0.27120   0.36949   0.33500   0.29226   0.24584   0.19717   0.14611   0.09447   0.05476   0.02666  -0.00000  -0.02666  -0.05476  -0.09447  -0.14611  -0.19717  -0.24584  -0.29226  -0.33500  -0.36949  -0.27120  -0.00000
               11.00   0.00000   0.25220   0.35492   0.31233   0.25458   0.21021   0.16679   0.12302   0.08006   0.04685   0.02289  -0.00000  -0.02289  -0.04685  -0.08006  -0.12302  -0.16679  -0.21021  -0.25458  -0.31233  -0.35492  -0.25220  -0.00000
               15.00   0.00000   0.23299   0.32116   0.28354   0.21054   0.16679   0.12914   0.09332   0.05951   0.03460   0.01699  -0.00000  -0.01699  -0.03460  -0.05951  -0.09332  -0.12914  -0.16679  -0.21054  -0.28354  -0.32116  -0.23299  -0.00000
               19.00   0.00000   0.21198   0.28522   0.25336   0.16937   0.12113   0.08815   0.06000   0.03508   0.01846   0.00851  -0.00000  -0.00851  -0.01846  -0.03508  -0.06000  -0.08815  -0.12113  -0.16937  -0.25336  -0.28522  -0.21198  -0.00000
               23.00   0.00000   0.18934   0.25553   0.22106   0.16617   0.11489   0.07882   0.05344   0.03370   0.02207   0.01849  -0.00000  -0.01849  -0.02207  -0.03370  -0.05344  -0.07882  -0.11489  -0.16617  -0.22106  -0.25553  -0.18934  -0.00000
               27.00   0.00000   0.16908   0.22199   0.18720   0.14653   0.09685   0.06168   0.04225   0.02698   0.01601   0.00868  -0.00000  -0.00868  -0.01601  -0.02698  -0.04225  -0.06168  -0.09685  -0.14653  -0.18720  -0.22199  -0.16908  -0.00000
               32.00   0.00000   0.14416   0.16803   0.13010   0.11398   0.06560   0.03514   0.02065   0.01092   0.00602   0.00332  -0.00000  -0.00332  -0.00602  -0.01092  -0.02065  -0.03514  -0.06560  -0.11398  -0.13010  -0.16803  -0.14416  -0.00000
               46.00   0.00000   0.06930  -0.01569  -0.06379  -0.09028  -0.06213  -0.06824  -0.07022  -0.05009  -0.02773  -0.00902  -0.00000   0.00902   0.02773   0.05009   0.07022   0.06824   0.06213   0.09028   0.06379   0.01569  -0.06930  -0.00000
               70.00   0.00000  -0.05336  -0.27718  -0.36252  -0.38170  -0.36017  -0.31689  -0.25519  -0.17634  -0.09648  -0.04032  -0.00000   0.04032   0.09648   0.17634   0.25519   0.31689   0.36017   0.38170   0.36252   0.27718   0.05336  -0.00000
              120.00  -0.00000  -0.02348  -0.22225  -0.30314  -0.32633  -0.31054  -0.27602  -0.22373  -0.15939  -0.09476  -0.03235  -0.00000   0.03235   0.09476   0.15939   0.22373   0.27602   0.31054   0.32633   0.30314   0.22225   0.02348   0.00000
              180.00  -0.00000   0.22592   0.29552   0.25168   0.18026   0.14084   0.10246   0.06755   0.07828   0.09587   0.05122  -0.00000  -0.05122  -0.09587  -0.07828  -0.06755  -0.10246  -0.14084  -0.18026  -0.25168  -0.29552  -0.22592   0.00000
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            </tableData>
          </table>
          </product>
        </function>
        <function name="aero/coefficient/CY_aileron">
          <description>CY increment from aileron (deg), over alpha</description>
          <product>
            <property>aero/qbar-psf</property>
            <property>metrics/Sw-sqft</property>
            <property>aero/function/mach-aileron</property>
          <table>
            <independentVar lookup="row">aero/alpha-deg</independentVar>
            <independentVar lookup="column">fcs/left-aileron-pos-deg</independentVar>
            <tableData>
                        -20.00    -15.00    -10.00     -5.00      0.00      5.00     10.00     15.00     20.00
             -180.00   0.00000   0.00000   0.00000   0.00000   0.00000   0.00000   0.00000   0.00000   0.00000
             -120.00  -0.00059  -0.00050  -0.00037  -0.00020   0.00000   0.00020   0.00037   0.00050   0.00059
              -70.00   0.00015   0.00013   0.00010   0.00005   0.00000  -0.00005  -0.00010  -0.00013  -0.00015
              -46.00   0.00142   0.00123   0.00093   0.00050   0.00000  -0.00050  -0.00093  -0.00123  -0.00142
              -32.00   0.00346   0.00297   0.00223   0.00119   0.00000  -0.00119  -0.00223  -0.00297  -0.00346
              -22.00  -0.00209  -0.00204  -0.00181  -0.00115   0.00000   0.00115   0.00181   0.00204   0.00209
              -17.00  -0.00027  -0.00024  -0.00018  -0.00009   0.00000   0.00009   0.00018   0.00024   0.00027
              -13.00  -0.00000  -0.00003  -0.00004  -0.00002   0.00000   0.00002   0.00004   0.00003   0.00000
               -9.00  -0.00008  -0.00009  -0.00008  -0.00005   0.00000   0.00005   0.00008   0.00009   0.00008
               -5.00  -0.00017  -0.00017  -0.00014  -0.00008   0.00000   0.00008   0.00014   0.00017   0.00017
               -1.00  -0.00026  -0.00025  -0.00020  -0.00011   0.00000   0.00011   0.00020   0.00025   0.00026
                3.00  -0.00034  -0.00031  -0.00025  -0.00013   0.00000   0.00013   0.00025   0.00031   0.00034
                7.00  -0.00046  -0.00041  -0.00032  -0.00017   0.00000   0.00017   0.00032   0.00041   0.00046
               11.00  -0.00058  -0.00054  -0.00043  -0.00024   0.00000   0.00024   0.00043   0.00054   0.00058
               15.00   0.00267   0.00199   0.00118   0.00047   0.00000  -0.00047  -0.00118  -0.00199  -0.00267
               19.00   0.00934   0.00829   0.00652   0.00369   0.00000  -0.00369  -0.00652  -0.00829  -0.00934
               23.00  -0.01782  -0.01777  -0.01948  -0.02296   0.00000   0.02296   0.01948   0.01777   0.01782
               27.00  -0.00191  -0.00110  -0.00056  -0.00024   0.00000   0.00024   0.00056   0.00110   0.00191
               32.00  -0.00089  -0.00053  -0.00028  -0.00013   0.00000   0.00013   0.00028   0.00053   0.00089
               46.00   0.00098   0.00089   0.00070   0.00038   0.00000  -0.00038  -0.00070  -0.00089  -0.00098
               70.00   0.00022   0.00018   0.00014   0.00007   0.00000  -0.00007  -0.00014  -0.00018  -0.00022
              120.00  -0.00052  -0.00044  -0.00033  -0.00018   0.00000   0.00018   0.00033   0.00044   0.00052
              180.00   0.00000   0.00000   0.00000   0.00000   0.00000   0.00000   0.00000   0.00000   0.00000
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            </tableData>
          </table>
          </product>
        </function>
        <function name="aero/coefficient/CY_rudder">
          <description>CY increment from rudder (deg), over alpha</description>
          <product>
            <property>aero/qbar-psf</property>
            <property>metrics/Sw-sqft</property>
            <property>aero/function/mach-rudder</property>
          <table>
            <independentVar lookup="row">aero/alpha-deg</independentVar>
            <independentVar lookup="column">fcs/rudder-pos-deg</independentVar>
            <tableData>
                        -25.00    -20.00    -15.00    -10.00     -5.00      0.00      5.00     10.00     15.00     20.00     25.00
             -180.00   0.00000   0.00000   0.00000   0.00000   0.00000   0.00000   0.00000   0.00000   0.00000   0.00000   0.00000
              -35.00  -0.08703  -0.07864  -0.06695  -0.04965  -0.02641   0.00000   0.02641   0.04965   0.06695   0.07864   0.08703
              -11.00  -0.07017  -0.06329  -0.05378  -0.03985  -0.02119   0.00000   0.02119   0.03985   0.05378   0.06329   0.07017
                4.00  -0.06253  -0.05643  -0.04797  -0.03556  -0.01892   0.00000   0.01892   0.03556   0.04797   0.05643   0.06253
               19.00  -0.04790  -0.04326  -0.03680  -0.02729  -0.01452   0.00000   0.01452   0.02729   0.03680   0.04326   0.04790
               42.00  -0.04948  -0.04480  -0.03835  -0.02848  -0.01493   0.00000   0.01493   0.02848   0.03835   0.04480   0.04948
              180.00   0.00000   0.00000   0.00000   0.00000   0.00000   0.00000   0.00000   0.00000   0.00000   0.00000   0.00000
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            </tableData>
          </table>
          </product>
        </function>
        <function name="aero/coefficient/CYp">
          <description>CY per p (non-dimensional), over alpha</description>
          <product>
            <property>aero/qbar-psf</property>
            <property>metrics/Sw-sqft</property>
            <property>aero/bi2vel</property>
            <property>velocities/p-aero-rad_sec</property>
            <property>aero/function/mach-lift</property>
          <table>
            <independentVar lookup="row">aero/alpha-deg</independentVar>
            <tableData>
                 -180.00   -0.13297
                 -165.00   -0.24821
                  -32.00   -0.22964
                  -10.00    0.00296
                    5.00    0.02084
                   20.00    0.14068
                   46.00   -0.02767
                  180.00   -0.13297
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            </tableData>
          </table>
          </product>
        </function>
        <function name="aero/coefficient/CYr">
          <description>CY per r (non-dimensional), over alpha</description>
          <product>
            <property>aero/qbar-psf</property>
            <property>metrics/Sw-sqft</property>
            <property>aero/bi2vel</property>
            <property>velocities/r-aero-rad_sec</property>
            <property>aero/function/mach-lift</property>
          <table>
            <independentVar lookup="row">aero/alpha-deg</independentVar>
            <tableData>
                 -180.00    0.87999
                 -165.00    0.86642
                  -32.00    0.64798
                  -10.00    0.43946
                    5.00    0.35232
                   20.00    0.27430
                   46.00    0.39137
                  180.00    0.87999
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            </tableData>
          </table>
          </product>
        </function>
      </axis>
      <axis name="LIFT">
        <function name="aero/coefficient/CL_base">
          <description>CL over alpha and beta, ground effect, compressibility (hangar)</description>
          <product>
            <property>aero/qbar-psf</property>
            <property>metrics/Sw-sqft</property>
            <property>aero/function/CL-base</property>
            <property>aero/function/mach-lift</property>
          <table>
            <independentVar lookup="row">aero/h_b-mac-ft</independentVar>
            <tableData>
                    0.00    1.20000
                    0.10    1.08692
                    0.20    1.03778
                    0.40    1.00713
                    0.60    1.00135
                    0.80    1.00025
                    1.00    1.00005
                    1.10    1.00000
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            </tableData>
          </table>
          </product>
        </function>
        <function name="aero/coefficient/CL_elevator">
          <description>CL increment from elevator (deg), over alpha</description>
          <product>
            <property>aero/qbar-psf</property>
            <property>metrics/Sw-sqft</property>
            <property>aero/function/mach-elevator</property>
          <table>
            <independentVar lookup="row">aero/alpha-deg</independentVar>
            <independentVar lookup="column">fcs/elevator-pos-deg</independentVar>
            <tableData>
                        -25.00    -20.00    -15.00    -10.00     -5.00      0.00      5.00     10.00     15.00     20.00
             -180.00   0.00000   0.00000   0.00000   0.00000   0.00000   0.00000   0.00000   0.00000   0.00000   0.00000
              -35.00  -0.06976  -0.06567  -0.05814  -0.04477  -0.02460   0.00000   0.02564   0.04860   0.06557   0.07673
              -11.00  -0.14441  -0.13230  -0.11424  -0.08596  -0.04621   0.00000   0.04677   0.08810   0.11864   0.13893
                4.00  -0.15868  -0.14421  -0.12339  -0.09187  -0.04894   0.00000   0.04873   0.09113   0.12198   0.14211
               19.00  -0.13143  -0.12409  -0.10903  -0.08094  -0.04273   0.00000   0.04167   0.07724   0.10270   0.11907
               42.00  -0.09191  -0.08328  -0.07122  -0.05323  -0.02858   0.00000   0.02885   0.05382   0.07155   0.08270
              180.00   0.00000   0.00000   0.00000   0.00000   0.00000   0.00000   0.00000   0.00000   0.00000   0.00000
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            </tableData>
          </table>
          </product>
        </function>
        <function name="aero/coefficient/CL_flap">
          <description>CL increment from flap (deg), over alpha</description>
          <product>
            <property>aero/qbar-psf</property>
            <property>metrics/Sw-sqft</property>
            <property>aero/function/mach-flap</property>
          <table>
            <independentVar lookup="row">aero/alpha-deg</independentVar>
            <independentVar lookup="column">fcs/flap-pos-deg</independentVar>
            <tableData>
                          0.00      5.00     10.00     15.00     20.00     25.00     30.00     35.00     40.00
             -180.00   0.00000   0.00000   0.00000   0.00000   0.00000   0.00000   0.00000  -0.00000  -0.00000
              -35.00   0.00000   0.07049   0.13984   0.20244   0.25460   0.29540   0.32677   0.35139   0.37256
              -11.00   0.00000   0.16723   0.32852   0.47498   0.60096   0.70672   0.79679   0.87688   0.95177
                4.00   0.00000   0.16308   0.31907   0.45949   0.57916   0.67867   0.76261   0.83662   0.90537
               19.00   0.00000   0.12901   0.24419   0.34319   0.42438   0.48983   0.54300   0.58798   0.62815
               42.00   0.00000   0.06818   0.13182   0.18714   0.23241   0.26846   0.29749   0.32170   0.34264
              180.00   0.00000   0.00000   0.00000   0.00000   0.00000   0.00000   0.00000   0.00000   0.00000
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            </tableData>
          </table>
          <table>
            <independentVar lookup="row">aero/h_b-mac-ft</independentVar>
            <tableData>
                    0.00    1.20000
                    0.10    1.08692
                    0.20    1.03778
                    0.40    1.00713
                    0.60    1.00135
                    0.80    1.00025
                    1.00    1.00005
                    1.10    1.00000
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            </tableData>
          </table>
          </product>
        </function>
        <function name="aero/coefficient/CLq">
          <description>CL per q (non-dimensional), over alpha</description>
          <product>
            <property>aero/qbar-psf</property>
            <property>metrics/Sw-sqft</property>
            <property>aero/ci2vel</property>
            <property>velocities/q-aero-rad_sec</property>
            <property>aero/function/mach-lift</property>
          <table>
            <independentVar lookup="row">aero/alpha-deg</independentVar>
            <tableData>
                 -180.00   -2.37864
                 -165.00   -1.28122
                  -32.00    5.11808
                  -10.00   11.48049
                    5.00   11.25070
                   20.00    3.72175
                   46.00    1.71005
                  180.00   -2.37864
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            </tableData>
          </table>
          </product>
        </function>
        <function name="aero/coefficient/CLadot">
          <description>CL per alpha-dot (downwash lag at the tail)</description>
          <product>
            <property>aero/qbar-psf</property>
            <property>metrics/Sw-sqft</property>
            <property>aero/ci2vel</property>
            <property>aero/alphadot-rad_sec</property>
            <value>1.36517</value>
            <property>aero/function/mach-lift</property>
          </product>
        </function>
        <function name="aero/coefficient/CL_spoilers">
          <description>spoilers: the lift lost behind them, 228 m2 of wing, over alpha (hangar)</description>
          <product>
            <property>aero/qbar-psf</property>
            <property>metrics/Sw-sqft</property>
            <table>
              <independentVar lookup="row">aero/alpha-deg</independentVar>
              <tableData>
                   -180.00   -0.02472
                   -165.00   -0.20412
                    -32.00    0.67876
                    -10.00    0.30014
                      5.00   -0.37286
                     20.00   -0.91039
                     46.00   -0.60368
                    180.00   -0.02472
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              </tableData>
            </table>
            <min>
              <value>1</value>
              <product>
                <property>fcs/speedbrake-pos-norm</property>
                <value>1.33333</value>
              </product>
            </min>
          </product>
        </function>
      </axis>
      <axis name="ROLL">
        <function name="aero/coefficient/Cl_base">
          <description>Cl over alpha and beta (hangar)</description>
          <product>
            <property>aero/qbar-psf</property>
            <property>metrics/Sw-sqft</property>
            <property>metrics/bw-ft</property>
            <property>aero/function/mach-side</property>
          <table>
            <independentVar lookup="row">aero/alpha-deg</independentVar>
            <independentVar lookup="column">aero/beta-deg</independentVar>
            <tableData>
                        -90.00    -70.00    -50.00    -40.00    -30.00    -25.00    -20.00    -15.00    -10.00     -6.00     -3.00      0.00      3.00      6.00     10.00     15.00     20.00     25.00     30.00     40.00     50.00     70.00     90.00
             -180.00   0.02800   0.02072  -0.01320  -0.01854  -0.01850  -0.01694  -0.01455  -0.01147  -0.00242   0.00582   0.00359  -0.00000  -0.00359  -0.00582   0.00242   0.01147   0.01455   0.01694   0.01850   0.01854   0.01320  -0.02072  -0.02800
              -35.00   0.02800   0.02110   0.01725   0.02259   0.01961   0.01712   0.01787   0.02084   0.01303   0.00760   0.00379  -0.00000  -0.00379  -0.00760  -0.01303  -0.02084  -0.01787  -0.01712  -0.01961  -0.02259  -0.01725  -0.02110  -0.02800
              -11.00   0.02800   0.00380  -0.00613   0.00866   0.01010   0.00412   0.00285   0.00211   0.00132   0.00076   0.00037  -0.00000  -0.00037  -0.00076  -0.00132  -0.00211  -0.00285  -0.00412  -0.01010  -0.00866   0.00613  -0.00380  -0.02800
                4.00   0.02800  -0.00144  -0.00774   0.02661   0.05156   0.04993   0.04198   0.03261   0.02224   0.01350   0.00678  -0.00000  -0.00678  -0.01350  -0.02224  -0.03261  -0.04198  -0.04993  -0.05156  -0.02661   0.00774   0.00144  -0.02800
               19.00   0.02800   0.02282   0.04099   0.06730   0.09333   0.09361   0.08130   0.06279   0.04257   0.02563   0.01283  -0.00000  -0.01283  -0.02563  -0.04257  -0.06279  -0.08130  -0.09361  -0.09333  -0.06730  -0.04099  -0.02282  -0.02800
               42.00   0.02800   0.01914   0.00843   0.00579   0.00846   0.01357   0.00899   0.00627   0.00441   0.00288   0.00181  -0.00000  -0.00181  -0.00288  -0.00441  -0.00627  -0.00899  -0.01357  -0.00846  -0.00579  -0.00843  -0.01914  -0.02800
              180.00   0.02800   0.02072  -0.01320  -0.01854  -0.01850  -0.01694  -0.01455  -0.01147  -0.00242   0.00582   0.00359  -0.00000  -0.00359  -0.00582   0.00242   0.01147   0.01455   0.01694   0.01850   0.01854   0.01320  -0.02072  -0.02800
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            </tableData>
          </table>
          </product>
        </function>
        <function name="aero/coefficient/Cl_aileron">
          <description>Cl increment from aileron (deg), over alpha</description>
          <product>
            <property>aero/qbar-psf</property>
            <property>metrics/Sw-sqft</property>
            <property>metrics/bw-ft</property>
            <property>aero/function/mach-aileron</property>
          <table>
            <independentVar lookup="row">aero/alpha-deg</independentVar>
            <independentVar lookup="column">fcs/left-aileron-pos-deg</independentVar>
            <tableData>
                        -20.00    -15.00    -10.00     -5.00      0.00      5.00     10.00     15.00     20.00
             -180.00   0.00000   0.00000   0.00000   0.00000   0.00000   0.00000   0.00000   0.00000   0.00000
              -35.00  -0.00795  -0.00715  -0.00554  -0.00303   0.00000   0.00303   0.00554   0.00715   0.00795
              -11.00  -0.03015  -0.02577  -0.01917  -0.01022   0.00000   0.01022   0.01917   0.02577   0.03015
                4.00  -0.03138  -0.02685  -0.02000  -0.01067   0.00000   0.01067   0.02000   0.02685   0.03138
               19.00  -0.03619  -0.03098  -0.02311  -0.01233   0.00000   0.01233   0.02311   0.03098   0.03619
               42.00  -0.00936  -0.00828  -0.00632  -0.00342   0.00000   0.00342   0.00632   0.00828   0.00936
              180.00   0.00000   0.00000   0.00000   0.00000   0.00000   0.00000   0.00000   0.00000   0.00000
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            </tableData>
          </table>
          </product>
        </function>
        <function name="aero/coefficient/Cl_rudder">
          <description>Cl increment from rudder (deg), over alpha</description>
          <product>
            <property>aero/qbar-psf</property>
            <property>metrics/Sw-sqft</property>
            <property>metrics/bw-ft</property>
            <property>aero/function/mach-rudder</property>
          <table>
            <independentVar lookup="row">aero/alpha-deg</independentVar>
            <independentVar lookup="column">fcs/rudder-pos-deg</independentVar>
            <tableData>
                        -25.00    -20.00    -15.00    -10.00     -5.00      0.00      5.00     10.00     15.00     20.00     25.00
             -180.00   0.00000   0.00000   0.00000   0.00000   0.00000   0.00000   0.00000   0.00000   0.00000   0.00000   0.00000
              -35.00  -0.01363  -0.01231  -0.01047  -0.00776  -0.00412   0.00000   0.00412   0.00776   0.01047   0.01231   0.01363
              -11.00  -0.01169  -0.01053  -0.00893  -0.00661  -0.00351   0.00000   0.00351   0.00661   0.00893   0.01053   0.01169
                4.00  -0.01043  -0.00939  -0.00797  -0.00590  -0.00314   0.00000   0.00314   0.00590   0.00797   0.00939   0.01043
               19.00  -0.00781  -0.00706  -0.00601  -0.00446  -0.00237   0.00000   0.00237   0.00446   0.00601   0.00706   0.00781
               42.00  -0.00722  -0.00656  -0.00561  -0.00415  -0.00216   0.00000   0.00216   0.00415   0.00561   0.00656   0.00722
              180.00   0.00000   0.00000   0.00000   0.00000   0.00000   0.00000   0.00000   0.00000   0.00000   0.00000   0.00000
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            </tableData>
          </table>
          </product>
        </function>
        <function name="aero/coefficient/Clp">
          <description>Cl per p (non-dimensional), over alpha</description>
          <product>
            <property>aero/qbar-psf</property>
            <property>metrics/Sw-sqft</property>
            <property>metrics/bw-ft</property>
            <property>aero/bi2vel</property>
            <property>velocities/p-aero-rad_sec</property>
            <property>aero/function/mach-lift</property>
          <table>
            <independentVar lookup="row">aero/alpha-deg</independentVar>
            <tableData>
                 -180.00   -0.64307
                 -165.00   -0.17387
                  -32.00   -0.13864
                  -10.00   -0.46778
                    5.00   -0.48077
                   20.00    0.23996
                   46.00   -0.20078
                  180.00   -0.64307
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            </tableData>
          </table>
          </product>
        </function>
        <function name="aero/coefficient/Clr">
          <description>Cl per r (non-dimensional), over alpha</description>
          <product>
            <property>aero/qbar-psf</property>
            <property>metrics/Sw-sqft</property>
            <property>metrics/bw-ft</property>
            <property>aero/bi2vel</property>
            <property>velocities/r-aero-rad_sec</property>
            <property>aero/function/mach-lift</property>
          <table>
            <independentVar lookup="row">aero/alpha-deg</independentVar>
            <tableData>
                 -180.00    0.10329
                 -165.00    0.15925
                  -32.00   -0.16862
                  -10.00   -0.00147
                    5.00    0.17466
                   20.00    0.60615
                   46.00    0.22610
                  180.00    0.10329
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            </tableData>
          </table>
          </product>
        </function>
      </axis>
      <axis name="PITCH">
        <function name="aero/coefficient/Cm_base">
          <description>Cm over alpha and beta (hangar)</description>
          <product>
            <property>aero/qbar-psf</property>
            <property>metrics/Sw-sqft</property>
            <property>metrics/cbarw-ft</property>
          <table>
            <independentVar lookup="row">aero/alpha-deg</independentVar>
            <independentVar lookup="column">aero/beta-deg</independentVar>
            <tableData>
                        -90.00    -70.00    -50.00    -40.00    -30.00    -25.00    -20.00    -15.00    -10.00     -6.00     -3.00      0.00      3.00      6.00     10.00     15.00     20.00     25.00     30.00     40.00     50.00     70.00     90.00
             -180.00  -0.00000   0.00124   0.00502   0.00413   0.00277   0.00211   0.00152   0.00106   0.00898   0.00779   0.00171  -0.00051   0.00171   0.00779   0.00898   0.00106   0.00152   0.00211   0.00277   0.00413   0.00502   0.00124  -0.00000
              -35.00  -0.00000   0.16027   0.47922   0.63826   0.70492   0.71389   0.74032   0.75996   0.72824   0.70444   0.69283   0.68874   0.69283   0.70444   0.72824   0.75996   0.74032   0.71389   0.70492   0.63826   0.47922   0.16027  -0.00000
              -11.00  -0.00000   0.04910   0.18947   0.24059   0.13724   0.17797   0.22032   0.25512   0.27914   0.29107   0.29600   0.29763   0.29600   0.29107   0.27914   0.25512   0.22032   0.17797   0.13724   0.24059   0.18947   0.04910  -0.00000
                4.00  -0.00000  -0.04844  -0.05461  -0.08966  -0.15777  -0.15360  -0.14193  -0.13294  -0.12738  -0.12532  -0.12496  -0.12505  -0.12496  -0.12532  -0.12738  -0.13294  -0.14193  -0.15360  -0.15777  -0.08966  -0.05461  -0.04844  -0.00000
               19.00  -0.00000  -0.15038  -0.33402  -0.34931  -0.31267  -0.33116  -0.35114  -0.36231  -0.37102  -0.37565  -0.37745  -0.37803  -0.37745  -0.37565  -0.37102  -0.36231  -0.35114  -0.33116  -0.31267  -0.34931  -0.33402  -0.15038  -0.00000
               42.00  -0.00000  -0.15992  -0.53724  -0.72200  -0.88044  -0.93655  -0.96638  -0.99316  -1.01343  -1.02423  -1.02871  -1.02982  -1.02871  -1.02423  -1.01343  -0.99316  -0.96638  -0.93655  -0.88044  -0.72200  -0.53724  -0.15992  -0.00000
              180.00  -0.00000   0.00124   0.00502   0.00413   0.00277   0.00211   0.00152   0.00106   0.00898   0.00779   0.00171  -0.00051   0.00171   0.00779   0.00898   0.00106   0.00152   0.00211   0.00277   0.00413   0.00502   0.00124  -0.00000
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            </tableData>
          </table>
          </product>
        </function>
        <function name="aero/coefficient/Cm_mach">
          <description>Cm from the neutral point's move with Mach</description>
          <product>
            <property>aero/qbar-psf</property>
            <property>metrics/Sw-sqft</property>
            <property>metrics/cbarw-ft</property>
            <property>aero/function/CL-base</property>
            <property>aero/function/mach-dCm-dCL</property>
          </product>
        </function>
        <function name="aero/coefficient/Cm_elevator">
          <description>Cm increment from elevator (deg), over alpha</description>
          <product>
            <property>aero/qbar-psf</property>
            <property>metrics/Sw-sqft</property>
            <property>metrics/cbarw-ft</property>
            <property>aero/function/mach-elevator</property>
          <table>
            <independentVar lookup="row">aero/alpha-deg</independentVar>
            <independentVar lookup="column">fcs/elevator-pos-deg</independentVar>
            <tableData>
                        -25.00    -20.00    -15.00    -10.00     -5.00      0.00      5.00     10.00     15.00     20.00
             -180.00  -0.01061  -0.00695  -0.00398  -0.00179  -0.00045   0.00000  -0.00045  -0.00179  -0.00398  -0.00695
              -35.00   0.14735   0.13926   0.12438   0.09692   0.05392   0.00000  -0.05707  -0.10765  -0.14228  -0.16061
              -11.00   0.52606   0.47647   0.40690   0.30280   0.16089   0.00000  -0.15899  -0.29604  -0.39431  -0.45679
                4.00   0.59038   0.53318   0.45339   0.33542   0.17747   0.00000  -0.17433  -0.32396  -0.43119  -0.49972
               19.00   0.50354   0.47447   0.41611   0.30860   0.16277   0.00000  -0.15855  -0.29375  -0.39049  -0.45267
               42.00   0.32573   0.29642   0.25389   0.18926   0.10095   0.00000  -0.10028  -0.18634  -0.24765  -0.28701
              180.00  -0.01061  -0.00695  -0.00398  -0.00179  -0.00045   0.00000  -0.00045  -0.00179  -0.00398  -0.00695
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            </tableData>
          </table>
          </product>
        </function>
        <function name="aero/coefficient/Cm_flap">
          <description>Cm increment from flap (deg), over alpha</description>
          <product>
            <property>aero/qbar-psf</property>
            <property>metrics/Sw-sqft</property>
            <property>metrics/cbarw-ft</property>
            <property>aero/function/mach-flap</property>
          <table>
            <independentVar lookup="row">aero/alpha-deg</independentVar>
            <independentVar lookup="column">fcs/flap-pos-deg</independentVar>
            <tableData>
                          0.00      5.00     10.00     15.00     20.00     25.00     30.00     35.00     40.00
             -180.00   0.00000  -0.00005  -0.00020  -0.00045  -0.00078  -0.00119  -0.00166  -0.00219  -0.00275
              -35.00   0.00000   0.00502   0.01041   0.01575   0.02065   0.02532   0.02978   0.03411   0.03869
              -11.00   0.00000  -0.01376  -0.02692  -0.03906  -0.04994  -0.05959  -0.06831  -0.07642  -0.08422
                4.00   0.00000  -0.00882  -0.01703  -0.02472  -0.03192  -0.03870  -0.04519  -0.05153  -0.05783
               19.00   0.00000   0.00675   0.01021   0.00860   0.00189  -0.00754  -0.01808  -0.02925  -0.04084
               42.00   0.00000  -0.00516  -0.00934  -0.01238  -0.01429  -0.01526  -0.01559  -0.01552  -0.01527
              180.00   0.00000  -0.00005  -0.00020  -0.00045  -0.00078  -0.00119  -0.00166  -0.00219  -0.00275
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            </tableData>
          </table>
          </product>
        </function>
        <function name="aero/coefficient/Cmq">
          <description>Cm per q (non-dimensional), over alpha</description>
          <product>
            <property>aero/qbar-psf</property>
            <property>metrics/Sw-sqft</property>
            <property>metrics/cbarw-ft</property>
            <property>aero/ci2vel</property>
            <property>velocities/q-aero-rad_sec</property>
            <property>aero/function/mach-lift</property>
          <table>
            <independentVar lookup="row">aero/alpha-deg</independentVar>
            <tableData>
                 -180.00   -9.50250
                 -165.00   -5.27359
                  -32.00  -20.29995
                  -10.00  -23.87540
                    5.00  -26.21487
                   20.00  -20.42975
                   46.00  -12.18737
                  180.00   -9.50250
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            </tableData>
          </table>
          </product>
        </function>
        <function name="aero/coefficient/Cmadot">
          <description>Cm per alpha-dot (downwash lag at the tail)</description>
          <product>
            <property>aero/qbar-psf</property>
            <property>metrics/Sw-sqft</property>
            <property>metrics/cbarw-ft</property>
            <property>aero/ci2vel</property>
            <property>aero/alphadot-rad_sec</property>
            <value>-4.82748</value>
            <property>aero/function/mach-lift</property>
          </product>
        </function>
        <function name="aero/coefficient/Cm_spoilers">
          <description>spoilers: its drag's pitching moment, 0.93 m from the reference point's height</description>
          <product>
            <property>aero/qbar-psf</property>
            <property>metrics/Sw-sqft</property>
            <property>metrics/cbarw-ft</property>
            <value>0.0109489</value>
            <pow>
              <sin>
                <product>
                  <property>fcs/speedbrake-pos-norm</property>
                  <value>1.0472</value>
                </product>
              </sin>
              <value>2</value>
            </pow>
          </product>
        </function>
        <function name="aero/coefficient/Cm_spoilers_lift">
          <description>spoilers: the lift lost's pitching moment, -0.09 m from the reference point</description>
          <product>
            <property>aero/qbar-psf</property>
            <property>metrics/Sw-sqft</property>
            <property>metrics/cbarw-ft</property>
            <table>
              <independentVar lookup="row">aero/alpha-deg</independentVar>
              <tableData>
                   -180.00   -0.00028
                   -165.00   -0.00235
                    -32.00    0.00781
                    -10.00    0.00345
                      5.00   -0.00429
                     20.00   -0.01048
                     46.00   -0.00695
                    180.00   -0.00028
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              </tableData>
            </table>
            <min>
              <value>1</value>
              <product>
                <property>fcs/speedbrake-pos-norm</property>
                <value>1.33333</value>
              </product>
            </min>
          </product>
        </function>
        <function name="aero/coefficient/Cm_gear">
          <description>the gear's drag's pitching moment, -3.92 m from the reference point's height</description>
          <product>
            <property>aero/qbar-psf</property>
            <property>metrics/Sw-sqft</property>
            <property>metrics/cbarw-ft</property>
            <value>-0.0034032</value>
            <property>gear/gear-pos-norm</property>
          </product>
        </function>
      </axis>
      <axis name="YAW">
        <function name="aero/coefficient/Cn_base">
          <description>Cn over alpha and beta (hangar)</description>
          <product>
            <property>aero/qbar-psf</property>
            <property>metrics/Sw-sqft</property>
            <property>metrics/bw-ft</property>
            <property>aero/function/mach-side</property>
          <table>
            <independentVar lookup="row">aero/alpha-deg</independentVar>
            <independentVar lookup="column">aero/beta-deg</independentVar>
            <tableData>
                        -90.00    -70.00    -50.00    -40.00    -30.00    -25.00    -20.00    -15.00    -10.00     -6.00     -3.00      0.00      3.00      6.00     10.00     15.00     20.00     25.00     30.00     40.00     50.00     70.00     90.00
             -180.00  -0.12174  -0.14008  -0.13415  -0.11901  -0.09638  -0.08264  -0.06759  -0.05148  -0.05316  -0.05776  -0.03127  -0.00000   0.03127   0.05776   0.05316   0.05148   0.06759   0.08264   0.09638   0.11901   0.13415   0.14008   0.12174
              -35.00  -0.12174  -0.09344  -0.07133  -0.06523  -0.05030  -0.04421  -0.04544  -0.05830  -0.03602  -0.02047  -0.01002  -0.00000   0.01002   0.02047   0.03602   0.05830   0.04544   0.04421   0.05030   0.06523   0.07133   0.09344   0.12174
              -11.00  -0.12174  -0.08508  -0.04823  -0.03876  -0.04669  -0.04089  -0.03433  -0.02634  -0.01755  -0.01046  -0.00520  -0.00000   0.00520   0.01046   0.01755   0.02634   0.03433   0.04089   0.04669   0.03876   0.04823   0.08508   0.12174
                4.00  -0.12174  -0.09423  -0.05245  -0.03548  -0.03744  -0.03437  -0.02958  -0.02331  -0.01594  -0.00962  -0.00479  -0.00000   0.00479   0.00962   0.01594   0.02331   0.02958   0.03437   0.03744   0.03548   0.05245   0.09423   0.12174
               19.00  -0.12174  -0.09303  -0.05023  -0.03339  -0.01815  -0.01283  -0.01072  -0.00772  -0.00487  -0.00276  -0.00136  -0.00000   0.00136   0.00276   0.00487   0.00772   0.01072   0.01283   0.01815   0.03339   0.05023   0.09303   0.12174
               42.00  -0.12174  -0.09471  -0.06263  -0.04388  -0.03113  -0.03345  -0.01942  -0.01157  -0.00681  -0.00441  -0.00324  -0.00000   0.00324   0.00441   0.00681   0.01157   0.01942   0.03345   0.03113   0.04388   0.06263   0.09471   0.12174
              180.00  -0.12174  -0.14008  -0.13415  -0.11901  -0.09638  -0.08264  -0.06759  -0.05148  -0.05316  -0.05776  -0.03127  -0.00000   0.03127   0.05776   0.05316   0.05148   0.06759   0.08264   0.09638   0.11901   0.13415   0.14008   0.12174
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            </tableData>
          </table>
          </product>
        </function>
        <function name="aero/coefficient/Cn_aileron">
          <description>Cn increment from aileron (deg), over alpha</description>
          <product>
            <property>aero/qbar-psf</property>
            <property>metrics/Sw-sqft</property>
            <property>metrics/bw-ft</property>
            <property>aero/function/mach-aileron</property>
          <table>
            <independentVar lookup="row">aero/alpha-deg</independentVar>
            <independentVar lookup="column">fcs/left-aileron-pos-deg</independentVar>
            <tableData>
                        -20.00    -15.00    -10.00     -5.00      0.00      5.00     10.00     15.00     20.00
             -180.00  -0.00000  -0.00000  -0.00000  -0.00000   0.00000  -0.00000  -0.00000  -0.00000  -0.00000
              -35.00   0.01085   0.00911   0.00670   0.00356   0.00000  -0.00356  -0.00670  -0.00911  -0.01085
              -11.00   0.00366   0.00311   0.00230   0.00122   0.00000  -0.00122  -0.00230  -0.00311  -0.00366
                4.00  -0.00068  -0.00057  -0.00042  -0.00022   0.00000   0.00022   0.00042   0.00057   0.00068
               19.00  -0.01229  -0.01034  -0.00764  -0.00409   0.00000   0.00409   0.00764   0.01034   0.01229
               42.00  -0.01217  -0.01030  -0.00761  -0.00404   0.00000   0.00404   0.00761   0.01030   0.01217
              180.00  -0.00000  -0.00000  -0.00000  -0.00000   0.00000  -0.00000  -0.00000  -0.00000  -0.00000
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            </tableData>
          </table>
          </product>
        </function>
        <function name="aero/coefficient/Cn_rudder">
          <description>Cn increment from rudder (deg), over alpha</description>
          <product>
            <property>aero/qbar-psf</property>
            <property>metrics/Sw-sqft</property>
            <property>metrics/bw-ft</property>
            <property>aero/function/mach-rudder</property>
          <table>
            <independentVar lookup="row">aero/alpha-deg</independentVar>
            <independentVar lookup="column">fcs/rudder-pos-deg</independentVar>
            <tableData>
                        -25.00    -20.00    -15.00    -10.00     -5.00      0.00      5.00     10.00     15.00     20.00     25.00
             -180.00  -0.00000  -0.00000  -0.00000  -0.00000  -0.00000   0.00000  -0.00000  -0.00000  -0.00000  -0.00000  -0.00000
              -35.00   0.03883   0.03505   0.02981   0.02209   0.01175   0.00000  -0.01175  -0.02209  -0.02981  -0.03505  -0.03883
              -11.00   0.03527   0.03177   0.02696   0.01996   0.01061   0.00000  -0.01061  -0.01996  -0.02696  -0.03177  -0.03527
                4.00   0.03372   0.03039   0.02580   0.01910   0.01015   0.00000  -0.01015  -0.01910  -0.02580  -0.03039  -0.03372
               19.00   0.02695   0.02429   0.02062   0.01527   0.00812   0.00000  -0.00812  -0.01527  -0.02062  -0.02429  -0.02695
               42.00   0.02708   0.02445   0.02086   0.01547   0.00814   0.00000  -0.00814  -0.01547  -0.02086  -0.02445  -0.02708
              180.00  -0.00000  -0.00000  -0.00000  -0.00000  -0.00000   0.00000  -0.00000  -0.00000  -0.00000  -0.00000  -0.00000
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            </tableData>
          </table>
          </product>
        </function>
        <function name="aero/coefficient/Cnp">
          <description>Cn per p (non-dimensional), over alpha</description>
          <product>
            <property>aero/qbar-psf</property>
            <property>metrics/Sw-sqft</property>
            <property>metrics/bw-ft</property>
            <property>aero/bi2vel</property>
            <property>velocities/p-aero-rad_sec</property>
            <property>aero/function/mach-lift</property>
          <table>
            <independentVar lookup="row">aero/alpha-deg</independentVar>
            <tableData>
                 -180.00    0.12450
                 -165.00    0.14593
                  -32.00    0.09493
                  -10.00    0.14738
                    5.00   -0.07543
                   20.00   -0.02254
                   46.00    0.01911
                  180.00    0.12450
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            </tableData>
          </table>
          </product>
        </function>
        <function name="aero/coefficient/Cnr">
          <description>Cn per r (non-dimensional), over alpha</description>
          <product>
            <property>aero/qbar-psf</property>
            <property>metrics/Sw-sqft</property>
            <property>metrics/bw-ft</property>
            <property>aero/bi2vel</property>
            <property>velocities/r-aero-rad_sec</property>
            <property>aero/function/mach-lift</property>
          <table>
            <independentVar lookup="row">aero/alpha-deg</independentVar>
            <tableData>
                 -180.00   -0.41803
                 -165.00   -0.41597
                  -32.00   -0.23507
                  -10.00   -0.22778
                    5.00   -0.19572
                   20.00   -0.05741
                   46.00   -0.16816
                  180.00   -0.41803
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            </tableData>
          </table>
          </product>
        </function>
      </axis>
    </aerodynamics>
</fdm_config>
