<?xml version="1.0"?>
<?xml-stylesheet type="text/xsl" href="http://jsbsim.sourceforge.net/JSBSim.xsl"?>
<!-- Generated by hangar 0.1.0 from e3g.toml on 2026-10-01. Edit the design and rebuild; changes
     made here are overwritten.  -->
<fdm_config name="e3g" version="2.0" release="ALPHA"
            xmlns:xsi="http://www.w3.org/2001/XMLSchema-instance"
            xsi:noNamespaceSchemaLocation="http://jsbsim.sourceforge.net/JSBSim.xsd">
    <fileheader>
      <author>hangar</author>
      <filecreationdate>2026-10-01</filecreationdate>
      <version>0.1.0</version>
      <description>Boeing E-3G Sentry AWACS (hangar build)</description>
      <note>Aerodynamics: vortex lattice with viscous section polars, full-envelope
        strip model, slender-body fuselage (hangar). Mass: Raymer component
        weights on the geometry. Propeller: blade-element momentum theory.</note>
      <reference refID="fsim/applicability/aerobatic" author="the design" title="USAF E-3 fact sheet: a large airborne warning aircraft, not cleared for aerobatics" date="n/a"/>
      <reference refID="fsim/applicability/carrier" author="the design" title="USAF E-3 fact sheet: a land-based airborne warning and control aircraft" date="n/a"/>
      <reference refID="fsim/applicability/drag_devices" author="the design" title="Boeing 707-320B data: flight and ground spoilers" date="n/a"/>
      <reference refID="fsim/applicability/flaps" author="the design" title="Boeing 707-320B data: trailing-edge flaps" date="n/a"/>
      <reference refID="fsim/applicability/ground_contact" author="the design" title="USAF E-3 fact sheet: tricycle wheeled gear" date="n/a"/>
      <reference refID="fsim/applicability/releasable_stores" author="the design" title="USAF E-3 fact sheet: unarmed" date="n/a"/>
      <reference refID="fsim/applicability/retractable_gear" author="the design" title="Boeing 707-320B data: retractable gear" date="n/a"/>
      <reference refID="fsim/applicability/vertical_flight" author="the design" title="USAF E-3 fact sheet: the Boeing 707-320B airframe, a conventional jet. Conventional take-off and landing: no rotors, lift fans or vectored lift to hover" date="n/a"/>
    </fileheader>
    <metrics>
      <wingarea unit="M2"> 283.4000 </wingarea>
      <wingspan unit="M"> 44.4200 </wingspan>
      <chord unit="M"> 7.3600 </chord>
      <htailarea unit="M2"> 58.5377 </htailarea>
      <htailarm unit="M"> 20.2104 </htailarm>
      <vtailarea unit="M2"> 30.4880 </vtailarea>
      <vtailarm unit="M"> 20.7432 </vtailarm>
      <location name="AERORP" unit="M">
        <x> 21.4000 </x>
        <y> 0.0000 </y>
        <z> 0.0000 </z>
      </location>
      <location name="EYEPOINT" unit="M">
        <x> 3.2000 </x>
        <y> -0.5500 </y>
        <z> 0.9000 </z>
      </location>
      <location name="VRP" unit="M">
        <x> 21.3000 </x>
        <y> -0.0000 </y>
        <z> 0.2000 </z>
      </location>
    </metrics>
    <mass_balance negated_crossproduct_inertia="false">
      <ixx unit="KG*M2"> 3977957.18 </ixx>
      <iyy unit="KG*M2"> 5583080.66 </iyy>
      <izz unit="KG*M2"> 9600291.45 </izz>
      <ixy unit="KG*M2"> -4.749 </ixy>
      <ixz unit="KG*M2"> 580589.027 </ixz>
      <iyz unit="KG*M2"> 3.510 </iyz>
      <emptywt unit="KG"> 83915.00 </emptywt>
      <location name="CG" unit="M">
        <x> 21.3000 </x>
        <y> -0.0000 </y>
        <z> 0.2000 </z>
      </location>
      <pointmass name="pilot">
        <weight unit="KG"> 95.00 </weight>
        <location unit="M">
          <x> 3.2000 </x>
          <y> -0.5500 </y>
          <z> 0.2000 </z>
        </location>
      </pointmass>
      <pointmass name="copilot">
        <weight unit="KG"> 95.00 </weight>
        <location unit="M">
          <x> 3.2000 </x>
          <y> 0.5500 </y>
          <z> 0.2000 </z>
        </location>
      </pointmass>
      <pointmass name="navigator and flight engineer">
        <weight unit="KG"> 190.00 </weight>
        <location unit="M">
          <x> 4.3000 </x>
          <y> 0.0000 </y>
          <z> 0.2000 </z>
        </location>
      </pointmass>
      <pointmass name="mission crew">
        <weight unit="KG"> 1805.00 </weight>
        <location unit="M">
          <x> 17.0000 </x>
          <y> 0.0000 </y>
          <z> 0.3000 </z>
        </location>
      </pointmass>
    </mass_balance>
    <ground_reactions>
      <contact type="BOGEY" name="Nose Gear">
        <location unit="M">
          <x> 5.1000 </x>
          <y> 0.0000 </y>
          <z> -3.5500 </z>
        </location>
        <static_friction> 0.8 </static_friction>
        <dynamic_friction> 0.5 </dynamic_friction>
        <rolling_friction> 0.02 </rolling_friction>
        <spring_coeff unit="N/M"> 542227 </spring_coeff>
        <damping_coeff unit="N/M/SEC"> 86575 </damping_coeff>
        <damping_coeff_rebound unit="N/M/SEC"> 173149 </damping_coeff_rebound>
        <max_steer unit="DEG"> 55.0 </max_steer>
        <brake_group> NONE </brake_group>
        <retractable> 1 </retractable>
      </contact>
      <contact type="BOGEY" name="Left Main Gear">
        <location unit="M">
          <x> 23.0800 </x>
          <y> -3.3650 </y>
          <z> -3.5500 </z>
        </location>
        <static_friction> 0.8 </static_friction>
        <dynamic_friction> 0.5 </dynamic_friction>
        <rolling_friction> 0.02 </rolling_friction>
        <spring_coeff unit="N/M"> 2668920 </spring_coeff>
        <damping_coeff unit="N/M/SEC"> 426133 </damping_coeff>
        <damping_coeff_rebound unit="N/M/SEC"> 852266 </damping_coeff_rebound>
        <max_steer unit="DEG"> 0.0 </max_steer>
        <brake_group> LEFT </brake_group>
        <retractable> 1 </retractable>
      </contact>
      <contact type="BOGEY" name="Right Main Gear">
        <location unit="M">
          <x> 23.0800 </x>
          <y> 3.3650 </y>
          <z> -3.5500 </z>
        </location>
        <static_friction> 0.8 </static_friction>
        <dynamic_friction> 0.5 </dynamic_friction>
        <rolling_friction> 0.02 </rolling_friction>
        <spring_coeff unit="N/M"> 2668920 </spring_coeff>
        <damping_coeff unit="N/M/SEC"> 426133 </damping_coeff>
        <damping_coeff_rebound unit="N/M/SEC"> 852266 </damping_coeff_rebound>
        <max_steer unit="DEG"> 0.0 </max_steer>
        <brake_group> RIGHT </brake_group>
        <retractable> 1 </retractable>
      </contact>
      <contact type="STRUCTURE" name="fin rear">
        <location unit="M">
          <x> 46.2600 </x>
          <y> 0.0000 </y>
          <z> 9.3000 </z>
        </location>
        <static_friction> 0.8 </static_friction>
        <dynamic_friction> 0.6 </dynamic_friction>
        <spring_coeff unit="N/M"> 6505872 </spring_coeff>
        <damping_coeff unit="N/M/SEC"> 216862 </damping_coeff>
        <damping_coeff_rebound unit="N/M/SEC"> 216862 </damping_coeff_rebound>
      </contact>
      <contact type="STRUCTURE" name="fuselage front">
        <location unit="M">
          <x> 0.0000 </x>
          <y> 0.0000 </y>
          <z> -0.6700 </z>
        </location>
        <static_friction> 0.8 </static_friction>
        <dynamic_friction> 0.6 </dynamic_friction>
        <spring_coeff unit="N/M"> 3214952 </spring_coeff>
        <damping_coeff unit="N/M/SEC"> 107165 </damping_coeff>
        <damping_coeff_rebound unit="N/M/SEC"> 107165 </damping_coeff_rebound>
      </contact>
      <contact type="STRUCTURE" name="fuselage front 2">
        <location unit="M">
          <x> 3.8700 </x>
          <y> -0.0000 </y>
          <z> -1.9500 </z>
        </location>
        <static_friction> 0.8 </static_friction>
        <dynamic_friction> 0.6 </dynamic_friction>
        <spring_coeff unit="N/M"> 3350206 </spring_coeff>
        <damping_coeff unit="N/M/SEC"> 111674 </damping_coeff>
        <damping_coeff_rebound unit="N/M/SEC"> 111674 </damping_coeff_rebound>
      </contact>
      <contact type="STRUCTURE" name="fuselage front 3">
        <location unit="M">
          <x> 3.8700 </x>
          <y> 0.0000 </y>
          <z> 1.5200 </z>
        </location>
        <static_friction> 0.8 </static_friction>
        <dynamic_friction> 0.6 </dynamic_friction>
        <spring_coeff unit="N/M"> 4501518 </spring_coeff>
        <damping_coeff unit="N/M/SEC"> 150051 </damping_coeff>
        <damping_coeff_rebound unit="N/M/SEC"> 150051 </damping_coeff_rebound>
      </contact>
      <contact type="STRUCTURE" name="fuselage rear">
        <location unit="M">
          <x> 30.0701 </x>
          <y> -0.0000 </y>
          <z> -1.8874 </z>
        </location>
        <static_friction> 0.8 </static_friction>
        <dynamic_friction> 0.6 </dynamic_friction>
        <spring_coeff unit="N/M"> 33996176 </spring_coeff>
        <damping_coeff unit="N/M/SEC"> 1133206 </damping_coeff>
        <damping_coeff_rebound unit="N/M/SEC"> 1133206 </damping_coeff_rebound>
      </contact>
      <contact type="STRUCTURE" name="htail left rear">
        <location unit="M">
          <x> 46.1860 </x>
          <y> -6.9750 </y>
          <z> 1.4560 </z>
        </location>
        <static_friction> 0.8 </static_friction>
        <dynamic_friction> 0.6 </dynamic_friction>
        <spring_coeff unit="N/M"> 6639211 </spring_coeff>
        <damping_coeff unit="N/M/SEC"> 221307 </damping_coeff>
        <damping_coeff_rebound unit="N/M/SEC"> 221307 </damping_coeff_rebound>
      </contact>
      <contact type="STRUCTURE" name="htail right rear">
        <location unit="M">
          <x> 46.1860 </x>
          <y> 6.9750 </y>
          <z> 1.4560 </z>
        </location>
        <static_friction> 0.8 </static_friction>
        <dynamic_friction> 0.6 </dynamic_friction>
        <spring_coeff unit="N/M"> 6639202 </spring_coeff>
        <damping_coeff unit="N/M/SEC"> 221307 </damping_coeff>
        <damping_coeff_rebound unit="N/M/SEC"> 221307 </damping_coeff_rebound>
      </contact>
      <contact type="STRUCTURE" name="outboard nacelle left bottom">
        <location unit="M">
          <x> 20.8800 </x>
          <y> -16.3649 </y>
          <z> -0.7627 </z>
        </location>
        <static_friction> 0.8 </static_friction>
        <dynamic_friction> 0.6 </dynamic_friction>
        <spring_coeff unit="N/M"> 11177289 </spring_coeff>
        <damping_coeff unit="N/M/SEC"> 372576 </damping_coeff>
        <damping_coeff_rebound unit="N/M/SEC"> 372576 </damping_coeff_rebound>
      </contact>
      <contact type="STRUCTURE" name="outboard nacelle right bottom">
        <location unit="M">
          <x> 20.8800 </x>
          <y> 16.3649 </y>
          <z> -0.7627 </z>
        </location>
        <static_friction> 0.8 </static_friction>
        <dynamic_friction> 0.6 </dynamic_friction>
        <spring_coeff unit="N/M"> 11177276 </spring_coeff>
        <damping_coeff unit="N/M/SEC"> 372576 </damping_coeff>
        <damping_coeff_rebound unit="N/M/SEC"> 372576 </damping_coeff_rebound>
      </contact>
      <contact type="STRUCTURE" name="wing left rear">
        <location unit="M">
          <x> 29.9660 </x>
          <y> -22.2100 </y>
          <z> 1.7270 </z>
        </location>
        <static_friction> 0.8 </static_friction>
        <dynamic_friction> 0.6 </dynamic_friction>
        <spring_coeff unit="N/M"> 2966456 </spring_coeff>
        <damping_coeff unit="N/M/SEC"> 98882 </damping_coeff>
        <damping_coeff_rebound unit="N/M/SEC"> 98882 </damping_coeff_rebound>
      </contact>
      <contact type="STRUCTURE" name="wing left rear 2">
        <location unit="M">
          <x> 32.5951 </x>
          <y> -22.2017 </y>
          <z> 1.7948 </z>
        </location>
        <static_friction> 0.8 </static_friction>
        <dynamic_friction> 0.6 </dynamic_friction>
        <spring_coeff unit="N/M"> 2794620 </spring_coeff>
        <damping_coeff unit="N/M/SEC"> 93154 </damping_coeff>
        <damping_coeff_rebound unit="N/M/SEC"> 93154 </damping_coeff_rebound>
      </contact>
      <contact type="STRUCTURE" name="wing right rear">
        <location unit="M">
          <x> 32.5951 </x>
          <y> 22.2017 </y>
          <z> 1.7948 </z>
        </location>
        <static_friction> 0.8 </static_friction>
        <dynamic_friction> 0.6 </dynamic_friction>
        <spring_coeff unit="N/M"> 2794615 </spring_coeff>
        <damping_coeff unit="N/M/SEC"> 93154 </damping_coeff>
        <damping_coeff_rebound unit="N/M/SEC"> 93154 </damping_coeff_rebound>
      </contact>
      <contact type="STRUCTURE" name="wing right rear 2">
        <location unit="M">
          <x> 29.9660 </x>
          <y> 22.2100 </y>
          <z> 1.7270 </z>
        </location>
        <static_friction> 0.8 </static_friction>
        <dynamic_friction> 0.6 </dynamic_friction>
        <spring_coeff unit="N/M"> 2966451 </spring_coeff>
        <damping_coeff unit="N/M/SEC"> 98882 </damping_coeff>
        <damping_coeff_rebound unit="N/M/SEC"> 98882 </damping_coeff_rebound>
      </contact>
    </ground_reactions>
    <propulsion>
      <engine file="e3g_engine0">
        <location unit="M">
          <x> 18.3000 </x>
          <y> -9.1500 </y>
          <z> -1.1300 </z>
        </location>
        <feed>0</feed>
        <feed>1</feed>
        <feed>2</feed>
        <feed>3</feed>
        <feed>4</feed>
        <feed>5</feed>
        <feed>6</feed>
        <thruster file="e3g_nozzle0">
          <location unit="M">
            <x> 21.0000 </x>
            <y> -9.1500 </y>
            <z> -1.1300 </z>
          </location>
          <orient unit="DEG"> <roll>0.00</roll> <pitch>0.00</pitch> <yaw>0.00</yaw> </orient>

        </thruster>
      </engine>
      <engine file="e3g_engine0">
        <location unit="M">
          <x> 18.3000 </x>
          <y> 9.1500 </y>
          <z> -1.1300 </z>
        </location>
        <feed>0</feed>
        <feed>1</feed>
        <feed>2</feed>
        <feed>3</feed>
        <feed>4</feed>
        <feed>5</feed>
        <feed>6</feed>
        <thruster file="e3g_nozzle0">
          <location unit="M">
            <x> 21.0000 </x>
            <y> 9.1500 </y>
            <z> -1.1300 </z>
          </location>
          <orient unit="DEG"> <roll>0.00</roll> <pitch>0.00</pitch> <yaw>0.00</yaw> </orient>

        </thruster>
      </engine>
      <engine file="e3g_engine1">
        <location unit="M">
          <x> 23.3800 </x>
          <y> -15.7500 </y>
          <z> -0.3160 </z>
        </location>
        <feed>0</feed>
        <feed>1</feed>
        <feed>2</feed>
        <feed>3</feed>
        <feed>4</feed>
        <feed>5</feed>
        <feed>6</feed>
        <thruster file="e3g_nozzle1">
          <location unit="M">
            <x> 26.0800 </x>
            <y> -15.7500 </y>
            <z> -0.3160 </z>
          </location>
          <orient unit="DEG"> <roll>0.00</roll> <pitch>0.00</pitch> <yaw>0.00</yaw> </orient>

        </thruster>
      </engine>
      <engine file="e3g_engine1">
        <location unit="M">
          <x> 23.3800 </x>
          <y> 15.7500 </y>
          <z> -0.3160 </z>
        </location>
        <feed>0</feed>
        <feed>1</feed>
        <feed>2</feed>
        <feed>3</feed>
        <feed>4</feed>
        <feed>5</feed>
        <feed>6</feed>
        <thruster file="e3g_nozzle1">
          <location unit="M">
            <x> 26.0800 </x>
            <y> 15.7500 </y>
            <z> -0.3160 </z>
          </location>
          <orient unit="DEG"> <roll>0.00</roll> <pitch>0.00</pitch> <yaw>0.00</yaw> </orient>

        </thruster>
      </engine>
      <tank type="FUEL">
        <location unit="M">
          <x> 18.2000 </x>
          <y> 0.0000 </y>
          <z> -1.3000 </z>
        </location>
        <capacity unit="KG"> 14000.00 </capacity>
        <contents unit="KG"> 14000.00 </contents>
      </tank>
      <tank type="FUEL">
        <location unit="M">
          <x> 21.0400 </x>
          <y> -6.5000 </y>
          <z> -0.2000 </z>
        </location>
        <capacity unit="KG"> 15700.00 </capacity>
        <contents unit="KG"> 15700.00 </contents>
      </tank>
      <tank type="FUEL">
        <location unit="M">
          <x> 21.0400 </x>
          <y> 6.5000 </y>
          <z> -0.2000 </z>
        </location>
        <capacity unit="KG"> 15700.00 </capacity>
        <contents unit="KG"> 15700.00 </contents>
      </tank>
      <tank type="FUEL">
        <location unit="M">
          <x> 25.2300 </x>
          <y> -13.0000 </y>
          <z> 0.6000 </z>
        </location>
        <capacity unit="KG"> 7500.00 </capacity>
        <contents unit="KG"> 7500.00 </contents>
      </tank>
      <tank type="FUEL">
        <location unit="M">
          <x> 25.2300 </x>
          <y> 13.0000 </y>
          <z> 0.6000 </z>
        </location>
        <capacity unit="KG"> 7500.00 </capacity>
        <contents unit="KG"> 7500.00 </contents>
      </tank>
      <tank type="FUEL">
        <location unit="M">
          <x> 28.7500 </x>
          <y> -18.5000 </y>
          <z> 1.2700 </z>
        </location>
        <capacity unit="KG"> 1700.00 </capacity>
        <contents unit="KG"> 1700.00 </contents>
      </tank>
      <tank type="FUEL">
        <location unit="M">
          <x> 28.7500 </x>
          <y> 18.5000 </y>
          <z> 1.2700 </z>
        </location>
        <capacity unit="KG"> 1700.00 </capacity>
        <contents unit="KG"> 1700.00 </contents>
      </tank>
    </propulsion>
    <flight_control name="e3g">
      <!-- the aircraft's profile for the platform (docs/control-architecture.md, section 7): what
           hangar knows of it - its design, its flight tests, its identified responses -->
      <property value="1">fsim/identity/version</property>
      <property value="1">fsim/identity/provenance</property>
      <property value="5">fsim/identity/class</property>
      <property value="1">fsim/identity/family</property>
      <property value="1">fsim/effectors/version</property>
      <property value="1">fsim/effectors/provenance</property>
      <property value="1">fsim/effectors/flaps</property>
      <property value="8">fsim/effectors/flaps_transit_s</property>
      <property value="0.0">fsim/effectors/neutral</property>
      <property value="0.0">fsim/effectors/pitch</property>
      <property value="1">fsim/effectors/pitch_trim</property>
      <property value="1">fsim/effectors/retractable_gear</property>
      <property value="0.0">fsim/effectors/roll</property>
      <property value="1">fsim/effectors/speedbrake</property>
      <property value="1">fsim/effectors/wheel_brakes</property>
      <property value="0.0">fsim/effectors/yaw</property>
      <property value="1">fsim/envelope/version</property>
      <property value="1">fsim/envelope/provenance</property>
      <property value="14.3879">fsim/envelope/clean/alpha_max_deg</property>
      <property value="81.1826">fsim/envelope/clean/cas_min_ms</property>
      <property value="15.43">fsim/envelope/crosswind_max_ms</property>
      <property value="95.17">fsim/envelope/flaps/cas_max_ms</property>
      <property value="0.8">fsim/envelope/flaps_threshold</property>
      <property value="138.9">fsim/envelope/gear_cas_max_ms</property>
      <property value="11.43">fsim/envelope/ground_pitch_max_deg</property>
      <property value="13.16">fsim/envelope/ground_turn_radius_m</property>
      <property value="0.0518">fsim/envelope/ground_yaw_accel_rad_s2</property>
      <property value="1">fsim/propulsion/version</property>
      <property value="1">fsim/propulsion/provenance</property>
      <property value="0.0">fsim/propulsion/afterburner</property>
      <property value="4">fsim/propulsion/engines</property>
      <property value="0.149688">fsim/propulsion/spool_s</property>
      <property value="2">fsim/propulsion/type</property>
      <property value="1">fsim/plant/version</property>
      <property value="1">fsim/plant/provenance</property>
      <property value="-2.23536">fsim/plant/alpha_zero_lift_deg</property>
      <property value="3000">fsim/plant/altitude_m</property>
      <property value="157.255">fsim/plant/eas_ms</property>
      <property value="-0.0662668">fsim/plant/elevator_trim</property>
      <property value="-0.269514">fsim/plant/elevator_trim_lift</property>
      <property value="4.27974">fsim/plant/pitch/gain</property>
      <property value="0.501002">fsim/plant/pitch/tau_s</property>
      <property value="0.885373">fsim/plant/roll/gain</property>
      <property value="0.614601">fsim/plant/roll/tau_s</property>
      <property value="2.64849">fsim/plant/speed/gain</property>
      <property value="0.149688">fsim/plant/speed/tau_s</property>
      <property value="180.55">fsim/plant/tas_ms</property>
      <property value="0.702935">fsim/plant/throttle_trim</property>
      <property value="0.347698">fsim/plant/yaw/gain</property>
      <property value="1">fsim/performance/version</property>
      <property value="1">fsim/performance/provenance</property>
      <property value="10424.2">fsim/performance/ceiling_m</property>
      <property value="243.159">fsim/performance/max_tas_ms</property>
      <property value="81.1826">fsim/performance/stall_cas_ms</property>
      <property value="73.2681">fsim/performance/stall_flaps_cas_ms</property>
      <property value="1">fsim/applicability/version</property>
      <property value="1">fsim/applicability/provenance</property>
      <property value="0.0">fsim/applicability/aerobatic</property>
      <property value="1">fsim/applicability/carrier</property>
      <property value="2">fsim/applicability/drag_devices</property>
      <property value="1">fsim/applicability/flaps</property>
      <property value="1">fsim/applicability/ground_contact</property>
      <property value="1">fsim/applicability/releasable_stores</property>
      <property value="1">fsim/applicability/retractable_gear</property>
      <property value="0.0">fsim/applicability/vertical_flight</property>
      <property value="1">fsim/tables/version</property>
      <property value="1">fsim/tables/provenance</property>
      <property value="100">fsim/tables/altitude_m/h0</property>
      <property value="2080">fsim/tables/altitude_m/h1</property>
      <property value="4170">fsim/tables/altitude_m/h2</property>
      <property value="6250">fsim/tables/altitude_m/h3</property>
      <property value="7820">fsim/tables/altitude_m/h4</property>
      <property value="8860">fsim/tables/altitude_m/h5</property>
      <property value="9900">fsim/tables/altitude_m/h6</property>
      <property value="2.02377">fsim/tables/best_endurance_fuel_kg_s/h0/w0</property>
      <property value="2.4385">fsim/tables/best_endurance_fuel_kg_s/h0/w1</property>
      <property value="2.83127">fsim/tables/best_endurance_fuel_kg_s/h0/w2</property>
      <property value="1.87864">fsim/tables/best_endurance_fuel_kg_s/h1/w0</property>
      <property value="2.27304">fsim/tables/best_endurance_fuel_kg_s/h1/w1</property>
      <property value="2.65015">fsim/tables/best_endurance_fuel_kg_s/h1/w2</property>
      <property value="1.72723">fsim/tables/best_endurance_fuel_kg_s/h2/w0</property>
      <property value="2.09814">fsim/tables/best_endurance_fuel_kg_s/h2/w1</property>
      <property value="2.45221">fsim/tables/best_endurance_fuel_kg_s/h2/w2</property>
      <property value="1.57011">fsim/tables/best_endurance_fuel_kg_s/h3/w0</property>
      <property value="1.91415">fsim/tables/best_endurance_fuel_kg_s/h3/w1</property>
      <property value="2.25478">fsim/tables/best_endurance_fuel_kg_s/h3/w2</property>
      <property value="1.4682">fsim/tables/best_endurance_fuel_kg_s/h4/w0</property>
      <property value="1.79741">fsim/tables/best_endurance_fuel_kg_s/h4/w1</property>
      <property value="2.13638">fsim/tables/best_endurance_fuel_kg_s/h4/w2</property>
      <property value="1.40065">fsim/tables/best_endurance_fuel_kg_s/h5/w0</property>
      <property value="1.72269">fsim/tables/best_endurance_fuel_kg_s/h5/w1</property>
      <property value="2.06574">fsim/tables/best_endurance_fuel_kg_s/h5/w2</property>
      <property value="1.3352">fsim/tables/best_endurance_fuel_kg_s/h6/w0</property>
      <property value="1.65982">fsim/tables/best_endurance_fuel_kg_s/h6/w1</property>
      <property value="1.94624">fsim/tables/best_endurance_fuel_kg_s/h6/w2</property>
      <property value="96.1888">fsim/tables/best_endurance_tas_ms/h0/w0</property>
      <property value="112.14">fsim/tables/best_endurance_tas_ms/h0/w1</property>
      <property value="124.642">fsim/tables/best_endurance_tas_ms/h0/w2</property>
      <property value="108.01">fsim/tables/best_endurance_tas_ms/h1/w0</property>
      <property value="123.485">fsim/tables/best_endurance_tas_ms/h1/w1</property>
      <property value="135.965">fsim/tables/best_endurance_tas_ms/h1/w2</property>
      <property value="120.465">fsim/tables/best_endurance_tas_ms/h2/w0</property>
      <property value="135.962">fsim/tables/best_endurance_tas_ms/h2/w1</property>
      <property value="150.337">fsim/tables/best_endurance_tas_ms/h2/w2</property>
      <property value="133.873">fsim/tables/best_endurance_tas_ms/h3/w0</property>
      <property value="151.683">fsim/tables/best_endurance_tas_ms/h3/w1</property>
      <property value="168.08">fsim/tables/best_endurance_tas_ms/h3/w2</property>
      <property value="146.438">fsim/tables/best_endurance_tas_ms/h4/w0</property>
      <property value="166.113">fsim/tables/best_endurance_tas_ms/h4/w1</property>
      <property value="183.969">fsim/tables/best_endurance_tas_ms/h4/w2</property>
      <property value="155.496">fsim/tables/best_endurance_tas_ms/h5/w0</property>
      <property value="176.431">fsim/tables/best_endurance_tas_ms/h5/w1</property>
      <property value="193.486">fsim/tables/best_endurance_tas_ms/h5/w2</property>
      <property value="163.829">fsim/tables/best_endurance_tas_ms/h6/w0</property>
      <property value="184.965">fsim/tables/best_endurance_tas_ms/h6/w1</property>
      <property value="188.287">fsim/tables/best_endurance_tas_ms/h6/w2</property>
      <property value="2.51465">fsim/tables/best_range_fuel_kg_s/h0/w0</property>
      <property value="3.07309">fsim/tables/best_range_fuel_kg_s/h0/w1</property>
      <property value="3.50314">fsim/tables/best_range_fuel_kg_s/h0/w2</property>
      <property value="2.29675">fsim/tables/best_range_fuel_kg_s/h1/w0</property>
      <property value="2.71012">fsim/tables/best_range_fuel_kg_s/h1/w1</property>
      <property value="3.16443">fsim/tables/best_range_fuel_kg_s/h1/w2</property>
      <property value="2.07845">fsim/tables/best_range_fuel_kg_s/h2/w0</property>
      <property value="2.46374">fsim/tables/best_range_fuel_kg_s/h2/w1</property>
      <property value="2.88494">fsim/tables/best_range_fuel_kg_s/h2/w2</property>
      <property value="1.86347">fsim/tables/best_range_fuel_kg_s/h3/w0</property>
      <property value="2.22165">fsim/tables/best_range_fuel_kg_s/h3/w1</property>
      <property value="2.58169">fsim/tables/best_range_fuel_kg_s/h3/w2</property>
      <property value="1.69532">fsim/tables/best_range_fuel_kg_s/h4/w0</property>
      <property value="2.06305">fsim/tables/best_range_fuel_kg_s/h4/w1</property>
      <property value="2.28305">fsim/tables/best_range_fuel_kg_s/h4/w2</property>
      <property value="1.6075">fsim/tables/best_range_fuel_kg_s/h5/w0</property>
      <property value="1.8803">fsim/tables/best_range_fuel_kg_s/h5/w1</property>
      <property value="2.13585">fsim/tables/best_range_fuel_kg_s/h5/w2</property>
      <property value="1.5154">fsim/tables/best_range_fuel_kg_s/h6/w0</property>
      <property value="1.73804">fsim/tables/best_range_fuel_kg_s/h6/w1</property>
      <property value="2.04527">fsim/tables/best_range_fuel_kg_s/h6/w2</property>
      <property value="139.149">fsim/tables/best_range_tas_ms/h0/w0</property>
      <property value="160.873">fsim/tables/best_range_tas_ms/h0/w1</property>
      <property value="175.127">fsim/tables/best_range_tas_ms/h0/w2</property>
      <property value="149.545">fsim/tables/best_range_tas_ms/h1/w0</property>
      <property value="165.874">fsim/tables/best_range_tas_ms/h1/w1</property>
      <property value="183.876">fsim/tables/best_range_tas_ms/h1/w2</property>
      <property value="162.404">fsim/tables/best_range_tas_ms/h2/w0</property>
      <property value="179.991">fsim/tables/best_range_tas_ms/h2/w1</property>
      <property value="198.832">fsim/tables/best_range_tas_ms/h2/w2</property>
      <property value="178.185">fsim/tables/best_range_tas_ms/h3/w0</property>
      <property value="196.855">fsim/tables/best_range_tas_ms/h3/w1</property>
      <property value="213.075">fsim/tables/best_range_tas_ms/h3/w2</property>
      <property value="188.468">fsim/tables/best_range_tas_ms/h4/w0</property>
      <property value="210.193">fsim/tables/best_range_tas_ms/h4/w1</property>
      <property value="212.956">fsim/tables/best_range_tas_ms/h4/w2</property>
      <property value="197.743">fsim/tables/best_range_tas_ms/h5/w0</property>
      <property value="209.427">fsim/tables/best_range_tas_ms/h5/w1</property>
      <property value="213.383">fsim/tables/best_range_tas_ms/h5/w2</property>
      <property value="205.965">fsim/tables/best_range_tas_ms/h6/w0</property>
      <property value="209.111">fsim/tables/best_range_tas_ms/h6/w1</property>
      <property value="213.362">fsim/tables/best_range_tas_ms/h6/w2</property>
      <property value="146.295">fsim/tables/climb_tas_ms/h0/w0</property>
      <property value="148.18">fsim/tables/climb_tas_ms/h0/w1</property>
      <property value="151.8">fsim/tables/climb_tas_ms/h0/w2</property>
      <property value="161.239">fsim/tables/climb_tas_ms/h1/w0</property>
      <property value="163.597">fsim/tables/climb_tas_ms/h1/w1</property>
      <property value="172.036">fsim/tables/climb_tas_ms/h1/w2</property>
      <property value="177.343">fsim/tables/climb_tas_ms/h2/w0</property>
      <property value="177.685">fsim/tables/climb_tas_ms/h2/w1</property>
      <property value="186.01">fsim/tables/climb_tas_ms/h2/w2</property>
      <property value="174.678">fsim/tables/climb_tas_ms/h3/w0</property>
      <property value="178.715">fsim/tables/climb_tas_ms/h3/w1</property>
      <property value="193.485">fsim/tables/climb_tas_ms/h3/w2</property>
      <property value="186.377">fsim/tables/climb_tas_ms/h4/w0</property>
      <property value="190.612">fsim/tables/climb_tas_ms/h4/w1</property>
      <property value="193.358">fsim/tables/climb_tas_ms/h4/w2</property>
      <property value="179.166">fsim/tables/climb_tas_ms/h5/w0</property>
      <property value="199.955">fsim/tables/climb_tas_ms/h5/w1</property>
      <property value="203.148">fsim/tables/climb_tas_ms/h5/w2</property>
      <property value="188.615">fsim/tables/climb_tas_ms/h6/w0</property>
      <property value="195.784">fsim/tables/climb_tas_ms/h6/w1</property>
      <property value="209.889">fsim/tables/climb_tas_ms/h6/w2</property>
      <property value="63800">fsim/tables/fuel_capacity_kg</property>
      <property value="2.02375">fsim/tables/fuel_kg_s/h0/w0/v0</property>
      <property value="2.03758">fsim/tables/fuel_kg_s/h0/w0/v1</property>
      <property value="3.6821">fsim/tables/fuel_kg_s/h0/w0/v10</property>
      <property value="3.94554">fsim/tables/fuel_kg_s/h0/w0/v11</property>
      <property value="4.22566">fsim/tables/fuel_kg_s/h0/w0/v12</property>
      <property value="4.5269">fsim/tables/fuel_kg_s/h0/w0/v13</property>
      <property value="4.85247">fsim/tables/fuel_kg_s/h0/w0/v14</property>
      <property value="5.20763">fsim/tables/fuel_kg_s/h0/w0/v15</property>
      <property value="2.13268">fsim/tables/fuel_kg_s/h0/w0/v2</property>
      <property value="2.26554">fsim/tables/fuel_kg_s/h0/w0/v3</property>
      <property value="2.41859">fsim/tables/fuel_kg_s/h0/w0/v4</property>
      <property value="2.58746">fsim/tables/fuel_kg_s/h0/w0/v5</property>
      <property value="2.77414">fsim/tables/fuel_kg_s/h0/w0/v6</property>
      <property value="2.98408">fsim/tables/fuel_kg_s/h0/w0/v7</property>
      <property value="3.20086">fsim/tables/fuel_kg_s/h0/w0/v8</property>
      <property value="3.43054">fsim/tables/fuel_kg_s/h0/w0/v9</property>
      <property value="2.48339">fsim/tables/fuel_kg_s/h0/w1/v0</property>
      <property value="2.43918">fsim/tables/fuel_kg_s/h0/w1/v1</property>
      <property value="3.78695">fsim/tables/fuel_kg_s/h0/w1/v10</property>
      <property value="4.02218">fsim/tables/fuel_kg_s/h0/w1/v11</property>
      <property value="4.29347">fsim/tables/fuel_kg_s/h0/w1/v12</property>
      <property value="4.58436">fsim/tables/fuel_kg_s/h0/w1/v13</property>
      <property value="4.89783">fsim/tables/fuel_kg_s/h0/w1/v14</property>
      <property value="5.23854">fsim/tables/fuel_kg_s/h0/w1/v15</property>
      <property value="2.46396">fsim/tables/fuel_kg_s/h0/w1/v2</property>
      <property value="2.55537">fsim/tables/fuel_kg_s/h0/w1/v3</property>
      <property value="2.67689">fsim/tables/fuel_kg_s/h0/w1/v4</property>
      <property value="2.81157">fsim/tables/fuel_kg_s/h0/w1/v5</property>
      <property value="2.97745">fsim/tables/fuel_kg_s/h0/w1/v6</property>
      <property value="3.14749">fsim/tables/fuel_kg_s/h0/w1/v7</property>
      <property value="3.34624">fsim/tables/fuel_kg_s/h0/w1/v8</property>
      <property value="3.56229">fsim/tables/fuel_kg_s/h0/w1/v9</property>
      <property value="2.91606">fsim/tables/fuel_kg_s/h0/w2/v0</property>
      <property value="2.86424">fsim/tables/fuel_kg_s/h0/w2/v1</property>
      <property value="3.91924">fsim/tables/fuel_kg_s/h0/w2/v10</property>
      <property value="4.1462">fsim/tables/fuel_kg_s/h0/w2/v11</property>
      <property value="4.38761">fsim/tables/fuel_kg_s/h0/w2/v12</property>
      <property value="4.64543">fsim/tables/fuel_kg_s/h0/w2/v13</property>
      <property value="4.94183">fsim/tables/fuel_kg_s/h0/w2/v14</property>
      <property value="5.26688">fsim/tables/fuel_kg_s/h0/w2/v15</property>
      <property value="2.83135">fsim/tables/fuel_kg_s/h0/w2/v2</property>
      <property value="2.87107">fsim/tables/fuel_kg_s/h0/w2/v3</property>
      <property value="2.95838">fsim/tables/fuel_kg_s/h0/w2/v4</property>
      <property value="3.07296">fsim/tables/fuel_kg_s/h0/w2/v5</property>
      <property value="3.20127">fsim/tables/fuel_kg_s/h0/w2/v6</property>
      <property value="3.35798">fsim/tables/fuel_kg_s/h0/w2/v7</property>
      <property value="3.5258">fsim/tables/fuel_kg_s/h0/w2/v8</property>
      <property value="3.70227">fsim/tables/fuel_kg_s/h0/w2/v9</property>
      <property value="1.90159">fsim/tables/fuel_kg_s/h1/w0/v0</property>
      <property value="1.87948">fsim/tables/fuel_kg_s/h1/w0/v1</property>
      <property value="3.17046">fsim/tables/fuel_kg_s/h1/w0/v10</property>
      <property value="3.39647">fsim/tables/fuel_kg_s/h1/w0/v11</property>
      <property value="3.63286">fsim/tables/fuel_kg_s/h1/w0/v12</property>
      <property value="3.88382">fsim/tables/fuel_kg_s/h1/w0/v13</property>
      <property value="4.17358">fsim/tables/fuel_kg_s/h1/w0/v14</property>
      <property value="4.69078">fsim/tables/fuel_kg_s/h1/w0/v15</property>
      <property value="1.92244">fsim/tables/fuel_kg_s/h1/w0/v2</property>
      <property value="2.01171">fsim/tables/fuel_kg_s/h1/w0/v3</property>
      <property value="2.1288">fsim/tables/fuel_kg_s/h1/w0/v4</property>
      <property value="2.26772">fsim/tables/fuel_kg_s/h1/w0/v5</property>
      <property value="2.41799">fsim/tables/fuel_kg_s/h1/w0/v6</property>
      <property value="2.58481">fsim/tables/fuel_kg_s/h1/w0/v7</property>
      <property value="2.77098">fsim/tables/fuel_kg_s/h1/w0/v8</property>
      <property value="2.96592">fsim/tables/fuel_kg_s/h1/w0/v9</property>
      <property value="2.32766">fsim/tables/fuel_kg_s/h1/w1/v0</property>
      <property value="2.2912">fsim/tables/fuel_kg_s/h1/w1/v1</property>
      <property value="3.30344">fsim/tables/fuel_kg_s/h1/w1/v10</property>
      <property value="3.50182">fsim/tables/fuel_kg_s/h1/w1/v11</property>
      <property value="3.70963">fsim/tables/fuel_kg_s/h1/w1/v12</property>
      <property value="3.94222">fsim/tables/fuel_kg_s/h1/w1/v13</property>
      <property value="4.21444">fsim/tables/fuel_kg_s/h1/w1/v14</property>
      <property value="4.70067">fsim/tables/fuel_kg_s/h1/w1/v15</property>
      <property value="2.27498">fsim/tables/fuel_kg_s/h1/w1/v2</property>
      <property value="2.32272">fsim/tables/fuel_kg_s/h1/w1/v3</property>
      <property value="2.40257">fsim/tables/fuel_kg_s/h1/w1/v4</property>
      <property value="2.51781">fsim/tables/fuel_kg_s/h1/w1/v5</property>
      <property value="2.63988">fsim/tables/fuel_kg_s/h1/w1/v6</property>
      <property value="2.78711">fsim/tables/fuel_kg_s/h1/w1/v7</property>
      <property value="2.93811">fsim/tables/fuel_kg_s/h1/w1/v8</property>
      <property value="3.11028">fsim/tables/fuel_kg_s/h1/w1/v9</property>
      <property value="2.74839">fsim/tables/fuel_kg_s/h1/w2/v0</property>
      <property value="2.69344">fsim/tables/fuel_kg_s/h1/w2/v1</property>
      <property value="3.44678">fsim/tables/fuel_kg_s/h1/w2/v10</property>
      <property value="3.62782">fsim/tables/fuel_kg_s/h1/w2/v11</property>
      <property value="3.82593">fsim/tables/fuel_kg_s/h1/w2/v12</property>
      <property value="4.03524">fsim/tables/fuel_kg_s/h1/w2/v13</property>
      <property value="4.27052">fsim/tables/fuel_kg_s/h1/w2/v14</property>
      <property value="4.71063">fsim/tables/fuel_kg_s/h1/w2/v15</property>
      <property value="2.65411">fsim/tables/fuel_kg_s/h1/w2/v2</property>
      <property value="2.65689">fsim/tables/fuel_kg_s/h1/w2/v3</property>
      <property value="2.70835">fsim/tables/fuel_kg_s/h1/w2/v4</property>
      <property value="2.78546">fsim/tables/fuel_kg_s/h1/w2/v5</property>
      <property value="2.89331">fsim/tables/fuel_kg_s/h1/w2/v6</property>
      <property value="3.00634">fsim/tables/fuel_kg_s/h1/w2/v7</property>
      <property value="3.1444">fsim/tables/fuel_kg_s/h1/w2/v8</property>
      <property value="3.29312">fsim/tables/fuel_kg_s/h1/w2/v9</property>
      <property value="1.76443">fsim/tables/fuel_kg_s/h2/w0/v0</property>
      <property value="1.73566">fsim/tables/fuel_kg_s/h2/w0/v1</property>
      <property value="2.65722">fsim/tables/fuel_kg_s/h2/w0/v10</property>
      <property value="2.82679">fsim/tables/fuel_kg_s/h2/w0/v11</property>
      <property value="3.01374">fsim/tables/fuel_kg_s/h2/w0/v12</property>
      <property value="3.24362">fsim/tables/fuel_kg_s/h2/w0/v13</property>
      <property value="3.62563">fsim/tables/fuel_kg_s/h2/w0/v14</property>
      <property value="4.06265">fsim/tables/fuel_kg_s/h2/w0/v15</property>
      <property value="1.73259">fsim/tables/fuel_kg_s/h2/w0/v2</property>
      <property value="1.78399">fsim/tables/fuel_kg_s/h2/w0/v3</property>
      <property value="1.8635">fsim/tables/fuel_kg_s/h2/w0/v4</property>
      <property value="1.96222">fsim/tables/fuel_kg_s/h2/w0/v5</property>
      <property value="2.07839">fsim/tables/fuel_kg_s/h2/w0/v6</property>
      <property value="2.20431">fsim/tables/fuel_kg_s/h2/w0/v7</property>
      <property value="2.34025">fsim/tables/fuel_kg_s/h2/w0/v8</property>
      <property value="2.49326">fsim/tables/fuel_kg_s/h2/w0/v9</property>
      <property value="2.1716">fsim/tables/fuel_kg_s/h2/w1/v0</property>
      <property value="2.12883">fsim/tables/fuel_kg_s/h2/w1/v1</property>
      <property value="2.79833">fsim/tables/fuel_kg_s/h2/w1/v10</property>
      <property value="2.95291">fsim/tables/fuel_kg_s/h2/w1/v11</property>
      <property value="3.11983">fsim/tables/fuel_kg_s/h2/w1/v12</property>
      <property value="3.32992">fsim/tables/fuel_kg_s/h2/w1/v13</property>
      <property value="3.66934">fsim/tables/fuel_kg_s/h2/w1/v14</property>
      <property value="4.06956">fsim/tables/fuel_kg_s/h2/w1/v15</property>
      <property value="2.09992">fsim/tables/fuel_kg_s/h2/w1/v2</property>
      <property value="2.10638">fsim/tables/fuel_kg_s/h2/w1/v3</property>
      <property value="2.15699">fsim/tables/fuel_kg_s/h2/w1/v4</property>
      <property value="2.22472">fsim/tables/fuel_kg_s/h2/w1/v5</property>
      <property value="2.3204">fsim/tables/fuel_kg_s/h2/w1/v6</property>
      <property value="2.41776">fsim/tables/fuel_kg_s/h2/w1/v7</property>
      <property value="2.54022">fsim/tables/fuel_kg_s/h2/w1/v8</property>
      <property value="2.66632">fsim/tables/fuel_kg_s/h2/w1/v9</property>
      <property value="2.5693">fsim/tables/fuel_kg_s/h2/w2/v0</property>
      <property value="2.50863">fsim/tables/fuel_kg_s/h2/w2/v1</property>
      <property value="2.96716">fsim/tables/fuel_kg_s/h2/w2/v10</property>
      <property value="3.08981">fsim/tables/fuel_kg_s/h2/w2/v11</property>
      <property value="3.21748">fsim/tables/fuel_kg_s/h2/w2/v12</property>
      <property value="3.39108">fsim/tables/fuel_kg_s/h2/w2/v13</property>
      <property value="3.69685">fsim/tables/fuel_kg_s/h2/w2/v14</property>
      <property value="4.03928">fsim/tables/fuel_kg_s/h2/w2/v15</property>
      <property value="2.48414">fsim/tables/fuel_kg_s/h2/w2/v2</property>
      <property value="2.45282">fsim/tables/fuel_kg_s/h2/w2/v3</property>
      <property value="2.46892">fsim/tables/fuel_kg_s/h2/w2/v4</property>
      <property value="2.51269">fsim/tables/fuel_kg_s/h2/w2/v5</property>
      <property value="2.57467">fsim/tables/fuel_kg_s/h2/w2/v6</property>
      <property value="2.65667">fsim/tables/fuel_kg_s/h2/w2/v7</property>
      <property value="2.74894">fsim/tables/fuel_kg_s/h2/w2/v8</property>
      <property value="2.8489">fsim/tables/fuel_kg_s/h2/w2/v9</property>
      <property value="1.63023">fsim/tables/fuel_kg_s/h3/w0/v0</property>
      <property value="1.59486">fsim/tables/fuel_kg_s/h3/w0/v1</property>
      <property value="2.15428">fsim/tables/fuel_kg_s/h3/w0/v10</property>
      <property value="2.28189">fsim/tables/fuel_kg_s/h3/w0/v11</property>
      <property value="2.4198">fsim/tables/fuel_kg_s/h3/w0/v12</property>
      <property value="2.67122">fsim/tables/fuel_kg_s/h3/w0/v13</property>
      <property value="2.96255">fsim/tables/fuel_kg_s/h3/w0/v14</property>
      <property value="3.29719">fsim/tables/fuel_kg_s/h3/w0/v15</property>
      <property value="1.57135">fsim/tables/fuel_kg_s/h3/w0/v2</property>
      <property value="1.57766">fsim/tables/fuel_kg_s/h3/w0/v3</property>
      <property value="1.62223">fsim/tables/fuel_kg_s/h3/w0/v4</property>
      <property value="1.68046">fsim/tables/fuel_kg_s/h3/w0/v5</property>
      <property value="1.75572">fsim/tables/fuel_kg_s/h3/w0/v6</property>
      <property value="1.8381">fsim/tables/fuel_kg_s/h3/w0/v7</property>
      <property value="1.93491">fsim/tables/fuel_kg_s/h3/w0/v8</property>
      <property value="2.03678">fsim/tables/fuel_kg_s/h3/w0/v9</property>
      <property value="2.01116">fsim/tables/fuel_kg_s/h3/w1/v0</property>
      <property value="1.95989">fsim/tables/fuel_kg_s/h3/w1/v1</property>
      <property value="2.33856">fsim/tables/fuel_kg_s/h3/w1/v10</property>
      <property value="2.44285">fsim/tables/fuel_kg_s/h3/w1/v11</property>
      <property value="2.57346">fsim/tables/fuel_kg_s/h3/w1/v12</property>
      <property value="2.80642">fsim/tables/fuel_kg_s/h3/w1/v13</property>
      <property value="3.06818">fsim/tables/fuel_kg_s/h3/w1/v14</property>
      <property value="3.36174">fsim/tables/fuel_kg_s/h3/w1/v15</property>
      <property value="1.93798">fsim/tables/fuel_kg_s/h3/w1/v2</property>
      <property value="1.91485">fsim/tables/fuel_kg_s/h3/w1/v3</property>
      <property value="1.92447">fsim/tables/fuel_kg_s/h3/w1/v4</property>
      <property value="1.96005">fsim/tables/fuel_kg_s/h3/w1/v5</property>
      <property value="2.00967">fsim/tables/fuel_kg_s/h3/w1/v6</property>
      <property value="2.07683">fsim/tables/fuel_kg_s/h3/w1/v7</property>
      <property value="2.15107">fsim/tables/fuel_kg_s/h3/w1/v8</property>
      <property value="2.23774">fsim/tables/fuel_kg_s/h3/w1/v9</property>
      <property value="2.40254">fsim/tables/fuel_kg_s/h3/w2/v0</property>
      <property value="2.33724">fsim/tables/fuel_kg_s/h3/w2/v1</property>
      <property value="2.52731">fsim/tables/fuel_kg_s/h3/w2/v10</property>
      <property value="2.6066">fsim/tables/fuel_kg_s/h3/w2/v11</property>
      <property value="2.72227">fsim/tables/fuel_kg_s/h3/w2/v12</property>
      <property value="2.91379">fsim/tables/fuel_kg_s/h3/w2/v13</property>
      <property value="3.12349">fsim/tables/fuel_kg_s/h3/w2/v14</property>
      <property value="3.35952">fsim/tables/fuel_kg_s/h3/w2/v15</property>
      <property value="2.30457">fsim/tables/fuel_kg_s/h3/w2/v2</property>
      <property value="2.28777">fsim/tables/fuel_kg_s/h3/w2/v3</property>
      <property value="2.25677">fsim/tables/fuel_kg_s/h3/w2/v4</property>
      <property value="2.26327">fsim/tables/fuel_kg_s/h3/w2/v5</property>
      <property value="2.28577">fsim/tables/fuel_kg_s/h3/w2/v6</property>
      <property value="2.33206">fsim/tables/fuel_kg_s/h3/w2/v7</property>
      <property value="2.38059">fsim/tables/fuel_kg_s/h3/w2/v8</property>
      <property value="2.45336">fsim/tables/fuel_kg_s/h3/w2/v9</property>
      <property value="1.5327">fsim/tables/fuel_kg_s/h4/w0/v0</property>
      <property value="1.50018">fsim/tables/fuel_kg_s/h4/w0/v1</property>
      <property value="1.83195">fsim/tables/fuel_kg_s/h4/w0/v10</property>
      <property value="1.91603">fsim/tables/fuel_kg_s/h4/w0/v11</property>
      <property value="2.03533">fsim/tables/fuel_kg_s/h4/w0/v12</property>
      <property value="2.22371">fsim/tables/fuel_kg_s/h4/w0/v13</property>
      <property value="2.43377">fsim/tables/fuel_kg_s/h4/w0/v14</property>
      <property value="2.6709">fsim/tables/fuel_kg_s/h4/w0/v15</property>
      <property value="1.48028">fsim/tables/fuel_kg_s/h4/w0/v2</property>
      <property value="1.46829">fsim/tables/fuel_kg_s/h4/w0/v3</property>
      <property value="1.47641">fsim/tables/fuel_kg_s/h4/w0/v4</property>
      <property value="1.51295">fsim/tables/fuel_kg_s/h4/w0/v5</property>
      <property value="1.55511">fsim/tables/fuel_kg_s/h4/w0/v6</property>
      <property value="1.61393">fsim/tables/fuel_kg_s/h4/w0/v7</property>
      <property value="1.67379">fsim/tables/fuel_kg_s/h4/w0/v8</property>
      <property value="1.75065">fsim/tables/fuel_kg_s/h4/w0/v9</property>
      <property value="1.91239">fsim/tables/fuel_kg_s/h4/w1/v0</property>
      <property value="1.86218">fsim/tables/fuel_kg_s/h4/w1/v1</property>
      <property value="2.02701">fsim/tables/fuel_kg_s/h4/w1/v10</property>
      <property value="2.09506">fsim/tables/fuel_kg_s/h4/w1/v11</property>
      <property value="2.21639">fsim/tables/fuel_kg_s/h4/w1/v12</property>
      <property value="2.37499">fsim/tables/fuel_kg_s/h4/w1/v13</property>
      <property value="2.54872">fsim/tables/fuel_kg_s/h4/w1/v14</property>
      <property value="2.74854">fsim/tables/fuel_kg_s/h4/w1/v15</property>
      <property value="1.83639">fsim/tables/fuel_kg_s/h4/w1/v2</property>
      <property value="1.81882">fsim/tables/fuel_kg_s/h4/w1/v3</property>
      <property value="1.79859">fsim/tables/fuel_kg_s/h4/w1/v4</property>
      <property value="1.80345">fsim/tables/fuel_kg_s/h4/w1/v5</property>
      <property value="1.82616">fsim/tables/fuel_kg_s/h4/w1/v6</property>
      <property value="1.86397">fsim/tables/fuel_kg_s/h4/w1/v7</property>
      <property value="1.90769">fsim/tables/fuel_kg_s/h4/w1/v8</property>
      <property value="1.9669">fsim/tables/fuel_kg_s/h4/w1/v9</property>
      <property value="2.3045">fsim/tables/fuel_kg_s/h4/w2/v0</property>
      <property value="2.24411">fsim/tables/fuel_kg_s/h4/w2/v1</property>
      <property value="2.23606">fsim/tables/fuel_kg_s/h4/w2/v10</property>
      <property value="2.28317">fsim/tables/fuel_kg_s/h4/w2/v11</property>
      <property value="2.36223">fsim/tables/fuel_kg_s/h4/w2/v12</property>
      <property value="2.47848">fsim/tables/fuel_kg_s/h4/w2/v13</property>
      <property value="2.60533">fsim/tables/fuel_kg_s/h4/w2/v14</property>
      <property value="2.75713">fsim/tables/fuel_kg_s/h4/w2/v15</property>
      <property value="2.20261">fsim/tables/fuel_kg_s/h4/w2/v2</property>
      <property value="2.18196">fsim/tables/fuel_kg_s/h4/w2/v3</property>
      <property value="2.17056">fsim/tables/fuel_kg_s/h4/w2/v4</property>
      <property value="2.14559">fsim/tables/fuel_kg_s/h4/w2/v5</property>
      <property value="2.13639">fsim/tables/fuel_kg_s/h4/w2/v6</property>
      <property value="2.14451">fsim/tables/fuel_kg_s/h4/w2/v7</property>
      <property value="2.1658">fsim/tables/fuel_kg_s/h4/w2/v8</property>
      <property value="2.20097">fsim/tables/fuel_kg_s/h4/w2/v9</property>
      <property value="1.47181">fsim/tables/fuel_kg_s/h5/w0/v0</property>
      <property value="1.44021">fsim/tables/fuel_kg_s/h5/w0/v1</property>
      <property value="1.64231">fsim/tables/fuel_kg_s/h5/w0/v10</property>
      <property value="1.71037">fsim/tables/fuel_kg_s/h5/w0/v11</property>
      <property value="1.81157">fsim/tables/fuel_kg_s/h5/w0/v12</property>
      <property value="1.95442">fsim/tables/fuel_kg_s/h5/w0/v13</property>
      <property value="2.12181">fsim/tables/fuel_kg_s/h5/w0/v14</property>
      <property value="2.30646">fsim/tables/fuel_kg_s/h5/w0/v15</property>
      <property value="1.42112">fsim/tables/fuel_kg_s/h5/w0/v2</property>
      <property value="1.40421">fsim/tables/fuel_kg_s/h5/w0/v3</property>
      <property value="1.40097">fsim/tables/fuel_kg_s/h5/w0/v4</property>
      <property value="1.40975">fsim/tables/fuel_kg_s/h5/w0/v5</property>
      <property value="1.44337">fsim/tables/fuel_kg_s/h5/w0/v6</property>
      <property value="1.4785">fsim/tables/fuel_kg_s/h5/w0/v7</property>
      <property value="1.52892">fsim/tables/fuel_kg_s/h5/w0/v8</property>
      <property value="1.58101">fsim/tables/fuel_kg_s/h5/w0/v9</property>
      <property value="1.85013">fsim/tables/fuel_kg_s/h5/w1/v0</property>
      <property value="1.80418">fsim/tables/fuel_kg_s/h5/w1/v1</property>
      <property value="1.8458">fsim/tables/fuel_kg_s/h5/w1/v10</property>
      <property value="1.89401">fsim/tables/fuel_kg_s/h5/w1/v11</property>
      <property value="1.9785">fsim/tables/fuel_kg_s/h5/w1/v12</property>
      <property value="2.09127">fsim/tables/fuel_kg_s/h5/w1/v13</property>
      <property value="2.22224">fsim/tables/fuel_kg_s/h5/w1/v14</property>
      <property value="2.3646">fsim/tables/fuel_kg_s/h5/w1/v15</property>
      <property value="1.77294">fsim/tables/fuel_kg_s/h5/w1/v2</property>
      <property value="1.75462">fsim/tables/fuel_kg_s/h5/w1/v3</property>
      <property value="1.73921">fsim/tables/fuel_kg_s/h5/w1/v4</property>
      <property value="1.72402">fsim/tables/fuel_kg_s/h5/w1/v5</property>
      <property value="1.72579">fsim/tables/fuel_kg_s/h5/w1/v6</property>
      <property value="1.74027">fsim/tables/fuel_kg_s/h5/w1/v7</property>
      <property value="1.77206">fsim/tables/fuel_kg_s/h5/w1/v8</property>
      <property value="1.80372">fsim/tables/fuel_kg_s/h5/w1/v9</property>
      <property value="2.24177">fsim/tables/fuel_kg_s/h5/w2/v0</property>
      <property value="2.19435">fsim/tables/fuel_kg_s/h5/w2/v1</property>
      <property value="2.08163">fsim/tables/fuel_kg_s/h5/w2/v10</property>
      <property value="2.10748">fsim/tables/fuel_kg_s/h5/w2/v11</property>
      <property value="2.13568">fsim/tables/fuel_kg_s/h5/w2/v12</property>
      <property value="2.20177">fsim/tables/fuel_kg_s/h5/w2/v13</property>
      <property value="2.28118">fsim/tables/fuel_kg_s/h5/w2/v14</property>
      <property value="2.37181">fsim/tables/fuel_kg_s/h5/w2/v15</property>
      <property value="2.15702">fsim/tables/fuel_kg_s/h5/w2/v2</property>
      <property value="2.13119">fsim/tables/fuel_kg_s/h5/w2/v3</property>
      <property value="2.11374">fsim/tables/fuel_kg_s/h5/w2/v4</property>
      <property value="2.1073">fsim/tables/fuel_kg_s/h5/w2/v5</property>
      <property value="2.08932">fsim/tables/fuel_kg_s/h5/w2/v6</property>
      <property value="2.06785">fsim/tables/fuel_kg_s/h5/w2/v7</property>
      <property value="2.06598">fsim/tables/fuel_kg_s/h5/w2/v8</property>
      <property value="2.07161">fsim/tables/fuel_kg_s/h5/w2/v9</property>
      <property value="1.41888">fsim/tables/fuel_kg_s/h6/w0/v0</property>
      <property value="1.39092">fsim/tables/fuel_kg_s/h6/w0/v1</property>
      <property value="1.48816">fsim/tables/fuel_kg_s/h6/w0/v10</property>
      <property value="1.53242">fsim/tables/fuel_kg_s/h6/w0/v11</property>
      <property value="1.62643">fsim/tables/fuel_kg_s/h6/w0/v12</property>
      <property value="1.73887">fsim/tables/fuel_kg_s/h6/w0/v13</property>
      <property value="1.86163">fsim/tables/fuel_kg_s/h6/w0/v14</property>
      <property value="1.99734">fsim/tables/fuel_kg_s/h6/w0/v15</property>
      <property value="1.36819">fsim/tables/fuel_kg_s/h6/w0/v2</property>
      <property value="1.35117">fsim/tables/fuel_kg_s/h6/w0/v3</property>
      <property value="1.33637">fsim/tables/fuel_kg_s/h6/w0/v4</property>
      <property value="1.33859">fsim/tables/fuel_kg_s/h6/w0/v5</property>
      <property value="1.34775">fsim/tables/fuel_kg_s/h6/w0/v6</property>
      <property value="1.37526">fsim/tables/fuel_kg_s/h6/w0/v7</property>
      <property value="1.40372">fsim/tables/fuel_kg_s/h6/w0/v8</property>
      <property value="1.44527">fsim/tables/fuel_kg_s/h6/w0/v9</property>
      <property value="1.80076">fsim/tables/fuel_kg_s/h6/w1/v0</property>
      <property value="1.75828">fsim/tables/fuel_kg_s/h6/w1/v1</property>
      <property value="1.70659">fsim/tables/fuel_kg_s/h6/w1/v10</property>
      <property value="1.73094">fsim/tables/fuel_kg_s/h6/w1/v11</property>
      <property value="1.78565">fsim/tables/fuel_kg_s/h6/w1/v12</property>
      <property value="1.86427">fsim/tables/fuel_kg_s/h6/w1/v13</property>
      <property value="1.9483">fsim/tables/fuel_kg_s/h6/w1/v14</property>
      <property value="2.0383">fsim/tables/fuel_kg_s/h6/w1/v15</property>
      <property value="1.72436">fsim/tables/fuel_kg_s/h6/w1/v2</property>
      <property value="1.70688">fsim/tables/fuel_kg_s/h6/w1/v3</property>
      <property value="1.6928">fsim/tables/fuel_kg_s/h6/w1/v4</property>
      <property value="1.67945">fsim/tables/fuel_kg_s/h6/w1/v5</property>
      <property value="1.6619">fsim/tables/fuel_kg_s/h6/w1/v6</property>
      <property value="1.66221">fsim/tables/fuel_kg_s/h6/w1/v7</property>
      <property value="1.66633">fsim/tables/fuel_kg_s/h6/w1/v8</property>
      <property value="1.68221">fsim/tables/fuel_kg_s/h6/w1/v9</property>
      <property value="1.94624">fsim/tables/fuel_kg_s/h6/w2/v0</property>
      <property value="1.99061">fsim/tables/fuel_kg_s/h6/w2/v1</property>
      <property value="2.01408">fsim/tables/fuel_kg_s/h6/w2/v10</property>
      <property value="2.0164">fsim/tables/fuel_kg_s/h6/w2/v11</property>
      <property value="2.03275">fsim/tables/fuel_kg_s/h6/w2/v12</property>
      <property value="2.05001">fsim/tables/fuel_kg_s/h6/w2/v13</property>
      <property value="2.07515">fsim/tables/fuel_kg_s/h6/w2/v14</property>
      <property value="2.10373">fsim/tables/fuel_kg_s/h6/w2/v15</property>
      <property value="2.02268">fsim/tables/fuel_kg_s/h6/w2/v2</property>
      <property value="2.03889">fsim/tables/fuel_kg_s/h6/w2/v3</property>
      <property value="2.04176">fsim/tables/fuel_kg_s/h6/w2/v4</property>
      <property value="2.03156">fsim/tables/fuel_kg_s/h6/w2/v5</property>
      <property value="2.01903">fsim/tables/fuel_kg_s/h6/w2/v6</property>
      <property value="2.01588">fsim/tables/fuel_kg_s/h6/w2/v7</property>
      <property value="2.01415">fsim/tables/fuel_kg_s/h6/w2/v8</property>
      <property value="2.01265">fsim/tables/fuel_kg_s/h6/w2/v9</property>
      <property value="33.8153">fsim/tables/max_climb_ms/h0/w0</property>
      <property value="24.8317">fsim/tables/max_climb_ms/h0/w1</property>
      <property value="19.0238">fsim/tables/max_climb_ms/h0/w2</property>
      <property value="30.1366">fsim/tables/max_climb_ms/h1/w0</property>
      <property value="21.9081">fsim/tables/max_climb_ms/h1/w1</property>
      <property value="16.6">fsim/tables/max_climb_ms/h1/w2</property>
      <property value="25.3665">fsim/tables/max_climb_ms/h2/w0</property>
      <property value="18.1174">fsim/tables/max_climb_ms/h2/w1</property>
      <property value="13.3504">fsim/tables/max_climb_ms/h2/w2</property>
      <property value="18.3584">fsim/tables/max_climb_ms/h3/w0</property>
      <property value="12.4286">fsim/tables/max_climb_ms/h3/w1</property>
      <property value="8.51206">fsim/tables/max_climb_ms/h3/w2</property>
      <property value="14.3177">fsim/tables/max_climb_ms/h4/w0</property>
      <property value="9.13689">fsim/tables/max_climb_ms/h4/w1</property>
      <property value="5.53775">fsim/tables/max_climb_ms/h4/w2</property>
      <property value="11.4034">fsim/tables/max_climb_ms/h5/w0</property>
      <property value="6.67089">fsim/tables/max_climb_ms/h5/w1</property>
      <property value="3.38079">fsim/tables/max_climb_ms/h5/w2</property>
      <property value="8.97173">fsim/tables/max_climb_ms/h6/w0</property>
      <property value="4.5555">fsim/tables/max_climb_ms/h6/w1</property>
      <property value="1.3637">fsim/tables/max_climb_ms/h6/w2</property>
      <property value="244.596">fsim/tables/max_tas_ms/h0/w0</property>
      <property value="244.018">fsim/tables/max_tas_ms/h0/w1</property>
      <property value="243.34">fsim/tables/max_tas_ms/h0/w2</property>
      <property value="250.611">fsim/tables/max_tas_ms/h1/w0</property>
      <property value="249.84">fsim/tables/max_tas_ms/h1/w1</property>
      <property value="249.03">fsim/tables/max_tas_ms/h1/w2</property>
      <property value="254.967">fsim/tables/max_tas_ms/h2/w0</property>
      <property value="253.965">fsim/tables/max_tas_ms/h2/w1</property>
      <property value="251.306">fsim/tables/max_tas_ms/h2/w2</property>
      <property value="254.754">fsim/tables/max_tas_ms/h3/w0</property>
      <property value="254.292">fsim/tables/max_tas_ms/h3/w1</property>
      <property value="251.119">fsim/tables/max_tas_ms/h3/w2</property>
      <property value="250.453">fsim/tables/max_tas_ms/h4/w0</property>
      <property value="249.322">fsim/tables/max_tas_ms/h4/w1</property>
      <property value="243.611">fsim/tables/max_tas_ms/h4/w2</property>
      <property value="246.669">fsim/tables/max_tas_ms/h5/w0</property>
      <property value="243.284">fsim/tables/max_tas_ms/h5/w1</property>
      <property value="234.429">fsim/tables/max_tas_ms/h5/w2</property>
      <property value="242.812">fsim/tables/max_tas_ms/h6/w0</property>
      <property value="236.296">fsim/tables/max_tas_ms/h6/w1</property>
      <property value="224.61">fsim/tables/max_tas_ms/h6/w2</property>
      <property value="96.1888">fsim/tables/min_tas_ms/h0/w0</property>
      <property value="101.906">fsim/tables/min_tas_ms/h0/w1</property>
      <property value="107.986">fsim/tables/min_tas_ms/h0/w2</property>
      <property value="100.015">fsim/tables/min_tas_ms/h1/w0</property>
      <property value="107.766">fsim/tables/min_tas_ms/h1/w1</property>
      <property value="115.528">fsim/tables/min_tas_ms/h1/w2</property>
      <property value="105.791">fsim/tables/min_tas_ms/h2/w0</property>
      <property value="115.806">fsim/tables/min_tas_ms/h2/w1</property>
      <property value="125.414">fsim/tables/min_tas_ms/h2/w2</property>
      <property value="113.493">fsim/tables/min_tas_ms/h3/w0</property>
      <property value="125.873">fsim/tables/min_tas_ms/h3/w1</property>
      <property value="137.486">fsim/tables/min_tas_ms/h3/w2</property>
      <property value="121.341">fsim/tables/min_tas_ms/h4/w0</property>
      <property value="135.625">fsim/tables/min_tas_ms/h4/w1</property>
      <property value="148.792">fsim/tables/min_tas_ms/h4/w2</property>
      <property value="127.375">fsim/tables/min_tas_ms/h5/w0</property>
      <property value="142.976">fsim/tables/min_tas_ms/h5/w1</property>
      <property value="157.258">fsim/tables/min_tas_ms/h5/w2</property>
      <property value="134.354">fsim/tables/min_tas_ms/h6/w0</property>
      <property value="151.292">fsim/tables/min_tas_ms/h6/w1</property>
      <property value="188.129">fsim/tables/min_tas_ms/h6/w2</property>
      <property value="27.9248">fsim/tables/ps_full_ms/h0/w0/v0</property>
      <property value="29.7801">fsim/tables/ps_full_ms/h0/w0/v1</property>
      <property value="28.2221">fsim/tables/ps_full_ms/h0/w0/v10</property>
      <property value="25.5072">fsim/tables/ps_full_ms/h0/w0/v11</property>
      <property value="22.0573">fsim/tables/ps_full_ms/h0/w0/v12</property>
      <property value="17.8406">fsim/tables/ps_full_ms/h0/w0/v13</property>
      <property value="12.9845">fsim/tables/ps_full_ms/h0/w0/v14</property>
      <property value="7.46175">fsim/tables/ps_full_ms/h0/w0/v15</property>
      <property value="31.2138">fsim/tables/ps_full_ms/h0/w0/v2</property>
      <property value="32.3985">fsim/tables/ps_full_ms/h0/w0/v3</property>
      <property value="33.3107">fsim/tables/ps_full_ms/h0/w0/v4</property>
      <property value="33.7791">fsim/tables/ps_full_ms/h0/w0/v5</property>
      <property value="33.6772">fsim/tables/ps_full_ms/h0/w0/v6</property>
      <property value="33.0703">fsim/tables/ps_full_ms/h0/w0/v7</property>
      <property value="32.0063">fsim/tables/ps_full_ms/h0/w0/v8</property>
      <property value="30.4142">fsim/tables/ps_full_ms/h0/w0/v9</property>
      <property value="20.4669">fsim/tables/ps_full_ms/h0/w1/v0</property>
      <property value="21.8602">fsim/tables/ps_full_ms/h0/w1/v1</property>
      <property value="20.6706">fsim/tables/ps_full_ms/h0/w1/v10</property>
      <property value="18.7646">fsim/tables/ps_full_ms/h0/w1/v11</property>
      <property value="16.1595">fsim/tables/ps_full_ms/h0/w1/v12</property>
      <property value="13.0321">fsim/tables/ps_full_ms/h0/w1/v13</property>
      <property value="9.46033">fsim/tables/ps_full_ms/h0/w1/v14</property>
      <property value="5.4277">fsim/tables/ps_full_ms/h0/w1/v15</property>
      <property value="23.1244">fsim/tables/ps_full_ms/h0/w1/v2</property>
      <property value="24.0097">fsim/tables/ps_full_ms/h0/w1/v3</property>
      <property value="24.5587">fsim/tables/ps_full_ms/h0/w1/v4</property>
      <property value="24.8261">fsim/tables/ps_full_ms/h0/w1/v5</property>
      <property value="24.7119">fsim/tables/ps_full_ms/h0/w1/v6</property>
      <property value="24.3067">fsim/tables/ps_full_ms/h0/w1/v7</property>
      <property value="23.4466">fsim/tables/ps_full_ms/h0/w1/v8</property>
      <property value="22.2229">fsim/tables/ps_full_ms/h0/w1/v9</property>
      <property value="15.8156">fsim/tables/ps_full_ms/h0/w2/v0</property>
      <property value="16.7325">fsim/tables/ps_full_ms/h0/w2/v1</property>
      <property value="15.7954">fsim/tables/ps_full_ms/h0/w2/v10</property>
      <property value="14.262">fsim/tables/ps_full_ms/h0/w2/v11</property>
      <property value="12.3224">fsim/tables/ps_full_ms/h0/w2/v12</property>
      <property value="10.0447">fsim/tables/ps_full_ms/h0/w2/v13</property>
      <property value="7.30228">fsim/tables/ps_full_ms/h0/w2/v14</property>
      <property value="4.19993">fsim/tables/ps_full_ms/h0/w2/v15</property>
      <property value="17.799">fsim/tables/ps_full_ms/h0/w2/v2</property>
      <property value="18.5272">fsim/tables/ps_full_ms/h0/w2/v3</property>
      <property value="18.8886">fsim/tables/ps_full_ms/h0/w2/v4</property>
      <property value="19.0225">fsim/tables/ps_full_ms/h0/w2/v5</property>
      <property value="18.9629">fsim/tables/ps_full_ms/h0/w2/v6</property>
      <property value="18.5693">fsim/tables/ps_full_ms/h0/w2/v7</property>
      <property value="17.9562">fsim/tables/ps_full_ms/h0/w2/v8</property>
      <property value="17.0769">fsim/tables/ps_full_ms/h0/w2/v9</property>
      <property value="23.3015">fsim/tables/ps_full_ms/h1/w0/v0</property>
      <property value="25.0712">fsim/tables/ps_full_ms/h1/w0/v1</property>
      <property value="27.735">fsim/tables/ps_full_ms/h1/w0/v10</property>
      <property value="25.5824">fsim/tables/ps_full_ms/h1/w0/v11</property>
      <property value="22.6075">fsim/tables/ps_full_ms/h1/w0/v12</property>
      <property value="19.1063">fsim/tables/ps_full_ms/h1/w0/v13</property>
      <property value="14.7591">fsim/tables/ps_full_ms/h1/w0/v14</property>
      <property value="7.03856">fsim/tables/ps_full_ms/h1/w0/v15</property>
      <property value="26.5335">fsim/tables/ps_full_ms/h1/w0/v2</property>
      <property value="27.8039">fsim/tables/ps_full_ms/h1/w0/v3</property>
      <property value="28.8808">fsim/tables/ps_full_ms/h1/w0/v4</property>
      <property value="29.6489">fsim/tables/ps_full_ms/h1/w0/v5</property>
      <property value="30.0765">fsim/tables/ps_full_ms/h1/w0/v6</property>
      <property value="30.0555">fsim/tables/ps_full_ms/h1/w0/v7</property>
      <property value="29.6429">fsim/tables/ps_full_ms/h1/w0/v8</property>
      <property value="28.8855">fsim/tables/ps_full_ms/h1/w0/v9</property>
      <property value="16.9688">fsim/tables/ps_full_ms/h1/w1/v0</property>
      <property value="18.1476">fsim/tables/ps_full_ms/h1/w1/v1</property>
      <property value="20.1299">fsim/tables/ps_full_ms/h1/w1/v10</property>
      <property value="18.5179">fsim/tables/ps_full_ms/h1/w1/v11</property>
      <property value="16.4734">fsim/tables/ps_full_ms/h1/w1/v12</property>
      <property value="13.9586">fsim/tables/ps_full_ms/h1/w1/v13</property>
      <property value="10.8358">fsim/tables/ps_full_ms/h1/w1/v14</property>
      <property value="5.30472">fsim/tables/ps_full_ms/h1/w1/v15</property>
      <property value="19.4717">fsim/tables/ps_full_ms/h1/w1/v2</property>
      <property value="20.4345">fsim/tables/ps_full_ms/h1/w1/v3</property>
      <property value="21.1407">fsim/tables/ps_full_ms/h1/w1/v4</property>
      <property value="21.6134">fsim/tables/ps_full_ms/h1/w1/v5</property>
      <property value="21.8988">fsim/tables/ps_full_ms/h1/w1/v6</property>
      <property value="21.8594">fsim/tables/ps_full_ms/h1/w1/v7</property>
      <property value="21.6446">fsim/tables/ps_full_ms/h1/w1/v8</property>
      <property value="21.0412">fsim/tables/ps_full_ms/h1/w1/v9</property>
      <property value="12.889">fsim/tables/ps_full_ms/h1/w2/v0</property>
      <property value="13.7178">fsim/tables/ps_full_ms/h1/w2/v1</property>
      <property value="15.3318">fsim/tables/ps_full_ms/h1/w2/v10</property>
      <property value="13.9817">fsim/tables/ps_full_ms/h1/w2/v11</property>
      <property value="12.3573">fsim/tables/ps_full_ms/h1/w2/v12</property>
      <property value="10.5013">fsim/tables/ps_full_ms/h1/w2/v13</property>
      <property value="8.29117">fsim/tables/ps_full_ms/h1/w2/v14</property>
      <property value="4.23735">fsim/tables/ps_full_ms/h1/w2/v15</property>
      <property value="14.6653">fsim/tables/ps_full_ms/h1/w2/v2</property>
      <property value="15.552">fsim/tables/ps_full_ms/h1/w2/v3</property>
      <property value="16.0498">fsim/tables/ps_full_ms/h1/w2/v4</property>
      <property value="16.4279">fsim/tables/ps_full_ms/h1/w2/v5</property>
      <property value="16.5748">fsim/tables/ps_full_ms/h1/w2/v6</property>
      <property value="16.5938">fsim/tables/ps_full_ms/h1/w2/v7</property>
      <property value="16.3401">fsim/tables/ps_full_ms/h1/w2/v8</property>
      <property value="15.9273">fsim/tables/ps_full_ms/h1/w2/v9</property>
      <property value="18.4671">fsim/tables/ps_full_ms/h2/w0/v0</property>
      <property value="19.8788">fsim/tables/ps_full_ms/h2/w0/v1</property>
      <property value="23.9575">fsim/tables/ps_full_ms/h2/w0/v10</property>
      <property value="22.4103">fsim/tables/ps_full_ms/h2/w0/v11</property>
      <property value="20.3848">fsim/tables/ps_full_ms/h2/w0/v12</property>
      <property value="17.5208">fsim/tables/ps_full_ms/h2/w0/v13</property>
      <property value="12.2236">fsim/tables/ps_full_ms/h2/w0/v14</property>
      <property value="5.90933">fsim/tables/ps_full_ms/h2/w0/v15</property>
      <property value="21.2908">fsim/tables/ps_full_ms/h2/w0/v2</property>
      <property value="22.5751">fsim/tables/ps_full_ms/h2/w0/v3</property>
      <property value="23.6508">fsim/tables/ps_full_ms/h2/w0/v4</property>
      <property value="24.475">fsim/tables/ps_full_ms/h2/w0/v5</property>
      <property value="24.9974">fsim/tables/ps_full_ms/h2/w0/v6</property>
      <property value="25.2922">fsim/tables/ps_full_ms/h2/w0/v7</property>
      <property value="25.3224">fsim/tables/ps_full_ms/h2/w0/v8</property>
      <property value="24.954">fsim/tables/ps_full_ms/h2/w0/v9</property>
      <property value="13.1287">fsim/tables/ps_full_ms/h2/w1/v0</property>
      <property value="14.0812">fsim/tables/ps_full_ms/h2/w1/v1</property>
      <property value="17.0816">fsim/tables/ps_full_ms/h2/w1/v10</property>
      <property value="15.8999">fsim/tables/ps_full_ms/h2/w1/v11</property>
      <property value="14.4739">fsim/tables/ps_full_ms/h2/w1/v12</property>
      <property value="12.4437">fsim/tables/ps_full_ms/h2/w1/v13</property>
      <property value="8.84381">fsim/tables/ps_full_ms/h2/w1/v14</property>
      <property value="4.43977">fsim/tables/ps_full_ms/h2/w1/v15</property>
      <property value="15.2192">fsim/tables/ps_full_ms/h2/w1/v2</property>
      <property value="16.3017">fsim/tables/ps_full_ms/h2/w1/v3</property>
      <property value="16.9744">fsim/tables/ps_full_ms/h2/w1/v4</property>
      <property value="17.5449">fsim/tables/ps_full_ms/h2/w1/v5</property>
      <property value="17.8914">fsim/tables/ps_full_ms/h2/w1/v6</property>
      <property value="18.1135">fsim/tables/ps_full_ms/h2/w1/v7</property>
      <property value="18.0509">fsim/tables/ps_full_ms/h2/w1/v8</property>
      <property value="17.845">fsim/tables/ps_full_ms/h2/w1/v9</property>
      <property value="9.54742">fsim/tables/ps_full_ms/h2/w2/v0</property>
      <property value="10.2387">fsim/tables/ps_full_ms/h2/w2/v1</property>
      <property value="12.5232">fsim/tables/ps_full_ms/h2/w2/v10</property>
      <property value="11.7736">fsim/tables/ps_full_ms/h2/w2/v11</property>
      <property value="10.888">fsim/tables/ps_full_ms/h2/w2/v12</property>
      <property value="9.50993">fsim/tables/ps_full_ms/h2/w2/v13</property>
      <property value="6.90147">fsim/tables/ps_full_ms/h2/w2/v14</property>
      <property value="3.88178">fsim/tables/ps_full_ms/h2/w2/v15</property>
      <property value="11.0288">fsim/tables/ps_full_ms/h2/w2/v2</property>
      <property value="11.9764">fsim/tables/ps_full_ms/h2/w2/v3</property>
      <property value="12.4922">fsim/tables/ps_full_ms/h2/w2/v4</property>
      <property value="12.9246">fsim/tables/ps_full_ms/h2/w2/v5</property>
      <property value="13.23">fsim/tables/ps_full_ms/h2/w2/v6</property>
      <property value="13.3397">fsim/tables/ps_full_ms/h2/w2/v7</property>
      <property value="13.3471">fsim/tables/ps_full_ms/h2/w2/v8</property>
      <property value="13.1541">fsim/tables/ps_full_ms/h2/w2/v9</property>
      <property value="13.3307">fsim/tables/ps_full_ms/h3/w0/v0</property>
      <property value="14.3147">fsim/tables/ps_full_ms/h3/w0/v1</property>
      <property value="17.6986">fsim/tables/ps_full_ms/h3/w0/v10</property>
      <property value="17.0429">fsim/tables/ps_full_ms/h3/w0/v11</property>
      <property value="16.1065">fsim/tables/ps_full_ms/h3/w0/v12</property>
      <property value="13.4886">fsim/tables/ps_full_ms/h3/w0/v13</property>
      <property value="10.056">fsim/tables/ps_full_ms/h3/w0/v14</property>
      <property value="5.83604">fsim/tables/ps_full_ms/h3/w0/v15</property>
      <property value="15.4">fsim/tables/ps_full_ms/h3/w0/v2</property>
      <property value="16.612">fsim/tables/ps_full_ms/h3/w0/v3</property>
      <property value="17.3129">fsim/tables/ps_full_ms/h3/w0/v4</property>
      <property value="17.8539">fsim/tables/ps_full_ms/h3/w0/v5</property>
      <property value="18.1933">fsim/tables/ps_full_ms/h3/w0/v6</property>
      <property value="18.3566">fsim/tables/ps_full_ms/h3/w0/v7</property>
      <property value="18.2607">fsim/tables/ps_full_ms/h3/w0/v8</property>
      <property value="18.0933">fsim/tables/ps_full_ms/h3/w0/v9</property>
      <property value="8.79239">fsim/tables/ps_full_ms/h3/w1/v0</property>
      <property value="9.53739">fsim/tables/ps_full_ms/h3/w1/v1</property>
      <property value="11.9798">fsim/tables/ps_full_ms/h3/w1/v10</property>
      <property value="11.589">fsim/tables/ps_full_ms/h3/w1/v11</property>
      <property value="10.8455">fsim/tables/ps_full_ms/h3/w1/v12</property>
      <property value="8.89919">fsim/tables/ps_full_ms/h3/w1/v13</property>
      <property value="6.51331">fsim/tables/ps_full_ms/h3/w1/v14</property>
      <property value="3.70547">fsim/tables/ps_full_ms/h3/w1/v15</property>
      <property value="10.3138">fsim/tables/ps_full_ms/h3/w1/v2</property>
      <property value="11.2076">fsim/tables/ps_full_ms/h3/w1/v3</property>
      <property value="11.73">fsim/tables/ps_full_ms/h3/w1/v4</property>
      <property value="12.1189">fsim/tables/ps_full_ms/h3/w1/v5</property>
      <property value="12.3761">fsim/tables/ps_full_ms/h3/w1/v6</property>
      <property value="12.4237">fsim/tables/ps_full_ms/h3/w1/v7</property>
      <property value="12.3876">fsim/tables/ps_full_ms/h3/w1/v8</property>
      <property value="12.2763">fsim/tables/ps_full_ms/h3/w1/v9</property>
      <property value="5.73512">fsim/tables/ps_full_ms/h3/w2/v0</property>
      <property value="6.20369">fsim/tables/ps_full_ms/h3/w2/v1</property>
      <property value="8.25199">fsim/tables/ps_full_ms/h3/w2/v10</property>
      <property value="8.02708">fsim/tables/ps_full_ms/h3/w2/v11</property>
      <property value="7.46316">fsim/tables/ps_full_ms/h3/w2/v12</property>
      <property value="6.18523">fsim/tables/ps_full_ms/h3/w2/v13</property>
      <property value="4.68852">fsim/tables/ps_full_ms/h3/w2/v14</property>
      <property value="2.90038">fsim/tables/ps_full_ms/h3/w2/v15</property>
      <property value="6.78502">fsim/tables/ps_full_ms/h3/w2/v2</property>
      <property value="7.30077">fsim/tables/ps_full_ms/h3/w2/v3</property>
      <property value="7.84972">fsim/tables/ps_full_ms/h3/w2/v4</property>
      <property value="8.1692">fsim/tables/ps_full_ms/h3/w2/v5</property>
      <property value="8.39831">fsim/tables/ps_full_ms/h3/w2/v6</property>
      <property value="8.44654">fsim/tables/ps_full_ms/h3/w2/v7</property>
      <property value="8.50905">fsim/tables/ps_full_ms/h3/w2/v8</property>
      <property value="8.39805">fsim/tables/ps_full_ms/h3/w2/v9</property>
      <property value="10.1695">fsim/tables/ps_full_ms/h4/w0/v0</property>
      <property value="11.0305">fsim/tables/ps_full_ms/h4/w0/v1</property>
      <property value="13.9354">fsim/tables/ps_full_ms/h4/w0/v10</property>
      <property value="13.583">fsim/tables/ps_full_ms/h4/w0/v11</property>
      <property value="12.6511">fsim/tables/ps_full_ms/h4/w0/v12</property>
      <property value="10.6149">fsim/tables/ps_full_ms/h4/w0/v13</property>
      <property value="8.11842">fsim/tables/ps_full_ms/h4/w0/v14</property>
      <property value="5.13645">fsim/tables/ps_full_ms/h4/w0/v15</property>
      <property value="11.805">fsim/tables/ps_full_ms/h4/w0/v2</property>
      <property value="12.857">fsim/tables/ps_full_ms/h4/w0/v3</property>
      <property value="13.4998">fsim/tables/ps_full_ms/h4/w0/v4</property>
      <property value="13.8828">fsim/tables/ps_full_ms/h4/w0/v5</property>
      <property value="14.2023">fsim/tables/ps_full_ms/h4/w0/v6</property>
      <property value="14.2894">fsim/tables/ps_full_ms/h4/w0/v7</property>
      <property value="14.3175">fsim/tables/ps_full_ms/h4/w0/v8</property>
      <property value="14.1823">fsim/tables/ps_full_ms/h4/w0/v9</property>
      <property value="6.1383">fsim/tables/ps_full_ms/h4/w1/v0</property>
      <property value="6.70249">fsim/tables/ps_full_ms/h4/w1/v1</property>
      <property value="8.90173">fsim/tables/ps_full_ms/h4/w1/v10</property>
      <property value="8.65323">fsim/tables/ps_full_ms/h4/w1/v11</property>
      <property value="7.7981">fsim/tables/ps_full_ms/h4/w1/v12</property>
      <property value="6.47023">fsim/tables/ps_full_ms/h4/w1/v13</property>
      <property value="4.91331">fsim/tables/ps_full_ms/h4/w1/v14</property>
      <property value="3.00612">fsim/tables/ps_full_ms/h4/w1/v15</property>
      <property value="7.29104">fsim/tables/ps_full_ms/h4/w1/v2</property>
      <property value="7.84483">fsim/tables/ps_full_ms/h4/w1/v3</property>
      <property value="8.39934">fsim/tables/ps_full_ms/h4/w1/v4</property>
      <property value="8.76028">fsim/tables/ps_full_ms/h4/w1/v5</property>
      <property value="8.97899">fsim/tables/ps_full_ms/h4/w1/v6</property>
      <property value="9.05381">fsim/tables/ps_full_ms/h4/w1/v7</property>
      <property value="9.12431">fsim/tables/ps_full_ms/h4/w1/v8</property>
      <property value="9.0308">fsim/tables/ps_full_ms/h4/w1/v9</property>
      <property value="3.27517">fsim/tables/ps_full_ms/h4/w2/v0</property>
      <property value="3.57947">fsim/tables/ps_full_ms/h4/w2/v1</property>
      <property value="5.50702">fsim/tables/ps_full_ms/h4/w2/v10</property>
      <property value="5.37278">fsim/tables/ps_full_ms/h4/w2/v11</property>
      <property value="4.96043">fsim/tables/ps_full_ms/h4/w2/v12</property>
      <property value="4.19933">fsim/tables/ps_full_ms/h4/w2/v13</property>
      <property value="3.3139">fsim/tables/ps_full_ms/h4/w2/v14</property>
      <property value="2.18419">fsim/tables/ps_full_ms/h4/w2/v15</property>
      <property value="4.01219">fsim/tables/ps_full_ms/h4/w2/v2</property>
      <property value="4.33979">fsim/tables/ps_full_ms/h4/w2/v3</property>
      <property value="4.68925">fsim/tables/ps_full_ms/h4/w2/v4</property>
      <property value="5.03001">fsim/tables/ps_full_ms/h4/w2/v5</property>
      <property value="5.27428">fsim/tables/ps_full_ms/h4/w2/v6</property>
      <property value="5.44372">fsim/tables/ps_full_ms/h4/w2/v7</property>
      <property value="5.53156">fsim/tables/ps_full_ms/h4/w2/v8</property>
      <property value="5.52438">fsim/tables/ps_full_ms/h4/w2/v9</property>
      <property value="7.89302">fsim/tables/ps_full_ms/h5/w0/v0</property>
      <property value="8.64406">fsim/tables/ps_full_ms/h5/w0/v1</property>
      <property value="11.146">fsim/tables/ps_full_ms/h5/w0/v10</property>
      <property value="10.8127">fsim/tables/ps_full_ms/h5/w0/v11</property>
      <property value="9.95228">fsim/tables/ps_full_ms/h5/w0/v12</property>
      <property value="8.40381">fsim/tables/ps_full_ms/h5/w0/v13</property>
      <property value="6.41538">fsim/tables/ps_full_ms/h5/w0/v14</property>
      <property value="4.09346">fsim/tables/ps_full_ms/h5/w0/v15</property>
      <property value="9.28581">fsim/tables/ps_full_ms/h5/w0/v2</property>
      <property value="10.0734">fsim/tables/ps_full_ms/h5/w0/v3</property>
      <property value="10.6258">fsim/tables/ps_full_ms/h5/w0/v4</property>
      <property value="11.0691">fsim/tables/ps_full_ms/h5/w0/v5</property>
      <property value="11.2616">fsim/tables/ps_full_ms/h5/w0/v6</property>
      <property value="11.4027">fsim/tables/ps_full_ms/h5/w0/v7</property>
      <property value="11.3821">fsim/tables/ps_full_ms/h5/w0/v8</property>
      <property value="11.3484">fsim/tables/ps_full_ms/h5/w0/v9</property>
      <property value="4.13865">fsim/tables/ps_full_ms/h5/w1/v0</property>
      <property value="4.57506">fsim/tables/ps_full_ms/h5/w1/v1</property>
      <property value="6.56369">fsim/tables/ps_full_ms/h5/w1/v10</property>
      <property value="6.38567">fsim/tables/ps_full_ms/h5/w1/v11</property>
      <property value="5.79677">fsim/tables/ps_full_ms/h5/w1/v12</property>
      <property value="4.86188">fsim/tables/ps_full_ms/h5/w1/v13</property>
      <property value="3.69232">fsim/tables/ps_full_ms/h5/w1/v14</property>
      <property value="2.36005">fsim/tables/ps_full_ms/h5/w1/v15</property>
      <property value="5.04248">fsim/tables/ps_full_ms/h5/w1/v2</property>
      <property value="5.43009">fsim/tables/ps_full_ms/h5/w1/v3</property>
      <property value="5.8434">fsim/tables/ps_full_ms/h5/w1/v4</property>
      <property value="6.21277">fsim/tables/ps_full_ms/h5/w1/v5</property>
      <property value="6.45301">fsim/tables/ps_full_ms/h5/w1/v6</property>
      <property value="6.62186">fsim/tables/ps_full_ms/h5/w1/v7</property>
      <property value="6.64773">fsim/tables/ps_full_ms/h5/w1/v8</property>
      <property value="6.66829">fsim/tables/ps_full_ms/h5/w1/v9</property>
      <property value="1.41084">fsim/tables/ps_full_ms/h5/w2/v0</property>
      <property value="1.62515">fsim/tables/ps_full_ms/h5/w2/v1</property>
      <property value="3.3706">fsim/tables/ps_full_ms/h5/w2/v10</property>
      <property value="3.30884">fsim/tables/ps_full_ms/h5/w2/v11</property>
      <property value="3.22461">fsim/tables/ps_full_ms/h5/w2/v12</property>
      <property value="2.81711">fsim/tables/ps_full_ms/h5/w2/v13</property>
      <property value="2.27753">fsim/tables/ps_full_ms/h5/w2/v14</property>
      <property value="1.63253">fsim/tables/ps_full_ms/h5/w2/v15</property>
      <property value="1.91576">fsim/tables/ps_full_ms/h5/w2/v2</property>
      <property value="2.1621">fsim/tables/ps_full_ms/h5/w2/v3</property>
      <property value="2.37063">fsim/tables/ps_full_ms/h5/w2/v4</property>
      <property value="2.58585">fsim/tables/ps_full_ms/h5/w2/v5</property>
      <property value="2.82425">fsim/tables/ps_full_ms/h5/w2/v6</property>
      <property value="3.0891">fsim/tables/ps_full_ms/h5/w2/v7</property>
      <property value="3.22892">fsim/tables/ps_full_ms/h5/w2/v8</property>
      <property value="3.31301">fsim/tables/ps_full_ms/h5/w2/v9</property>
      <property value="5.89934">fsim/tables/ps_full_ms/h6/w0/v0</property>
      <property value="6.49592">fsim/tables/ps_full_ms/h6/w0/v1</property>
      <property value="8.76869">fsim/tables/ps_full_ms/h6/w0/v10</property>
      <property value="8.59912">fsim/tables/ps_full_ms/h6/w0/v11</property>
      <property value="7.69029">fsim/tables/ps_full_ms/h6/w0/v12</property>
      <property value="6.45286">fsim/tables/ps_full_ms/h6/w0/v13</property>
      <property value="5.00684">fsim/tables/ps_full_ms/h6/w0/v14</property>
      <property value="3.3161">fsim/tables/ps_full_ms/h6/w0/v15</property>
      <property value="7.06479">fsim/tables/ps_full_ms/h6/w0/v2</property>
      <property value="7.59405">fsim/tables/ps_full_ms/h6/w0/v3</property>
      <property value="8.13902">fsim/tables/ps_full_ms/h6/w0/v4</property>
      <property value="8.50161">fsim/tables/ps_full_ms/h6/w0/v5</property>
      <property value="8.78875">fsim/tables/ps_full_ms/h6/w0/v6</property>
      <property value="8.86197">fsim/tables/ps_full_ms/h6/w0/v7</property>
      <property value="8.97114">fsim/tables/ps_full_ms/h6/w0/v8</property>
      <property value="8.88955">fsim/tables/ps_full_ms/h6/w0/v9</property>
      <property value="2.3235">fsim/tables/ps_full_ms/h6/w1/v0</property>
      <property value="2.65664">fsim/tables/ps_full_ms/h6/w1/v1</property>
      <property value="4.49871">fsim/tables/ps_full_ms/h6/w1/v10</property>
      <property value="4.45327">fsim/tables/ps_full_ms/h6/w1/v11</property>
      <property value="4.07671">fsim/tables/ps_full_ms/h6/w1/v12</property>
      <property value="3.43017">fsim/tables/ps_full_ms/h6/w1/v13</property>
      <property value="2.70319">fsim/tables/ps_full_ms/h6/w1/v14</property>
      <property value="1.89033">fsim/tables/ps_full_ms/h6/w1/v15</property>
      <property value="3.02881">fsim/tables/ps_full_ms/h6/w1/v2</property>
      <property value="3.2996">fsim/tables/ps_full_ms/h6/w1/v3</property>
      <property value="3.55852">fsim/tables/ps_full_ms/h6/w1/v4</property>
      <property value="3.83293">fsim/tables/ps_full_ms/h6/w1/v5</property>
      <property value="4.15029">fsim/tables/ps_full_ms/h6/w1/v6</property>
      <property value="4.33933">fsim/tables/ps_full_ms/h6/w1/v7</property>
      <property value="4.49094">fsim/tables/ps_full_ms/h6/w1/v8</property>
      <property value="4.53691">fsim/tables/ps_full_ms/h6/w1/v9</property>
      <property value="0.782298">fsim/tables/ps_full_ms/h6/w2/v0</property>
      <property value="0.835279">fsim/tables/ps_full_ms/h6/w2/v1</property>
      <property value="1.31211">fsim/tables/ps_full_ms/h6/w2/v10</property>
      <property value="1.35891">fsim/tables/ps_full_ms/h6/w2/v11</property>
      <property value="1.17523">fsim/tables/ps_full_ms/h6/w2/v12</property>
      <property value="0.99155">fsim/tables/ps_full_ms/h6/w2/v13</property>
      <property value="0.807871">fsim/tables/ps_full_ms/h6/w2/v14</property>
      <property value="0.624192">fsim/tables/ps_full_ms/h6/w2/v15</property>
      <property value="0.88826">fsim/tables/ps_full_ms/h6/w2/v2</property>
      <property value="0.941241">fsim/tables/ps_full_ms/h6/w2/v3</property>
      <property value="0.994222">fsim/tables/ps_full_ms/h6/w2/v4</property>
      <property value="1.0472">fsim/tables/ps_full_ms/h6/w2/v5</property>
      <property value="1.10018">fsim/tables/ps_full_ms/h6/w2/v6</property>
      <property value="1.15316">fsim/tables/ps_full_ms/h6/w2/v7</property>
      <property value="1.20615">fsim/tables/ps_full_ms/h6/w2/v8</property>
      <property value="1.25913">fsim/tables/ps_full_ms/h6/w2/v9</property>
      <property value="-6.17499">fsim/tables/ps_idle_ms/h0/w0/v0</property>
      <property value="-6.97196">fsim/tables/ps_idle_ms/h0/w0/v1</property>
      <property value="-32.8843">fsim/tables/ps_idle_ms/h0/w0/v10</property>
      <property value="-38.0289">fsim/tables/ps_idle_ms/h0/w0/v11</property>
      <property value="-43.703">fsim/tables/ps_idle_ms/h0/w0/v12</property>
      <property value="-49.9433">fsim/tables/ps_idle_ms/h0/w0/v13</property>
      <property value="-56.7512">fsim/tables/ps_idle_ms/h0/w0/v14</property>
      <property value="-63.2423">fsim/tables/ps_idle_ms/h0/w0/v15</property>
      <property value="-8.29362">fsim/tables/ps_idle_ms/h0/w0/v2</property>
      <property value="-9.99209">fsim/tables/ps_idle_ms/h0/w0/v3</property>
      <property value="-12.0251">fsim/tables/ps_idle_ms/h0/w0/v4</property>
      <property value="-14.4105">fsim/tables/ps_idle_ms/h0/w0/v5</property>
      <property value="-17.196">fsim/tables/ps_idle_ms/h0/w0/v6</property>
      <property value="-20.4337">fsim/tables/ps_idle_ms/h0/w0/v7</property>
      <property value="-24.0954">fsim/tables/ps_idle_ms/h0/w0/v8</property>
      <property value="-28.204">fsim/tables/ps_idle_ms/h0/w0/v9</property>
      <property value="-6.9204">fsim/tables/ps_idle_ms/h0/w1/v0</property>
      <property value="-7.44673">fsim/tables/ps_idle_ms/h0/w1/v1</property>
      <property value="-26.2663">fsim/tables/ps_idle_ms/h0/w1/v10</property>
      <property value="-29.9349">fsim/tables/ps_idle_ms/h0/w1/v11</property>
      <property value="-34.118">fsim/tables/ps_idle_ms/h0/w1/v12</property>
      <property value="-38.712">fsim/tables/ps_idle_ms/h0/w1/v13</property>
      <property value="-43.7018">fsim/tables/ps_idle_ms/h0/w1/v14</property>
      <property value="-49.2593">fsim/tables/ps_idle_ms/h0/w1/v15</property>
      <property value="-8.2601">fsim/tables/ps_idle_ms/h0/w1/v2</property>
      <property value="-9.49322">fsim/tables/ps_idle_ms/h0/w1/v3</property>
      <property value="-11.0163">fsim/tables/ps_idle_ms/h0/w1/v4</property>
      <property value="-12.7558">fsim/tables/ps_idle_ms/h0/w1/v5</property>
      <property value="-14.8563">fsim/tables/ps_idle_ms/h0/w1/v6</property>
      <property value="-17.1661">fsim/tables/ps_idle_ms/h0/w1/v7</property>
      <property value="-19.8563">fsim/tables/ps_idle_ms/h0/w1/v8</property>
      <property value="-22.9113">fsim/tables/ps_idle_ms/h0/w1/v9</property>
      <property value="-7.54514">fsim/tables/ps_idle_ms/h0/w2/v0</property>
      <property value="-8.07958">fsim/tables/ps_idle_ms/h0/w2/v1</property>
      <property value="-22.3976">fsim/tables/ps_idle_ms/h0/w2/v10</property>
      <property value="-25.2809">fsim/tables/ps_idle_ms/h0/w2/v11</property>
      <property value="-28.4223">fsim/tables/ps_idle_ms/h0/w2/v12</property>
      <property value="-31.8223">fsim/tables/ps_idle_ms/h0/w2/v13</property>
      <property value="-35.6356">fsim/tables/ps_idle_ms/h0/w2/v14</property>
      <property value="-39.8596">fsim/tables/ps_idle_ms/h0/w2/v15</property>
      <property value="-8.6196">fsim/tables/ps_idle_ms/h0/w2/v2</property>
      <property value="-9.47801">fsim/tables/ps_idle_ms/h0/w2/v3</property>
      <property value="-10.6504">fsim/tables/ps_idle_ms/h0/w2/v4</property>
      <property value="-12.0495">fsim/tables/ps_idle_ms/h0/w2/v5</property>
      <property value="-13.6228">fsim/tables/ps_idle_ms/h0/w2/v6</property>
      <property value="-15.4785">fsim/tables/ps_idle_ms/h0/w2/v7</property>
      <property value="-17.5302">fsim/tables/ps_idle_ms/h0/w2/v8</property>
      <property value="-19.7786">fsim/tables/ps_idle_ms/h0/w2/v9</property>
      <property value="-6.77548">fsim/tables/ps_idle_ms/h1/w0/v0</property>
      <property value="-7.3912">fsim/tables/ps_idle_ms/h1/w0/v1</property>
      <property value="-29.6722">fsim/tables/ps_idle_ms/h1/w0/v10</property>
      <property value="-34.2399">fsim/tables/ps_idle_ms/h1/w0/v11</property>
      <property value="-39.2776">fsim/tables/ps_idle_ms/h1/w0/v12</property>
      <property value="-44.7758">fsim/tables/ps_idle_ms/h1/w0/v13</property>
      <property value="-51.3522">fsim/tables/ps_idle_ms/h1/w0/v14</property>
      <property value="-59.7911">fsim/tables/ps_idle_ms/h1/w0/v15</property>
      <property value="-8.39442">fsim/tables/ps_idle_ms/h1/w0/v2</property>
      <property value="-9.82483">fsim/tables/ps_idle_ms/h1/w0/v3</property>
      <property value="-11.5957">fsim/tables/ps_idle_ms/h1/w0/v4</property>
      <property value="-13.7076">fsim/tables/ps_idle_ms/h1/w0/v5</property>
      <property value="-16.1236">fsim/tables/ps_idle_ms/h1/w0/v6</property>
      <property value="-18.9091">fsim/tables/ps_idle_ms/h1/w0/v7</property>
      <property value="-22.1048">fsim/tables/ps_idle_ms/h1/w0/v8</property>
      <property value="-25.6932">fsim/tables/ps_idle_ms/h1/w0/v9</property>
      <property value="-7.55903">fsim/tables/ps_idle_ms/h1/w1/v0</property>
      <property value="-8.12683">fsim/tables/ps_idle_ms/h1/w1/v1</property>
      <property value="-24.151">fsim/tables/ps_idle_ms/h1/w1/v10</property>
      <property value="-27.3894">fsim/tables/ps_idle_ms/h1/w1/v11</property>
      <property value="-30.9068">fsim/tables/ps_idle_ms/h1/w1/v12</property>
      <property value="-34.8317">fsim/tables/ps_idle_ms/h1/w1/v13</property>
      <property value="-39.5034">fsim/tables/ps_idle_ms/h1/w1/v14</property>
      <property value="-46.261">fsim/tables/ps_idle_ms/h1/w1/v15</property>
      <property value="-8.74748">fsim/tables/ps_idle_ms/h1/w1/v2</property>
      <property value="-9.72195">fsim/tables/ps_idle_ms/h1/w1/v3</property>
      <property value="-10.994">fsim/tables/ps_idle_ms/h1/w1/v4</property>
      <property value="-12.5726">fsim/tables/ps_idle_ms/h1/w1/v5</property>
      <property value="-14.321">fsim/tables/ps_idle_ms/h1/w1/v6</property>
      <property value="-16.4002">fsim/tables/ps_idle_ms/h1/w1/v7</property>
      <property value="-18.6535">fsim/tables/ps_idle_ms/h1/w1/v8</property>
      <property value="-21.2377">fsim/tables/ps_idle_ms/h1/w1/v9</property>
      <property value="-8.37983">fsim/tables/ps_idle_ms/h1/w2/v0</property>
      <property value="-8.85727">fsim/tables/ps_idle_ms/h1/w2/v1</property>
      <property value="-20.8907">fsim/tables/ps_idle_ms/h1/w2/v10</property>
      <property value="-23.3428">fsim/tables/ps_idle_ms/h1/w2/v11</property>
      <property value="-26.0607">fsim/tables/ps_idle_ms/h1/w2/v12</property>
      <property value="-28.9899">fsim/tables/ps_idle_ms/h1/w2/v13</property>
      <property value="-32.3586">fsim/tables/ps_idle_ms/h1/w2/v14</property>
      <property value="-37.3549">fsim/tables/ps_idle_ms/h1/w2/v15</property>
      <property value="-9.33963">fsim/tables/ps_idle_ms/h1/w2/v2</property>
      <property value="-9.98712">fsim/tables/ps_idle_ms/h1/w2/v3</property>
      <property value="-10.9417">fsim/tables/ps_idle_ms/h1/w2/v4</property>
      <property value="-12.1025">fsim/tables/ps_idle_ms/h1/w2/v5</property>
      <property value="-13.513">fsim/tables/ps_idle_ms/h1/w2/v6</property>
      <property value="-15.0369">fsim/tables/ps_idle_ms/h1/w2/v7</property>
      <property value="-16.8199">fsim/tables/ps_idle_ms/h1/w2/v8</property>
      <property value="-18.7829">fsim/tables/ps_idle_ms/h1/w2/v9</property>
      <property value="-7.47988">fsim/tables/ps_idle_ms/h2/w0/v0</property>
      <property value="-8.05116">fsim/tables/ps_idle_ms/h2/w0/v1</property>
      <property value="-26.3312">fsim/tables/ps_idle_ms/h2/w0/v10</property>
      <property value="-30.0239">fsim/tables/ps_idle_ms/h2/w0/v11</property>
      <property value="-34.155">fsim/tables/ps_idle_ms/h2/w0/v12</property>
      <property value="-39.2305">fsim/tables/ps_idle_ms/h2/w0/v13</property>
      <property value="-46.5761">fsim/tables/ps_idle_ms/h2/w0/v14</property>
      <property value="-54.8424">fsim/tables/ps_idle_ms/h2/w0/v15</property>
      <property value="-8.76409">fsim/tables/ps_idle_ms/h2/w0/v2</property>
      <property value="-9.88436">fsim/tables/ps_idle_ms/h2/w0/v3</property>
      <property value="-11.3377">fsim/tables/ps_idle_ms/h2/w0/v4</property>
      <property value="-13.0813">fsim/tables/ps_idle_ms/h2/w0/v5</property>
      <property value="-15.1254">fsim/tables/ps_idle_ms/h2/w0/v6</property>
      <property value="-17.44">fsim/tables/ps_idle_ms/h2/w0/v7</property>
      <property value="-20.0246">fsim/tables/ps_idle_ms/h2/w0/v8</property>
      <property value="-23.0131">fsim/tables/ps_idle_ms/h2/w0/v9</property>
      <property value="-8.48474">fsim/tables/ps_idle_ms/h2/w1/v0</property>
      <property value="-8.96284">fsim/tables/ps_idle_ms/h2/w1/v1</property>
      <property value="-21.8303">fsim/tables/ps_idle_ms/h2/w1/v10</property>
      <property value="-24.479">fsim/tables/ps_idle_ms/h2/w1/v11</property>
      <property value="-27.3585">fsim/tables/ps_idle_ms/h2/w1/v12</property>
      <property value="-30.898">fsim/tables/ps_idle_ms/h2/w1/v13</property>
      <property value="-35.9713">fsim/tables/ps_idle_ms/h2/w1/v14</property>
      <property value="-41.8221">fsim/tables/ps_idle_ms/h2/w1/v15</property>
      <property value="-9.4662">fsim/tables/ps_idle_ms/h2/w1/v2</property>
      <property value="-10.1488">fsim/tables/ps_idle_ms/h2/w1/v3</property>
      <property value="-11.1767">fsim/tables/ps_idle_ms/h2/w1/v4</property>
      <property value="-12.4056">fsim/tables/ps_idle_ms/h2/w1/v5</property>
      <property value="-13.9115">fsim/tables/ps_idle_ms/h2/w1/v6</property>
      <property value="-15.528">fsim/tables/ps_idle_ms/h2/w1/v7</property>
      <property value="-17.4519">fsim/tables/ps_idle_ms/h2/w1/v8</property>
      <property value="-19.5347">fsim/tables/ps_idle_ms/h2/w1/v9</property>
      <property value="-9.40196">fsim/tables/ps_idle_ms/h2/w2/v0</property>
      <property value="-9.71145">fsim/tables/ps_idle_ms/h2/w2/v1</property>
      <property value="-19.1506">fsim/tables/ps_idle_ms/h2/w2/v10</property>
      <property value="-21.0078">fsim/tables/ps_idle_ms/h2/w2/v11</property>
      <property value="-22.9828">fsim/tables/ps_idle_ms/h2/w2/v12</property>
      <property value="-25.4414">fsim/tables/ps_idle_ms/h2/w2/v13</property>
      <property value="-29.0669">fsim/tables/ps_idle_ms/h2/w2/v14</property>
      <property value="-33.1822">fsim/tables/ps_idle_ms/h2/w2/v15</property>
      <property value="-10.2224">fsim/tables/ps_idle_ms/h2/w2/v2</property>
      <property value="-10.6764">fsim/tables/ps_idle_ms/h2/w2/v3</property>
      <property value="-11.3428">fsim/tables/ps_idle_ms/h2/w2/v4</property>
      <property value="-12.238">fsim/tables/ps_idle_ms/h2/w2/v5</property>
      <property value="-13.2969">fsim/tables/ps_idle_ms/h2/w2/v6</property>
      <property value="-14.5338">fsim/tables/ps_idle_ms/h2/w2/v7</property>
      <property value="-15.9098">fsim/tables/ps_idle_ms/h2/w2/v8</property>
      <property value="-17.4033">fsim/tables/ps_idle_ms/h2/w2/v9</property>
      <property value="-8.42208">fsim/tables/ps_idle_ms/h3/w0/v0</property>
      <property value="-8.86342">fsim/tables/ps_idle_ms/h3/w0/v1</property>
      <property value="-22.6415">fsim/tables/ps_idle_ms/h3/w0/v10</property>
      <property value="-25.4583">fsim/tables/ps_idle_ms/h3/w0/v11</property>
      <property value="-28.6073">fsim/tables/ps_idle_ms/h3/w0/v12</property>
      <property value="-33.4298">fsim/tables/ps_idle_ms/h3/w0/v13</property>
      <property value="-39.1591">fsim/tables/ps_idle_ms/h3/w0/v14</property>
      <property value="-45.7126">fsim/tables/ps_idle_ms/h3/w0/v15</property>
      <property value="-9.38803">fsim/tables/ps_idle_ms/h3/w0/v2</property>
      <property value="-10.1142">fsim/tables/ps_idle_ms/h3/w0/v3</property>
      <property value="-11.2002">fsim/tables/ps_idle_ms/h3/w0/v4</property>
      <property value="-12.5174">fsim/tables/ps_idle_ms/h3/w0/v5</property>
      <property value="-14.1064">fsim/tables/ps_idle_ms/h3/w0/v6</property>
      <property value="-15.8553">fsim/tables/ps_idle_ms/h3/w0/v7</property>
      <property value="-17.9006">fsim/tables/ps_idle_ms/h3/w0/v8</property>
      <property value="-20.1191">fsim/tables/ps_idle_ms/h3/w0/v9</property>
      <property value="-9.57">fsim/tables/ps_idle_ms/h3/w1/v0</property>
      <property value="-9.8356">fsim/tables/ps_idle_ms/h3/w1/v1</property>
      <property value="-19.5197">fsim/tables/ps_idle_ms/h3/w1/v10</property>
      <property value="-21.4312">fsim/tables/ps_idle_ms/h3/w1/v11</property>
      <property value="-23.715">fsim/tables/ps_idle_ms/h3/w1/v12</property>
      <property value="-27.2016">fsim/tables/ps_idle_ms/h3/w1/v13</property>
      <property value="-31.143">fsim/tables/ps_idle_ms/h3/w1/v14</property>
      <property value="-35.5517">fsim/tables/ps_idle_ms/h3/w1/v15</property>
      <property value="-10.3529">fsim/tables/ps_idle_ms/h3/w1/v2</property>
      <property value="-10.8237">fsim/tables/ps_idle_ms/h3/w1/v3</property>
      <property value="-11.4787">fsim/tables/ps_idle_ms/h3/w1/v4</property>
      <property value="-12.3863">fsim/tables/ps_idle_ms/h3/w1/v5</property>
      <property value="-13.4694">fsim/tables/ps_idle_ms/h3/w1/v6</property>
      <property value="-14.7482">fsim/tables/ps_idle_ms/h3/w1/v7</property>
      <property value="-16.1583">fsim/tables/ps_idle_ms/h3/w1/v8</property>
      <property value="-17.7245">fsim/tables/ps_idle_ms/h3/w1/v9</property>
      <property value="-10.6096">fsim/tables/ps_idle_ms/h3/w2/v0</property>
      <property value="-10.8187">fsim/tables/ps_idle_ms/h3/w2/v1</property>
      <property value="-17.495">fsim/tables/ps_idle_ms/h3/w2/v10</property>
      <property value="-18.7873">fsim/tables/ps_idle_ms/h3/w2/v11</property>
      <property value="-20.4543">fsim/tables/ps_idle_ms/h3/w2/v12</property>
      <property value="-22.834">fsim/tables/ps_idle_ms/h3/w2/v13</property>
      <property value="-25.4554">fsim/tables/ps_idle_ms/h3/w2/v14</property>
      <property value="-28.3772">fsim/tables/ps_idle_ms/h3/w2/v15</property>
      <property value="-11.2008">fsim/tables/ps_idle_ms/h3/w2/v2</property>
      <property value="-11.6162">fsim/tables/ps_idle_ms/h3/w2/v3</property>
      <property value="-12.0008">fsim/tables/ps_idle_ms/h3/w2/v4</property>
      <property value="-12.5574">fsim/tables/ps_idle_ms/h3/w2/v5</property>
      <property value="-13.2597">fsim/tables/ps_idle_ms/h3/w2/v6</property>
      <property value="-14.1756">fsim/tables/ps_idle_ms/h3/w2/v7</property>
      <property value="-15.123">fsim/tables/ps_idle_ms/h3/w2/v8</property>
      <property value="-16.2797">fsim/tables/ps_idle_ms/h3/w2/v9</property>
      <property value="-9.24076">fsim/tables/ps_idle_ms/h4/w0/v0</property>
      <property value="-9.54619">fsim/tables/ps_idle_ms/h4/w0/v1</property>
      <property value="-19.8681">fsim/tables/ps_idle_ms/h4/w0/v10</property>
      <property value="-21.8888">fsim/tables/ps_idle_ms/h4/w0/v11</property>
      <property value="-24.4956">fsim/tables/ps_idle_ms/h4/w0/v12</property>
      <property value="-28.2438">fsim/tables/ps_idle_ms/h4/w0/v13</property>
      <property value="-32.4794">fsim/tables/ps_idle_ms/h4/w0/v14</property>
      <property value="-37.1891">fsim/tables/ps_idle_ms/h4/w0/v15</property>
      <property value="-10.0267">fsim/tables/ps_idle_ms/h4/w0/v2</property>
      <property value="-10.5431">fsim/tables/ps_idle_ms/h4/w0/v3</property>
      <property value="-11.2349">fsim/tables/ps_idle_ms/h4/w0/v4</property>
      <property value="-12.2356">fsim/tables/ps_idle_ms/h4/w0/v5</property>
      <property value="-13.3763">fsim/tables/ps_idle_ms/h4/w0/v6</property>
      <property value="-14.7683">fsim/tables/ps_idle_ms/h4/w0/v7</property>
      <property value="-16.2384">fsim/tables/ps_idle_ms/h4/w0/v8</property>
      <property value="-17.974">fsim/tables/ps_idle_ms/h4/w0/v9</property>
      <property value="-10.513">fsim/tables/ps_idle_ms/h4/w1/v0</property>
      <property value="-10.7053">fsim/tables/ps_idle_ms/h4/w1/v1</property>
      <property value="-17.5221">fsim/tables/ps_idle_ms/h4/w1/v10</property>
      <property value="-18.8732">fsim/tables/ps_idle_ms/h4/w1/v11</property>
      <property value="-20.8653">fsim/tables/ps_idle_ms/h4/w1/v12</property>
      <property value="-23.3417">fsim/tables/ps_idle_ms/h4/w1/v13</property>
      <property value="-26.0789">fsim/tables/ps_idle_ms/h4/w1/v14</property>
      <property value="-29.1521">fsim/tables/ps_idle_ms/h4/w1/v15</property>
      <property value="-11.099">fsim/tables/ps_idle_ms/h4/w1/v2</property>
      <property value="-11.5035">fsim/tables/ps_idle_ms/h4/w1/v3</property>
      <property value="-11.9048">fsim/tables/ps_idle_ms/h4/w1/v4</property>
      <property value="-12.4641">fsim/tables/ps_idle_ms/h4/w1/v5</property>
      <property value="-13.1921">fsim/tables/ps_idle_ms/h4/w1/v6</property>
      <property value="-14.1193">fsim/tables/ps_idle_ms/h4/w1/v7</property>
      <property value="-15.1038">fsim/tables/ps_idle_ms/h4/w1/v8</property>
      <property value="-16.2902">fsim/tables/ps_idle_ms/h4/w1/v9</property>
      <property value="-11.6524">fsim/tables/ps_idle_ms/h4/w2/v0</property>
      <property value="-11.7889">fsim/tables/ps_idle_ms/h4/w2/v1</property>
      <property value="-15.945">fsim/tables/ps_idle_ms/h4/w2/v10</property>
      <property value="-16.8121">fsim/tables/ps_idle_ms/h4/w2/v11</property>
      <property value="-17.9841">fsim/tables/ps_idle_ms/h4/w2/v12</property>
      <property value="-19.5064">fsim/tables/ps_idle_ms/h4/w2/v13</property>
      <property value="-21.1674">fsim/tables/ps_idle_ms/h4/w2/v14</property>
      <property value="-23.075">fsim/tables/ps_idle_ms/h4/w2/v15</property>
      <property value="-11.9843">fsim/tables/ps_idle_ms/h4/w2/v2</property>
      <property value="-12.3666">fsim/tables/ps_idle_ms/h4/w2/v3</property>
      <property value="-12.6558">fsim/tables/ps_idle_ms/h4/w2/v4</property>
      <property value="-12.9607">fsim/tables/ps_idle_ms/h4/w2/v5</property>
      <property value="-13.3563">fsim/tables/ps_idle_ms/h4/w2/v6</property>
      <property value="-13.8389">fsim/tables/ps_idle_ms/h4/w2/v7</property>
      <property value="-14.4504">fsim/tables/ps_idle_ms/h4/w2/v8</property>
      <property value="-15.194">fsim/tables/ps_idle_ms/h4/w2/v9</property>
      <property value="-9.85182">fsim/tables/ps_idle_ms/h5/w0/v0</property>
      <property value="-10.1049">fsim/tables/ps_idle_ms/h5/w0/v1</property>
      <property value="-18.2258">fsim/tables/ps_idle_ms/h5/w0/v10</property>
      <property value="-19.8978">fsim/tables/ps_idle_ms/h5/w0/v11</property>
      <property value="-22.1131">fsim/tables/ps_idle_ms/h5/w0/v12</property>
      <property value="-25.0294">fsim/tables/ps_idle_ms/h5/w0/v13</property>
      <property value="-28.4227">fsim/tables/ps_idle_ms/h5/w0/v14</property>
      <property value="-32.168">fsim/tables/ps_idle_ms/h5/w0/v15</property>
      <property value="-10.5215">fsim/tables/ps_idle_ms/h5/w0/v2</property>
      <property value="-10.9509">fsim/tables/ps_idle_ms/h5/w0/v3</property>
      <property value="-11.488">fsim/tables/ps_idle_ms/h5/w0/v4</property>
      <property value="-12.119">fsim/tables/ps_idle_ms/h5/w0/v5</property>
      <property value="-13.0914">fsim/tables/ps_idle_ms/h5/w0/v6</property>
      <property value="-14.129">fsim/tables/ps_idle_ms/h5/w0/v7</property>
      <property value="-15.3937">fsim/tables/ps_idle_ms/h5/w0/v8</property>
      <property value="-16.7255">fsim/tables/ps_idle_ms/h5/w0/v9</property>
      <property value="-11.2055">fsim/tables/ps_idle_ms/h5/w1/v0</property>
      <property value="-11.3763">fsim/tables/ps_idle_ms/h5/w1/v1</property>
      <property value="-16.2559">fsim/tables/ps_idle_ms/h5/w1/v10</property>
      <property value="-17.295">fsim/tables/ps_idle_ms/h5/w1/v11</property>
      <property value="-18.7367">fsim/tables/ps_idle_ms/h5/w1/v12</property>
      <property value="-20.5313">fsim/tables/ps_idle_ms/h5/w1/v13</property>
      <property value="-22.607">fsim/tables/ps_idle_ms/h5/w1/v14</property>
      <property value="-24.8508">fsim/tables/ps_idle_ms/h5/w1/v15</property>
      <property value="-11.5896">fsim/tables/ps_idle_ms/h5/w1/v2</property>
      <property value="-11.9928">fsim/tables/ps_idle_ms/h5/w1/v3</property>
      <property value="-12.3092">fsim/tables/ps_idle_ms/h5/w1/v4</property>
      <property value="-12.6628">fsim/tables/ps_idle_ms/h5/w1/v5</property>
      <property value="-13.1515">fsim/tables/ps_idle_ms/h5/w1/v6</property>
      <property value="-13.7255">fsim/tables/ps_idle_ms/h5/w1/v7</property>
      <property value="-14.5182">fsim/tables/ps_idle_ms/h5/w1/v8</property>
      <property value="-15.3282">fsim/tables/ps_idle_ms/h5/w1/v9</property>
      <property value="-12.4037">fsim/tables/ps_idle_ms/h5/w2/v0</property>
      <property value="-12.4883">fsim/tables/ps_idle_ms/h5/w2/v1</property>
      <property value="-14.9808">fsim/tables/ps_idle_ms/h5/w2/v10</property>
      <property value="-15.555">fsim/tables/ps_idle_ms/h5/w2/v11</property>
      <property value="-16.1819">fsim/tables/ps_idle_ms/h5/w2/v12</property>
      <property value="-17.0977">fsim/tables/ps_idle_ms/h5/w2/v13</property>
      <property value="-18.1751">fsim/tables/ps_idle_ms/h5/w2/v14</property>
      <property value="-19.3752">fsim/tables/ps_idle_ms/h5/w2/v15</property>
      <property value="-12.6194">fsim/tables/ps_idle_ms/h5/w2/v2</property>
      <property value="-12.804">fsim/tables/ps_idle_ms/h5/w2/v3</property>
      <property value="-13.1226">fsim/tables/ps_idle_ms/h5/w2/v4</property>
      <property value="-13.3452">fsim/tables/ps_idle_ms/h5/w2/v5</property>
      <property value="-13.584">fsim/tables/ps_idle_ms/h5/w2/v6</property>
      <property value="-13.8197">fsim/tables/ps_idle_ms/h5/w2/v7</property>
      <property value="-14.1611">fsim/tables/ps_idle_ms/h5/w2/v8</property>
      <property value="-14.5398">fsim/tables/ps_idle_ms/h5/w2/v9</property>
      <property value="-10.5185">fsim/tables/ps_idle_ms/h6/w0/v0</property>
      <property value="-10.7407">fsim/tables/ps_idle_ms/h6/w0/v1</property>
      <property value="-16.953">fsim/tables/ps_idle_ms/h6/w0/v10</property>
      <property value="-18.1804">fsim/tables/ps_idle_ms/h6/w0/v11</property>
      <property value="-20.1363">fsim/tables/ps_idle_ms/h6/w0/v12</property>
      <property value="-22.4635">fsim/tables/ps_idle_ms/h6/w0/v13</property>
      <property value="-25.0461">fsim/tables/ps_idle_ms/h6/w0/v14</property>
      <property value="-27.8647">fsim/tables/ps_idle_ms/h6/w0/v15</property>
      <property value="-11.0485">fsim/tables/ps_idle_ms/h6/w0/v2</property>
      <property value="-11.4161">fsim/tables/ps_idle_ms/h6/w0/v3</property>
      <property value="-11.7975">fsim/tables/ps_idle_ms/h6/w0/v4</property>
      <property value="-12.3282">fsim/tables/ps_idle_ms/h6/w0/v5</property>
      <property value="-12.9019">fsim/tables/ps_idle_ms/h6/w0/v6</property>
      <property value="-13.7765">fsim/tables/ps_idle_ms/h6/w0/v7</property>
      <property value="-14.6885">fsim/tables/ps_idle_ms/h6/w0/v8</property>
      <property value="-15.7837">fsim/tables/ps_idle_ms/h6/w0/v9</property>
      <property value="-11.9572">fsim/tables/ps_idle_ms/h6/w1/v0</property>
      <property value="-12.0827">fsim/tables/ps_idle_ms/h6/w1/v1</property>
      <property value="-15.2973">fsim/tables/ps_idle_ms/h6/w1/v10</property>
      <property value="-15.9669">fsim/tables/ps_idle_ms/h6/w1/v11</property>
      <property value="-16.9479">fsim/tables/ps_idle_ms/h6/w1/v12</property>
      <property value="-18.2357">fsim/tables/ps_idle_ms/h6/w1/v13</property>
      <property value="-19.6412">fsim/tables/ps_idle_ms/h6/w1/v14</property>
      <property value="-21.1335">fsim/tables/ps_idle_ms/h6/w1/v15</property>
      <property value="-12.1964">fsim/tables/ps_idle_ms/h6/w1/v2</property>
      <property value="-12.4741">fsim/tables/ps_idle_ms/h6/w1/v3</property>
      <property value="-12.7739">fsim/tables/ps_idle_ms/h6/w1/v4</property>
      <property value="-13.0477">fsim/tables/ps_idle_ms/h6/w1/v5</property>
      <property value="-13.3144">fsim/tables/ps_idle_ms/h6/w1/v6</property>
      <property value="-13.6989">fsim/tables/ps_idle_ms/h6/w1/v7</property>
      <property value="-14.098">fsim/tables/ps_idle_ms/h6/w1/v8</property>
      <property value="-14.6371">fsim/tables/ps_idle_ms/h6/w1/v9</property>
      <property value="-14.0164">fsim/tables/ps_idle_ms/h6/w2/v0</property>
      <property value="-14.0906">fsim/tables/ps_idle_ms/h6/w2/v1</property>
      <property value="-15.1428">fsim/tables/ps_idle_ms/h6/w2/v10</property>
      <property value="-15.3317">fsim/tables/ps_idle_ms/h6/w2/v11</property>
      <property value="-15.6007">fsim/tables/ps_idle_ms/h6/w2/v12</property>
      <property value="-15.9187">fsim/tables/ps_idle_ms/h6/w2/v13</property>
      <property value="-16.2759">fsim/tables/ps_idle_ms/h6/w2/v14</property>
      <property value="-16.6589">fsim/tables/ps_idle_ms/h6/w2/v15</property>
      <property value="-14.1903">fsim/tables/ps_idle_ms/h6/w2/v2</property>
      <property value="-14.2894">fsim/tables/ps_idle_ms/h6/w2/v3</property>
      <property value="-14.3831">fsim/tables/ps_idle_ms/h6/w2/v4</property>
      <property value="-14.4734">fsim/tables/ps_idle_ms/h6/w2/v5</property>
      <property value="-14.5688">fsim/tables/ps_idle_ms/h6/w2/v6</property>
      <property value="-14.6938">fsim/tables/ps_idle_ms/h6/w2/v7</property>
      <property value="-14.8408">fsim/tables/ps_idle_ms/h6/w2/v8</property>
      <property value="-14.9893">fsim/tables/ps_idle_ms/h6/w2/v9</property>
      <property value="244.596">fsim/tables/reach_tas_ms/h0/w0</property>
      <property value="244.018">fsim/tables/reach_tas_ms/h0/w1</property>
      <property value="243.34">fsim/tables/reach_tas_ms/h0/w2</property>
      <property value="250.611">fsim/tables/reach_tas_ms/h1/w0</property>
      <property value="249.84">fsim/tables/reach_tas_ms/h1/w1</property>
      <property value="249.03">fsim/tables/reach_tas_ms/h1/w2</property>
      <property value="254.967">fsim/tables/reach_tas_ms/h2/w0</property>
      <property value="253.965">fsim/tables/reach_tas_ms/h2/w1</property>
      <property value="251.306">fsim/tables/reach_tas_ms/h2/w2</property>
      <property value="254.754">fsim/tables/reach_tas_ms/h3/w0</property>
      <property value="254.292">fsim/tables/reach_tas_ms/h3/w1</property>
      <property value="251.119">fsim/tables/reach_tas_ms/h3/w2</property>
      <property value="250.453">fsim/tables/reach_tas_ms/h4/w0</property>
      <property value="249.322">fsim/tables/reach_tas_ms/h4/w1</property>
      <property value="243.611">fsim/tables/reach_tas_ms/h4/w2</property>
      <property value="246.669">fsim/tables/reach_tas_ms/h5/w0</property>
      <property value="243.284">fsim/tables/reach_tas_ms/h5/w1</property>
      <property value="234.429">fsim/tables/reach_tas_ms/h5/w2</property>
      <property value="242.812">fsim/tables/reach_tas_ms/h6/w0</property>
      <property value="236.296">fsim/tables/reach_tas_ms/h6/w1</property>
      <property value="0.0">fsim/tables/speed_fraction/v0</property>
      <property value="0.0666667">fsim/tables/speed_fraction/v1</property>
      <property value="0.666667">fsim/tables/speed_fraction/v10</property>
      <property value="0.733333">fsim/tables/speed_fraction/v11</property>
      <property value="0.8">fsim/tables/speed_fraction/v12</property>
      <property value="0.866667">fsim/tables/speed_fraction/v13</property>
      <property value="0.933333">fsim/tables/speed_fraction/v14</property>
      <property value="1">fsim/tables/speed_fraction/v15</property>
      <property value="0.133333">fsim/tables/speed_fraction/v2</property>
      <property value="0.2">fsim/tables/speed_fraction/v3</property>
      <property value="0.266667">fsim/tables/speed_fraction/v4</property>
      <property value="0.333333">fsim/tables/speed_fraction/v5</property>
      <property value="0.4">fsim/tables/speed_fraction/v6</property>
      <property value="0.466667">fsim/tables/speed_fraction/v7</property>
      <property value="0.533333">fsim/tables/speed_fraction/v8</property>
      <property value="0.6">fsim/tables/speed_fraction/v9</property>
      <property value="63.2499">fsim/tables/stall_cas_ms/h0/w0</property>
      <property value="72.4051">fsim/tables/stall_cas_ms/h0/w1</property>
      <property value="80.5261">fsim/tables/stall_cas_ms/h0/w2</property>
      <property value="62.7816">fsim/tables/stall_cas_ms/h1/w0</property>
      <property value="71.869">fsim/tables/stall_cas_ms/h1/w1</property>
      <property value="79.9298">fsim/tables/stall_cas_ms/h1/w2</property>
      <property value="62.8729">fsim/tables/stall_cas_ms/h2/w0</property>
      <property value="71.9735">fsim/tables/stall_cas_ms/h2/w1</property>
      <property value="80.0461">fsim/tables/stall_cas_ms/h2/w2</property>
      <property value="63.1354">fsim/tables/stall_cas_ms/h3/w0</property>
      <property value="72.2741">fsim/tables/stall_cas_ms/h3/w1</property>
      <property value="80.3803">fsim/tables/stall_cas_ms/h3/w2</property>
      <property value="63.2437">fsim/tables/stall_cas_ms/h4/w0</property>
      <property value="72.398">fsim/tables/stall_cas_ms/h4/w1</property>
      <property value="80.5182">fsim/tables/stall_cas_ms/h4/w2</property>
      <property value="63.4459">fsim/tables/stall_cas_ms/h5/w0</property>
      <property value="72.6295">fsim/tables/stall_cas_ms/h5/w1</property>
      <property value="80.7757">fsim/tables/stall_cas_ms/h5/w2</property>
      <property value="63.5007">fsim/tables/stall_cas_ms/h6/w0</property>
      <property value="72.6922">fsim/tables/stall_cas_ms/h6/w1</property>
      <property value="80.8454">fsim/tables/stall_cas_ms/h6/w2</property>
      <property value="92480">fsim/tables/weight_kg/w0</property>
      <property value="121190">fsim/tables/weight_kg/w1</property>
      <property value="149900">fsim/tables/weight_kg/w2</property>
      <channel name="Pitch">
        <summer name="fcs/pitch-trim-sum">
          <input>fcs/elevator-cmd-norm</input>
          <input>fcs/pitch-trim-cmd-norm</input>
          <clipto> <min>-1</min> <max>1</max> </clipto>
        </summer>
        <aerosurface_scale name="fcs/elevator-control">
          <input>fcs/pitch-trim-sum</input>
          <range> <min>-25.00</min> <max>15.00</max> </range>
          <gain>0.0174533</gain>
        </aerosurface_scale>
        <actuator name="fcs/elevator-actuator">
          <input>fcs/elevator-control</input>
          <rate_limit>2.0</rate_limit>
          <output>fcs/elevator-pos-rad</output>
        </actuator>
      </channel>
      <channel name="Roll">
        <summer name="fcs/roll-trim-sum">
          <input>fcs/aileron-cmd-norm</input>
          <input>fcs/roll-trim-cmd-norm</input>
          <clipto> <min>-1</min> <max>1</max> </clipto>
        </summer>
        <aerosurface_scale name="fcs/left-aileron-control">
          <input>fcs/roll-trim-sum</input>
          <range> <min>-20.00</min> <max>20.00</max> </range>
          <gain>0.0174533</gain>
        </aerosurface_scale>
        <actuator name="fcs/left-aileron-actuator">
          <input>fcs/left-aileron-control</input>
          <rate_limit>2.0</rate_limit>
          <output>fcs/left-aileron-pos-rad</output>
        </actuator>
        <pure_gain name="fcs/right-aileron">
          <input>fcs/left-aileron-pos-rad</input>
          <gain>-1</gain>
          <output>fcs/right-aileron-pos-rad</output>
        </pure_gain>
      </channel>
      <channel name="Yaw">
        <summer name="fcs/yaw-trim-sum">
          <input>fcs/rudder-cmd-norm</input>
          <input>fcs/yaw-trim-cmd-norm</input>
          <clipto> <min>-1</min> <max>1</max> </clipto>
        </summer>
        <aerosurface_scale name="fcs/rudder-control">
          <input>fcs/yaw-trim-sum</input>
          <range> <min>-25.00</min> <max>25.00</max> </range>
          <gain>0.0174533</gain>
        </aerosurface_scale>
        <!-- the yaw damper (hangar/fcs.py yaw_damper): the yaw rate, washed out so a
             steady turn's is left alone, against itself through the rudder - the
             dutch roll damped to 0.30 at 1 g across the speed range -->
        <washout_filter name="fcs/yaw-damper-washout">
          <input>velocities/r-rad_sec</input>
          <c1>0.500</c1>
        </washout_filter>
        <fcs_function name="fcs/yaw-damper">
          <function>
            <product>
              <value>-1</value>
              <table>
                <independentVar lookup="row">aero/qbar-psf</independentVar>
                <tableData>
                  10.0   -3.00000
                  20.0   -3.00000
                  40.0   -3.00000
                  80.0   -3.00000
                 150.0   -2.25000
                 300.0   -0.90000
                 600.0   -0.18117
                1200.0   -0.11504
                2400.0   -0.12431
                </tableData>
              </table>
              <property>fcs/yaw-damper-washout</property>
            </product>
          </function>
          <clipto> <min>-0.21817</min> <max>0.21817</max> </clipto>
        </fcs_function>
        <summer name="fcs/rudder-sum">
          <input>fcs/rudder-control</input>
          <input>fcs/yaw-damper</input>
          <clipto> <min>-0.43633</min> <max>0.43633</max> </clipto>
        </summer>
        <actuator name="fcs/rudder-actuator">
          <input>fcs/rudder-sum</input>
          <rate_limit>2.0</rate_limit>
          <output>fcs/rudder-pos-rad</output>
        </actuator>
        <!-- the nose or tail wheel steers with the rudder pedals (JSBSim steers from
             fcs/steer-cmd-norm, positive right; the rudder command is positive left) -->
        <pure_gain name="fcs/steer-from-rudder">
          <input>fcs/yaw-trim-sum</input>
          <gain>-1</gain>
          <output>fcs/steer-cmd-norm</output>
        </pure_gain>
      </channel>
      <channel name="Flaps">
        <kinematic name="fcs/flaps-control">
          <input>fcs/flap-cmd-norm</input>
          <traverse>
            <setting> <position>0.0</position> <time>0.0</time> </setting>
            <setting> <position>12.5</position> <time>2.0</time> </setting>
            <setting> <position>25.0</position> <time>2.0</time> </setting>
            <setting> <position>37.5</position> <time>2.0</time> </setting>
            <setting> <position>50.0</position> <time>2.0</time> </setting>
          </traverse>
          <output>fcs/flap-pos-deg</output>
        </kinematic>
        <pure_gain name="fcs/flaps-normalized">
          <input>fcs/flap-pos-deg</input>
          <gain>0.02</gain>
          <output>fcs/flap-pos-norm</output>
        </pure_gain>
      </channel>
      <channel name="Speedbrake">
        <kinematic name="fcs/speedbrake-control">
          <input>fcs/speedbrake-cmd-norm</input>
          <traverse>
            <setting> <position>0</position> <time>0</time> </setting>
            <setting> <position>1</position> <time>2.00</time> </setting>
          </traverse>
          <output>fcs/speedbrake-pos-norm</output>
        </kinematic>
      </channel>
      <channel name="Landing Gear">
        <kinematic name="fcs/gear-control">
          <input>gear/gear-cmd-norm</input>
          <traverse>
            <setting> <position>0</position> <time>0</time> </setting>
            <setting> <position>1</position> <time>5</time> </setting>
          </traverse>
          <output>gear/gear-pos-norm</output>
        </kinematic>
      </channel>
    </flight_control>
    <aerodynamics>
        <function name="aero/function/mach-lift">
          <description>lift, and damping, over its low-speed value (hangar: aero/mach.py)</description>
          <table>
            <independentVar lookup="row">velocities/mach</independentVar>
            <tableData>
                 0.000     1.000000
                 0.300     1.022419
                 0.500     1.067313
                 0.600     1.102799
                 0.700     1.151026
                 0.800     1.218038
                 0.850     1.262009
                 0.900     1.316391
                 0.950     1.328042
                 1.000     1.326000
                 1.050     1.314950
                 1.100     1.299575
                 1.200     1.274580
            </tableData>
          </table>
        </function>
        <function name="aero/function/mach-side">
          <description>side force, rolling and yawing moment over their low-speed values</description>
          <table>
            <independentVar lookup="row">velocities/mach</independentVar>
            <tableData>
                 0.000     1.000000
                 0.300     1.013365
                 0.500     1.040062
                 0.600     1.061217
                 0.700     1.090256
                 0.800     1.131664
                 0.850     1.159818
                 0.900     1.195908
                 0.950     1.179891
                 1.000     1.143919
                 1.050     1.094642
                 1.100     1.038714
                 1.200     0.933509
            </tableData>
          </table>
        </function>
        <function name="aero/function/mach-dCm-dCL">
          <description>pitching moment per unit low-speed lift: the neutral point's move</description>
          <table>
            <independentVar lookup="row">velocities/mach</independentVar>
            <tableData>
                 0.000     0.000000
                 0.300    -0.007437
                 0.500    -0.021506
                 0.600    -0.031642
                 0.700    -0.043582
                 0.800    -0.055487
                 0.850    -0.059536
                 0.900    -0.059881
                 0.950    -0.072859
                 1.000    -0.091520
                 1.050    -0.113582
                 1.100    -0.136866
                 1.200    -0.180576
            </tableData>
          </table>
        </function>
        <function name="aero/function/mach-dCD0">
          <description>zero-lift drag's change: friction and wave drag</description>
          <table>
            <independentVar lookup="row">velocities/mach</independentVar>
            <tableData>
                 0.000     0.000000
                 0.300    -0.000113
                 0.500    -0.000307
                 0.600    -0.000437
                 0.700    -0.000392
                 0.800     0.004446
                 0.850     0.013598
                 0.900     0.034906
                 0.950     0.074410
                 1.000     0.106615
                 1.050     0.100983
                 1.100     0.075381
                 1.200     0.038077
            </tableData>
          </table>
        </function>
        <function name="aero/function/mach-dK">
          <description>induced-drag factor's change (per CL^2)</description>
          <table>
            <independentVar lookup="row">velocities/mach</independentVar>
            <tableData>
                 0.000     0.000000
                 0.300     0.002410
                 0.500     0.006787
                 0.600     0.009875
                 0.700     0.013623
                 0.800     0.018110
                 0.850     0.020674
                 0.900     0.023497
                 0.950     0.024057
                 1.000     0.023960
                 1.050     0.032529
                 1.100     0.054598
                 1.200     0.110639
            </tableData>
          </table>
        </function>
        <function name="aero/function/mach-aileron">
          <description>aileron power over its low-speed value</description>
          <table>
            <independentVar lookup="row">velocities/mach</independentVar>
            <tableData>
                 0.000     1.000000
                 0.300     1.022781
                 0.500     1.068532
                 0.600     1.104878
                 0.700     1.154653
                 0.800     1.224819
                 0.850     1.271633
                 0.900     1.330395
                 0.950     1.263816
                 1.000     1.149235
                 1.050     1.002653
                 1.100     0.840069
                 1.200     0.530903
            </tableData>
          </table>
        </function>
        <function name="aero/function/mach-elevator">
          <description>elevator power over its low-speed value</description>
          <table>
            <independentVar lookup="row">velocities/mach</independentVar>
            <tableData>
                 0.000     1.000000
                 0.300     1.022796
                 0.500     1.069255
                 0.600     1.106969
                 0.700     1.160126
                 0.800     1.239153
                 0.850     1.295693
                 0.900     1.373235
                 0.950     1.313134
                 1.000     1.200319
                 1.050     1.052362
                 1.100     0.886832
                 1.200     0.573345
            </tableData>
          </table>
        </function>
        <function name="aero/function/mach-flap">
          <description>flap power over its low-speed value</description>
          <table>
            <independentVar lookup="row">velocities/mach</independentVar>
            <tableData>
                 0.000     1.000000
                 0.300     1.029541
                 0.500     1.090360
                 0.600     1.140203
                 0.700     1.210875
                 0.800     1.315854
                 0.850     1.389930
                 0.900     1.488302
                 0.950     1.429313
                 1.000     1.310059
                 1.050     1.150627
                 1.100     0.971107
                 1.200     0.632155
            </tableData>
          </table>
        </function>
        <function name="aero/function/mach-rudder">
          <description>rudder power over its low-speed value</description>
          <table>
            <independentVar lookup="row">velocities/mach</independentVar>
            <tableData>
                 0.000     1.000000
                 0.300     1.022393
                 0.500     1.068408
                 0.600     1.106153
                 0.700     1.159975
                 0.800     1.241400
                 0.850     1.300736
                 0.900     1.383619
                 0.950     1.315216
                 1.000     1.188873
                 1.050     1.023904
                 1.100     0.839622
                 1.200     0.490370
            </tableData>
          </table>
        </function>
        <function name="aero/function/CL-base">
          <description>CL over alpha and beta at low speed</description>
          <table>
            <independentVar lookup="row">aero/alpha-deg</independentVar>
            <independentVar lookup="column">aero/beta-deg</independentVar>
            <tableData>
                        -90.00    -70.00    -50.00    -40.00    -30.00    -25.00    -20.00    -15.00    -10.00     -6.00     -3.00      0.00      3.00      6.00     10.00     15.00     20.00     25.00     30.00     40.00     50.00     70.00     90.00
             -180.00  -0.00000   0.00189  -0.01001   0.01816   0.04188   0.04912   0.05454   0.05850   0.06124   0.06263   0.06321   0.06340   0.06321   0.06263   0.06124   0.05850   0.05454   0.04912   0.04188   0.01816  -0.01001   0.00189  -0.00000
             -120.00  -0.00000   0.14073   0.37206   0.49798   0.61314   0.66280   0.70534   0.73966   0.76484   0.77892   0.78500   0.78562   0.78500   0.77892   0.76484   0.73966   0.70534   0.66280   0.61314   0.49798   0.37206   0.14073  -0.00000
              -70.00  -0.00000  -0.12056  -0.33436  -0.45303  -0.56248  -0.60990  -0.65065  -0.68358  -0.70785  -0.72082  -0.72265  -0.72161  -0.72265  -0.72082  -0.70785  -0.68358  -0.65065  -0.60990  -0.56248  -0.45303  -0.33436  -0.12056  -0.00000
              -46.00  -0.00000  -0.20919  -0.57756  -0.78010  -0.95793  -1.03186  -1.09582  -1.14325  -1.16958  -1.18187  -1.18712  -1.18841  -1.18712  -1.18187  -1.16958  -1.14325  -1.09582  -1.03186  -0.95793  -0.78010  -0.57756  -0.20919  -0.00000
              -32.00  -0.00000  -0.22885  -0.61219  -0.81949  -1.03821  -1.12466  -1.19227  -1.23129  -1.25611  -1.26892  -1.27427  -1.27593  -1.27427  -1.26892  -1.25611  -1.23129  -1.19227  -1.12466  -1.03821  -0.81949  -0.61219  -0.22885  -0.00000
              -22.00  -0.00000  -0.14944  -0.63550  -0.83341  -1.05654  -1.15994  -1.32021  -1.40655  -1.46014  -1.48724  -1.49866  -1.50246  -1.49866  -1.48724  -1.46014  -1.40655  -1.32021  -1.15994  -1.05654  -0.83341  -0.63550  -0.14944  -0.00000
              -17.00  -0.00000  -0.10082  -0.51482  -0.77038  -0.90763  -1.00004  -1.10054  -1.16933  -1.21944  -1.24530  -1.25622  -1.25986  -1.25622  -1.24530  -1.21944  -1.16933  -1.10054  -1.00004  -0.90763  -0.77038  -0.51482  -0.10082  -0.00000
              -13.00  -0.00000  -0.05847  -0.45965  -0.60253  -0.68151  -0.75294  -0.82454  -0.87546  -0.91202  -0.93062  -0.93840  -0.94098  -0.93840  -0.93062  -0.91202  -0.87546  -0.82454  -0.75294  -0.68151  -0.60253  -0.45965  -0.05847  -0.00000
               -9.00  -0.00000  -0.01405  -0.35384  -0.38589  -0.43265  -0.48003  -0.52663  -0.56129  -0.58584  -0.59807  -0.60306  -0.60469  -0.60306  -0.59807  -0.58584  -0.56129  -0.52663  -0.48003  -0.43265  -0.38589  -0.35384  -0.01405  -0.00000
               -5.00  -0.00000   0.00726  -0.16357  -0.15118  -0.17810  -0.20026  -0.22503  -0.24410  -0.25733  -0.26362  -0.26599  -0.26669  -0.26599  -0.26362  -0.25733  -0.24410  -0.22503  -0.20026  -0.17810  -0.15118  -0.16357   0.00726  -0.00000
               -1.00  -0.00000  -0.00172   0.04488   0.07362   0.08506   0.08581   0.07900   0.07369   0.07001   0.06831   0.06776   0.06771   0.06776   0.06831   0.07001   0.07369   0.07900   0.08581   0.08506   0.07362   0.04488  -0.00172  -0.00000
                3.00   0.00000  -0.00315   0.25439   0.31227   0.35288   0.37389   0.38432   0.39246   0.39784   0.40014   0.40080   0.40090   0.40080   0.40014   0.39784   0.39246   0.38432   0.37389   0.35288   0.31227   0.25439  -0.00315   0.00000
                7.00   0.00000   0.02577   0.46887   0.56825   0.63332   0.67398   0.70030   0.72257   0.73798   0.74544   0.74841   0.74936   0.74841   0.74544   0.73798   0.72257   0.70030   0.67398   0.63332   0.56825   0.46887   0.02577   0.00000
               11.00   0.00000   0.06953   0.49057   0.80308   0.89489   0.95066   0.98928   1.02520   1.05072   1.06359   1.06894   1.07071   1.06894   1.06359   1.05072   1.02520   0.98928   0.95066   0.89489   0.80308   0.49057   0.06953   0.00000
               15.00   0.00000   0.11158   0.57225   0.91497   1.12429   1.19450   1.24763   1.30131   1.33984   1.35953   1.36781   1.37054   1.36781   1.35953   1.33984   1.30131   1.24763   1.19450   1.12429   0.91497   0.57225   0.11158   0.00000
               19.00   0.00000   0.15080   0.66166   0.91924   1.10373   1.32724   1.39957   1.47623   1.53095   1.55810   1.56929   1.57302   1.56929   1.55810   1.53095   1.47623   1.39957   1.32724   1.10373   0.91924   0.66166   0.15080   0.00000
               23.00   0.00000   0.18676   0.70564   0.92588   1.11539   1.18628   1.24749   1.32277   1.36830   1.39082   1.40101   1.41802   1.40101   1.39082   1.36830   1.32277   1.24749   1.18628   1.11539   0.92588   0.70564   0.18676   0.00000
               27.00   0.00000   0.21914   0.63653   0.86752   1.07091   1.17127   1.23231   1.29635   1.32872   1.35309   1.36344   1.36689   1.36344   1.35309   1.32872   1.29635   1.23231   1.17127   1.07091   0.86752   0.63653   0.21914   0.00000
               32.00   0.00000   0.24608   0.61988   0.83179   1.00477   1.08605   1.15942   1.23634   1.28729   1.31311   1.32392   1.31842   1.32392   1.31311   1.28729   1.23634   1.15942   1.08605   1.00477   0.83179   0.61988   0.24608   0.00000
               46.00   0.00000   0.20903   0.57781   0.78068   0.95976   1.03384   1.09360   1.14460   1.17273   1.18580   1.19176   1.19374   1.19176   1.18580   1.17273   1.14460   1.09360   1.03384   0.95976   0.78068   0.57781   0.20903   0.00000
               70.00   0.00000   0.11724   0.32370   0.43806   0.54347   0.58912   0.62834   0.66003   0.68345   0.69561   0.69751   0.69641   0.69751   0.69561   0.68345   0.66003   0.62834   0.58912   0.54347   0.43806   0.32370   0.11724   0.00000
              120.00   0.00000  -0.14284  -0.37858  -0.50709  -0.62468  -0.67539  -0.71886  -0.75392  -0.77965  -0.79401  -0.80022  -0.80088  -0.80022  -0.79401  -0.77965  -0.75392  -0.71886  -0.67539  -0.62468  -0.50709  -0.37858  -0.14284   0.00000
              180.00   0.00000   0.00189  -0.01001   0.01816   0.04188   0.04912   0.05454   0.05850   0.06124   0.06263   0.06321   0.06340   0.06321   0.06263   0.06124   0.05850   0.05454   0.04912   0.04188   0.01816  -0.01001   0.00189   0.00000
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            </tableData>
          </table>
        </function>
      <axis name="DRAG">
        <function name="aero/coefficient/CD_base">
          <description>CD over alpha and beta (hangar)</description>
          <product>
            <property>aero/qbar-psf</property>
            <property>metrics/Sw-sqft</property>
          <table>
            <independentVar lookup="row">aero/alpha-deg</independentVar>
            <independentVar lookup="column">aero/beta-deg</independentVar>
            <tableData>
                        -90.00    -70.00    -50.00    -40.00    -30.00    -25.00    -20.00    -15.00    -10.00     -6.00     -3.00      0.00      3.00      6.00     10.00     15.00     20.00     25.00     30.00     40.00     50.00     70.00     90.00
             -180.00   0.63115   0.53280   0.31287   0.20532   0.11987   0.08776   0.06317   0.04582   0.03234   0.02923   0.02878   0.02867   0.02878   0.02923   0.03234   0.04582   0.06317   0.08776   0.11987   0.20532   0.31287   0.53280   0.63115
             -120.00   0.63115   0.65808   0.81177   0.95014   1.10880   1.18653   1.25765   1.31805   1.36412   1.38851   1.39914   1.40288   1.39914   1.38851   1.36412   1.31805   1.25765   1.18653   1.10880   0.95014   0.81177   0.65808   0.63115
              -70.00   0.63115   0.69312   0.95493   1.17204   1.41365   1.53032   1.63634   1.72598   1.79416   1.83031   1.84598   1.85137   1.84598   1.83031   1.79416   1.72598   1.63634   1.53032   1.41365   1.17204   0.95493   0.69312   0.63115
              -46.00   0.63115   0.63831   0.70914   0.78706   0.87921   0.92576   0.97203   1.00849   1.02585   1.03273   1.03549   1.03584   1.03549   1.03273   1.02585   1.00849   0.97203   0.92576   0.87921   0.78706   0.70914   0.63831   0.63115
              -32.00   0.63115   0.59910   0.54163   0.53006   0.55320   0.56141   0.56855   0.55864   0.55004   0.54564   0.54372   0.54295   0.54372   0.54564   0.55004   0.55864   0.56855   0.56141   0.55320   0.53006   0.54163   0.59910   0.63115
              -22.00   0.63115   0.57594   0.43733   0.38326   0.36423   0.34221   0.30017   0.27128   0.25225   0.24278   0.23893   0.23765   0.23893   0.24278   0.25225   0.27128   0.30017   0.34221   0.36423   0.38326   0.43733   0.57594   0.63115
              -17.00   0.63115   0.56638   0.39776   0.32304   0.23202   0.20267   0.18072   0.15902   0.14322   0.13532   0.13216   0.13114   0.13216   0.13532   0.14322   0.15902   0.18072   0.20267   0.23202   0.32304   0.39776   0.56638   0.63115
              -13.00   0.63115   0.56000   0.37373   0.27283   0.18111   0.15316   0.12983   0.10959   0.09510   0.08792   0.08503   0.08409   0.08503   0.08792   0.09510   0.10959   0.12983   0.15316   0.18111   0.27283   0.37373   0.56000   0.63115
               -9.00   0.63115   0.55490   0.34759   0.24324   0.14461   0.11590   0.09239   0.07362   0.06050   0.05410   0.05156   0.05073   0.05156   0.05410   0.06050   0.07362   0.09239   0.11590   0.14461   0.24324   0.34759   0.55490   0.63115
               -5.00   0.63115   0.55187   0.34363   0.23437   0.12407   0.09459   0.07083   0.05256   0.04008   0.03415   0.03183   0.03110   0.03183   0.03415   0.04008   0.05256   0.07083   0.09459   0.12407   0.23437   0.34363   0.55187   0.63115
               -1.00   0.63115   0.55109   0.33808   0.22499   0.11637   0.08779   0.06399   0.04594   0.03377   0.02801   0.02578   0.02511   0.02578   0.02801   0.03377   0.04594   0.06399   0.08779   0.11637   0.22499   0.33808   0.55109   0.63115
                3.00   0.63115   0.55086   0.33974   0.23308   0.12807   0.09999   0.07535   0.05622   0.04286   0.03633   0.03364   0.03243   0.03364   0.03633   0.04286   0.05622   0.07535   0.09999   0.12807   0.23308   0.33974   0.55086   0.63115
                7.00   0.63115   0.55338   0.35444   0.26255   0.16352   0.13518   0.10829   0.08629   0.07009   0.06131   0.05752   0.05567   0.05752   0.06131   0.07009   0.08629   0.10829   0.13518   0.16352   0.26255   0.35444   0.55338   0.63115
               11.00   0.63115   0.55792   0.37217   0.30445   0.21640   0.18595   0.15574   0.12843   0.10888   0.09680   0.09139   0.08945   0.09139   0.09680   0.10888   0.12843   0.15574   0.18595   0.21640   0.30445   0.37217   0.55792   0.63115
               15.00   0.63115   0.56381   0.39468   0.37384   0.29184   0.25555   0.21842   0.18365   0.15837   0.14278   0.13610   0.13412   0.13610   0.14278   0.15837   0.18365   0.21842   0.25555   0.29184   0.37384   0.39468   0.56381   0.63115
               19.00   0.63115   0.57089   0.42168   0.39075   0.39003   0.39166   0.33453   0.28116   0.23954   0.21438   0.20457   0.20220   0.20457   0.21438   0.23954   0.28116   0.33453   0.39166   0.39003   0.39075   0.42168   0.57089   0.63115
               23.00   0.63115   0.57902   0.45540   0.42445   0.44402   0.42710   0.40738   0.37849   0.34258   0.32025   0.31542   0.31798   0.31542   0.32025   0.34258   0.37849   0.40738   0.42710   0.44402   0.42445   0.45540   0.57902   0.63115
               27.00   0.63115   0.58802   0.49541   0.47624   0.49007   0.48511   0.47200   0.46426   0.44034   0.43362   0.42902   0.42747   0.42902   0.43362   0.44034   0.46426   0.47200   0.48511   0.49007   0.47624   0.49541   0.58802   0.63115
               32.00   0.63115   0.60040   0.54962   0.54929   0.57043   0.58974   0.58582   0.59181   0.58973   0.58928   0.58814   0.58554   0.58814   0.58928   0.58973   0.59181   0.58582   0.58974   0.57043   0.54929   0.54962   0.60040   0.63115
               46.00   0.63115   0.63969   0.71743   0.80094   0.89898   0.94749   0.98933   1.02836   1.04988   1.05823   1.06226   1.06354   1.06226   1.05823   1.04988   1.02836   0.98933   0.94749   0.89898   0.80094   0.71743   0.63969   0.63115
               70.00   0.63115   0.69400   0.96023   1.18091   1.42639   1.54489   1.65256   1.74359   1.81279   1.84952   1.86541   1.87088   1.86541   1.84952   1.81279   1.74359   1.65256   1.54489   1.42639   1.18091   0.96023   0.69400   0.63115
              120.00   0.63115   0.65689   0.80462   0.93818   1.09161   1.16688   1.23577   1.29431   1.33898   1.36263   1.37294   1.37657   1.37294   1.36263   1.33898   1.29431   1.23577   1.16688   1.09161   0.93818   0.80462   0.65689   0.63115
              180.00   0.63115   0.53280   0.31287   0.20532   0.11987   0.08776   0.06317   0.04582   0.03234   0.02923   0.02878   0.02867   0.02878   0.02923   0.03234   0.04582   0.06317   0.08776   0.11987   0.20532   0.31287   0.53280   0.63115
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            </tableData>
          </table>
          </product>
        </function>
        <function name="aero/coefficient/CD_mach">
          <description>zero-lift drag's change with Mach: friction, wave drag</description>
          <product>
            <property>aero/qbar-psf</property>
            <property>metrics/Sw-sqft</property>
            <property>aero/function/mach-dCD0</property>
          </product>
        </function>
        <function name="aero/coefficient/CD_induced_mach">
          <description>induced drag's change with Mach (leading-edge suction lost)</description>
          <product>
            <property>aero/qbar-psf</property>
            <property>metrics/Sw-sqft</property>
            <property>aero/cl-squared</property>
            <property>aero/function/mach-dK</property>
          </product>
        </function>
        <function name="aero/coefficient/CD_aileron">
          <description>CD increment from aileron (deg), over alpha</description>
          <product>
            <property>aero/qbar-psf</property>
            <property>metrics/Sw-sqft</property>
            <property>aero/function/mach-aileron</property>
          <table>
            <independentVar lookup="row">aero/alpha-deg</independentVar>
            <independentVar lookup="column">fcs/left-aileron-pos-deg</independentVar>
            <tableData>
                        -20.00    -15.00    -10.00     -5.00      0.00      5.00     10.00     15.00     20.00
             -180.00   0.00352   0.00202   0.00091   0.00023   0.00000   0.00023   0.00091   0.00202   0.00352
             -120.00   0.00346   0.00198   0.00089   0.00022   0.00000   0.00022   0.00089   0.00198   0.00346
              -70.00   0.00345   0.00198   0.00089   0.00022   0.00000   0.00022   0.00089   0.00198   0.00345
              -46.00   0.00706   0.00447   0.00222   0.00059   0.00000   0.00059   0.00222   0.00447   0.00706
              -32.00   0.01285   0.00863   0.00451   0.00125   0.00000   0.00125   0.00451   0.00863   0.01285
              -22.00   0.01919   0.01334   0.00713   0.00199   0.00000   0.00199   0.00713   0.01334   0.01919
              -17.00   0.00672   0.00427   0.00211   0.00056   0.00000   0.00056   0.00211   0.00427   0.00672
              -13.00   0.00758   0.00485   0.00243   0.00065   0.00000   0.00065   0.00243   0.00485   0.00758
               -9.00   0.00807   0.00521   0.00263   0.00071   0.00000   0.00071   0.00263   0.00521   0.00807
               -5.00   0.00832   0.00539   0.00272   0.00074   0.00000   0.00074   0.00272   0.00539   0.00832
               -1.00   0.00835   0.00541   0.00274   0.00074   0.00000   0.00074   0.00274   0.00541   0.00835
                3.00   0.00814   0.00527   0.00266   0.00072   0.00000   0.00072   0.00266   0.00527   0.00814
                7.00   0.00776   0.00501   0.00252   0.00068   0.00000   0.00068   0.00252   0.00501   0.00776
               11.00   0.00724   0.00463   0.00232   0.00062   0.00000   0.00062   0.00232   0.00463   0.00724
               15.00   0.01499   0.00886   0.00374   0.00082   0.00000   0.00082   0.00374   0.00886   0.01499
               19.00   0.04819   0.03539   0.01966   0.00551   0.00000   0.00551   0.01966   0.03539   0.04819
               23.00   0.05004   0.03645   0.01845   0.00293   0.00000   0.00293   0.01845   0.03645   0.05004
               27.00   0.04281   0.02538   0.00971   0.00262   0.00000   0.00262   0.00971   0.02538   0.04281
               32.00   0.01968   0.01370   0.00767   0.00274   0.00000   0.00274   0.00767   0.01370   0.01968
               46.00   0.00829   0.00533   0.00267   0.00072   0.00000   0.00072   0.00267   0.00533   0.00829
               70.00   0.00345   0.00198   0.00089   0.00022   0.00000   0.00022   0.00089   0.00198   0.00345
              120.00   0.00346   0.00198   0.00089   0.00022   0.00000   0.00022   0.00089   0.00198   0.00346
              180.00   0.00352   0.00202   0.00091   0.00023   0.00000   0.00023   0.00091   0.00202   0.00352
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            </tableData>
          </table>
          </product>
        </function>
        <function name="aero/coefficient/CD_elevator">
          <description>CD increment from elevator (deg), over alpha</description>
          <product>
            <property>aero/qbar-psf</property>
            <property>metrics/Sw-sqft</property>
            <property>aero/function/mach-elevator</property>
          <table>
            <independentVar lookup="row">aero/alpha-deg</independentVar>
            <independentVar lookup="column">fcs/elevator-pos-deg</independentVar>
            <tableData>
                        -25.00    -20.00    -15.00    -10.00     -5.00      0.00      5.00     10.00     15.00
             -180.00   0.00499   0.00327   0.00187   0.00084   0.00021   0.00000   0.00021   0.00084   0.00187
             -120.00   0.00490   0.00321   0.00184   0.00083   0.00021   0.00000   0.00021   0.00083   0.00184
              -70.00   0.00489   0.00320   0.00183   0.00083   0.00021   0.00000   0.00021   0.00083   0.00183
              -46.00   0.00013  -0.00069  -0.00124  -0.00145  -0.00113   0.00000   0.00208   0.00503   0.00854
              -32.00   0.00778   0.00622   0.00467   0.00292   0.00107   0.00000   0.00066   0.00331   0.00740
              -22.00   0.03056   0.02632   0.02138   0.01512   0.00763   0.00000  -0.00671  -0.01168  -0.01445
              -17.00   0.02639   0.02243   0.01793   0.01242   0.00610   0.00000  -0.00498  -0.00827  -0.00969
              -13.00   0.02376   0.01994   0.01569   0.01065   0.00509   0.00000  -0.00384  -0.00603  -0.00658
               -9.00   0.02040   0.01680   0.01291   0.00850   0.00389   0.00000  -0.00254  -0.00351  -0.00312
               -5.00   0.01619   0.01290   0.00952   0.00592   0.00248   0.00000  -0.00106  -0.00069   0.00070
               -1.00   0.01123   0.00837   0.00561   0.00297   0.00090   0.00000   0.00055   0.00233   0.00475
                3.00   0.00570   0.00334   0.00130  -0.00023  -0.00081   0.00000   0.00223   0.00545   0.00890
                7.00   0.00139  -0.00058  -0.00204  -0.00271  -0.00211   0.00000   0.00347   0.00770   0.01182
               11.00  -0.00243  -0.00397  -0.00487  -0.00475  -0.00315   0.00000   0.00441   0.00936   0.01394
               15.00  -0.00622  -0.00733  -0.00766  -0.00674  -0.00416   0.00000   0.00528   0.01088   0.01585
               19.00  -0.01137  -0.01192  -0.01149  -0.00950  -0.00557   0.00000   0.00655   0.01314   0.01877
               23.00  -0.01533  -0.01538  -0.01427  -0.01139  -0.00647   0.00000   0.00727   0.01442   0.02055
               27.00  -0.01624  -0.01626  -0.01508  -0.01201  -0.00678   0.00000   0.00746   0.01468   0.02085
               32.00   0.01989   0.01386   0.00807   0.00285  -0.00054   0.00000   0.00600   0.01293   0.01907
               46.00   0.01784   0.01333   0.00910   0.00521   0.00203   0.00000  -0.00073  -0.00041   0.00052
               70.00   0.00489   0.00320   0.00183   0.00083   0.00021   0.00000   0.00021   0.00083   0.00183
              120.00   0.00490   0.00321   0.00184   0.00083   0.00021   0.00000   0.00021   0.00083   0.00184
              180.00   0.00499   0.00327   0.00187   0.00084   0.00021   0.00000   0.00021   0.00084   0.00187
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            </tableData>
          </table>
          </product>
        </function>
        <function name="aero/coefficient/CD_flap">
          <description>CD increment from flap (deg), over alpha</description>
          <product>
            <property>aero/qbar-psf</property>
            <property>metrics/Sw-sqft</property>
            <property>aero/function/mach-flap</property>
          <table>
            <independentVar lookup="row">aero/alpha-deg</independentVar>
            <independentVar lookup="column">fcs/flap-pos-deg</independentVar>
            <tableData>
                          0.00      5.00     10.00     15.00     20.00     25.00     30.00     35.00     40.00     45.00     50.00
             -180.00   0.00000   0.00045   0.00178   0.00395   0.00689   0.01052   0.01473   0.01938   0.02434   0.02945   0.03456
             -120.00   0.00000   0.00044   0.00175   0.00388   0.00678   0.01034   0.01448   0.01905   0.02393   0.02896   0.03399
              -70.00   0.00000   0.00044   0.00174   0.00387   0.00675   0.01031   0.01444   0.01900   0.02386   0.02887   0.03389
              -46.00   0.00000   0.01633   0.03630   0.05891   0.08318   0.10865   0.13512   0.16274   0.19158   0.21809   0.24409
              -32.00   0.00000   0.02715   0.06233   0.10362   0.14750   0.19213   0.23672   0.28067   0.32298   0.35820   0.39178
              -22.00   0.00000  -0.01980  -0.03763  -0.05116  -0.05972  -0.06323  -0.06237  -0.05867  -0.05286  -0.04567  -0.03747
              -17.00   0.00000  -0.01065  -0.01747  -0.02049  -0.02007  -0.01681  -0.01130  -0.00393   0.00510   0.01495   0.02587
              -13.00   0.00000  -0.00713  -0.01072  -0.01063  -0.00724  -0.00123   0.00683   0.01661   0.02802   0.03986   0.05276
               -9.00   0.00000  -0.00388  -0.00406  -0.00062   0.00582   0.01455   0.02503   0.03705   0.05060   0.06415   0.07871
               -5.00   0.00000  -0.00041   0.00291   0.00963   0.01898   0.03019   0.04281   0.05673   0.07203   0.08691   0.10271
               -1.00   0.00000   0.00308   0.00978   0.01954   0.03144   0.04472   0.05904   0.07438   0.09088   0.10660   0.12311
                3.00   0.00000   0.00655   0.01644   0.02892   0.04299   0.05793   0.07349   0.08978   0.10699   0.12308   0.13983
                7.00   0.00000   0.01091   0.02510   0.04154   0.05906   0.07695   0.09508   0.11387   0.13422   0.15394   0.17558
               11.00   0.00000   0.01372   0.03034   0.04876   0.06838   0.08967   0.11314   0.13925   0.16842   0.19553   0.22415
               15.00   0.00000   0.01615   0.03678   0.06303   0.09394   0.12694   0.16009   0.19348   0.22686   0.25438   0.28045
               19.00   0.00000   0.02272   0.05655   0.09585   0.13496   0.17011   0.20055   0.22915   0.25814   0.28352   0.30984
               23.00   0.00000   0.00155   0.02534   0.06485   0.10702   0.14488   0.17865   0.21088   0.24383   0.27116   0.29730
               27.00   0.00000  -0.00921  -0.00273   0.02028   0.06916   0.12767   0.16212   0.19572   0.23408   0.27023   0.30552
               32.00   0.00000  -0.01782  -0.02631  -0.02421  -0.01456   0.00017   0.01882   0.04152   0.07415   0.11816   0.16583
               46.00   0.00000  -0.01242  -0.02080  -0.02542  -0.02702  -0.02641  -0.02420  -0.02075  -0.01630  -0.01172  -0.00669
               70.00   0.00000   0.00044   0.00174   0.00387   0.00675   0.01031   0.01444   0.01900   0.02386   0.02887   0.03389
              120.00   0.00000   0.00044   0.00175   0.00388   0.00678   0.01034   0.01448   0.01905   0.02393   0.02896   0.03399
              180.00   0.00000   0.00045   0.00178   0.00395   0.00689   0.01052   0.01473   0.01938   0.02434   0.02945   0.03456
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            </tableData>
          </table>
          </product>
        </function>
        <function name="aero/coefficient/CD_rudder">
          <description>CD increment from rudder (deg), over alpha</description>
          <product>
            <property>aero/qbar-psf</property>
            <property>metrics/Sw-sqft</property>
            <property>aero/function/mach-rudder</property>
          <table>
            <independentVar lookup="row">aero/alpha-deg</independentVar>
            <independentVar lookup="column">fcs/rudder-pos-deg</independentVar>
            <tableData>
                        -25.00    -20.00    -15.00    -10.00     -5.00      0.00      5.00     10.00     15.00     20.00     25.00
             -180.00   0.00295   0.00194   0.00111   0.00050   0.00013   0.00000   0.00013   0.00050   0.00111   0.00194   0.00295
             -120.00   0.00037   0.00024   0.00014   0.00006   0.00002   0.00000   0.00002   0.00006   0.00014   0.00024   0.00037
              -70.00   0.00013   0.00009   0.00005   0.00002   0.00001   0.00000   0.00001   0.00002   0.00005   0.00009   0.00013
              -46.00   0.00510   0.00398   0.00277   0.00148   0.00041   0.00000   0.00041   0.00148   0.00277   0.00398   0.00510
              -32.00   0.00633   0.00504   0.00383   0.00289   0.00263   0.00000   0.00263   0.00289   0.00383   0.00504   0.00633
              -22.00   0.00761   0.00580   0.00395   0.00208   0.00057   0.00000   0.00057   0.00208   0.00395   0.00580   0.00761
              -17.00   0.00797   0.00605   0.00411   0.00215   0.00060   0.00000   0.00060   0.00215   0.00411   0.00605   0.00797
              -13.00   0.00816   0.00618   0.00419   0.00219   0.00061   0.00000   0.00061   0.00219   0.00419   0.00618   0.00816
               -9.00   0.00825   0.00624   0.00422   0.00221   0.00061   0.00000   0.00061   0.00221   0.00422   0.00624   0.00825
               -5.00   0.00826   0.00623   0.00420   0.00220   0.00060   0.00000   0.00060   0.00220   0.00420   0.00623   0.00826
               -1.00   0.00817   0.00616   0.00415   0.00216   0.00060   0.00000   0.00060   0.00216   0.00415   0.00616   0.00817
                3.00   0.00800   0.00602   0.00405   0.00211   0.00058   0.00000   0.00058   0.00211   0.00405   0.00602   0.00800
                7.00   0.00775   0.00583   0.00391   0.00204   0.00056   0.00000   0.00056   0.00204   0.00391   0.00583   0.00775
               11.00   0.00740   0.00556   0.00373   0.00194   0.00053   0.00000   0.00053   0.00194   0.00373   0.00556   0.00740
               15.00   0.00698   0.00524   0.00351   0.00183   0.00050   0.00000   0.00050   0.00183   0.00351   0.00524   0.00698
               19.00   0.00650   0.00488   0.00327   0.00170   0.00047   0.00000   0.00047   0.00170   0.00327   0.00488   0.00650
               23.00   0.00594   0.00446   0.00299   0.00155   0.00043   0.00000   0.00043   0.00155   0.00299   0.00446   0.00594
               27.00   0.00538   0.00404   0.00270   0.00140   0.00039   0.00000   0.00039   0.00140   0.00270   0.00404   0.00538
               32.00   0.00426   0.00321   0.00222   0.00271   0.00075   0.00000   0.00075   0.00271   0.00222   0.00321   0.00426
               46.00   0.00468   0.00362   0.00251   0.00133   0.00037   0.00000   0.00037   0.00133   0.00251   0.00362   0.00468
               70.00   0.00013   0.00009   0.00005   0.00002   0.00001   0.00000   0.00001   0.00002   0.00005   0.00009   0.00013
              120.00   0.00037   0.00024   0.00014   0.00006   0.00002   0.00000   0.00002   0.00006   0.00014   0.00024   0.00037
              180.00   0.00295   0.00194   0.00111   0.00050   0.00013   0.00000   0.00013   0.00050   0.00111   0.00194   0.00295
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            </tableData>
          </table>
          </product>
        </function>
        <function name="aero/coefficient/CD_ground">
          <description>Induced drag change in ground effect</description>
          <product>
            <property>aero/qbar-psf</property>
            <property>metrics/Sw-sqft</property>
            <property>aero/cl-squared</property>
            <value>0.05379</value>
          <table>
            <independentVar lookup="row">aero/h_b-mac-ft</independentVar>
            <tableData>
                    0.00   -1.00000
                    0.10   -0.28090
                    0.15   -0.14793
                    0.20   -0.08897
                    0.30   -0.04160
                    0.40   -0.02383
                    0.50   -0.01538
                    0.60   -0.01073
                    0.70   -0.00791
                    0.80   -0.00607
                    0.90   -0.00480
                    1.00   -0.00389
                    1.10   -0.00322
            </tableData>
          </table>
          </product>
        </function>
        <function name="aero/coefficient/CD_spoilers">
          <description>spoilers: drag of its spoiler panels, 18.4 m2 opened to 60 deg (hangar)</description>
          <product>
            <property>aero/qbar-psf</property>
            <property>metrics/Sw-sqft</property>
            <value>0.0779735</value>
            <pow>
              <sin>
                <product>
                  <property>fcs/speedbrake-pos-norm</property>
                  <value>1.0472</value>
                </product>
              </sin>
              <value>2</value>
            </pow>
          </product>
        </function>
        <function name="aero/coefficient/CD_gear">
          <description>the gear extended: its wheels' and struts' drag by Raymer's components, 1.3 m2 (hangar)</description>
          <product>
            <property>aero/qbar-psf</property>
            <property>metrics/Sw-sqft</property>
            <value>0.00458502</value>
            <property>gear/gear-pos-norm</property>
          </product>
        </function>
      </axis>
      <axis name="SIDE">
        <function name="aero/coefficient/CY_base">
          <description>CY over alpha and beta (hangar)</description>
          <product>
            <property>aero/qbar-psf</property>
            <property>metrics/Sw-sqft</property>
            <property>aero/function/mach-side</property>
          <table>
            <independentVar lookup="row">aero/alpha-deg</independentVar>
            <independentVar lookup="column">aero/beta-deg</independentVar>
            <tableData>
                        -90.00    -70.00    -50.00    -40.00    -30.00    -25.00    -20.00    -15.00    -10.00     -6.00     -3.00      0.00      3.00      6.00     10.00     15.00     20.00     25.00     30.00     40.00     50.00     70.00     90.00
             -180.00  -0.00000   0.18849   0.28512   0.26601   0.20532   0.16772   0.12885   0.09092   0.09059   0.09607   0.05073  -0.00000  -0.05073  -0.09607  -0.09059  -0.09092  -0.12885  -0.16772  -0.20532  -0.26601  -0.28512  -0.18849   0.00000
             -120.00  -0.00000  -0.02801  -0.18625  -0.25123  -0.26958  -0.25643  -0.22795  -0.18529  -0.13074  -0.07607  -0.02764  -0.00000   0.02764   0.07607   0.13074   0.18529   0.22795   0.25643   0.26958   0.25123   0.18625   0.02801   0.00000
              -70.00   0.00000  -0.08337  -0.31953  -0.40501  -0.41925  -0.39344  -0.34514  -0.27557  -0.18643  -0.10161  -0.04559  -0.00000   0.04559   0.10161   0.18643   0.27557   0.34514   0.39344   0.41925   0.40501   0.31953   0.08337  -0.00000
              -46.00   0.00000   0.02941  -0.05982  -0.10416  -0.11436  -0.09924  -0.06022  -0.02441  -0.01190  -0.00904  -0.00443  -0.00000   0.00443   0.00904   0.01190   0.02441   0.06022   0.09924   0.11436   0.10416   0.05982  -0.02941  -0.00000
              -32.00   0.00000   0.10000   0.10414   0.07922   0.06380   0.04750   0.06144   0.03888   0.02318   0.01318   0.00646  -0.00000  -0.00646  -0.01318  -0.02318  -0.03888  -0.06144  -0.04750  -0.06380  -0.07922  -0.10414  -0.10000  -0.00000
              -22.00   0.00000   0.16445   0.19333   0.17936   0.13630   0.13999   0.10432   0.07461   0.04759   0.02777   0.01376  -0.00000  -0.01376  -0.02777  -0.04759  -0.07461  -0.10432  -0.13999  -0.13630  -0.17936  -0.19333  -0.16445  -0.00000
              -17.00   0.00000   0.19465   0.24466   0.24959   0.18204   0.18105   0.14410   0.10645   0.06957   0.04114   0.02043  -0.00000  -0.02043  -0.04114  -0.06957  -0.10645  -0.14410  -0.18105  -0.18204  -0.24959  -0.24466  -0.19465  -0.00000
              -13.00   0.00000   0.21726   0.28638   0.28441   0.21787   0.20971   0.16888   0.12543   0.08223   0.04866   0.02415  -0.00000  -0.02415  -0.04866  -0.08223  -0.12543  -0.16888  -0.20971  -0.21787  -0.28441  -0.28638  -0.21726  -0.00000
               -9.00   0.00000   0.23809   0.31809   0.31041   0.24241   0.22643   0.18227   0.13513   0.08821   0.05194   0.02568  -0.00000  -0.02568  -0.05194  -0.08821  -0.13513  -0.18227  -0.22643  -0.24241  -0.31041  -0.31809  -0.23809  -0.00000
               -5.00   0.00000   0.24609   0.33344   0.33071   0.25895   0.23150   0.18553   0.13689   0.08860   0.05163   0.02531  -0.00000  -0.02531  -0.05163  -0.08860  -0.13689  -0.18553  -0.23150  -0.25895  -0.33071  -0.33344  -0.24609  -0.00000
               -1.00   0.00000   0.24181   0.33181   0.33548   0.26312   0.22672   0.18079   0.13267   0.08504   0.04887   0.02354  -0.00000  -0.02354  -0.04887  -0.08504  -0.13267  -0.18079  -0.22672  -0.26312  -0.33548  -0.33181  -0.24181  -0.00000
                3.00   0.00000   0.24573   0.32784   0.33702   0.25924   0.22210   0.17714   0.13008   0.08351   0.04816   0.02337  -0.00000  -0.02337  -0.04816  -0.08351  -0.13008  -0.17714  -0.22210  -0.25924  -0.33702  -0.32784  -0.24573  -0.00000
                7.00   0.00000   0.23519   0.31811   0.33884   0.25706   0.22209   0.17870   0.13272   0.08674   0.05111   0.02528  -0.00000  -0.02528  -0.05111  -0.08674  -0.13272  -0.17870  -0.22209  -0.25706  -0.33884  -0.31811  -0.23519  -0.00000
               11.00   0.00000   0.21535   0.27987   0.32250   0.25574   0.22268   0.18112   0.13583   0.08988   0.05351   0.02663  -0.00000  -0.02663  -0.05351  -0.08988  -0.13583  -0.18112  -0.22268  -0.25574  -0.32250  -0.27987  -0.21535  -0.00000
               15.00   0.00000   0.19365   0.24224   0.27713   0.25245   0.22004   0.18097   0.13646   0.09083   0.05434   0.02712  -0.00000  -0.02712  -0.05434  -0.09083  -0.13646  -0.18097  -0.22004  -0.25245  -0.27713  -0.24224  -0.19365  -0.00000
               19.00   0.00000   0.17049   0.20051   0.20485   0.21976   0.20596   0.17152   0.13005   0.08759   0.05210   0.02570  -0.00000  -0.02570  -0.05210  -0.08759  -0.13005  -0.17152  -0.20596  -0.21976  -0.20485  -0.20051  -0.17049  -0.00000
               23.00   0.00000   0.14611   0.16471   0.15526   0.18333   0.16888   0.15221   0.11872   0.06967   0.03537   0.01292  -0.00000  -0.01292  -0.03537  -0.06967  -0.11872  -0.15221  -0.16888  -0.18333  -0.15526  -0.16471  -0.14611  -0.00000
               27.00   0.00000   0.12082   0.14169   0.12504   0.12948   0.14556   0.12741   0.09734   0.06371   0.03944   0.01975  -0.00000  -0.01975  -0.03944  -0.06371  -0.09734  -0.12741  -0.14556  -0.12948  -0.12504  -0.14169  -0.12082  -0.00000
               32.00   0.00000   0.09088   0.09549   0.07370   0.08589   0.10681   0.08931   0.05807   0.03426   0.02192   0.00726  -0.00000  -0.00726  -0.02192  -0.03426  -0.05807  -0.08931  -0.10681  -0.08589  -0.07370  -0.09549  -0.09088  -0.00000
               46.00   0.00000   0.02573  -0.06959  -0.11569  -0.12533  -0.10886  -0.07835  -0.02195  -0.02234  -0.01736  -0.00868  -0.00000   0.00868   0.01736   0.02234   0.02195   0.07835   0.10886   0.12533   0.11569   0.06959  -0.02573  -0.00000
               70.00   0.00000  -0.08565  -0.32574  -0.41236  -0.42652  -0.40016  -0.35096  -0.28018  -0.18945  -0.10419  -0.04660  -0.00000   0.04660   0.10419   0.18945   0.28018   0.35096   0.40016   0.42652   0.41236   0.32574   0.08565  -0.00000
              120.00  -0.00000  -0.02493  -0.17788  -0.24132  -0.25976  -0.24734  -0.22005  -0.17898  -0.12634  -0.07337  -0.02627  -0.00000   0.02627   0.07337   0.12634   0.17898   0.22005   0.24734   0.25976   0.24132   0.17788   0.02493   0.00000
              180.00  -0.00000   0.18849   0.28512   0.26601   0.20532   0.16772   0.12885   0.09092   0.09059   0.09607   0.05073  -0.00000  -0.05073  -0.09607  -0.09059  -0.09092  -0.12885  -0.16772  -0.20532  -0.26601  -0.28512  -0.18849   0.00000
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            </tableData>
          </table>
          </product>
        </function>
        <function name="aero/coefficient/CY_aileron">
          <description>CY increment from aileron (deg), over alpha</description>
          <product>
            <property>aero/qbar-psf</property>
            <property>metrics/Sw-sqft</property>
            <property>aero/function/mach-aileron</property>
          <table>
            <independentVar lookup="row">aero/alpha-deg</independentVar>
            <independentVar lookup="column">fcs/left-aileron-pos-deg</independentVar>
            <tableData>
                        -20.00    -15.00    -10.00     -5.00      0.00      5.00     10.00     15.00     20.00
             -180.00   0.00000   0.00000   0.00000   0.00000   0.00000   0.00000   0.00000   0.00000   0.00000
             -120.00   0.00176   0.00150   0.00111   0.00059   0.00000  -0.00059  -0.00111  -0.00150  -0.00176
              -70.00  -0.00052  -0.00044  -0.00033  -0.00017   0.00000   0.00017   0.00033   0.00044   0.00052
              -46.00  -0.00235  -0.00213  -0.00166  -0.00091   0.00000   0.00091   0.00166   0.00213   0.00235
              -32.00  -0.00512  -0.00456  -0.00350  -0.00190   0.00000   0.00190   0.00350   0.00456   0.00512
              -22.00  -0.00963  -0.00828  -0.00622  -0.00334   0.00000   0.00334   0.00622   0.00828   0.00963
              -17.00  -0.00936  -0.00801  -0.00596  -0.00318   0.00000   0.00318   0.00596   0.00801   0.00936
              -13.00  -0.00972  -0.00831  -0.00618  -0.00329   0.00000   0.00329   0.00618   0.00831   0.00972
               -9.00  -0.00988  -0.00844  -0.00628  -0.00335   0.00000   0.00335   0.00628   0.00844   0.00988
               -5.00  -0.01016  -0.00868  -0.00646  -0.00344   0.00000   0.00344   0.00646   0.00868   0.01016
               -1.00  -0.01058  -0.00904  -0.00673  -0.00359   0.00000   0.00359   0.00673   0.00904   0.01058
                3.00  -0.01077  -0.00919  -0.00683  -0.00364   0.00000   0.00364   0.00683   0.00919   0.01077
                7.00  -0.01085  -0.00925  -0.00687  -0.00366   0.00000   0.00366   0.00687   0.00925   0.01085
               11.00  -0.01149  -0.00981  -0.00729  -0.00389   0.00000   0.00389   0.00729   0.00981   0.01149
               15.00  -0.01332  -0.01126  -0.00827  -0.00435   0.00000   0.00435   0.00827   0.01126   0.01332
               19.00  -0.01725  -0.01487  -0.01116  -0.00599   0.00000   0.00599   0.01116   0.01487   0.01725
               23.00  -0.04209  -0.03868  -0.03273  -0.02363   0.00000   0.02363   0.03273   0.03868   0.04209
               27.00  -0.03383  -0.02668  -0.01687  -0.00878   0.00000   0.00878   0.01687   0.02668   0.03383
               32.00  -0.02033  -0.01831  -0.01530  -0.01101   0.00000   0.01101   0.01530   0.01831   0.02033
               46.00  -0.00517  -0.00451  -0.00341  -0.00183   0.00000   0.00183   0.00341   0.00451   0.00517
               70.00  -0.00063  -0.00054  -0.00040  -0.00021   0.00000   0.00021   0.00040   0.00054   0.00063
              120.00   0.00171   0.00145   0.00107   0.00057   0.00000  -0.00057  -0.00107  -0.00145  -0.00171
              180.00   0.00000   0.00000   0.00000   0.00000   0.00000   0.00000   0.00000   0.00000   0.00000
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            </tableData>
          </table>
          </product>
        </function>
        <function name="aero/coefficient/CY_rudder">
          <description>CY increment from rudder (deg), over alpha</description>
          <product>
            <property>aero/qbar-psf</property>
            <property>metrics/Sw-sqft</property>
            <property>aero/function/mach-rudder</property>
          <table>
            <independentVar lookup="row">aero/alpha-deg</independentVar>
            <independentVar lookup="column">fcs/rudder-pos-deg</independentVar>
            <tableData>
                        -25.00    -20.00    -15.00    -10.00     -5.00      0.00      5.00     10.00     15.00     20.00     25.00
             -180.00   0.00000   0.00000   0.00000   0.00000   0.00000   0.00000   0.00000   0.00000   0.00000   0.00000   0.00000
             -120.00   0.00000   0.00000   0.00000   0.00000   0.00000   0.00000   0.00000   0.00000   0.00000   0.00000   0.00000
              -70.00  -0.01331  -0.01200  -0.01020  -0.00756  -0.00402   0.00000   0.00402   0.00756   0.01020   0.01200   0.01331
              -46.00  -0.04286  -0.03869  -0.03290  -0.02431  -0.01286   0.00000   0.01286   0.02431   0.03290   0.03869   0.04286
              -32.00  -0.03916  -0.03507  -0.02944  -0.02131  -0.01047   0.00000   0.01047   0.02131   0.02944   0.03507   0.03916
              -22.00  -0.04964  -0.04478  -0.03807  -0.02821  -0.01501   0.00000   0.01501   0.02821   0.03807   0.04478   0.04964
              -17.00  -0.05250  -0.04737  -0.04026  -0.02984  -0.01587   0.00000   0.01587   0.02984   0.04026   0.04737   0.05250
              -13.00  -0.05416  -0.04886  -0.04153  -0.03077  -0.01637   0.00000   0.01637   0.03077   0.04153   0.04886   0.05416
               -9.00  -0.05523  -0.04982  -0.04234  -0.03137  -0.01668   0.00000   0.01668   0.03137   0.04234   0.04982   0.05523
               -5.00  -0.05566  -0.05020  -0.04266  -0.03161  -0.01681   0.00000   0.01681   0.03161   0.04266   0.05020   0.05566
               -1.00  -0.05546  -0.05002  -0.04250  -0.03149  -0.01675   0.00000   0.01675   0.03149   0.04250   0.05002   0.05546
                3.00  -0.05477  -0.04940  -0.04198  -0.03111  -0.01654   0.00000   0.01654   0.03111   0.04198   0.04940   0.05477
                7.00  -0.05369  -0.04844  -0.04118  -0.03052  -0.01623   0.00000   0.01623   0.03052   0.04118   0.04844   0.05369
               11.00  -0.05200  -0.04693  -0.03990  -0.02957  -0.01573   0.00000   0.01573   0.02957   0.03990   0.04693   0.05200
               15.00  -0.04978  -0.04493  -0.03820  -0.02832  -0.01507   0.00000   0.01507   0.02832   0.03820   0.04493   0.04978
               19.00  -0.04713  -0.04255  -0.03619  -0.02684  -0.01428   0.00000   0.01428   0.02684   0.03619   0.04255   0.04713
               23.00  -0.04397  -0.03971  -0.03378  -0.02505  -0.01333   0.00000   0.01333   0.02505   0.03378   0.03971   0.04397
               27.00  -0.04068  -0.03676  -0.03129  -0.02322  -0.01235   0.00000   0.01235   0.02322   0.03129   0.03676   0.04068
               32.00  -0.02980  -0.02627  -0.02142  -0.02579  -0.00534   0.00000   0.00534   0.02579   0.02142   0.02627   0.02980
               46.00  -0.03982  -0.03598  -0.03062  -0.02253  -0.01189   0.00000   0.01189   0.02253   0.03062   0.03598   0.03982
               70.00  -0.01331  -0.01200  -0.01020  -0.00756  -0.00402   0.00000   0.00402   0.00756   0.01020   0.01200   0.01331
              120.00   0.00000   0.00000   0.00000   0.00000   0.00000   0.00000   0.00000   0.00000   0.00000   0.00000   0.00000
              180.00   0.00000   0.00000   0.00000   0.00000   0.00000   0.00000   0.00000   0.00000   0.00000   0.00000   0.00000
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            </tableData>
          </table>
          </product>
        </function>
        <function name="aero/coefficient/CYp">
          <description>CY per p (non-dimensional), over alpha</description>
          <product>
            <property>aero/qbar-psf</property>
            <property>metrics/Sw-sqft</property>
            <property>aero/bi2vel</property>
            <property>velocities/p-aero-rad_sec</property>
            <property>aero/function/mach-lift</property>
          <table>
            <independentVar lookup="row">aero/alpha-deg</independentVar>
            <tableData>
                 -180.00   -0.44354
                 -165.00   -0.24087
                 -105.00   -0.19364
                  -60.00   -0.26565
                  -42.00   -0.22236
                  -30.00   -0.19118
                  -20.00   -0.18435
                  -16.00   -0.20828
                  -12.00   -0.20929
                   -8.00   -0.20242
                   -4.00   -0.19605
                    0.00   -0.19091
                    4.00   -0.18334
                    8.00   -0.18328
                   12.00   -0.19978
                   16.00   -0.20286
                   20.00   -0.07031
                   24.00    0.41297
                   28.00   -0.01874
                   35.00   -0.15091
                   50.00   -0.22069
                   80.00   -0.21107
                  135.00   -0.25452
                  180.00   -0.44354
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            </tableData>
          </table>
          </product>
        </function>
        <function name="aero/coefficient/CYr">
          <description>CY per r (non-dimensional), over alpha</description>
          <product>
            <property>aero/qbar-psf</property>
            <property>metrics/Sw-sqft</property>
            <property>aero/bi2vel</property>
            <property>velocities/r-aero-rad_sec</property>
            <property>aero/function/mach-lift</property>
          <table>
            <independentVar lookup="row">aero/alpha-deg</independentVar>
            <tableData>
                 -180.00    0.66589
                 -165.00    0.66576
                 -105.00    0.18876
                  -60.00    0.40610
                  -42.00    0.32750
                  -30.00    0.23537
                  -20.00    0.26953
                  -16.00    0.30514
                  -12.00    0.32913
                   -8.00    0.34353
                   -4.00    0.34953
                    0.00    0.34742
                    4.00    0.35678
                    8.00    0.38156
                   12.00    0.39873
                   16.00    0.42130
                   20.00    0.46557
                   24.00    0.76385
                   28.00    0.44498
                   35.00    0.42632
                   50.00    0.47652
                   80.00    0.20562
                  135.00    0.46942
                  180.00    0.66589
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            </tableData>
          </table>
          </product>
        </function>
      </axis>
      <axis name="LIFT">
        <function name="aero/coefficient/CL_base">
          <description>CL over alpha and beta, ground effect, compressibility (hangar)</description>
          <product>
            <property>aero/qbar-psf</property>
            <property>metrics/Sw-sqft</property>
            <property>aero/function/CL-base</property>
            <property>aero/function/mach-lift</property>
          <table>
            <independentVar lookup="row">aero/h_b-mac-ft</independentVar>
            <tableData>
                    0.00    1.20000
                    0.10    1.08692
                    0.15    1.05730
                    0.20    1.03778
                    0.30    1.01642
                    0.40    1.00713
                    0.50    1.00310
                    0.60    1.00135
                    0.70    1.00059
                    0.80    1.00025
                    0.90    1.00011
                    1.00    1.00005
                    1.10    1.00000
            </tableData>
          </table>
          </product>
        </function>
        <function name="aero/coefficient/CL_elevator">
          <description>CL increment from elevator (deg), over alpha</description>
          <product>
            <property>aero/qbar-psf</property>
            <property>metrics/Sw-sqft</property>
            <property>aero/function/mach-elevator</property>
          <table>
            <independentVar lookup="row">aero/alpha-deg</independentVar>
            <independentVar lookup="column">fcs/elevator-pos-deg</independentVar>
            <tableData>
                        -25.00    -20.00    -15.00    -10.00     -5.00      0.00      5.00     10.00     15.00
             -180.00   0.00000   0.00000   0.00000   0.00000   0.00000   0.00000   0.00000   0.00000   0.00000
             -120.00  -0.02397  -0.02161  -0.01836  -0.01360  -0.00723   0.00000   0.00723   0.01359   0.01834
              -70.00  -0.00932  -0.00849  -0.00731  -0.00552  -0.00301   0.00000   0.00317   0.00609   0.00836
              -46.00  -0.03277  -0.03043  -0.02667  -0.02045  -0.01125   0.00000   0.01183   0.02248   0.03028
              -32.00  -0.05314  -0.05010  -0.04505  -0.03587  -0.02057   0.00000   0.02278   0.04383   0.05964
              -22.00  -0.08023  -0.07334  -0.06320  -0.04751  -0.02563   0.00000   0.02632   0.04999   0.06787
              -17.00  -0.09047  -0.08276  -0.07131  -0.05353  -0.02879   0.00000   0.02931   0.05538   0.07480
              -13.00  -0.09620  -0.08788  -0.07561  -0.05665  -0.03041   0.00000   0.03080   0.05807   0.07829
               -9.00  -0.10009  -0.09130  -0.07843  -0.05866  -0.03142   0.00000   0.03170   0.05965   0.08029
               -5.00  -0.10265  -0.09351  -0.08021  -0.05990  -0.03202   0.00000   0.03217   0.06044   0.08123
               -1.00  -0.10383  -0.09447  -0.08092  -0.06033  -0.03219   0.00000   0.03222   0.06041   0.08107
                3.00  -0.10389  -0.09441  -0.08077  -0.06013  -0.03203   0.00000   0.03193   0.05977   0.08008
                7.00  -0.10297  -0.09348  -0.07989  -0.05939  -0.03159   0.00000   0.03137   0.05860   0.07838
               11.00  -0.10029  -0.09096  -0.07765  -0.05764  -0.03060   0.00000   0.03027   0.05644   0.07535
               15.00  -0.09586  -0.08688  -0.07408  -0.05491  -0.02910   0.00000   0.02865   0.05331   0.07106
               19.00  -0.08885  -0.08019  -0.06810  -0.05028  -0.02653   0.00000   0.02596   0.04820   0.06422
               23.00  -0.08418  -0.07486  -0.06261  -0.04560  -0.02382   0.00000   0.02308   0.04292   0.05763
               27.00  -0.09149  -0.08113  -0.06728  -0.04829  -0.02483   0.00000   0.02354   0.04358   0.05842
               32.00  -0.11209  -0.10439  -0.09200  -0.07156  -0.04127   0.00000   0.08342   0.11011   0.12605
               46.00  -0.05191  -0.04780  -0.04131  -0.03096  -0.01652   0.00000   0.01634   0.03039   0.04053
               70.00  -0.01384  -0.01239  -0.01042  -0.00761  -0.00397   0.00000   0.00379   0.00699   0.00930
              120.00  -0.02391  -0.02157  -0.01834  -0.01359  -0.00723   0.00000   0.00723   0.01360   0.01836
              180.00   0.00000   0.00000   0.00000   0.00000   0.00000   0.00000   0.00000   0.00000   0.00000
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            </tableData>
          </table>
          </product>
        </function>
        <function name="aero/coefficient/CL_flap">
          <description>CL increment from flap (deg), over alpha</description>
          <product>
            <property>aero/qbar-psf</property>
            <property>metrics/Sw-sqft</property>
            <property>aero/function/mach-flap</property>
          <table>
            <independentVar lookup="row">aero/alpha-deg</independentVar>
            <independentVar lookup="column">fcs/flap-pos-deg</independentVar>
            <tableData>
                          0.00      5.00     10.00     15.00     20.00     25.00     30.00     35.00     40.00     45.00     50.00
             -180.00   0.00000   0.00000   0.00000   0.00000   0.00000   0.00000   0.00000   0.00000   0.00000   0.00000  -0.00000
             -120.00   0.00000   0.02680   0.05347   0.07858   0.10115   0.12109   0.13900   0.15574   0.17205   0.18559   0.19913
              -70.00   0.00000   0.01394   0.02853   0.04296   0.05651   0.06898   0.08061   0.09186   0.10318   0.11289   0.12287
              -46.00   0.00000   0.04320   0.08702   0.12844   0.16500   0.19587   0.22197   0.24481   0.26585   0.28098   0.29544
              -32.00   0.00000   0.06942   0.13859   0.20144   0.25422   0.29592   0.32832   0.35470   0.37818   0.39308   0.40716
              -22.00   0.00000   0.07169   0.15091   0.23366   0.31650   0.39695   0.47435   0.54955   0.62468   0.68775   0.75140
              -17.00   0.00000   0.11860   0.24250   0.36155   0.46958   0.56556   0.65218   0.73340   0.81287   0.87879   0.94488
              -13.00   0.00000   0.12955   0.25944   0.38241   0.49332   0.59150   0.67985   0.76250   0.84313   0.90987   0.97669
               -9.00   0.00000   0.13230   0.26449   0.38925   0.50147   0.60056   0.68950   0.77252   0.85336   0.92012   0.98684
               -5.00   0.00000   0.13354   0.26660   0.39184   0.50419   0.60314   0.69176   0.77430   0.85451   0.92061   0.98657
               -1.00   0.00000   0.13345   0.26610   0.39069   0.50225   0.60034   0.68806   0.76965   0.84883   0.91396   0.97888
                3.00   0.00000   0.13465   0.26849   0.39411   0.50650   0.60523   0.69342   0.77535   0.85471   0.91980   0.98413
                7.00   0.00000   0.13788   0.27492   0.40361   0.51879   0.61983   0.70933   0.79096   0.86783   0.92851   0.98583
               11.00   0.00000   0.13176   0.26201   0.38233   0.48564   0.57073   0.64099   0.70153   0.75665   0.79987   0.84179
               15.00   0.00000   0.11677   0.22357   0.31375   0.38711   0.44790   0.50070   0.54890   0.59540   0.63284   0.67008
               19.00   0.00000   0.10073   0.19180   0.27367   0.34469   0.40533   0.45842   0.50579   0.54974   0.58332   0.61494
               23.00   0.00000   0.22784   0.39980   0.51614   0.60255   0.66774   0.71913   0.76171   0.79971   0.82789   0.85287
               27.00   0.00000   0.11659   0.23743   0.35779   0.48838   0.61837   0.71099   0.78061   0.83413   0.87157   0.90109
               32.00   0.00000   0.10863   0.24482   0.33946   0.42153   0.49196   0.55353   0.60933   0.66521   0.71924   0.77281
               46.00   0.00000   0.05259   0.10431   0.15180   0.19302   0.22795   0.25790   0.28450   0.30896   0.32777   0.34534
               70.00   0.00000   0.01322   0.02579   0.03711   0.04685   0.05511   0.06228   0.06875   0.07484   0.07974   0.08449
              120.00   0.00000   0.02965   0.05918   0.08699   0.11199   0.13410   0.15397   0.17256   0.19066   0.20571   0.22076
              180.00   0.00000   0.00000   0.00000   0.00000   0.00000   0.00000   0.00000   0.00000   0.00000   0.00000   0.00000
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            </tableData>
          </table>
          <table>
            <independentVar lookup="row">aero/h_b-mac-ft</independentVar>
            <tableData>
                    0.00    1.20000
                    0.10    1.08692
                    0.20    1.03778
                    0.40    1.00713
                    0.60    1.00135
                    0.80    1.00025
                    1.00    1.00005
                    1.10    1.00000
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            </tableData>
          </table>
          </product>
        </function>
        <function name="aero/coefficient/CLq">
          <description>CL per q (non-dimensional), over alpha</description>
          <product>
            <property>aero/qbar-psf</property>
            <property>metrics/Sw-sqft</property>
            <property>aero/ci2vel</property>
            <property>velocities/q-aero-rad_sec</property>
            <property>aero/function/mach-lift</property>
          <table>
            <independentVar lookup="row">aero/alpha-deg</independentVar>
            <tableData>
                 -180.00   -1.95828
                 -165.00    0.64115
                  -32.00    1.43172
                  -10.00    9.40561
                    5.00    9.37859
                   20.00    3.82113
                   46.00    1.68952
                  180.00   -1.95828
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            </tableData>
          </table>
          </product>
        </function>
        <function name="aero/coefficient/CLadot">
          <description>CL per alpha-dot (downwash lag at the tail)</description>
          <product>
            <property>aero/qbar-psf</property>
            <property>metrics/Sw-sqft</property>
            <property>aero/ci2vel</property>
            <property>aero/alphadot-rad_sec</property>
            <value>0.87885</value>
            <property>aero/function/mach-lift</property>
          </product>
        </function>
        <function name="aero/coefficient/CL_spoilers">
          <description>spoilers: the lift lost behind them, 184 m2 of wing, over alpha (hangar)</description>
          <product>
            <property>aero/qbar-psf</property>
            <property>metrics/Sw-sqft</property>
            <table>
              <independentVar lookup="row">aero/alpha-deg</independentVar>
              <tableData>
                   -180.00   -0.02884
                   -165.00   -0.16287
                    -32.00    0.58035
                    -10.00    0.31345
                      5.00   -0.26235
                     20.00   -0.72258
                     46.00   -0.54296
                    180.00   -0.02884
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              </tableData>
            </table>
            <min>
              <value>1</value>
              <product>
                <property>fcs/speedbrake-pos-norm</property>
                <value>1.33333</value>
              </product>
            </min>
          </product>
        </function>
      </axis>
      <axis name="ROLL">
        <function name="aero/coefficient/Cl_base">
          <description>Cl over alpha and beta (hangar)</description>
          <product>
            <property>aero/qbar-psf</property>
            <property>metrics/Sw-sqft</property>
            <property>metrics/bw-ft</property>
            <property>aero/function/mach-side</property>
          <table>
            <independentVar lookup="row">aero/alpha-deg</independentVar>
            <independentVar lookup="column">aero/beta-deg</independentVar>
            <tableData>
                        -90.00    -70.00    -50.00    -40.00    -30.00    -25.00    -20.00    -15.00    -10.00     -6.00     -3.00      0.00      3.00      6.00     10.00     15.00     20.00     25.00     30.00     40.00     50.00     70.00     90.00
             -180.00   0.02850   0.03388   0.06142   0.07396   0.06718   0.05946   0.04977   0.03859   0.02973   0.02247   0.01166  -0.00000  -0.01166  -0.02247  -0.02973  -0.03859  -0.04977  -0.05946  -0.06718  -0.07396  -0.06142  -0.03388  -0.02850
              -35.00   0.02850   0.03271   0.03851   0.03359   0.02330   0.01599   0.01488   0.01003   0.00645   0.00381   0.00190  -0.00000  -0.00190  -0.00381  -0.00645  -0.01003  -0.01488  -0.01599  -0.02330  -0.03359  -0.03851  -0.03271  -0.02850
              -11.00   0.02850   0.05100   0.06286   0.04489   0.01157   0.00700   0.00558   0.00442   0.00304   0.00185   0.00093  -0.00000  -0.00093  -0.00185  -0.00304  -0.00442  -0.00558  -0.00700  -0.01157  -0.04489  -0.06286  -0.05100  -0.02850
                4.00   0.02850   0.05315   0.08216   0.06918   0.06720   0.06453   0.05448   0.04246   0.02905   0.01764   0.00886  -0.00000  -0.00886  -0.01764  -0.02905  -0.04246  -0.05448  -0.06453  -0.06720  -0.06918  -0.08216  -0.05315  -0.02850
               19.00   0.02850   0.03792   0.01277   0.01903   0.05495   0.07358   0.06784   0.05353   0.03702   0.02251   0.01129  -0.00000  -0.01129  -0.02251  -0.03702  -0.05353  -0.06784  -0.07358  -0.05495  -0.01903  -0.01277  -0.03792  -0.02850
               42.00   0.02850   0.03761   0.04294   0.03964   0.03280   0.02898   0.02591   0.02158   0.01437   0.00869   0.00446  -0.00000  -0.00446  -0.00869  -0.01437  -0.02158  -0.02591  -0.02898  -0.03280  -0.03964  -0.04294  -0.03761  -0.02850
              180.00   0.02850   0.03388   0.06142   0.07396   0.06718   0.05946   0.04977   0.03859   0.02973   0.02247   0.01166  -0.00000  -0.01166  -0.02247  -0.02973  -0.03859  -0.04977  -0.05946  -0.06718  -0.07396  -0.06142  -0.03388  -0.02850
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            </tableData>
          </table>
          </product>
        </function>
        <function name="aero/coefficient/Cl_aileron">
          <description>Cl increment from aileron (deg), over alpha</description>
          <product>
            <property>aero/qbar-psf</property>
            <property>metrics/Sw-sqft</property>
            <property>metrics/bw-ft</property>
            <property>aero/function/mach-aileron</property>
          <table>
            <independentVar lookup="row">aero/alpha-deg</independentVar>
            <independentVar lookup="column">fcs/left-aileron-pos-deg</independentVar>
            <tableData>
                        -20.00    -15.00    -10.00     -5.00      0.00      5.00     10.00     15.00     20.00
             -180.00   0.00000   0.00000   0.00000   0.00000   0.00000   0.00000   0.00000   0.00000   0.00000
              -35.00  -0.01097  -0.01008  -0.00793  -0.00438   0.00000   0.00438   0.00793   0.01008   0.01097
              -11.00  -0.03924  -0.03350  -0.02492  -0.01328   0.00000   0.01328   0.02492   0.03350   0.03924
                4.00  -0.03975  -0.03394  -0.02524  -0.01345   0.00000   0.01345   0.02524   0.03394   0.03975
               19.00  -0.04932  -0.04288  -0.03259  -0.01772   0.00000   0.01772   0.03259   0.04288   0.04932
               42.00  -0.01173  -0.01054  -0.00814  -0.00443   0.00000   0.00443   0.00814   0.01054   0.01173
              180.00   0.00000   0.00000   0.00000   0.00000   0.00000   0.00000   0.00000   0.00000   0.00000
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            </tableData>
          </table>
          </product>
        </function>
        <function name="aero/coefficient/Cl_rudder">
          <description>Cl increment from rudder (deg), over alpha</description>
          <product>
            <property>aero/qbar-psf</property>
            <property>metrics/Sw-sqft</property>
            <property>metrics/bw-ft</property>
            <property>aero/function/mach-rudder</property>
          <table>
            <independentVar lookup="row">aero/alpha-deg</independentVar>
            <independentVar lookup="column">fcs/rudder-pos-deg</independentVar>
            <tableData>
                        -25.00    -20.00    -15.00    -10.00     -5.00      0.00      5.00     10.00     15.00     20.00     25.00
             -180.00   0.00000   0.00000   0.00000   0.00000   0.00000   0.00000   0.00000   0.00000   0.00000   0.00000   0.00000
              -35.00  -0.00493  -0.00444  -0.00376  -0.00278  -0.00148   0.00000   0.00148   0.00278   0.00376   0.00444   0.00493
              -11.00  -0.00614  -0.00552  -0.00467  -0.00345  -0.00183   0.00000   0.00183   0.00345   0.00467   0.00552   0.00614
                4.00  -0.00627  -0.00563  -0.00477  -0.00353  -0.00187   0.00000   0.00187   0.00353   0.00477   0.00563   0.00627
               19.00  -0.00548  -0.00493  -0.00418  -0.00309  -0.00164   0.00000   0.00164   0.00309   0.00418   0.00493   0.00548
               42.00  -0.00461  -0.00415  -0.00352  -0.00259  -0.00137   0.00000   0.00137   0.00259   0.00352   0.00415   0.00461
              180.00   0.00000   0.00000   0.00000   0.00000   0.00000   0.00000   0.00000   0.00000   0.00000   0.00000   0.00000
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            </tableData>
          </table>
          </product>
        </function>
        <function name="aero/coefficient/Clp">
          <description>Cl per p (non-dimensional), over alpha</description>
          <product>
            <property>aero/qbar-psf</property>
            <property>metrics/Sw-sqft</property>
            <property>metrics/bw-ft</property>
            <property>aero/bi2vel</property>
            <property>velocities/p-aero-rad_sec</property>
            <property>aero/function/mach-lift</property>
          <table>
            <independentVar lookup="row">aero/alpha-deg</independentVar>
            <tableData>
                 -180.00   -0.62713
                 -165.00   -0.14383
                  -32.00   -0.10685
                  -10.00   -0.41471
                    5.00   -0.39925
                   20.00    0.21410
                   46.00   -0.20128
                  180.00   -0.62713
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            </tableData>
          </table>
          </product>
        </function>
        <function name="aero/coefficient/Clr">
          <description>Cl per r (non-dimensional), over alpha</description>
          <product>
            <property>aero/qbar-psf</property>
            <property>metrics/Sw-sqft</property>
            <property>metrics/bw-ft</property>
            <property>aero/bi2vel</property>
            <property>velocities/r-aero-rad_sec</property>
            <property>aero/function/mach-lift</property>
          <table>
            <independentVar lookup="row">aero/alpha-deg</independentVar>
            <tableData>
                 -180.00    0.08413
                 -165.00    0.11827
                  -32.00   -0.14674
                  -10.00   -0.01786
                    5.00    0.14433
                   20.00    0.47616
                   46.00    0.19318
                  180.00    0.08413
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            </tableData>
          </table>
          </product>
        </function>
      </axis>
      <axis name="PITCH">
        <function name="aero/coefficient/Cm_base">
          <description>Cm over alpha and beta (hangar)</description>
          <product>
            <property>aero/qbar-psf</property>
            <property>metrics/Sw-sqft</property>
            <property>metrics/cbarw-ft</property>
          <table>
            <independentVar lookup="row">aero/alpha-deg</independentVar>
            <independentVar lookup="column">aero/beta-deg</independentVar>
            <tableData>
                        -90.00    -70.00    -50.00    -40.00    -30.00    -25.00    -20.00    -15.00    -10.00     -6.00     -3.00      0.00      3.00      6.00     10.00     15.00     20.00     25.00     30.00     40.00     50.00     70.00     90.00
             -180.00  -0.00000  -0.00059   0.00086  -0.00296  -0.00562  -0.00656  -0.00730  -0.00787  -0.00299  -0.00372  -0.00756  -0.00899  -0.00756  -0.00372  -0.00299  -0.00787  -0.00730  -0.00656  -0.00562  -0.00296   0.00086  -0.00059  -0.00000
              -35.00  -0.00000   0.06230   0.17708   0.23599   0.28981   0.31043   0.32416   0.32414   0.32222   0.32062   0.31971   0.31912   0.31971   0.32062   0.32222   0.32414   0.32416   0.31043   0.28981   0.23599   0.17708   0.06230  -0.00000
              -11.00  -0.00000  -0.00095   0.11607   0.12504   0.12940   0.14574   0.17355   0.19391   0.20870   0.21644   0.21977   0.22090   0.21977   0.21644   0.20870   0.19391   0.17355   0.14574   0.12940   0.12504   0.11607  -0.00095  -0.00000
                4.00  -0.00000   0.00254  -0.08132  -0.09014  -0.07114  -0.06853  -0.06752  -0.06700  -0.06684  -0.06698  -0.06713  -0.06714  -0.06713  -0.06698  -0.06684  -0.06700  -0.06752  -0.06853  -0.07114  -0.09014  -0.08132   0.00254  -0.00000
               19.00  -0.00000  -0.03178  -0.20346  -0.35697  -0.30875  -0.20870  -0.22379  -0.24470  -0.25991  -0.26740  -0.27045  -0.27144  -0.27045  -0.26740  -0.25991  -0.24470  -0.22379  -0.20870  -0.30875  -0.35697  -0.20346  -0.03178  -0.00000
               42.00  -0.00000  -0.07189  -0.22635  -0.31537  -0.37975  -0.39614  -0.42030  -0.42455  -0.43044  -0.43356  -0.43333  -0.43300  -0.43333  -0.43356  -0.43044  -0.42455  -0.42030  -0.39614  -0.37975  -0.31537  -0.22635  -0.07189  -0.00000
              180.00  -0.00000  -0.00059   0.00086  -0.00296  -0.00562  -0.00656  -0.00730  -0.00787  -0.00299  -0.00372  -0.00756  -0.00899  -0.00756  -0.00372  -0.00299  -0.00787  -0.00730  -0.00656  -0.00562  -0.00296   0.00086  -0.00059  -0.00000
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            </tableData>
          </table>
          </product>
        </function>
        <function name="aero/coefficient/Cm_mach">
          <description>Cm from the neutral point's move with Mach</description>
          <product>
            <property>aero/qbar-psf</property>
            <property>metrics/Sw-sqft</property>
            <property>metrics/cbarw-ft</property>
            <property>aero/function/CL-base</property>
            <property>aero/function/mach-dCm-dCL</property>
          </product>
        </function>
        <function name="aero/coefficient/Cm_elevator">
          <description>Cm increment from elevator (deg), over alpha</description>
          <product>
            <property>aero/qbar-psf</property>
            <property>metrics/Sw-sqft</property>
            <property>metrics/cbarw-ft</property>
            <property>aero/function/mach-elevator</property>
          <table>
            <independentVar lookup="row">aero/alpha-deg</independentVar>
            <independentVar lookup="column">fcs/elevator-pos-deg</independentVar>
            <tableData>
                        -25.00    -20.00    -15.00    -10.00     -5.00      0.00      5.00     10.00     15.00
             -180.00  -0.00070  -0.00046  -0.00026  -0.00012  -0.00003   0.00000  -0.00003  -0.00012  -0.00026
              -35.00   0.10308   0.09616   0.08521   0.06634   0.03688   0.00000  -0.03772  -0.06901  -0.08849
              -11.00   0.28006   0.25385   0.21677   0.16126   0.08596   0.00000  -0.08600  -0.16133  -0.21664
                4.00   0.28872   0.26180   0.22353   0.16614   0.08842   0.00000  -0.08812  -0.16507  -0.22150
               19.00   0.24848   0.22508   0.19184   0.14220   0.07542   0.00000  -0.07463  -0.13946  -0.18706
               42.00   0.09069   0.09135   0.08527   0.06828   0.03862   0.00000  -0.04193  -0.08069  -0.11043
              180.00  -0.00070  -0.00046  -0.00026  -0.00012  -0.00003   0.00000  -0.00003  -0.00012  -0.00026
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            </tableData>
          </table>
          </product>
        </function>
        <function name="aero/coefficient/Cm_flap">
          <description>Cm increment from flap (deg), over alpha</description>
          <product>
            <property>aero/qbar-psf</property>
            <property>metrics/Sw-sqft</property>
            <property>metrics/cbarw-ft</property>
            <property>aero/function/mach-flap</property>
          <table>
            <independentVar lookup="row">aero/alpha-deg</independentVar>
            <independentVar lookup="column">fcs/flap-pos-deg</independentVar>
            <tableData>
                          0.00      5.00     10.00     15.00     20.00     25.00     30.00     35.00     40.00     45.00     50.00
             -180.00   0.00000   0.00001   0.00003   0.00006   0.00011   0.00017   0.00024   0.00031   0.00039   0.00048   0.00056
              -35.00   0.00000  -0.00503  -0.01084  -0.01676  -0.02264  -0.02821  -0.03323  -0.03655  -0.03872  -0.03980  -0.03971
              -11.00   0.00000  -0.00714  -0.01438  -0.02149  -0.02826  -0.03467  -0.04084  -0.04698  -0.05329  -0.05900  -0.06496
                4.00   0.00000  -0.01466  -0.02986  -0.04493  -0.05927  -0.07273  -0.08554  -0.09808  -0.11067  -0.12158  -0.13231
               19.00   0.00000  -0.00189  -0.00457  -0.00995  -0.01733  -0.02592  -0.03541  -0.04553  -0.05631  -0.06683  -0.07796
               42.00   0.00000  -0.00731  -0.01414  -0.02014  -0.02522  -0.02951  -0.03325  -0.03674  -0.04025  -0.04323  -0.04645
              180.00   0.00000   0.00001   0.00003   0.00006   0.00011   0.00017   0.00024   0.00031   0.00039   0.00048   0.00056
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            </tableData>
          </table>
          </product>
        </function>
        <function name="aero/coefficient/Cmq">
          <description>Cm per q (non-dimensional), over alpha</description>
          <product>
            <property>aero/qbar-psf</property>
            <property>metrics/Sw-sqft</property>
            <property>metrics/cbarw-ft</property>
            <property>aero/ci2vel</property>
            <property>velocities/q-aero-rad_sec</property>
            <property>aero/function/mach-lift</property>
          <table>
            <independentVar lookup="row">aero/alpha-deg</independentVar>
            <tableData>
                 -180.00  -10.37594
                 -165.00   -1.03201
                  -32.00   -5.44230
                  -10.00  -14.70434
                    5.00  -14.97643
                   20.00  -10.91213
                   46.00   -9.24540
                  180.00  -10.37594
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            </tableData>
          </table>
          </product>
        </function>
        <function name="aero/coefficient/Cmadot">
          <description>Cm per alpha-dot (downwash lag at the tail)</description>
          <product>
            <property>aero/qbar-psf</property>
            <property>metrics/Sw-sqft</property>
            <property>metrics/cbarw-ft</property>
            <property>aero/ci2vel</property>
            <property>aero/alphadot-rad_sec</property>
            <value>-2.41330</value>
            <property>aero/function/mach-lift</property>
          </product>
        </function>
        <function name="aero/coefficient/Cm_spoilers">
          <description>spoilers: its drag's pitching moment, 0.03 m from the reference point's height</description>
          <product>
            <property>aero/qbar-psf</property>
            <property>metrics/Sw-sqft</property>
            <property>metrics/cbarw-ft</property>
            <value>0.000357471</value>
            <pow>
              <sin>
                <product>
                  <property>fcs/speedbrake-pos-norm</property>
                  <value>1.0472</value>
                </product>
              </sin>
              <value>2</value>
            </pow>
          </product>
        </function>
        <function name="aero/coefficient/Cm_spoilers_lift">
          <description>spoilers: the lift lost's pitching moment, -0.57 m from the reference point</description>
          <product>
            <property>aero/qbar-psf</property>
            <property>metrics/Sw-sqft</property>
            <property>metrics/cbarw-ft</property>
            <table>
              <independentVar lookup="row">aero/alpha-deg</independentVar>
              <tableData>
                   -180.00   -0.00223
                   -165.00   -0.01257
                    -32.00    0.04479
                    -10.00    0.02419
                      5.00   -0.02025
                     20.00   -0.05577
                     46.00   -0.04191
                    180.00   -0.00223
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              </tableData>
            </table>
            <min>
              <value>1</value>
              <product>
                <property>fcs/speedbrake-pos-norm</property>
                <value>1.33333</value>
              </product>
            </min>
          </product>
        </function>
        <function name="aero/coefficient/Cm_gear">
          <description>the gear's drag's pitching moment, -2.69 m from the reference point's height</description>
          <product>
            <property>aero/qbar-psf</property>
            <property>metrics/Sw-sqft</property>
            <property>metrics/cbarw-ft</property>
            <value>-0.0016785</value>
            <property>gear/gear-pos-norm</property>
          </product>
        </function>
      </axis>
      <axis name="YAW">
        <function name="aero/coefficient/Cn_base">
          <description>Cn over alpha and beta (hangar)</description>
          <product>
            <property>aero/qbar-psf</property>
            <property>metrics/Sw-sqft</property>
            <property>metrics/bw-ft</property>
            <property>aero/function/mach-side</property>
          <table>
            <independentVar lookup="row">aero/alpha-deg</independentVar>
            <independentVar lookup="column">aero/beta-deg</independentVar>
            <tableData>
                        -90.00    -70.00    -50.00    -40.00    -30.00    -25.00    -20.00    -15.00    -10.00     -6.00     -3.00      0.00      3.00      6.00     10.00     15.00     20.00     25.00     30.00     40.00     50.00     70.00     90.00
             -180.00  -0.07438  -0.08848  -0.08956  -0.08250  -0.06842  -0.05926  -0.04893  -0.03762  -0.03898  -0.04090  -0.02201  -0.00000   0.02201   0.04090   0.03898   0.03762   0.04893   0.05926   0.06842   0.08250   0.08956   0.08848   0.07438
              -35.00  -0.07438  -0.05710  -0.04144  -0.03310  -0.03198  -0.02989  -0.04187  -0.02969  -0.01882  -0.01103  -0.00549  -0.00000   0.00549   0.01103   0.01882   0.02969   0.04187   0.02989   0.03198   0.03310   0.04144   0.05710   0.07438
              -11.00  -0.07438  -0.05556  -0.04394  -0.04298  -0.03936  -0.04579  -0.03978  -0.03121  -0.02142  -0.01303  -0.00655  -0.00000   0.00655   0.01303   0.02142   0.03121   0.03978   0.04579   0.03936   0.04298   0.04394   0.05556   0.07438
                4.00  -0.07438  -0.05576  -0.02231  -0.03112  -0.02107  -0.02026  -0.01779  -0.01414  -0.00974  -0.00593  -0.00298  -0.00000   0.00298   0.00593   0.00974   0.01414   0.01779   0.02026   0.02107   0.03112   0.02231   0.05576   0.07438
               19.00  -0.07438  -0.05284  -0.03582  -0.03312  -0.03469  -0.02556  -0.02236  -0.01767  -0.01225  -0.00718  -0.00350  -0.00000   0.00350   0.00718   0.01225   0.01767   0.02236   0.02556   0.03469   0.03312   0.03582   0.05284   0.07438
               42.00  -0.07438  -0.05945  -0.04290  -0.03487  -0.03022  -0.03026  -0.03592  -0.03212  -0.02097  -0.01261  -0.00648  -0.00000   0.00648   0.01261   0.02097   0.03212   0.03592   0.03026   0.03022   0.03487   0.04290   0.05945   0.07438
              180.00  -0.07438  -0.08848  -0.08956  -0.08250  -0.06842  -0.05926  -0.04893  -0.03762  -0.03898  -0.04090  -0.02201  -0.00000   0.02201   0.04090   0.03898   0.03762   0.04893   0.05926   0.06842   0.08250   0.08956   0.08848   0.07438
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            </tableData>
          </table>
          </product>
        </function>
        <function name="aero/coefficient/Cn_aileron">
          <description>Cn increment from aileron (deg), over alpha</description>
          <product>
            <property>aero/qbar-psf</property>
            <property>metrics/Sw-sqft</property>
            <property>metrics/bw-ft</property>
            <property>aero/function/mach-aileron</property>
          <table>
            <independentVar lookup="row">aero/alpha-deg</independentVar>
            <independentVar lookup="column">fcs/left-aileron-pos-deg</independentVar>
            <tableData>
                        -20.00    -15.00    -10.00     -5.00      0.00      5.00     10.00     15.00     20.00
             -180.00  -0.00000  -0.00000  -0.00000  -0.00000   0.00000  -0.00000  -0.00000  -0.00000  -0.00000
              -35.00   0.01780   0.01502   0.01109   0.00589   0.00000  -0.00589  -0.01109  -0.01502  -0.01780
              -11.00   0.00374   0.00316   0.00233   0.00123   0.00000  -0.00123  -0.00233  -0.00316  -0.00374
                4.00  -0.00018  -0.00017  -0.00013  -0.00007   0.00000   0.00007   0.00013   0.00017   0.00018
               19.00  -0.01581  -0.01275  -0.00868  -0.00413   0.00000   0.00413   0.00868   0.01275   0.01581
               42.00  -0.01730  -0.01463  -0.01080  -0.00574   0.00000   0.00574   0.01080   0.01463   0.01730
              180.00  -0.00000  -0.00000  -0.00000  -0.00000   0.00000  -0.00000  -0.00000  -0.00000  -0.00000
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            </tableData>
          </table>
          </product>
        </function>
        <function name="aero/coefficient/Cn_rudder">
          <description>Cn increment from rudder (deg), over alpha</description>
          <product>
            <property>aero/qbar-psf</property>
            <property>metrics/Sw-sqft</property>
            <property>metrics/bw-ft</property>
            <property>aero/function/mach-rudder</property>
          <table>
            <independentVar lookup="row">aero/alpha-deg</independentVar>
            <independentVar lookup="column">fcs/rudder-pos-deg</independentVar>
            <tableData>
                        -25.00    -20.00    -15.00    -10.00     -5.00      0.00      5.00     10.00     15.00     20.00     25.00
             -180.00  -0.00000  -0.00000  -0.00000  -0.00000  -0.00000   0.00000  -0.00000  -0.00000  -0.00000  -0.00000  -0.00000
              -35.00   0.02000   0.01803   0.01532   0.01135   0.00603   0.00000  -0.00603  -0.01135  -0.01532  -0.01803  -0.02000
              -11.00   0.02656   0.02394   0.02034   0.01506   0.00801   0.00000  -0.00801  -0.01506  -0.02034  -0.02394  -0.02656
                4.00   0.02754   0.02482   0.02108   0.01562   0.00830   0.00000  -0.00830  -0.01562  -0.02108  -0.02482  -0.02754
               19.00   0.02341   0.02111   0.01794   0.01330   0.00707   0.00000  -0.00707  -0.01330  -0.01794  -0.02111  -0.02341
               42.00   0.01930   0.01742   0.01481   0.01089   0.00576   0.00000  -0.00576  -0.01089  -0.01481  -0.01742  -0.01930
              180.00  -0.00000  -0.00000  -0.00000  -0.00000  -0.00000   0.00000  -0.00000  -0.00000  -0.00000  -0.00000  -0.00000
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            </tableData>
          </table>
          </product>
        </function>
        <function name="aero/coefficient/Cnp">
          <description>Cn per p (non-dimensional), over alpha</description>
          <product>
            <property>aero/qbar-psf</property>
            <property>metrics/Sw-sqft</property>
            <property>metrics/bw-ft</property>
            <property>aero/bi2vel</property>
            <property>velocities/p-aero-rad_sec</property>
            <property>aero/function/mach-lift</property>
          <table>
            <independentVar lookup="row">aero/alpha-deg</independentVar>
            <tableData>
                 -180.00    0.11902
                 -165.00    0.10254
                  -32.00    0.06766
                  -10.00    0.13854
                    5.00   -0.04701
                   20.00    0.01941
                   46.00    0.04229
                  180.00    0.11902
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            </tableData>
          </table>
          </product>
        </function>
        <function name="aero/coefficient/Cnr">
          <description>Cn per r (non-dimensional), over alpha</description>
          <product>
            <property>aero/qbar-psf</property>
            <property>metrics/Sw-sqft</property>
            <property>metrics/bw-ft</property>
            <property>aero/bi2vel</property>
            <property>velocities/r-aero-rad_sec</property>
            <property>aero/function/mach-lift</property>
          <table>
            <independentVar lookup="row">aero/alpha-deg</independentVar>
            <tableData>
                 -180.00   -0.27840
                 -165.00   -0.27817
                  -32.00   -0.13765
                  -10.00   -0.18906
                    5.00   -0.17149
                   20.00   -0.10593
                   46.00   -0.18093
                  180.00   -0.27840
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            </tableData>
          </table>
          </product>
        </function>
      </axis>
    </aerodynamics>
</fdm_config>
