<?xml version="1.0"?>
<?xml-stylesheet type="text/xsl" href="http://jsbsim.sourceforge.net/JSBSim.xsl"?>
<!-- Generated by hangar 0.1.0 from e7a.toml on 2026-10-01. Edit the design and rebuild; changes
     made here are overwritten.  -->
<fdm_config name="e7a" version="2.0" release="ALPHA"
            xmlns:xsi="http://www.w3.org/2001/XMLSchema-instance"
            xsi:noNamespaceSchemaLocation="http://jsbsim.sourceforge.net/JSBSim.xsd">
    <fileheader>
      <author>hangar</author>
      <filecreationdate>2026-10-01</filecreationdate>
      <version>0.1.0</version>
      <description>Boeing E-7A Wedgetail (hangar build)</description>
      <note>Aerodynamics: vortex lattice with viscous section polars, full-envelope
        strip model, slender-body fuselage (hangar). Mass: Raymer component
        weights on the geometry. Propeller: blade-element momentum theory.</note>
      <reference refID="fsim/applicability/aerobatic" author="the design" title="Royal Australian Air Force E-7A data: a large AEW&amp;C aircraft, not cleared for aerobatics" date="n/a"/>
      <reference refID="fsim/applicability/carrier" author="the design" title="Royal Australian Air Force E-7A data: a land-based AEW&amp;C aircraft" date="n/a"/>
      <reference refID="fsim/applicability/drag_devices" author="the design" title="Boeing 737-700 data: flight and ground spoilers" date="n/a"/>
      <reference refID="fsim/applicability/flaps" author="the design" title="Boeing 737-700 data: trailing-edge flaps" date="n/a"/>
      <reference refID="fsim/applicability/ground_contact" author="the design" title="Boeing 737-700 data: tricycle wheeled gear" date="n/a"/>
      <reference refID="fsim/applicability/releasable_stores" author="the design" title="Royal Australian Air Force E-7A data: unarmed" date="n/a"/>
      <reference refID="fsim/applicability/retractable_gear" author="the design" title="Boeing 737-700 data: retractable gear" date="n/a"/>
      <reference refID="fsim/applicability/vertical_flight" author="the design" title="Royal Australian Air Force and Boeing E-7A data: the Boeing 737-700 airframe, a conventional jet. Conventional take-off and landing: no rotors, lift fans or vectored lift to hover" date="n/a"/>
    </fileheader>
    <metrics>
      <wingarea unit="M2"> 124.6000 </wingarea>
      <wingspan unit="M"> 34.3200 </wingspan>
      <chord unit="M"> 5.0935 </chord>
      <htailarea unit="M2"> 37.6890 </htailarea>
      <htailarm unit="M"> 16.6097 </htailarm>
      <vtailarea unit="M2"> 29.1720 </vtailarea>
      <vtailarm unit="M"> 14.9844 </vtailarm>
      <location name="AERORP" unit="M">
        <x> 15.5141 </x>
        <y> 0.0000 </y>
        <z> -0.4817 </z>
      </location>
      <location name="EYEPOINT" unit="M">
        <x> 15.5141 </x>
        <y> 0.0000 </y>
        <z> -0.4817 </z>
      </location>
      <location name="VRP" unit="M">
        <x> 16.0000 </x>
        <y> -0.0000 </y>
        <z> 0.2000 </z>
      </location>
    </metrics>
    <mass_balance negated_crossproduct_inertia="false">
      <ixx unit="KG*M2"> 716362.67 </ixx>
      <iyy unit="KG*M2"> 2318323.33 </iyy>
      <izz unit="KG*M2"> 2777950.70 </izz>
      <ixy unit="KG*M2"> 0.232 </ixy>
      <ixz unit="KG*M2"> 185837.201 </ixz>
      <iyz unit="KG*M2"> -0.375 </iyz>
      <emptywt unit="KG"> 46606.00 </emptywt>
      <location name="CG" unit="M">
        <x> 16.0000 </x>
        <y> -0.0000 </y>
        <z> 0.2000 </z>
      </location>
      <pointmass name="flight crew">
        <weight unit="KG"> 200.00 </weight>
        <location unit="M">
          <x> 3.0000 </x>
          <y> 0.0000 </y>
          <z> 0.6000 </z>
        </location>
      </pointmass>
      <pointmass name="mission crew">
        <weight unit="KG"> 1000.00 </weight>
        <location unit="M">
          <x> 15.0000 </x>
          <y> 0.0000 </y>
          <z> 0.3000 </z>
        </location>
      </pointmass>
    </mass_balance>
    <ground_reactions>
      <contact type="BOGEY" name="Nose Gear">
        <location unit="M">
          <x> 4.0800 </x>
          <y> 0.0000 </y>
          <z> -3.1400 </z>
        </location>
        <static_friction> 0.8 </static_friction>
        <dynamic_friction> 0.5 </dynamic_friction>
        <rolling_friction> 0.02 </rolling_friction>
        <spring_coeff unit="N/M"> 442569 </spring_coeff>
        <damping_coeff unit="N/M/SEC"> 44691 </damping_coeff>
        <damping_coeff_rebound unit="N/M/SEC"> 89382 </damping_coeff_rebound>
        <max_steer unit="DEG"> 60.0 </max_steer>
        <brake_group> NONE </brake_group>
        <retractable> 1 </retractable>
      </contact>
      <contact type="BOGEY" name="Left Main Gear">
        <location unit="M">
          <x> 16.9000 </x>
          <y> -2.8600 </y>
          <z> -3.1400 </z>
        </location>
        <static_friction> 0.8 </static_friction>
        <dynamic_friction> 0.5 </dynamic_friction>
        <rolling_friction> 0.02 </rolling_friction>
        <spring_coeff unit="N/M"> 2281250 </spring_coeff>
        <damping_coeff unit="N/M/SEC"> 252350 </damping_coeff>
        <damping_coeff_rebound unit="N/M/SEC"> 504700 </damping_coeff_rebound>
        <max_steer unit="DEG"> 0.0 </max_steer>
        <brake_group> LEFT </brake_group>
        <retractable> 1 </retractable>
      </contact>
      <contact type="BOGEY" name="Right Main Gear">
        <location unit="M">
          <x> 16.9000 </x>
          <y> 2.8600 </y>
          <z> -3.1400 </z>
        </location>
        <static_friction> 0.8 </static_friction>
        <dynamic_friction> 0.5 </dynamic_friction>
        <rolling_friction> 0.02 </rolling_friction>
        <spring_coeff unit="N/M"> 2281250 </spring_coeff>
        <damping_coeff unit="N/M/SEC"> 252350 </damping_coeff>
        <damping_coeff_rebound unit="N/M/SEC"> 504700 </damping_coeff_rebound>
        <max_steer unit="DEG"> 0.0 </max_steer>
        <brake_group> RIGHT </brake_group>
        <retractable> 1 </retractable>
      </contact>
      <contact type="STRUCTURE" name="ESM pod left bottom">
        <location unit="M">
          <x> 19.3000 </x>
          <y> -17.0600 </y>
          <z> 0.6400 </z>
        </location>
        <static_friction> 0.8 </static_friction>
        <dynamic_friction> 0.6 </dynamic_friction>
        <spring_coeff unit="N/M"> 1017671 </spring_coeff>
        <damping_coeff unit="N/M/SEC"> 33922 </damping_coeff>
        <damping_coeff_rebound unit="N/M/SEC"> 33922 </damping_coeff_rebound>
      </contact>
      <contact type="STRUCTURE" name="ESM pod left rear">
        <location unit="M">
          <x> 22.3000 </x>
          <y> -17.0600 </y>
          <z> 0.6400 </z>
        </location>
        <static_friction> 0.8 </static_friction>
        <dynamic_friction> 0.6 </dynamic_friction>
        <spring_coeff unit="N/M"> 989874 </spring_coeff>
        <damping_coeff unit="N/M/SEC"> 32996 </damping_coeff>
        <damping_coeff_rebound unit="N/M/SEC"> 32996 </damping_coeff_rebound>
      </contact>
      <contact type="STRUCTURE" name="ESM pod right bottom">
        <location unit="M">
          <x> 19.3000 </x>
          <y> 17.0600 </y>
          <z> 0.6400 </z>
        </location>
        <static_friction> 0.8 </static_friction>
        <dynamic_friction> 0.6 </dynamic_friction>
        <spring_coeff unit="N/M"> 1017671 </spring_coeff>
        <damping_coeff unit="N/M/SEC"> 33922 </damping_coeff>
        <damping_coeff_rebound unit="N/M/SEC"> 33922 </damping_coeff_rebound>
      </contact>
      <contact type="STRUCTURE" name="ESM pod right rear">
        <location unit="M">
          <x> 22.3000 </x>
          <y> 17.0600 </y>
          <z> 0.6400 </z>
        </location>
        <static_friction> 0.8 </static_friction>
        <dynamic_friction> 0.6 </dynamic_friction>
        <spring_coeff unit="N/M"> 989874 </spring_coeff>
        <damping_coeff unit="N/M/SEC"> 32996 </damping_coeff>
        <damping_coeff_rebound unit="N/M/SEC"> 32996 </damping_coeff_rebound>
      </contact>
      <contact type="STRUCTURE" name="fin rear">
        <location unit="M">
          <x> 34.8200 </x>
          <y> 0.0000 </y>
          <z> 9.4500 </z>
        </location>
        <static_friction> 0.8 </static_friction>
        <dynamic_friction> 0.6 </dynamic_friction>
        <spring_coeff unit="N/M"> 3755144 </spring_coeff>
        <damping_coeff unit="N/M/SEC"> 125171 </damping_coeff>
        <damping_coeff_rebound unit="N/M/SEC"> 125171 </damping_coeff_rebound>
      </contact>
      <contact type="STRUCTURE" name="fuselage front">
        <location unit="M">
          <x> 0.0700 </x>
          <y> 0.0000 </y>
          <z> -0.7889 </z>
        </location>
        <static_friction> 0.8 </static_friction>
        <dynamic_friction> 0.6 </dynamic_friction>
        <spring_coeff unit="N/M"> 6852504 </spring_coeff>
        <damping_coeff unit="N/M/SEC"> 228417 </damping_coeff>
        <damping_coeff_rebound unit="N/M/SEC"> 228417 </damping_coeff_rebound>
      </contact>
      <contact type="STRUCTURE" name="htail left rear">
        <location unit="M">
          <x> 35.0892 </x>
          <y> -7.1742 </y>
          <z> 2.5988 </z>
        </location>
        <static_friction> 0.8 </static_friction>
        <dynamic_friction> 0.6 </dynamic_friction>
        <spring_coeff unit="N/M"> 3529510 </spring_coeff>
        <damping_coeff unit="N/M/SEC"> 117650 </damping_coeff>
        <damping_coeff_rebound unit="N/M/SEC"> 117650 </damping_coeff_rebound>
      </contact>
      <contact type="STRUCTURE" name="htail right rear">
        <location unit="M">
          <x> 35.0892 </x>
          <y> 7.1742 </y>
          <z> 2.5988 </z>
        </location>
        <static_friction> 0.8 </static_friction>
        <dynamic_friction> 0.6 </dynamic_friction>
        <spring_coeff unit="N/M"> 3529510 </spring_coeff>
        <damping_coeff unit="N/M/SEC"> 117650 </damping_coeff>
        <damping_coeff_rebound unit="N/M/SEC"> 117650 </damping_coeff_rebound>
      </contact>
      <contact type="STRUCTURE" name="nacelle left front">
        <location unit="M">
          <x> 10.9011 </x>
          <y> -5.2319 </y>
          <z> -2.6739 </z>
        </location>
        <static_friction> 0.8 </static_friction>
        <dynamic_friction> 0.6 </dynamic_friction>
        <spring_coeff unit="N/M"> 11137048 </spring_coeff>
        <damping_coeff unit="N/M/SEC"> 371235 </damping_coeff>
        <damping_coeff_rebound unit="N/M/SEC"> 371235 </damping_coeff_rebound>
      </contact>
      <contact type="STRUCTURE" name="nacelle right front">
        <location unit="M">
          <x> 10.9011 </x>
          <y> 5.2319 </y>
          <z> -2.6739 </z>
        </location>
        <static_friction> 0.8 </static_friction>
        <dynamic_friction> 0.6 </dynamic_friction>
        <spring_coeff unit="N/M"> 11137045 </spring_coeff>
        <damping_coeff unit="N/M/SEC"> 371235 </damping_coeff>
        <damping_coeff_rebound unit="N/M/SEC"> 371235 </damping_coeff_rebound>
      </contact>
      <contact type="STRUCTURE" name="top hat front">
        <location unit="M">
          <x> 12.1000 </x>
          <y> 0.0000 </y>
          <z> 5.4141 </z>
        </location>
        <static_friction> 0.8 </static_friction>
        <dynamic_friction> 0.6 </dynamic_friction>
        <spring_coeff unit="N/M"> 12946784 </spring_coeff>
        <damping_coeff unit="N/M/SEC"> 431559 </damping_coeff>
        <damping_coeff_rebound unit="N/M/SEC"> 431559 </damping_coeff_rebound>
      </contact>
      <contact type="STRUCTURE" name="ventral fin left rear">
        <location unit="M">
          <x> 29.2000 </x>
          <y> -1.2500 </y>
          <z> -1.4500 </z>
        </location>
        <static_friction> 0.8 </static_friction>
        <dynamic_friction> 0.6 </dynamic_friction>
        <spring_coeff unit="N/M"> 4424314 </spring_coeff>
        <damping_coeff unit="N/M/SEC"> 147477 </damping_coeff>
        <damping_coeff_rebound unit="N/M/SEC"> 147477 </damping_coeff_rebound>
      </contact>
      <contact type="STRUCTURE" name="ventral fin right rear">
        <location unit="M">
          <x> 29.2000 </x>
          <y> 1.2500 </y>
          <z> -1.4500 </z>
        </location>
        <static_friction> 0.8 </static_friction>
        <dynamic_friction> 0.6 </dynamic_friction>
        <spring_coeff unit="N/M"> 4424314 </spring_coeff>
        <damping_coeff unit="N/M/SEC"> 147477 </damping_coeff>
        <damping_coeff_rebound unit="N/M/SEC"> 147477 </damping_coeff_rebound>
      </contact>
    </ground_reactions>
    <propulsion>
      <engine file="e7a_engine0">
        <location unit="M">
          <x> 13.2000 </x>
          <y> -4.8500 </y>
          <z> -1.7800 </z>
        </location>
        <feed>0</feed>
        <feed>1</feed>
        <feed>2</feed>
        <thruster file="e7a_nozzle0">
          <location unit="M">
            <x> 15.7000 </x>
            <y> -4.8500 </y>
            <z> -1.7800 </z>
          </location>
          <orient unit="DEG"> <roll>0.00</roll> <pitch>0.00</pitch> <yaw>0.00</yaw> </orient>

        </thruster>
      </engine>
      <engine file="e7a_engine0">
        <location unit="M">
          <x> 13.2000 </x>
          <y> 4.8500 </y>
          <z> -1.7800 </z>
        </location>
        <feed>0</feed>
        <feed>1</feed>
        <feed>2</feed>
        <thruster file="e7a_nozzle0">
          <location unit="M">
            <x> 15.7000 </x>
            <y> 4.8500 </y>
            <z> -1.7800 </z>
          </location>
          <orient unit="DEG"> <roll>0.00</roll> <pitch>0.00</pitch> <yaw>0.00</yaw> </orient>

        </thruster>
      </engine>
      <tank type="FUEL">
        <location unit="M">
          <x> 15.5000 </x>
          <y> 0.0000 </y>
          <z> -1.2500 </z>
        </location>
        <capacity unit="KG"> 10360.00 </capacity>
        <contents unit="KG"> 6216.00 </contents>
      </tank>
      <tank type="FUEL">
        <location unit="M">
          <x> 16.5000 </x>
          <y> -7.0000 </y>
          <z> -0.4000 </z>
        </location>
        <capacity unit="KG"> 5267.00 </capacity>
        <contents unit="KG"> 3160.20 </contents>
      </tank>
      <tank type="FUEL">
        <location unit="M">
          <x> 16.5000 </x>
          <y> 7.0000 </y>
          <z> -0.4000 </z>
        </location>
        <capacity unit="KG"> 5267.00 </capacity>
        <contents unit="KG"> 3160.20 </contents>
      </tank>
    </propulsion>
    <flight_control name="e7a">
      <!-- the aircraft's profile for the platform (docs/control-architecture.md, section 7): what
           hangar knows of it - its design, its flight tests, its identified responses -->
      <property value="1">fsim/identity/version</property>
      <property value="1">fsim/identity/provenance</property>
      <property value="7">fsim/identity/class</property>
      <property value="1">fsim/identity/family</property>
      <property value="1">fsim/effectors/version</property>
      <property value="1">fsim/effectors/provenance</property>
      <property value="1">fsim/effectors/flaps</property>
      <property value="8">fsim/effectors/flaps_transit_s</property>
      <property value="0.0">fsim/effectors/neutral</property>
      <property value="0.0">fsim/effectors/pitch</property>
      <property value="1">fsim/effectors/pitch_trim</property>
      <property value="1">fsim/effectors/retractable_gear</property>
      <property value="0.0">fsim/effectors/roll</property>
      <property value="1">fsim/effectors/speedbrake</property>
      <property value="1">fsim/effectors/wheel_brakes</property>
      <property value="0.0">fsim/effectors/yaw</property>
      <property value="1">fsim/envelope/version</property>
      <property value="1">fsim/envelope/provenance</property>
      <property value="23.6249">fsim/envelope/clean/alpha_max_deg</property>
      <property value="62.095">fsim/envelope/clean/cas_min_ms</property>
      <property value="16.98">fsim/envelope/crosswind_max_ms</property>
      <property value="83.34">fsim/envelope/flaps/cas_max_ms</property>
      <property value="0.75">fsim/envelope/flaps_threshold</property>
      <property value="120.89">fsim/envelope/gear_cas_max_ms</property>
      <property value="7.27">fsim/envelope/ground_pitch_max_deg</property>
      <property value="8.1">fsim/envelope/ground_turn_radius_m</property>
      <property value="0.0465">fsim/envelope/ground_yaw_accel_rad_s2</property>
      <property value="1">fsim/propulsion/version</property>
      <property value="1">fsim/propulsion/provenance</property>
      <property value="0.0">fsim/propulsion/afterburner</property>
      <property value="2">fsim/propulsion/engines</property>
      <property value="0.288127">fsim/propulsion/spool_s</property>
      <property value="2">fsim/propulsion/type</property>
      <property value="1">fsim/plant/version</property>
      <property value="1">fsim/plant/provenance</property>
      <property value="-2.39115">fsim/plant/alpha_zero_lift_deg</property>
      <property value="3000">fsim/plant/altitude_m</property>
      <property value="150.342">fsim/plant/eas_ms</property>
      <property value="0.176034">fsim/plant/elevator_trim</property>
      <property value="-0.11167">fsim/plant/elevator_trim_lift</property>
      <property value="6.21328">fsim/plant/pitch/gain</property>
      <property value="0.495785">fsim/plant/pitch/tau_s</property>
      <property value="0.894463">fsim/plant/roll/gain</property>
      <property value="0.308127">fsim/plant/roll/tau_s</property>
      <property value="2.79519">fsim/plant/speed/gain</property>
      <property value="0.288127">fsim/plant/speed/tau_s</property>
      <property value="172.762">fsim/plant/tas_ms</property>
      <property value="0.566242">fsim/plant/throttle_trim</property>
      <property value="0.901398">fsim/plant/yaw/gain</property>
      <property value="1">fsim/performance/version</property>
      <property value="1">fsim/performance/provenance</property>
      <property value="12083.4">fsim/performance/ceiling_m</property>
      <property value="276.289">fsim/performance/max_tas_ms</property>
      <property value="62.095">fsim/performance/stall_cas_ms</property>
      <property value="50.9988">fsim/performance/stall_flaps_cas_ms</property>
      <property value="1">fsim/applicability/version</property>
      <property value="1">fsim/applicability/provenance</property>
      <property value="0.0">fsim/applicability/aerobatic</property>
      <property value="1">fsim/applicability/carrier</property>
      <property value="2">fsim/applicability/drag_devices</property>
      <property value="1">fsim/applicability/flaps</property>
      <property value="1">fsim/applicability/ground_contact</property>
      <property value="1">fsim/applicability/releasable_stores</property>
      <property value="1">fsim/applicability/retractable_gear</property>
      <property value="0.0">fsim/applicability/vertical_flight</property>
      <property value="1">fsim/tables/version</property>
      <property value="1">fsim/tables/provenance</property>
      <property value="100">fsim/tables/altitude_m/h0</property>
      <property value="2420">fsim/tables/altitude_m/h1</property>
      <property value="4830">fsim/tables/altitude_m/h2</property>
      <property value="7250">fsim/tables/altitude_m/h3</property>
      <property value="9060">fsim/tables/altitude_m/h4</property>
      <property value="10270">fsim/tables/altitude_m/h5</property>
      <property value="10668">fsim/tables/altitude_m/h6</property>
      <property value="11480">fsim/tables/altitude_m/h7</property>
      <property value="0.434529">fsim/tables/best_endurance_fuel_kg_s/h0/w0</property>
      <property value="0.491941">fsim/tables/best_endurance_fuel_kg_s/h0/w1</property>
      <property value="0.548137">fsim/tables/best_endurance_fuel_kg_s/h0/w2</property>
      <property value="0.392654">fsim/tables/best_endurance_fuel_kg_s/h1/w0</property>
      <property value="0.444006">fsim/tables/best_endurance_fuel_kg_s/h1/w1</property>
      <property value="0.493697">fsim/tables/best_endurance_fuel_kg_s/h1/w2</property>
      <property value="0.34939">fsim/tables/best_endurance_fuel_kg_s/h2/w0</property>
      <property value="0.396081">fsim/tables/best_endurance_fuel_kg_s/h2/w1</property>
      <property value="0.441486">fsim/tables/best_endurance_fuel_kg_s/h2/w2</property>
      <property value="0.309415">fsim/tables/best_endurance_fuel_kg_s/h3/w0</property>
      <property value="0.351361">fsim/tables/best_endurance_fuel_kg_s/h3/w1</property>
      <property value="0.393379">fsim/tables/best_endurance_fuel_kg_s/h3/w2</property>
      <property value="0.280996">fsim/tables/best_endurance_fuel_kg_s/h4/w0</property>
      <property value="0.321084">fsim/tables/best_endurance_fuel_kg_s/h4/w1</property>
      <property value="0.361358">fsim/tables/best_endurance_fuel_kg_s/h4/w2</property>
      <property value="0.264632">fsim/tables/best_endurance_fuel_kg_s/h5/w0</property>
      <property value="0.304412">fsim/tables/best_endurance_fuel_kg_s/h5/w1</property>
      <property value="0.345525">fsim/tables/best_endurance_fuel_kg_s/h5/w2</property>
      <property value="0.259015">fsim/tables/best_endurance_fuel_kg_s/h6/w0</property>
      <property value="0.299345">fsim/tables/best_endurance_fuel_kg_s/h6/w1</property>
      <property value="0.34131">fsim/tables/best_endurance_fuel_kg_s/h6/w2</property>
      <property value="0.251536">fsim/tables/best_endurance_fuel_kg_s/h7/w0</property>
      <property value="0.293029">fsim/tables/best_endurance_fuel_kg_s/h7/w1</property>
      <property value="0.316652">fsim/tables/best_endurance_fuel_kg_s/h7/w2</property>
      <property value="97.948">fsim/tables/best_endurance_tas_ms/h0/w0</property>
      <property value="106.359">fsim/tables/best_endurance_tas_ms/h0/w1</property>
      <property value="113.918">fsim/tables/best_endurance_tas_ms/h0/w2</property>
      <property value="109.572">fsim/tables/best_endurance_tas_ms/h1/w0</property>
      <property value="118.966">fsim/tables/best_endurance_tas_ms/h1/w1</property>
      <property value="128.032">fsim/tables/best_endurance_tas_ms/h1/w2</property>
      <property value="123.995">fsim/tables/best_endurance_tas_ms/h2/w0</property>
      <property value="133.475">fsim/tables/best_endurance_tas_ms/h2/w1</property>
      <property value="143.265">fsim/tables/best_endurance_tas_ms/h2/w2</property>
      <property value="139.422">fsim/tables/best_endurance_tas_ms/h3/w0</property>
      <property value="151.968">fsim/tables/best_endurance_tas_ms/h3/w1</property>
      <property value="165.673">fsim/tables/best_endurance_tas_ms/h3/w2</property>
      <property value="155.096">fsim/tables/best_endurance_tas_ms/h4/w0</property>
      <property value="168.627">fsim/tables/best_endurance_tas_ms/h4/w1</property>
      <property value="181.232">fsim/tables/best_endurance_tas_ms/h4/w2</property>
      <property value="166.289">fsim/tables/best_endurance_tas_ms/h5/w0</property>
      <property value="183.316">fsim/tables/best_endurance_tas_ms/h5/w1</property>
      <property value="196.653">fsim/tables/best_endurance_tas_ms/h5/w2</property>
      <property value="172.489">fsim/tables/best_endurance_tas_ms/h6/w0</property>
      <property value="187.859">fsim/tables/best_endurance_tas_ms/h6/w1</property>
      <property value="200.925">fsim/tables/best_endurance_tas_ms/h6/w2</property>
      <property value="182.352">fsim/tables/best_endurance_tas_ms/h7/w0</property>
      <property value="197.165">fsim/tables/best_endurance_tas_ms/h7/w1</property>
      <property value="200.13">fsim/tables/best_endurance_tas_ms/h7/w2</property>
      <property value="0.542993">fsim/tables/best_range_fuel_kg_s/h0/w0</property>
      <property value="0.60993">fsim/tables/best_range_fuel_kg_s/h0/w1</property>
      <property value="0.676774">fsim/tables/best_range_fuel_kg_s/h0/w2</property>
      <property value="0.487844">fsim/tables/best_range_fuel_kg_s/h1/w0</property>
      <property value="0.553184">fsim/tables/best_range_fuel_kg_s/h1/w1</property>
      <property value="0.613227">fsim/tables/best_range_fuel_kg_s/h1/w2</property>
      <property value="0.432734">fsim/tables/best_range_fuel_kg_s/h2/w0</property>
      <property value="0.484542">fsim/tables/best_range_fuel_kg_s/h2/w1</property>
      <property value="0.532537">fsim/tables/best_range_fuel_kg_s/h2/w2</property>
      <property value="0.37324">fsim/tables/best_range_fuel_kg_s/h3/w0</property>
      <property value="0.414867">fsim/tables/best_range_fuel_kg_s/h3/w1</property>
      <property value="0.442877">fsim/tables/best_range_fuel_kg_s/h3/w2</property>
      <property value="0.322513">fsim/tables/best_range_fuel_kg_s/h4/w0</property>
      <property value="0.349742">fsim/tables/best_range_fuel_kg_s/h4/w1</property>
      <property value="0.383303">fsim/tables/best_range_fuel_kg_s/h4/w2</property>
      <property value="0.287752">fsim/tables/best_range_fuel_kg_s/h5/w0</property>
      <property value="0.320453">fsim/tables/best_range_fuel_kg_s/h5/w1</property>
      <property value="0.356681">fsim/tables/best_range_fuel_kg_s/h5/w2</property>
      <property value="0.278749">fsim/tables/best_range_fuel_kg_s/h6/w0</property>
      <property value="0.310666">fsim/tables/best_range_fuel_kg_s/h6/w1</property>
      <property value="0.354784">fsim/tables/best_range_fuel_kg_s/h6/w2</property>
      <property value="0.264249">fsim/tables/best_range_fuel_kg_s/h7/w0</property>
      <property value="0.303914">fsim/tables/best_range_fuel_kg_s/h7/w1</property>
      <property value="0.325721">fsim/tables/best_range_fuel_kg_s/h7/w2</property>
      <property value="143.784">fsim/tables/best_range_tas_ms/h0/w0</property>
      <property value="155.384">fsim/tables/best_range_tas_ms/h0/w1</property>
      <property value="167.094">fsim/tables/best_range_tas_ms/h0/w2</property>
      <property value="160.245">fsim/tables/best_range_tas_ms/h1/w0</property>
      <property value="174.573">fsim/tables/best_range_tas_ms/h1/w1</property>
      <property value="187.057">fsim/tables/best_range_tas_ms/h1/w2</property>
      <property value="179.601">fsim/tables/best_range_tas_ms/h2/w0</property>
      <property value="192.866">fsim/tables/best_range_tas_ms/h2/w1</property>
      <property value="203.809">fsim/tables/best_range_tas_ms/h2/w2</property>
      <property value="198.484">fsim/tables/best_range_tas_ms/h3/w0</property>
      <property value="210.034">fsim/tables/best_range_tas_ms/h3/w1</property>
      <property value="212.953">fsim/tables/best_range_tas_ms/h3/w2</property>
      <property value="206.648">fsim/tables/best_range_tas_ms/h4/w0</property>
      <property value="209.886">fsim/tables/best_range_tas_ms/h4/w1</property>
      <property value="213.819">fsim/tables/best_range_tas_ms/h4/w2</property>
      <property value="206.479">fsim/tables/best_range_tas_ms/h5/w0</property>
      <property value="210.219">fsim/tables/best_range_tas_ms/h5/w1</property>
      <property value="214.006">fsim/tables/best_range_tas_ms/h5/w2</property>
      <property value="206.671">fsim/tables/best_range_tas_ms/h6/w0</property>
      <property value="209.182">fsim/tables/best_range_tas_ms/h6/w1</property>
      <property value="216.835">fsim/tables/best_range_tas_ms/h6/w2</property>
      <property value="207.914">fsim/tables/best_range_tas_ms/h7/w0</property>
      <property value="213.885">fsim/tables/best_range_tas_ms/h7/w1</property>
      <property value="216.274">fsim/tables/best_range_tas_ms/h7/w2</property>
      <property value="188.644">fsim/tables/climb_tas_ms/h0/w0</property>
      <property value="188.166">fsim/tables/climb_tas_ms/h0/w1</property>
      <property value="192.29">fsim/tables/climb_tas_ms/h0/w2</property>
      <property value="206.695">fsim/tables/climb_tas_ms/h1/w0</property>
      <property value="205.636">fsim/tables/climb_tas_ms/h1/w1</property>
      <property value="212.532">fsim/tables/climb_tas_ms/h1/w2</property>
      <property value="216.027">fsim/tables/climb_tas_ms/h2/w0</property>
      <property value="222.246">fsim/tables/climb_tas_ms/h2/w1</property>
      <property value="222.743">fsim/tables/climb_tas_ms/h2/w2</property>
      <property value="215.264">fsim/tables/climb_tas_ms/h3/w0</property>
      <property value="213.273">fsim/tables/climb_tas_ms/h3/w1</property>
      <property value="216.887">fsim/tables/climb_tas_ms/h3/w2</property>
      <property value="211.42">fsim/tables/climb_tas_ms/h4/w0</property>
      <property value="209.887">fsim/tables/climb_tas_ms/h4/w1</property>
      <property value="212.156">fsim/tables/climb_tas_ms/h4/w2</property>
      <property value="206.438">fsim/tables/climb_tas_ms/h5/w0</property>
      <property value="208.568">fsim/tables/climb_tas_ms/h5/w1</property>
      <property value="210.934">fsim/tables/climb_tas_ms/h5/w2</property>
      <property value="207.231">fsim/tables/climb_tas_ms/h6/w0</property>
      <property value="207.179">fsim/tables/climb_tas_ms/h6/w1</property>
      <property value="215.889">fsim/tables/climb_tas_ms/h6/w2</property>
      <property value="206.121">fsim/tables/climb_tas_ms/h7/w0</property>
      <property value="212.845">fsim/tables/climb_tas_ms/h7/w1</property>
      <property value="208.823">fsim/tables/climb_tas_ms/h7/w2</property>
      <property value="20894">fsim/tables/fuel_capacity_kg</property>
      <property value="0.442401">fsim/tables/fuel_kg_s/h0/w0/v0</property>
      <property value="0.434644">fsim/tables/fuel_kg_s/h0/w0/v1</property>
      <property value="0.844406">fsim/tables/fuel_kg_s/h0/w0/v10</property>
      <property value="0.90864">fsim/tables/fuel_kg_s/h0/w0/v11</property>
      <property value="0.978503">fsim/tables/fuel_kg_s/h0/w0/v12</property>
      <property value="1.0764">fsim/tables/fuel_kg_s/h0/w0/v13</property>
      <property value="1.20724">fsim/tables/fuel_kg_s/h0/w0/v14</property>
      <property value="1.35746">fsim/tables/fuel_kg_s/h0/w0/v15</property>
      <property value="0.446664">fsim/tables/fuel_kg_s/h0/w0/v2</property>
      <property value="0.473942">fsim/tables/fuel_kg_s/h0/w0/v3</property>
      <property value="0.51235">fsim/tables/fuel_kg_s/h0/w0/v4</property>
      <property value="0.557194">fsim/tables/fuel_kg_s/h0/w0/v5</property>
      <property value="0.606995">fsim/tables/fuel_kg_s/h0/w0/v6</property>
      <property value="0.660223">fsim/tables/fuel_kg_s/h0/w0/v7</property>
      <property value="0.719356">fsim/tables/fuel_kg_s/h0/w0/v8</property>
      <property value="0.781072">fsim/tables/fuel_kg_s/h0/w0/v9</property>
      <property value="0.51496">fsim/tables/fuel_kg_s/h0/w1/v0</property>
      <property value="0.493605">fsim/tables/fuel_kg_s/h0/w1/v1</property>
      <property value="0.857996">fsim/tables/fuel_kg_s/h0/w1/v10</property>
      <property value="0.920751">fsim/tables/fuel_kg_s/h0/w1/v11</property>
      <property value="0.985916">fsim/tables/fuel_kg_s/h0/w1/v12</property>
      <property value="1.08112">fsim/tables/fuel_kg_s/h0/w1/v13</property>
      <property value="1.21181">fsim/tables/fuel_kg_s/h0/w1/v14</property>
      <property value="1.35996">fsim/tables/fuel_kg_s/h0/w1/v15</property>
      <property value="0.496858">fsim/tables/fuel_kg_s/h0/w1/v2</property>
      <property value="0.516816">fsim/tables/fuel_kg_s/h0/w1/v3</property>
      <property value="0.547521">fsim/tables/fuel_kg_s/h0/w1/v4</property>
      <property value="0.586862">fsim/tables/fuel_kg_s/h0/w1/v5</property>
      <property value="0.633543">fsim/tables/fuel_kg_s/h0/w1/v6</property>
      <property value="0.683775">fsim/tables/fuel_kg_s/h0/w1/v7</property>
      <property value="0.736871">fsim/tables/fuel_kg_s/h0/w1/v8</property>
      <property value="0.79675">fsim/tables/fuel_kg_s/h0/w1/v9</property>
      <property value="0.586854">fsim/tables/fuel_kg_s/h0/w2/v0</property>
      <property value="0.553016">fsim/tables/fuel_kg_s/h0/w2/v1</property>
      <property value="0.873949">fsim/tables/fuel_kg_s/h0/w2/v10</property>
      <property value="0.935763">fsim/tables/fuel_kg_s/h0/w2/v11</property>
      <property value="0.999917">fsim/tables/fuel_kg_s/h0/w2/v12</property>
      <property value="1.09383">fsim/tables/fuel_kg_s/h0/w2/v13</property>
      <property value="1.21773">fsim/tables/fuel_kg_s/h0/w2/v14</property>
      <property value="1.36295">fsim/tables/fuel_kg_s/h0/w2/v15</property>
      <property value="0.548549">fsim/tables/fuel_kg_s/h0/w2/v2</property>
      <property value="0.560328">fsim/tables/fuel_kg_s/h0/w2/v3</property>
      <property value="0.585853">fsim/tables/fuel_kg_s/h0/w2/v4</property>
      <property value="0.620851">fsim/tables/fuel_kg_s/h0/w2/v5</property>
      <property value="0.66041">fsim/tables/fuel_kg_s/h0/w2/v6</property>
      <property value="0.709332">fsim/tables/fuel_kg_s/h0/w2/v7</property>
      <property value="0.759798">fsim/tables/fuel_kg_s/h0/w2/v8</property>
      <property value="0.813635">fsim/tables/fuel_kg_s/h0/w2/v9</property>
      <property value="0.417952">fsim/tables/fuel_kg_s/h1/w0/v0</property>
      <property value="0.395825">fsim/tables/fuel_kg_s/h1/w0/v1</property>
      <property value="0.655716">fsim/tables/fuel_kg_s/h1/w0/v10</property>
      <property value="0.705901">fsim/tables/fuel_kg_s/h1/w0/v11</property>
      <property value="0.758017">fsim/tables/fuel_kg_s/h1/w0/v12</property>
      <property value="0.841327">fsim/tables/fuel_kg_s/h1/w0/v13</property>
      <property value="0.941568">fsim/tables/fuel_kg_s/h1/w0/v14</property>
      <property value="1.05476">fsim/tables/fuel_kg_s/h1/w0/v15</property>
      <property value="0.393233">fsim/tables/fuel_kg_s/h1/w0/v2</property>
      <property value="0.403555">fsim/tables/fuel_kg_s/h1/w0/v3</property>
      <property value="0.424548">fsim/tables/fuel_kg_s/h1/w0/v4</property>
      <property value="0.453552">fsim/tables/fuel_kg_s/h1/w0/v5</property>
      <property value="0.485949">fsim/tables/fuel_kg_s/h1/w0/v6</property>
      <property value="0.524316">fsim/tables/fuel_kg_s/h1/w0/v7</property>
      <property value="0.563511">fsim/tables/fuel_kg_s/h1/w0/v8</property>
      <property value="0.607648">fsim/tables/fuel_kg_s/h1/w0/v9</property>
      <property value="0.486324">fsim/tables/fuel_kg_s/h1/w1/v0</property>
      <property value="0.454707">fsim/tables/fuel_kg_s/h1/w1/v1</property>
      <property value="0.672479">fsim/tables/fuel_kg_s/h1/w1/v10</property>
      <property value="0.721625">fsim/tables/fuel_kg_s/h1/w1/v11</property>
      <property value="0.77258">fsim/tables/fuel_kg_s/h1/w1/v12</property>
      <property value="0.856047">fsim/tables/fuel_kg_s/h1/w1/v13</property>
      <property value="0.952032">fsim/tables/fuel_kg_s/h1/w1/v14</property>
      <property value="1.05871">fsim/tables/fuel_kg_s/h1/w1/v15</property>
      <property value="0.444254">fsim/tables/fuel_kg_s/h1/w1/v2</property>
      <property value="0.449183">fsim/tables/fuel_kg_s/h1/w1/v3</property>
      <property value="0.464481">fsim/tables/fuel_kg_s/h1/w1/v4</property>
      <property value="0.486937">fsim/tables/fuel_kg_s/h1/w1/v5</property>
      <property value="0.517179">fsim/tables/fuel_kg_s/h1/w1/v6</property>
      <property value="0.550014">fsim/tables/fuel_kg_s/h1/w1/v7</property>
      <property value="0.588455">fsim/tables/fuel_kg_s/h1/w1/v8</property>
      <property value="0.627945">fsim/tables/fuel_kg_s/h1/w1/v9</property>
      <property value="0.55533">fsim/tables/fuel_kg_s/h1/w2/v0</property>
      <property value="0.514582">fsim/tables/fuel_kg_s/h1/w2/v1</property>
      <property value="0.692319">fsim/tables/fuel_kg_s/h1/w2/v10</property>
      <property value="0.737047">fsim/tables/fuel_kg_s/h1/w2/v11</property>
      <property value="0.786914">fsim/tables/fuel_kg_s/h1/w2/v12</property>
      <property value="0.870493">fsim/tables/fuel_kg_s/h1/w2/v13</property>
      <property value="0.964248">fsim/tables/fuel_kg_s/h1/w2/v14</property>
      <property value="1.06822">fsim/tables/fuel_kg_s/h1/w2/v15</property>
      <property value="0.496424">fsim/tables/fuel_kg_s/h1/w2/v2</property>
      <property value="0.494405">fsim/tables/fuel_kg_s/h1/w2/v3</property>
      <property value="0.504813">fsim/tables/fuel_kg_s/h1/w2/v4</property>
      <property value="0.524201">fsim/tables/fuel_kg_s/h1/w2/v5</property>
      <property value="0.548986">fsim/tables/fuel_kg_s/h1/w2/v6</property>
      <property value="0.578972">fsim/tables/fuel_kg_s/h1/w2/v7</property>
      <property value="0.612762">fsim/tables/fuel_kg_s/h1/w2/v8</property>
      <property value="0.651478">fsim/tables/fuel_kg_s/h1/w2/v9</property>
      <property value="0.391756">fsim/tables/fuel_kg_s/h2/w0/v0</property>
      <property value="0.362934">fsim/tables/fuel_kg_s/h2/w0/v1</property>
      <property value="0.497653">fsim/tables/fuel_kg_s/h2/w0/v10</property>
      <property value="0.531642">fsim/tables/fuel_kg_s/h2/w0/v11</property>
      <property value="0.570171">fsim/tables/fuel_kg_s/h2/w0/v12</property>
      <property value="0.633123">fsim/tables/fuel_kg_s/h2/w0/v13</property>
      <property value="0.702245">fsim/tables/fuel_kg_s/h2/w0/v14</property>
      <property value="0.807849">fsim/tables/fuel_kg_s/h2/w0/v15</property>
      <property value="0.351234">fsim/tables/fuel_kg_s/h2/w0/v2</property>
      <property value="0.350029">fsim/tables/fuel_kg_s/h2/w0/v3</property>
      <property value="0.358131">fsim/tables/fuel_kg_s/h2/w0/v4</property>
      <property value="0.372872">fsim/tables/fuel_kg_s/h2/w0/v5</property>
      <property value="0.391617">fsim/tables/fuel_kg_s/h2/w0/v6</property>
      <property value="0.413495">fsim/tables/fuel_kg_s/h2/w0/v7</property>
      <property value="0.438946">fsim/tables/fuel_kg_s/h2/w0/v8</property>
      <property value="0.467276">fsim/tables/fuel_kg_s/h2/w0/v9</property>
      <property value="0.456566">fsim/tables/fuel_kg_s/h2/w1/v0</property>
      <property value="0.420385">fsim/tables/fuel_kg_s/h2/w1/v1</property>
      <property value="0.519833">fsim/tables/fuel_kg_s/h2/w1/v10</property>
      <property value="0.550348">fsim/tables/fuel_kg_s/h2/w1/v11</property>
      <property value="0.586136">fsim/tables/fuel_kg_s/h2/w1/v12</property>
      <property value="0.647202">fsim/tables/fuel_kg_s/h2/w1/v13</property>
      <property value="0.714049">fsim/tables/fuel_kg_s/h2/w1/v14</property>
      <property value="0.808959">fsim/tables/fuel_kg_s/h2/w1/v15</property>
      <property value="0.401036">fsim/tables/fuel_kg_s/h2/w1/v2</property>
      <property value="0.396107">fsim/tables/fuel_kg_s/h2/w1/v3</property>
      <property value="0.399688">fsim/tables/fuel_kg_s/h2/w1/v4</property>
      <property value="0.409064">fsim/tables/fuel_kg_s/h2/w1/v5</property>
      <property value="0.42444">fsim/tables/fuel_kg_s/h2/w1/v6</property>
      <property value="0.443398">fsim/tables/fuel_kg_s/h2/w1/v7</property>
      <property value="0.465199">fsim/tables/fuel_kg_s/h2/w1/v8</property>
      <property value="0.490276">fsim/tables/fuel_kg_s/h2/w1/v9</property>
      <property value="0.522782">fsim/tables/fuel_kg_s/h2/w2/v0</property>
      <property value="0.476733">fsim/tables/fuel_kg_s/h2/w2/v1</property>
      <property value="0.541608">fsim/tables/fuel_kg_s/h2/w2/v10</property>
      <property value="0.57129">fsim/tables/fuel_kg_s/h2/w2/v11</property>
      <property value="0.607178">fsim/tables/fuel_kg_s/h2/w2/v12</property>
      <property value="0.661877">fsim/tables/fuel_kg_s/h2/w2/v13</property>
      <property value="0.725915">fsim/tables/fuel_kg_s/h2/w2/v14</property>
      <property value="0.810119">fsim/tables/fuel_kg_s/h2/w2/v15</property>
      <property value="0.453543">fsim/tables/fuel_kg_s/h2/w2/v2</property>
      <property value="0.442799">fsim/tables/fuel_kg_s/h2/w2/v3</property>
      <property value="0.44201">fsim/tables/fuel_kg_s/h2/w2/v4</property>
      <property value="0.448212">fsim/tables/fuel_kg_s/h2/w2/v5</property>
      <property value="0.459043">fsim/tables/fuel_kg_s/h2/w2/v6</property>
      <property value="0.473989">fsim/tables/fuel_kg_s/h2/w2/v7</property>
      <property value="0.493741">fsim/tables/fuel_kg_s/h2/w2/v8</property>
      <property value="0.51594">fsim/tables/fuel_kg_s/h2/w2/v9</property>
      <property value="0.365061">fsim/tables/fuel_kg_s/h3/w0/v0</property>
      <property value="0.333216">fsim/tables/fuel_kg_s/h3/w0/v1</property>
      <property value="0.378278">fsim/tables/fuel_kg_s/h3/w0/v10</property>
      <property value="0.398933">fsim/tables/fuel_kg_s/h3/w0/v11</property>
      <property value="0.424333">fsim/tables/fuel_kg_s/h3/w0/v12</property>
      <property value="0.462406">fsim/tables/fuel_kg_s/h3/w0/v13</property>
      <property value="0.506725">fsim/tables/fuel_kg_s/h3/w0/v14</property>
      <property value="0.569959">fsim/tables/fuel_kg_s/h3/w0/v15</property>
      <property value="0.317408">fsim/tables/fuel_kg_s/h3/w0/v2</property>
      <property value="0.310364">fsim/tables/fuel_kg_s/h3/w0/v3</property>
      <property value="0.309745">fsim/tables/fuel_kg_s/h3/w0/v4</property>
      <property value="0.313922">fsim/tables/fuel_kg_s/h3/w0/v5</property>
      <property value="0.321262">fsim/tables/fuel_kg_s/h3/w0/v6</property>
      <property value="0.331638">fsim/tables/fuel_kg_s/h3/w0/v7</property>
      <property value="0.345161">fsim/tables/fuel_kg_s/h3/w0/v8</property>
      <property value="0.360633">fsim/tables/fuel_kg_s/h3/w0/v9</property>
      <property value="0.426237">fsim/tables/fuel_kg_s/h3/w1/v0</property>
      <property value="0.387">fsim/tables/fuel_kg_s/h3/w1/v1</property>
      <property value="0.403273">fsim/tables/fuel_kg_s/h3/w1/v10</property>
      <property value="0.419344">fsim/tables/fuel_kg_s/h3/w1/v11</property>
      <property value="0.445346">fsim/tables/fuel_kg_s/h3/w1/v12</property>
      <property value="0.481835">fsim/tables/fuel_kg_s/h3/w1/v13</property>
      <property value="0.521701">fsim/tables/fuel_kg_s/h3/w1/v14</property>
      <property value="0.570698">fsim/tables/fuel_kg_s/h3/w1/v15</property>
      <property value="0.367986">fsim/tables/fuel_kg_s/h3/w1/v2</property>
      <property value="0.356017">fsim/tables/fuel_kg_s/h3/w1/v3</property>
      <property value="0.351735">fsim/tables/fuel_kg_s/h3/w1/v4</property>
      <property value="0.352234">fsim/tables/fuel_kg_s/h3/w1/v5</property>
      <property value="0.356897">fsim/tables/fuel_kg_s/h3/w1/v6</property>
      <property value="0.364209">fsim/tables/fuel_kg_s/h3/w1/v7</property>
      <property value="0.374375">fsim/tables/fuel_kg_s/h3/w1/v8</property>
      <property value="0.387577">fsim/tables/fuel_kg_s/h3/w1/v9</property>
      <property value="0.4899">fsim/tables/fuel_kg_s/h3/w2/v0</property>
      <property value="0.443226">fsim/tables/fuel_kg_s/h3/w2/v1</property>
      <property value="0.429278">fsim/tables/fuel_kg_s/h3/w2/v10</property>
      <property value="0.444778">fsim/tables/fuel_kg_s/h3/w2/v11</property>
      <property value="0.467322">fsim/tables/fuel_kg_s/h3/w2/v12</property>
      <property value="0.50055">fsim/tables/fuel_kg_s/h3/w2/v13</property>
      <property value="0.538608">fsim/tables/fuel_kg_s/h3/w2/v14</property>
      <property value="0.580129">fsim/tables/fuel_kg_s/h3/w2/v15</property>
      <property value="0.420525">fsim/tables/fuel_kg_s/h3/w2/v2</property>
      <property value="0.405664">fsim/tables/fuel_kg_s/h3/w2/v3</property>
      <property value="0.397021">fsim/tables/fuel_kg_s/h3/w2/v4</property>
      <property value="0.393702">fsim/tables/fuel_kg_s/h3/w2/v5</property>
      <property value="0.393972">fsim/tables/fuel_kg_s/h3/w2/v6</property>
      <property value="0.398869">fsim/tables/fuel_kg_s/h3/w2/v7</property>
      <property value="0.406257">fsim/tables/fuel_kg_s/h3/w2/v8</property>
      <property value="0.416749">fsim/tables/fuel_kg_s/h3/w2/v9</property>
      <property value="0.344448">fsim/tables/fuel_kg_s/h4/w0/v0</property>
      <property value="0.311181">fsim/tables/fuel_kg_s/h4/w0/v1</property>
      <property value="0.312468">fsim/tables/fuel_kg_s/h4/w0/v10</property>
      <property value="0.324219">fsim/tables/fuel_kg_s/h4/w0/v11</property>
      <property value="0.341054">fsim/tables/fuel_kg_s/h4/w0/v12</property>
      <property value="0.367632">fsim/tables/fuel_kg_s/h4/w0/v13</property>
      <property value="0.396593">fsim/tables/fuel_kg_s/h4/w0/v14</property>
      <property value="0.428264">fsim/tables/fuel_kg_s/h4/w0/v15</property>
      <property value="0.296753">fsim/tables/fuel_kg_s/h4/w0/v2</property>
      <property value="0.286744">fsim/tables/fuel_kg_s/h4/w0/v3</property>
      <property value="0.282022">fsim/tables/fuel_kg_s/h4/w0/v4</property>
      <property value="0.281016">fsim/tables/fuel_kg_s/h4/w0/v5</property>
      <property value="0.28266">fsim/tables/fuel_kg_s/h4/w0/v6</property>
      <property value="0.286445">fsim/tables/fuel_kg_s/h4/w0/v7</property>
      <property value="0.293487">fsim/tables/fuel_kg_s/h4/w0/v8</property>
      <property value="0.301429">fsim/tables/fuel_kg_s/h4/w0/v9</property>
      <property value="0.404232">fsim/tables/fuel_kg_s/h4/w1/v0</property>
      <property value="0.367285">fsim/tables/fuel_kg_s/h4/w1/v1</property>
      <property value="0.339935">fsim/tables/fuel_kg_s/h4/w1/v10</property>
      <property value="0.348944">fsim/tables/fuel_kg_s/h4/w1/v11</property>
      <property value="0.366077">fsim/tables/fuel_kg_s/h4/w1/v12</property>
      <property value="0.388156">fsim/tables/fuel_kg_s/h4/w1/v13</property>
      <property value="0.413094">fsim/tables/fuel_kg_s/h4/w1/v14</property>
      <property value="0.442656">fsim/tables/fuel_kg_s/h4/w1/v15</property>
      <property value="0.347779">fsim/tables/fuel_kg_s/h4/w1/v2</property>
      <property value="0.335095">fsim/tables/fuel_kg_s/h4/w1/v3</property>
      <property value="0.326209">fsim/tables/fuel_kg_s/h4/w1/v4</property>
      <property value="0.321887">fsim/tables/fuel_kg_s/h4/w1/v5</property>
      <property value="0.321099">fsim/tables/fuel_kg_s/h4/w1/v6</property>
      <property value="0.322384">fsim/tables/fuel_kg_s/h4/w1/v7</property>
      <property value="0.32598">fsim/tables/fuel_kg_s/h4/w1/v8</property>
      <property value="0.332241">fsim/tables/fuel_kg_s/h4/w1/v9</property>
      <property value="0.42886">fsim/tables/fuel_kg_s/h4/w2/v0</property>
      <property value="0.428555">fsim/tables/fuel_kg_s/h4/w2/v1</property>
      <property value="0.370471">fsim/tables/fuel_kg_s/h4/w2/v10</property>
      <property value="0.377814">fsim/tables/fuel_kg_s/h4/w2/v11</property>
      <property value="0.39179">fsim/tables/fuel_kg_s/h4/w2/v12</property>
      <property value="0.412118">fsim/tables/fuel_kg_s/h4/w2/v13</property>
      <property value="0.434742">fsim/tables/fuel_kg_s/h4/w2/v14</property>
      <property value="0.459287">fsim/tables/fuel_kg_s/h4/w2/v15</property>
      <property value="0.403018">fsim/tables/fuel_kg_s/h4/w2/v2</property>
      <property value="0.387078">fsim/tables/fuel_kg_s/h4/w2/v3</property>
      <property value="0.375109">fsim/tables/fuel_kg_s/h4/w2/v4</property>
      <property value="0.366865">fsim/tables/fuel_kg_s/h4/w2/v5</property>
      <property value="0.362139">fsim/tables/fuel_kg_s/h4/w2/v6</property>
      <property value="0.361358">fsim/tables/fuel_kg_s/h4/w2/v7</property>
      <property value="0.362201">fsim/tables/fuel_kg_s/h4/w2/v8</property>
      <property value="0.365515">fsim/tables/fuel_kg_s/h4/w2/v9</property>
      <property value="0.333107">fsim/tables/fuel_kg_s/h5/w0/v0</property>
      <property value="0.302068">fsim/tables/fuel_kg_s/h5/w0/v1</property>
      <property value="0.279941">fsim/tables/fuel_kg_s/h5/w0/v10</property>
      <property value="0.287102">fsim/tables/fuel_kg_s/h5/w0/v11</property>
      <property value="0.3013">fsim/tables/fuel_kg_s/h5/w0/v12</property>
      <property value="0.319339">fsim/tables/fuel_kg_s/h5/w0/v13</property>
      <property value="0.339437">fsim/tables/fuel_kg_s/h5/w0/v14</property>
      <property value="0.363556">fsim/tables/fuel_kg_s/h5/w0/v15</property>
      <property value="0.286229">fsim/tables/fuel_kg_s/h5/w0/v2</property>
      <property value="0.275969">fsim/tables/fuel_kg_s/h5/w0/v3</property>
      <property value="0.268658">fsim/tables/fuel_kg_s/h5/w0/v4</property>
      <property value="0.265287">fsim/tables/fuel_kg_s/h5/w0/v5</property>
      <property value="0.26464">fsim/tables/fuel_kg_s/h5/w0/v6</property>
      <property value="0.265621">fsim/tables/fuel_kg_s/h5/w0/v7</property>
      <property value="0.268639">fsim/tables/fuel_kg_s/h5/w0/v8</property>
      <property value="0.273619">fsim/tables/fuel_kg_s/h5/w0/v9</property>
      <property value="0.422932">fsim/tables/fuel_kg_s/h5/w1/v0</property>
      <property value="0.360905">fsim/tables/fuel_kg_s/h5/w1/v1</property>
      <property value="0.31046">fsim/tables/fuel_kg_s/h5/w1/v10</property>
      <property value="0.316436">fsim/tables/fuel_kg_s/h5/w1/v11</property>
      <property value="0.328191">fsim/tables/fuel_kg_s/h5/w1/v12</property>
      <property value="0.343387">fsim/tables/fuel_kg_s/h5/w1/v13</property>
      <property value="0.361605">fsim/tables/fuel_kg_s/h5/w1/v14</property>
      <property value="0.38133">fsim/tables/fuel_kg_s/h5/w1/v15</property>
      <property value="0.339983">fsim/tables/fuel_kg_s/h5/w1/v2</property>
      <property value="0.326971">fsim/tables/fuel_kg_s/h5/w1/v3</property>
      <property value="0.317134">fsim/tables/fuel_kg_s/h5/w1/v4</property>
      <property value="0.309776">fsim/tables/fuel_kg_s/h5/w1/v5</property>
      <property value="0.305915">fsim/tables/fuel_kg_s/h5/w1/v6</property>
      <property value="0.304849">fsim/tables/fuel_kg_s/h5/w1/v7</property>
      <property value="0.30471">fsim/tables/fuel_kg_s/h5/w1/v8</property>
      <property value="0.307485">fsim/tables/fuel_kg_s/h5/w1/v9</property>
      <property value="0.378572">fsim/tables/fuel_kg_s/h5/w2/v0</property>
      <property value="0.373634">fsim/tables/fuel_kg_s/h5/w2/v1</property>
      <property value="0.349309">fsim/tables/fuel_kg_s/h5/w2/v10</property>
      <property value="0.356484">fsim/tables/fuel_kg_s/h5/w2/v11</property>
      <property value="0.366457">fsim/tables/fuel_kg_s/h5/w2/v12</property>
      <property value="0.377104">fsim/tables/fuel_kg_s/h5/w2/v13</property>
      <property value="0.388479">fsim/tables/fuel_kg_s/h5/w2/v14</property>
      <property value="0.40214">fsim/tables/fuel_kg_s/h5/w2/v15</property>
      <property value="0.365003">fsim/tables/fuel_kg_s/h5/w2/v2</property>
      <property value="0.357598">fsim/tables/fuel_kg_s/h5/w2/v3</property>
      <property value="0.35243">fsim/tables/fuel_kg_s/h5/w2/v4</property>
      <property value="0.348805">fsim/tables/fuel_kg_s/h5/w2/v5</property>
      <property value="0.346951">fsim/tables/fuel_kg_s/h5/w2/v6</property>
      <property value="0.345992">fsim/tables/fuel_kg_s/h5/w2/v7</property>
      <property value="0.345654">fsim/tables/fuel_kg_s/h5/w2/v8</property>
      <property value="0.347491">fsim/tables/fuel_kg_s/h5/w2/v9</property>
      <property value="0.331002">fsim/tables/fuel_kg_s/h6/w0/v0</property>
      <property value="0.299552">fsim/tables/fuel_kg_s/h6/w0/v1</property>
      <property value="0.270886">fsim/tables/fuel_kg_s/h6/w0/v10</property>
      <property value="0.276738">fsim/tables/fuel_kg_s/h6/w0/v11</property>
      <property value="0.289176">fsim/tables/fuel_kg_s/h6/w0/v12</property>
      <property value="0.30565">fsim/tables/fuel_kg_s/h6/w0/v13</property>
      <property value="0.323537">fsim/tables/fuel_kg_s/h6/w0/v14</property>
      <property value="0.343997">fsim/tables/fuel_kg_s/h6/w0/v15</property>
      <property value="0.283429">fsim/tables/fuel_kg_s/h6/w0/v2</property>
      <property value="0.273102">fsim/tables/fuel_kg_s/h6/w0/v3</property>
      <property value="0.265575">fsim/tables/fuel_kg_s/h6/w0/v4</property>
      <property value="0.261326">fsim/tables/fuel_kg_s/h6/w0/v5</property>
      <property value="0.259586">fsim/tables/fuel_kg_s/h6/w0/v6</property>
      <property value="0.259251">fsim/tables/fuel_kg_s/h6/w0/v7</property>
      <property value="0.261997">fsim/tables/fuel_kg_s/h6/w0/v8</property>
      <property value="0.265069">fsim/tables/fuel_kg_s/h6/w0/v9</property>
      <property value="0.328593">fsim/tables/fuel_kg_s/h6/w1/v0</property>
      <property value="0.319476">fsim/tables/fuel_kg_s/h6/w1/v1</property>
      <property value="0.306421">fsim/tables/fuel_kg_s/h6/w1/v10</property>
      <property value="0.314628">fsim/tables/fuel_kg_s/h6/w1/v11</property>
      <property value="0.324584">fsim/tables/fuel_kg_s/h6/w1/v12</property>
      <property value="0.335282">fsim/tables/fuel_kg_s/h6/w1/v13</property>
      <property value="0.349065">fsim/tables/fuel_kg_s/h6/w1/v14</property>
      <property value="0.363743">fsim/tables/fuel_kg_s/h6/w1/v15</property>
      <property value="0.312367">fsim/tables/fuel_kg_s/h6/w1/v2</property>
      <property value="0.306119">fsim/tables/fuel_kg_s/h6/w1/v3</property>
      <property value="0.302938">fsim/tables/fuel_kg_s/h6/w1/v4</property>
      <property value="0.30044">fsim/tables/fuel_kg_s/h6/w1/v5</property>
      <property value="0.299902">fsim/tables/fuel_kg_s/h6/w1/v6</property>
      <property value="0.299478">fsim/tables/fuel_kg_s/h6/w1/v7</property>
      <property value="0.301519">fsim/tables/fuel_kg_s/h6/w1/v8</property>
      <property value="0.303514">fsim/tables/fuel_kg_s/h6/w1/v9</property>
      <property value="0.401436">fsim/tables/fuel_kg_s/h6/w2/v0</property>
      <property value="0.352813">fsim/tables/fuel_kg_s/h6/w2/v1</property>
      <property value="0.343087">fsim/tables/fuel_kg_s/h6/w2/v10</property>
      <property value="0.348736">fsim/tables/fuel_kg_s/h6/w2/v11</property>
      <property value="0.355281">fsim/tables/fuel_kg_s/h6/w2/v12</property>
      <property value="0.364687">fsim/tables/fuel_kg_s/h6/w2/v13</property>
      <property value="0.37413">fsim/tables/fuel_kg_s/h6/w2/v14</property>
      <property value="0.383592">fsim/tables/fuel_kg_s/h6/w2/v15</property>
      <property value="0.358919">fsim/tables/fuel_kg_s/h6/w2/v2</property>
      <property value="0.355786">fsim/tables/fuel_kg_s/h6/w2/v3</property>
      <property value="0.350939">fsim/tables/fuel_kg_s/h6/w2/v4</property>
      <property value="0.347473">fsim/tables/fuel_kg_s/h6/w2/v5</property>
      <property value="0.343699">fsim/tables/fuel_kg_s/h6/w2/v6</property>
      <property value="0.342711">fsim/tables/fuel_kg_s/h6/w2/v7</property>
      <property value="0.341577">fsim/tables/fuel_kg_s/h6/w2/v8</property>
      <property value="0.341477">fsim/tables/fuel_kg_s/h6/w2/v9</property>
      <property value="0.349725">fsim/tables/fuel_kg_s/h7/w0/v0</property>
      <property value="0.298907">fsim/tables/fuel_kg_s/h7/w0/v1</property>
      <property value="0.256328">fsim/tables/fuel_kg_s/h7/w0/v10</property>
      <property value="0.261003">fsim/tables/fuel_kg_s/h7/w0/v11</property>
      <property value="0.27063">fsim/tables/fuel_kg_s/h7/w0/v12</property>
      <property value="0.282469">fsim/tables/fuel_kg_s/h7/w0/v13</property>
      <property value="0.29725">fsim/tables/fuel_kg_s/h7/w0/v14</property>
      <property value="0.313231">fsim/tables/fuel_kg_s/h7/w0/v15</property>
      <property value="0.281086">fsim/tables/fuel_kg_s/h7/w0/v2</property>
      <property value="0.270568">fsim/tables/fuel_kg_s/h7/w0/v3</property>
      <property value="0.262469">fsim/tables/fuel_kg_s/h7/w0/v4</property>
      <property value="0.2563">fsim/tables/fuel_kg_s/h7/w0/v5</property>
      <property value="0.253157">fsim/tables/fuel_kg_s/h7/w0/v6</property>
      <property value="0.252102">fsim/tables/fuel_kg_s/h7/w0/v7</property>
      <property value="0.251711">fsim/tables/fuel_kg_s/h7/w0/v8</property>
      <property value="0.254062">fsim/tables/fuel_kg_s/h7/w0/v9</property>
      <property value="0.306978">fsim/tables/fuel_kg_s/h7/w1/v0</property>
      <property value="0.315116">fsim/tables/fuel_kg_s/h7/w1/v1</property>
      <property value="0.295974">fsim/tables/fuel_kg_s/h7/w1/v10</property>
      <property value="0.301249">fsim/tables/fuel_kg_s/h7/w1/v11</property>
      <property value="0.308411">fsim/tables/fuel_kg_s/h7/w1/v12</property>
      <property value="0.316889">fsim/tables/fuel_kg_s/h7/w1/v13</property>
      <property value="0.32598">fsim/tables/fuel_kg_s/h7/w1/v14</property>
      <property value="0.335386">fsim/tables/fuel_kg_s/h7/w1/v15</property>
      <property value="0.310547">fsim/tables/fuel_kg_s/h7/w1/v2</property>
      <property value="0.30444">fsim/tables/fuel_kg_s/h7/w1/v3</property>
      <property value="0.299726">fsim/tables/fuel_kg_s/h7/w1/v4</property>
      <property value="0.296611">fsim/tables/fuel_kg_s/h7/w1/v5</property>
      <property value="0.294419">fsim/tables/fuel_kg_s/h7/w1/v6</property>
      <property value="0.293778">fsim/tables/fuel_kg_s/h7/w1/v7</property>
      <property value="0.293032">fsim/tables/fuel_kg_s/h7/w1/v8</property>
      <property value="0.293995">fsim/tables/fuel_kg_s/h7/w1/v9</property>
      <property value="0.357355">fsim/tables/fuel_kg_s/h7/w2/v0</property>
      <property value="0.358281">fsim/tables/fuel_kg_s/h7/w2/v1</property>
      <property value="0.325064">fsim/tables/fuel_kg_s/h7/w2/v10</property>
      <property value="0.324821">fsim/tables/fuel_kg_s/h7/w2/v11</property>
      <property value="0.324613">fsim/tables/fuel_kg_s/h7/w2/v12</property>
      <property value="0.329436">fsim/tables/fuel_kg_s/h7/w2/v13</property>
      <property value="0.348404">fsim/tables/fuel_kg_s/h7/w2/v14</property>
      <property value="0.369121">fsim/tables/fuel_kg_s/h7/w2/v15</property>
      <property value="0.358468">fsim/tables/fuel_kg_s/h7/w2/v2</property>
      <property value="0.335379">fsim/tables/fuel_kg_s/h7/w2/v3</property>
      <property value="0.317755">fsim/tables/fuel_kg_s/h7/w2/v4</property>
      <property value="0.316699">fsim/tables/fuel_kg_s/h7/w2/v5</property>
      <property value="0.318892">fsim/tables/fuel_kg_s/h7/w2/v6</property>
      <property value="0.321567">fsim/tables/fuel_kg_s/h7/w2/v7</property>
      <property value="0.324239">fsim/tables/fuel_kg_s/h7/w2/v8</property>
      <property value="0.325272">fsim/tables/fuel_kg_s/h7/w2/v9</property>
      <property value="46.8571">fsim/tables/max_climb_ms/h0/w0</property>
      <property value="39.1678">fsim/tables/max_climb_ms/h0/w1</property>
      <property value="33.4632">fsim/tables/max_climb_ms/h0/w2</property>
      <property value="36.2599">fsim/tables/max_climb_ms/h1/w0</property>
      <property value="30.0834">fsim/tables/max_climb_ms/h1/w1</property>
      <property value="25.4821">fsim/tables/max_climb_ms/h1/w2</property>
      <property value="26.3631">fsim/tables/max_climb_ms/h2/w0</property>
      <property value="21.6131">fsim/tables/max_climb_ms/h2/w1</property>
      <property value="17.9537">fsim/tables/max_climb_ms/h2/w2</property>
      <property value="17.1265">fsim/tables/max_climb_ms/h3/w0</property>
      <property value="13.6269">fsim/tables/max_climb_ms/h3/w1</property>
      <property value="10.8833">fsim/tables/max_climb_ms/h3/w2</property>
      <property value="11.2231">fsim/tables/max_climb_ms/h4/w0</property>
      <property value="8.37782">fsim/tables/max_climb_ms/h4/w1</property>
      <property value="6.15969">fsim/tables/max_climb_ms/h4/w2</property>
      <property value="8.18479">fsim/tables/max_climb_ms/h5/w0</property>
      <property value="5.63195">fsim/tables/max_climb_ms/h5/w1</property>
      <property value="3.63044">fsim/tables/max_climb_ms/h5/w2</property>
      <property value="7.1818">fsim/tables/max_climb_ms/h6/w0</property>
      <property value="4.71125">fsim/tables/max_climb_ms/h6/w1</property>
      <property value="2.58493">fsim/tables/max_climb_ms/h6/w2</property>
      <property value="5.26678">fsim/tables/max_climb_ms/h7/w0</property>
      <property value="2.86011">fsim/tables/max_climb_ms/h7/w1</property>
      <property value="1.09452">fsim/tables/max_climb_ms/h7/w2</property>
      <property value="276.795">fsim/tables/max_tas_ms/h0/w0</property>
      <property value="276.597">fsim/tables/max_tas_ms/h0/w1</property>
      <property value="276.425">fsim/tables/max_tas_ms/h0/w2</property>
      <property value="272.7">fsim/tables/max_tas_ms/h1/w0</property>
      <property value="272.524">fsim/tables/max_tas_ms/h1/w1</property>
      <property value="272.309">fsim/tables/max_tas_ms/h1/w2</property>
      <property value="266.139">fsim/tables/max_tas_ms/h2/w0</property>
      <property value="265.81">fsim/tables/max_tas_ms/h2/w1</property>
      <property value="265.474">fsim/tables/max_tas_ms/h2/w2</property>
      <property value="257.488">fsim/tables/max_tas_ms/h3/w0</property>
      <property value="257">fsim/tables/max_tas_ms/h3/w1</property>
      <property value="256.374">fsim/tables/max_tas_ms/h3/w2</property>
      <property value="249.891">fsim/tables/max_tas_ms/h4/w0</property>
      <property value="248.907">fsim/tables/max_tas_ms/h4/w1</property>
      <property value="247.879">fsim/tables/max_tas_ms/h4/w2</property>
      <property value="244.669">fsim/tables/max_tas_ms/h5/w0</property>
      <property value="243.443">fsim/tables/max_tas_ms/h5/w1</property>
      <property value="241.771">fsim/tables/max_tas_ms/h5/w2</property>
      <property value="242.753">fsim/tables/max_tas_ms/h6/w0</property>
      <property value="241.261">fsim/tables/max_tas_ms/h6/w1</property>
      <property value="238.52">fsim/tables/max_tas_ms/h6/w2</property>
      <property value="240.45">fsim/tables/max_tas_ms/h7/w0</property>
      <property value="238.684">fsim/tables/max_tas_ms/h7/w1</property>
      <property value="228.837">fsim/tables/max_tas_ms/h7/w2</property>
      <property value="87.1823">fsim/tables/min_tas_ms/h0/w0</property>
      <property value="90.1292">fsim/tables/min_tas_ms/h0/w1</property>
      <property value="93.2386">fsim/tables/min_tas_ms/h0/w2</property>
      <property value="89.7751">fsim/tables/min_tas_ms/h1/w0</property>
      <property value="94.2669">fsim/tables/min_tas_ms/h1/w1</property>
      <property value="98.6742">fsim/tables/min_tas_ms/h1/w2</property>
      <property value="95.4879">fsim/tables/min_tas_ms/h2/w0</property>
      <property value="101.365">fsim/tables/min_tas_ms/h2/w1</property>
      <property value="107.029">fsim/tables/min_tas_ms/h2/w2</property>
      <property value="104.212">fsim/tables/min_tas_ms/h3/w0</property>
      <property value="111.636">fsim/tables/min_tas_ms/h3/w1</property>
      <property value="118.651">fsim/tables/min_tas_ms/h3/w2</property>
      <property value="113.004">fsim/tables/min_tas_ms/h4/w0</property>
      <property value="121.684">fsim/tables/min_tas_ms/h4/w1</property>
      <property value="129.697">fsim/tables/min_tas_ms/h4/w2</property>
      <property value="120.26">fsim/tables/min_tas_ms/h5/w0</property>
      <property value="129.819">fsim/tables/min_tas_ms/h5/w1</property>
      <property value="157.193">fsim/tables/min_tas_ms/h5/w2</property>
      <property value="122.878">fsim/tables/min_tas_ms/h6/w0</property>
      <property value="150.874">fsim/tables/min_tas_ms/h6/w1</property>
      <property value="160.487">fsim/tables/min_tas_ms/h6/w2</property>
      <property value="129.486">fsim/tables/min_tas_ms/h7/w0</property>
      <property value="158.563">fsim/tables/min_tas_ms/h7/w1</property>
      <property value="189.257">fsim/tables/min_tas_ms/h7/w2</property>
      <property value="29.9166">fsim/tables/ps_full_ms/h0/w0/v0</property>
      <property value="33.0179">fsim/tables/ps_full_ms/h0/w0/v1</property>
      <property value="45.996">fsim/tables/ps_full_ms/h0/w0/v10</property>
      <property value="44.2456">fsim/tables/ps_full_ms/h0/w0/v11</property>
      <property value="41.6397">fsim/tables/ps_full_ms/h0/w0/v12</property>
      <property value="36.8945">fsim/tables/ps_full_ms/h0/w0/v13</property>
      <property value="29.5285">fsim/tables/ps_full_ms/h0/w0/v14</property>
      <property value="20.4318">fsim/tables/ps_full_ms/h0/w0/v15</property>
      <property value="35.9805">fsim/tables/ps_full_ms/h0/w0/v2</property>
      <property value="38.9826">fsim/tables/ps_full_ms/h0/w0/v3</property>
      <property value="41.65">fsim/tables/ps_full_ms/h0/w0/v4</property>
      <property value="43.7455">fsim/tables/ps_full_ms/h0/w0/v5</property>
      <property value="45.3271">fsim/tables/ps_full_ms/h0/w0/v6</property>
      <property value="46.3435">fsim/tables/ps_full_ms/h0/w0/v7</property>
      <property value="46.8112">fsim/tables/ps_full_ms/h0/w0/v8</property>
      <property value="46.7677">fsim/tables/ps_full_ms/h0/w0/v9</property>
      <property value="24.8893">fsim/tables/ps_full_ms/h0/w1/v0</property>
      <property value="27.5325">fsim/tables/ps_full_ms/h0/w1/v1</property>
      <property value="38.3109">fsim/tables/ps_full_ms/h0/w1/v10</property>
      <property value="36.8143">fsim/tables/ps_full_ms/h0/w1/v11</property>
      <property value="34.7828">fsim/tables/ps_full_ms/h0/w1/v12</property>
      <property value="30.8864">fsim/tables/ps_full_ms/h0/w1/v13</property>
      <property value="24.7229">fsim/tables/ps_full_ms/h0/w1/v14</property>
      <property value="17.0558">fsim/tables/ps_full_ms/h0/w1/v15</property>
      <property value="30.1038">fsim/tables/ps_full_ms/h0/w1/v2</property>
      <property value="32.635">fsim/tables/ps_full_ms/h0/w1/v3</property>
      <property value="34.7786">fsim/tables/ps_full_ms/h0/w1/v4</property>
      <property value="36.5303">fsim/tables/ps_full_ms/h0/w1/v5</property>
      <property value="37.8008">fsim/tables/ps_full_ms/h0/w1/v6</property>
      <property value="38.7149">fsim/tables/ps_full_ms/h0/w1/v7</property>
      <property value="39.1538">fsim/tables/ps_full_ms/h0/w1/v8</property>
      <property value="39.0463">fsim/tables/ps_full_ms/h0/w1/v9</property>
      <property value="21.2097">fsim/tables/ps_full_ms/h0/w2/v0</property>
      <property value="23.515">fsim/tables/ps_full_ms/h0/w2/v1</property>
      <property value="32.6881">fsim/tables/ps_full_ms/h0/w2/v10</property>
      <property value="31.3669">fsim/tables/ps_full_ms/h0/w2/v11</property>
      <property value="29.5921">fsim/tables/ps_full_ms/h0/w2/v12</property>
      <property value="26.2078">fsim/tables/ps_full_ms/h0/w2/v13</property>
      <property value="21.0808">fsim/tables/ps_full_ms/h0/w2/v14</property>
      <property value="14.5831">fsim/tables/ps_full_ms/h0/w2/v15</property>
      <property value="25.7337">fsim/tables/ps_full_ms/h0/w2/v2</property>
      <property value="27.9036">fsim/tables/ps_full_ms/h0/w2/v3</property>
      <property value="29.7114">fsim/tables/ps_full_ms/h0/w2/v4</property>
      <property value="31.1433">fsim/tables/ps_full_ms/h0/w2/v5</property>
      <property value="32.2726">fsim/tables/ps_full_ms/h0/w2/v6</property>
      <property value="32.9853">fsim/tables/ps_full_ms/h0/w2/v7</property>
      <property value="33.3886">fsim/tables/ps_full_ms/h0/w2/v8</property>
      <property value="33.3835">fsim/tables/ps_full_ms/h0/w2/v9</property>
      <property value="22.0034">fsim/tables/ps_full_ms/h1/w0/v0</property>
      <property value="24.3063">fsim/tables/ps_full_ms/h1/w0/v1</property>
      <property value="36.2592">fsim/tables/ps_full_ms/h1/w0/v10</property>
      <property value="36.1083">fsim/tables/ps_full_ms/h1/w0/v11</property>
      <property value="35.5732">fsim/tables/ps_full_ms/h1/w0/v12</property>
      <property value="33.0391">fsim/tables/ps_full_ms/h1/w0/v13</property>
      <property value="28.9646">fsim/tables/ps_full_ms/h1/w0/v14</property>
      <property value="22.7398">fsim/tables/ps_full_ms/h1/w0/v15</property>
      <property value="26.501">fsim/tables/ps_full_ms/h1/w0/v2</property>
      <property value="28.7788">fsim/tables/ps_full_ms/h1/w0/v3</property>
      <property value="30.8054">fsim/tables/ps_full_ms/h1/w0/v4</property>
      <property value="32.5733">fsim/tables/ps_full_ms/h1/w0/v5</property>
      <property value="33.9895">fsim/tables/ps_full_ms/h1/w0/v6</property>
      <property value="35.0667">fsim/tables/ps_full_ms/h1/w0/v7</property>
      <property value="35.8646">fsim/tables/ps_full_ms/h1/w0/v8</property>
      <property value="36.1673">fsim/tables/ps_full_ms/h1/w0/v9</property>
      <property value="18.1374">fsim/tables/ps_full_ms/h1/w1/v0</property>
      <property value="20.1043">fsim/tables/ps_full_ms/h1/w1/v1</property>
      <property value="30.0795">fsim/tables/ps_full_ms/h1/w1/v10</property>
      <property value="29.8967">fsim/tables/ps_full_ms/h1/w1/v11</property>
      <property value="29.3867">fsim/tables/ps_full_ms/h1/w1/v12</property>
      <property value="27.1318">fsim/tables/ps_full_ms/h1/w1/v13</property>
      <property value="23.8618">fsim/tables/ps_full_ms/h1/w1/v14</property>
      <property value="19.1787">fsim/tables/ps_full_ms/h1/w1/v15</property>
      <property value="22.0403">fsim/tables/ps_full_ms/h1/w1/v2</property>
      <property value="23.9084">fsim/tables/ps_full_ms/h1/w1/v3</property>
      <property value="25.5627">fsim/tables/ps_full_ms/h1/w1/v4</property>
      <property value="27.0062">fsim/tables/ps_full_ms/h1/w1/v5</property>
      <property value="28.166">fsim/tables/ps_full_ms/h1/w1/v6</property>
      <property value="29.0618">fsim/tables/ps_full_ms/h1/w1/v7</property>
      <property value="29.6271">fsim/tables/ps_full_ms/h1/w1/v8</property>
      <property value="29.9604">fsim/tables/ps_full_ms/h1/w1/v9</property>
      <property value="15.2432">fsim/tables/ps_full_ms/h1/w2/v0</property>
      <property value="16.9672">fsim/tables/ps_full_ms/h1/w2/v1</property>
      <property value="25.461">fsim/tables/ps_full_ms/h1/w2/v10</property>
      <property value="25.3501">fsim/tables/ps_full_ms/h1/w2/v11</property>
      <property value="24.8573">fsim/tables/ps_full_ms/h1/w2/v12</property>
      <property value="22.8441">fsim/tables/ps_full_ms/h1/w2/v13</property>
      <property value="20.0556">fsim/tables/ps_full_ms/h1/w2/v14</property>
      <property value="16.293">fsim/tables/ps_full_ms/h1/w2/v15</property>
      <property value="18.6388">fsim/tables/ps_full_ms/h1/w2/v2</property>
      <property value="20.2237">fsim/tables/ps_full_ms/h1/w2/v3</property>
      <property value="21.6685">fsim/tables/ps_full_ms/h1/w2/v4</property>
      <property value="22.8655">fsim/tables/ps_full_ms/h1/w2/v5</property>
      <property value="23.8415">fsim/tables/ps_full_ms/h1/w2/v6</property>
      <property value="24.5958">fsim/tables/ps_full_ms/h1/w2/v7</property>
      <property value="25.0726">fsim/tables/ps_full_ms/h1/w2/v8</property>
      <property value="25.2819">fsim/tables/ps_full_ms/h1/w2/v9</property>
      <property value="15.2356">fsim/tables/ps_full_ms/h2/w0/v0</property>
      <property value="16.9492">fsim/tables/ps_full_ms/h2/w0/v1</property>
      <property value="26.1742">fsim/tables/ps_full_ms/h2/w0/v10</property>
      <property value="26.3614">fsim/tables/ps_full_ms/h2/w0/v11</property>
      <property value="26.1484">fsim/tables/ps_full_ms/h2/w0/v12</property>
      <property value="24.4263">fsim/tables/ps_full_ms/h2/w0/v13</property>
      <property value="22.0112">fsim/tables/ps_full_ms/h2/w0/v14</property>
      <property value="16.989">fsim/tables/ps_full_ms/h2/w0/v15</property>
      <property value="18.485">fsim/tables/ps_full_ms/h2/w0/v2</property>
      <property value="20.1329">fsim/tables/ps_full_ms/h2/w0/v3</property>
      <property value="21.6614">fsim/tables/ps_full_ms/h2/w0/v4</property>
      <property value="22.9121">fsim/tables/ps_full_ms/h2/w0/v5</property>
      <property value="23.9426">fsim/tables/ps_full_ms/h2/w0/v6</property>
      <property value="24.793">fsim/tables/ps_full_ms/h2/w0/v7</property>
      <property value="25.3416">fsim/tables/ps_full_ms/h2/w0/v8</property>
      <property value="25.6851">fsim/tables/ps_full_ms/h2/w0/v9</property>
      <property value="12.2737">fsim/tables/ps_full_ms/h2/w1/v0</property>
      <property value="13.6381">fsim/tables/ps_full_ms/h2/w1/v1</property>
      <property value="21.3403">fsim/tables/ps_full_ms/h2/w1/v10</property>
      <property value="21.5545">fsim/tables/ps_full_ms/h2/w1/v11</property>
      <property value="21.4017">fsim/tables/ps_full_ms/h2/w1/v12</property>
      <property value="19.913">fsim/tables/ps_full_ms/h2/w1/v13</property>
      <property value="17.9102">fsim/tables/ps_full_ms/h2/w1/v14</property>
      <property value="14.1634">fsim/tables/ps_full_ms/h2/w1/v15</property>
      <property value="15.0527">fsim/tables/ps_full_ms/h2/w1/v2</property>
      <property value="16.408">fsim/tables/ps_full_ms/h2/w1/v3</property>
      <property value="17.6446">fsim/tables/ps_full_ms/h2/w1/v4</property>
      <property value="18.6964">fsim/tables/ps_full_ms/h2/w1/v5</property>
      <property value="19.5592">fsim/tables/ps_full_ms/h2/w1/v6</property>
      <property value="20.1985">fsim/tables/ps_full_ms/h2/w1/v7</property>
      <property value="20.6811">fsim/tables/ps_full_ms/h2/w1/v8</property>
      <property value="20.9989">fsim/tables/ps_full_ms/h2/w1/v9</property>
      <property value="9.87536">fsim/tables/ps_full_ms/h2/w2/v0</property>
      <property value="11.1225">fsim/tables/ps_full_ms/h2/w2/v1</property>
      <property value="17.8142">fsim/tables/ps_full_ms/h2/w2/v10</property>
      <property value="17.9342">fsim/tables/ps_full_ms/h2/w2/v11</property>
      <property value="17.7295">fsim/tables/ps_full_ms/h2/w2/v12</property>
      <property value="16.615">fsim/tables/ps_full_ms/h2/w2/v13</property>
      <property value="14.9266">fsim/tables/ps_full_ms/h2/w2/v14</property>
      <property value="12.0887">fsim/tables/ps_full_ms/h2/w2/v15</property>
      <property value="12.3506">fsim/tables/ps_full_ms/h2/w2/v2</property>
      <property value="13.5816">fsim/tables/ps_full_ms/h2/w2/v3</property>
      <property value="14.6281">fsim/tables/ps_full_ms/h2/w2/v4</property>
      <property value="15.5025">fsim/tables/ps_full_ms/h2/w2/v5</property>
      <property value="16.221">fsim/tables/ps_full_ms/h2/w2/v6</property>
      <property value="16.8007">fsim/tables/ps_full_ms/h2/w2/v7</property>
      <property value="17.1496">fsim/tables/ps_full_ms/h2/w2/v8</property>
      <property value="17.5014">fsim/tables/ps_full_ms/h2/w2/v9</property>
      <property value="9.48986">fsim/tables/ps_full_ms/h3/w0/v0</property>
      <property value="10.716">fsim/tables/ps_full_ms/h3/w0/v1</property>
      <property value="17.0183">fsim/tables/ps_full_ms/h3/w0/v10</property>
      <property value="17.1167">fsim/tables/ps_full_ms/h3/w0/v11</property>
      <property value="16.8758">fsim/tables/ps_full_ms/h3/w0/v12</property>
      <property value="15.7871">fsim/tables/ps_full_ms/h3/w0/v13</property>
      <property value="14.1573">fsim/tables/ps_full_ms/h3/w0/v14</property>
      <property value="11.2343">fsim/tables/ps_full_ms/h3/w0/v15</property>
      <property value="11.7818">fsim/tables/ps_full_ms/h3/w0/v2</property>
      <property value="13.0338">fsim/tables/ps_full_ms/h3/w0/v3</property>
      <property value="14.0202">fsim/tables/ps_full_ms/h3/w0/v4</property>
      <property value="14.8421">fsim/tables/ps_full_ms/h3/w0/v5</property>
      <property value="15.5256">fsim/tables/ps_full_ms/h3/w0/v6</property>
      <property value="16.0672">fsim/tables/ps_full_ms/h3/w0/v7</property>
      <property value="16.3927">fsim/tables/ps_full_ms/h3/w0/v8</property>
      <property value="16.7233">fsim/tables/ps_full_ms/h3/w0/v9</property>
      <property value="6.99171">fsim/tables/ps_full_ms/h3/w1/v0</property>
      <property value="8.02841">fsim/tables/ps_full_ms/h3/w1/v1</property>
      <property value="13.4522">fsim/tables/ps_full_ms/h3/w1/v10</property>
      <property value="13.6254">fsim/tables/ps_full_ms/h3/w1/v11</property>
      <property value="13.2876">fsim/tables/ps_full_ms/h3/w1/v12</property>
      <property value="12.3578">fsim/tables/ps_full_ms/h3/w1/v13</property>
      <property value="11.1471">fsim/tables/ps_full_ms/h3/w1/v14</property>
      <property value="9.27623">fsim/tables/ps_full_ms/h3/w1/v15</property>
      <property value="9.13109">fsim/tables/ps_full_ms/h3/w1/v2</property>
      <property value="10.1092">fsim/tables/ps_full_ms/h3/w1/v3</property>
      <property value="10.9303">fsim/tables/ps_full_ms/h3/w1/v4</property>
      <property value="11.6306">fsim/tables/ps_full_ms/h3/w1/v5</property>
      <property value="12.1772">fsim/tables/ps_full_ms/h3/w1/v6</property>
      <property value="12.5991">fsim/tables/ps_full_ms/h3/w1/v7</property>
      <property value="12.9015">fsim/tables/ps_full_ms/h3/w1/v8</property>
      <property value="13.2143">fsim/tables/ps_full_ms/h3/w1/v9</property>
      <property value="4.92126">fsim/tables/ps_full_ms/h3/w2/v0</property>
      <property value="5.98852">fsim/tables/ps_full_ms/h3/w2/v1</property>
      <property value="10.7676">fsim/tables/ps_full_ms/h3/w2/v10</property>
      <property value="10.8621">fsim/tables/ps_full_ms/h3/w2/v11</property>
      <property value="10.6171">fsim/tables/ps_full_ms/h3/w2/v12</property>
      <property value="9.86962">fsim/tables/ps_full_ms/h3/w2/v13</property>
      <property value="8.84388">fsim/tables/ps_full_ms/h3/w2/v14</property>
      <property value="7.53899">fsim/tables/ps_full_ms/h3/w2/v15</property>
      <property value="6.97373">fsim/tables/ps_full_ms/h3/w2/v2</property>
      <property value="7.81454">fsim/tables/ps_full_ms/h3/w2/v3</property>
      <property value="8.51525">fsim/tables/ps_full_ms/h3/w2/v4</property>
      <property value="9.10678">fsim/tables/ps_full_ms/h3/w2/v5</property>
      <property value="9.59912">fsim/tables/ps_full_ms/h3/w2/v6</property>
      <property value="9.95814">fsim/tables/ps_full_ms/h3/w2/v7</property>
      <property value="10.2269">fsim/tables/ps_full_ms/h3/w2/v8</property>
      <property value="10.5507">fsim/tables/ps_full_ms/h3/w2/v9</property>
      <property value="5.38853">fsim/tables/ps_full_ms/h4/w0/v0</property>
      <property value="6.42821">fsim/tables/ps_full_ms/h4/w0/v1</property>
      <property value="11.0979">fsim/tables/ps_full_ms/h4/w0/v10</property>
      <property value="11.1971">fsim/tables/ps_full_ms/h4/w0/v11</property>
      <property value="10.9595">fsim/tables/ps_full_ms/h4/w0/v12</property>
      <property value="10.1084">fsim/tables/ps_full_ms/h4/w0/v13</property>
      <property value="9.02495">fsim/tables/ps_full_ms/h4/w0/v14</property>
      <property value="7.66307">fsim/tables/ps_full_ms/h4/w0/v15</property>
      <property value="7.37838">fsim/tables/ps_full_ms/h4/w0/v2</property>
      <property value="8.25431">fsim/tables/ps_full_ms/h4/w0/v3</property>
      <property value="8.94893">fsim/tables/ps_full_ms/h4/w0/v4</property>
      <property value="9.5358">fsim/tables/ps_full_ms/h4/w0/v5</property>
      <property value="10.0116">fsim/tables/ps_full_ms/h4/w0/v6</property>
      <property value="10.3971">fsim/tables/ps_full_ms/h4/w0/v7</property>
      <property value="10.6089">fsim/tables/ps_full_ms/h4/w0/v8</property>
      <property value="10.9423">fsim/tables/ps_full_ms/h4/w0/v9</property>
      <property value="3.15147">fsim/tables/ps_full_ms/h4/w1/v0</property>
      <property value="4.21022">fsim/tables/ps_full_ms/h4/w1/v1</property>
      <property value="8.27466">fsim/tables/ps_full_ms/h4/w1/v10</property>
      <property value="8.37777">fsim/tables/ps_full_ms/h4/w1/v11</property>
      <property value="8.0868">fsim/tables/ps_full_ms/h4/w1/v12</property>
      <property value="7.5118">fsim/tables/ps_full_ms/h4/w1/v13</property>
      <property value="6.73053">fsim/tables/ps_full_ms/h4/w1/v14</property>
      <property value="5.66709">fsim/tables/ps_full_ms/h4/w1/v15</property>
      <property value="5.05971">fsim/tables/ps_full_ms/h4/w1/v2</property>
      <property value="5.7707">fsim/tables/ps_full_ms/h4/w1/v3</property>
      <property value="6.3746">fsim/tables/ps_full_ms/h4/w1/v4</property>
      <property value="6.8775">fsim/tables/ps_full_ms/h4/w1/v5</property>
      <property value="7.25815">fsim/tables/ps_full_ms/h4/w1/v6</property>
      <property value="7.55956">fsim/tables/ps_full_ms/h4/w1/v7</property>
      <property value="7.84313">fsim/tables/ps_full_ms/h4/w1/v8</property>
      <property value="8.0871">fsim/tables/ps_full_ms/h4/w1/v9</property>
      <property value="1.42987">fsim/tables/ps_full_ms/h4/w2/v0</property>
      <property value="2.38788">fsim/tables/ps_full_ms/h4/w2/v1</property>
      <property value="6.062">fsim/tables/ps_full_ms/h4/w2/v10</property>
      <property value="6.14807">fsim/tables/ps_full_ms/h4/w2/v11</property>
      <property value="5.95381">fsim/tables/ps_full_ms/h4/w2/v12</property>
      <property value="5.46196">fsim/tables/ps_full_ms/h4/w2/v13</property>
      <property value="4.84426">fsim/tables/ps_full_ms/h4/w2/v14</property>
      <property value="4.10585">fsim/tables/ps_full_ms/h4/w2/v15</property>
      <property value="3.15143">fsim/tables/ps_full_ms/h4/w2/v2</property>
      <property value="3.74691">fsim/tables/ps_full_ms/h4/w2/v3</property>
      <property value="4.28911">fsim/tables/ps_full_ms/h4/w2/v4</property>
      <property value="4.73463">fsim/tables/ps_full_ms/h4/w2/v5</property>
      <property value="5.09693">fsim/tables/ps_full_ms/h4/w2/v6</property>
      <property value="5.34511">fsim/tables/ps_full_ms/h4/w2/v7</property>
      <property value="5.64693">fsim/tables/ps_full_ms/h4/w2/v8</property>
      <property value="5.88701">fsim/tables/ps_full_ms/h4/w2/v9</property>
      <property value="3.08121">fsim/tables/ps_full_ms/h5/w0/v0</property>
      <property value="4.10748">fsim/tables/ps_full_ms/h5/w0/v1</property>
      <property value="8.07375">fsim/tables/ps_full_ms/h5/w0/v10</property>
      <property value="8.18475">fsim/tables/ps_full_ms/h5/w0/v11</property>
      <property value="7.8906">fsim/tables/ps_full_ms/h5/w0/v12</property>
      <property value="7.33126">fsim/tables/ps_full_ms/h5/w0/v13</property>
      <property value="6.58881">fsim/tables/ps_full_ms/h5/w0/v14</property>
      <property value="5.55821">fsim/tables/ps_full_ms/h5/w0/v15</property>
      <property value="4.92719">fsim/tables/ps_full_ms/h5/w0/v2</property>
      <property value="5.62772">fsim/tables/ps_full_ms/h5/w0/v3</property>
      <property value="6.21259">fsim/tables/ps_full_ms/h5/w0/v4</property>
      <property value="6.70115">fsim/tables/ps_full_ms/h5/w0/v5</property>
      <property value="7.0719">fsim/tables/ps_full_ms/h5/w0/v6</property>
      <property value="7.36877">fsim/tables/ps_full_ms/h5/w0/v7</property>
      <property value="7.64842">fsim/tables/ps_full_ms/h5/w0/v8</property>
      <property value="7.89318">fsim/tables/ps_full_ms/h5/w0/v9</property>
      <property value="1.05649">fsim/tables/ps_full_ms/h5/w1/v0</property>
      <property value="2.0338">fsim/tables/ps_full_ms/h5/w1/v1</property>
      <property value="5.55783">fsim/tables/ps_full_ms/h5/w1/v10</property>
      <property value="5.62713">fsim/tables/ps_full_ms/h5/w1/v11</property>
      <property value="5.41423">fsim/tables/ps_full_ms/h5/w1/v12</property>
      <property value="5.0025">fsim/tables/ps_full_ms/h5/w1/v13</property>
      <property value="4.42079">fsim/tables/ps_full_ms/h5/w1/v14</property>
      <property value="3.73031">fsim/tables/ps_full_ms/h5/w1/v15</property>
      <property value="2.75422">fsim/tables/ps_full_ms/h5/w1/v2</property>
      <property value="3.3156">fsim/tables/ps_full_ms/h5/w1/v3</property>
      <property value="3.8249">fsim/tables/ps_full_ms/h5/w1/v4</property>
      <property value="4.2566">fsim/tables/ps_full_ms/h5/w1/v5</property>
      <property value="4.59534">fsim/tables/ps_full_ms/h5/w1/v6</property>
      <property value="4.83351">fsim/tables/ps_full_ms/h5/w1/v7</property>
      <property value="5.14967">fsim/tables/ps_full_ms/h5/w1/v8</property>
      <property value="5.36107">fsim/tables/ps_full_ms/h5/w1/v9</property>
      <property value="1.57788">fsim/tables/ps_full_ms/h5/w2/v0</property>
      <property value="1.86333">fsim/tables/ps_full_ms/h5/w2/v1</property>
      <property value="3.58854">fsim/tables/ps_full_ms/h5/w2/v10</property>
      <property value="3.50026">fsim/tables/ps_full_ms/h5/w2/v11</property>
      <property value="3.27252">fsim/tables/ps_full_ms/h5/w2/v12</property>
      <property value="3.00444">fsim/tables/ps_full_ms/h5/w2/v13</property>
      <property value="2.69567">fsim/tables/ps_full_ms/h5/w2/v14</property>
      <property value="2.28335">fsim/tables/ps_full_ms/h5/w2/v15</property>
      <property value="2.14878">fsim/tables/ps_full_ms/h5/w2/v2</property>
      <property value="2.43424">fsim/tables/ps_full_ms/h5/w2/v3</property>
      <property value="2.68523">fsim/tables/ps_full_ms/h5/w2/v4</property>
      <property value="2.8841">fsim/tables/ps_full_ms/h5/w2/v5</property>
      <property value="3.08296">fsim/tables/ps_full_ms/h5/w2/v6</property>
      <property value="3.28182">fsim/tables/ps_full_ms/h5/w2/v7</property>
      <property value="3.39142">fsim/tables/ps_full_ms/h5/w2/v8</property>
      <property value="3.48998">fsim/tables/ps_full_ms/h5/w2/v9</property>
      <property value="2.33073">fsim/tables/ps_full_ms/h6/w0/v0</property>
      <property value="3.31248">fsim/tables/ps_full_ms/h6/w0/v1</property>
      <property value="7.03307">fsim/tables/ps_full_ms/h6/w0/v10</property>
      <property value="7.15821">fsim/tables/ps_full_ms/h6/w0/v11</property>
      <property value="6.88649">fsim/tables/ps_full_ms/h6/w0/v12</property>
      <property value="6.35677">fsim/tables/ps_full_ms/h6/w0/v13</property>
      <property value="5.69944">fsim/tables/ps_full_ms/h6/w0/v14</property>
      <property value="4.8356">fsim/tables/ps_full_ms/h6/w0/v15</property>
      <property value="4.08213">fsim/tables/ps_full_ms/h6/w0/v2</property>
      <property value="4.72969">fsim/tables/ps_full_ms/h6/w0/v3</property>
      <property value="5.28437">fsim/tables/ps_full_ms/h6/w0/v4</property>
      <property value="5.72099">fsim/tables/ps_full_ms/h6/w0/v5</property>
      <property value="6.07723">fsim/tables/ps_full_ms/h6/w0/v6</property>
      <property value="6.37713">fsim/tables/ps_full_ms/h6/w0/v7</property>
      <property value="6.62613">fsim/tables/ps_full_ms/h6/w0/v8</property>
      <property value="6.89631">fsim/tables/ps_full_ms/h6/w0/v9</property>
      <property value="2.42674">fsim/tables/ps_full_ms/h6/w1/v0</property>
      <property value="2.76767">fsim/tables/ps_full_ms/h6/w1/v1</property>
      <property value="4.70638">fsim/tables/ps_full_ms/h6/w1/v10</property>
      <property value="4.55589">fsim/tables/ps_full_ms/h6/w1/v11</property>
      <property value="4.31365">fsim/tables/ps_full_ms/h6/w1/v12</property>
      <property value="4.01366">fsim/tables/ps_full_ms/h6/w1/v13</property>
      <property value="3.55399">fsim/tables/ps_full_ms/h6/w1/v14</property>
      <property value="3.03099">fsim/tables/ps_full_ms/h6/w1/v15</property>
      <property value="3.1086">fsim/tables/ps_full_ms/h6/w1/v2</property>
      <property value="3.44952">fsim/tables/ps_full_ms/h6/w1/v3</property>
      <property value="3.69042">fsim/tables/ps_full_ms/h6/w1/v4</property>
      <property value="3.90797">fsim/tables/ps_full_ms/h6/w1/v5</property>
      <property value="4.12552">fsim/tables/ps_full_ms/h6/w1/v6</property>
      <property value="4.30981">fsim/tables/ps_full_ms/h6/w1/v7</property>
      <property value="4.48123">fsim/tables/ps_full_ms/h6/w1/v8</property>
      <property value="4.65266">fsim/tables/ps_full_ms/h6/w1/v9</property>
      <property value="0.881496">fsim/tables/ps_full_ms/h6/w2/v0</property>
      <property value="1.12845">fsim/tables/ps_full_ms/h6/w2/v1</property>
      <property value="2.57609">fsim/tables/ps_full_ms/h6/w2/v10</property>
      <property value="2.58121">fsim/tables/ps_full_ms/h6/w2/v11</property>
      <property value="2.47719">fsim/tables/ps_full_ms/h6/w2/v12</property>
      <property value="2.25711">fsim/tables/ps_full_ms/h6/w2/v13</property>
      <property value="1.98416">fsim/tables/ps_full_ms/h6/w2/v14</property>
      <property value="1.67747">fsim/tables/ps_full_ms/h6/w2/v15</property>
      <property value="1.37541">fsim/tables/ps_full_ms/h6/w2/v2</property>
      <property value="1.62236">fsim/tables/ps_full_ms/h6/w2/v3</property>
      <property value="1.86932">fsim/tables/ps_full_ms/h6/w2/v4</property>
      <property value="2.04687">fsim/tables/ps_full_ms/h6/w2/v5</property>
      <property value="2.22182">fsim/tables/ps_full_ms/h6/w2/v6</property>
      <property value="2.39678">fsim/tables/ps_full_ms/h6/w2/v7</property>
      <property value="2.56583">fsim/tables/ps_full_ms/h6/w2/v8</property>
      <property value="2.57096">fsim/tables/ps_full_ms/h6/w2/v9</property>
      <property value="0.768978">fsim/tables/ps_full_ms/h7/w0/v0</property>
      <property value="1.80387">fsim/tables/ps_full_ms/h7/w0/v1</property>
      <property value="5.20241">fsim/tables/ps_full_ms/h7/w0/v10</property>
      <property value="5.26349">fsim/tables/ps_full_ms/h7/w0/v11</property>
      <property value="5.04627">fsim/tables/ps_full_ms/h7/w0/v12</property>
      <property value="4.67163">fsim/tables/ps_full_ms/h7/w0/v13</property>
      <property value="4.10545">fsim/tables/ps_full_ms/h7/w0/v14</property>
      <property value="3.4365">fsim/tables/ps_full_ms/h7/w0/v15</property>
      <property value="2.4942">fsim/tables/ps_full_ms/h7/w0/v2</property>
      <property value="3.03583">fsim/tables/ps_full_ms/h7/w0/v3</property>
      <property value="3.5245">fsim/tables/ps_full_ms/h7/w0/v4</property>
      <property value="3.9426">fsim/tables/ps_full_ms/h7/w0/v5</property>
      <property value="4.2596">fsim/tables/ps_full_ms/h7/w0/v6</property>
      <property value="4.50004">fsim/tables/ps_full_ms/h7/w0/v7</property>
      <property value="4.81219">fsim/tables/ps_full_ms/h7/w0/v8</property>
      <property value="5.00483">fsim/tables/ps_full_ms/h7/w0/v9</property>
      <property value="1.04402">fsim/tables/ps_full_ms/h7/w1/v0</property>
      <property value="1.3029">fsim/tables/ps_full_ms/h7/w1/v1</property>
      <property value="2.82278">fsim/tables/ps_full_ms/h7/w1/v10</property>
      <property value="2.85497">fsim/tables/ps_full_ms/h7/w1/v11</property>
      <property value="2.65056">fsim/tables/ps_full_ms/h7/w1/v12</property>
      <property value="2.39362">fsim/tables/ps_full_ms/h7/w1/v13</property>
      <property value="2.10202">fsim/tables/ps_full_ms/h7/w1/v14</property>
      <property value="1.77294">fsim/tables/ps_full_ms/h7/w1/v15</property>
      <property value="1.56178">fsim/tables/ps_full_ms/h7/w1/v2</property>
      <property value="1.82066">fsim/tables/ps_full_ms/h7/w1/v3</property>
      <property value="2.06973">fsim/tables/ps_full_ms/h7/w1/v4</property>
      <property value="2.25688">fsim/tables/ps_full_ms/h7/w1/v5</property>
      <property value="2.44404">fsim/tables/ps_full_ms/h7/w1/v6</property>
      <property value="2.6312">fsim/tables/ps_full_ms/h7/w1/v7</property>
      <property value="2.75839">fsim/tables/ps_full_ms/h7/w1/v8</property>
      <property value="2.79059">fsim/tables/ps_full_ms/h7/w1/v9</property>
      <property value="0.579631">fsim/tables/ps_full_ms/h7/w2/v0</property>
      <property value="0.637023">fsim/tables/ps_full_ms/h7/w2/v1</property>
      <property value="1.01927">fsim/tables/ps_full_ms/h7/w2/v10</property>
      <property value="0.946119">fsim/tables/ps_full_ms/h7/w2/v11</property>
      <property value="0.872966">fsim/tables/ps_full_ms/h7/w2/v12</property>
      <property value="0.799812">fsim/tables/ps_full_ms/h7/w2/v13</property>
      <property value="0.726659">fsim/tables/ps_full_ms/h7/w2/v14</property>
      <property value="0.653505">fsim/tables/ps_full_ms/h7/w2/v15</property>
      <property value="0.694416">fsim/tables/ps_full_ms/h7/w2/v2</property>
      <property value="0.751808">fsim/tables/ps_full_ms/h7/w2/v3</property>
      <property value="0.8092">fsim/tables/ps_full_ms/h7/w2/v4</property>
      <property value="0.866593">fsim/tables/ps_full_ms/h7/w2/v5</property>
      <property value="0.923985">fsim/tables/ps_full_ms/h7/w2/v6</property>
      <property value="0.981377">fsim/tables/ps_full_ms/h7/w2/v7</property>
      <property value="1.03877">fsim/tables/ps_full_ms/h7/w2/v8</property>
      <property value="1.09243">fsim/tables/ps_full_ms/h7/w2/v9</property>
      <property value="-3.85955">fsim/tables/ps_idle_ms/h0/w0/v0</property>
      <property value="-4.43587">fsim/tables/ps_idle_ms/h0/w0/v1</property>
      <property value="-30.2582">fsim/tables/ps_idle_ms/h0/w0/v10</property>
      <property value="-35.7596">fsim/tables/ps_idle_ms/h0/w0/v11</property>
      <property value="-41.9931">fsim/tables/ps_idle_ms/h0/w0/v12</property>
      <property value="-50.4509">fsim/tables/ps_idle_ms/h0/w0/v13</property>
      <property value="-61.5328">fsim/tables/ps_idle_ms/h0/w0/v14</property>
      <property value="-72.8988">fsim/tables/ps_idle_ms/h0/w0/v15</property>
      <property value="-5.42616">fsim/tables/ps_idle_ms/h0/w0/v2</property>
      <property value="-6.8519">fsim/tables/ps_idle_ms/h0/w0/v3</property>
      <property value="-8.73801">fsim/tables/ps_idle_ms/h0/w0/v4</property>
      <property value="-11.0546">fsim/tables/ps_idle_ms/h0/w0/v5</property>
      <property value="-13.8476">fsim/tables/ps_idle_ms/h0/w0/v6</property>
      <property value="-17.0936">fsim/tables/ps_idle_ms/h0/w0/v7</property>
      <property value="-20.9714">fsim/tables/ps_idle_ms/h0/w0/v8</property>
      <property value="-25.3472">fsim/tables/ps_idle_ms/h0/w0/v9</property>
      <property value="-4.38804">fsim/tables/ps_idle_ms/h0/w1/v0</property>
      <property value="-4.77748">fsim/tables/ps_idle_ms/h0/w1/v1</property>
      <property value="-26.2123">fsim/tables/ps_idle_ms/h0/w1/v10</property>
      <property value="-30.821">fsim/tables/ps_idle_ms/h0/w1/v11</property>
      <property value="-35.9086">fsim/tables/ps_idle_ms/h0/w1/v12</property>
      <property value="-42.8181">fsim/tables/ps_idle_ms/h0/w1/v13</property>
      <property value="-51.9862">fsim/tables/ps_idle_ms/h0/w1/v14</property>
      <property value="-62.6791">fsim/tables/ps_idle_ms/h0/w1/v15</property>
      <property value="-5.5664">fsim/tables/ps_idle_ms/h0/w1/v2</property>
      <property value="-6.74059">fsim/tables/ps_idle_ms/h0/w1/v3</property>
      <property value="-8.27239">fsim/tables/ps_idle_ms/h0/w1/v4</property>
      <property value="-10.1961">fsim/tables/ps_idle_ms/h0/w1/v5</property>
      <property value="-12.5377">fsim/tables/ps_idle_ms/h0/w1/v6</property>
      <property value="-15.2707">fsim/tables/ps_idle_ms/h0/w1/v7</property>
      <property value="-18.3834">fsim/tables/ps_idle_ms/h0/w1/v8</property>
      <property value="-22.08">fsim/tables/ps_idle_ms/h0/w1/v9</property>
      <property value="-4.88451">fsim/tables/ps_idle_ms/h0/w2/v0</property>
      <property value="-5.13367">fsim/tables/ps_idle_ms/h0/w2/v1</property>
      <property value="-23.3023">fsim/tables/ps_idle_ms/h0/w2/v10</property>
      <property value="-27.2631">fsim/tables/ps_idle_ms/h0/w2/v11</property>
      <property value="-31.6235">fsim/tables/ps_idle_ms/h0/w2/v12</property>
      <property value="-37.5468">fsim/tables/ps_idle_ms/h0/w2/v13</property>
      <property value="-45.1336">fsim/tables/ps_idle_ms/h0/w2/v14</property>
      <property value="-54.2661">fsim/tables/ps_idle_ms/h0/w2/v15</property>
      <property value="-5.78039">fsim/tables/ps_idle_ms/h0/w2/v2</property>
      <property value="-6.74589">fsim/tables/ps_idle_ms/h0/w2/v3</property>
      <property value="-8.0562">fsim/tables/ps_idle_ms/h0/w2/v4</property>
      <property value="-9.70066">fsim/tables/ps_idle_ms/h0/w2/v5</property>
      <property value="-11.642">fsim/tables/ps_idle_ms/h0/w2/v6</property>
      <property value="-14.0197">fsim/tables/ps_idle_ms/h0/w2/v7</property>
      <property value="-16.7016">fsim/tables/ps_idle_ms/h0/w2/v8</property>
      <property value="-19.7346">fsim/tables/ps_idle_ms/h0/w2/v9</property>
      <property value="-4.61204">fsim/tables/ps_idle_ms/h1/w0/v0</property>
      <property value="-4.89216">fsim/tables/ps_idle_ms/h1/w0/v1</property>
      <property value="-24.1097">fsim/tables/ps_idle_ms/h1/w0/v10</property>
      <property value="-28.2908">fsim/tables/ps_idle_ms/h1/w0/v11</property>
      <property value="-32.9256">fsim/tables/ps_idle_ms/h1/w0/v12</property>
      <property value="-39.6715">fsim/tables/ps_idle_ms/h1/w0/v13</property>
      <property value="-47.936">fsim/tables/ps_idle_ms/h1/w0/v14</property>
      <property value="-59.8664">fsim/tables/ps_idle_ms/h1/w0/v15</property>
      <property value="-5.57165">fsim/tables/ps_idle_ms/h1/w0/v2</property>
      <property value="-6.58382">fsim/tables/ps_idle_ms/h1/w0/v3</property>
      <property value="-7.96352">fsim/tables/ps_idle_ms/h1/w0/v4</property>
      <property value="-9.71111">fsim/tables/ps_idle_ms/h1/w0/v5</property>
      <property value="-11.7638">fsim/tables/ps_idle_ms/h1/w0/v6</property>
      <property value="-14.2693">fsim/tables/ps_idle_ms/h1/w0/v7</property>
      <property value="-17.0736">fsim/tables/ps_idle_ms/h1/w0/v8</property>
      <property value="-20.3496">fsim/tables/ps_idle_ms/h1/w0/v9</property>
      <property value="-5.23127">fsim/tables/ps_idle_ms/h1/w1/v0</property>
      <property value="-5.40233">fsim/tables/ps_idle_ms/h1/w1/v1</property>
      <property value="-21.1228">fsim/tables/ps_idle_ms/h1/w1/v10</property>
      <property value="-24.618">fsim/tables/ps_idle_ms/h1/w1/v11</property>
      <property value="-28.488">fsim/tables/ps_idle_ms/h1/w1/v12</property>
      <property value="-34.1655">fsim/tables/ps_idle_ms/h1/w1/v13</property>
      <property value="-40.8883">fsim/tables/ps_idle_ms/h1/w1/v14</property>
      <property value="-50.513">fsim/tables/ps_idle_ms/h1/w1/v15</property>
      <property value="-5.89433">fsim/tables/ps_idle_ms/h1/w1/v2</property>
      <property value="-6.73431">fsim/tables/ps_idle_ms/h1/w1/v3</property>
      <property value="-7.86049">fsim/tables/ps_idle_ms/h1/w1/v4</property>
      <property value="-9.26125">fsim/tables/ps_idle_ms/h1/w1/v5</property>
      <property value="-11.0239">fsim/tables/ps_idle_ms/h1/w1/v6</property>
      <property value="-13.0281">fsim/tables/ps_idle_ms/h1/w1/v7</property>
      <property value="-15.4282">fsim/tables/ps_idle_ms/h1/w1/v8</property>
      <property value="-18.0824">fsim/tables/ps_idle_ms/h1/w1/v9</property>
      <property value="-5.84941">fsim/tables/ps_idle_ms/h1/w2/v0</property>
      <property value="-5.88534">fsim/tables/ps_idle_ms/h1/w2/v1</property>
      <property value="-19.0882">fsim/tables/ps_idle_ms/h1/w2/v10</property>
      <property value="-21.946">fsim/tables/ps_idle_ms/h1/w2/v11</property>
      <property value="-25.2663">fsim/tables/ps_idle_ms/h1/w2/v12</property>
      <property value="-30.1551">fsim/tables/ps_idle_ms/h1/w2/v13</property>
      <property value="-35.8361">fsim/tables/ps_idle_ms/h1/w2/v14</property>
      <property value="-43.6198">fsim/tables/ps_idle_ms/h1/w2/v15</property>
      <property value="-6.25737">fsim/tables/ps_idle_ms/h1/w2/v2</property>
      <property value="-6.93027">fsim/tables/ps_idle_ms/h1/w2/v3</property>
      <property value="-7.87081">fsim/tables/ps_idle_ms/h1/w2/v4</property>
      <property value="-9.08395">fsim/tables/ps_idle_ms/h1/w2/v5</property>
      <property value="-10.5332">fsim/tables/ps_idle_ms/h1/w2/v6</property>
      <property value="-12.26">fsim/tables/ps_idle_ms/h1/w2/v7</property>
      <property value="-14.2365">fsim/tables/ps_idle_ms/h1/w2/v8</property>
      <property value="-16.5474">fsim/tables/ps_idle_ms/h1/w2/v9</property>
      <property value="-5.61299">fsim/tables/ps_idle_ms/h2/w0/v0</property>
      <property value="-5.67362">fsim/tables/ps_idle_ms/h2/w0/v1</property>
      <property value="-18.9139">fsim/tables/ps_idle_ms/h2/w0/v10</property>
      <property value="-21.8103">fsim/tables/ps_idle_ms/h2/w0/v11</property>
      <property value="-25.224">fsim/tables/ps_idle_ms/h2/w0/v12</property>
      <property value="-30.2246">fsim/tables/ps_idle_ms/h2/w0/v13</property>
      <property value="-35.9693">fsim/tables/ps_idle_ms/h2/w0/v14</property>
      <property value="-45.5063">fsim/tables/ps_idle_ms/h2/w0/v15</property>
      <property value="-6.05176">fsim/tables/ps_idle_ms/h2/w0/v2</property>
      <property value="-6.72272">fsim/tables/ps_idle_ms/h2/w0/v3</property>
      <property value="-7.66521">fsim/tables/ps_idle_ms/h2/w0/v4</property>
      <property value="-8.88457">fsim/tables/ps_idle_ms/h2/w0/v5</property>
      <property value="-10.3455">fsim/tables/ps_idle_ms/h2/w0/v6</property>
      <property value="-12.0647">fsim/tables/ps_idle_ms/h2/w0/v7</property>
      <property value="-14.0633">fsim/tables/ps_idle_ms/h2/w0/v8</property>
      <property value="-16.3727">fsim/tables/ps_idle_ms/h2/w0/v9</property>
      <property value="-6.38728">fsim/tables/ps_idle_ms/h2/w1/v0</property>
      <property value="-6.28603">fsim/tables/ps_idle_ms/h2/w1/v1</property>
      <property value="-16.9961">fsim/tables/ps_idle_ms/h2/w1/v10</property>
      <property value="-19.3259">fsim/tables/ps_idle_ms/h2/w1/v11</property>
      <property value="-22.0436">fsim/tables/ps_idle_ms/h2/w1/v12</property>
      <property value="-26.1841">fsim/tables/ps_idle_ms/h2/w1/v13</property>
      <property value="-30.8766">fsim/tables/ps_idle_ms/h2/w1/v14</property>
      <property value="-38.2169">fsim/tables/ps_idle_ms/h2/w1/v15</property>
      <property value="-6.5356">fsim/tables/ps_idle_ms/h2/w1/v2</property>
      <property value="-7.0512">fsim/tables/ps_idle_ms/h2/w1/v3</property>
      <property value="-7.80859">fsim/tables/ps_idle_ms/h2/w1/v4</property>
      <property value="-8.76713">fsim/tables/ps_idle_ms/h2/w1/v5</property>
      <property value="-9.97836">fsim/tables/ps_idle_ms/h2/w1/v6</property>
      <property value="-11.3857">fsim/tables/ps_idle_ms/h2/w1/v7</property>
      <property value="-13.0107">fsim/tables/ps_idle_ms/h2/w1/v8</property>
      <property value="-14.8548">fsim/tables/ps_idle_ms/h2/w1/v9</property>
      <property value="-7.11558">fsim/tables/ps_idle_ms/h2/w2/v0</property>
      <property value="-6.84902">fsim/tables/ps_idle_ms/h2/w2/v1</property>
      <property value="-15.6052">fsim/tables/ps_idle_ms/h2/w2/v10</property>
      <property value="-17.6039">fsim/tables/ps_idle_ms/h2/w2/v11</property>
      <property value="-19.972">fsim/tables/ps_idle_ms/h2/w2/v12</property>
      <property value="-23.296">fsim/tables/ps_idle_ms/h2/w2/v13</property>
      <property value="-27.1838">fsim/tables/ps_idle_ms/h2/w2/v14</property>
      <property value="-32.959">fsim/tables/ps_idle_ms/h2/w2/v15</property>
      <property value="-7.03076">fsim/tables/ps_idle_ms/h2/w2/v2</property>
      <property value="-7.41518">fsim/tables/ps_idle_ms/h2/w2/v3</property>
      <property value="-8.02857">fsim/tables/ps_idle_ms/h2/w2/v4</property>
      <property value="-8.83629">fsim/tables/ps_idle_ms/h2/w2/v5</property>
      <property value="-9.80954">fsim/tables/ps_idle_ms/h2/w2/v6</property>
      <property value="-10.9688">fsim/tables/ps_idle_ms/h2/w2/v7</property>
      <property value="-12.3427">fsim/tables/ps_idle_ms/h2/w2/v8</property>
      <property value="-13.8801">fsim/tables/ps_idle_ms/h2/w2/v9</property>
      <property value="-6.9422">fsim/tables/ps_idle_ms/h3/w0/v0</property>
      <property value="-6.67594">fsim/tables/ps_idle_ms/h3/w0/v1</property>
      <property value="-15.0556">fsim/tables/ps_idle_ms/h3/w0/v10</property>
      <property value="-16.9762">fsim/tables/ps_idle_ms/h3/w0/v11</property>
      <property value="-19.2785">fsim/tables/ps_idle_ms/h3/w0/v12</property>
      <property value="-22.471">fsim/tables/ps_idle_ms/h3/w0/v13</property>
      <property value="-26.1868">fsim/tables/ps_idle_ms/h3/w0/v14</property>
      <property value="-31.946">fsim/tables/ps_idle_ms/h3/w0/v15</property>
      <property value="-6.84971">fsim/tables/ps_idle_ms/h3/w0/v2</property>
      <property value="-7.21415">fsim/tables/ps_idle_ms/h3/w0/v3</property>
      <property value="-7.80179">fsim/tables/ps_idle_ms/h3/w0/v4</property>
      <property value="-8.57437">fsim/tables/ps_idle_ms/h3/w0/v5</property>
      <property value="-9.50321">fsim/tables/ps_idle_ms/h3/w0/v6</property>
      <property value="-10.6212">fsim/tables/ps_idle_ms/h3/w0/v7</property>
      <property value="-11.9318">fsim/tables/ps_idle_ms/h3/w0/v8</property>
      <property value="-13.4119">fsim/tables/ps_idle_ms/h3/w0/v9</property>
      <property value="-7.80059">fsim/tables/ps_idle_ms/h3/w1/v0</property>
      <property value="-7.37959">fsim/tables/ps_idle_ms/h3/w1/v1</property>
      <property value="-13.9194">fsim/tables/ps_idle_ms/h3/w1/v10</property>
      <property value="-15.351">fsim/tables/ps_idle_ms/h3/w1/v11</property>
      <property value="-17.311">fsim/tables/ps_idle_ms/h3/w1/v12</property>
      <property value="-19.9222">fsim/tables/ps_idle_ms/h3/w1/v13</property>
      <property value="-22.8188">fsim/tables/ps_idle_ms/h3/w1/v14</property>
      <property value="-26.9343">fsim/tables/ps_idle_ms/h3/w1/v15</property>
      <property value="-7.49072">fsim/tables/ps_idle_ms/h3/w1/v2</property>
      <property value="-7.72572">fsim/tables/ps_idle_ms/h3/w1/v3</property>
      <property value="-8.1476">fsim/tables/ps_idle_ms/h3/w1/v4</property>
      <property value="-8.7489">fsim/tables/ps_idle_ms/h3/w1/v5</property>
      <property value="-9.49742">fsim/tables/ps_idle_ms/h3/w1/v6</property>
      <property value="-10.3708">fsim/tables/ps_idle_ms/h3/w1/v7</property>
      <property value="-11.4041">fsim/tables/ps_idle_ms/h3/w1/v8</property>
      <property value="-12.5754">fsim/tables/ps_idle_ms/h3/w1/v9</property>
      <property value="-8.58978">fsim/tables/ps_idle_ms/h3/w2/v0</property>
      <property value="-8.06856">fsim/tables/ps_idle_ms/h3/w2/v1</property>
      <property value="-13.131">fsim/tables/ps_idle_ms/h3/w2/v10</property>
      <property value="-14.3575">fsim/tables/ps_idle_ms/h3/w2/v11</property>
      <property value="-15.9467">fsim/tables/ps_idle_ms/h3/w2/v12</property>
      <property value="-18.0422">fsim/tables/ps_idle_ms/h3/w2/v13</property>
      <property value="-20.4455">fsim/tables/ps_idle_ms/h3/w2/v14</property>
      <property value="-23.5172">fsim/tables/ps_idle_ms/h3/w2/v15</property>
      <property value="-8.08449">fsim/tables/ps_idle_ms/h3/w2/v2</property>
      <property value="-8.26762">fsim/tables/ps_idle_ms/h3/w2/v3</property>
      <property value="-8.56949">fsim/tables/ps_idle_ms/h3/w2/v4</property>
      <property value="-9.01584">fsim/tables/ps_idle_ms/h3/w2/v5</property>
      <property value="-9.57961">fsim/tables/ps_idle_ms/h3/w2/v6</property>
      <property value="-10.3074">fsim/tables/ps_idle_ms/h3/w2/v7</property>
      <property value="-11.1277">fsim/tables/ps_idle_ms/h3/w2/v8</property>
      <property value="-12.0777">fsim/tables/ps_idle_ms/h3/w2/v9</property>
      <property value="-8.1103">fsim/tables/ps_idle_ms/h4/w0/v0</property>
      <property value="-7.59453">fsim/tables/ps_idle_ms/h4/w0/v1</property>
      <property value="-13.0512">fsim/tables/ps_idle_ms/h4/w0/v10</property>
      <property value="-14.3159">fsim/tables/ps_idle_ms/h4/w0/v11</property>
      <property value="-15.9223">fsim/tables/ps_idle_ms/h4/w0/v12</property>
      <property value="-18.1805">fsim/tables/ps_idle_ms/h4/w0/v13</property>
      <property value="-20.6882">fsim/tables/ps_idle_ms/h4/w0/v14</property>
      <property value="-23.8931">fsim/tables/ps_idle_ms/h4/w0/v15</property>
      <property value="-7.65688">fsim/tables/ps_idle_ms/h4/w0/v2</property>
      <property value="-7.85263">fsim/tables/ps_idle_ms/h4/w0/v3</property>
      <property value="-8.18294">fsim/tables/ps_idle_ms/h4/w0/v4</property>
      <property value="-8.67979">fsim/tables/ps_idle_ms/h4/w0/v5</property>
      <property value="-9.2912">fsim/tables/ps_idle_ms/h4/w0/v6</property>
      <property value="-10.027">fsim/tables/ps_idle_ms/h4/w0/v7</property>
      <property value="-10.9239">fsim/tables/ps_idle_ms/h4/w0/v8</property>
      <property value="-11.8948">fsim/tables/ps_idle_ms/h4/w0/v9</property>
      <property value="-8.98492">fsim/tables/ps_idle_ms/h4/w1/v0</property>
      <property value="-8.43272">fsim/tables/ps_idle_ms/h4/w1/v1</property>
      <property value="-12.347">fsim/tables/ps_idle_ms/h4/w1/v10</property>
      <property value="-13.2853">fsim/tables/ps_idle_ms/h4/w1/v11</property>
      <property value="-14.6626">fsim/tables/ps_idle_ms/h4/w1/v12</property>
      <property value="-16.3454">fsim/tables/ps_idle_ms/h4/w1/v13</property>
      <property value="-18.2118">fsim/tables/ps_idle_ms/h4/w1/v14</property>
      <property value="-20.507">fsim/tables/ps_idle_ms/h4/w1/v15</property>
      <property value="-8.37399">fsim/tables/ps_idle_ms/h4/w1/v2</property>
      <property value="-8.50399">fsim/tables/ps_idle_ms/h4/w1/v3</property>
      <property value="-8.71465">fsim/tables/ps_idle_ms/h4/w1/v4</property>
      <property value="-9.03994">fsim/tables/ps_idle_ms/h4/w1/v5</property>
      <property value="-9.51043">fsim/tables/ps_idle_ms/h4/w1/v6</property>
      <property value="-10.0628">fsim/tables/ps_idle_ms/h4/w1/v7</property>
      <property value="-10.7224">fsim/tables/ps_idle_ms/h4/w1/v8</property>
      <property value="-11.4845">fsim/tables/ps_idle_ms/h4/w1/v9</property>
      <property value="-9.83574">fsim/tables/ps_idle_ms/h4/w2/v0</property>
      <property value="-9.20675">fsim/tables/ps_idle_ms/h4/w2/v1</property>
      <property value="-11.9499">fsim/tables/ps_idle_ms/h4/w2/v10</property>
      <property value="-12.7192">fsim/tables/ps_idle_ms/h4/w2/v11</property>
      <property value="-13.7851">fsim/tables/ps_idle_ms/h4/w2/v12</property>
      <property value="-15.1402">fsim/tables/ps_idle_ms/h4/w2/v13</property>
      <property value="-16.6433">fsim/tables/ps_idle_ms/h4/w2/v14</property>
      <property value="-18.3281">fsim/tables/ps_idle_ms/h4/w2/v15</property>
      <property value="-9.05941">fsim/tables/ps_idle_ms/h4/w2/v2</property>
      <property value="-9.14334">fsim/tables/ps_idle_ms/h4/w2/v3</property>
      <property value="-9.28167">fsim/tables/ps_idle_ms/h4/w2/v4</property>
      <property value="-9.48588">fsim/tables/ps_idle_ms/h4/w2/v5</property>
      <property value="-9.785">fsim/tables/ps_idle_ms/h4/w2/v6</property>
      <property value="-10.2302">fsim/tables/ps_idle_ms/h4/w2/v7</property>
      <property value="-10.7126">fsim/tables/ps_idle_ms/h4/w2/v8</property>
      <property value="-11.3038">fsim/tables/ps_idle_ms/h4/w2/v9</property>
      <property value="-8.91279">fsim/tables/ps_idle_ms/h5/w0/v0</property>
      <property value="-8.28312">fsim/tables/ps_idle_ms/h5/w0/v1</property>
      <property value="-12.1161">fsim/tables/ps_idle_ms/h5/w0/v10</property>
      <property value="-13.0148">fsim/tables/ps_idle_ms/h5/w0/v11</property>
      <property value="-14.3646">fsim/tables/ps_idle_ms/h5/w0/v12</property>
      <property value="-15.998">fsim/tables/ps_idle_ms/h5/w0/v13</property>
      <property value="-17.7972">fsim/tables/ps_idle_ms/h5/w0/v14</property>
      <property value="-20.0425">fsim/tables/ps_idle_ms/h5/w0/v15</property>
      <property value="-8.27055">fsim/tables/ps_idle_ms/h5/w0/v2</property>
      <property value="-8.39703">fsim/tables/ps_idle_ms/h5/w0/v3</property>
      <property value="-8.60174">fsim/tables/ps_idle_ms/h5/w0/v4</property>
      <property value="-8.91433">fsim/tables/ps_idle_ms/h5/w0/v5</property>
      <property value="-9.36872">fsim/tables/ps_idle_ms/h5/w0/v6</property>
      <property value="-9.90048">fsim/tables/ps_idle_ms/h5/w0/v7</property>
      <property value="-10.5444">fsim/tables/ps_idle_ms/h5/w0/v8</property>
      <property value="-11.2759">fsim/tables/ps_idle_ms/h5/w0/v9</property>
      <property value="-9.80566">fsim/tables/ps_idle_ms/h5/w1/v0</property>
      <property value="-9.22177">fsim/tables/ps_idle_ms/h5/w1/v1</property>
      <property value="-11.684">fsim/tables/ps_idle_ms/h5/w1/v10</property>
      <property value="-12.4041">fsim/tables/ps_idle_ms/h5/w1/v11</property>
      <property value="-13.4261">fsim/tables/ps_idle_ms/h5/w1/v12</property>
      <property value="-14.6383">fsim/tables/ps_idle_ms/h5/w1/v13</property>
      <property value="-16.0438">fsim/tables/ps_idle_ms/h5/w1/v14</property>
      <property value="-17.6319">fsim/tables/ps_idle_ms/h5/w1/v15</property>
      <property value="-9.06921">fsim/tables/ps_idle_ms/h5/w1/v2</property>
      <property value="-9.13892">fsim/tables/ps_idle_ms/h5/w1/v3</property>
      <property value="-9.26354">fsim/tables/ps_idle_ms/h5/w1/v4</property>
      <property value="-9.44506">fsim/tables/ps_idle_ms/h5/w1/v5</property>
      <property value="-9.72957">fsim/tables/ps_idle_ms/h5/w1/v6</property>
      <property value="-10.1208">fsim/tables/ps_idle_ms/h5/w1/v7</property>
      <property value="-10.5491">fsim/tables/ps_idle_ms/h5/w1/v8</property>
      <property value="-11.1086">fsim/tables/ps_idle_ms/h5/w1/v9</property>
      <property value="-9.80943">fsim/tables/ps_idle_ms/h5/w2/v0</property>
      <property value="-9.86956">fsim/tables/ps_idle_ms/h5/w2/v1</property>
      <property value="-12.0518">fsim/tables/ps_idle_ms/h5/w2/v10</property>
      <property value="-12.6476">fsim/tables/ps_idle_ms/h5/w2/v11</property>
      <property value="-13.3922">fsim/tables/ps_idle_ms/h5/w2/v12</property>
      <property value="-14.178">fsim/tables/ps_idle_ms/h5/w2/v13</property>
      <property value="-15.0097">fsim/tables/ps_idle_ms/h5/w2/v14</property>
      <property value="-15.9642">fsim/tables/ps_idle_ms/h5/w2/v15</property>
      <property value="-9.94448">fsim/tables/ps_idle_ms/h5/w2/v2</property>
      <property value="-10.0761">fsim/tables/ps_idle_ms/h5/w2/v3</property>
      <property value="-10.2241">fsim/tables/ps_idle_ms/h5/w2/v4</property>
      <property value="-10.4138">fsim/tables/ps_idle_ms/h5/w2/v5</property>
      <property value="-10.6365">fsim/tables/ps_idle_ms/h5/w2/v6</property>
      <property value="-10.938">fsim/tables/ps_idle_ms/h5/w2/v7</property>
      <property value="-11.243">fsim/tables/ps_idle_ms/h5/w2/v8</property>
      <property value="-11.6391">fsim/tables/ps_idle_ms/h5/w2/v9</property>
      <property value="-9.1876">fsim/tables/ps_idle_ms/h6/w0/v0</property>
      <property value="-8.52879">fsim/tables/ps_idle_ms/h6/w0/v1</property>
      <property value="-11.8724">fsim/tables/ps_idle_ms/h6/w0/v10</property>
      <property value="-12.6831">fsim/tables/ps_idle_ms/h6/w0/v11</property>
      <property value="-13.882">fsim/tables/ps_idle_ms/h6/w0/v12</property>
      <property value="-15.38">fsim/tables/ps_idle_ms/h6/w0/v13</property>
      <property value="-17.007">fsim/tables/ps_idle_ms/h6/w0/v14</property>
      <property value="-18.9124">fsim/tables/ps_idle_ms/h6/w0/v15</property>
      <property value="-8.49773">fsim/tables/ps_idle_ms/h6/w0/v2</property>
      <property value="-8.60754">fsim/tables/ps_idle_ms/h6/w0/v3</property>
      <property value="-8.78226">fsim/tables/ps_idle_ms/h6/w0/v4</property>
      <property value="-9.04896">fsim/tables/ps_idle_ms/h6/w0/v5</property>
      <property value="-9.41959">fsim/tables/ps_idle_ms/h6/w0/v6</property>
      <property value="-9.88723">fsim/tables/ps_idle_ms/h6/w0/v7</property>
      <property value="-10.4746">fsim/tables/ps_idle_ms/h6/w0/v8</property>
      <property value="-11.0936">fsim/tables/ps_idle_ms/h6/w0/v9</property>
      <property value="-9.33289">fsim/tables/ps_idle_ms/h6/w1/v0</property>
      <property value="-9.4067">fsim/tables/ps_idle_ms/h6/w1/v1</property>
      <property value="-12.06">fsim/tables/ps_idle_ms/h6/w1/v10</property>
      <property value="-12.8009">fsim/tables/ps_idle_ms/h6/w1/v11</property>
      <property value="-13.6456">fsim/tables/ps_idle_ms/h6/w1/v12</property>
      <property value="-14.544">fsim/tables/ps_idle_ms/h6/w1/v13</property>
      <property value="-15.5946">fsim/tables/ps_idle_ms/h6/w1/v14</property>
      <property value="-16.7851">fsim/tables/ps_idle_ms/h6/w1/v15</property>
      <property value="-9.51103">fsim/tables/ps_idle_ms/h6/w1/v2</property>
      <property value="-9.64362">fsim/tables/ps_idle_ms/h6/w1/v3</property>
      <property value="-9.85219">fsim/tables/ps_idle_ms/h6/w1/v4</property>
      <property value="-10.0739">fsim/tables/ps_idle_ms/h6/w1/v5</property>
      <property value="-10.4004">fsim/tables/ps_idle_ms/h6/w1/v6</property>
      <property value="-10.727">fsim/tables/ps_idle_ms/h6/w1/v7</property>
      <property value="-11.1518">fsim/tables/ps_idle_ms/h6/w1/v8</property>
      <property value="-11.5912">fsim/tables/ps_idle_ms/h6/w1/v9</property>
      <property value="-10.0637">fsim/tables/ps_idle_ms/h6/w2/v0</property>
      <property value="-10.1134">fsim/tables/ps_idle_ms/h6/w2/v1</property>
      <property value="-11.8946">fsim/tables/ps_idle_ms/h6/w2/v10</property>
      <property value="-12.415">fsim/tables/ps_idle_ms/h6/w2/v11</property>
      <property value="-12.9794">fsim/tables/ps_idle_ms/h6/w2/v12</property>
      <property value="-13.6548">fsim/tables/ps_idle_ms/h6/w2/v13</property>
      <property value="-14.3736">fsim/tables/ps_idle_ms/h6/w2/v14</property>
      <property value="-15.1654">fsim/tables/ps_idle_ms/h6/w2/v15</property>
      <property value="-10.1742">fsim/tables/ps_idle_ms/h6/w2/v2</property>
      <property value="-10.2905">fsim/tables/ps_idle_ms/h6/w2/v3</property>
      <property value="-10.3967">fsim/tables/ps_idle_ms/h6/w2/v4</property>
      <property value="-10.5584">fsim/tables/ps_idle_ms/h6/w2/v5</property>
      <property value="-10.7264">fsim/tables/ps_idle_ms/h6/w2/v6</property>
      <property value="-10.9623">fsim/tables/ps_idle_ms/h6/w2/v7</property>
      <property value="-11.2354">fsim/tables/ps_idle_ms/h6/w2/v8</property>
      <property value="-11.5189">fsim/tables/ps_idle_ms/h6/w2/v9</property>
      <property value="-9.82473">fsim/tables/ps_idle_ms/h7/w0/v0</property>
      <property value="-9.15866">fsim/tables/ps_idle_ms/h7/w0/v1</property>
      <property value="-11.5265">fsim/tables/ps_idle_ms/h7/w0/v10</property>
      <property value="-12.2039">fsim/tables/ps_idle_ms/h7/w0/v11</property>
      <property value="-13.1936">fsim/tables/ps_idle_ms/h7/w0/v12</property>
      <property value="-14.3315">fsim/tables/ps_idle_ms/h7/w0/v13</property>
      <property value="-15.6778">fsim/tables/ps_idle_ms/h7/w0/v14</property>
      <property value="-17.2181">fsim/tables/ps_idle_ms/h7/w0/v15</property>
      <property value="-9.04307">fsim/tables/ps_idle_ms/h7/w0/v2</property>
      <property value="-9.10554">fsim/tables/ps_idle_ms/h7/w0/v3</property>
      <property value="-9.22251">fsim/tables/ps_idle_ms/h7/w0/v4</property>
      <property value="-9.39591">fsim/tables/ps_idle_ms/h7/w0/v5</property>
      <property value="-9.67219">fsim/tables/ps_idle_ms/h7/w0/v6</property>
      <property value="-10.0296">fsim/tables/ps_idle_ms/h7/w0/v7</property>
      <property value="-10.4393">fsim/tables/ps_idle_ms/h7/w0/v8</property>
      <property value="-10.9721">fsim/tables/ps_idle_ms/h7/w0/v9</property>
      <property value="-9.90673">fsim/tables/ps_idle_ms/h7/w1/v0</property>
      <property value="-9.96347">fsim/tables/ps_idle_ms/h7/w1/v1</property>
      <property value="-11.915">fsim/tables/ps_idle_ms/h7/w1/v10</property>
      <property value="-12.4673">fsim/tables/ps_idle_ms/h7/w1/v11</property>
      <property value="-13.1035">fsim/tables/ps_idle_ms/h7/w1/v12</property>
      <property value="-13.8239">fsim/tables/ps_idle_ms/h7/w1/v13</property>
      <property value="-14.5818">fsim/tables/ps_idle_ms/h7/w1/v14</property>
      <property value="-15.4347">fsim/tables/ps_idle_ms/h7/w1/v15</property>
      <property value="-10.0293">fsim/tables/ps_idle_ms/h7/w1/v2</property>
      <property value="-10.1536">fsim/tables/ps_idle_ms/h7/w1/v3</property>
      <property value="-10.2751">fsim/tables/ps_idle_ms/h7/w1/v4</property>
      <property value="-10.4479">fsim/tables/ps_idle_ms/h7/w1/v5</property>
      <property value="-10.6321">fsim/tables/ps_idle_ms/h7/w1/v6</property>
      <property value="-10.901">fsim/tables/ps_idle_ms/h7/w1/v7</property>
      <property value="-11.1814">fsim/tables/ps_idle_ms/h7/w1/v8</property>
      <property value="-11.5131">fsim/tables/ps_idle_ms/h7/w1/v9</property>
      <property value="-11.0066">fsim/tables/ps_idle_ms/h7/w2/v0</property>
      <property value="-11.0846">fsim/tables/ps_idle_ms/h7/w2/v1</property>
      <property value="-12.1253">fsim/tables/ps_idle_ms/h7/w2/v10</property>
      <property value="-12.3391">fsim/tables/ps_idle_ms/h7/w2/v11</property>
      <property value="-12.5749">fsim/tables/ps_idle_ms/h7/w2/v12</property>
      <property value="-12.8142">fsim/tables/ps_idle_ms/h7/w2/v13</property>
      <property value="-13.065">fsim/tables/ps_idle_ms/h7/w2/v14</property>
      <property value="-13.3326">fsim/tables/ps_idle_ms/h7/w2/v15</property>
      <property value="-11.1597">fsim/tables/ps_idle_ms/h7/w2/v2</property>
      <property value="-11.2314">fsim/tables/ps_idle_ms/h7/w2/v3</property>
      <property value="-11.3017">fsim/tables/ps_idle_ms/h7/w2/v4</property>
      <property value="-11.3938">fsim/tables/ps_idle_ms/h7/w2/v5</property>
      <property value="-11.5108">fsim/tables/ps_idle_ms/h7/w2/v6</property>
      <property value="-11.6226">fsim/tables/ps_idle_ms/h7/w2/v7</property>
      <property value="-11.7577">fsim/tables/ps_idle_ms/h7/w2/v8</property>
      <property value="-11.9364">fsim/tables/ps_idle_ms/h7/w2/v9</property>
      <property value="276.795">fsim/tables/reach_tas_ms/h0/w0</property>
      <property value="276.597">fsim/tables/reach_tas_ms/h0/w1</property>
      <property value="276.425">fsim/tables/reach_tas_ms/h0/w2</property>
      <property value="272.7">fsim/tables/reach_tas_ms/h1/w0</property>
      <property value="272.524">fsim/tables/reach_tas_ms/h1/w1</property>
      <property value="272.309">fsim/tables/reach_tas_ms/h1/w2</property>
      <property value="266.139">fsim/tables/reach_tas_ms/h2/w0</property>
      <property value="265.81">fsim/tables/reach_tas_ms/h2/w1</property>
      <property value="265.474">fsim/tables/reach_tas_ms/h2/w2</property>
      <property value="257.488">fsim/tables/reach_tas_ms/h3/w0</property>
      <property value="257">fsim/tables/reach_tas_ms/h3/w1</property>
      <property value="256.374">fsim/tables/reach_tas_ms/h3/w2</property>
      <property value="249.891">fsim/tables/reach_tas_ms/h4/w0</property>
      <property value="248.907">fsim/tables/reach_tas_ms/h4/w1</property>
      <property value="247.879">fsim/tables/reach_tas_ms/h4/w2</property>
      <property value="244.669">fsim/tables/reach_tas_ms/h5/w0</property>
      <property value="243.443">fsim/tables/reach_tas_ms/h5/w1</property>
      <property value="241.771">fsim/tables/reach_tas_ms/h5/w2</property>
      <property value="242.753">fsim/tables/reach_tas_ms/h6/w0</property>
      <property value="241.261">fsim/tables/reach_tas_ms/h6/w1</property>
      <property value="238.52">fsim/tables/reach_tas_ms/h6/w2</property>
      <property value="240.45">fsim/tables/reach_tas_ms/h7/w0</property>
      <property value="238.684">fsim/tables/reach_tas_ms/h7/w1</property>
      <property value="0.0">fsim/tables/speed_fraction/v0</property>
      <property value="0.0666667">fsim/tables/speed_fraction/v1</property>
      <property value="0.666667">fsim/tables/speed_fraction/v10</property>
      <property value="0.733333">fsim/tables/speed_fraction/v11</property>
      <property value="0.8">fsim/tables/speed_fraction/v12</property>
      <property value="0.866667">fsim/tables/speed_fraction/v13</property>
      <property value="0.933333">fsim/tables/speed_fraction/v14</property>
      <property value="1">fsim/tables/speed_fraction/v15</property>
      <property value="0.133333">fsim/tables/speed_fraction/v2</property>
      <property value="0.2">fsim/tables/speed_fraction/v3</property>
      <property value="0.266667">fsim/tables/speed_fraction/v4</property>
      <property value="0.333333">fsim/tables/speed_fraction/v5</property>
      <property value="0.4">fsim/tables/speed_fraction/v6</property>
      <property value="0.466667">fsim/tables/speed_fraction/v7</property>
      <property value="0.533333">fsim/tables/speed_fraction/v8</property>
      <property value="0.6">fsim/tables/speed_fraction/v9</property>
      <property value="54.7544">fsim/tables/stall_cas_ms/h0/w0</property>
      <property value="59.6908">fsim/tables/stall_cas_ms/h0/w1</property>
      <property value="64.2491">fsim/tables/stall_cas_ms/h0/w2</property>
      <property value="54.7542">fsim/tables/stall_cas_ms/h1/w0</property>
      <property value="59.6907">fsim/tables/stall_cas_ms/h1/w1</property>
      <property value="64.2489">fsim/tables/stall_cas_ms/h1/w2</property>
      <property value="54.9554">fsim/tables/stall_cas_ms/h2/w0</property>
      <property value="59.9099">fsim/tables/stall_cas_ms/h2/w1</property>
      <property value="64.4849">fsim/tables/stall_cas_ms/h2/w2</property>
      <property value="54.9745">fsim/tables/stall_cas_ms/h3/w0</property>
      <property value="59.9307">fsim/tables/stall_cas_ms/h3/w1</property>
      <property value="64.5073">fsim/tables/stall_cas_ms/h3/w2</property>
      <property value="55.2962">fsim/tables/stall_cas_ms/h4/w0</property>
      <property value="60.2815">fsim/tables/stall_cas_ms/h4/w1</property>
      <property value="64.8849">fsim/tables/stall_cas_ms/h4/w2</property>
      <property value="55.3636">fsim/tables/stall_cas_ms/h5/w0</property>
      <property value="60.3549">fsim/tables/stall_cas_ms/h5/w1</property>
      <property value="64.9639">fsim/tables/stall_cas_ms/h5/w2</property>
      <property value="55.3767">fsim/tables/stall_cas_ms/h6/w0</property>
      <property value="60.3693">fsim/tables/stall_cas_ms/h6/w1</property>
      <property value="64.9794">fsim/tables/stall_cas_ms/h6/w2</property>
      <property value="55.4895">fsim/tables/stall_cas_ms/h7/w0</property>
      <property value="60.4923">fsim/tables/stall_cas_ms/h7/w1</property>
      <property value="65.1117">fsim/tables/stall_cas_ms/h7/w2</property>
      <property value="49895.4">fsim/tables/weight_kg/w0</property>
      <property value="59297.7">fsim/tables/weight_kg/w1</property>
      <property value="68700">fsim/tables/weight_kg/w2</property>
      <channel name="Pitch">
        <summer name="fcs/pitch-trim-sum">
          <input>fcs/elevator-cmd-norm</input>
          <input>fcs/pitch-trim-cmd-norm</input>
          <clipto> <min>-1</min> <max>1</max> </clipto>
        </summer>
        <aerosurface_scale name="fcs/elevator-control">
          <input>fcs/pitch-trim-sum</input>
          <range> <min>-25.00</min> <max>20.00</max> </range>
          <gain>0.0174533</gain>
        </aerosurface_scale>
        <actuator name="fcs/elevator-actuator">
          <input>fcs/elevator-control</input>
          <rate_limit>2.0</rate_limit>
          <output>fcs/elevator-pos-rad</output>
        </actuator>
      </channel>
      <channel name="Roll">
        <summer name="fcs/roll-trim-sum">
          <input>fcs/aileron-cmd-norm</input>
          <input>fcs/roll-trim-cmd-norm</input>
          <clipto> <min>-1</min> <max>1</max> </clipto>
        </summer>
        <aerosurface_scale name="fcs/left-aileron-control">
          <input>fcs/roll-trim-sum</input>
          <range> <min>-20.00</min> <max>20.00</max> </range>
          <gain>0.0174533</gain>
        </aerosurface_scale>
        <actuator name="fcs/left-aileron-actuator">
          <input>fcs/left-aileron-control</input>
          <rate_limit>2.0</rate_limit>
          <output>fcs/left-aileron-pos-rad</output>
        </actuator>
        <pure_gain name="fcs/right-aileron">
          <input>fcs/left-aileron-pos-rad</input>
          <gain>-1</gain>
          <output>fcs/right-aileron-pos-rad</output>
        </pure_gain>
      </channel>
      <channel name="Yaw">
        <summer name="fcs/yaw-trim-sum">
          <input>fcs/rudder-cmd-norm</input>
          <input>fcs/yaw-trim-cmd-norm</input>
          <clipto> <min>-1</min> <max>1</max> </clipto>
        </summer>
        <aerosurface_scale name="fcs/rudder-control">
          <input>fcs/yaw-trim-sum</input>
          <range> <min>-25.00</min> <max>25.00</max> </range>
          <gain>0.0174533</gain>
        </aerosurface_scale>
        <!-- the yaw damper (hangar/fcs.py yaw_damper): the yaw rate, washed out so a
             steady turn's is left alone, against itself through the rudder - the
             dutch roll damped to 0.30 at 1 g across the speed range -->
        <washout_filter name="fcs/yaw-damper-washout">
          <input>velocities/r-rad_sec</input>
          <c1>0.500</c1>
        </washout_filter>
        <fcs_function name="fcs/yaw-damper">
          <function>
            <product>
              <value>-1</value>
              <table>
                <independentVar lookup="row">aero/qbar-psf</independentVar>
                <tableData>
                  10.0   -2.55000
                  20.0   -2.75000
                  40.0   -2.80000
                  80.0   -0.44025
                 150.0   -0.14813
                 300.0   -0.05883
                 600.0   -0.03583
                1200.0   -0.01969
                2400.0   -0.03235
                </tableData>
              </table>
              <property>fcs/yaw-damper-washout</property>
            </product>
          </function>
          <clipto> <min>-0.21817</min> <max>0.21817</max> </clipto>
        </fcs_function>
        <summer name="fcs/rudder-sum">
          <input>fcs/rudder-control</input>
          <input>fcs/yaw-damper</input>
          <clipto> <min>-0.43633</min> <max>0.43633</max> </clipto>
        </summer>
        <actuator name="fcs/rudder-actuator">
          <input>fcs/rudder-sum</input>
          <rate_limit>2.0</rate_limit>
          <output>fcs/rudder-pos-rad</output>
        </actuator>
        <!-- the nose or tail wheel steers with the rudder pedals (JSBSim steers from
             fcs/steer-cmd-norm, positive right; the rudder command is positive left) -->
        <pure_gain name="fcs/steer-from-rudder">
          <input>fcs/yaw-trim-sum</input>
          <gain>-1</gain>
          <output>fcs/steer-cmd-norm</output>
        </pure_gain>
      </channel>
      <channel name="Flaps">
        <kinematic name="fcs/flaps-control">
          <input>fcs/flap-cmd-norm</input>
          <traverse>
            <setting> <position>0.0</position> <time>0.0</time> </setting>
            <setting> <position>10.0</position> <time>2.0</time> </setting>
            <setting> <position>20.0</position> <time>2.0</time> </setting>
            <setting> <position>30.0</position> <time>2.0</time> </setting>
            <setting> <position>40.0</position> <time>2.0</time> </setting>
          </traverse>
          <output>fcs/flap-pos-deg</output>
        </kinematic>
        <pure_gain name="fcs/flaps-normalized">
          <input>fcs/flap-pos-deg</input>
          <gain>0.025</gain>
          <output>fcs/flap-pos-norm</output>
        </pure_gain>
      </channel>
      <channel name="Speedbrake">
        <kinematic name="fcs/speedbrake-control">
          <input>fcs/speedbrake-cmd-norm</input>
          <traverse>
            <setting> <position>0</position> <time>0</time> </setting>
            <setting> <position>1</position> <time>2.00</time> </setting>
          </traverse>
          <output>fcs/speedbrake-pos-norm</output>
        </kinematic>
      </channel>
      <channel name="Landing Gear">
        <kinematic name="fcs/gear-control">
          <input>gear/gear-cmd-norm</input>
          <traverse>
            <setting> <position>0</position> <time>0</time> </setting>
            <setting> <position>1</position> <time>5</time> </setting>
          </traverse>
          <output>gear/gear-pos-norm</output>
        </kinematic>
      </channel>
    </flight_control>
    <aerodynamics>
        <function name="aero/function/mach-lift">
          <description>lift, and damping, over its low-speed value (hangar: aero/mach.py)</description>
          <table>
            <independentVar lookup="row">velocities/mach</independentVar>
            <tableData>
                 0.000     1.000000
                 0.300     1.028980
                 0.500     1.088999
                 0.600     1.138625
                 0.700     1.209860
                 0.800     1.318336
                 0.850     1.397728
                 0.900     1.509108
                 0.950     1.515144
                 1.000     1.480835
                 1.050     1.419630
                 1.100     1.344976
                 1.200     1.209118
            </tableData>
          </table>
        </function>
        <function name="aero/function/mach-side">
          <description>side force, rolling and yawing moment over their low-speed values</description>
          <table>
            <independentVar lookup="row">velocities/mach</independentVar>
            <tableData>
                 0.000     1.000000
                 0.300     1.010328
                 0.500     1.031160
                 0.600     1.047900
                 0.700     1.071315
                 0.800     1.105943
                 0.850     1.130740
                 0.900     1.164972
                 0.950     1.156482
                 1.000     1.131631
                 1.050     1.095872
                 1.100     1.054660
                 1.200     0.977688
            </tableData>
          </table>
        </function>
        <function name="aero/function/mach-dCm-dCL">
          <description>pitching moment per unit low-speed lift: the neutral point's move</description>
          <table>
            <independentVar lookup="row">velocities/mach</independentVar>
            <tableData>
                 0.000     0.000000
                 0.300    -0.014083
                 0.500    -0.043189
                 0.600    -0.067187
                 0.700    -0.101537
                 0.800    -0.153720
                 0.850    -0.192040
                 0.900    -0.246763
                 0.950    -0.279372
                 1.000    -0.306135
                 1.050    -0.325536
                 1.100    -0.337288
                 1.200    -0.349048
            </tableData>
          </table>
        </function>
        <function name="aero/function/mach-dCD0">
          <description>zero-lift drag's change: friction and wave drag</description>
          <table>
            <independentVar lookup="row">velocities/mach</independentVar>
            <tableData>
                 0.000     0.000000
                 0.300    -0.000152
                 0.500    -0.000413
                 0.600    -0.000588
                 0.700    -0.000709
                 0.800     0.002559
                 0.850     0.019517
                 0.900     0.047729
                 0.950     0.078546
                 1.000     0.103322
                 1.050     0.113409
                 1.100     0.113267
                 1.200     0.112974
            </tableData>
          </table>
        </function>
        <function name="aero/function/mach-dK">
          <description>induced-drag factor's change (per CL^2)</description>
          <table>
            <independentVar lookup="row">velocities/mach</independentVar>
            <tableData>
                 0.000     0.000000
                 0.300     0.002213
                 0.500     0.006247
                 0.600     0.009112
                 0.700     0.012625
                 0.800     0.016920
                 0.850     0.019451
                 0.900     0.022350
                 0.950     0.022490
                 1.000     0.021676
                 1.050     0.038553
                 1.100     0.076396
                 1.200     0.110312
            </tableData>
          </table>
        </function>
        <function name="aero/function/mach-aileron">
          <description>aileron power over its low-speed value</description>
          <table>
            <independentVar lookup="row">velocities/mach</independentVar>
            <tableData>
                 0.000     1.000000
                 0.300     1.028038
                 0.500     1.085694
                 0.600     1.132928
                 0.700     1.199990
                 0.800     1.300225
                 0.850     1.371855
                 0.900     1.469116
                 0.950     1.390575
                 1.000     1.244705
                 1.050     1.053950
                 1.100     0.840751
                 1.200     0.436797
            </tableData>
          </table>
        </function>
        <function name="aero/function/mach-elevator">
          <description>elevator power over its low-speed value</description>
          <table>
            <independentVar lookup="row">velocities/mach</independentVar>
            <tableData>
                 0.000     1.000000
                 0.300     1.030850
                 0.500     1.095296
                 0.600     1.149190
                 0.700     1.227615
                 0.800     1.349736
                 0.850     1.441409
                 0.900     1.573545
                 0.950     1.516974
                 1.000     1.388131
                 1.050     1.211108
                 1.100     1.009994
                 1.200     0.631857
            </tableData>
          </table>
        </function>
        <function name="aero/function/mach-flap">
          <description>flap power over its low-speed value</description>
          <table>
            <independentVar lookup="row">velocities/mach</independentVar>
            <tableData>
                 0.000     1.000000
                 0.300     1.034251
                 0.500     1.106480
                 0.600     1.167609
                 0.700     1.257782
                 0.800     1.401195
                 0.850     1.511340
                 0.900     1.674031
                 0.950     1.610180
                 1.000     1.459569
                 1.050     1.251118
                 1.100     1.013747
                 1.200     0.567924
            </tableData>
          </table>
        </function>
        <function name="aero/function/mach-rudder">
          <description>rudder power over its low-speed value</description>
          <table>
            <independentVar lookup="row">velocities/mach</independentVar>
            <tableData>
                 0.000     1.000000
                 0.300     1.020962
                 0.500     1.063740
                 0.600     1.098526
                 0.700     1.147635
                 0.800     1.220718
                 0.850     1.272909
                 0.900     1.344468
                 0.950     1.281845
                 1.000     1.167832
                 1.050     1.019559
                 1.100     0.854157
                 1.200     0.540482
            </tableData>
          </table>
        </function>
        <function name="aero/function/CL-base">
          <description>CL over alpha and beta at low speed</description>
          <table>
            <independentVar lookup="row">aero/alpha-deg</independentVar>
            <independentVar lookup="column">aero/beta-deg</independentVar>
            <tableData>
                        -90.00    -70.00    -50.00    -40.00    -30.00    -25.00    -20.00    -15.00    -10.00     -6.00     -3.00      0.00      3.00      6.00     10.00     15.00     20.00     25.00     30.00     40.00     50.00     70.00     90.00
             -180.00  -0.00000   0.00120   0.00587   0.02369   0.03047   0.03351   0.03608   0.03817   0.03972   0.04053   0.04088   0.04099   0.04088   0.04053   0.03972   0.03817   0.03608   0.03351   0.03047   0.02369   0.00587   0.00120  -0.00000
             -120.00  -0.00000   0.18904   0.48077   0.63459   0.77295   0.83214   0.88262   0.92317   0.95284   0.97098   0.97963   0.97670   0.97963   0.97098   0.95284   0.92317   0.88262   0.83214   0.77295   0.63459   0.48077   0.18904  -0.00000
              -70.00  -0.00000  -0.15084  -0.39615  -0.52826  -0.64796  -0.69950  -0.74363  -0.77919  -0.80525  -0.81887  -0.82551  -0.81973  -0.82551  -0.81887  -0.80525  -0.77919  -0.74363  -0.69950  -0.64796  -0.52826  -0.39615  -0.15084  -0.00000
              -46.00  -0.00000  -0.26014  -0.68580  -0.91152  -1.11267  -1.19721  -1.26896  -1.32951  -1.36628  -1.37480  -1.37824  -1.37913  -1.37824  -1.37480  -1.36628  -1.32951  -1.26896  -1.19721  -1.11267  -0.91152  -0.68580  -0.26014  -0.00000
              -32.00  -0.00000  -0.28930  -0.74056  -0.97632  -1.21949  -1.32256  -1.41942  -1.45533  -1.48250  -1.49697  -1.50309  -1.50512  -1.50309  -1.49697  -1.48250  -1.45533  -1.41942  -1.32256  -1.21949  -0.97632  -0.74056  -0.28930  -0.00000
              -22.00  -0.00000  -0.20584  -0.78963  -1.08120  -1.37083  -1.46853  -1.57585  -1.64515  -1.69617  -1.72266  -1.73269  -1.72663  -1.73269  -1.72266  -1.69617  -1.64515  -1.57585  -1.46853  -1.37083  -1.08120  -0.78963  -0.20584  -0.00000
              -17.00  -0.00000  -0.14876  -0.70216  -0.98467  -1.23780  -1.35141  -1.46679  -1.54355  -1.59837  -1.62623  -1.63786  -1.64172  -1.63786  -1.62623  -1.59837  -1.54355  -1.46679  -1.35141  -1.23780  -0.98467  -0.70216  -0.14876  -0.00000
              -13.00  -0.00000  -0.09960  -0.60768  -0.81292  -0.95121  -1.03744  -1.12212  -1.17639  -1.21458  -1.23361  -1.24140  -1.24394  -1.24140  -1.23361  -1.21458  -1.17639  -1.12212  -1.03744  -0.95121  -0.81292  -0.60768  -0.09960  -0.00000
               -9.00  -0.00000  -0.04890  -0.44070  -0.54014  -0.62676  -0.68455  -0.73844  -0.77304  -0.79666  -0.80784  -0.81211  -0.81340  -0.81211  -0.80784  -0.79666  -0.77304  -0.73844  -0.68455  -0.62676  -0.54014  -0.44070  -0.04890  -0.00000
               -5.00  -0.00000   0.00012  -0.21954  -0.25105  -0.29652  -0.32406  -0.34963  -0.36537  -0.37547  -0.37966  -0.38083  -0.38101  -0.38083  -0.37966  -0.37547  -0.36537  -0.34963  -0.32406  -0.29652  -0.25105  -0.21954   0.00012  -0.00000
               -1.00  -0.00000   0.00854   0.02227   0.03978   0.03709   0.04047   0.04099   0.04268   0.04437   0.04564   0.04648   0.04698   0.04648   0.04564   0.04437   0.04268   0.04099   0.04047   0.03709   0.03978   0.02227   0.00854  -0.00000
                3.00   0.00000   0.02440   0.29647   0.34162   0.38250   0.40925   0.42914   0.44615   0.45814   0.46393   0.46609   0.46669   0.46609   0.46393   0.45814   0.44615   0.42914   0.40925   0.38250   0.34162   0.29647   0.02440   0.00000
                7.00   0.00000   0.06341   0.55472   0.63913   0.71396   0.76383   0.80480   0.83956   0.86399   0.87589   0.88056   0.88200   0.88056   0.87589   0.86399   0.83956   0.80480   0.76383   0.71396   0.63913   0.55472   0.06341   0.00000
               11.00   0.00000   0.10677   0.70344   0.94247   1.05207   1.12573   1.18495   1.23673   1.27325   1.29136   1.29871   1.30110   1.29871   1.29136   1.27325   1.23673   1.18495   1.12573   1.05207   0.94247   0.70344   0.10677   0.00000
               15.00   0.00000   0.15579   0.74419   1.16771   1.35998   1.45792   1.53857   1.61335   1.66708   1.69427   1.70562   1.70937   1.70562   1.69427   1.66708   1.61335   1.53857   1.45792   1.35998   1.16771   0.74419   0.15579   0.00000
               19.00   0.00000   0.20223   0.83399   1.20555   1.52136   1.60698   1.68322   1.76214   1.81726   1.84530   1.85706   1.86095   1.85706   1.84530   1.81726   1.76214   1.68322   1.60698   1.52136   1.20555   0.83399   0.20223   0.00000
               23.00   0.00000   0.24525   0.84199   1.11995   1.43152   1.56980   1.65557   1.74480   1.80988   1.84359   1.85784   1.86259   1.85784   1.84359   1.80988   1.74480   1.65557   1.56980   1.43152   1.11995   0.84199   0.24525   0.00000
               27.00   0.00000   0.28439   0.77467   1.04115   1.26012   1.36811   1.45744   1.54048   1.59709   1.62497   1.63819   1.63574   1.63819   1.62497   1.59709   1.54048   1.45744   1.36811   1.26012   1.04115   0.77467   0.28439   0.00000
               32.00   0.00000   0.29613   0.74723   0.99012   1.19264   1.27964   1.36491   1.42732   1.47683   1.50235   1.51312   1.51670   1.51312   1.50235   1.47683   1.42732   1.36491   1.27964   1.19264   0.99012   0.74723   0.29613   0.00000
               46.00   0.00000   0.26030   0.68655   0.91286   1.11523   1.20162   1.27138   1.32817   1.36574   1.37704   1.38199   1.38331   1.38199   1.37704   1.36574   1.32817   1.27138   1.20162   1.11523   0.91286   0.68655   0.26030   0.00000
               70.00   0.00000   0.14864   0.38866   0.51769   0.63453   0.68481   0.72784   0.76251   0.78792   0.80120   0.80769   0.80186   0.80769   0.80120   0.78792   0.76251   0.72784   0.68481   0.63453   0.51769   0.38866   0.14864   0.00000
              120.00   0.00000  -0.19029  -0.48497  -0.64051  -0.78049  -0.84039  -0.89148  -0.93253  -0.96256  -0.98089  -0.98962  -0.98672  -0.98962  -0.98089  -0.96256  -0.93253  -0.89148  -0.84039  -0.78049  -0.64051  -0.48497  -0.19029   0.00000
              180.00  -0.00000   0.00120   0.00587   0.02369   0.03047   0.03351   0.03608   0.03817   0.03972   0.04053   0.04088   0.04099   0.04088   0.04053   0.03972   0.03817   0.03608   0.03351   0.03047   0.02369   0.00587   0.00120  -0.00000
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            </tableData>
          </table>
        </function>
      <axis name="DRAG">
        <function name="aero/coefficient/CD_base">
          <description>CD over alpha and beta (hangar)</description>
          <product>
            <property>aero/qbar-psf</property>
            <property>metrics/Sw-sqft</property>
          <table>
            <independentVar lookup="row">aero/alpha-deg</independentVar>
            <independentVar lookup="column">aero/beta-deg</independentVar>
            <tableData>
                        -90.00    -70.00    -50.00    -40.00    -30.00    -25.00    -20.00    -15.00    -10.00     -6.00     -3.00      0.00      3.00      6.00     10.00     15.00     20.00     25.00     30.00     40.00     50.00     70.00     90.00
             -180.00   1.18974   0.99463   0.58733   0.38462   0.21863   0.15436   0.10374   0.06626   0.03422   0.02755   0.02692   0.02675   0.02692   0.02755   0.03422   0.06626   0.10374   0.15436   0.21863   0.38462   0.58733   0.99463   1.18974
             -120.00   1.18974   1.12655   1.15725   1.26043   1.40656   1.48493   1.55964   1.62509   1.67614   1.70314   1.71529   1.71991   1.71529   1.70314   1.67614   1.62509   1.55964   1.48493   1.40656   1.26043   1.15725   1.12655   1.18974
              -70.00   1.18974   1.17389   1.29739   1.46073   1.66846   1.77564   1.87634   1.96381   2.03177   2.06848   2.08397   2.08975   2.08397   2.06848   2.03177   1.96381   1.87634   1.77564   1.66846   1.46073   1.29739   1.17389   1.18974
              -46.00   1.18974   1.12755   1.03636   1.03363   1.06329   1.09098   1.12292   1.16308   1.18265   1.17445   1.17025   1.16711   1.17025   1.17445   1.18265   1.16308   1.12292   1.09098   1.06329   1.03363   1.03636   1.12755   1.18974
              -32.00   1.18974   1.09391   0.85657   0.72250   0.68652   0.68685   0.71411   0.68037   0.65796   0.64681   0.64197   0.64029   0.64197   0.64681   0.65796   0.68037   0.71411   0.68685   0.68652   0.72250   0.85657   1.09391   1.18974
              -22.00   1.18974   1.07489   0.71627   0.50935   0.40147   0.38255   0.36163   0.33863   0.32065   0.31114   0.30669   0.30354   0.30669   0.31114   0.32065   0.33863   0.36163   0.38255   0.40147   0.50935   0.71627   1.07489   1.18974
              -17.00   1.18974   1.06723   0.65649   0.40830   0.27460   0.25147   0.22500   0.19577   0.17180   0.15893   0.15348   0.15168   0.15348   0.15893   0.17180   0.19577   0.22500   0.25147   0.27460   0.40830   0.65649   1.06723   1.18974
              -13.00   1.18974   1.06210   0.63358   0.39558   0.25693   0.21792   0.18273   0.14631   0.11770   0.10280   0.09662   0.09452   0.09662   0.10280   0.11770   0.14631   0.18273   0.21792   0.25693   0.39558   0.63358   1.06210   1.18974
               -9.00   1.18974   1.05781   0.64174   0.45414   0.28131   0.22249   0.16953   0.12048   0.08357   0.06478   0.05704   0.05448   0.05704   0.06478   0.08357   0.12048   0.16953   0.22249   0.28131   0.45414   0.64174   1.05781   1.18974
               -5.00   1.18974   1.05429   0.63391   0.42312   0.25360   0.19339   0.13737   0.09095   0.05672   0.03953   0.03255   0.03033   0.03255   0.03953   0.05672   0.09095   0.13737   0.19339   0.25360   0.42312   0.63391   1.05429   1.18974
               -1.00   1.18974   1.05272   0.61587   0.39270   0.21561   0.15916   0.11209   0.07309   0.04457   0.02990   0.02396   0.02212   0.02396   0.02990   0.04457   0.07309   0.11209   0.15916   0.21561   0.39270   0.61587   1.05272   1.18974
                3.00   1.18974   1.05431   0.58832   0.34307   0.17611   0.13503   0.09882   0.06869   0.04676   0.03551   0.03089   0.02942   0.03089   0.03551   0.04676   0.06869   0.09882   0.13503   0.17611   0.34307   0.58832   1.05431   1.18974
                7.00   1.18974   1.05673   0.60432   0.36690   0.22295   0.18032   0.12748   0.09571   0.07212   0.05994   0.05450   0.05257   0.05450   0.05994   0.07212   0.09571   0.12748   0.18032   0.22295   0.36690   0.60432   1.05673   1.18974
               11.00   1.18974   1.06023   0.64667   0.46128   0.30114   0.23719   0.18861   0.15391   0.12241   0.10990   0.10207   0.09642   0.10207   0.10990   0.12241   0.15391   0.18861   0.23719   0.30114   0.46128   0.64667   1.06023   1.18974
               15.00   1.18974   1.06495   0.68880   0.56065   0.39444   0.33346   0.27811   0.23086   0.18949   0.16897   0.15864   0.15471   0.15864   0.16897   0.18949   0.23086   0.27811   0.33346   0.39444   0.56065   0.68880   1.06495   1.18974
               19.00   1.18974   1.07061   0.71820   0.58144   0.55741   0.48443   0.42051   0.36109   0.31047   0.28178   0.26833   0.26387   0.26833   0.28178   0.31047   0.36109   0.42051   0.48443   0.55741   0.58144   0.71820   1.07061   1.18974
               23.00   1.18974   1.07712   0.75600   0.62287   0.57161   0.55798   0.51705   0.47911   0.44688   0.42625   0.41493   0.41165   0.41493   0.42625   0.44688   0.47911   0.51705   0.55798   0.57161   0.62287   0.75600   1.07712   1.18974
               27.00   1.18974   1.08436   0.80404   0.68097   0.61999   0.62120   0.57068   0.54064   0.51857   0.50403   0.49598   0.49164   0.49598   0.50403   0.51857   0.54064   0.57068   0.62120   0.61999   0.68097   0.80404   1.08436   1.18974
               32.00   1.18974   1.09501   0.86574   0.76395   0.72959   0.71094   0.71074   0.66477   0.65109   0.64321   0.63986   0.63895   0.63986   0.64321   0.65109   0.66477   0.71074   0.71094   0.72959   0.76395   0.86574   1.09501   1.18974
               46.00   1.18974   1.12839   1.04172   1.04276   1.07629   1.10686   1.13940   1.17937   1.19039   1.19015   1.18952   1.18723   1.18952   1.19015   1.19039   1.17937   1.13940   1.10686   1.07629   1.04276   1.04172   1.12839   1.18974
               70.00   1.18974   1.17443   1.30083   1.46652   1.67681   1.78521   1.88700   1.97538   2.04402   2.08110   2.09675   2.10258   2.09675   2.08110   2.04402   1.97538   1.88700   1.78521   1.67681   1.46652   1.30083   1.17443   1.18974
              120.00   1.18974   1.12582   1.15261   1.25262   1.39530   1.47204   1.54528   1.60950   1.65962   1.68613   1.69807   1.70262   1.69807   1.68613   1.65962   1.60950   1.54528   1.47204   1.39530   1.25262   1.15261   1.12582   1.18974
              180.00   1.18974   0.99463   0.58733   0.38462   0.21863   0.15436   0.10374   0.06626   0.03422   0.02755   0.02692   0.02675   0.02692   0.02755   0.03422   0.06626   0.10374   0.15436   0.21863   0.38462   0.58733   0.99463   1.18974
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            </tableData>
          </table>
          </product>
        </function>
        <function name="aero/coefficient/CD_mach">
          <description>zero-lift drag's change with Mach: friction, wave drag</description>
          <product>
            <property>aero/qbar-psf</property>
            <property>metrics/Sw-sqft</property>
            <property>aero/function/mach-dCD0</property>
          </product>
        </function>
        <function name="aero/coefficient/CD_induced_mach">
          <description>induced drag's change with Mach (leading-edge suction lost)</description>
          <product>
            <property>aero/qbar-psf</property>
            <property>metrics/Sw-sqft</property>
            <property>aero/cl-squared</property>
            <property>aero/function/mach-dK</property>
          </product>
        </function>
        <function name="aero/coefficient/CD_aileron">
          <description>CD increment from aileron (deg), over alpha</description>
          <product>
            <property>aero/qbar-psf</property>
            <property>metrics/Sw-sqft</property>
            <property>aero/function/mach-aileron</property>
          <table>
            <independentVar lookup="row">aero/alpha-deg</independentVar>
            <independentVar lookup="column">fcs/left-aileron-pos-deg</independentVar>
            <tableData>
                        -20.00    -15.00    -10.00     -5.00      0.00      5.00     10.00     15.00     20.00
             -180.00   0.00190   0.00109   0.00049   0.00012   0.00000   0.00012   0.00049   0.00109   0.00190
             -120.00   0.00188   0.00108   0.00048   0.00012   0.00000   0.00012   0.00048   0.00108   0.00188
              -70.00   0.00188   0.00107   0.00048   0.00012   0.00000   0.00012   0.00048   0.00107   0.00188
              -46.00   0.00350   0.00218   0.00107   0.00028   0.00000   0.00028   0.00107   0.00218   0.00350
              -32.00   0.00526   0.00343   0.00175   0.00048   0.00000   0.00048   0.00175   0.00343   0.00526
              -22.00   0.00746   0.00513   0.00276   0.00080   0.00000   0.00080   0.00276   0.00513   0.00746
              -17.00   0.00391   0.00250   0.00123   0.00033   0.00000   0.00033   0.00123   0.00250   0.00391
              -13.00   0.00472   0.00310   0.00158   0.00043   0.00000   0.00043   0.00158   0.00310   0.00472
               -9.00   0.00504   0.00333   0.00171   0.00047   0.00000   0.00047   0.00171   0.00333   0.00504
               -5.00   0.00518   0.00344   0.00177   0.00048   0.00000   0.00048   0.00177   0.00344   0.00518
               -1.00   0.00522   0.00346   0.00179   0.00049   0.00000   0.00049   0.00179   0.00346   0.00522
                3.00   0.00513   0.00341   0.00176   0.00048   0.00000   0.00048   0.00176   0.00341   0.00513
                7.00   0.00494   0.00327   0.00168   0.00046   0.00000   0.00046   0.00168   0.00327   0.00494
               11.00   0.00467   0.00307   0.00157   0.00043   0.00000   0.00043   0.00157   0.00307   0.00467
               15.00   0.01036   0.00703   0.00363   0.00097   0.00000   0.00097   0.00363   0.00703   0.01036
               19.00   0.01739   0.01245   0.00689   0.00200   0.00000   0.00200   0.00689   0.01245   0.01739
               23.00   0.01113   0.00766   0.00405   0.00112   0.00000   0.00112   0.00405   0.00766   0.01113
               27.00   0.01669   0.01195   0.00719   0.00332   0.00000   0.00332   0.00719   0.01195   0.01669
               32.00   0.00719   0.00478   0.00248   0.00068   0.00000   0.00068   0.00248   0.00478   0.00719
               46.00   0.00404   0.00255   0.00126   0.00034   0.00000   0.00034   0.00126   0.00255   0.00404
               70.00   0.00188   0.00107   0.00048   0.00012   0.00000   0.00012   0.00048   0.00107   0.00188
              120.00   0.00188   0.00108   0.00048   0.00012   0.00000   0.00012   0.00048   0.00108   0.00188
              180.00   0.00190   0.00109   0.00049   0.00012   0.00000   0.00012   0.00049   0.00109   0.00190
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            </tableData>
          </table>
          </product>
        </function>
        <function name="aero/coefficient/CD_elevator">
          <description>CD increment from elevator (deg), over alpha</description>
          <product>
            <property>aero/qbar-psf</property>
            <property>metrics/Sw-sqft</property>
            <property>aero/function/mach-elevator</property>
          <table>
            <independentVar lookup="row">aero/alpha-deg</independentVar>
            <independentVar lookup="column">fcs/elevator-pos-deg</independentVar>
            <tableData>
                        -25.00    -20.00    -15.00    -10.00     -5.00      0.00      5.00     10.00     15.00     20.00
             -180.00   0.00766   0.00502   0.00287   0.00129   0.00033   0.00000   0.00033   0.00129   0.00287   0.00502
             -120.00   0.00753   0.00493   0.00282   0.00127   0.00032   0.00000   0.00032   0.00127   0.00282   0.00493
              -70.00   0.00751   0.00492   0.00282   0.00127   0.00032   0.00000   0.00032   0.00127   0.00282   0.00492
              -46.00  -0.00373  -0.00450  -0.00473  -0.00423  -0.00273   0.00000   0.00403   0.00915   0.01489   0.02096
              -32.00  -0.00662  -0.00634  -0.00569  -0.00466  -0.00298   0.00000   0.00490   0.01178   0.02000   0.02892
              -22.00   0.01877   0.01517   0.01173   0.00809   0.00394   0.00000  -0.00363  -0.00825  -0.01366  -0.01625
              -17.00   0.03001   0.02669   0.02258   0.01685   0.00905   0.00000  -0.00846  -0.01449  -0.01749  -0.01801
              -13.00   0.03622   0.03126   0.02538   0.01778   0.00873   0.00000  -0.00704  -0.01153  -0.01326  -0.01291
               -9.00   0.03333   0.02787   0.02189   0.01481   0.00701   0.00000  -0.00507  -0.00771  -0.00803  -0.00672
               -5.00   0.02692   0.02197   0.01670   0.01079   0.00480   0.00000  -0.00274  -0.00326  -0.00200   0.00034
               -1.00   0.01918   0.01484   0.01049   0.00610   0.00225   0.00000  -0.00014   0.00164   0.00458   0.00801
                3.00   0.01045   0.00685   0.00360   0.00093  -0.00051   0.00000   0.00263   0.00681   0.01147   0.01600
                7.00   0.00112  -0.00166  -0.00368  -0.00449  -0.00339   0.00000   0.00545   0.01203   0.01837   0.02395
               11.00  -0.00495  -0.00720  -0.00844  -0.00801  -0.00524   0.00000   0.00718   0.01515   0.02239   0.02844
               15.00  -0.01035  -0.01207  -0.01247  -0.01099  -0.00682   0.00000   0.00868   0.01785   0.02586   0.03232
               19.00  -0.02492  -0.02569  -0.02441  -0.01988  -0.01146   0.00000   0.01310   0.02601   0.03678   0.04521
               23.00  -0.03104  -0.03058  -0.02799  -0.02209  -0.01242   0.00000   0.01372   0.02698   0.03804   0.04685
               27.00   0.01479   0.00780   0.00148  -0.00339  -0.00500   0.00000   0.01236   0.02719   0.03944   0.04830
               32.00   0.02733   0.01881   0.01101   0.00443   0.00036   0.00000   0.00334   0.00911   0.01537   0.02142
               46.00   0.02419   0.01786   0.01201   0.00677   0.00259   0.00000  -0.00092  -0.00050   0.00069   0.00228
               70.00   0.00751   0.00492   0.00282   0.00127   0.00032   0.00000   0.00032   0.00127   0.00282   0.00492
              120.00   0.00753   0.00493   0.00282   0.00127   0.00032   0.00000   0.00032   0.00127   0.00282   0.00493
              180.00   0.00766   0.00502   0.00287   0.00129   0.00033   0.00000   0.00033   0.00129   0.00287   0.00502
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            </tableData>
          </table>
          </product>
        </function>
        <function name="aero/coefficient/CD_flap">
          <description>CD increment from flap (deg), over alpha</description>
          <product>
            <property>aero/qbar-psf</property>
            <property>metrics/Sw-sqft</property>
            <property>aero/function/mach-flap</property>
          <table>
            <independentVar lookup="row">aero/alpha-deg</independentVar>
            <independentVar lookup="column">fcs/flap-pos-deg</independentVar>
            <tableData>
                          0.00      5.00     10.00     15.00     20.00     25.00     30.00     35.00     40.00
             -180.00   0.00000   0.00051   0.00203   0.00451   0.00787   0.01202   0.01682   0.02214   0.02780
             -120.00   0.00000   0.00050   0.00200   0.00445   0.00778   0.01187   0.01662   0.02187   0.02746
              -70.00   0.00000   0.00050   0.00200   0.00444   0.00776   0.01185   0.01658   0.02182   0.02740
              -46.00   0.00000   0.01588   0.03543   0.05804   0.08268   0.10796   0.13416   0.16125   0.18975
              -32.00   0.00000   0.02394   0.05564   0.09364   0.13532   0.17838   0.22150   0.26445   0.30768
              -22.00   0.00000  -0.03403  -0.06948  -0.09585  -0.10985  -0.11527  -0.11536  -0.11207  -0.10622
              -17.00   0.00000  -0.01597  -0.02637  -0.03167  -0.03247  -0.02961  -0.02378  -0.01531  -0.00453
              -13.00   0.00000  -0.01001  -0.01568  -0.01679  -0.01385  -0.00774   0.00082   0.01140   0.02390
               -9.00   0.00000  -0.00567  -0.00681  -0.00353   0.00341   0.01307   0.02478   0.03827   0.05351
               -5.00   0.00000  -0.00111   0.00233   0.00993   0.02070   0.03366   0.04825   0.06433   0.08199
               -1.00   0.00000   0.00349   0.01141   0.02308   0.03732   0.05318   0.07021   0.08840   0.10795
                3.00   0.00000   0.00794   0.02010   0.03552   0.05289   0.07126   0.09034   0.11024   0.13128
                7.00   0.00000   0.01216   0.02814   0.04677   0.06664   0.08690   0.10765   0.12978   0.15415
               11.00   0.00000   0.01742   0.03847   0.06214   0.08839   0.11663   0.14593   0.17595   0.20777
               15.00   0.00000   0.02235   0.05185   0.08664   0.12194   0.15558   0.18780   0.21960   0.25198
               19.00   0.00000   0.01611   0.03924   0.06612   0.09410   0.12142   0.14778   0.17366   0.19969
               23.00   0.00000   0.00670   0.02958   0.05170   0.06719   0.07985   0.09398   0.11154   0.13035
               27.00   0.00000  -0.00764   0.00403   0.03368   0.07915   0.13134   0.18108   0.22269   0.25360
               32.00   0.00000  -0.01971  -0.02826  -0.02680  -0.01789  -0.00365   0.01542   0.03893   0.06644
               46.00   0.00000  -0.01408  -0.02406  -0.03020  -0.03319  -0.03383  -0.03275  -0.03035  -0.02690
               70.00   0.00000   0.00050   0.00200   0.00444   0.00776   0.01185   0.01658   0.02182   0.02740
              120.00   0.00000   0.00050   0.00200   0.00445   0.00778   0.01187   0.01662   0.02187   0.02746
              180.00   0.00000   0.00051   0.00203   0.00451   0.00787   0.01202   0.01682   0.02214   0.02780
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            </tableData>
          </table>
          </product>
        </function>
        <function name="aero/coefficient/CD_rudder">
          <description>CD increment from rudder (deg), over alpha</description>
          <product>
            <property>aero/qbar-psf</property>
            <property>metrics/Sw-sqft</property>
            <property>aero/function/mach-rudder</property>
          <table>
            <independentVar lookup="row">aero/alpha-deg</independentVar>
            <independentVar lookup="column">fcs/rudder-pos-deg</independentVar>
            <tableData>
                        -25.00    -20.00    -15.00    -10.00     -5.00      0.00      5.00     10.00     15.00     20.00     25.00
             -180.00   0.00757   0.00496   0.00284   0.00128   0.00032   0.00000   0.00032   0.00128   0.00284   0.00496   0.00757
             -120.00   0.00095   0.00062   0.00036   0.00016   0.00004   0.00000   0.00004   0.00016   0.00036   0.00062   0.00095
              -70.00   0.00033   0.00022   0.00013   0.00006   0.00001   0.00000   0.00001   0.00006   0.00013   0.00022   0.00033
              -46.00   0.01477   0.01161   0.00815   0.00437   0.00121   0.00000   0.00121   0.00437   0.00815   0.01161   0.01477
              -32.00   0.01914   0.01482   0.01024   0.00545   0.00152   0.00000   0.00152   0.00545   0.01024   0.01482   0.01914
              -22.00   0.02318   0.01802   0.01267   0.00732   0.00345   0.00000   0.00345   0.00732   0.01267   0.01802   0.02318
              -17.00   0.02087   0.01589   0.01081   0.00568   0.00156   0.00000   0.00156   0.00568   0.01081   0.01589   0.02087
              -13.00   0.02077   0.01571   0.01061   0.00554   0.00153   0.00000   0.00153   0.00554   0.01061   0.01571   0.02077
               -9.00   0.02105   0.01589   0.01071   0.00559   0.00154   0.00000   0.00154   0.00559   0.01071   0.01589   0.02105
               -5.00   0.02117   0.01596   0.01075   0.00560   0.00154   0.00000   0.00154   0.00560   0.01075   0.01596   0.02117
               -1.00   0.02095   0.01577   0.01061   0.00552   0.00152   0.00000   0.00152   0.00552   0.01061   0.01577   0.02095
                3.00   0.02037   0.01530   0.01027   0.00534   0.00147   0.00000   0.00147   0.00534   0.01027   0.01530   0.02037
                7.00   0.01969   0.01478   0.00991   0.00515   0.00142   0.00000   0.00142   0.00515   0.00991   0.01478   0.01969
               11.00   0.01878   0.01408   0.00943   0.00490   0.00135   0.00000   0.00135   0.00490   0.00943   0.01408   0.01878
               15.00   0.01761   0.01318   0.00882   0.00457   0.00126   0.00000   0.00126   0.00457   0.00882   0.01318   0.01761
               19.00   0.01624   0.01213   0.00809   0.00419   0.00115   0.00000   0.00115   0.00419   0.00809   0.01213   0.01624
               23.00   0.01483   0.01107   0.00737   0.00381   0.00105   0.00000   0.00105   0.00381   0.00737   0.01107   0.01483
               27.00   0.01416   0.01081   0.00756   0.00451   0.00229   0.00000   0.00229   0.00451   0.00756   0.01081   0.01416
               32.00   0.01174   0.00880   0.00589   0.00306   0.00084   0.00000   0.00084   0.00306   0.00589   0.00880   0.01174
               46.00   0.01286   0.00999   0.00694   0.00369   0.00103   0.00000   0.00103   0.00369   0.00694   0.00999   0.01286
               70.00   0.00033   0.00022   0.00013   0.00006   0.00001   0.00000   0.00001   0.00006   0.00013   0.00022   0.00033
              120.00   0.00095   0.00062   0.00036   0.00016   0.00004   0.00000   0.00004   0.00016   0.00036   0.00062   0.00095
              180.00   0.00757   0.00496   0.00284   0.00128   0.00032   0.00000   0.00032   0.00128   0.00284   0.00496   0.00757
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            </tableData>
          </table>
          </product>
        </function>
        <function name="aero/coefficient/CD_ground">
          <description>Induced drag change in ground effect</description>
          <product>
            <property>aero/qbar-psf</property>
            <property>metrics/Sw-sqft</property>
            <property>aero/cl-squared</property>
            <value>0.03961</value>
          <table>
            <independentVar lookup="row">aero/h_b-mac-ft</independentVar>
            <tableData>
                    0.00   -1.00000
                    0.10   -0.28090
                    0.15   -0.14793
                    0.20   -0.08897
                    0.30   -0.04160
                    0.40   -0.02383
                    0.50   -0.01538
                    0.60   -0.01073
                    0.70   -0.00791
                    0.80   -0.00607
                    0.90   -0.00480
                    1.00   -0.00389
                    1.10   -0.00322
            </tableData>
          </table>
          </product>
        </function>
        <function name="aero/coefficient/CD_spoilers">
          <description>spoilers: drag of its spoiler panels, 10.5 m2 opened to 60 deg (hangar)</description>
          <product>
            <property>aero/qbar-psf</property>
            <property>metrics/Sw-sqft</property>
            <value>0.101064</value>
            <pow>
              <sin>
                <product>
                  <property>fcs/speedbrake-pos-norm</property>
                  <value>1.0472</value>
                </product>
              </sin>
              <value>2</value>
            </pow>
          </product>
        </function>
        <function name="aero/coefficient/CD_gear">
          <description>the gear extended: its wheels' and struts' drag by Raymer's components, 0.803 m2 (hangar)</description>
          <product>
            <property>aero/qbar-psf</property>
            <property>metrics/Sw-sqft</property>
            <value>0.00644178</value>
            <property>gear/gear-pos-norm</property>
          </product>
        </function>
      </axis>
      <axis name="SIDE">
        <function name="aero/coefficient/CY_base">
          <description>CY over alpha and beta (hangar)</description>
          <product>
            <property>aero/qbar-psf</property>
            <property>metrics/Sw-sqft</property>
            <property>aero/function/mach-side</property>
          <table>
            <independentVar lookup="row">aero/alpha-deg</independentVar>
            <independentVar lookup="column">aero/beta-deg</independentVar>
            <tableData>
                        -90.00    -70.00    -50.00    -40.00    -30.00    -25.00    -20.00    -15.00    -10.00     -6.00     -3.00      0.00      3.00      6.00     10.00     15.00     20.00     25.00     30.00     40.00     50.00     70.00     90.00
             -180.00  -0.00000   0.35910   0.52202   0.48192   0.37985   0.31535   0.24701   0.18182   0.22204   0.25056   0.13351  -0.00000  -0.13351  -0.25056  -0.22204  -0.18182  -0.24701  -0.31535  -0.37985  -0.48192  -0.52202  -0.35910   0.00000
             -120.00  -0.00000   0.05770  -0.13113  -0.23303  -0.28256  -0.27932  -0.25556  -0.21218  -0.15193  -0.08533  -0.00290  -0.00000   0.00290   0.08533   0.15193   0.21218   0.25556   0.27932   0.28256   0.23303   0.13113  -0.05770   0.00000
              -70.00   0.00000   0.00890  -0.23322  -0.34944  -0.39508  -0.38261  -0.34421  -0.28036  -0.19272  -0.10491  -0.01976  -0.00000   0.01976   0.10491   0.19272   0.28036   0.34421   0.38261   0.39508   0.34944   0.23322  -0.00890  -0.00000
              -46.00   0.00000   0.16331   0.11477   0.05060  -0.01536  -0.02520  -0.01276   0.04360   0.07375   0.04835   0.03026  -0.00000  -0.03026  -0.04835  -0.07375  -0.04360   0.01276   0.02520   0.01536  -0.05060  -0.11477  -0.16331  -0.00000
              -32.00   0.00000   0.25764   0.31844   0.22598   0.17922   0.15472   0.16453   0.12050   0.07847   0.04656   0.02343  -0.00000  -0.02343  -0.04656  -0.07847  -0.12050  -0.16453  -0.15472  -0.17922  -0.22598  -0.31844  -0.25764  -0.00000
              -22.00   0.00000   0.33332   0.40475   0.30339   0.21013   0.22757   0.19308   0.14448   0.09518   0.05717   0.02914  -0.00000  -0.02914  -0.05717  -0.09518  -0.14448  -0.19308  -0.22757  -0.21013  -0.30339  -0.40475  -0.33332  -0.00000
              -17.00   0.00000   0.36949   0.44714   0.33326   0.23056   0.22376   0.21954   0.16499   0.10797   0.06383   0.03170  -0.00000  -0.03170  -0.06383  -0.10797  -0.16499  -0.21954  -0.22376  -0.23056  -0.33326  -0.44714  -0.36949  -0.00000
              -13.00   0.00000   0.39626   0.49715   0.41014   0.31930   0.29475   0.30061   0.22783   0.15050   0.08936   0.04438  -0.00000  -0.04438  -0.08936  -0.15050  -0.22783  -0.30061  -0.29475  -0.31930  -0.41014  -0.49715  -0.39626  -0.00000
               -9.00   0.00000   0.42146   0.55050   0.53634   0.45848   0.42525   0.41163   0.31446   0.20882   0.12417   0.06164  -0.00000  -0.06164  -0.12417  -0.20882  -0.31446  -0.41163  -0.42525  -0.45848  -0.53634  -0.55050  -0.42146  -0.00000
               -5.00   0.00000   0.44517   0.56994   0.54513   0.47438   0.43610   0.41181   0.31327   0.20620   0.12152   0.05989  -0.00000  -0.05989  -0.12152  -0.20620  -0.31327  -0.41181  -0.43610  -0.47438  -0.54513  -0.56994  -0.44517  -0.00000
               -1.00   0.00000   0.45153   0.56295   0.53279   0.44420   0.39884   0.36791   0.27823   0.18301   0.10749   0.05263  -0.00000  -0.05263  -0.10749  -0.18301  -0.27823  -0.36791  -0.39884  -0.44420  -0.53279  -0.56295  -0.45153  -0.00000
                3.00   0.00000   0.43541   0.53400   0.47130   0.38658   0.35486   0.30160   0.22673   0.14903   0.08752   0.04290  -0.00000  -0.04290  -0.08752  -0.14903  -0.22673  -0.30160  -0.35486  -0.38658  -0.47130  -0.53400  -0.43541  -0.00000
                7.00   0.00000   0.41869   0.52565   0.45146   0.37736   0.35461   0.29329   0.22072   0.14559   0.08604   0.04252  -0.00000  -0.04252  -0.08604  -0.14559  -0.22072  -0.29329  -0.35461  -0.37736  -0.45146  -0.52565  -0.41869  -0.00000
               11.00   0.00000   0.39879   0.51159   0.48409   0.41778   0.37717   0.31138   0.23494   0.15570   0.09256   0.04598  -0.00000  -0.04598  -0.09256  -0.15570  -0.23494  -0.31138  -0.37717  -0.41778  -0.48409  -0.51159  -0.39879  -0.00000
               15.00   0.00000   0.37330   0.47962   0.51377   0.46637   0.41122   0.34192   0.26062   0.17465   0.10483   0.05245  -0.00000  -0.05245  -0.10483  -0.17465  -0.26062  -0.34192  -0.41122  -0.46637  -0.51377  -0.47962  -0.37330  -0.00000
               19.00   0.00000   0.34568   0.43278   0.40100   0.39556   0.36661   0.30420   0.23089   0.15519   0.09353   0.04729  -0.00000  -0.04729  -0.09353  -0.15519  -0.23089  -0.30420  -0.36661  -0.39556  -0.40100  -0.43278  -0.34568  -0.00000
               23.00   0.00000   0.31628   0.39611   0.34328   0.33829   0.33077   0.27640   0.21055   0.14130   0.08510   0.04304  -0.00000  -0.04304  -0.08510  -0.14130  -0.21055  -0.27640  -0.33077  -0.33829  -0.34328  -0.39611  -0.31628  -0.00000
               27.00   0.00000   0.28545   0.36641   0.31053   0.30270   0.28817   0.27207   0.20637   0.13825   0.08270   0.04186  -0.00000  -0.04186  -0.08270  -0.13825  -0.20637  -0.27207  -0.28817  -0.30270  -0.31053  -0.36641  -0.28545  -0.00000
               32.00   0.00000   0.25265   0.31510   0.25166   0.24614   0.21104   0.22278   0.18454   0.11987   0.07099   0.03552  -0.00000  -0.03552  -0.07099  -0.11987  -0.18454  -0.22278  -0.21104  -0.24614  -0.25166  -0.31510  -0.25265  -0.00000
               46.00   0.00000   0.16089   0.10818   0.04292  -0.02153  -0.03090  -0.01331   0.03948   0.06152   0.03847   0.02571  -0.00000  -0.02571  -0.03847  -0.06152  -0.03948   0.01331   0.03090   0.02153  -0.04292  -0.10818  -0.16089  -0.00000
               70.00   0.00000   0.00744  -0.23734  -0.35428  -0.39992  -0.38708  -0.34810  -0.28347  -0.19489  -0.10624  -0.02043  -0.00000   0.02043   0.10624   0.19489   0.28347   0.34810   0.38708   0.39992   0.35428   0.23734  -0.00744  -0.00000
              120.00  -0.00000   0.05965  -0.12565  -0.22651  -0.27608  -0.27333  -0.25035  -0.20802  -0.14902  -0.08355  -0.00200  -0.00000   0.00200   0.08355   0.14902   0.20802   0.25035   0.27333   0.27608   0.22651   0.12565  -0.05965   0.00000
              180.00  -0.00000   0.35910   0.52202   0.48192   0.37985   0.31535   0.24701   0.18182   0.22204   0.25056   0.13351  -0.00000  -0.13351  -0.25056  -0.22204  -0.18182  -0.24701  -0.31535  -0.37985  -0.48192  -0.52202  -0.35910   0.00000
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            </tableData>
          </table>
          </product>
        </function>
        <function name="aero/coefficient/CY_aileron">
          <description>CY increment from aileron (deg), over alpha</description>
          <product>
            <property>aero/qbar-psf</property>
            <property>metrics/Sw-sqft</property>
            <property>aero/function/mach-aileron</property>
          <table>
            <independentVar lookup="row">aero/alpha-deg</independentVar>
            <independentVar lookup="column">fcs/left-aileron-pos-deg</independentVar>
            <tableData>
                        -20.00    -15.00    -10.00     -5.00      0.00      5.00     10.00     15.00     20.00
             -180.00   0.00000   0.00000   0.00000   0.00000   0.00000   0.00000   0.00000   0.00000   0.00000
             -120.00   0.00091   0.00077   0.00057   0.00030   0.00000  -0.00030  -0.00057  -0.00077  -0.00091
              -70.00  -0.00026  -0.00022  -0.00016  -0.00009   0.00000   0.00009   0.00016   0.00022   0.00026
              -46.00  -0.00118  -0.00108  -0.00084  -0.00046   0.00000   0.00046   0.00084   0.00108   0.00118
              -32.00  -0.00376  -0.00333  -0.00255  -0.00138   0.00000   0.00138   0.00255   0.00333   0.00376
              -22.00  -0.00700  -0.00604  -0.00454  -0.00244   0.00000   0.00244   0.00454   0.00604   0.00700
              -17.00  -0.00645  -0.00553  -0.00411  -0.00219   0.00000   0.00219   0.00411   0.00553   0.00645
              -13.00  -0.00638  -0.00547  -0.00408  -0.00217   0.00000   0.00217   0.00408   0.00547   0.00638
               -9.00  -0.00589  -0.00504  -0.00375  -0.00200   0.00000   0.00200   0.00375   0.00504   0.00589
               -5.00  -0.00609  -0.00520  -0.00388  -0.00207   0.00000   0.00207   0.00388   0.00520   0.00609
               -1.00  -0.00645  -0.00553  -0.00412  -0.00220   0.00000   0.00220   0.00412   0.00552   0.00645
                3.00  -0.00694  -0.00595  -0.00444  -0.00237   0.00000   0.00237   0.00444   0.00595   0.00694
                7.00  -0.00700  -0.00601  -0.00448  -0.00239   0.00000   0.00239   0.00448   0.00601   0.00700
               11.00  -0.00694  -0.00595  -0.00444  -0.00237   0.00000   0.00237   0.00444   0.00595   0.00694
               15.00  -0.00737  -0.00628  -0.00463  -0.00244   0.00000   0.00244   0.00463   0.00628   0.00737
               19.00  -0.00888  -0.00777  -0.00588  -0.00315   0.00000   0.00315   0.00588   0.00777   0.00888
               23.00  -0.00739  -0.00668  -0.00516  -0.00280   0.00000   0.00280   0.00516   0.00668   0.00739
               27.00  -0.00098  -0.00088  -0.00045  -0.00194   0.00000   0.00194   0.00045   0.00088   0.00098
               32.00  -0.00875  -0.00744  -0.00553  -0.00296   0.00000   0.00295   0.00553   0.00744   0.00875
               46.00  -0.00314  -0.00272  -0.00205  -0.00110   0.00000   0.00110   0.00205   0.00272   0.00314
               70.00  -0.00033  -0.00028  -0.00021  -0.00011   0.00000   0.00011   0.00021   0.00028   0.00033
              120.00   0.00086   0.00073   0.00054   0.00029   0.00000  -0.00029  -0.00054  -0.00073  -0.00086
              180.00   0.00000   0.00000   0.00000   0.00000   0.00000   0.00000   0.00000   0.00000   0.00000
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            </tableData>
          </table>
          </product>
        </function>
        <function name="aero/coefficient/CY_rudder">
          <description>CY increment from rudder (deg), over alpha</description>
          <product>
            <property>aero/qbar-psf</property>
            <property>metrics/Sw-sqft</property>
            <property>aero/function/mach-rudder</property>
          <table>
            <independentVar lookup="row">aero/alpha-deg</independentVar>
            <independentVar lookup="column">fcs/rudder-pos-deg</independentVar>
            <tableData>
                        -25.00    -20.00    -15.00    -10.00     -5.00      0.00      5.00     10.00     15.00     20.00     25.00
             -180.00   0.00000   0.00000   0.00000   0.00000   0.00000   0.00000   0.00000   0.00000   0.00000   0.00000   0.00000
             -120.00   0.00000   0.00000   0.00000   0.00000   0.00000   0.00000   0.00000   0.00000   0.00000   0.00000   0.00000
              -70.00  -0.03130  -0.02822  -0.02399  -0.01778  -0.00945   0.00000   0.00945   0.01778   0.02399   0.02822   0.03128
              -46.00  -0.10291  -0.09294  -0.07906  -0.05834  -0.03088   0.00000   0.03088   0.05834   0.07906   0.09294   0.10291
              -32.00  -0.10079  -0.09106  -0.07750  -0.05749  -0.03060   0.00000   0.03060   0.05749   0.07750   0.09106   0.10079
              -22.00  -0.11695  -0.10576  -0.09016  -0.06720  -0.03625   0.00000   0.03625   0.06720   0.09016   0.10576   0.11695
              -17.00  -0.12077  -0.10913  -0.09289  -0.06892  -0.03668   0.00000   0.03668   0.06892   0.09289   0.10913   0.12077
              -13.00  -0.12475  -0.11277  -0.09603  -0.07126  -0.03793   0.00000   0.03793   0.07126   0.09603   0.11277   0.12475
               -9.00  -0.12825  -0.11599  -0.09882  -0.07336  -0.03905   0.00000   0.03905   0.07336   0.09882   0.11599   0.12825
               -5.00  -0.12896  -0.11663  -0.09935  -0.07375  -0.03926   0.00000   0.03926   0.07375   0.09935   0.11663   0.12896
               -1.00  -0.12796  -0.11570  -0.09854  -0.07314  -0.03893   0.00000   0.03893   0.07314   0.09854   0.11570   0.12796
                3.00  -0.12548  -0.11342  -0.09658  -0.07167  -0.03814   0.00000   0.03814   0.07167   0.09658   0.11342   0.12548
                7.00  -0.12256  -0.11081  -0.09437  -0.07005  -0.03728   0.00000   0.03728   0.07005   0.09437   0.11081   0.12256
               11.00  -0.11879  -0.10743  -0.09152  -0.06795  -0.03617   0.00000   0.03617   0.06795   0.09152   0.10743   0.11879
               15.00  -0.11398  -0.10315  -0.08791  -0.06529  -0.03477   0.00000   0.03477   0.06529   0.08791   0.10315   0.11398
               19.00  -0.10719  -0.09701  -0.08269  -0.06141  -0.03270   0.00000   0.03270   0.06141   0.08269   0.09701   0.10719
               23.00  -0.09965  -0.09020  -0.07690  -0.05713  -0.03043   0.00000   0.03043   0.05713   0.07690   0.09020   0.09965
               27.00  -0.08993  -0.08127  -0.06908  -0.05118  -0.02683   0.00000   0.02683   0.05118   0.06908   0.08127   0.08993
               32.00  -0.08203  -0.07433  -0.06343  -0.04715  -0.02512   0.00000   0.02512   0.04715   0.06343   0.07433   0.08203
               46.00  -0.09272  -0.08395  -0.07157  -0.05259  -0.02779   0.00000   0.02779   0.05259   0.07157   0.08395   0.09272
               70.00  -0.03130  -0.02822  -0.02399  -0.01778  -0.00945   0.00000   0.00945   0.01778   0.02399   0.02822   0.03128
              120.00   0.00000   0.00000   0.00000   0.00000   0.00000   0.00000   0.00000   0.00000   0.00000   0.00000   0.00000
              180.00   0.00000   0.00000   0.00000   0.00000   0.00000   0.00000   0.00000   0.00000   0.00000   0.00000   0.00000
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            </tableData>
          </table>
          </product>
        </function>
        <function name="aero/coefficient/CYp">
          <description>CY per p (non-dimensional), over alpha</description>
          <product>
            <property>aero/qbar-psf</property>
            <property>metrics/Sw-sqft</property>
            <property>aero/bi2vel</property>
            <property>velocities/p-aero-rad_sec</property>
            <property>aero/function/mach-lift</property>
          <table>
            <independentVar lookup="row">aero/alpha-deg</independentVar>
            <tableData>
                 -180.00   -0.94640
                 -165.00   -0.72762
                 -105.00   -0.31219
                  -60.00   -0.56503
                  -42.00   -0.50283
                  -30.00   -0.42550
                  -20.00   -0.32082
                  -16.00   -0.35923
                  -12.00   -0.38924
                   -8.00   -0.39976
                   -4.00   -0.38540
                    0.00   -0.36815
                    4.00   -0.33432
                    8.00   -0.31532
                   12.00   -0.32355
                   16.00   -0.43431
                   20.00   -0.64128
                   24.00   -1.01414
                   28.00   -0.45122
                   35.00   -0.25684
                   50.00   -0.55092
                   80.00   -0.29082
                  135.00   -0.59349
                  180.00   -0.94640
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            </tableData>
          </table>
          </product>
        </function>
        <function name="aero/coefficient/CYr">
          <description>CY per r (non-dimensional), over alpha</description>
          <product>
            <property>aero/qbar-psf</property>
            <property>metrics/Sw-sqft</property>
            <property>aero/bi2vel</property>
            <property>velocities/r-aero-rad_sec</property>
            <property>aero/function/mach-lift</property>
          <table>
            <independentVar lookup="row">aero/alpha-deg</independentVar>
            <tableData>
                 -180.00    1.04694
                 -165.00    0.91948
                 -105.00    0.27056
                  -60.00    0.58729
                  -42.00    0.66372
                  -30.00    0.62473
                  -20.00    0.55227
                  -16.00    0.56090
                  -12.00    0.69716
                   -8.00    0.80883
                   -4.00    0.80952
                    0.00    0.78420
                    4.00    0.69943
                    8.00    0.67192
                   12.00    0.73268
                   16.00    0.74811
                   20.00    0.62046
                   24.00    0.41374
                   28.00    0.71051
                   35.00    0.75190
                   50.00    0.68218
                   80.00    0.24707
                  135.00    0.67179
                  180.00    1.04694
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            </tableData>
          </table>
          </product>
        </function>
      </axis>
      <axis name="LIFT">
        <function name="aero/coefficient/CL_base">
          <description>CL over alpha and beta, ground effect, compressibility (hangar)</description>
          <product>
            <property>aero/qbar-psf</property>
            <property>metrics/Sw-sqft</property>
            <property>aero/function/CL-base</property>
            <property>aero/function/mach-lift</property>
          <table>
            <independentVar lookup="row">aero/h_b-mac-ft</independentVar>
            <tableData>
                    0.00    1.20000
                    0.10    1.08692
                    0.15    1.05730
                    0.20    1.03778
                    0.30    1.01642
                    0.40    1.00713
                    0.50    1.00310
                    0.60    1.00135
                    0.70    1.00059
                    0.80    1.00025
                    0.90    1.00011
                    1.00    1.00005
                    1.10    1.00000
            </tableData>
          </table>
          </product>
        </function>
        <function name="aero/coefficient/CL_elevator">
          <description>CL increment from elevator (deg), over alpha</description>
          <product>
            <property>aero/qbar-psf</property>
            <property>metrics/Sw-sqft</property>
            <property>aero/function/mach-elevator</property>
          <table>
            <independentVar lookup="row">aero/alpha-deg</independentVar>
            <independentVar lookup="column">fcs/elevator-pos-deg</independentVar>
            <tableData>
                        -25.00    -20.00    -15.00    -10.00     -5.00      0.00      5.00     10.00     15.00     20.00
             -180.00  -0.00000  -0.00000  -0.00000   0.00000   0.00000   0.00000   0.00000   0.00000  -0.00000  -0.00000
             -120.00  -0.04126  -0.03720  -0.03161  -0.02342  -0.01245   0.00000   0.01245   0.02340   0.03157   0.03713
              -70.00  -0.01199  -0.01093  -0.00942  -0.00711  -0.00388   0.00000   0.00409   0.00787   0.01080   0.01287
              -46.00  -0.04678  -0.04343  -0.03805  -0.02913  -0.01599   0.00000   0.01676   0.03180   0.04275   0.04961
              -32.00  -0.06244  -0.05983  -0.05418  -0.04300  -0.02444   0.00000   0.02675   0.05108   0.06857   0.07900
              -22.00  -0.07320  -0.07022  -0.06425  -0.05211  -0.03004   0.00000   0.02362   0.01435   0.00029   0.00633
              -17.00  -0.09053  -0.08948  -0.08532  -0.07219  -0.04317   0.00000   0.05020   0.09745   0.13266   0.15585
              -13.00  -0.16792  -0.15614  -0.13658  -0.10373  -0.05608   0.00000   0.05724   0.10782   0.14495   0.16925
               -9.00  -0.18515  -0.16918  -0.14591  -0.10960  -0.05883   0.00000   0.05934   0.11149   0.14965   0.17457
               -5.00  -0.19102  -0.17469  -0.15038  -0.11259  -0.06028   0.00000   0.06058   0.11366   0.15239   0.17761
               -1.00  -0.19433  -0.17749  -0.15259  -0.11409  -0.06099   0.00000   0.06110   0.11449   0.15334   0.17855
                3.00  -0.19532  -0.17821  -0.15305  -0.11430  -0.06102   0.00000   0.06096   0.11408   0.15262   0.17754
                7.00  -0.19444  -0.17725  -0.15209  -0.11346  -0.06049   0.00000   0.06026   0.11260   0.15045   0.17480
               11.00  -0.19162  -0.17455  -0.14964  -0.11151  -0.05937   0.00000   0.05896   0.11001   0.14677   0.17029
               15.00  -0.18490  -0.16834  -0.14369  -0.10681  -0.05679   0.00000   0.05639   0.10511   0.14008   0.16236
               19.00  -0.16735  -0.15457  -0.13376  -0.10013  -0.05329   0.00000   0.05254   0.09780   0.13049   0.15177
               23.00  -0.17512  -0.15783  -0.13368  -0.09834  -0.05173   0.00000   0.05047   0.09379   0.12527   0.14616
               27.00  -0.19631  -0.18121  -0.15791  -0.12094  -0.06720   0.00000   0.06590   0.11916   0.15561   0.17886
               32.00  -0.13874  -0.12870  -0.11198  -0.08437  -0.04522   0.00000   0.04491   0.08365   0.11205   0.13156
               46.00  -0.08405  -0.07707  -0.06632  -0.04941  -0.02619   0.00000   0.02553   0.04718   0.06261   0.07257
               70.00  -0.02510  -0.02246  -0.01890  -0.01380  -0.00719   0.00000   0.00687   0.01267   0.01683   0.01959
              120.00  -0.03235  -0.02919  -0.02482  -0.01840  -0.00979   0.00000   0.00979   0.01842   0.02486   0.02925
              180.00   0.00000   0.00000   0.00000   0.00000   0.00000   0.00000   0.00000   0.00000   0.00000   0.00000
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            </tableData>
          </table>
          </product>
        </function>
        <function name="aero/coefficient/CL_flap">
          <description>CL increment from flap (deg), over alpha</description>
          <product>
            <property>aero/qbar-psf</property>
            <property>metrics/Sw-sqft</property>
            <property>aero/function/mach-flap</property>
          <table>
            <independentVar lookup="row">aero/alpha-deg</independentVar>
            <independentVar lookup="column">fcs/flap-pos-deg</independentVar>
            <tableData>
                          0.00      5.00     10.00     15.00     20.00     25.00     30.00     35.00     40.00
             -180.00   0.00000   0.00000   0.00000  -0.00000  -0.00000  -0.00000  -0.00000  -0.00000  -0.00000
             -120.00   0.00000   0.03071   0.06128   0.09007   0.11593   0.13879   0.15933   0.17852   0.19722
              -70.00   0.00000   0.01601   0.03284   0.04952   0.06524   0.07974   0.09328   0.10640   0.11964
              -46.00   0.00000   0.05117   0.10373   0.15393   0.19892   0.23838   0.27279   0.30395   0.33334
              -32.00   0.00000   0.08218   0.16675   0.24672   0.31680   0.37590   0.42639   0.47110   0.51313
              -22.00   0.00000   0.09401   0.18135   0.28258   0.39761   0.51247   0.62176   0.72721   0.83245
              -17.00   0.00000   0.15506   0.32295   0.48836   0.64261   0.78461   0.91837   1.04950   1.18023
              -13.00   0.00000   0.16977   0.34014   0.50159   0.64750   0.77719   0.89450   1.00506   1.11398
               -9.00   0.00000   0.17249   0.34492   0.50764   0.65389   0.78287   0.89856   1.00655   1.11182
               -5.00   0.00000   0.17361   0.34674   0.50972   0.65582   0.78436   0.89935   1.00643   1.11055
               -1.00   0.00000   0.17303   0.34523   0.50701   0.65174   0.77880   0.89226   0.99772   1.10011
                3.00   0.00000   0.17122   0.34126   0.50065   0.64290   0.76748   0.87845   0.98136   1.08092
                7.00   0.00000   0.16895   0.33642   0.49304   0.63240   0.75354   0.85984   0.95655   1.04837
               11.00   0.00000   0.16688   0.33139   0.48160   0.61000   0.71806   0.81164   0.89757   0.98467
               15.00   0.00000   0.15047   0.29252   0.42222   0.53697   0.63704   0.72681   0.81030   0.89128
               19.00   0.00000   0.14395   0.28682   0.41919   0.53455   0.63253   0.71681   0.79181   0.86077
               23.00   0.00000   0.16841   0.32079   0.44630   0.54382   0.61901   0.67926   0.73115   0.77502
               27.00   0.00000   0.17338   0.34757   0.49942   0.62628   0.73163   0.81704   0.88448   0.93611
               32.00   0.00000   0.11271   0.22533   0.33022   0.42263   0.50314   0.57523   0.64049   0.69969
               46.00   0.00000   0.06111   0.12078   0.17527   0.22240   0.26225   0.29644   0.32683   0.35485
               70.00   0.00000   0.01528   0.02978   0.04279   0.05397   0.06343   0.07162   0.07899   0.08591
              120.00   0.00000   0.03439   0.06863   0.10089   0.12988   0.15551   0.17856   0.20010   0.22110
              180.00   0.00000   0.00000   0.00000   0.00000   0.00000   0.00000   0.00000   0.00000   0.00000
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            </tableData>
          </table>
          <table>
            <independentVar lookup="row">aero/h_b-mac-ft</independentVar>
            <tableData>
                    0.00    1.20000
                    0.10    1.08692
                    0.20    1.03778
                    0.40    1.00713
                    0.60    1.00135
                    0.80    1.00025
                    1.00    1.00005
                    1.10    1.00000
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            </tableData>
          </table>
          </product>
        </function>
        <function name="aero/coefficient/CLq">
          <description>CL per q (non-dimensional), over alpha</description>
          <product>
            <property>aero/qbar-psf</property>
            <property>metrics/Sw-sqft</property>
            <property>aero/ci2vel</property>
            <property>velocities/q-aero-rad_sec</property>
            <property>aero/function/mach-lift</property>
          <table>
            <independentVar lookup="row">aero/alpha-deg</independentVar>
            <tableData>
                 -180.00   -4.14835
                 -165.00   -1.70337
                  -32.00    1.41094
                  -10.00   11.67154
                    5.00   14.81848
                   20.00    3.98148
                   46.00    2.31844
                  180.00   -4.14835
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            </tableData>
          </table>
          </product>
        </function>
        <function name="aero/coefficient/CLadot">
          <description>CL per alpha-dot (downwash lag at the tail)</description>
          <product>
            <property>aero/qbar-psf</property>
            <property>metrics/Sw-sqft</property>
            <property>aero/ci2vel</property>
            <property>aero/alphadot-rad_sec</property>
            <value>1.93357</value>
            <property>aero/function/mach-lift</property>
          </product>
        </function>
        <function name="aero/coefficient/CL_spoilers">
          <description>spoilers: the lift lost behind them, 87.4 m2 of wing, over alpha (hangar)</description>
          <product>
            <property>aero/qbar-psf</property>
            <property>metrics/Sw-sqft</property>
            <table>
              <independentVar lookup="row">aero/alpha-deg</independentVar>
              <tableData>
                   -180.00   -0.02014
                   -165.00   -0.24171
                    -32.00    0.73944
                    -10.00    0.45271
                      5.00   -0.33147
                     20.00   -0.91338
                     46.00   -0.67960
                    180.00   -0.02014
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              </tableData>
            </table>
            <min>
              <value>1</value>
              <product>
                <property>fcs/speedbrake-pos-norm</property>
                <value>1.33333</value>
              </product>
            </min>
          </product>
        </function>
      </axis>
      <axis name="ROLL">
        <function name="aero/coefficient/Cl_base">
          <description>Cl over alpha and beta (hangar)</description>
          <product>
            <property>aero/qbar-psf</property>
            <property>metrics/Sw-sqft</property>
            <property>metrics/bw-ft</property>
            <property>aero/function/mach-side</property>
          <table>
            <independentVar lookup="row">aero/alpha-deg</independentVar>
            <independentVar lookup="column">aero/beta-deg</independentVar>
            <tableData>
                        -90.00    -70.00    -50.00    -40.00    -30.00    -25.00    -20.00    -15.00    -10.00     -6.00     -3.00      0.00      3.00      6.00     10.00     15.00     20.00     25.00     30.00     40.00     50.00     70.00     90.00
             -180.00   0.09044   0.09246   0.11525   0.11415   0.09710   0.08447   0.06986   0.05355   0.04979   0.04697   0.02496  -0.00000  -0.02496  -0.04697  -0.04979  -0.05355  -0.06986  -0.08447  -0.09710  -0.11415  -0.11525  -0.09246  -0.09044
              -35.00   0.09044   0.08896   0.07764   0.05674   0.03640   0.02896   0.02933   0.02407   0.01534   0.00910   0.00468  -0.00000  -0.00468  -0.00910  -0.01534  -0.02407  -0.02933  -0.02896  -0.03640  -0.05674  -0.07764  -0.08896  -0.09044
              -11.00   0.09044   0.10893   0.10162   0.06290   0.02524   0.02191   0.02951   0.02376   0.01624   0.00984   0.00494  -0.00000  -0.00494  -0.00984  -0.01624  -0.02376  -0.02951  -0.02191  -0.02524  -0.06290  -0.10162  -0.10893  -0.09044
                4.00   0.09044   0.11409   0.11225   0.07913   0.06924   0.06820   0.06177   0.04848   0.03328   0.02024   0.01017  -0.00000  -0.01017  -0.02024  -0.03328  -0.04848  -0.06177  -0.06820  -0.06924  -0.07913  -0.11225  -0.11409  -0.09044
               19.00   0.09044   0.09346   0.04398   0.03146   0.06098   0.06468   0.05775   0.04511   0.03085   0.01877   0.00950  -0.00000  -0.00950  -0.01877  -0.03085  -0.04511  -0.05775  -0.06468  -0.06098  -0.03146  -0.04398  -0.09346  -0.09044
               42.00   0.09044   0.09211   0.08057   0.06615   0.04804   0.04132   0.03696   0.03620   0.02571   0.01547   0.00832  -0.00000  -0.00832  -0.01547  -0.02571  -0.03620  -0.03696  -0.04132  -0.04804  -0.06615  -0.08057  -0.09211  -0.09044
              180.00   0.09044   0.09246   0.11525   0.11415   0.09710   0.08447   0.06986   0.05355   0.04979   0.04697   0.02496  -0.00000  -0.02496  -0.04697  -0.04979  -0.05355  -0.06986  -0.08447  -0.09710  -0.11415  -0.11525  -0.09246  -0.09044
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            </tableData>
          </table>
          </product>
        </function>
        <function name="aero/coefficient/Cl_aileron">
          <description>Cl increment from aileron (deg), over alpha</description>
          <product>
            <property>aero/qbar-psf</property>
            <property>metrics/Sw-sqft</property>
            <property>metrics/bw-ft</property>
            <property>aero/function/mach-aileron</property>
          <table>
            <independentVar lookup="row">aero/alpha-deg</independentVar>
            <independentVar lookup="column">fcs/left-aileron-pos-deg</independentVar>
            <tableData>
                        -20.00    -15.00    -10.00     -5.00      0.00      5.00     10.00     15.00     20.00
             -180.00   0.00000   0.00000   0.00000   0.00000   0.00000   0.00000   0.00000   0.00000   0.00000
              -35.00  -0.00813  -0.00746  -0.00585  -0.00321   0.00000   0.00321   0.00585   0.00746   0.00813
              -11.00  -0.03246  -0.02783  -0.02076  -0.01108   0.00000   0.01108   0.02076   0.02783   0.03246
                4.00  -0.03309  -0.02838  -0.02118  -0.01131   0.00000   0.01131   0.02118   0.02838   0.03309
               19.00  -0.03974  -0.03383  -0.02515  -0.01343   0.00000   0.01343   0.02515   0.03383   0.03974
               42.00  -0.00856  -0.00770  -0.00595  -0.00324   0.00000   0.00324   0.00595   0.00770   0.00856
              180.00   0.00000   0.00000   0.00000   0.00000   0.00000   0.00000   0.00000   0.00000   0.00000
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            </tableData>
          </table>
          </product>
        </function>
        <function name="aero/coefficient/Cl_rudder">
          <description>Cl increment from rudder (deg), over alpha</description>
          <product>
            <property>aero/qbar-psf</property>
            <property>metrics/Sw-sqft</property>
            <property>metrics/bw-ft</property>
            <property>aero/function/mach-rudder</property>
          <table>
            <independentVar lookup="row">aero/alpha-deg</independentVar>
            <independentVar lookup="column">fcs/rudder-pos-deg</independentVar>
            <tableData>
                        -25.00    -20.00    -15.00    -10.00     -5.00      0.00      5.00     10.00     15.00     20.00     25.00
             -180.00   0.00000   0.00000   0.00000   0.00000   0.00000   0.00000   0.00000   0.00000   0.00000   0.00000   0.00000
              -35.00  -0.01644  -0.01480  -0.01255  -0.00928  -0.00493   0.00000   0.00493   0.00928   0.01255   0.01480   0.01644
              -11.00  -0.02030  -0.01827  -0.01549  -0.01145  -0.00609   0.00000   0.00609   0.01145   0.01549   0.01827   0.02030
                4.00  -0.02065  -0.01857  -0.01574  -0.01164  -0.00619   0.00000   0.00619   0.01164   0.01574   0.01857   0.02065
               19.00  -0.01868  -0.01682  -0.01427  -0.01056  -0.00561   0.00000   0.00561   0.01056   0.01427   0.01682   0.01868
               42.00  -0.01533  -0.01383  -0.01175  -0.00861  -0.00456   0.00000   0.00456   0.00861   0.01175   0.01383   0.01533
              180.00   0.00000   0.00000   0.00000   0.00000   0.00000   0.00000   0.00000   0.00000   0.00000   0.00000   0.00000
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            </tableData>
          </table>
          </product>
        </function>
        <function name="aero/coefficient/Clp">
          <description>Cl per p (non-dimensional), over alpha</description>
          <product>
            <property>aero/qbar-psf</property>
            <property>metrics/Sw-sqft</property>
            <property>metrics/bw-ft</property>
            <property>aero/bi2vel</property>
            <property>velocities/p-aero-rad_sec</property>
            <property>aero/function/mach-lift</property>
          <table>
            <independentVar lookup="row">aero/alpha-deg</independentVar>
            <tableData>
                 -180.00   -0.76824
                 -165.00   -0.24775
                  -32.00   -0.17352
                  -10.00   -0.53090
                    5.00   -0.51619
                   20.00    0.10974
                   46.00   -0.26519
                  180.00   -0.76824
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            </tableData>
          </table>
          </product>
        </function>
        <function name="aero/coefficient/Clr">
          <description>Cl per r (non-dimensional), over alpha</description>
          <product>
            <property>aero/qbar-psf</property>
            <property>metrics/Sw-sqft</property>
            <property>metrics/bw-ft</property>
            <property>aero/bi2vel</property>
            <property>velocities/r-aero-rad_sec</property>
            <property>aero/function/mach-lift</property>
          <table>
            <independentVar lookup="row">aero/alpha-deg</independentVar>
            <tableData>
                 -180.00    0.19107
                 -165.00    0.21300
                  -32.00   -0.08295
                  -10.00    0.04841
                    5.00    0.22737
                   20.00    0.51253
                   46.00    0.27566
                  180.00    0.19107
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            </tableData>
          </table>
          </product>
        </function>
      </axis>
      <axis name="PITCH">
        <function name="aero/coefficient/Cm_base">
          <description>Cm over alpha and beta (hangar)</description>
          <product>
            <property>aero/qbar-psf</property>
            <property>metrics/Sw-sqft</property>
            <property>metrics/cbarw-ft</property>
          <table>
            <independentVar lookup="row">aero/alpha-deg</independentVar>
            <independentVar lookup="column">aero/beta-deg</independentVar>
            <tableData>
                        -90.00    -70.00    -50.00    -40.00    -30.00    -25.00    -20.00    -15.00    -10.00     -6.00     -3.00      0.00      3.00      6.00     10.00     15.00     20.00     25.00     30.00     40.00     50.00     70.00     90.00
             -180.00  -0.00000  -0.00519   0.02443  -0.04192  -0.10395  -0.12336  -0.13815  -0.14921  -0.13296  -0.13940  -0.15730  -0.16385  -0.15730  -0.13940  -0.13296  -0.14921  -0.13815  -0.12336  -0.10395  -0.04192   0.02443  -0.00519  -0.00000
              -35.00  -0.00000   0.10224   0.27307   0.35015   0.40758   0.44819   0.47613   0.47860   0.46900   0.46298   0.46006   0.45900   0.46006   0.46298   0.46900   0.47860   0.47613   0.44819   0.40758   0.35015   0.27307   0.10224  -0.00000
              -11.00  -0.00000   0.00215   0.21037   0.39890   0.44303   0.50233   0.54994   0.60790   0.64899   0.66987   0.67860   0.68140   0.67860   0.66987   0.64899   0.60790   0.54994   0.50233   0.44303   0.39890   0.21037   0.00215  -0.00000
                4.00  -0.00000  -0.00941  -0.08730  -0.09857  -0.05355  -0.03783  -0.01946  -0.00041   0.01213   0.01764   0.01955   0.02016   0.01955   0.01764   0.01213  -0.00041  -0.01946  -0.03783  -0.05355  -0.09857  -0.08730  -0.00941  -0.00000
               19.00  -0.00000  -0.04807  -0.28395  -0.44652  -0.51317  -0.49104  -0.50257  -0.52003  -0.52855  -0.53303  -0.53505  -0.53573  -0.53505  -0.53303  -0.52855  -0.52003  -0.50257  -0.49104  -0.51317  -0.44652  -0.28395  -0.04807  -0.00000
               42.00  -0.00000  -0.12455  -0.34582  -0.46244  -0.55709  -0.60508  -0.62672  -0.65153  -0.63290  -0.62131  -0.61658  -0.61550  -0.61658  -0.62131  -0.63290  -0.65153  -0.62672  -0.60508  -0.55709  -0.46244  -0.34582  -0.12455  -0.00000
              180.00  -0.00000  -0.00519   0.02443  -0.04192  -0.10395  -0.12336  -0.13815  -0.14921  -0.13296  -0.13940  -0.15730  -0.16385  -0.15730  -0.13940  -0.13296  -0.14921  -0.13815  -0.12336  -0.10395  -0.04192   0.02443  -0.00519  -0.00000
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            </tableData>
          </table>
          </product>
        </function>
        <function name="aero/coefficient/Cm_mach">
          <description>Cm from the neutral point's move with Mach</description>
          <product>
            <property>aero/qbar-psf</property>
            <property>metrics/Sw-sqft</property>
            <property>metrics/cbarw-ft</property>
            <property>aero/function/CL-base</property>
            <property>aero/function/mach-dCm-dCL</property>
          </product>
        </function>
        <function name="aero/coefficient/Cm_elevator">
          <description>Cm increment from elevator (deg), over alpha</description>
          <product>
            <property>aero/qbar-psf</property>
            <property>metrics/Sw-sqft</property>
            <property>metrics/cbarw-ft</property>
            <property>aero/function/mach-elevator</property>
          <table>
            <independentVar lookup="row">aero/alpha-deg</independentVar>
            <independentVar lookup="column">fcs/elevator-pos-deg</independentVar>
            <tableData>
                        -25.00    -20.00    -15.00    -10.00     -5.00      0.00      5.00     10.00     15.00     20.00
             -180.00  -0.00396  -0.00259  -0.00149  -0.00067  -0.00017   0.00000  -0.00017  -0.00067  -0.00149  -0.00259
              -35.00   0.11925   0.11363   0.10227   0.08006   0.04429   0.00000  -0.04410  -0.07835  -0.09511  -0.09539
              -11.00   0.59899   0.54579   0.46779   0.34882   0.18683   0.00000  -0.18699  -0.34988  -0.46788  -0.54383
                4.00   0.64710   0.58873   0.50423   0.37561   0.20008   0.00000  -0.19915  -0.37221  -0.49760  -0.57868
               19.00   0.57205   0.52902   0.45840   0.34377   0.18339   0.00000  -0.18190  -0.33971  -0.45483  -0.53093
               42.00   0.20827   0.20289   0.18393   0.14321   0.07873   0.00000  -0.08111  -0.15279  -0.20558  -0.24106
              180.00  -0.00396  -0.00259  -0.00149  -0.00067  -0.00017   0.00000  -0.00017  -0.00067  -0.00149  -0.00259
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            </tableData>
          </table>
          </product>
        </function>
        <function name="aero/coefficient/Cm_flap">
          <description>Cm increment from flap (deg), over alpha</description>
          <product>
            <property>aero/qbar-psf</property>
            <property>metrics/Sw-sqft</property>
            <property>metrics/cbarw-ft</property>
            <property>aero/function/mach-flap</property>
          <table>
            <independentVar lookup="row">aero/alpha-deg</independentVar>
            <independentVar lookup="column">fcs/flap-pos-deg</independentVar>
            <tableData>
                          0.00      5.00     10.00     15.00     20.00     25.00     30.00     35.00     40.00
             -180.00   0.00000   0.00001   0.00003   0.00007   0.00013   0.00020   0.00028   0.00037   0.00046
              -35.00   0.00000  -0.00793  -0.01644  -0.02495  -0.03267  -0.03931  -0.04515  -0.05052  -0.05588
              -11.00   0.00000   0.00138   0.00247   0.00300   0.00280   0.00185   0.00008  -0.00284  -0.00732
                4.00   0.00000   0.00791   0.01569   0.02275   0.02872   0.03358   0.03757   0.04104   0.04446
               19.00   0.00000   0.00689   0.01192   0.01460   0.01499   0.01341   0.01035   0.00633   0.00133
               42.00   0.00000  -0.00434  -0.00860  -0.01242  -0.01561  -0.01821  -0.02043  -0.02253  -0.02476
              180.00   0.00000   0.00001   0.00003   0.00007   0.00013   0.00020   0.00028   0.00037   0.00046
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            </tableData>
          </table>
          </product>
        </function>
        <function name="aero/coefficient/Cmq">
          <description>Cm per q (non-dimensional), over alpha</description>
          <product>
            <property>aero/qbar-psf</property>
            <property>metrics/Sw-sqft</property>
            <property>metrics/cbarw-ft</property>
            <property>aero/ci2vel</property>
            <property>velocities/q-aero-rad_sec</property>
            <property>aero/function/mach-lift</property>
          <table>
            <independentVar lookup="row">aero/alpha-deg</independentVar>
            <tableData>
                 -180.00  -14.38259
                 -165.00   -7.15594
                  -32.00  -11.30030
                  -10.00  -22.13508
                    5.00  -32.64305
                   20.00  -18.31754
                   46.00  -15.50120
                  180.00  -14.38259
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            </tableData>
          </table>
          </product>
        </function>
        <function name="aero/coefficient/Cmadot">
          <description>Cm per alpha-dot (downwash lag at the tail)</description>
          <product>
            <property>aero/qbar-psf</property>
            <property>metrics/Sw-sqft</property>
            <property>metrics/cbarw-ft</property>
            <property>aero/ci2vel</property>
            <property>aero/alphadot-rad_sec</property>
            <value>-6.30528</value>
            <property>aero/function/mach-lift</property>
          </product>
        </function>
        <function name="aero/coefficient/Cm_spoilers">
          <description>spoilers: its drag's pitching moment, -0.01 m from the reference point's height</description>
          <product>
            <property>aero/qbar-psf</property>
            <property>metrics/Sw-sqft</property>
            <property>metrics/cbarw-ft</property>
            <value>-0.00012014</value>
            <pow>
              <sin>
                <product>
                  <property>fcs/speedbrake-pos-norm</property>
                  <value>1.0472</value>
                </product>
              </sin>
              <value>2</value>
            </pow>
          </product>
        </function>
        <function name="aero/coefficient/Cm_spoilers_lift">
          <description>spoilers: the lift lost's pitching moment, 0.12 m from the reference point</description>
          <product>
            <property>aero/qbar-psf</property>
            <property>metrics/Sw-sqft</property>
            <property>metrics/cbarw-ft</property>
            <table>
              <independentVar lookup="row">aero/alpha-deg</independentVar>
              <tableData>
                   -180.00    0.00049
                   -165.00    0.00587
                    -32.00   -0.01795
                    -10.00   -0.01099
                      5.00    0.00805
                     20.00    0.02218
                     46.00    0.01650
                    180.00    0.00049
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              </tableData>
            </table>
            <min>
              <value>1</value>
              <product>
                <property>fcs/speedbrake-pos-norm</property>
                <value>1.33333</value>
              </product>
            </min>
          </product>
        </function>
        <function name="aero/coefficient/Cm_gear">
          <description>the gear's drag's pitching moment, -1.89 m from the reference point's height</description>
          <product>
            <property>aero/qbar-psf</property>
            <property>metrics/Sw-sqft</property>
            <property>metrics/cbarw-ft</property>
            <value>-0.00238875</value>
            <property>gear/gear-pos-norm</property>
          </product>
        </function>
      </axis>
      <axis name="YAW">
        <function name="aero/coefficient/Cn_base">
          <description>Cn over alpha and beta (hangar)</description>
          <product>
            <property>aero/qbar-psf</property>
            <property>metrics/Sw-sqft</property>
            <property>metrics/bw-ft</property>
            <property>aero/function/mach-side</property>
          <table>
            <independentVar lookup="row">aero/alpha-deg</independentVar>
            <independentVar lookup="column">aero/beta-deg</independentVar>
            <tableData>
                        -90.00    -70.00    -50.00    -40.00    -30.00    -25.00    -20.00    -15.00    -10.00     -6.00     -3.00      0.00      3.00      6.00     10.00     15.00     20.00     25.00     30.00     40.00     50.00     70.00     90.00
             -180.00  -0.14688  -0.17544  -0.17850  -0.16413  -0.13701  -0.11897  -0.09842  -0.07698  -0.08411  -0.08818  -0.04737  -0.00000   0.04737   0.08818   0.08411   0.07698   0.09842   0.11897   0.13701   0.16413   0.17850   0.17544   0.14688
              -35.00  -0.14688  -0.10764  -0.06265  -0.03500  -0.02131  -0.02267  -0.04573  -0.04514  -0.02887  -0.01691  -0.00836  -0.00000   0.00836   0.01691   0.02887   0.04514   0.04573   0.02267   0.02131   0.03500   0.06265   0.10764   0.14688
              -11.00  -0.14688  -0.10726  -0.06166  -0.03929  -0.04039  -0.04808  -0.06790  -0.05430  -0.03711  -0.02250  -0.01128  -0.00000   0.01128   0.02250   0.03711   0.05430   0.06790   0.04808   0.04039   0.03929   0.06166   0.10726   0.14688
                4.00  -0.14688  -0.10456  -0.03117  -0.01653  -0.01802  -0.02041  -0.02485  -0.02048  -0.01452  -0.00897  -0.00453  -0.00000   0.00453   0.00897   0.01452   0.02048   0.02485   0.02041   0.01802   0.01653   0.03117   0.10456   0.14688
               19.00  -0.14688  -0.10257  -0.05569  -0.04562  -0.04891  -0.04675  -0.04112  -0.03292  -0.02289  -0.01402  -0.00714  -0.00000   0.00714   0.01402   0.02289   0.03292   0.04112   0.04675   0.04891   0.04562   0.05569   0.10257   0.14688
               42.00  -0.14688  -0.10988  -0.06464  -0.04392  -0.02943  -0.02725  -0.02677  -0.04382  -0.03130  -0.01786  -0.00859  -0.00000   0.00859   0.01786   0.03130   0.04382   0.02677   0.02725   0.02943   0.04392   0.06464   0.10988   0.14688
              180.00  -0.14688  -0.17544  -0.17850  -0.16413  -0.13701  -0.11897  -0.09842  -0.07698  -0.08411  -0.08818  -0.04737  -0.00000   0.04737   0.08818   0.08411   0.07698   0.09842   0.11897   0.13701   0.16413   0.17850   0.17544   0.14688
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            </tableData>
          </table>
          </product>
        </function>
        <function name="aero/coefficient/Cn_aileron">
          <description>Cn increment from aileron (deg), over alpha</description>
          <product>
            <property>aero/qbar-psf</property>
            <property>metrics/Sw-sqft</property>
            <property>metrics/bw-ft</property>
            <property>aero/function/mach-aileron</property>
          <table>
            <independentVar lookup="row">aero/alpha-deg</independentVar>
            <independentVar lookup="column">fcs/left-aileron-pos-deg</independentVar>
            <tableData>
                        -20.00    -15.00    -10.00     -5.00      0.00      5.00     10.00     15.00     20.00
             -180.00  -0.00000  -0.00000  -0.00000  -0.00000   0.00000  -0.00000  -0.00000  -0.00000  -0.00000
              -35.00   0.01275   0.01071   0.00787   0.00417   0.00000  -0.00417  -0.00787  -0.01071  -0.01275
              -11.00   0.00351   0.00299   0.00221   0.00117   0.00000  -0.00117  -0.00221  -0.00299  -0.00351
                4.00  -0.00046  -0.00039  -0.00029  -0.00016   0.00000   0.00016   0.00029   0.00039   0.00046
               19.00  -0.01244  -0.01049  -0.00781  -0.00421   0.00000   0.00421   0.00781   0.01049   0.01244
               42.00  -0.01183  -0.01001  -0.00739  -0.00393   0.00000   0.00393   0.00739   0.01001   0.01183
              180.00  -0.00000  -0.00000  -0.00000  -0.00000   0.00000  -0.00000  -0.00000  -0.00000  -0.00000
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            </tableData>
          </table>
          </product>
        </function>
        <function name="aero/coefficient/Cn_rudder">
          <description>Cn increment from rudder (deg), over alpha</description>
          <product>
            <property>aero/qbar-psf</property>
            <property>metrics/Sw-sqft</property>
            <property>metrics/bw-ft</property>
            <property>aero/function/mach-rudder</property>
          <table>
            <independentVar lookup="row">aero/alpha-deg</independentVar>
            <independentVar lookup="column">fcs/rudder-pos-deg</independentVar>
            <tableData>
                        -25.00    -20.00    -15.00    -10.00     -5.00      0.00      5.00     10.00     15.00     20.00     25.00
             -180.00  -0.00000  -0.00000  -0.00000  -0.00000  -0.00000   0.00000  -0.00000  -0.00000  -0.00000  -0.00000  -0.00000
              -35.00   0.04585   0.04136   0.03516   0.02602   0.01382   0.00000  -0.01382  -0.02602  -0.03516  -0.04136  -0.04585
              -11.00   0.05839   0.05270   0.04481   0.03322   0.01767   0.00000  -0.01767  -0.03322  -0.04481  -0.05270  -0.05839
                4.00   0.05867   0.05293   0.04499   0.03334   0.01773   0.00000  -0.01773  -0.03334  -0.04499  -0.05293  -0.05867
               19.00   0.05296   0.04781   0.04066   0.03014   0.01603   0.00000  -0.01603  -0.03014  -0.04066  -0.04781  -0.05296
               42.00   0.04271   0.03862   0.03288   0.02417   0.01279   0.00000  -0.01279  -0.02417  -0.03288  -0.03862  -0.04271
              180.00  -0.00000  -0.00000  -0.00000  -0.00000  -0.00000   0.00000  -0.00000  -0.00000  -0.00000  -0.00000  -0.00000
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            </tableData>
          </table>
          </product>
        </function>
        <function name="aero/coefficient/Cnp">
          <description>Cn per p (non-dimensional), over alpha</description>
          <product>
            <property>aero/qbar-psf</property>
            <property>metrics/Sw-sqft</property>
            <property>metrics/bw-ft</property>
            <property>aero/bi2vel</property>
            <property>velocities/p-aero-rad_sec</property>
            <property>aero/function/mach-lift</property>
          <table>
            <independentVar lookup="row">aero/alpha-deg</independentVar>
            <tableData>
                 -180.00    0.28290
                 -165.00    0.25683
                  -32.00    0.09809
                  -10.00    0.22824
                    5.00   -0.01648
                   20.00    0.25798
                   46.00    0.07225
                  180.00    0.28290
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            </tableData>
          </table>
          </product>
        </function>
        <function name="aero/coefficient/Cnr">
          <description>Cn per r (non-dimensional), over alpha</description>
          <product>
            <property>aero/qbar-psf</property>
            <property>metrics/Sw-sqft</property>
            <property>metrics/bw-ft</property>
            <property>aero/bi2vel</property>
            <property>velocities/r-aero-rad_sec</property>
            <property>aero/function/mach-lift</property>
          <table>
            <independentVar lookup="row">aero/alpha-deg</independentVar>
            <tableData>
                 -180.00   -0.49938
                 -165.00   -0.45719
                  -32.00   -0.26852
                  -10.00   -0.36912
                    5.00   -0.32510
                   20.00   -0.18103
                   46.00   -0.33497
                  180.00   -0.49938
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            </tableData>
          </table>
          </product>
        </function>
      </axis>
    </aerodynamics>
</fdm_config>
