<?xml version="1.0"?>
<?xml-stylesheet type="text/xsl" href="http://jsbsim.sourceforge.net/JSBSim.xsl"?>
<!-- Generated by hangar 0.1.0 from ea18g.toml on 2026-10-01. Edit the design and rebuild; changes
     made here are overwritten.  -->
<fdm_config name="ea18g" version="2.0" release="ALPHA"
            xmlns:xsi="http://www.w3.org/2001/XMLSchema-instance"
            xsi:noNamespaceSchemaLocation="http://jsbsim.sourceforge.net/JSBSim.xsd">
    <fileheader>
      <author>hangar</author>
      <filecreationdate>2026-10-01</filecreationdate>
      <version>0.1.0</version>
      <description>Boeing EA-18G Growler, three jamming pods (hangar build)</description>
      <note>Aerodynamics: vortex lattice with viscous section polars, full-envelope
        strip model, slender-body fuselage (hangar). Mass: Raymer component
        weights on the geometry. Propeller: blade-element momentum theory.</note>
      <reference refID="fsim/applicability/aerobatic" author="the design" title="US Navy F/A-18E/F data: +7.5 g (fsim/envelope/clean/n_max), a fighter's manoeuvres" date="n/a"/>
      <reference refID="fsim/applicability/carrier" author="the design" title="US Navy EA-18G fact sheet: carrier-based, with a nose-gear launch bar for the catapult and an arresting hook" date="n/a"/>
      <reference refID="fsim/applicability/drag_devices" author="the design" title="US Navy F/A-18E/F data: no dorsal speed brake; the flight control system deflects the control surfaces as one" date="n/a"/>
      <reference refID="fsim/applicability/flaps" author="the design" title="US Navy F/A-18E/F data: trailing-edge flaps" date="n/a"/>
      <reference refID="fsim/applicability/ground_contact" author="the design" title="US Navy EA-18G fact sheet: tricycle wheeled gear" date="n/a"/>
      <reference refID="fsim/applicability/releasable_stores" author="the design" title="US Navy EA-18G fact sheet: AGM-88 HARM and AIM-120 on wing stations" date="n/a"/>
      <reference refID="fsim/applicability/retractable_gear" author="the design" title="US Navy EA-18G fact sheet: retractable gear" date="n/a"/>
      <reference refID="fsim/applicability/vertical_flight" author="the design" title="US Navy EA-18G fact sheet: a conventional take-off and landing jet. Conventional take-off and landing: no rotors, lift fans or vectored lift to hover" date="n/a"/>
    </fileheader>
    <metrics>
      <wingarea unit="M2"> 46.2776 </wingarea>
      <wingspan unit="M"> 12.5400 </wingspan>
      <chord unit="M"> 3.9985 </chord>
      <htailarea unit="M2"> 16.9657 </htailarea>
      <htailarm unit="M"> 4.8861 </htailarm>
      <vtailarea unit="M2"> 10.3728 </vtailarea>
      <vtailarm unit="M"> 3.7064 </vtailarm>
      <location name="AERORP" unit="M">
        <x> 10.6600 </x>
        <y> 0.0000 </y>
        <z> 0.0000 </z>
      </location>
      <location name="EYEPOINT" unit="M">
        <x> 4.8000 </x>
        <y> 0.0000 </y>
        <z> 1.3000 </z>
      </location>
      <location name="VRP" unit="M">
        <x> 10.7500 </x>
        <y> -0.0000 </y>
        <z> -0.2000 </z>
      </location>
    </metrics>
    <mass_balance negated_crossproduct_inertia="false">
      <ixx unit="KG*M2"> 44628.27 </ixx>
      <iyy unit="KG*M2"> 254493.59 </iyy>
      <izz unit="KG*M2"> 295021.77 </izz>
      <ixy unit="KG*M2"> -0.108 </ixy>
      <ixz unit="KG*M2"> -865.502 </ixz>
      <iyz unit="KG*M2"> 0.295 </iyz>
      <emptywt unit="KG"> 15011.00 </emptywt>
      <location name="CG" unit="M">
        <x> 10.7500 </x>
        <y> -0.0000 </y>
        <z> -0.2000 </z>
      </location>
      <pointmass name="pilot">
        <weight unit="KG"> 100.00 </weight>
        <location unit="M">
          <x> 4.8000 </x>
          <y> 0.0000 </y>
          <z> 0.6000 </z>
        </location>
      </pointmass>
      <pointmass name="electronic warfare officer">
        <weight unit="KG"> 100.00 </weight>
        <location unit="M">
          <x> 6.2000 </x>
          <y> 0.0000 </y>
          <z> 0.6800 </z>
        </location>
      </pointmass>
      <pointmass name="left ALQ-99 pod">
        <weight unit="KG"> 435.00 </weight>
        <location unit="M">
          <x> 11.9000 </x>
          <y> -3.6000 </y>
          <z> -0.8500 </z>
        </location>
      </pointmass>
      <pointmass name="right ALQ-99 pod">
        <weight unit="KG"> 435.00 </weight>
        <location unit="M">
          <x> 11.9000 </x>
          <y> 3.6000 </y>
          <z> -0.8500 </z>
        </location>
      </pointmass>
      <pointmass name="centre-line ALQ-99 pod">
        <weight unit="KG"> 435.00 </weight>
        <location unit="M">
          <x> 10.5500 </x>
          <y> 0.0000 </y>
          <z> -1.5000 </z>
        </location>
      </pointmass>
    </mass_balance>
    <ground_reactions>
      <contact type="BOGEY" name="Nose Gear">
        <location unit="M">
          <x> 5.5300 </x>
          <y> 0.0000 </y>
          <z> -2.4800 </z>
        </location>
        <static_friction> 0.8 </static_friction>
        <dynamic_friction> 0.5 </dynamic_friction>
        <rolling_friction> 0.02 </rolling_friction>
        <spring_coeff unit="N/M"> 179130 </spring_coeff>
        <damping_coeff unit="N/M/SEC"> 21403 </damping_coeff>
        <damping_coeff_rebound unit="N/M/SEC"> 42806 </damping_coeff_rebound>
        <max_steer unit="DEG"> 75.0 </max_steer>
        <brake_group> NONE </brake_group>
        <retractable> 1 </retractable>
      </contact>
      <contact type="BOGEY" name="Left Main Gear">
        <location unit="M">
          <x> 11.3100 </x>
          <y> -1.5930 </y>
          <z> -2.5200 </z>
        </location>
        <static_friction> 0.8 </static_friction>
        <dynamic_friction> 0.5 </dynamic_friction>
        <rolling_friction> 0.02 </rolling_friction>
        <spring_coeff unit="N/M"> 552489 </spring_coeff>
        <damping_coeff unit="N/M/SEC"> 74851 </damping_coeff>
        <damping_coeff_rebound unit="N/M/SEC"> 149703 </damping_coeff_rebound>
        <max_steer unit="DEG"> 0.0 </max_steer>
        <brake_group> LEFT </brake_group>
        <retractable> 1 </retractable>
      </contact>
      <contact type="BOGEY" name="Right Main Gear">
        <location unit="M">
          <x> 11.3100 </x>
          <y> 1.5930 </y>
          <z> -2.5200 </z>
        </location>
        <static_friction> 0.8 </static_friction>
        <dynamic_friction> 0.5 </dynamic_friction>
        <rolling_friction> 0.02 </rolling_friction>
        <spring_coeff unit="N/M"> 552489 </spring_coeff>
        <damping_coeff unit="N/M/SEC"> 74851 </damping_coeff>
        <damping_coeff_rebound unit="N/M/SEC"> 149703 </damping_coeff_rebound>
        <max_steer unit="DEG"> 0.0 </max_steer>
        <brake_group> RIGHT </brake_group>
        <retractable> 1 </retractable>
      </contact>
      <contact type="STRUCTURE" name="ALQ-218 pod left rear">
        <location unit="M">
          <x> 13.8000 </x>
          <y> -6.5756 </y>
          <z> -0.2258 </z>
        </location>
        <static_friction> 0.8 </static_friction>
        <dynamic_friction> 0.6 </dynamic_friction>
        <spring_coeff unit="N/M"> 839468 </spring_coeff>
        <damping_coeff unit="N/M/SEC"> 27982 </damping_coeff>
        <damping_coeff_rebound unit="N/M/SEC"> 27982 </damping_coeff_rebound>
      </contact>
      <contact type="STRUCTURE" name="ALQ-218 pod left rear 2">
        <location unit="M">
          <x> 10.4408 </x>
          <y> -6.5312 </y>
          <z> -0.0871 </z>
        </location>
        <static_friction> 0.8 </static_friction>
        <dynamic_friction> 0.6 </dynamic_friction>
        <spring_coeff unit="N/M"> 879620 </spring_coeff>
        <damping_coeff unit="N/M/SEC"> 29321 </damping_coeff>
        <damping_coeff_rebound unit="N/M/SEC"> 29321 </damping_coeff_rebound>
      </contact>
      <contact type="STRUCTURE" name="ALQ-218 pod right rear">
        <location unit="M">
          <x> 10.4408 </x>
          <y> 6.5312 </y>
          <z> -0.0871 </z>
        </location>
        <static_friction> 0.8 </static_friction>
        <dynamic_friction> 0.6 </dynamic_friction>
        <spring_coeff unit="N/M"> 879619 </spring_coeff>
        <damping_coeff unit="N/M/SEC"> 29321 </damping_coeff>
        <damping_coeff_rebound unit="N/M/SEC"> 29321 </damping_coeff_rebound>
      </contact>
      <contact type="STRUCTURE" name="ALQ-218 pod right rear 2">
        <location unit="M">
          <x> 13.8000 </x>
          <y> 6.5756 </y>
          <z> -0.2258 </z>
        </location>
        <static_friction> 0.8 </static_friction>
        <dynamic_friction> 0.6 </dynamic_friction>
        <spring_coeff unit="N/M"> 839467 </spring_coeff>
        <damping_coeff unit="N/M/SEC"> 27982 </damping_coeff>
        <damping_coeff_rebound unit="N/M/SEC"> 27982 </damping_coeff_rebound>
      </contact>
      <contact type="STRUCTURE" name="canopy front">
        <location unit="M">
          <x> 5.0000 </x>
          <y> 0.0000 </y>
          <z> 1.0843 </z>
        </location>
        <static_friction> 0.8 </static_friction>
        <dynamic_friction> 0.6 </dynamic_friction>
        <spring_coeff unit="N/M"> 4192194 </spring_coeff>
        <damping_coeff unit="N/M/SEC"> 139740 </damping_coeff>
        <damping_coeff_rebound unit="N/M/SEC"> 139740 </damping_coeff_rebound>
      </contact>
      <contact type="STRUCTURE" name="centre-line ALQ-99 pod bottom">
        <location unit="M">
          <x> 9.0592 </x>
          <y> 0.0000 </y>
          <z> -2.0236 </z>
        </location>
        <static_friction> 0.8 </static_friction>
        <dynamic_friction> 0.6 </dynamic_friction>
        <spring_coeff unit="N/M"> 5951105 </spring_coeff>
        <damping_coeff unit="N/M/SEC"> 198370 </damping_coeff>
        <damping_coeff_rebound unit="N/M/SEC"> 198370 </damping_coeff_rebound>
      </contact>
      <contact type="STRUCTURE" name="centre-line ALQ-99 pod rear">
        <location unit="M">
          <x> 12.2117 </x>
          <y> -0.0000 </y>
          <z> -2.0237 </z>
        </location>
        <static_friction> 0.8 </static_friction>
        <dynamic_friction> 0.6 </dynamic_friction>
        <spring_coeff unit="N/M"> 6079383 </spring_coeff>
        <damping_coeff unit="N/M/SEC"> 202646 </damping_coeff>
        <damping_coeff_rebound unit="N/M/SEC"> 202646 </damping_coeff_rebound>
      </contact>
      <contact type="STRUCTURE" name="fin left rear">
        <location unit="M">
          <x> 16.2200 </x>
          <y> -1.9599 </y>
          <z> 2.5400 </z>
        </location>
        <static_friction> 0.8 </static_friction>
        <dynamic_friction> 0.6 </dynamic_friction>
        <spring_coeff unit="N/M"> 2092481 </spring_coeff>
        <damping_coeff unit="N/M/SEC"> 69749 </damping_coeff>
        <damping_coeff_rebound unit="N/M/SEC"> 69749 </damping_coeff_rebound>
      </contact>
      <contact type="STRUCTURE" name="fin right rear">
        <location unit="M">
          <x> 16.2200 </x>
          <y> 1.9599 </y>
          <z> 2.5400 </z>
        </location>
        <static_friction> 0.8 </static_friction>
        <dynamic_friction> 0.6 </dynamic_friction>
        <spring_coeff unit="N/M"> 2092477 </spring_coeff>
        <damping_coeff unit="N/M/SEC"> 69749 </damping_coeff>
        <damping_coeff_rebound unit="N/M/SEC"> 69749 </damping_coeff_rebound>
      </contact>
      <contact type="STRUCTURE" name="fuselage front">
        <location unit="M">
          <x> 0.0000 </x>
          <y> 0.0000 </y>
          <z> -0.5300 </z>
        </location>
        <static_friction> 0.8 </static_friction>
        <dynamic_friction> 0.6 </dynamic_friction>
        <spring_coeff unit="N/M"> 1727004 </spring_coeff>
        <damping_coeff unit="N/M/SEC"> 57567 </damping_coeff>
        <damping_coeff_rebound unit="N/M/SEC"> 57567 </damping_coeff_rebound>
      </contact>
      <contact type="STRUCTURE" name="htail left rear">
        <location unit="M">
          <x> 18.3000 </x>
          <y> -3.1200 </y>
          <z> -0.4851 </z>
        </location>
        <static_friction> 0.8 </static_friction>
        <dynamic_friction> 0.6 </dynamic_friction>
        <spring_coeff unit="N/M"> 1764288 </spring_coeff>
        <damping_coeff unit="N/M/SEC"> 58810 </damping_coeff>
        <damping_coeff_rebound unit="N/M/SEC"> 58810 </damping_coeff_rebound>
      </contact>
      <contact type="STRUCTURE" name="htail right rear">
        <location unit="M">
          <x> 18.3000 </x>
          <y> 3.1200 </y>
          <z> -0.4851 </z>
        </location>
        <static_friction> 0.8 </static_friction>
        <dynamic_friction> 0.6 </dynamic_friction>
        <spring_coeff unit="N/M"> 1764284 </spring_coeff>
        <damping_coeff unit="N/M/SEC"> 58809 </damping_coeff>
        <damping_coeff_rebound unit="N/M/SEC"> 58809 </damping_coeff_rebound>
      </contact>
    </ground_reactions>
    <propulsion>
      <engine file="ea18g_engine0">
        <location unit="M">
          <x> 15.1000 </x>
          <y> -0.5300 </y>
          <z> -0.4200 </z>
        </location>
        <feed>0</feed>
        <feed>1</feed>
        <feed>2</feed>
        <feed>3</feed>
        <feed>4</feed>
        <feed>5</feed>
        <thruster file="ea18g_nozzle0">
          <location unit="M">
            <x> 17.4500 </x>
            <y> -0.5300 </y>
            <z> -0.4500 </z>
          </location>
          <orient unit="DEG"> <roll>0.00</roll> <pitch>0.00</pitch> <yaw>0.00</yaw> </orient>

        </thruster>
      </engine>
      <engine file="ea18g_engine0">
        <location unit="M">
          <x> 15.1000 </x>
          <y> 0.5300 </y>
          <z> -0.4200 </z>
        </location>
        <feed>0</feed>
        <feed>1</feed>
        <feed>2</feed>
        <feed>3</feed>
        <feed>4</feed>
        <feed>5</feed>
        <thruster file="ea18g_nozzle0">
          <location unit="M">
            <x> 17.4500 </x>
            <y> 0.5300 </y>
            <z> -0.4500 </z>
          </location>
          <orient unit="DEG"> <roll>0.00</roll> <pitch>0.00</pitch> <yaw>0.00</yaw> </orient>

        </thruster>
      </engine>
      <tank type="FUEL">
        <location unit="M">
          <x> 7.9000 </x>
          <y> 0.0000 </y>
          <z> 0.1000 </z>
        </location>
        <capacity unit="KG"> 700.00 </capacity>
        <contents unit="KG"> 700.00 </contents>
      </tank>
      <tank type="FUEL">
        <location unit="M">
          <x> 9.2000 </x>
          <y> 0.0000 </y>
          <z> 0.0500 </z>
        </location>
        <capacity unit="KG"> 1300.00 </capacity>
        <contents unit="KG"> 1300.00 </contents>
      </tank>
      <tank type="FUEL">
        <location unit="M">
          <x> 10.6000 </x>
          <y> 0.0000 </y>
          <z> 0.0000 </z>
        </location>
        <capacity unit="KG"> 1300.00 </capacity>
        <contents unit="KG"> 1300.00 </contents>
      </tank>
      <tank type="FUEL">
        <location unit="M">
          <x> 12.1000 </x>
          <y> 0.0000 </y>
          <z> -0.0500 </z>
        </location>
        <capacity unit="KG"> 1100.00 </capacity>
        <contents unit="KG"> 1100.00 </contents>
      </tank>
      <tank type="FUEL">
        <location unit="M">
          <x> 11.2000 </x>
          <y> -2.6000 </y>
          <z> -0.0300 </z>
        </location>
        <capacity unit="KG"> 961.50 </capacity>
        <contents unit="KG"> 961.50 </contents>
      </tank>
      <tank type="FUEL">
        <location unit="M">
          <x> 11.2000 </x>
          <y> 2.6000 </y>
          <z> -0.0300 </z>
        </location>
        <capacity unit="KG"> 961.50 </capacity>
        <contents unit="KG"> 961.50 </contents>
      </tank>
    </propulsion>
    <flight_control name="ea18g">
      <!-- the aircraft's profile for the platform (docs/control-architecture.md, section 7): what
           hangar knows of it - its design, its flight tests, its identified responses -->
      <property value="1">fsim/identity/version</property>
      <property value="1">fsim/identity/provenance</property>
      <property value="2">fsim/identity/class</property>
      <property value="2">fsim/identity/family</property>
      <property value="1">fsim/effectors/version</property>
      <property value="1">fsim/effectors/provenance</property>
      <property value="1">fsim/effectors/flaps</property>
      <property value="8">fsim/effectors/flaps_transit_s</property>
      <property value="1">fsim/effectors/neutral</property>
      <property value="1">fsim/effectors/pitch</property>
      <property value="0.0">fsim/effectors/pitch_trim</property>
      <property value="1">fsim/effectors/retractable_gear</property>
      <property value="1">fsim/effectors/roll</property>
      <property value="1">fsim/effectors/speedbrake</property>
      <property value="1">fsim/effectors/speedbrake_approach</property>
      <property value="1">fsim/effectors/wheel_brakes</property>
      <property value="0.0">fsim/effectors/yaw</property>
      <property value="1">fsim/envelope/version</property>
      <property value="1">fsim/envelope/provenance</property>
      <property value="35">fsim/envelope/clean/alpha_max_deg</property>
      <property value="63.7835">fsim/envelope/clean/cas_min_ms</property>
      <property value="7.5">fsim/envelope/clean/n_max</property>
      <property value="-3">fsim/envelope/clean/n_min</property>
      <property value="180">fsim/envelope/clean/roll_rate_max_deg_s</property>
      <property value="15.43">fsim/envelope/crosswind_max_ms</property>
      <property value="128.61">fsim/envelope/flaps/cas_max_ms</property>
      <property value="0.05">fsim/envelope/flaps_threshold</property>
      <property value="128.61">fsim/envelope/gear_cas_max_ms</property>
      <property value="14.86">fsim/envelope/ground_pitch_max_deg</property>
      <property value="4.78">fsim/envelope/ground_turn_radius_m</property>
      <property value="0.0543">fsim/envelope/ground_yaw_accel_rad_s2</property>
      <property value="1">fsim/envelope/law_alpha</property>
      <property value="1">fsim/envelope/law_load_factor</property>
      <property value="1">fsim/envelope/law_roll_rate</property>
      <property value="1">fsim/propulsion/version</property>
      <property value="1">fsim/propulsion/provenance</property>
      <property value="1">fsim/propulsion/afterburner</property>
      <property value="2">fsim/propulsion/engines</property>
      <property value="0.15887">fsim/propulsion/spool_s</property>
      <property value="2">fsim/propulsion/type</property>
      <property value="1">fsim/plant/version</property>
      <property value="1">fsim/plant/provenance</property>
      <property value="-0.210075">fsim/plant/alpha_zero_lift_deg</property>
      <property value="3000">fsim/plant/altitude_m</property>
      <property value="152.412">fsim/plant/eas_ms</property>
      <property value="0.0">fsim/plant/elevator_trim</property>
      <property value="0.0">fsim/plant/elevator_trim_lift</property>
      <property value="7.57288">fsim/plant/pitch/gain</property>
      <property value="0.711822">fsim/plant/pitch/tau_s</property>
      <property value="2.87589">fsim/plant/roll/gain</property>
      <property value="0.19887">fsim/plant/roll/tau_s</property>
      <property value="5.5184">fsim/plant/speed/gain</property>
      <property value="0.15887">fsim/plant/speed/tau_s</property>
      <property value="174.401">fsim/plant/tas_ms</property>
      <property value="0.335042">fsim/plant/throttle_trim</property>
      <property value="0.139933">fsim/plant/yaw/gain</property>
      <property value="1">fsim/performance/version</property>
      <property value="1">fsim/performance/provenance</property>
      <property value="17435.6">fsim/performance/ceiling_m</property>
      <property value="225.903">fsim/performance/climb_ms</property>
      <property value="378.616">fsim/performance/max_tas_ms</property>
      <property value="1">fsim/applicability/version</property>
      <property value="1">fsim/applicability/provenance</property>
      <property value="1">fsim/applicability/aerobatic</property>
      <property value="2">fsim/applicability/carrier</property>
      <property value="3">fsim/applicability/drag_devices</property>
      <property value="1">fsim/applicability/flaps</property>
      <property value="1">fsim/applicability/ground_contact</property>
      <property value="2">fsim/applicability/releasable_stores</property>
      <property value="1">fsim/applicability/retractable_gear</property>
      <property value="0.0">fsim/applicability/vertical_flight</property>
      <property value="1">fsim/tables/version</property>
      <property value="1">fsim/tables/provenance</property>
      <property value="100">fsim/tables/altitude_m/h0</property>
      <property value="3490">fsim/tables/altitude_m/h1</property>
      <property value="6970">fsim/tables/altitude_m/h2</property>
      <property value="10460">fsim/tables/altitude_m/h3</property>
      <property value="12192">fsim/tables/altitude_m/h4</property>
      <property value="13080">fsim/tables/altitude_m/h5</property>
      <property value="14820">fsim/tables/altitude_m/h6</property>
      <property value="16560">fsim/tables/altitude_m/h7</property>
      <property value="0.603413">fsim/tables/best_endurance_fuel_kg_s/h0/w0</property>
      <property value="0.652919">fsim/tables/best_endurance_fuel_kg_s/h0/w1</property>
      <property value="0.767505">fsim/tables/best_endurance_fuel_kg_s/h0/w2</property>
      <property value="0.513287">fsim/tables/best_endurance_fuel_kg_s/h1/w0</property>
      <property value="0.578447">fsim/tables/best_endurance_fuel_kg_s/h1/w1</property>
      <property value="0.645087">fsim/tables/best_endurance_fuel_kg_s/h1/w2</property>
      <property value="0.449784">fsim/tables/best_endurance_fuel_kg_s/h2/w0</property>
      <property value="0.504005">fsim/tables/best_endurance_fuel_kg_s/h2/w1</property>
      <property value="0.557186">fsim/tables/best_endurance_fuel_kg_s/h2/w2</property>
      <property value="0.387871">fsim/tables/best_endurance_fuel_kg_s/h3/w0</property>
      <property value="0.439813">fsim/tables/best_endurance_fuel_kg_s/h3/w1</property>
      <property value="0.487614">fsim/tables/best_endurance_fuel_kg_s/h3/w2</property>
      <property value="0.36927">fsim/tables/best_endurance_fuel_kg_s/h4/w0</property>
      <property value="0.428514">fsim/tables/best_endurance_fuel_kg_s/h4/w1</property>
      <property value="0.479719">fsim/tables/best_endurance_fuel_kg_s/h4/w2</property>
      <property value="0.368287">fsim/tables/best_endurance_fuel_kg_s/h5/w0</property>
      <property value="0.435299">fsim/tables/best_endurance_fuel_kg_s/h5/w1</property>
      <property value="0.370877">fsim/tables/best_endurance_fuel_kg_s/h5/w2</property>
      <property value="0.381502">fsim/tables/best_endurance_fuel_kg_s/h6/w0</property>
      <property value="1.13881">fsim/tables/best_endurance_fuel_kg_s/h6/w1</property>
      <property value="1.4916">fsim/tables/best_endurance_fuel_kg_s/h6/w2</property>
      <property value="1.10412">fsim/tables/best_endurance_fuel_kg_s/h7/w0</property>
      <property value="1.42044">fsim/tables/best_endurance_fuel_kg_s/h7/w1</property>
      <property value="1.75495">fsim/tables/best_endurance_fuel_kg_s/h7/w2</property>
      <property value="150.279">fsim/tables/best_endurance_tas_ms/h0/w0</property>
      <property value="141.428">fsim/tables/best_endurance_tas_ms/h0/w1</property>
      <property value="181.58">fsim/tables/best_endurance_tas_ms/h0/w2</property>
      <property value="152.182">fsim/tables/best_endurance_tas_ms/h1/w0</property>
      <property value="164.585">fsim/tables/best_endurance_tas_ms/h1/w1</property>
      <property value="189.709">fsim/tables/best_endurance_tas_ms/h1/w2</property>
      <property value="183.848">fsim/tables/best_endurance_tas_ms/h2/w0</property>
      <property value="198.014">fsim/tables/best_endurance_tas_ms/h2/w1</property>
      <property value="210.889">fsim/tables/best_endurance_tas_ms/h2/w2</property>
      <property value="218.173">fsim/tables/best_endurance_tas_ms/h3/w0</property>
      <property value="230.396">fsim/tables/best_endurance_tas_ms/h3/w1</property>
      <property value="232.013">fsim/tables/best_endurance_tas_ms/h3/w2</property>
      <property value="229.82">fsim/tables/best_endurance_tas_ms/h4/w0</property>
      <property value="238.214">fsim/tables/best_endurance_tas_ms/h4/w1</property>
      <property value="242.189">fsim/tables/best_endurance_tas_ms/h4/w2</property>
      <property value="233.633">fsim/tables/best_endurance_tas_ms/h5/w0</property>
      <property value="240.524">fsim/tables/best_endurance_tas_ms/h5/w1</property>
      <property value="246.201">fsim/tables/best_endurance_tas_ms/h5/w2</property>
      <property value="244.976">fsim/tables/best_endurance_tas_ms/h6/w0</property>
      <property value="253.683">fsim/tables/best_endurance_tas_ms/h6/w1</property>
      <property value="255.123">fsim/tables/best_endurance_tas_ms/h6/w2</property>
      <property value="254.262">fsim/tables/best_endurance_tas_ms/h7/w0</property>
      <property value="258.487">fsim/tables/best_endurance_tas_ms/h7/w1</property>
      <property value="253.784">fsim/tables/best_endurance_tas_ms/h7/w2</property>
      <property value="0.729047">fsim/tables/best_range_fuel_kg_s/h0/w0</property>
      <property value="0.816694">fsim/tables/best_range_fuel_kg_s/h0/w1</property>
      <property value="0.90095">fsim/tables/best_range_fuel_kg_s/h0/w2</property>
      <property value="0.639016">fsim/tables/best_range_fuel_kg_s/h1/w0</property>
      <property value="0.703644">fsim/tables/best_range_fuel_kg_s/h1/w1</property>
      <property value="0.77818">fsim/tables/best_range_fuel_kg_s/h1/w2</property>
      <property value="0.506135">fsim/tables/best_range_fuel_kg_s/h2/w0</property>
      <property value="0.550722">fsim/tables/best_range_fuel_kg_s/h2/w1</property>
      <property value="0.582914">fsim/tables/best_range_fuel_kg_s/h2/w2</property>
      <property value="0.401955">fsim/tables/best_range_fuel_kg_s/h3/w0</property>
      <property value="0.444515">fsim/tables/best_range_fuel_kg_s/h3/w1</property>
      <property value="0.512513">fsim/tables/best_range_fuel_kg_s/h3/w2</property>
      <property value="0.382516">fsim/tables/best_range_fuel_kg_s/h4/w0</property>
      <property value="0.435975">fsim/tables/best_range_fuel_kg_s/h4/w1</property>
      <property value="0.488759">fsim/tables/best_range_fuel_kg_s/h4/w2</property>
      <property value="0.385796">fsim/tables/best_range_fuel_kg_s/h5/w0</property>
      <property value="0.449257">fsim/tables/best_range_fuel_kg_s/h5/w1</property>
      <property value="0.516358">fsim/tables/best_range_fuel_kg_s/h5/w2</property>
      <property value="0.389814">fsim/tables/best_range_fuel_kg_s/h6/w0</property>
      <property value="1.15727">fsim/tables/best_range_fuel_kg_s/h6/w1</property>
      <property value="1.53009">fsim/tables/best_range_fuel_kg_s/h6/w2</property>
      <property value="1.13127">fsim/tables/best_range_fuel_kg_s/h7/w0</property>
      <property value="1.45631">fsim/tables/best_range_fuel_kg_s/h7/w1</property>
      <property value="1.78563">fsim/tables/best_range_fuel_kg_s/h7/w2</property>
      <property value="192.647">fsim/tables/best_range_tas_ms/h0/w0</property>
      <property value="206.875">fsim/tables/best_range_tas_ms/h0/w1</property>
      <property value="221.037">fsim/tables/best_range_tas_ms/h0/w2</property>
      <property value="225.323">fsim/tables/best_range_tas_ms/h1/w0</property>
      <property value="237.987">fsim/tables/best_range_tas_ms/h1/w1</property>
      <property value="252.581">fsim/tables/best_range_tas_ms/h1/w2</property>
      <property value="240.172">fsim/tables/best_range_tas_ms/h2/w0</property>
      <property value="246.351">fsim/tables/best_range_tas_ms/h2/w1</property>
      <property value="246.421">fsim/tables/best_range_tas_ms/h2/w2</property>
      <property value="240.716">fsim/tables/best_range_tas_ms/h3/w0</property>
      <property value="242.645">fsim/tables/best_range_tas_ms/h3/w1</property>
      <property value="246.582">fsim/tables/best_range_tas_ms/h3/w2</property>
      <property value="245.794">fsim/tables/best_range_tas_ms/h4/w0</property>
      <property value="248.3">fsim/tables/best_range_tas_ms/h4/w1</property>
      <property value="250.244">fsim/tables/best_range_tas_ms/h4/w2</property>
      <property value="248.709">fsim/tables/best_range_tas_ms/h5/w0</property>
      <property value="252.308">fsim/tables/best_range_tas_ms/h5/w1</property>
      <property value="248.706">fsim/tables/best_range_tas_ms/h5/w2</property>
      <property value="251.367">fsim/tables/best_range_tas_ms/h6/w0</property>
      <property value="257.94">fsim/tables/best_range_tas_ms/h6/w1</property>
      <property value="263.588">fsim/tables/best_range_tas_ms/h6/w2</property>
      <property value="262.721">fsim/tables/best_range_tas_ms/h7/w0</property>
      <property value="268.705">fsim/tables/best_range_tas_ms/h7/w1</property>
      <property value="273.136">fsim/tables/best_range_tas_ms/h7/w2</property>
      <property value="279.896">fsim/tables/climb_tas_ms/h0/w0</property>
      <property value="283.59">fsim/tables/climb_tas_ms/h0/w1</property>
      <property value="285.006">fsim/tables/climb_tas_ms/h0/w2</property>
      <property value="276.417">fsim/tables/climb_tas_ms/h1/w0</property>
      <property value="278.188">fsim/tables/climb_tas_ms/h1/w1</property>
      <property value="278.065">fsim/tables/climb_tas_ms/h1/w2</property>
      <property value="270.846">fsim/tables/climb_tas_ms/h2/w0</property>
      <property value="269.371">fsim/tables/climb_tas_ms/h2/w1</property>
      <property value="270.461">fsim/tables/climb_tas_ms/h2/w2</property>
      <property value="260.922">fsim/tables/climb_tas_ms/h3/w0</property>
      <property value="261.624">fsim/tables/climb_tas_ms/h3/w1</property>
      <property value="262.977">fsim/tables/climb_tas_ms/h3/w2</property>
      <property value="261.185">fsim/tables/climb_tas_ms/h4/w0</property>
      <property value="262.573">fsim/tables/climb_tas_ms/h4/w1</property>
      <property value="262.864">fsim/tables/climb_tas_ms/h4/w2</property>
      <property value="261.455">fsim/tables/climb_tas_ms/h5/w0</property>
      <property value="262.94">fsim/tables/climb_tas_ms/h5/w1</property>
      <property value="263.985">fsim/tables/climb_tas_ms/h5/w2</property>
      <property value="264.277">fsim/tables/climb_tas_ms/h6/w0</property>
      <property value="265.179">fsim/tables/climb_tas_ms/h6/w1</property>
      <property value="259.826">fsim/tables/climb_tas_ms/h6/w2</property>
      <property value="265.691">fsim/tables/climb_tas_ms/h7/w0</property>
      <property value="271.961">fsim/tables/climb_tas_ms/h7/w1</property>
      <property value="283.21">fsim/tables/climb_tas_ms/h7/w2</property>
      <property value="6323">fsim/tables/fuel_capacity_kg</property>
      <property value="0.603385">fsim/tables/fuel_kg_s/h0/w0/v0</property>
      <property value="0.637667">fsim/tables/fuel_kg_s/h0/w0/v1</property>
      <property value="1.49887">fsim/tables/fuel_kg_s/h0/w0/v10</property>
      <property value="2.04284">fsim/tables/fuel_kg_s/h0/w0/v11</property>
      <property value="2.91553">fsim/tables/fuel_kg_s/h0/w0/v12</property>
      <property value="9.09584">fsim/tables/fuel_kg_s/h0/w0/v13</property>
      <property value="10.881">fsim/tables/fuel_kg_s/h0/w0/v14</property>
      <property value="12.0221">fsim/tables/fuel_kg_s/h0/w0/v15</property>
      <property value="0.683524">fsim/tables/fuel_kg_s/h0/w0/v2</property>
      <property value="0.73291">fsim/tables/fuel_kg_s/h0/w0/v3</property>
      <property value="0.796514">fsim/tables/fuel_kg_s/h0/w0/v4</property>
      <property value="0.862999">fsim/tables/fuel_kg_s/h0/w0/v5</property>
      <property value="0.932062">fsim/tables/fuel_kg_s/h0/w0/v6</property>
      <property value="1.01006">fsim/tables/fuel_kg_s/h0/w0/v7</property>
      <property value="1.09291">fsim/tables/fuel_kg_s/h0/w0/v8</property>
      <property value="1.21987">fsim/tables/fuel_kg_s/h0/w0/v9</property>
      <property value="0.652905">fsim/tables/fuel_kg_s/h0/w1/v0</property>
      <property value="0.668443">fsim/tables/fuel_kg_s/h0/w1/v1</property>
      <property value="1.41205">fsim/tables/fuel_kg_s/h0/w1/v10</property>
      <property value="1.91359">fsim/tables/fuel_kg_s/h0/w1/v11</property>
      <property value="2.79343">fsim/tables/fuel_kg_s/h0/w1/v12</property>
      <property value="8.85643">fsim/tables/fuel_kg_s/h0/w1/v13</property>
      <property value="10.7949">fsim/tables/fuel_kg_s/h0/w1/v14</property>
      <property value="12.0231">fsim/tables/fuel_kg_s/h0/w1/v15</property>
      <property value="0.697148">fsim/tables/fuel_kg_s/h0/w1/v2</property>
      <property value="0.744885">fsim/tables/fuel_kg_s/h0/w1/v3</property>
      <property value="0.79574">fsim/tables/fuel_kg_s/h0/w1/v4</property>
      <property value="0.857082">fsim/tables/fuel_kg_s/h0/w1/v5</property>
      <property value="0.926998">fsim/tables/fuel_kg_s/h0/w1/v6</property>
      <property value="1.00373">fsim/tables/fuel_kg_s/h0/w1/v7</property>
      <property value="1.08692">fsim/tables/fuel_kg_s/h0/w1/v8</property>
      <property value="1.19318">fsim/tables/fuel_kg_s/h0/w1/v9</property>
      <property value="0.767488">fsim/tables/fuel_kg_s/h0/w2/v0</property>
      <property value="0.805361">fsim/tables/fuel_kg_s/h0/w2/v1</property>
      <property value="1.83232">fsim/tables/fuel_kg_s/h0/w2/v10</property>
      <property value="2.51066">fsim/tables/fuel_kg_s/h0/w2/v11</property>
      <property value="3.33505">fsim/tables/fuel_kg_s/h0/w2/v12</property>
      <property value="9.62435">fsim/tables/fuel_kg_s/h0/w2/v13</property>
      <property value="11.1087">fsim/tables/fuel_kg_s/h0/w2/v14</property>
      <property value="12.0218">fsim/tables/fuel_kg_s/h0/w2/v15</property>
      <property value="0.847103">fsim/tables/fuel_kg_s/h0/w2/v2</property>
      <property value="0.890838">fsim/tables/fuel_kg_s/h0/w2/v3</property>
      <property value="0.944641">fsim/tables/fuel_kg_s/h0/w2/v4</property>
      <property value="1.00579">fsim/tables/fuel_kg_s/h0/w2/v5</property>
      <property value="1.07242">fsim/tables/fuel_kg_s/h0/w2/v6</property>
      <property value="1.14175">fsim/tables/fuel_kg_s/h0/w2/v7</property>
      <property value="1.24618">fsim/tables/fuel_kg_s/h0/w2/v8</property>
      <property value="1.44789">fsim/tables/fuel_kg_s/h0/w2/v9</property>
      <property value="0.516138">fsim/tables/fuel_kg_s/h1/w0/v0</property>
      <property value="0.515465">fsim/tables/fuel_kg_s/h1/w0/v1</property>
      <property value="2.03057">fsim/tables/fuel_kg_s/h1/w0/v10</property>
      <property value="6.62046">fsim/tables/fuel_kg_s/h1/w0/v11</property>
      <property value="7.79041">fsim/tables/fuel_kg_s/h1/w0/v12</property>
      <property value="8.54226">fsim/tables/fuel_kg_s/h1/w0/v13</property>
      <property value="9.33484">fsim/tables/fuel_kg_s/h1/w0/v14</property>
      <property value="10.111">fsim/tables/fuel_kg_s/h1/w0/v15</property>
      <property value="0.534816">fsim/tables/fuel_kg_s/h1/w0/v2</property>
      <property value="0.56477">fsim/tables/fuel_kg_s/h1/w0/v3</property>
      <property value="0.604067">fsim/tables/fuel_kg_s/h1/w0/v4</property>
      <property value="0.648888">fsim/tables/fuel_kg_s/h1/w0/v5</property>
      <property value="0.709656">fsim/tables/fuel_kg_s/h1/w0/v6</property>
      <property value="0.779548">fsim/tables/fuel_kg_s/h1/w0/v7</property>
      <property value="0.93275">fsim/tables/fuel_kg_s/h1/w0/v8</property>
      <property value="1.34133">fsim/tables/fuel_kg_s/h1/w0/v9</property>
      <property value="0.616891">fsim/tables/fuel_kg_s/h1/w1/v0</property>
      <property value="0.584164">fsim/tables/fuel_kg_s/h1/w1/v1</property>
      <property value="1.87278">fsim/tables/fuel_kg_s/h1/w1/v10</property>
      <property value="6.37138">fsim/tables/fuel_kg_s/h1/w1/v11</property>
      <property value="7.69">fsim/tables/fuel_kg_s/h1/w1/v12</property>
      <property value="8.47607">fsim/tables/fuel_kg_s/h1/w1/v13</property>
      <property value="9.29355">fsim/tables/fuel_kg_s/h1/w1/v14</property>
      <property value="10.1011">fsim/tables/fuel_kg_s/h1/w1/v15</property>
      <property value="0.579121">fsim/tables/fuel_kg_s/h1/w1/v2</property>
      <property value="0.594711">fsim/tables/fuel_kg_s/h1/w1/v3</property>
      <property value="0.621794">fsim/tables/fuel_kg_s/h1/w1/v4</property>
      <property value="0.662702">fsim/tables/fuel_kg_s/h1/w1/v5</property>
      <property value="0.70954">fsim/tables/fuel_kg_s/h1/w1/v6</property>
      <property value="0.773083">fsim/tables/fuel_kg_s/h1/w1/v7</property>
      <property value="0.878362">fsim/tables/fuel_kg_s/h1/w1/v8</property>
      <property value="1.20933">fsim/tables/fuel_kg_s/h1/w1/v9</property>
      <property value="0.645082">fsim/tables/fuel_kg_s/h1/w2/v0</property>
      <property value="0.662611">fsim/tables/fuel_kg_s/h1/w2/v1</property>
      <property value="6.41778">fsim/tables/fuel_kg_s/h1/w2/v10</property>
      <property value="7.56053">fsim/tables/fuel_kg_s/h1/w2/v11</property>
      <property value="8.17558">fsim/tables/fuel_kg_s/h1/w2/v12</property>
      <property value="8.80604">fsim/tables/fuel_kg_s/h1/w2/v13</property>
      <property value="9.45565">fsim/tables/fuel_kg_s/h1/w2/v14</property>
      <property value="10.0884">fsim/tables/fuel_kg_s/h1/w2/v15</property>
      <property value="0.684969">fsim/tables/fuel_kg_s/h1/w2/v2</property>
      <property value="0.718236">fsim/tables/fuel_kg_s/h1/w2/v3</property>
      <property value="0.756493">fsim/tables/fuel_kg_s/h1/w2/v4</property>
      <property value="0.799171">fsim/tables/fuel_kg_s/h1/w2/v5</property>
      <property value="0.882355">fsim/tables/fuel_kg_s/h1/w2/v6</property>
      <property value="1.09917">fsim/tables/fuel_kg_s/h1/w2/v7</property>
      <property value="1.49358">fsim/tables/fuel_kg_s/h1/w2/v8</property>
      <property value="2.05997">fsim/tables/fuel_kg_s/h1/w2/v9</property>
      <property value="0.494754">fsim/tables/fuel_kg_s/h2/w0/v0</property>
      <property value="0.458788">fsim/tables/fuel_kg_s/h2/w0/v1</property>
      <property value="5.40745">fsim/tables/fuel_kg_s/h2/w0/v10</property>
      <property value="6.02752">fsim/tables/fuel_kg_s/h2/w0/v11</property>
      <property value="6.62066">fsim/tables/fuel_kg_s/h2/w0/v12</property>
      <property value="7.21624">fsim/tables/fuel_kg_s/h2/w0/v13</property>
      <property value="7.83262">fsim/tables/fuel_kg_s/h2/w0/v14</property>
      <property value="8.49648">fsim/tables/fuel_kg_s/h2/w0/v15</property>
      <property value="0.449784">fsim/tables/fuel_kg_s/h2/w0/v2</property>
      <property value="0.458997">fsim/tables/fuel_kg_s/h2/w0/v3</property>
      <property value="0.480466">fsim/tables/fuel_kg_s/h2/w0/v4</property>
      <property value="0.516237">fsim/tables/fuel_kg_s/h2/w0/v5</property>
      <property value="0.593526">fsim/tables/fuel_kg_s/h2/w0/v6</property>
      <property value="0.912011">fsim/tables/fuel_kg_s/h2/w0/v7</property>
      <property value="1.45423">fsim/tables/fuel_kg_s/h2/w0/v8</property>
      <property value="4.80534">fsim/tables/fuel_kg_s/h2/w0/v9</property>
      <property value="0.594128">fsim/tables/fuel_kg_s/h2/w1/v0</property>
      <property value="0.534601">fsim/tables/fuel_kg_s/h2/w1/v1</property>
      <property value="5.38588">fsim/tables/fuel_kg_s/h2/w1/v10</property>
      <property value="5.9911">fsim/tables/fuel_kg_s/h2/w1/v11</property>
      <property value="6.58428">fsim/tables/fuel_kg_s/h2/w1/v12</property>
      <property value="7.16764">fsim/tables/fuel_kg_s/h2/w1/v13</property>
      <property value="7.77048">fsim/tables/fuel_kg_s/h2/w1/v14</property>
      <property value="8.40706">fsim/tables/fuel_kg_s/h2/w1/v15</property>
      <property value="0.508536">fsim/tables/fuel_kg_s/h2/w1/v2</property>
      <property value="0.50475">fsim/tables/fuel_kg_s/h2/w1/v3</property>
      <property value="0.518861">fsim/tables/fuel_kg_s/h2/w1/v4</property>
      <property value="0.545337">fsim/tables/fuel_kg_s/h2/w1/v5</property>
      <property value="0.606085">fsim/tables/fuel_kg_s/h2/w1/v6</property>
      <property value="0.882834">fsim/tables/fuel_kg_s/h2/w1/v7</property>
      <property value="1.39759">fsim/tables/fuel_kg_s/h2/w1/v8</property>
      <property value="4.71515">fsim/tables/fuel_kg_s/h2/w1/v9</property>
      <property value="0.74489">fsim/tables/fuel_kg_s/h2/w2/v1</property>
      <property value="5.09831">fsim/tables/fuel_kg_s/h2/w2/v10</property>
      <property value="5.75632">fsim/tables/fuel_kg_s/h2/w2/v11</property>
      <property value="6.41706">fsim/tables/fuel_kg_s/h2/w2/v12</property>
      <property value="7.03835">fsim/tables/fuel_kg_s/h2/w2/v13</property>
      <property value="7.68369">fsim/tables/fuel_kg_s/h2/w2/v14</property>
      <property value="8.36073">fsim/tables/fuel_kg_s/h2/w2/v15</property>
      <property value="0.630771">fsim/tables/fuel_kg_s/h2/w2/v2</property>
      <property value="0.577082">fsim/tables/fuel_kg_s/h2/w2/v3</property>
      <property value="0.558605">fsim/tables/fuel_kg_s/h2/w2/v4</property>
      <property value="0.561503">fsim/tables/fuel_kg_s/h2/w2/v5</property>
      <property value="0.583229">fsim/tables/fuel_kg_s/h2/w2/v6</property>
      <property value="0.673278">fsim/tables/fuel_kg_s/h2/w2/v7</property>
      <property value="1.02726">fsim/tables/fuel_kg_s/h2/w2/v8</property>
      <property value="4.05159">fsim/tables/fuel_kg_s/h2/w2/v9</property>
      <property value="0.671835">fsim/tables/fuel_kg_s/h3/w0/v0</property>
      <property value="0.425275">fsim/tables/fuel_kg_s/h3/w0/v1</property>
      <property value="4.53812">fsim/tables/fuel_kg_s/h3/w0/v10</property>
      <property value="5.00325">fsim/tables/fuel_kg_s/h3/w0/v11</property>
      <property value="5.50533">fsim/tables/fuel_kg_s/h3/w0/v12</property>
      <property value="6.03028">fsim/tables/fuel_kg_s/h3/w0/v13</property>
      <property value="6.57456">fsim/tables/fuel_kg_s/h3/w0/v14</property>
      <property value="7.13803">fsim/tables/fuel_kg_s/h3/w0/v15</property>
      <property value="0.395652">fsim/tables/fuel_kg_s/h3/w0/v2</property>
      <property value="0.388577">fsim/tables/fuel_kg_s/h3/w0/v3</property>
      <property value="0.407852">fsim/tables/fuel_kg_s/h3/w0/v4</property>
      <property value="0.575616">fsim/tables/fuel_kg_s/h3/w0/v5</property>
      <property value="2.48157">fsim/tables/fuel_kg_s/h3/w0/v6</property>
      <property value="3.18804">fsim/tables/fuel_kg_s/h3/w0/v7</property>
      <property value="3.64825">fsim/tables/fuel_kg_s/h3/w0/v8</property>
      <property value="4.09546">fsim/tables/fuel_kg_s/h3/w0/v9</property>
      <property value="0.887057">fsim/tables/fuel_kg_s/h3/w1/v0</property>
      <property value="0.521067">fsim/tables/fuel_kg_s/h3/w1/v1</property>
      <property value="4.52887">fsim/tables/fuel_kg_s/h3/w1/v10</property>
      <property value="4.98087">fsim/tables/fuel_kg_s/h3/w1/v11</property>
      <property value="5.46788">fsim/tables/fuel_kg_s/h3/w1/v12</property>
      <property value="5.98109">fsim/tables/fuel_kg_s/h3/w1/v13</property>
      <property value="6.51483">fsim/tables/fuel_kg_s/h3/w1/v14</property>
      <property value="7.06624">fsim/tables/fuel_kg_s/h3/w1/v15</property>
      <property value="0.465861">fsim/tables/fuel_kg_s/h3/w1/v2</property>
      <property value="0.44187">fsim/tables/fuel_kg_s/h3/w1/v3</property>
      <property value="0.444806">fsim/tables/fuel_kg_s/h3/w1/v4</property>
      <property value="0.566385">fsim/tables/fuel_kg_s/h3/w1/v5</property>
      <property value="0.916243">fsim/tables/fuel_kg_s/h3/w1/v6</property>
      <property value="3.20999">fsim/tables/fuel_kg_s/h3/w1/v7</property>
      <property value="3.6667">fsim/tables/fuel_kg_s/h3/w1/v8</property>
      <property value="4.1022">fsim/tables/fuel_kg_s/h3/w1/v9</property>
      <property value="2.0773">fsim/tables/fuel_kg_s/h3/w2/v0</property>
      <property value="0.668828">fsim/tables/fuel_kg_s/h3/w2/v1</property>
      <property value="4.5166">fsim/tables/fuel_kg_s/h3/w2/v10</property>
      <property value="4.96485">fsim/tables/fuel_kg_s/h3/w2/v11</property>
      <property value="5.43898">fsim/tables/fuel_kg_s/h3/w2/v12</property>
      <property value="5.93763">fsim/tables/fuel_kg_s/h3/w2/v13</property>
      <property value="6.4605">fsim/tables/fuel_kg_s/h3/w2/v14</property>
      <property value="6.99408">fsim/tables/fuel_kg_s/h3/w2/v15</property>
      <property value="0.563042">fsim/tables/fuel_kg_s/h3/w2/v2</property>
      <property value="0.511751">fsim/tables/fuel_kg_s/h3/w2/v3</property>
      <property value="0.489972">fsim/tables/fuel_kg_s/h3/w2/v4</property>
      <property value="0.551372">fsim/tables/fuel_kg_s/h3/w2/v5</property>
      <property value="0.834136">fsim/tables/fuel_kg_s/h3/w2/v6</property>
      <property value="3.12398">fsim/tables/fuel_kg_s/h3/w2/v7</property>
      <property value="3.65481">fsim/tables/fuel_kg_s/h3/w2/v8</property>
      <property value="4.09597">fsim/tables/fuel_kg_s/h3/w2/v9</property>
      <property value="0.43281">fsim/tables/fuel_kg_s/h4/w0/v1</property>
      <property value="3.70128">fsim/tables/fuel_kg_s/h4/w0/v10</property>
      <property value="4.06079">fsim/tables/fuel_kg_s/h4/w0/v11</property>
      <property value="4.43905">fsim/tables/fuel_kg_s/h4/w0/v12</property>
      <property value="4.83707">fsim/tables/fuel_kg_s/h4/w0/v13</property>
      <property value="5.24993">fsim/tables/fuel_kg_s/h4/w0/v14</property>
      <property value="5.68311">fsim/tables/fuel_kg_s/h4/w0/v15</property>
      <property value="0.388601">fsim/tables/fuel_kg_s/h4/w0/v2</property>
      <property value="0.369274">fsim/tables/fuel_kg_s/h4/w0/v3</property>
      <property value="0.389588">fsim/tables/fuel_kg_s/h4/w0/v4</property>
      <property value="0.568852">fsim/tables/fuel_kg_s/h4/w0/v5</property>
      <property value="2.22529">fsim/tables/fuel_kg_s/h4/w0/v6</property>
      <property value="2.70312">fsim/tables/fuel_kg_s/h4/w0/v7</property>
      <property value="3.03769">fsim/tables/fuel_kg_s/h4/w0/v8</property>
      <property value="3.36225">fsim/tables/fuel_kg_s/h4/w0/v9</property>
      <property value="1.55572">fsim/tables/fuel_kg_s/h4/w1/v0</property>
      <property value="0.53498">fsim/tables/fuel_kg_s/h4/w1/v1</property>
      <property value="3.72617">fsim/tables/fuel_kg_s/h4/w1/v10</property>
      <property value="4.06887">fsim/tables/fuel_kg_s/h4/w1/v11</property>
      <property value="4.42643">fsim/tables/fuel_kg_s/h4/w1/v12</property>
      <property value="4.80393">fsim/tables/fuel_kg_s/h4/w1/v13</property>
      <property value="5.19354">fsim/tables/fuel_kg_s/h4/w1/v14</property>
      <property value="5.59317">fsim/tables/fuel_kg_s/h4/w1/v15</property>
      <property value="0.46665">fsim/tables/fuel_kg_s/h4/w1/v2</property>
      <property value="0.431096">fsim/tables/fuel_kg_s/h4/w1/v3</property>
      <property value="0.437284">fsim/tables/fuel_kg_s/h4/w1/v4</property>
      <property value="0.591214">fsim/tables/fuel_kg_s/h4/w1/v5</property>
      <property value="2.26425">fsim/tables/fuel_kg_s/h4/w1/v6</property>
      <property value="2.77227">fsim/tables/fuel_kg_s/h4/w1/v7</property>
      <property value="3.09117">fsim/tables/fuel_kg_s/h4/w1/v8</property>
      <property value="3.40511">fsim/tables/fuel_kg_s/h4/w1/v9</property>
      <property value="1.68772">fsim/tables/fuel_kg_s/h4/w2/v1</property>
      <property value="3.72771">fsim/tables/fuel_kg_s/h4/w2/v10</property>
      <property value="4.04613">fsim/tables/fuel_kg_s/h4/w2/v11</property>
      <property value="4.37982">fsim/tables/fuel_kg_s/h4/w2/v12</property>
      <property value="4.73255">fsim/tables/fuel_kg_s/h4/w2/v13</property>
      <property value="5.10486">fsim/tables/fuel_kg_s/h4/w2/v14</property>
      <property value="5.4802">fsim/tables/fuel_kg_s/h4/w2/v15</property>
      <property value="0.565287">fsim/tables/fuel_kg_s/h4/w2/v2</property>
      <property value="0.507065">fsim/tables/fuel_kg_s/h4/w2/v3</property>
      <property value="0.488595">fsim/tables/fuel_kg_s/h4/w2/v4</property>
      <property value="0.604936">fsim/tables/fuel_kg_s/h4/w2/v5</property>
      <property value="2.2542">fsim/tables/fuel_kg_s/h4/w2/v6</property>
      <property value="2.8178">fsim/tables/fuel_kg_s/h4/w2/v7</property>
      <property value="3.14213">fsim/tables/fuel_kg_s/h4/w2/v8</property>
      <property value="3.43417">fsim/tables/fuel_kg_s/h4/w2/v9</property>
      <property value="1.28445">fsim/tables/fuel_kg_s/h5/w0/v0</property>
      <property value="0.637885">fsim/tables/fuel_kg_s/h5/w0/v1</property>
      <property value="3.37038">fsim/tables/fuel_kg_s/h5/w0/v10</property>
      <property value="3.68625">fsim/tables/fuel_kg_s/h5/w0/v11</property>
      <property value="4.01846">fsim/tables/fuel_kg_s/h5/w0/v12</property>
      <property value="4.36759">fsim/tables/fuel_kg_s/h5/w0/v13</property>
      <property value="4.72226">fsim/tables/fuel_kg_s/h5/w0/v14</property>
      <property value="5.09213">fsim/tables/fuel_kg_s/h5/w0/v15</property>
      <property value="0.39207">fsim/tables/fuel_kg_s/h5/w0/v2</property>
      <property value="0.368407">fsim/tables/fuel_kg_s/h5/w0/v3</property>
      <property value="0.39934">fsim/tables/fuel_kg_s/h5/w0/v4</property>
      <property value="0.578872">fsim/tables/fuel_kg_s/h5/w0/v5</property>
      <property value="2.14294">fsim/tables/fuel_kg_s/h5/w0/v6</property>
      <property value="2.50202">fsim/tables/fuel_kg_s/h5/w0/v7</property>
      <property value="2.7931">fsim/tables/fuel_kg_s/h5/w0/v8</property>
      <property value="3.07167">fsim/tables/fuel_kg_s/h5/w0/v9</property>
      <property value="0.548371">fsim/tables/fuel_kg_s/h5/w1/v1</property>
      <property value="3.38202">fsim/tables/fuel_kg_s/h5/w1/v10</property>
      <property value="3.67192">fsim/tables/fuel_kg_s/h5/w1/v11</property>
      <property value="3.97334">fsim/tables/fuel_kg_s/h5/w1/v12</property>
      <property value="4.2937">fsim/tables/fuel_kg_s/h5/w1/v13</property>
      <property value="4.62425">fsim/tables/fuel_kg_s/h5/w1/v14</property>
      <property value="4.96283">fsim/tables/fuel_kg_s/h5/w1/v15</property>
      <property value="0.474242">fsim/tables/fuel_kg_s/h5/w1/v2</property>
      <property value="0.436101">fsim/tables/fuel_kg_s/h5/w1/v3</property>
      <property value="0.455101">fsim/tables/fuel_kg_s/h5/w1/v4</property>
      <property value="0.615488">fsim/tables/fuel_kg_s/h5/w1/v5</property>
      <property value="2.20408">fsim/tables/fuel_kg_s/h5/w1/v6</property>
      <property value="2.60454">fsim/tables/fuel_kg_s/h5/w1/v7</property>
      <property value="2.85844">fsim/tables/fuel_kg_s/h5/w1/v8</property>
      <property value="3.1126">fsim/tables/fuel_kg_s/h5/w1/v9</property>
      <property value="1.80302">fsim/tables/fuel_kg_s/h5/w2/v1</property>
      <property value="3.41846">fsim/tables/fuel_kg_s/h5/w2/v10</property>
      <property value="3.68728">fsim/tables/fuel_kg_s/h5/w2/v11</property>
      <property value="3.96369">fsim/tables/fuel_kg_s/h5/w2/v12</property>
      <property value="4.24917">fsim/tables/fuel_kg_s/h5/w2/v13</property>
      <property value="4.55295">fsim/tables/fuel_kg_s/h5/w2/v14</property>
      <property value="4.85118">fsim/tables/fuel_kg_s/h5/w2/v15</property>
      <property value="0.583174">fsim/tables/fuel_kg_s/h5/w2/v2</property>
      <property value="0.52047">fsim/tables/fuel_kg_s/h5/w2/v3</property>
      <property value="0.513877">fsim/tables/fuel_kg_s/h5/w2/v4</property>
      <property value="1.67875">fsim/tables/fuel_kg_s/h5/w2/v5</property>
      <property value="2.23881">fsim/tables/fuel_kg_s/h5/w2/v6</property>
      <property value="2.67893">fsim/tables/fuel_kg_s/h5/w2/v7</property>
      <property value="2.93246">fsim/tables/fuel_kg_s/h5/w2/v8</property>
      <property value="3.17231">fsim/tables/fuel_kg_s/h5/w2/v9</property>
      <property value="1.60407">fsim/tables/fuel_kg_s/h6/w0/v0</property>
      <property value="2.5884">fsim/tables/fuel_kg_s/h6/w0/v10</property>
      <property value="2.78738">fsim/tables/fuel_kg_s/h6/w0/v11</property>
      <property value="2.99172">fsim/tables/fuel_kg_s/h6/w0/v12</property>
      <property value="3.20241">fsim/tables/fuel_kg_s/h6/w0/v13</property>
      <property value="3.42624">fsim/tables/fuel_kg_s/h6/w0/v14</property>
      <property value="3.64847">fsim/tables/fuel_kg_s/h6/w0/v15</property>
      <property value="0.420226">fsim/tables/fuel_kg_s/h6/w0/v2</property>
      <property value="0.383186">fsim/tables/fuel_kg_s/h6/w0/v3</property>
      <property value="0.394796">fsim/tables/fuel_kg_s/h6/w0/v4</property>
      <property value="1.32629">fsim/tables/fuel_kg_s/h6/w0/v5</property>
      <property value="1.73359">fsim/tables/fuel_kg_s/h6/w0/v6</property>
      <property value="2.04615">fsim/tables/fuel_kg_s/h6/w0/v7</property>
      <property value="2.22823">fsim/tables/fuel_kg_s/h6/w0/v8</property>
      <property value="2.40579">fsim/tables/fuel_kg_s/h6/w0/v9</property>
      <property value="2.59931">fsim/tables/fuel_kg_s/h6/w1/v10</property>
      <property value="2.75578">fsim/tables/fuel_kg_s/h6/w1/v11</property>
      <property value="2.93048">fsim/tables/fuel_kg_s/h6/w1/v12</property>
      <property value="3.1119">fsim/tables/fuel_kg_s/h6/w1/v13</property>
      <property value="3.29384">fsim/tables/fuel_kg_s/h6/w1/v14</property>
      <property value="3.47939">fsim/tables/fuel_kg_s/h6/w1/v15</property>
      <property value="1.40676">fsim/tables/fuel_kg_s/h6/w1/v2</property>
      <property value="1.2668">fsim/tables/fuel_kg_s/h6/w1/v3</property>
      <property value="1.14619">fsim/tables/fuel_kg_s/h6/w1/v4</property>
      <property value="1.42006">fsim/tables/fuel_kg_s/h6/w1/v5</property>
      <property value="1.75999">fsim/tables/fuel_kg_s/h6/w1/v6</property>
      <property value="2.09761">fsim/tables/fuel_kg_s/h6/w1/v7</property>
      <property value="2.31426">fsim/tables/fuel_kg_s/h6/w1/v8</property>
      <property value="2.4542">fsim/tables/fuel_kg_s/h6/w1/v9</property>
      <property value="1.67915">fsim/tables/fuel_kg_s/h6/w2/v0</property>
      <property value="1.54536">fsim/tables/fuel_kg_s/h6/w2/v1</property>
      <property value="2.74965">fsim/tables/fuel_kg_s/h6/w2/v10</property>
      <property value="2.85528">fsim/tables/fuel_kg_s/h6/w2/v11</property>
      <property value="2.97011">fsim/tables/fuel_kg_s/h6/w2/v12</property>
      <property value="3.09439">fsim/tables/fuel_kg_s/h6/w2/v13</property>
      <property value="3.2181">fsim/tables/fuel_kg_s/h6/w2/v14</property>
      <property value="3.42878">fsim/tables/fuel_kg_s/h6/w2/v15</property>
      <property value="1.4917">fsim/tables/fuel_kg_s/h6/w2/v2</property>
      <property value="1.5546">fsim/tables/fuel_kg_s/h6/w2/v3</property>
      <property value="1.74545">fsim/tables/fuel_kg_s/h6/w2/v4</property>
      <property value="1.97506">fsim/tables/fuel_kg_s/h6/w2/v5</property>
      <property value="2.23339">fsim/tables/fuel_kg_s/h6/w2/v6</property>
      <property value="2.44103">fsim/tables/fuel_kg_s/h6/w2/v7</property>
      <property value="2.55519">fsim/tables/fuel_kg_s/h6/w2/v8</property>
      <property value="2.6485">fsim/tables/fuel_kg_s/h6/w2/v9</property>
      <property value="2.12263">fsim/tables/fuel_kg_s/h7/w0/v10</property>
      <property value="2.23555">fsim/tables/fuel_kg_s/h7/w0/v11</property>
      <property value="2.36112">fsim/tables/fuel_kg_s/h7/w0/v12</property>
      <property value="2.48718">fsim/tables/fuel_kg_s/h7/w0/v13</property>
      <property value="2.59545">fsim/tables/fuel_kg_s/h7/w0/v14</property>
      <property value="2.7602">fsim/tables/fuel_kg_s/h7/w0/v15</property>
      <property value="1.26195">fsim/tables/fuel_kg_s/h7/w0/v2</property>
      <property value="1.11485">fsim/tables/fuel_kg_s/h7/w0/v3</property>
      <property value="1.13367">fsim/tables/fuel_kg_s/h7/w0/v4</property>
      <property value="1.31644">fsim/tables/fuel_kg_s/h7/w0/v5</property>
      <property value="1.55418">fsim/tables/fuel_kg_s/h7/w0/v6</property>
      <property value="1.78671">fsim/tables/fuel_kg_s/h7/w0/v7</property>
      <property value="1.92125">fsim/tables/fuel_kg_s/h7/w0/v8</property>
      <property value="2.02015">fsim/tables/fuel_kg_s/h7/w0/v9</property>
      <property value="1.51486">fsim/tables/fuel_kg_s/h7/w1/v0</property>
      <property value="1.43793">fsim/tables/fuel_kg_s/h7/w1/v1</property>
      <property value="2.22869">fsim/tables/fuel_kg_s/h7/w1/v10</property>
      <property value="2.2759">fsim/tables/fuel_kg_s/h7/w1/v11</property>
      <property value="2.36694">fsim/tables/fuel_kg_s/h7/w1/v12</property>
      <property value="2.50288">fsim/tables/fuel_kg_s/h7/w1/v13</property>
      <property value="2.53423">fsim/tables/fuel_kg_s/h7/w1/v14</property>
      <property value="2.56479">fsim/tables/fuel_kg_s/h7/w1/v15</property>
      <property value="1.42272">fsim/tables/fuel_kg_s/h7/w1/v2</property>
      <property value="1.47244">fsim/tables/fuel_kg_s/h7/w1/v3</property>
      <property value="1.5782">fsim/tables/fuel_kg_s/h7/w1/v4</property>
      <property value="1.70881">fsim/tables/fuel_kg_s/h7/w1/v5</property>
      <property value="1.86935">fsim/tables/fuel_kg_s/h7/w1/v6</property>
      <property value="2.0225">fsim/tables/fuel_kg_s/h7/w1/v7</property>
      <property value="2.13413">fsim/tables/fuel_kg_s/h7/w1/v8</property>
      <property value="2.18078">fsim/tables/fuel_kg_s/h7/w1/v9</property>
      <property value="1.75495">fsim/tables/fuel_kg_s/h7/w2/v0</property>
      <property value="1.75868">fsim/tables/fuel_kg_s/h7/w2/v1</property>
      <property value="2.02743">fsim/tables/fuel_kg_s/h7/w2/v10</property>
      <property value="2.08518">fsim/tables/fuel_kg_s/h7/w2/v11</property>
      <property value="2.2848">fsim/tables/fuel_kg_s/h7/w2/v12</property>
      <property value="2.29308">fsim/tables/fuel_kg_s/h7/w2/v13</property>
      <property value="2.30157">fsim/tables/fuel_kg_s/h7/w2/v14</property>
      <property value="2.31014">fsim/tables/fuel_kg_s/h7/w2/v15</property>
      <property value="1.75507">fsim/tables/fuel_kg_s/h7/w2/v2</property>
      <property value="1.75563">fsim/tables/fuel_kg_s/h7/w2/v3</property>
      <property value="1.77408">fsim/tables/fuel_kg_s/h7/w2/v4</property>
      <property value="1.80525">fsim/tables/fuel_kg_s/h7/w2/v5</property>
      <property value="1.84052">fsim/tables/fuel_kg_s/h7/w2/v6</property>
      <property value="1.87634">fsim/tables/fuel_kg_s/h7/w2/v7</property>
      <property value="1.91663">fsim/tables/fuel_kg_s/h7/w2/v8</property>
      <property value="1.96654">fsim/tables/fuel_kg_s/h7/w2/v9</property>
      <property value="290.797">fsim/tables/max_climb_ms/h0/w0</property>
      <property value="250.231">fsim/tables/max_climb_ms/h0/w1</property>
      <property value="219.195">fsim/tables/max_climb_ms/h0/w2</property>
      <property value="230.636">fsim/tables/max_climb_ms/h1/w0</property>
      <property value="197.366">fsim/tables/max_climb_ms/h1/w1</property>
      <property value="172.081">fsim/tables/max_climb_ms/h1/w2</property>
      <property value="175.041">fsim/tables/max_climb_ms/h2/w0</property>
      <property value="149.03">fsim/tables/max_climb_ms/h2/w1</property>
      <property value="128.521">fsim/tables/max_climb_ms/h2/w2</property>
      <property value="125.023">fsim/tables/max_climb_ms/h3/w0</property>
      <property value="104.813">fsim/tables/max_climb_ms/h3/w1</property>
      <property value="89.0151">fsim/tables/max_climb_ms/h3/w2</property>
      <property value="94.0329">fsim/tables/max_climb_ms/h4/w0</property>
      <property value="77.3268">fsim/tables/max_climb_ms/h4/w1</property>
      <property value="64.1006">fsim/tables/max_climb_ms/h4/w2</property>
      <property value="81.0458">fsim/tables/max_climb_ms/h5/w0</property>
      <property value="65.5053">fsim/tables/max_climb_ms/h5/w1</property>
      <property value="53.2994">fsim/tables/max_climb_ms/h5/w2</property>
      <property value="53.6481">fsim/tables/max_climb_ms/h6/w0</property>
      <property value="40.6767">fsim/tables/max_climb_ms/h6/w1</property>
      <property value="31.3431">fsim/tables/max_climb_ms/h6/w2</property>
      <property value="31.7659">fsim/tables/max_climb_ms/h7/w0</property>
      <property value="21.4701">fsim/tables/max_climb_ms/h7/w1</property>
      <property value="10.9334">fsim/tables/max_climb_ms/h7/w2</property>
      <property value="379.186">fsim/tables/max_tas_ms/h0/w0</property>
      <property value="378.916">fsim/tables/max_tas_ms/h0/w1</property>
      <property value="378.588">fsim/tables/max_tas_ms/h0/w2</property>
      <property value="413.747">fsim/tables/max_tas_ms/h1/w0</property>
      <property value="412.533">fsim/tables/max_tas_ms/h1/w1</property>
      <property value="411.218">fsim/tables/max_tas_ms/h1/w2</property>
      <property value="466.785">fsim/tables/max_tas_ms/h2/w0</property>
      <property value="461.69">fsim/tables/max_tas_ms/h2/w1</property>
      <property value="457.684">fsim/tables/max_tas_ms/h2/w2</property>
      <property value="531.937">fsim/tables/max_tas_ms/h3/w0</property>
      <property value="524.91">fsim/tables/max_tas_ms/h3/w1</property>
      <property value="517.932">fsim/tables/max_tas_ms/h3/w2</property>
      <property value="534.567">fsim/tables/max_tas_ms/h4/w0</property>
      <property value="522.739">fsim/tables/max_tas_ms/h4/w1</property>
      <property value="508.469">fsim/tables/max_tas_ms/h4/w2</property>
      <property value="538.972">fsim/tables/max_tas_ms/h5/w0</property>
      <property value="521.584">fsim/tables/max_tas_ms/h5/w1</property>
      <property value="505.03">fsim/tables/max_tas_ms/h5/w2</property>
      <property value="503.068">fsim/tables/max_tas_ms/h6/w0</property>
      <property value="471.391">fsim/tables/max_tas_ms/h6/w1</property>
      <property value="437.904">fsim/tables/max_tas_ms/h6/w2</property>
      <property value="468.29">fsim/tables/max_tas_ms/h7/w0</property>
      <property value="415.203">fsim/tables/max_tas_ms/h7/w1</property>
      <property value="331.174">fsim/tables/max_tas_ms/h7/w2</property>
      <property value="150.279">fsim/tables/min_tas_ms/h0/w0</property>
      <property value="141.428">fsim/tables/min_tas_ms/h0/w1</property>
      <property value="181.58">fsim/tables/min_tas_ms/h0/w2</property>
      <property value="143.004">fsim/tables/min_tas_ms/h1/w0</property>
      <property value="133.595">fsim/tables/min_tas_ms/h1/w1</property>
      <property value="189.709">fsim/tables/min_tas_ms/h1/w2</property>
      <property value="142.619">fsim/tables/min_tas_ms/h2/w0</property>
      <property value="142.893">fsim/tables/min_tas_ms/h2/w1</property>
      <property value="115.252">fsim/tables/min_tas_ms/h2/w2</property>
      <property value="150.767">fsim/tables/min_tas_ms/h3/w0</property>
      <property value="148.969">fsim/tables/min_tas_ms/h3/w1</property>
      <property value="141.508">fsim/tables/min_tas_ms/h3/w2</property>
      <property value="158.018">fsim/tables/min_tas_ms/h4/w0</property>
      <property value="160.859">fsim/tables/min_tas_ms/h4/w1</property>
      <property value="161.851">fsim/tables/min_tas_ms/h4/w2</property>
      <property value="163.34">fsim/tables/min_tas_ms/h5/w0</property>
      <property value="169.486">fsim/tables/min_tas_ms/h5/w1</property>
      <property value="171.899">fsim/tables/min_tas_ms/h5/w2</property>
      <property value="177.451">fsim/tables/min_tas_ms/h6/w0</property>
      <property value="184.457">fsim/tables/min_tas_ms/h6/w1</property>
      <property value="229.584">fsim/tables/min_tas_ms/h6/w2</property>
      <property value="195.97">fsim/tables/min_tas_ms/h7/w0</property>
      <property value="239.602">fsim/tables/min_tas_ms/h7/w1</property>
      <property value="253.363">fsim/tables/min_tas_ms/h7/w2</property>
      <property value="165.287">fsim/tables/ps_full_ms/h0/w0/v0</property>
      <property value="180.718">fsim/tables/ps_full_ms/h0/w0/v1</property>
      <property value="284.344">fsim/tables/ps_full_ms/h0/w0/v10</property>
      <property value="257.387">fsim/tables/ps_full_ms/h0/w0/v11</property>
      <property value="203.442">fsim/tables/ps_full_ms/h0/w0/v12</property>
      <property value="126.895">fsim/tables/ps_full_ms/h0/w0/v13</property>
      <property value="61.6085">fsim/tables/ps_full_ms/h0/w0/v14</property>
      <property value="24.1136">fsim/tables/ps_full_ms/h0/w0/v15</property>
      <property value="196.395">fsim/tables/ps_full_ms/h0/w0/v2</property>
      <property value="211.858">fsim/tables/ps_full_ms/h0/w0/v3</property>
      <property value="227.319">fsim/tables/ps_full_ms/h0/w0/v4</property>
      <property value="242.681">fsim/tables/ps_full_ms/h0/w0/v5</property>
      <property value="257.743">fsim/tables/ps_full_ms/h0/w0/v6</property>
      <property value="272.074">fsim/tables/ps_full_ms/h0/w0/v7</property>
      <property value="284.464">fsim/tables/ps_full_ms/h0/w0/v8</property>
      <property value="290.774">fsim/tables/ps_full_ms/h0/w0/v9</property>
      <property value="132.502">fsim/tables/ps_full_ms/h0/w1/v0</property>
      <property value="147.073">fsim/tables/ps_full_ms/h0/w1/v1</property>
      <property value="247.732">fsim/tables/ps_full_ms/h0/w1/v10</property>
      <property value="227.319">fsim/tables/ps_full_ms/h0/w1/v11</property>
      <property value="181.429">fsim/tables/ps_full_ms/h0/w1/v12</property>
      <property value="113.558">fsim/tables/ps_full_ms/h0/w1/v13</property>
      <property value="55.1663">fsim/tables/ps_full_ms/h0/w1/v14</property>
      <property value="20.596">fsim/tables/ps_full_ms/h0/w1/v15</property>
      <property value="161.26">fsim/tables/ps_full_ms/h0/w1/v2</property>
      <property value="174.988">fsim/tables/ps_full_ms/h0/w1/v3</property>
      <property value="188.495">fsim/tables/ps_full_ms/h0/w1/v4</property>
      <property value="201.93">fsim/tables/ps_full_ms/h0/w1/v5</property>
      <property value="215.22">fsim/tables/ps_full_ms/h0/w1/v6</property>
      <property value="228.18">fsim/tables/ps_full_ms/h0/w1/v7</property>
      <property value="240.308">fsim/tables/ps_full_ms/h0/w1/v8</property>
      <property value="248.958">fsim/tables/ps_full_ms/h0/w1/v9</property>
      <property value="148.359">fsim/tables/ps_full_ms/h0/w2/v0</property>
      <property value="158.142">fsim/tables/ps_full_ms/h0/w2/v1</property>
      <property value="202.963">fsim/tables/ps_full_ms/h0/w2/v10</property>
      <property value="173.28">fsim/tables/ps_full_ms/h0/w2/v11</property>
      <property value="128.64">fsim/tables/ps_full_ms/h0/w2/v12</property>
      <property value="78.3385">fsim/tables/ps_full_ms/h0/w2/v13</property>
      <property value="40.0663">fsim/tables/ps_full_ms/h0/w2/v14</property>
      <property value="17.9498">fsim/tables/ps_full_ms/h0/w2/v15</property>
      <property value="167.84">fsim/tables/ps_full_ms/h0/w2/v2</property>
      <property value="177.475">fsim/tables/ps_full_ms/h0/w2/v3</property>
      <property value="186.978">fsim/tables/ps_full_ms/h0/w2/v4</property>
      <property value="196.242">fsim/tables/ps_full_ms/h0/w2/v5</property>
      <property value="205.197">fsim/tables/ps_full_ms/h0/w2/v6</property>
      <property value="213.399">fsim/tables/ps_full_ms/h0/w2/v7</property>
      <property value="218.701">fsim/tables/ps_full_ms/h0/w2/v8</property>
      <property value="217.012">fsim/tables/ps_full_ms/h0/w2/v9</property>
      <property value="123.03">fsim/tables/ps_full_ms/h1/w0/v0</property>
      <property value="138.119">fsim/tables/ps_full_ms/h1/w0/v1</property>
      <property value="171.207">fsim/tables/ps_full_ms/h1/w0/v10</property>
      <property value="117.882">fsim/tables/ps_full_ms/h1/w0/v11</property>
      <property value="83.9653">fsim/tables/ps_full_ms/h1/w0/v12</property>
      <property value="64.7046">fsim/tables/ps_full_ms/h1/w0/v13</property>
      <property value="41.5301">fsim/tables/ps_full_ms/h1/w0/v14</property>
      <property value="17.3353">fsim/tables/ps_full_ms/h1/w0/v15</property>
      <property value="153.411">fsim/tables/ps_full_ms/h1/w0/v2</property>
      <property value="168.623">fsim/tables/ps_full_ms/h1/w0/v3</property>
      <property value="183.986">fsim/tables/ps_full_ms/h1/w0/v4</property>
      <property value="199.2">fsim/tables/ps_full_ms/h1/w0/v5</property>
      <property value="213.81">fsim/tables/ps_full_ms/h1/w0/v6</property>
      <property value="226.41">fsim/tables/ps_full_ms/h1/w0/v7</property>
      <property value="230.093">fsim/tables/ps_full_ms/h1/w0/v8</property>
      <property value="213.665">fsim/tables/ps_full_ms/h1/w0/v9</property>
      <property value="87.9117">fsim/tables/ps_full_ms/h1/w1/v0</property>
      <property value="103.424">fsim/tables/ps_full_ms/h1/w1/v1</property>
      <property value="155.731">fsim/tables/ps_full_ms/h1/w1/v10</property>
      <property value="107.759">fsim/tables/ps_full_ms/h1/w1/v11</property>
      <property value="74.0684">fsim/tables/ps_full_ms/h1/w1/v12</property>
      <property value="56.9763">fsim/tables/ps_full_ms/h1/w1/v13</property>
      <property value="36.4697">fsim/tables/ps_full_ms/h1/w1/v14</property>
      <property value="14.8001">fsim/tables/ps_full_ms/h1/w1/v15</property>
      <property value="121.562">fsim/tables/ps_full_ms/h1/w1/v2</property>
      <property value="137.39">fsim/tables/ps_full_ms/h1/w1/v3</property>
      <property value="152.033">fsim/tables/ps_full_ms/h1/w1/v4</property>
      <property value="165.887">fsim/tables/ps_full_ms/h1/w1/v5</property>
      <property value="178.731">fsim/tables/ps_full_ms/h1/w1/v6</property>
      <property value="190.473">fsim/tables/ps_full_ms/h1/w1/v7</property>
      <property value="197.272">fsim/tables/ps_full_ms/h1/w1/v8</property>
      <property value="188.506">fsim/tables/ps_full_ms/h1/w1/v9</property>
      <property value="121.366">fsim/tables/ps_full_ms/h1/w2/v0</property>
      <property value="130.682">fsim/tables/ps_full_ms/h1/w2/v1</property>
      <property value="92.7001">fsim/tables/ps_full_ms/h1/w2/v10</property>
      <property value="68.0207">fsim/tables/ps_full_ms/h1/w2/v11</property>
      <property value="55.4924">fsim/tables/ps_full_ms/h1/w2/v12</property>
      <property value="42.4415">fsim/tables/ps_full_ms/h1/w2/v13</property>
      <property value="27.7095">fsim/tables/ps_full_ms/h1/w2/v14</property>
      <property value="12.8059">fsim/tables/ps_full_ms/h1/w2/v15</property>
      <property value="139.791">fsim/tables/ps_full_ms/h1/w2/v2</property>
      <property value="148.784">fsim/tables/ps_full_ms/h1/w2/v3</property>
      <property value="157.646">fsim/tables/ps_full_ms/h1/w2/v4</property>
      <property value="165.943">fsim/tables/ps_full_ms/h1/w2/v5</property>
      <property value="171.542">fsim/tables/ps_full_ms/h1/w2/v6</property>
      <property value="169.605">fsim/tables/ps_full_ms/h1/w2/v7</property>
      <property value="154.554">fsim/tables/ps_full_ms/h1/w2/v8</property>
      <property value="126.286">fsim/tables/ps_full_ms/h1/w2/v9</property>
      <property value="91.823">fsim/tables/ps_full_ms/h2/w0/v0</property>
      <property value="106.314">fsim/tables/ps_full_ms/h2/w0/v1</property>
      <property value="93.0108">fsim/tables/ps_full_ms/h2/w0/v10</property>
      <property value="80.0527">fsim/tables/ps_full_ms/h2/w0/v11</property>
      <property value="67.2864">fsim/tables/ps_full_ms/h2/w0/v12</property>
      <property value="52.8785">fsim/tables/ps_full_ms/h2/w0/v13</property>
      <property value="35.741">fsim/tables/ps_full_ms/h2/w0/v14</property>
      <property value="15.5173">fsim/tables/ps_full_ms/h2/w0/v15</property>
      <property value="120.598">fsim/tables/ps_full_ms/h2/w0/v2</property>
      <property value="135.389">fsim/tables/ps_full_ms/h2/w0/v3</property>
      <property value="150.466">fsim/tables/ps_full_ms/h2/w0/v4</property>
      <property value="165.145">fsim/tables/ps_full_ms/h2/w0/v5</property>
      <property value="174.834">fsim/tables/ps_full_ms/h2/w0/v6</property>
      <property value="165.674">fsim/tables/ps_full_ms/h2/w0/v7</property>
      <property value="133.527">fsim/tables/ps_full_ms/h2/w0/v8</property>
      <property value="104.456">fsim/tables/ps_full_ms/h2/w0/v9</property>
      <property value="73.5355">fsim/tables/ps_full_ms/h2/w1/v0</property>
      <property value="87.6961">fsim/tables/ps_full_ms/h2/w1/v1</property>
      <property value="78.9191">fsim/tables/ps_full_ms/h2/w1/v10</property>
      <property value="68.2201">fsim/tables/ps_full_ms/h2/w1/v11</property>
      <property value="57.0543">fsim/tables/ps_full_ms/h2/w1/v12</property>
      <property value="45.1905">fsim/tables/ps_full_ms/h2/w1/v13</property>
      <property value="31.0551">fsim/tables/ps_full_ms/h2/w1/v14</property>
      <property value="14.5992">fsim/tables/ps_full_ms/h2/w1/v15</property>
      <property value="100.343">fsim/tables/ps_full_ms/h2/w1/v2</property>
      <property value="113.399">fsim/tables/ps_full_ms/h2/w1/v3</property>
      <property value="126.482">fsim/tables/ps_full_ms/h2/w1/v4</property>
      <property value="139.043">fsim/tables/ps_full_ms/h2/w1/v5</property>
      <property value="148.392">fsim/tables/ps_full_ms/h2/w1/v6</property>
      <property value="142.881">fsim/tables/ps_full_ms/h2/w1/v7</property>
      <property value="116.647">fsim/tables/ps_full_ms/h2/w1/v8</property>
      <property value="90.0973">fsim/tables/ps_full_ms/h2/w1/v9</property>
      <property value="40.3033">fsim/tables/ps_full_ms/h2/w2/v0</property>
      <property value="51.0985">fsim/tables/ps_full_ms/h2/w2/v1</property>
      <property value="71.9166">fsim/tables/ps_full_ms/h2/w2/v10</property>
      <property value="62.5093">fsim/tables/ps_full_ms/h2/w2/v11</property>
      <property value="51.4092">fsim/tables/ps_full_ms/h2/w2/v12</property>
      <property value="40.911">fsim/tables/ps_full_ms/h2/w2/v13</property>
      <property value="28.0492">fsim/tables/ps_full_ms/h2/w2/v14</property>
      <property value="12.7637">fsim/tables/ps_full_ms/h2/w2/v15</property>
      <property value="72.446">fsim/tables/ps_full_ms/h2/w2/v2</property>
      <property value="85.7997">fsim/tables/ps_full_ms/h2/w2/v3</property>
      <property value="98.3977">fsim/tables/ps_full_ms/h2/w2/v4</property>
      <property value="109.731">fsim/tables/ps_full_ms/h2/w2/v5</property>
      <property value="120.822">fsim/tables/ps_full_ms/h2/w2/v6</property>
      <property value="128.42">fsim/tables/ps_full_ms/h2/w2/v7</property>
      <property value="118.833">fsim/tables/ps_full_ms/h2/w2/v8</property>
      <property value="90.8774">fsim/tables/ps_full_ms/h2/w2/v9</property>
      <property value="66.4768">fsim/tables/ps_full_ms/h3/w0/v0</property>
      <property value="80.4239">fsim/tables/ps_full_ms/h3/w0/v1</property>
      <property value="76.2836">fsim/tables/ps_full_ms/h3/w0/v10</property>
      <property value="68.3379">fsim/tables/ps_full_ms/h3/w0/v11</property>
      <property value="58.4449">fsim/tables/ps_full_ms/h3/w0/v12</property>
      <property value="45.7914">fsim/tables/ps_full_ms/h3/w0/v13</property>
      <property value="31.4776">fsim/tables/ps_full_ms/h3/w0/v14</property>
      <property value="15.0208">fsim/tables/ps_full_ms/h3/w0/v15</property>
      <property value="94.3614">fsim/tables/ps_full_ms/h3/w0/v2</property>
      <property value="108.549">fsim/tables/ps_full_ms/h3/w0/v3</property>
      <property value="121.829">fsim/tables/ps_full_ms/h3/w0/v4</property>
      <property value="122.559">fsim/tables/ps_full_ms/h3/w0/v5</property>
      <property value="103.657">fsim/tables/ps_full_ms/h3/w0/v6</property>
      <property value="91.439">fsim/tables/ps_full_ms/h3/w0/v7</property>
      <property value="86.9569">fsim/tables/ps_full_ms/h3/w0/v8</property>
      <property value="81.9463">fsim/tables/ps_full_ms/h3/w0/v9</property>
      <property value="49.0577">fsim/tables/ps_full_ms/h3/w1/v0</property>
      <property value="62.8201">fsim/tables/ps_full_ms/h3/w1/v1</property>
      <property value="63.4884">fsim/tables/ps_full_ms/h3/w1/v10</property>
      <property value="56.9524">fsim/tables/ps_full_ms/h3/w1/v11</property>
      <property value="48.8269">fsim/tables/ps_full_ms/h3/w1/v12</property>
      <property value="38.4744">fsim/tables/ps_full_ms/h3/w1/v13</property>
      <property value="26.3278">fsim/tables/ps_full_ms/h3/w1/v14</property>
      <property value="12.8134">fsim/tables/ps_full_ms/h3/w1/v15</property>
      <property value="75.7691">fsim/tables/ps_full_ms/h3/w1/v2</property>
      <property value="88.3992">fsim/tables/ps_full_ms/h3/w1/v3</property>
      <property value="100.584">fsim/tables/ps_full_ms/h3/w1/v4</property>
      <property value="103.941">fsim/tables/ps_full_ms/h3/w1/v5</property>
      <property value="89.1839">fsim/tables/ps_full_ms/h3/w1/v6</property>
      <property value="76.0528">fsim/tables/ps_full_ms/h3/w1/v7</property>
      <property value="72.1626">fsim/tables/ps_full_ms/h3/w1/v8</property>
      <property value="67.9216">fsim/tables/ps_full_ms/h3/w1/v9</property>
      <property value="19.0943">fsim/tables/ps_full_ms/h3/w2/v0</property>
      <property value="47.9929">fsim/tables/ps_full_ms/h3/w2/v1</property>
      <property value="53.1325">fsim/tables/ps_full_ms/h3/w2/v10</property>
      <property value="47.7038">fsim/tables/ps_full_ms/h3/w2/v11</property>
      <property value="40.8847">fsim/tables/ps_full_ms/h3/w2/v12</property>
      <property value="32.4846">fsim/tables/ps_full_ms/h3/w2/v13</property>
      <property value="22.0857">fsim/tables/ps_full_ms/h3/w2/v14</property>
      <property value="11.121">fsim/tables/ps_full_ms/h3/w2/v15</property>
      <property value="59.6855">fsim/tables/ps_full_ms/h3/w2/v2</property>
      <property value="70.5814">fsim/tables/ps_full_ms/h3/w2/v3</property>
      <property value="81.7306">fsim/tables/ps_full_ms/h3/w2/v4</property>
      <property value="89.0066">fsim/tables/ps_full_ms/h3/w2/v5</property>
      <property value="80.558">fsim/tables/ps_full_ms/h3/w2/v6</property>
      <property value="66.0697">fsim/tables/ps_full_ms/h3/w2/v7</property>
      <property value="60.7758">fsim/tables/ps_full_ms/h3/w2/v8</property>
      <property value="56.7478">fsim/tables/ps_full_ms/h3/w2/v9</property>
      <property value="48.7382">fsim/tables/ps_full_ms/h4/w0/v0</property>
      <property value="60.5229">fsim/tables/ps_full_ms/h4/w0/v1</property>
      <property value="57.5882">fsim/tables/ps_full_ms/h4/w0/v10</property>
      <property value="51.6235">fsim/tables/ps_full_ms/h4/w0/v11</property>
      <property value="44.3392">fsim/tables/ps_full_ms/h4/w0/v12</property>
      <property value="34.9025">fsim/tables/ps_full_ms/h4/w0/v13</property>
      <property value="24.5976">fsim/tables/ps_full_ms/h4/w0/v14</property>
      <property value="12.1065">fsim/tables/ps_full_ms/h4/w0/v15</property>
      <property value="71.8132">fsim/tables/ps_full_ms/h4/w0/v2</property>
      <property value="83.6803">fsim/tables/ps_full_ms/h4/w0/v3</property>
      <property value="93.3684">fsim/tables/ps_full_ms/h4/w0/v4</property>
      <property value="89.0637">fsim/tables/ps_full_ms/h4/w0/v5</property>
      <property value="74.4502">fsim/tables/ps_full_ms/h4/w0/v6</property>
      <property value="68.1021">fsim/tables/ps_full_ms/h4/w0/v7</property>
      <property value="64.9167">fsim/tables/ps_full_ms/h4/w0/v8</property>
      <property value="61.9612">fsim/tables/ps_full_ms/h4/w0/v9</property>
      <property value="32.3482">fsim/tables/ps_full_ms/h4/w1/v0</property>
      <property value="46.8942">fsim/tables/ps_full_ms/h4/w1/v1</property>
      <property value="46.0506">fsim/tables/ps_full_ms/h4/w1/v10</property>
      <property value="40.9249">fsim/tables/ps_full_ms/h4/w1/v11</property>
      <property value="35.1959">fsim/tables/ps_full_ms/h4/w1/v12</property>
      <property value="27.7274">fsim/tables/ps_full_ms/h4/w1/v13</property>
      <property value="19.2987">fsim/tables/ps_full_ms/h4/w1/v14</property>
      <property value="9.98371">fsim/tables/ps_full_ms/h4/w1/v15</property>
      <property value="57.1108">fsim/tables/ps_full_ms/h4/w1/v2</property>
      <property value="67.5764">fsim/tables/ps_full_ms/h4/w1/v3</property>
      <property value="76.3813">fsim/tables/ps_full_ms/h4/w1/v4</property>
      <property value="73.9535">fsim/tables/ps_full_ms/h4/w1/v5</property>
      <property value="61.817">fsim/tables/ps_full_ms/h4/w1/v6</property>
      <property value="55.0787">fsim/tables/ps_full_ms/h4/w1/v7</property>
      <property value="52.3308">fsim/tables/ps_full_ms/h4/w1/v8</property>
      <property value="49.5564">fsim/tables/ps_full_ms/h4/w1/v9</property>
      <property value="17.2629">fsim/tables/ps_full_ms/h4/w2/v0</property>
      <property value="35.6327">fsim/tables/ps_full_ms/h4/w2/v1</property>
      <property value="37.5441">fsim/tables/ps_full_ms/h4/w2/v10</property>
      <property value="33.5807">fsim/tables/ps_full_ms/h4/w2/v11</property>
      <property value="28.7953">fsim/tables/ps_full_ms/h4/w2/v12</property>
      <property value="23.0051">fsim/tables/ps_full_ms/h4/w2/v13</property>
      <property value="15.7111">fsim/tables/ps_full_ms/h4/w2/v14</property>
      <property value="8.37582">fsim/tables/ps_full_ms/h4/w2/v15</property>
      <property value="44.758">fsim/tables/ps_full_ms/h4/w2/v2</property>
      <property value="54.4101">fsim/tables/ps_full_ms/h4/w2/v3</property>
      <property value="62.5538">fsim/tables/ps_full_ms/h4/w2/v4</property>
      <property value="62.5798">fsim/tables/ps_full_ms/h4/w2/v5</property>
      <property value="52.9766">fsim/tables/ps_full_ms/h4/w2/v6</property>
      <property value="45.1739">fsim/tables/ps_full_ms/h4/w2/v7</property>
      <property value="42.4083">fsim/tables/ps_full_ms/h4/w2/v8</property>
      <property value="40.0864">fsim/tables/ps_full_ms/h4/w2/v9</property>
      <property value="40.5663">fsim/tables/ps_full_ms/h5/w0/v0</property>
      <property value="51.9126">fsim/tables/ps_full_ms/h5/w0/v1</property>
      <property value="49.2714">fsim/tables/ps_full_ms/h5/w0/v10</property>
      <property value="44.0962">fsim/tables/ps_full_ms/h5/w0/v11</property>
      <property value="37.5799">fsim/tables/ps_full_ms/h5/w0/v12</property>
      <property value="29.3394">fsim/tables/ps_full_ms/h5/w0/v13</property>
      <property value="20.8053">fsim/tables/ps_full_ms/h5/w0/v14</property>
      <property value="10.3935">fsim/tables/ps_full_ms/h5/w0/v15</property>
      <property value="62.3444">fsim/tables/ps_full_ms/h5/w0/v2</property>
      <property value="73.3821">fsim/tables/ps_full_ms/h5/w0/v3</property>
      <property value="80.9288">fsim/tables/ps_full_ms/h5/w0/v4</property>
      <property value="74.502">fsim/tables/ps_full_ms/h5/w0/v5</property>
      <property value="62.69">fsim/tables/ps_full_ms/h5/w0/v6</property>
      <property value="58.4894">fsim/tables/ps_full_ms/h5/w0/v7</property>
      <property value="55.6938">fsim/tables/ps_full_ms/h5/w0/v8</property>
      <property value="53.2973">fsim/tables/ps_full_ms/h5/w0/v9</property>
      <property value="29.3548">fsim/tables/ps_full_ms/h5/w1/v0</property>
      <property value="40.063">fsim/tables/ps_full_ms/h5/w1/v1</property>
      <property value="39.0058">fsim/tables/ps_full_ms/h5/w1/v10</property>
      <property value="34.68">fsim/tables/ps_full_ms/h5/w1/v11</property>
      <property value="29.9117">fsim/tables/ps_full_ms/h5/w1/v12</property>
      <property value="23.6558">fsim/tables/ps_full_ms/h5/w1/v13</property>
      <property value="16.6306">fsim/tables/ps_full_ms/h5/w1/v14</property>
      <property value="8.92114">fsim/tables/ps_full_ms/h5/w1/v15</property>
      <property value="49.3534">fsim/tables/ps_full_ms/h5/w1/v2</property>
      <property value="59.0526">fsim/tables/ps_full_ms/h5/w1/v3</property>
      <property value="65.3491">fsim/tables/ps_full_ms/h5/w1/v4</property>
      <property value="60.8346">fsim/tables/ps_full_ms/h5/w1/v5</property>
      <property value="51.031">fsim/tables/ps_full_ms/h5/w1/v6</property>
      <property value="45.6998">fsim/tables/ps_full_ms/h5/w1/v7</property>
      <property value="43.8276">fsim/tables/ps_full_ms/h5/w1/v8</property>
      <property value="41.8862">fsim/tables/ps_full_ms/h5/w1/v9</property>
      <property value="9.98429">fsim/tables/ps_full_ms/h5/w2/v0</property>
      <property value="29.2857">fsim/tables/ps_full_ms/h5/w2/v1</property>
      <property value="30.2391">fsim/tables/ps_full_ms/h5/w2/v10</property>
      <property value="26.7786">fsim/tables/ps_full_ms/h5/w2/v11</property>
      <property value="22.9223">fsim/tables/ps_full_ms/h5/w2/v12</property>
      <property value="18.4579">fsim/tables/ps_full_ms/h5/w2/v13</property>
      <property value="12.7242">fsim/tables/ps_full_ms/h5/w2/v14</property>
      <property value="7.1305">fsim/tables/ps_full_ms/h5/w2/v15</property>
      <property value="38.0687">fsim/tables/ps_full_ms/h5/w2/v2</property>
      <property value="46.555">fsim/tables/ps_full_ms/h5/w2/v3</property>
      <property value="52.7814">fsim/tables/ps_full_ms/h5/w2/v4</property>
      <property value="50.6861">fsim/tables/ps_full_ms/h5/w2/v5</property>
      <property value="42.5763">fsim/tables/ps_full_ms/h5/w2/v6</property>
      <property value="36.4766">fsim/tables/ps_full_ms/h5/w2/v7</property>
      <property value="34.3719">fsim/tables/ps_full_ms/h5/w2/v8</property>
      <property value="32.4618">fsim/tables/ps_full_ms/h5/w2/v9</property>
      <property value="23.674">fsim/tables/ps_full_ms/h6/w0/v0</property>
      <property value="32.3431">fsim/tables/ps_full_ms/h6/w0/v1</property>
      <property value="30.2397">fsim/tables/ps_full_ms/h6/w0/v10</property>
      <property value="26.7976">fsim/tables/ps_full_ms/h6/w0/v11</property>
      <property value="22.9827">fsim/tables/ps_full_ms/h6/w0/v12</property>
      <property value="18.6048">fsim/tables/ps_full_ms/h6/w0/v13</property>
      <property value="13.0142">fsim/tables/ps_full_ms/h6/w0/v14</property>
      <property value="7.34828">fsim/tables/ps_full_ms/h6/w0/v15</property>
      <property value="40.2516">fsim/tables/ps_full_ms/h6/w0/v2</property>
      <property value="48.5818">fsim/tables/ps_full_ms/h6/w0/v3</property>
      <property value="53.4883">fsim/tables/ps_full_ms/h6/w0/v4</property>
      <property value="49.8489">fsim/tables/ps_full_ms/h6/w0/v5</property>
      <property value="41.8628">fsim/tables/ps_full_ms/h6/w0/v6</property>
      <property value="36.2234">fsim/tables/ps_full_ms/h6/w0/v7</property>
      <property value="34.3835">fsim/tables/ps_full_ms/h6/w0/v8</property>
      <property value="32.4835">fsim/tables/ps_full_ms/h6/w0/v9</property>
      <property value="14.4239">fsim/tables/ps_full_ms/h6/w1/v0</property>
      <property value="20.2971">fsim/tables/ps_full_ms/h6/w1/v1</property>
      <property value="21.6783">fsim/tables/ps_full_ms/h6/w1/v10</property>
      <property value="19.7309">fsim/tables/ps_full_ms/h6/w1/v11</property>
      <property value="16.859">fsim/tables/ps_full_ms/h6/w1/v12</property>
      <property value="13.5918">fsim/tables/ps_full_ms/h6/w1/v13</property>
      <property value="10.2502">fsim/tables/ps_full_ms/h6/w1/v14</property>
      <property value="6.06736">fsim/tables/ps_full_ms/h6/w1/v15</property>
      <property value="28.5684">fsim/tables/ps_full_ms/h6/w1/v2</property>
      <property value="35.3127">fsim/tables/ps_full_ms/h6/w1/v3</property>
      <property value="40.0063">fsim/tables/ps_full_ms/h6/w1/v4</property>
      <property value="39.1086">fsim/tables/ps_full_ms/h6/w1/v5</property>
      <property value="33.5137">fsim/tables/ps_full_ms/h6/w1/v6</property>
      <property value="27.4391">fsim/tables/ps_full_ms/h6/w1/v7</property>
      <property value="24.2289">fsim/tables/ps_full_ms/h6/w1/v8</property>
      <property value="23.033">fsim/tables/ps_full_ms/h6/w1/v9</property>
      <property value="23.5328">fsim/tables/ps_full_ms/h6/w2/v0</property>
      <property value="26.8934">fsim/tables/ps_full_ms/h6/w2/v1</property>
      <property value="13.0443">fsim/tables/ps_full_ms/h6/w2/v10</property>
      <property value="11.9551">fsim/tables/ps_full_ms/h6/w2/v11</property>
      <property value="10.4392">fsim/tables/ps_full_ms/h6/w2/v12</property>
      <property value="8.45874">fsim/tables/ps_full_ms/h6/w2/v13</property>
      <property value="5.95546">fsim/tables/ps_full_ms/h6/w2/v14</property>
      <property value="4.07339">fsim/tables/ps_full_ms/h6/w2/v15</property>
      <property value="30.254">fsim/tables/ps_full_ms/h6/w2/v2</property>
      <property value="30.2584">fsim/tables/ps_full_ms/h6/w2/v3</property>
      <property value="28.6536">fsim/tables/ps_full_ms/h6/w2/v4</property>
      <property value="24.6884">fsim/tables/ps_full_ms/h6/w2/v5</property>
      <property value="20.1521">fsim/tables/ps_full_ms/h6/w2/v6</property>
      <property value="16.0676">fsim/tables/ps_full_ms/h6/w2/v7</property>
      <property value="14.8661">fsim/tables/ps_full_ms/h6/w2/v8</property>
      <property value="14.0434">fsim/tables/ps_full_ms/h6/w2/v9</property>
      <property value="9.96522">fsim/tables/ps_full_ms/h7/w0/v0</property>
      <property value="15.646">fsim/tables/ps_full_ms/h7/w0/v1</property>
      <property value="14.631">fsim/tables/ps_full_ms/h7/w0/v10</property>
      <property value="12.8554">fsim/tables/ps_full_ms/h7/w0/v11</property>
      <property value="10.2823">fsim/tables/ps_full_ms/h7/w0/v12</property>
      <property value="7.44155">fsim/tables/ps_full_ms/h7/w0/v13</property>
      <property value="4.89278">fsim/tables/ps_full_ms/h7/w0/v14</property>
      <property value="1.80218">fsim/tables/ps_full_ms/h7/w0/v15</property>
      <property value="23.0384">fsim/tables/ps_full_ms/h7/w0/v2</property>
      <property value="29.0264">fsim/tables/ps_full_ms/h7/w0/v3</property>
      <property value="31.758">fsim/tables/ps_full_ms/h7/w0/v4</property>
      <property value="29.2677">fsim/tables/ps_full_ms/h7/w0/v5</property>
      <property value="24.34">fsim/tables/ps_full_ms/h7/w0/v6</property>
      <property value="19.2696">fsim/tables/ps_full_ms/h7/w0/v7</property>
      <property value="16.9918">fsim/tables/ps_full_ms/h7/w0/v8</property>
      <property value="15.8309">fsim/tables/ps_full_ms/h7/w0/v9</property>
      <property value="16.6713">fsim/tables/ps_full_ms/h7/w1/v0</property>
      <property value="18.2843">fsim/tables/ps_full_ms/h7/w1/v1</property>
      <property value="5.73687">fsim/tables/ps_full_ms/h7/w1/v10</property>
      <property value="5.08647">fsim/tables/ps_full_ms/h7/w1/v11</property>
      <property value="4.29792">fsim/tables/ps_full_ms/h7/w1/v12</property>
      <property value="3.22161">fsim/tables/ps_full_ms/h7/w1/v13</property>
      <property value="1.82542">fsim/tables/ps_full_ms/h7/w1/v14</property>
      <property value="1.28561">fsim/tables/ps_full_ms/h7/w1/v15</property>
      <property value="19.8972">fsim/tables/ps_full_ms/h7/w1/v2</property>
      <property value="21.4156">fsim/tables/ps_full_ms/h7/w1/v3</property>
      <property value="19.2218">fsim/tables/ps_full_ms/h7/w1/v4</property>
      <property value="17.028">fsim/tables/ps_full_ms/h7/w1/v5</property>
      <property value="13.6139">fsim/tables/ps_full_ms/h7/w1/v6</property>
      <property value="9.94939">fsim/tables/ps_full_ms/h7/w1/v7</property>
      <property value="6.65857">fsim/tables/ps_full_ms/h7/w1/v8</property>
      <property value="6.28906">fsim/tables/ps_full_ms/h7/w1/v9</property>
      <property value="10.4101">fsim/tables/ps_full_ms/h7/w2/v0</property>
      <property value="10.4895">fsim/tables/ps_full_ms/h7/w2/v1</property>
      <property value="7.63229">fsim/tables/ps_full_ms/h7/w2/v10</property>
      <property value="6.2794">fsim/tables/ps_full_ms/h7/w2/v11</property>
      <property value="4.92652">fsim/tables/ps_full_ms/h7/w2/v12</property>
      <property value="3.9639">fsim/tables/ps_full_ms/h7/w2/v13</property>
      <property value="3.01913">fsim/tables/ps_full_ms/h7/w2/v14</property>
      <property value="2.07435">fsim/tables/ps_full_ms/h7/w2/v15</property>
      <property value="10.5688">fsim/tables/ps_full_ms/h7/w2/v2</property>
      <property value="10.6481">fsim/tables/ps_full_ms/h7/w2/v3</property>
      <property value="10.7274">fsim/tables/ps_full_ms/h7/w2/v4</property>
      <property value="10.8068">fsim/tables/ps_full_ms/h7/w2/v5</property>
      <property value="10.8861">fsim/tables/ps_full_ms/h7/w2/v6</property>
      <property value="10.5901">fsim/tables/ps_full_ms/h7/w2/v7</property>
      <property value="9.74036">fsim/tables/ps_full_ms/h7/w2/v8</property>
      <property value="8.89067">fsim/tables/ps_full_ms/h7/w2/v9</property>
      <property value="-14.0127">fsim/tables/ps_idle_ms/h0/w0/v0</property>
      <property value="-17.0426">fsim/tables/ps_idle_ms/h0/w0/v1</property>
      <property value="-104.449">fsim/tables/ps_idle_ms/h0/w0/v10</property>
      <property value="-167.16">fsim/tables/ps_idle_ms/h0/w0/v11</property>
      <property value="-261.623">fsim/tables/ps_idle_ms/h0/w0/v12</property>
      <property value="-354.938">fsim/tables/ps_idle_ms/h0/w0/v13</property>
      <property value="-399.334">fsim/tables/ps_idle_ms/h0/w0/v14</property>
      <property value="-434.23">fsim/tables/ps_idle_ms/h0/w0/v15</property>
      <property value="-20.8827">fsim/tables/ps_idle_ms/h0/w0/v2</property>
      <property value="-25.2945">fsim/tables/ps_idle_ms/h0/w0/v3</property>
      <property value="-30.8211">fsim/tables/ps_idle_ms/h0/w0/v4</property>
      <property value="-37.1074">fsim/tables/ps_idle_ms/h0/w0/v5</property>
      <property value="-44.193">fsim/tables/ps_idle_ms/h0/w0/v6</property>
      <property value="-52.4756">fsim/tables/ps_idle_ms/h0/w0/v7</property>
      <property value="-61.8604">fsim/tables/ps_idle_ms/h0/w0/v8</property>
      <property value="-75.3787">fsim/tables/ps_idle_ms/h0/w0/v9</property>
      <property value="-12.4273">fsim/tables/ps_idle_ms/h0/w1/v0</property>
      <property value="-14.5906">fsim/tables/ps_idle_ms/h0/w1/v1</property>
      <property value="-82.0876">fsim/tables/ps_idle_ms/h0/w1/v10</property>
      <property value="-130.08">fsim/tables/ps_idle_ms/h0/w1/v11</property>
      <property value="-210.49">fsim/tables/ps_idle_ms/h0/w1/v12</property>
      <property value="-298.522">fsim/tables/ps_idle_ms/h0/w1/v13</property>
      <property value="-352.902">fsim/tables/ps_idle_ms/h0/w1/v14</property>
      <property value="-384.314">fsim/tables/ps_idle_ms/h0/w1/v15</property>
      <property value="-17.3933">fsim/tables/ps_idle_ms/h0/w1/v2</property>
      <property value="-21.1079">fsim/tables/ps_idle_ms/h0/w1/v3</property>
      <property value="-25.3811">fsim/tables/ps_idle_ms/h0/w1/v4</property>
      <property value="-30.4868">fsim/tables/ps_idle_ms/h0/w1/v5</property>
      <property value="-36.5581">fsim/tables/ps_idle_ms/h0/w1/v6</property>
      <property value="-43.5962">fsim/tables/ps_idle_ms/h0/w1/v7</property>
      <property value="-51.6762">fsim/tables/ps_idle_ms/h0/w1/v8</property>
      <property value="-61.9634">fsim/tables/ps_idle_ms/h0/w1/v9</property>
      <property value="-18.5791">fsim/tables/ps_idle_ms/h0/w2/v0</property>
      <property value="-21.4649">fsim/tables/ps_idle_ms/h0/w2/v1</property>
      <property value="-106.425">fsim/tables/ps_idle_ms/h0/w2/v10</property>
      <property value="-159.622">fsim/tables/ps_idle_ms/h0/w2/v11</property>
      <property value="-224.011">fsim/tables/ps_idle_ms/h0/w2/v12</property>
      <property value="-285.467">fsim/tables/ps_idle_ms/h0/w2/v13</property>
      <property value="-321.972">fsim/tables/ps_idle_ms/h0/w2/v14</property>
      <property value="-344.147">fsim/tables/ps_idle_ms/h0/w2/v15</property>
      <property value="-24.7537">fsim/tables/ps_idle_ms/h0/w2/v2</property>
      <property value="-28.3614">fsim/tables/ps_idle_ms/h0/w2/v3</property>
      <property value="-32.617">fsim/tables/ps_idle_ms/h0/w2/v4</property>
      <property value="-37.5928">fsim/tables/ps_idle_ms/h0/w2/v5</property>
      <property value="-43.2195">fsim/tables/ps_idle_ms/h0/w2/v6</property>
      <property value="-49.4253">fsim/tables/ps_idle_ms/h0/w2/v7</property>
      <property value="-58.032">fsim/tables/ps_idle_ms/h0/w2/v8</property>
      <property value="-73.9903">fsim/tables/ps_idle_ms/h0/w2/v9</property>
      <property value="-13.0577">fsim/tables/ps_idle_ms/h1/w0/v0</property>
      <property value="-14.9412">fsim/tables/ps_idle_ms/h1/w0/v1</property>
      <property value="-179.646">fsim/tables/ps_idle_ms/h1/w0/v10</property>
      <property value="-254.168">fsim/tables/ps_idle_ms/h1/w0/v11</property>
      <property value="-313.845">fsim/tables/ps_idle_ms/h1/w0/v12</property>
      <property value="-366.445">fsim/tables/ps_idle_ms/h1/w0/v13</property>
      <property value="-407.198">fsim/tables/ps_idle_ms/h1/w0/v14</property>
      <property value="-429.08">fsim/tables/ps_idle_ms/h1/w0/v15</property>
      <property value="-17.7595">fsim/tables/ps_idle_ms/h1/w0/v2</property>
      <property value="-21.3393">fsim/tables/ps_idle_ms/h1/w0/v3</property>
      <property value="-25.7835">fsim/tables/ps_idle_ms/h1/w0/v4</property>
      <property value="-30.9779">fsim/tables/ps_idle_ms/h1/w0/v5</property>
      <property value="-37.7579">fsim/tables/ps_idle_ms/h1/w0/v6</property>
      <property value="-45.9952">fsim/tables/ps_idle_ms/h1/w0/v7</property>
      <property value="-62.1724">fsim/tables/ps_idle_ms/h1/w0/v8</property>
      <property value="-105.628">fsim/tables/ps_idle_ms/h1/w0/v9</property>
      <property value="-13.2962">fsim/tables/ps_idle_ms/h1/w1/v0</property>
      <property value="-14.2001">fsim/tables/ps_idle_ms/h1/w1/v1</property>
      <property value="-138.68">fsim/tables/ps_idle_ms/h1/w1/v10</property>
      <property value="-207.317">fsim/tables/ps_idle_ms/h1/w1/v11</property>
      <property value="-262.729">fsim/tables/ps_idle_ms/h1/w1/v12</property>
      <property value="-309.292">fsim/tables/ps_idle_ms/h1/w1/v13</property>
      <property value="-352.676">fsim/tables/ps_idle_ms/h1/w1/v14</property>
      <property value="-372.635">fsim/tables/ps_idle_ms/h1/w1/v15</property>
      <property value="-15.9859">fsim/tables/ps_idle_ms/h1/w1/v2</property>
      <property value="-18.6405">fsim/tables/ps_idle_ms/h1/w1/v3</property>
      <property value="-21.994">fsim/tables/ps_idle_ms/h1/w1/v4</property>
      <property value="-26.3488">fsim/tables/ps_idle_ms/h1/w1/v5</property>
      <property value="-31.4603">fsim/tables/ps_idle_ms/h1/w1/v6</property>
      <property value="-38.0282">fsim/tables/ps_idle_ms/h1/w1/v7</property>
      <property value="-48.4038">fsim/tables/ps_idle_ms/h1/w1/v8</property>
      <property value="-78.6714">fsim/tables/ps_idle_ms/h1/w1/v9</property>
      <property value="-18.4628">fsim/tables/ps_idle_ms/h1/w2/v0</property>
      <property value="-20.7961">fsim/tables/ps_idle_ms/h1/w2/v1</property>
      <property value="-183.141">fsim/tables/ps_idle_ms/h1/w2/v10</property>
      <property value="-222.399">fsim/tables/ps_idle_ms/h1/w2/v11</property>
      <property value="-254.959">fsim/tables/ps_idle_ms/h1/w2/v12</property>
      <property value="-286.303">fsim/tables/ps_idle_ms/h1/w2/v13</property>
      <property value="-315.385">fsim/tables/ps_idle_ms/h1/w2/v14</property>
      <property value="-328.955">fsim/tables/ps_idle_ms/h1/w2/v15</property>
      <property value="-23.4223">fsim/tables/ps_idle_ms/h1/w2/v2</property>
      <property value="-26.7662">fsim/tables/ps_idle_ms/h1/w2/v3</property>
      <property value="-30.5952">fsim/tables/ps_idle_ms/h1/w2/v4</property>
      <property value="-34.9294">fsim/tables/ps_idle_ms/h1/w2/v5</property>
      <property value="-41.9123">fsim/tables/ps_idle_ms/h1/w2/v6</property>
      <property value="-58.3982">fsim/tables/ps_idle_ms/h1/w2/v7</property>
      <property value="-90.0675">fsim/tables/ps_idle_ms/h1/w2/v8</property>
      <property value="-135.718">fsim/tables/ps_idle_ms/h1/w2/v9</property>
      <property value="-15.3325">fsim/tables/ps_idle_ms/h2/w0/v0</property>
      <property value="-15.9958">fsim/tables/ps_idle_ms/h2/w0/v1</property>
      <property value="-219.905">fsim/tables/ps_idle_ms/h2/w0/v10</property>
      <property value="-259.58">fsim/tables/ps_idle_ms/h2/w0/v11</property>
      <property value="-301.456">fsim/tables/ps_idle_ms/h2/w0/v12</property>
      <property value="-346.353">fsim/tables/ps_idle_ms/h2/w0/v13</property>
      <property value="-395.27">fsim/tables/ps_idle_ms/h2/w0/v14</property>
      <property value="-419.842">fsim/tables/ps_idle_ms/h2/w0/v15</property>
      <property value="-17.8296">fsim/tables/ps_idle_ms/h2/w0/v2</property>
      <property value="-20.6505">fsim/tables/ps_idle_ms/h2/w0/v3</property>
      <property value="-24.4216">fsim/tables/ps_idle_ms/h2/w0/v4</property>
      <property value="-29.5725">fsim/tables/ps_idle_ms/h2/w0/v5</property>
      <property value="-38.7935">fsim/tables/ps_idle_ms/h2/w0/v6</property>
      <property value="-71.6739">fsim/tables/ps_idle_ms/h2/w0/v7</property>
      <property value="-129.19">fsim/tables/ps_idle_ms/h2/w0/v8</property>
      <property value="-180.837">fsim/tables/ps_idle_ms/h2/w0/v9</property>
      <property value="-17.0006">fsim/tables/ps_idle_ms/h2/w1/v0</property>
      <property value="-16.8793">fsim/tables/ps_idle_ms/h2/w1/v1</property>
      <property value="-185.843">fsim/tables/ps_idle_ms/h2/w1/v10</property>
      <property value="-219.109">fsim/tables/ps_idle_ms/h2/w1/v11</property>
      <property value="-254.232">fsim/tables/ps_idle_ms/h2/w1/v12</property>
      <property value="-291.651">fsim/tables/ps_idle_ms/h2/w1/v13</property>
      <property value="-332.601">fsim/tables/ps_idle_ms/h2/w1/v14</property>
      <property value="-357.78">fsim/tables/ps_idle_ms/h2/w1/v15</property>
      <property value="-17.9551">fsim/tables/ps_idle_ms/h2/w1/v2</property>
      <property value="-19.9658">fsim/tables/ps_idle_ms/h2/w1/v3</property>
      <property value="-22.9898">fsim/tables/ps_idle_ms/h2/w1/v4</property>
      <property value="-26.9728">fsim/tables/ps_idle_ms/h2/w1/v5</property>
      <property value="-33.928">fsim/tables/ps_idle_ms/h2/w1/v6</property>
      <property value="-58.4719">fsim/tables/ps_idle_ms/h2/w1/v7</property>
      <property value="-105.825">fsim/tables/ps_idle_ms/h2/w1/v8</property>
      <property value="-152.05">fsim/tables/ps_idle_ms/h2/w1/v9</property>
      <property value="-24.0018">fsim/tables/ps_idle_ms/h2/w2/v0</property>
      <property value="-19.6142">fsim/tables/ps_idle_ms/h2/w2/v1</property>
      <property value="-148.415">fsim/tables/ps_idle_ms/h2/w2/v10</property>
      <property value="-179.033">fsim/tables/ps_idle_ms/h2/w2/v11</property>
      <property value="-211.685">fsim/tables/ps_idle_ms/h2/w2/v12</property>
      <property value="-246.061">fsim/tables/ps_idle_ms/h2/w2/v13</property>
      <property value="-283.931">fsim/tables/ps_idle_ms/h2/w2/v14</property>
      <property value="-311.771">fsim/tables/ps_idle_ms/h2/w2/v15</property>
      <property value="-18.1135">fsim/tables/ps_idle_ms/h2/w2/v2</property>
      <property value="-18.3826">fsim/tables/ps_idle_ms/h2/w2/v3</property>
      <property value="-19.8549">fsim/tables/ps_idle_ms/h2/w2/v4</property>
      <property value="-22.3514">fsim/tables/ps_idle_ms/h2/w2/v5</property>
      <property value="-26.0281">fsim/tables/ps_idle_ms/h2/w2/v6</property>
      <property value="-34.2044">fsim/tables/ps_idle_ms/h2/w2/v7</property>
      <property value="-62.554">fsim/tables/ps_idle_ms/h2/w2/v8</property>
      <property value="-109.248">fsim/tables/ps_idle_ms/h2/w2/v9</property>
      <property value="-20.4816">fsim/tables/ps_idle_ms/h3/w0/v0</property>
      <property value="-19.4378">fsim/tables/ps_idle_ms/h3/w0/v1</property>
      <property value="-207.987">fsim/tables/ps_idle_ms/h3/w0/v10</property>
      <property value="-243.649">fsim/tables/ps_idle_ms/h3/w0/v11</property>
      <property value="-283.7">fsim/tables/ps_idle_ms/h3/w0/v12</property>
      <property value="-328.033">fsim/tables/ps_idle_ms/h3/w0/v13</property>
      <property value="-376.493">fsim/tables/ps_idle_ms/h3/w0/v14</property>
      <property value="-412.249">fsim/tables/ps_idle_ms/h3/w0/v15</property>
      <property value="-20.1714">fsim/tables/ps_idle_ms/h3/w0/v2</property>
      <property value="-22.2709">fsim/tables/ps_idle_ms/h3/w0/v3</property>
      <property value="-26.4338">fsim/tables/ps_idle_ms/h3/w0/v4</property>
      <property value="-44.856">fsim/tables/ps_idle_ms/h3/w0/v5</property>
      <property value="-84.8699">fsim/tables/ps_idle_ms/h3/w0/v6</property>
      <property value="-119.034">fsim/tables/ps_idle_ms/h3/w0/v7</property>
      <property value="-146.415">fsim/tables/ps_idle_ms/h3/w0/v8</property>
      <property value="-175.983">fsim/tables/ps_idle_ms/h3/w0/v9</property>
      <property value="-24.1049">fsim/tables/ps_idle_ms/h3/w1/v0</property>
      <property value="-21.4911">fsim/tables/ps_idle_ms/h3/w1/v1</property>
      <property value="-175.867">fsim/tables/ps_idle_ms/h3/w1/v10</property>
      <property value="-205.498">fsim/tables/ps_idle_ms/h3/w1/v11</property>
      <property value="-238.346">fsim/tables/ps_idle_ms/h3/w1/v12</property>
      <property value="-275.08">fsim/tables/ps_idle_ms/h3/w1/v13</property>
      <property value="-315.477">fsim/tables/ps_idle_ms/h3/w1/v14</property>
      <property value="-348.691">fsim/tables/ps_idle_ms/h3/w1/v15</property>
      <property value="-21.1355">fsim/tables/ps_idle_ms/h3/w1/v2</property>
      <property value="-22.2426">fsim/tables/ps_idle_ms/h3/w1/v3</property>
      <property value="-24.9826">fsim/tables/ps_idle_ms/h3/w1/v4</property>
      <property value="-37.323">fsim/tables/ps_idle_ms/h3/w1/v5</property>
      <property value="-69.5466">fsim/tables/ps_idle_ms/h3/w1/v6</property>
      <property value="-101.293">fsim/tables/ps_idle_ms/h3/w1/v7</property>
      <property value="-124.626">fsim/tables/ps_idle_ms/h3/w1/v8</property>
      <property value="-149.303">fsim/tables/ps_idle_ms/h3/w1/v9</property>
      <property value="-29.9146">fsim/tables/ps_idle_ms/h3/w2/v0</property>
      <property value="-24.8293">fsim/tables/ps_idle_ms/h3/w2/v1</property>
      <property value="-150.671">fsim/tables/ps_idle_ms/h3/w2/v10</property>
      <property value="-176.219">fsim/tables/ps_idle_ms/h3/w2/v11</property>
      <property value="-204.432">fsim/tables/ps_idle_ms/h3/w2/v12</property>
      <property value="-235.817">fsim/tables/ps_idle_ms/h3/w2/v13</property>
      <property value="-270.526">fsim/tables/ps_idle_ms/h3/w2/v14</property>
      <property value="-301.125">fsim/tables/ps_idle_ms/h3/w2/v15</property>
      <property value="-22.8263">fsim/tables/ps_idle_ms/h3/w2/v2</property>
      <property value="-22.7431">fsim/tables/ps_idle_ms/h3/w2/v3</property>
      <property value="-24.0235">fsim/tables/ps_idle_ms/h3/w2/v4</property>
      <property value="-30.6224">fsim/tables/ps_idle_ms/h3/w2/v5</property>
      <property value="-53.9774">fsim/tables/ps_idle_ms/h3/w2/v6</property>
      <property value="-84.2854">fsim/tables/ps_idle_ms/h3/w2/v7</property>
      <property value="-106.432">fsim/tables/ps_idle_ms/h3/w2/v8</property>
      <property value="-127.826">fsim/tables/ps_idle_ms/h3/w2/v9</property>
      <property value="-24.9194">fsim/tables/ps_idle_ms/h4/w0/v0</property>
      <property value="-22.6062">fsim/tables/ps_idle_ms/h4/w0/v1</property>
      <property value="-171.484">fsim/tables/ps_idle_ms/h4/w0/v10</property>
      <property value="-199.513">fsim/tables/ps_idle_ms/h4/w0/v11</property>
      <property value="-230.586">fsim/tables/ps_idle_ms/h4/w0/v12</property>
      <property value="-264.882">fsim/tables/ps_idle_ms/h4/w0/v13</property>
      <property value="-302.073">fsim/tables/ps_idle_ms/h4/w0/v14</property>
      <property value="-334.292">fsim/tables/ps_idle_ms/h4/w0/v15</property>
      <property value="-22.2855">fsim/tables/ps_idle_ms/h4/w0/v2</property>
      <property value="-23.3922">fsim/tables/ps_idle_ms/h4/w0/v3</property>
      <property value="-27.7312">fsim/tables/ps_idle_ms/h4/w0/v4</property>
      <property value="-47.6354">fsim/tables/ps_idle_ms/h4/w0/v5</property>
      <property value="-78.2126">fsim/tables/ps_idle_ms/h4/w0/v6</property>
      <property value="-102.265">fsim/tables/ps_idle_ms/h4/w0/v7</property>
      <property value="-123.535">fsim/tables/ps_idle_ms/h4/w0/v8</property>
      <property value="-146.217">fsim/tables/ps_idle_ms/h4/w0/v9</property>
      <property value="-28.9121">fsim/tables/ps_idle_ms/h4/w1/v0</property>
      <property value="-25.374">fsim/tables/ps_idle_ms/h4/w1/v1</property>
      <property value="-145.392">fsim/tables/ps_idle_ms/h4/w1/v10</property>
      <property value="-168.159">fsim/tables/ps_idle_ms/h4/w1/v11</property>
      <property value="-193.124">fsim/tables/ps_idle_ms/h4/w1/v12</property>
      <property value="-220.803">fsim/tables/ps_idle_ms/h4/w1/v13</property>
      <property value="-250.931">fsim/tables/ps_idle_ms/h4/w1/v14</property>
      <property value="-278.655">fsim/tables/ps_idle_ms/h4/w1/v15</property>
      <property value="-24.118">fsim/tables/ps_idle_ms/h4/w1/v2</property>
      <property value="-24.3424">fsim/tables/ps_idle_ms/h4/w1/v3</property>
      <property value="-27.2714">fsim/tables/ps_idle_ms/h4/w1/v4</property>
      <property value="-42.2725">fsim/tables/ps_idle_ms/h4/w1/v5</property>
      <property value="-67.6827">fsim/tables/ps_idle_ms/h4/w1/v6</property>
      <property value="-88.9871">fsim/tables/ps_idle_ms/h4/w1/v7</property>
      <property value="-106.259">fsim/tables/ps_idle_ms/h4/w1/v8</property>
      <property value="-124.908">fsim/tables/ps_idle_ms/h4/w1/v9</property>
      <property value="-33.6493">fsim/tables/ps_idle_ms/h4/w2/v0</property>
      <property value="-28.7354">fsim/tables/ps_idle_ms/h4/w2/v1</property>
      <property value="-124.598">fsim/tables/ps_idle_ms/h4/w2/v10</property>
      <property value="-143.234">fsim/tables/ps_idle_ms/h4/w2/v11</property>
      <property value="-163.189">fsim/tables/ps_idle_ms/h4/w2/v12</property>
      <property value="-185.195">fsim/tables/ps_idle_ms/h4/w2/v13</property>
      <property value="-209.933">fsim/tables/ps_idle_ms/h4/w2/v14</property>
      <property value="-233.779">fsim/tables/ps_idle_ms/h4/w2/v15</property>
      <property value="-26.4021">fsim/tables/ps_idle_ms/h4/w2/v2</property>
      <property value="-25.7592">fsim/tables/ps_idle_ms/h4/w2/v3</property>
      <property value="-27.0881">fsim/tables/ps_idle_ms/h4/w2/v4</property>
      <property value="-37.4625">fsim/tables/ps_idle_ms/h4/w2/v5</property>
      <property value="-57.8381">fsim/tables/ps_idle_ms/h4/w2/v6</property>
      <property value="-77.7954">fsim/tables/ps_idle_ms/h4/w2/v7</property>
      <property value="-92.7511">fsim/tables/ps_idle_ms/h4/w2/v8</property>
      <property value="-108.063">fsim/tables/ps_idle_ms/h4/w2/v9</property>
      <property value="-27.9956">fsim/tables/ps_idle_ms/h5/w0/v0</property>
      <property value="-24.7509">fsim/tables/ps_idle_ms/h5/w0/v1</property>
      <property value="-157.936">fsim/tables/ps_idle_ms/h5/w0/v10</property>
      <property value="-182.944">fsim/tables/ps_idle_ms/h5/w0/v11</property>
      <property value="-210.698">fsim/tables/ps_idle_ms/h5/w0/v12</property>
      <property value="-241.202">fsim/tables/ps_idle_ms/h5/w0/v13</property>
      <property value="-274.301">fsim/tables/ps_idle_ms/h5/w0/v14</property>
      <property value="-304.493">fsim/tables/ps_idle_ms/h5/w0/v15</property>
      <property value="-23.8664">fsim/tables/ps_idle_ms/h5/w0/v2</property>
      <property value="-24.5861">fsim/tables/ps_idle_ms/h5/w0/v3</property>
      <property value="-29.9311">fsim/tables/ps_idle_ms/h5/w0/v4</property>
      <property value="-49.8557">fsim/tables/ps_idle_ms/h5/w0/v5</property>
      <property value="-76.4311">fsim/tables/ps_idle_ms/h5/w0/v6</property>
      <property value="-96.1622">fsim/tables/ps_idle_ms/h5/w0/v7</property>
      <property value="-115.03">fsim/tables/ps_idle_ms/h5/w0/v8</property>
      <property value="-135.212">fsim/tables/ps_idle_ms/h5/w0/v9</property>
      <property value="-31.5983">fsim/tables/ps_idle_ms/h5/w1/v0</property>
      <property value="-27.757">fsim/tables/ps_idle_ms/h5/w1/v1</property>
      <property value="-132.931">fsim/tables/ps_idle_ms/h5/w1/v10</property>
      <property value="-152.539">fsim/tables/ps_idle_ms/h5/w1/v11</property>
      <property value="-173.534">fsim/tables/ps_idle_ms/h5/w1/v12</property>
      <property value="-197.191">fsim/tables/ps_idle_ms/h5/w1/v13</property>
      <property value="-222.96">fsim/tables/ps_idle_ms/h5/w1/v14</property>
      <property value="-247.922">fsim/tables/ps_idle_ms/h5/w1/v15</property>
      <property value="-26.0838">fsim/tables/ps_idle_ms/h5/w1/v2</property>
      <property value="-26.0555">fsim/tables/ps_idle_ms/h5/w1/v3</property>
      <property value="-29.977">fsim/tables/ps_idle_ms/h5/w1/v4</property>
      <property value="-45.282">fsim/tables/ps_idle_ms/h5/w1/v5</property>
      <property value="-66.8165">fsim/tables/ps_idle_ms/h5/w1/v6</property>
      <property value="-84.5806">fsim/tables/ps_idle_ms/h5/w1/v7</property>
      <property value="-99.3546">fsim/tables/ps_idle_ms/h5/w1/v8</property>
      <property value="-115.199">fsim/tables/ps_idle_ms/h5/w1/v9</property>
      <property value="-36.3518">fsim/tables/ps_idle_ms/h5/w2/v0</property>
      <property value="-31.3906">fsim/tables/ps_idle_ms/h5/w2/v1</property>
      <property value="-114.506">fsim/tables/ps_idle_ms/h5/w2/v10</property>
      <property value="-130.515">fsim/tables/ps_idle_ms/h5/w2/v11</property>
      <property value="-147.376">fsim/tables/ps_idle_ms/h5/w2/v12</property>
      <property value="-165.779">fsim/tables/ps_idle_ms/h5/w2/v13</property>
      <property value="-186.548">fsim/tables/ps_idle_ms/h5/w2/v14</property>
      <property value="-207.329">fsim/tables/ps_idle_ms/h5/w2/v15</property>
      <property value="-28.7687">fsim/tables/ps_idle_ms/h5/w2/v2</property>
      <property value="-27.8465">fsim/tables/ps_idle_ms/h5/w2/v3</property>
      <property value="-29.9144">fsim/tables/ps_idle_ms/h5/w2/v4</property>
      <property value="-40.7918">fsim/tables/ps_idle_ms/h5/w2/v5</property>
      <property value="-58.5351">fsim/tables/ps_idle_ms/h5/w2/v6</property>
      <property value="-74.9561">fsim/tables/ps_idle_ms/h5/w2/v7</property>
      <property value="-87.2333">fsim/tables/ps_idle_ms/h5/w2/v8</property>
      <property value="-100.299">fsim/tables/ps_idle_ms/h5/w2/v9</property>
      <property value="-34.1345">fsim/tables/ps_idle_ms/h6/w0/v0</property>
      <property value="-30.0377">fsim/tables/ps_idle_ms/h6/w0/v1</property>
      <property value="-115.554">fsim/tables/ps_idle_ms/h6/w0/v10</property>
      <property value="-131.289">fsim/tables/ps_idle_ms/h6/w0/v11</property>
      <property value="-147.848">fsim/tables/ps_idle_ms/h6/w0/v12</property>
      <property value="-165.885">fsim/tables/ps_idle_ms/h6/w0/v13</property>
      <property value="-186.148">fsim/tables/ps_idle_ms/h6/w0/v14</property>
      <property value="-206.357">fsim/tables/ps_idle_ms/h6/w0/v15</property>
      <property value="-28.1064">fsim/tables/ps_idle_ms/h6/w0/v2</property>
      <property value="-27.6592">fsim/tables/ps_idle_ms/h6/w0/v3</property>
      <property value="-30.9776">fsim/tables/ps_idle_ms/h6/w0/v4</property>
      <property value="-43.2827">fsim/tables/ps_idle_ms/h6/w0/v5</property>
      <property value="-60.7919">fsim/tables/ps_idle_ms/h6/w0/v6</property>
      <property value="-76.4745">fsim/tables/ps_idle_ms/h6/w0/v7</property>
      <property value="-88.6344">fsim/tables/ps_idle_ms/h6/w0/v8</property>
      <property value="-101.534">fsim/tables/ps_idle_ms/h6/w0/v9</property>
      <property value="-38.9126">fsim/tables/ps_idle_ms/h6/w1/v0</property>
      <property value="-34.2929">fsim/tables/ps_idle_ms/h6/w1/v1</property>
      <property value="-94.8679">fsim/tables/ps_idle_ms/h6/w1/v10</property>
      <property value="-105.578">fsim/tables/ps_idle_ms/h6/w1/v11</property>
      <property value="-117.459">fsim/tables/ps_idle_ms/h6/w1/v12</property>
      <property value="-129.836">fsim/tables/ps_idle_ms/h6/w1/v13</property>
      <property value="-143.693">fsim/tables/ps_idle_ms/h6/w1/v14</property>
      <property value="-159.546">fsim/tables/ps_idle_ms/h6/w1/v15</property>
      <property value="-31.5712">fsim/tables/ps_idle_ms/h6/w1/v2</property>
      <property value="-30.3692">fsim/tables/ps_idle_ms/h6/w1/v3</property>
      <property value="-31.6507">fsim/tables/ps_idle_ms/h6/w1/v4</property>
      <property value="-38.9673">fsim/tables/ps_idle_ms/h6/w1/v5</property>
      <property value="-51.3465">fsim/tables/ps_idle_ms/h6/w1/v6</property>
      <property value="-64.9953">fsim/tables/ps_idle_ms/h6/w1/v7</property>
      <property value="-75.9948">fsim/tables/ps_idle_ms/h6/w1/v8</property>
      <property value="-85.055">fsim/tables/ps_idle_ms/h6/w1/v9</property>
      <property value="-34.5075">fsim/tables/ps_idle_ms/h6/w2/v0</property>
      <property value="-33.342">fsim/tables/ps_idle_ms/h6/w2/v1</property>
      <property value="-86.1569">fsim/tables/ps_idle_ms/h6/w2/v10</property>
      <property value="-92.4363">fsim/tables/ps_idle_ms/h6/w2/v11</property>
      <property value="-99.1961">fsim/tables/ps_idle_ms/h6/w2/v12</property>
      <property value="-106.911">fsim/tables/ps_idle_ms/h6/w2/v13</property>
      <property value="-115.854">fsim/tables/ps_idle_ms/h6/w2/v14</property>
      <property value="-125.361">fsim/tables/ps_idle_ms/h6/w2/v15</property>
      <property value="-33.6156">fsim/tables/ps_idle_ms/h6/w2/v2</property>
      <property value="-36.7358">fsim/tables/ps_idle_ms/h6/w2/v3</property>
      <property value="-42.9595">fsim/tables/ps_idle_ms/h6/w2/v4</property>
      <property value="-50.874">fsim/tables/ps_idle_ms/h6/w2/v5</property>
      <property value="-59.9567">fsim/tables/ps_idle_ms/h6/w2/v6</property>
      <property value="-68.3719">fsim/tables/ps_idle_ms/h6/w2/v7</property>
      <property value="-74.5157">fsim/tables/ps_idle_ms/h6/w2/v8</property>
      <property value="-80.0981">fsim/tables/ps_idle_ms/h6/w2/v9</property>
      <property value="-40.6885">fsim/tables/ps_idle_ms/h7/w0/v0</property>
      <property value="-36.5368">fsim/tables/ps_idle_ms/h7/w0/v1</property>
      <property value="-90.7193">fsim/tables/ps_idle_ms/h7/w0/v10</property>
      <property value="-99.9513">fsim/tables/ps_idle_ms/h7/w0/v11</property>
      <property value="-110.108">fsim/tables/ps_idle_ms/h7/w0/v12</property>
      <property value="-120.628">fsim/tables/ps_idle_ms/h7/w0/v13</property>
      <property value="-132.34">fsim/tables/ps_idle_ms/h7/w0/v14</property>
      <property value="-145.966">fsim/tables/ps_idle_ms/h7/w0/v15</property>
      <property value="-33.8684">fsim/tables/ps_idle_ms/h7/w0/v2</property>
      <property value="-32.8295">fsim/tables/ps_idle_ms/h7/w0/v3</property>
      <property value="-35.2174">fsim/tables/ps_idle_ms/h7/w0/v4</property>
      <property value="-43.2325">fsim/tables/ps_idle_ms/h7/w0/v5</property>
      <property value="-53.9892">fsim/tables/ps_idle_ms/h7/w0/v6</property>
      <property value="-65.7355">fsim/tables/ps_idle_ms/h7/w0/v7</property>
      <property value="-74.449">fsim/tables/ps_idle_ms/h7/w0/v8</property>
      <property value="-82.2484">fsim/tables/ps_idle_ms/h7/w0/v9</property>
      <property value="-37.8105">fsim/tables/ps_idle_ms/h7/w1/v0</property>
      <property value="-36.8165">fsim/tables/ps_idle_ms/h7/w1/v1</property>
      <property value="-77.5816">fsim/tables/ps_idle_ms/h7/w1/v10</property>
      <property value="-81.5947">fsim/tables/ps_idle_ms/h7/w1/v11</property>
      <property value="-85.8948">fsim/tables/ps_idle_ms/h7/w1/v12</property>
      <property value="-91.0799">fsim/tables/ps_idle_ms/h7/w1/v13</property>
      <property value="-97.7372">fsim/tables/ps_idle_ms/h7/w1/v14</property>
      <property value="-105.418">fsim/tables/ps_idle_ms/h7/w1/v15</property>
      <property value="-37.4741">fsim/tables/ps_idle_ms/h7/w1/v2</property>
      <property value="-40.2567">fsim/tables/ps_idle_ms/h7/w1/v3</property>
      <property value="-44.6993">fsim/tables/ps_idle_ms/h7/w1/v4</property>
      <property value="-50.0739">fsim/tables/ps_idle_ms/h7/w1/v5</property>
      <property value="-56.9542">fsim/tables/ps_idle_ms/h7/w1/v6</property>
      <property value="-63.8983">fsim/tables/ps_idle_ms/h7/w1/v7</property>
      <property value="-69.778">fsim/tables/ps_idle_ms/h7/w1/v8</property>
      <property value="-73.6335">fsim/tables/ps_idle_ms/h7/w1/v9</property>
      <property value="-41.3234">fsim/tables/ps_idle_ms/h7/w2/v0</property>
      <property value="-41.2789">fsim/tables/ps_idle_ms/h7/w2/v1</property>
      <property value="-52.3719">fsim/tables/ps_idle_ms/h7/w2/v10</property>
      <property value="-55.1526">fsim/tables/ps_idle_ms/h7/w2/v11</property>
      <property value="-58.2885">fsim/tables/ps_idle_ms/h7/w2/v12</property>
      <property value="-61.7645">fsim/tables/ps_idle_ms/h7/w2/v13</property>
      <property value="-65.4819">fsim/tables/ps_idle_ms/h7/w2/v14</property>
      <property value="-67.8579">fsim/tables/ps_idle_ms/h7/w2/v15</property>
      <property value="-41.4305">fsim/tables/ps_idle_ms/h7/w2/v2</property>
      <property value="-42.0596">fsim/tables/ps_idle_ms/h7/w2/v3</property>
      <property value="-42.9802">fsim/tables/ps_idle_ms/h7/w2/v4</property>
      <property value="-44.004">fsim/tables/ps_idle_ms/h7/w2/v5</property>
      <property value="-45.248">fsim/tables/ps_idle_ms/h7/w2/v6</property>
      <property value="-46.5689">fsim/tables/ps_idle_ms/h7/w2/v7</property>
      <property value="-48.0086">fsim/tables/ps_idle_ms/h7/w2/v8</property>
      <property value="-49.9233">fsim/tables/ps_idle_ms/h7/w2/v9</property>
      <property value="379.186">fsim/tables/reach_tas_ms/h0/w0</property>
      <property value="378.916">fsim/tables/reach_tas_ms/h0/w1</property>
      <property value="378.588">fsim/tables/reach_tas_ms/h0/w2</property>
      <property value="413.747">fsim/tables/reach_tas_ms/h1/w0</property>
      <property value="412.533">fsim/tables/reach_tas_ms/h1/w1</property>
      <property value="411.218">fsim/tables/reach_tas_ms/h1/w2</property>
      <property value="466.785">fsim/tables/reach_tas_ms/h2/w0</property>
      <property value="461.69">fsim/tables/reach_tas_ms/h2/w1</property>
      <property value="457.684">fsim/tables/reach_tas_ms/h2/w2</property>
      <property value="531.937">fsim/tables/reach_tas_ms/h3/w0</property>
      <property value="524.91">fsim/tables/reach_tas_ms/h3/w1</property>
      <property value="517.932">fsim/tables/reach_tas_ms/h3/w2</property>
      <property value="534.567">fsim/tables/reach_tas_ms/h4/w0</property>
      <property value="522.739">fsim/tables/reach_tas_ms/h4/w1</property>
      <property value="508.469">fsim/tables/reach_tas_ms/h4/w2</property>
      <property value="538.972">fsim/tables/reach_tas_ms/h5/w0</property>
      <property value="521.584">fsim/tables/reach_tas_ms/h5/w1</property>
      <property value="505.03">fsim/tables/reach_tas_ms/h5/w2</property>
      <property value="503.068">fsim/tables/reach_tas_ms/h6/w0</property>
      <property value="471.391">fsim/tables/reach_tas_ms/h6/w1</property>
      <property value="437.904">fsim/tables/reach_tas_ms/h6/w2</property>
      <property value="452.311">fsim/tables/reach_tas_ms/h7/w0</property>
      <property value="393.757">fsim/tables/reach_tas_ms/h7/w1</property>
      <property value="0.0">fsim/tables/speed_fraction/v0</property>
      <property value="0.0666667">fsim/tables/speed_fraction/v1</property>
      <property value="0.666667">fsim/tables/speed_fraction/v10</property>
      <property value="0.733333">fsim/tables/speed_fraction/v11</property>
      <property value="0.8">fsim/tables/speed_fraction/v12</property>
      <property value="0.866667">fsim/tables/speed_fraction/v13</property>
      <property value="0.933333">fsim/tables/speed_fraction/v14</property>
      <property value="1">fsim/tables/speed_fraction/v15</property>
      <property value="0.133333">fsim/tables/speed_fraction/v2</property>
      <property value="0.2">fsim/tables/speed_fraction/v3</property>
      <property value="0.266667">fsim/tables/speed_fraction/v4</property>
      <property value="0.333333">fsim/tables/speed_fraction/v5</property>
      <property value="0.4">fsim/tables/speed_fraction/v6</property>
      <property value="0.466667">fsim/tables/speed_fraction/v7</property>
      <property value="0.533333">fsim/tables/speed_fraction/v8</property>
      <property value="0.6">fsim/tables/speed_fraction/v9</property>
      <property value="55.2689">fsim/tables/stall_cas_ms/h0/w0</property>
      <property value="59.6782">fsim/tables/stall_cas_ms/h0/w1</property>
      <property value="63.7835">fsim/tables/stall_cas_ms/h0/w2</property>
      <property value="56.0665">fsim/tables/stall_cas_ms/h1/w0</property>
      <property value="60.5395">fsim/tables/stall_cas_ms/h1/w1</property>
      <property value="64.7041">fsim/tables/stall_cas_ms/h1/w2</property>
      <property value="57.2629">fsim/tables/stall_cas_ms/h2/w0</property>
      <property value="61.8313">fsim/tables/stall_cas_ms/h2/w1</property>
      <property value="66.0847">fsim/tables/stall_cas_ms/h2/w2</property>
      <property value="58.8268">fsim/tables/stall_cas_ms/h3/w0</property>
      <property value="63.5201">fsim/tables/stall_cas_ms/h3/w1</property>
      <property value="67.8896">fsim/tables/stall_cas_ms/h3/w2</property>
      <property value="59.2277">fsim/tables/stall_cas_ms/h4/w0</property>
      <property value="63.9529">fsim/tables/stall_cas_ms/h4/w1</property>
      <property value="68.3522">fsim/tables/stall_cas_ms/h4/w2</property>
      <property value="59.4745">fsim/tables/stall_cas_ms/h5/w0</property>
      <property value="64.2194">fsim/tables/stall_cas_ms/h5/w1</property>
      <property value="68.6371">fsim/tables/stall_cas_ms/h5/w2</property>
      <property value="59.8423">fsim/tables/stall_cas_ms/h6/w0</property>
      <property value="64.6165">fsim/tables/stall_cas_ms/h6/w1</property>
      <property value="69.0615">fsim/tables/stall_cas_ms/h6/w2</property>
      <property value="60.6283">fsim/tables/stall_cas_ms/h7/w0</property>
      <property value="65.4653">fsim/tables/stall_cas_ms/h7/w1</property>
      <property value="69.9687">fsim/tables/stall_cas_ms/h7/w2</property>
      <property value="17148.3">fsim/tables/weight_kg/w0</property>
      <property value="19993.6">fsim/tables/weight_kg/w1</property>
      <property value="22839">fsim/tables/weight_kg/w2</property>
      <channel name="Pitch (fly-by-wire)">
        <!-- hangar: load factor command, alpha and pitch-rate inner loop (hangar/fcs.py) -->
        <summer name="fcs/pitch-trim-sum">
          <input>fcs/elevator-cmd-norm</input>
          <input>fcs/pitch-trim-cmd-norm</input>
          <clipto> <min>-1</min> <max>1</max> </clipto>
        </summer>
        <!-- the integrators are reset below 60 kt and while a wheel carries weight
             (on the ground, taking off and landing) -->
        <switch name="fcs/fbw/reset">
          <default value="0"/>
          <test logic="OR" value="-1">
            velocities/vc-kts lt 60
            gear/wow gt 0
          </test>
        </switch>
        <fcs_function name="fcs/fbw/k-alpha">
          <function>
            <table>
              <independentVar lookup="row">aero/qbar-psf</independentVar>
              <independentVar lookup="column">velocities/mach</independentVar>
              <tableData>
                       0.150     0.400     0.700     0.900     1.100     1.400     2.000
              10.0  -6.00000  -6.00000  -6.00000  -6.00000  -6.00000  -6.00000  -6.00000
              20.0  -6.00000  -6.00000  -5.77654  -5.04594  -4.82698  -5.61343  -6.00000
              40.0  -2.91560  -3.16881  -2.98264  -2.62814  -2.20033  -2.79282  -4.20916
              80.0  -1.05073  -1.44147  -1.53340  -1.51990  -0.98606  -0.53819  -1.34618
             150.0  -0.92965  -1.36677  -1.49825  -1.49326  -0.95672  -0.51602  -0.49070
             300.0  -0.83477  -1.21290  -1.38512  -1.39530  -0.88201  -0.47294  -0.46684
             600.0  -0.98057  -1.03719  -1.24458  -1.27758  -0.79122  -0.41644  -0.43253
            1200.0  -2.12527  -0.64348  -0.72016  -0.69785  -0.14823   0.00202  -0.38969
            2400.0  -6.00000  -0.64946  -0.39797  -0.37667   0.23270   0.50771   0.24736
              </tableData>
            </table>
          </function>
        </fcs_function>
        <fcs_function name="fcs/fbw/k-q">
          <function>
            <table>
              <independentVar lookup="row">aero/qbar-psf</independentVar>
              <independentVar lookup="column">velocities/mach</independentVar>
              <tableData>
                       0.150     0.400     0.700     0.900     1.100     1.400     2.000
              10.0  -3.00000  -3.00000  -3.00000  -3.00000  -3.00000  -3.00000  -3.00000
              20.0  -3.00000  -3.00000  -3.00000  -3.00000  -3.00000  -3.00000  -3.00000
              40.0  -2.61322  -2.97925  -2.82802  -2.48829  -2.43740  -2.93745  -3.00000
              80.0  -0.70485  -1.10905  -1.15031  -1.07345  -1.10334  -1.18940  -1.97608
             150.0  -0.36750  -0.75012  -0.80656  -0.75866  -0.78535  -0.85140  -1.04366
             300.0  -0.08637  -0.45974  -0.52664  -0.50220  -0.52672  -0.58061  -0.72750
             600.0   0.12837  -0.25678  -0.33152  -0.32420  -0.34761  -0.39086  -0.49809
            1200.0   0.40392  -0.06431  -0.13865  -0.13628  -0.15382  -0.21603  -0.33980
            2400.0   0.94581   0.08470  -0.00765  -0.02224  -0.04136  -0.08375  -0.16166
              </tableData>
            </table>
          </function>
        </fcs_function>
        <fcs_function name="fcs/fbw/k-ff">
          <function>
            <table>
              <independentVar lookup="row">aero/qbar-psf</independentVar>
              <independentVar lookup="column">velocities/mach</independentVar>
              <tableData>
                       0.150     0.400     0.700     0.900     1.100     1.400     2.000
              10.0  -0.30000  -0.30000  -0.30000  -0.30000  -0.30000  -0.30000  -0.30000
              20.0  -0.30000  -0.30000  -0.30000  -0.30000  -0.30000  -0.30000  -0.30000
              40.0  -0.30000  -0.30000  -0.30000  -0.30000  -0.30000  -0.30000  -0.30000
              80.0  -0.30000  -0.30000  -0.30000  -0.30000  -0.30000  -0.30000  -0.30000
             150.0  -0.23890  -0.23238  -0.21321  -0.18488  -0.20732  -0.26945  -0.30000
             300.0  -0.11934  -0.11605  -0.10641  -0.09224  -0.10352  -0.13512  -0.19900
             600.0  -0.05970  -0.05805  -0.05323  -0.04615  -0.05180  -0.06762  -0.09993
            1200.0  -0.02135  -0.02027  -0.01733  -0.01360  -0.01471  -0.02447  -0.05007
            2400.0  -0.00525  -0.00498  -0.00426  -0.00334  -0.00361  -0.00602  -0.01349
              </tableData>
            </table>
          </function>
        </fcs_function>
        <fcs_function name="fcs/fbw/k-i">
          <function>
            <table>
              <independentVar lookup="row">aero/qbar-psf</independentVar>
              <independentVar lookup="column">velocities/mach</independentVar>
              <tableData>
                       0.150     0.400     0.700     0.900     1.100     1.400     2.000
              10.0  -0.60000  -0.60000  -0.60000  -0.60000  -0.60000  -0.60000  -0.60000
              20.0  -0.60000  -0.60000  -0.60000  -0.60000  -0.60000  -0.60000  -0.60000
              40.0  -0.60000  -0.60000  -0.60000  -0.60000  -0.60000  -0.60000  -0.60000
              80.0  -0.44082  -0.42948  -0.39607  -0.34561  -0.38615  -0.48501  -0.60000
             150.0  -0.23890  -0.23238  -0.21321  -0.18488  -0.20732  -0.26945  -0.38198
             300.0  -0.11934  -0.11605  -0.10641  -0.09224  -0.10352  -0.13512  -0.19900
             600.0  -0.05970  -0.05805  -0.05323  -0.04615  -0.05180  -0.06762  -0.09993
            1200.0  -0.02135  -0.02027  -0.01733  -0.01360  -0.01471  -0.02447  -0.05007
            2400.0  -0.00525  -0.00498  -0.00426  -0.00334  -0.00361  -0.00602  -0.01349
              </tableData>
            </table>
          </function>
        </fcs_function>
        <fcs_function name="fcs/fbw/n-alpha">
          <function>
            <table>
              <independentVar lookup="row">aero/qbar-psf</independentVar>
              <independentVar lookup="column">velocities/mach</independentVar>
              <tableData>
                       0.150     0.400     0.700     0.900     1.100     1.400     2.000
              10.0   1.00000   1.00000   1.00000   1.00000   1.00000   1.00000   1.00000
              20.0   1.00000   1.00000   1.00000   1.00000   1.00000   1.00000   1.00000
              40.0   1.00000   1.00000   1.00000   1.00000   1.00000   1.00000   1.00000
              80.0   3.15896   3.24286   3.49991   3.90389   4.06778   3.11879   1.31127
             150.0   6.31806   6.47422   6.95290   7.68507   7.97233   6.24291   4.00616
             300.0  12.69439  12.99014  13.90194  15.29521  15.84071  12.55355   8.39835
             600.0  25.02628  25.61256  27.42010  30.23653  31.37056  24.74707  16.65280
            1200.0  50.45477  51.67239  55.42637  61.22959  63.56143  49.87490  33.05879
            2400.0 102.80318 105.30688 113.02599 124.88587 129.54955 101.61081  67.03285
              </tableData>
            </table>
          </function>
        </fcs_function>
        <!-- the pitching moment's departures from a straight line through the
             angle-of-attack envelope (+0.189 per rad about the CG), cancelled by the
             elevator: the gains are designed on the line -->
        <fcs_function name="fcs/fbw/moment-comp">
          <function>
            <table>
              <independentVar lookup="row">aero/alpha-rad</independentVar>
              <independentVar lookup="column">velocities/mach</independentVar>
              <tableData>
                       0.150     0.400     0.700     0.900     1.100     1.400     2.000
          -0.17453  -0.01331  -0.01293  -0.01183  -0.01028  -0.01015  -0.01194  -0.01747
          -0.15708  -0.00885  -0.00859  -0.00786  -0.00683  -0.00674  -0.00793  -0.01161
          -0.13963  -0.00529  -0.00514  -0.00471  -0.00409  -0.00404  -0.00475  -0.00695
          -0.12217   0.00003   0.00003   0.00003   0.00003   0.00003   0.00003   0.00005
          -0.10472   0.00351   0.00341   0.00312   0.00271   0.00267   0.00315   0.00460
          -0.08727   0.03959   0.03845   0.03519   0.03056   0.03018   0.03551   0.05195
          -0.06981   0.06066   0.05892   0.05391   0.04683   0.04624   0.05441   0.07960
          -0.05236   0.02625   0.02550   0.02333   0.02027   0.02001   0.02355   0.03445
          -0.03491   0.00300   0.00291   0.00266   0.00231   0.00228   0.00269   0.00393
          -0.01745  -0.00463  -0.00450  -0.00412  -0.00358  -0.00353  -0.00416  -0.00608
           0.00000  -0.00894  -0.00868  -0.00795  -0.00690  -0.00681  -0.00802  -0.01173
           0.01745  -0.01122  -0.01090  -0.00997  -0.00866  -0.00855  -0.01006  -0.01472
           0.03491  -0.01293  -0.01256  -0.01149  -0.00998  -0.00986  -0.01160  -0.01697
           0.05236  -0.01420  -0.01380  -0.01262  -0.01096  -0.01083  -0.01274  -0.01864
           0.06981  -0.01494  -0.01451  -0.01328  -0.01154  -0.01139  -0.01340  -0.01961
           0.08727  -0.01599  -0.01553  -0.01421  -0.01235  -0.01219  -0.01434  -0.02099
           0.10472  -0.01671  -0.01624  -0.01486  -0.01290  -0.01274  -0.01499  -0.02193
           0.12217  -0.01713  -0.01664  -0.01522  -0.01322  -0.01305  -0.01536  -0.02247
           0.13963  -0.01706  -0.01657  -0.01516  -0.01317  -0.01300  -0.01530  -0.02239
           0.15708  -0.01622  -0.01576  -0.01442  -0.01252  -0.01237  -0.01455  -0.02129
           0.17453  -0.01483  -0.01440  -0.01318  -0.01145  -0.01130  -0.01330  -0.01946
           0.19199  -0.01264  -0.01228  -0.01123  -0.00976  -0.00963  -0.01134  -0.01659
           0.20944  -0.00997  -0.00968  -0.00886  -0.00769  -0.00760  -0.00894  -0.01308
           0.22689  -0.00626  -0.00608  -0.00556  -0.00483  -0.00477  -0.00562  -0.00822
           0.24435  -0.00229  -0.00222  -0.00203  -0.00176  -0.00174  -0.00205  -0.00300
           0.26180   0.00229   0.00223   0.00204   0.00177   0.00175   0.00206   0.00301
           0.27925   0.00706   0.00686   0.00628   0.00545   0.00538   0.00633   0.00927
           0.29671   0.01085   0.01054   0.00964   0.00838   0.00827   0.00973   0.01424
           0.31416   0.01466   0.01424   0.01303   0.01132   0.01118   0.01315   0.01924
           0.33161   0.01547   0.01502   0.01375   0.01194   0.01179   0.01387   0.02030
           0.34907   0.01580   0.01535   0.01404   0.01220   0.01204   0.01417   0.02073
           0.36652   0.01489   0.01446   0.01323   0.01149   0.01135   0.01335   0.01953
           0.38397   0.01357   0.01318   0.01206   0.01048   0.01035   0.01217   0.01781
           0.40143   0.01181   0.01147   0.01050   0.00912   0.00900   0.01060   0.01550
           0.41888   0.00960   0.00932   0.00853   0.00741   0.00731   0.00861   0.01259
           0.43633   0.00706   0.00685   0.00627   0.00545   0.00538   0.00633   0.00926
           0.45379   0.00410   0.00399   0.00365   0.00317   0.00313   0.00368   0.00539
           0.47124   0.00000   0.00000   0.00000   0.00000   0.00000   0.00000   0.00000
           0.48869  -0.00778  -0.00756  -0.00692  -0.00601  -0.00593  -0.00698  -0.01021
           0.50615  -0.00509  -0.00494  -0.00452  -0.00393  -0.00388  -0.00456  -0.00668
           0.52360  -0.00209  -0.00203  -0.00185  -0.00161  -0.00159  -0.00187  -0.00274
           0.55851  -0.00334  -0.00324  -0.00296  -0.00257  -0.00254  -0.00299  -0.00438
           0.61087  -0.01901  -0.01847  -0.01690  -0.01468  -0.01449  -0.01705  -0.02495
              </tableData>
            </table>
          </function>
        </fcs_function>
        <!-- the gravity reference: the load factor that holds the flight path -->
        <fcs_function name="fcs/fbw/g-ref">
          <function>
            <product>
              <cos><property>attitude/theta-rad</property></cos>
              <cos><property>attitude/phi-rad</property></cos>
            </product>
          </function>
        </fcs_function>
        <!-- stick to load factor beyond the gravity reference, aft (negative) to n_max,
             no more than the lift at the angle-of-attack limits gives - beyond the
             gravity reference of the moment, so that full aft stick still reaches
             the limit in a steep climb or inverted - through a 0.2 s prefilter and
             a 12 g/s onset limit (a full pull at once pitches an agile airframe
             faster than its nose-down control can stop at the angle-of-attack
             limit) -->
        <fcs_function name="fcs/fbw/dn-stick">
          <function>
            <max>
              <min>
                <table>
                  <independentVar lookup="row">fcs/pitch-trim-sum</independentVar>
                  <tableData>
                    -1.0  6.500
                     0.0  0.0
                     1.0  -4.000
                  </tableData>
                </table>
                <difference><product><property>fcs/fbw/n-alpha</property><value>0.61087</value></product><property>fcs/fbw/g-ref</property></difference>
              </min>
              <difference><product><property>fcs/fbw/n-alpha</property><value>-0.17453</value></product><property>fcs/fbw/g-ref</property></difference>
            </max>
          </function>
        </fcs_function>
        <lag_filter name="fcs/fbw/dn-lag">
          <input>fcs/fbw/dn-stick</input>
          <c1>5.0</c1>
        </lag_filter>
        <actuator name="fcs/fbw/dn-cmd">
          <input>fcs/fbw/dn-lag</input>
          <rate_limit>12.0</rate_limit>
        </actuator>
        <!-- the response the command should produce (the short period's rise): the
             integrator trims away what differs from it, not the rise itself -->
        <lag_filter name="fcs/fbw/dn-model">
          <input>fcs/fbw/dn-cmd</input>
          <c1>2.5</c1>
        </lag_filter>
        <fcs_function name="fcs/fbw/dn">
          <function>
            <difference><property>accelerations/Nz</property><property>fcs/fbw/g-ref</property></difference>
          </function>
        </fcs_function>
        <!-- the angle of attack with its rise over the next 0.35 s counted as spent
             (the rise, not the pitch rate: in a steady pull the nose turns with the
             flight path and the angle of attack holds), and the load factor the
             angle of attack left to each limit gives -->
        <fcs_function name="fcs/fbw/alpha-ahead">
          <function>
            <sum>
              <property>aero/alpha-rad</property>
              <product><value>0.35</value><property>aero/alphadot-rad_sec</property></product>
            </sum>
          </function>
        </fcs_function>
        <fcs_function name="fcs/fbw/dn-room-up">
          <function>
            <product><property>fcs/fbw/n-alpha</property>
              <difference><value>0.61087</value><property>fcs/fbw/alpha-ahead</property></difference></product>
          </function>
        </fcs_function>
        <fcs_function name="fcs/fbw/dn-room-down">
          <function>
            <product><property>fcs/fbw/n-alpha</property>
              <difference><value>-0.17453</value><property>fcs/fbw/alpha-ahead</property></difference></product>
          </function>
        </fcs_function>
        <!-- the command limited to the load factor the aircraft pulls now plus what
             the angle of attack left gives: at a limit the feedforward asks for the
             load factor the airframe gives there, whatever elevator holds it - a
             steady pull on a stable airframe, a push on an unstable one (a
             feedforward faded out past the limit instead took about 10 deg of
             elevator per deg of alpha, on one side of it only: the actuator's rate
             limit could not follow, and the MiG-29A cycled between 24 and 29 deg) -->
        <fcs_function name="fcs/fbw/dn-limited">
          <function>
            <max>
              <min>
                <property>fcs/fbw/dn-cmd</property>
                <sum><property>fcs/fbw/dn</property><property>fcs/fbw/dn-room-up</property></sum>
              </min>
              <sum><property>fcs/fbw/dn</property><property>fcs/fbw/dn-room-down</property></sum>
            </max>
          </function>
        </fcs_function>
        <!-- the integrator's error: the load factor's departure from the model
             response, and at a limit the angle of attack left, counted five times -
             it trims what the airframe needs there beyond the linear design (vortex
             lift, the tail's power at high alpha) in a fraction of a second, not
             over the pull -->
        <fcs_function name="fcs/fbw/pitch-error">
          <function>
            <max>
              <min>
                <difference><property>fcs/fbw/dn-model</property><property>fcs/fbw/dn</property></difference>
                <product><value>5.0</value><property>fcs/fbw/dn-room-up</property></product>
              </min>
              <product><value>5.0</value><property>fcs/fbw/dn-room-down</property></product>
            </max>
          </function>
        </fcs_function>
        <fcs_function name="fcs/fbw/pitch-error-rate">
          <function><product><property>fcs/fbw/k-i</property><property>fcs/fbw/pitch-error</property></product></function>
        </fcs_function>
        <!-- the integrator: reset below 60 kt and on the wheels, held while the
             elevator is at a stop it would push further into (anti-windup) -->
        <switch name="fcs/fbw/pitch-hold">
          <default value="0"/>
          <test logic="OR" value="-1">
            velocities/vc-kts lt 60
            gear/wow gt 0
          </test>
          <test logic="AND" value="1">
            fcs/fbw/elevator-raw gt 0.34907
            fcs/fbw/pitch-error-rate gt 0
          </test>
          <test logic="AND" value="1">
            fcs/fbw/elevator-raw lt -0.41888
            fcs/fbw/pitch-error-rate lt 0
          </test>
        </switch>
        <integrator name="fcs/fbw/pitch-integral">
          <input>fcs/fbw/pitch-error-rate</input>
          <c1>1.0</c1>
          <trigger>fcs/fbw/pitch-hold</trigger>
          <clipto> <min>-0.5</min> <max>0.5</max> </clipto>
        </integrator>
        <!-- past an angle-of-attack limit (the next 0.35 s counted) a push back
             in proportion, all the travel 4 deg beyond: an unstable airframe
             pitching up fast needs it at once, not when an integrator winds -->
        <fcs_function name="fcs/fbw/alpha-push">
          <function>
            <difference>
              <product><value>5.00000</value>
                <max><value>0</value><difference><property>fcs/fbw/alpha-ahead</property><value>0.61087</value></difference></max></product>
              <product><value>6.00000</value>
                <max><value>0</value><difference><value>-0.17453</value><property>fcs/fbw/alpha-ahead</property></difference></max></product>
            </difference>
          </function>
        </fcs_function>
        <lag_filter name="fcs/fbw/ground">
          <input>gear/wow</input>
          <c1>2.0</c1>
        </lag_filter>
        <fcs_function name="fcs/fbw/ground-direct">
          <function>
            <product>
              <property>fcs/fbw/ground</property>
              <table>
                <independentVar lookup="row">fcs/pitch-trim-sum</independentVar>
                <tableData>
                  -1.0  -0.41888
                   0.0  0.0
                   1.0  0.34907
                </tableData>
              </table>
            </product>
          </function>
        </fcs_function>
        <!-- the elevator: the push, the moment compensation, angle-of-attack and
             pitch-rate feedback, the feedforward of the limited command, the
             integrator, the ground mode's direct stick -->
        <fcs_function name="fcs/fbw/elevator-raw">
          <function>
            <sum>
              <property>fcs/fbw/alpha-push</property>
              <property>fcs/fbw/moment-comp</property>
              <product><value>-1</value><property>fcs/fbw/k-alpha</property><property>aero/alpha-rad</property></product>
              <product><value>-1</value><property>fcs/fbw/k-q</property><property>velocities/q-rad_sec</property></product>
              <product><property>fcs/fbw/k-ff</property><property>fcs/fbw/dn-limited</property></product>
              <property>fcs/fbw/pitch-integral</property>
              <property>fcs/fbw/ground-direct</property>
            </sum>
          </function>
        </fcs_function>
        <pure_gain name="fcs/fbw/elevator">
          <input>fcs/fbw/elevator-raw</input>
          <gain>1.0</gain>
          <clipto> <min>-0.41888</min> <max>0.34907</max> </clipto>
        </pure_gain>
        <!-- full travel in 0.83 s: 60 deg/s for a +-25 deg tail, faster for a
             canard's longer throw -->
        <actuator name="fcs/elevator-actuator">
          <input>fcs/fbw/elevator</input>
          <lag>40</lag>
          <rate_limit>1.050</rate_limit>
          <output>fcs/elevator-pos-rad</output>
        </actuator>
      </channel>
      <channel name="Roll (fly-by-wire)">
        <!-- hangar: roll-rate command about the flight path, limited to what the rudder can
             coordinate; bank hold at neutral stick -->
        <summer name="fcs/roll-trim-sum">
          <input>fcs/aileron-cmd-norm</input>
          <input>fcs/roll-trim-cmd-norm</input>
          <clipto> <min>-1</min> <max>1</max> </clipto>
        </summer>
        <fcs_function name="fcs/fbw/k-roll">
          <function>
            <table>
              <independentVar lookup="row">aero/qbar-psf</independentVar>
              <independentVar lookup="column">velocities/mach</independentVar>
              <tableData>
                       0.150     0.400     0.700     0.900     1.100     1.400     2.000
              10.0   1.50000   1.50000   1.50000   1.50000   1.50000   1.50000   1.50000
              20.0   1.50000   1.50000   1.50000   1.50000   1.50000   1.50000   1.50000
              40.0   1.50000   1.50000   1.50000   1.50000   1.50000   1.50000   1.50000
              80.0   0.88740   1.10776   1.08313   0.97194   1.50000   1.50000   1.50000
             150.0   0.30690   0.51264   0.52660   0.48014   0.75555   1.47410   1.50000
             300.0   0.00000   0.19628   0.22861   0.21371   0.34324   0.69263   1.21001
             600.0   0.00000   0.03962   0.08090   0.08127   0.13813   0.30753   0.57408
            1200.0   0.00000   0.00000   0.00692   0.01492   0.03534   0.11479   0.25743
            2400.0   0.00000   0.00000   0.00000   0.00000   0.00000   0.01799   0.09874
              </tableData>
            </table>
          </function>
        </fcs_function>
        <fcs_function name="fcs/fbw/k-roll-ff">
          <function>
            <table>
              <independentVar lookup="row">aero/qbar-psf</independentVar>
              <independentVar lookup="column">velocities/mach</independentVar>
              <tableData>
                       0.150     0.400     0.700     0.900     1.100     1.400     2.000
              10.0   0.56898   0.21370   0.12230   0.09380   0.12301   0.14280   0.10957
              20.0   0.56898   0.21370   0.12230   0.09380   0.12301   0.14280   0.10957
              40.0   0.56898   0.21370   0.12230   0.09053   0.11433   0.14280   0.10957
              80.0   0.40146   0.14984   0.08428   0.06319   0.08220   0.10107   0.09880
             150.0   0.35239   0.13191   0.07480   0.05671   0.07408   0.08860   0.07344
             300.0   0.33052   0.12398   0.07069   0.05396   0.07065   0.08301   0.06564
             600.0   0.32157   0.12070   0.06896   0.05277   0.06915   0.08073   0.06280
            1200.0   0.31732   0.11914   0.06813   0.05220   0.06844   0.07965   0.06153
            2400.0   0.31595   0.11866   0.06789   0.05206   0.06826   0.07930   0.06095
              </tableData>
            </table>
          </function>
        </fcs_function>
        <fcs_function name="fcs/fbw/k-roll-i">
          <function>
            <table>
              <independentVar lookup="row">aero/qbar-psf</independentVar>
              <independentVar lookup="column">velocities/mach</independentVar>
              <tableData>
                       0.150     0.400     0.700     0.900     1.100     1.400     2.000
              10.0   1.00000   1.00000   1.00000   0.95841   1.00000   1.00000   1.00000
              20.0   0.58612   0.57339   0.53587   0.47920   0.74094   1.00000   1.00000
              40.0   0.29306   0.28670   0.26794   0.23405   0.35598   0.69436   1.00000
              80.0   0.11457   0.11179   0.10377   0.09201   0.14187   0.27181   0.53569
             150.0   0.05860   0.05729   0.05346   0.04772   0.07374   0.13891   0.23307
             300.0   0.02910   0.02847   0.02660   0.02379   0.03679   0.06895   0.11339
             600.0   0.01457   0.01425   0.01332   0.01191   0.01842   0.03451   0.05661
            1200.0   0.00730   0.00714   0.00667   0.00597   0.00922   0.01728   0.02835
            2400.0   0.00365   0.00357   0.00334   0.00298   0.00461   0.00865   0.01419
              </tableData>
            </table>
          </function>
        </fcs_function>
        <fcs_function name="fcs/fbw/p-max">
          <function>
            <table>
              <independentVar lookup="row">aero/qbar-psf</independentVar>
              <independentVar lookup="column">velocities/mach</independentVar>
              <tableData>
                       0.150     0.400     0.700     0.900     1.100     1.400     2.000
              10.0   0.61349   1.63343   2.85416   3.14159   2.83765   2.44436   3.14159
              20.0   0.61349   1.63343   2.85416   3.14159   2.83765   2.44436   3.14159
              40.0   0.61349   1.63343   2.85416   3.14159   3.05322   2.44436   3.14159
              80.0   0.86948   2.32955   3.14159   3.14159   3.14159   3.14159   3.14159
             150.0   0.99057   2.64626   3.14159   3.14159   3.14159   3.14159   3.14159
             300.0   1.05611   2.81560   3.14159   3.14159   3.14159   3.14159   3.14159
             600.0   1.08549   2.89196   3.14159   3.14159   3.14159   3.14159   3.14159
            1200.0   1.10003   2.92976   3.14159   3.14159   3.14159   3.14159   3.14159
            2400.0   1.10482   2.94184   3.14159   3.14159   3.14159   3.14159   3.14159
              </tableData>
            </table>
          </function>
        </fcs_function>
        <!-- the stick's rate halves towards alpha_max -->
        <fcs_function name="fcs/fbw/p-stick">
          <function>
            <product>
              <property>fcs/roll-trim-sum</property>
              <property>fcs/fbw/p-max</property>
              <table>
                <independentVar lookup="row">aero/alpha-rad</independentVar>
                <tableData>
                  0.24435 1.0
                  0.61087 0.5
                </tableData>
              </table>
            </product>
          </function>
        </fcs_function>
        <!-- the rudder's yaw acceleration at full travel (1/s^2), and the yaw damping (1/s) -->
        <fcs_function name="fcs/fbw/yaw-accel">
          <function>
            <table>
              <independentVar lookup="row">aero/qbar-psf</independentVar>
              <independentVar lookup="column">velocities/mach</independentVar>
              <tableData>
                       0.150     0.400     0.700     0.900     1.100     1.400     2.000
              10.0   0.05456   0.05563   0.05908   0.06510   0.03606   0.02973   0.01893
              20.0   0.10912   0.11126   0.11817   0.13019   0.07213   0.05945   0.03785
              40.0   0.21824   0.22252   0.23633   0.23386   0.11512   0.11891   0.07571
              80.0   0.35351   0.36542   0.40127   0.45411   0.25460   0.19130   0.12713
             150.0   0.77065   0.78547   0.83313   0.91494   0.50614   0.41993   0.24934
             300.0   1.51093   1.53983   1.63321   1.79436   0.99277   0.82342   0.53018
             600.0   2.96269   3.01911   3.20143   3.52200   1.95087   1.61466   1.04024
            1200.0   5.89473   6.01006   6.38218   7.03028   3.89433   3.21180   2.04739
            2400.0  11.77255  12.00311  12.74696  14.04251   7.77901   6.41433   4.08725
              </tableData>
            </table>
          </function>
        </fcs_function>
        <fcs_function name="fcs/fbw/yaw-damping">
          <function>
            <table>
              <independentVar lookup="row">aero/qbar-psf</independentVar>
              <independentVar lookup="column">velocities/mach</independentVar>
              <tableData>
                       0.150     0.400     0.700     0.900     1.100     1.400     2.000
              10.0   0.02459   0.00944   0.00578   0.00496   0.00421   0.00260   0.00122
              20.0   0.04918   0.01888   0.01156   0.00992   0.00841   0.00521   0.00243
              40.0   0.09837   0.03777   0.02313   0.01733   0.01274   0.01042   0.00487
              80.0   0.12085   0.04651   0.02874   0.02502   0.02131   0.01279   0.00767
             150.0   0.23986   0.09209   0.05636   0.04824   0.04087   0.02540   0.01155
             300.0   0.46906   0.17991   0.10988   0.09391   0.07956   0.04971   0.02363
             600.0   0.91936   0.35280   0.21577   0.18475   0.15660   0.09741   0.04598
            1200.0   1.82060   0.69881   0.42765   0.36651   0.31080   0.19288   0.09059
            2400.0   3.62888   1.39312   0.85296   0.73139   0.62029   0.38441   0.17990
              </tableData>
            </table>
          </function>
        </fcs_function>
        <!-- the rudder's share of the yaw a roll about the flight path needs, per unit of
             its roll acceleration: sin(alpha), less the ailerons' own yaw and what a
             principal axis inclined to the body axis gives -->
        <fcs_function name="fcs/fbw/roll-yaw-share">
          <function>
            <table>
              <independentVar lookup="row">aero/alpha-rad</independentVar>
              <tableData>
                   -0.34907  -0.33222
                   -0.26180  -0.25613
                   -0.17453  -0.18248
                   -0.08727  -0.09790
                    0.00000  -0.00645
                    0.08727   0.08548
                    0.17453   0.16906
                    0.26180   0.23750
                    0.34907   0.30913
                    0.43633   0.38844
                    0.52360   0.46596
                    0.61087   0.54127
                    0.69813   0.62328
                    0.78540   0.69384
                    0.87266   0.75424
              </tableData>
            </table>
          </function>
        </fcs_function>
        <!-- the yaw acceleration each rad/s of roll rate needs while the aircraft pitches
             under it: the pitch rate's inertia coupling, the angle of attack rising, and
             the yaw damping the roll's yaw rate meets -->
        <fcs_function name="fcs/fbw/p-yaw-need">
          <function>
            <abs>
              <sum>
                <product>
                  <sum>
                    <property>aero/alphadot-rad_sec</property>
                    <product><value>0.60340</value><property>velocities/q-rad_sec</property></product>
                  </sum>
                  <cos><property>aero/alpha-rad</property></cos>
                </product>
                <product><property>fcs/fbw/yaw-damping</property><sin><property>aero/alpha-rad</property></sin></product>
              </sum>
            </abs>
          </function>
        </fcs_function>
        <!-- no more roll rate than 0.5 of the rudder's yaw holds: a roll the rudder cannot
             follow turns the angle of attack into sideslip -->
        <fcs_function name="fcs/fbw/p-yaw-max">
          <function>
            <quotient>
              <product><value>0.5</value><property>fcs/fbw/yaw-accel</property></product>
              <max><value>0.001</value><property>fcs/fbw/p-yaw-need</property></max>
            </quotient>
          </function>
        </fcs_function>
        <fcs_function name="fcs/fbw/p-limited">
          <function>
            <max>
              <min><property>fcs/fbw/p-stick</property><property>fcs/fbw/p-yaw-max</property></min>
              <product><value>-1</value><property>fcs/fbw/p-yaw-max</property></product>
            </max>
          </function>
        </fcs_function>
        <!-- and while the rate grows, no faster roll acceleration than all of it
             coordinates, unless the roll asked for could not leave 2.0 deg of sideslip
             even uncoordinated: at worst c^2 p^2 / (8 Y), c the rudder's share, Y its yaw
             acceleration, p the rate asked for -->
        <fcs_function name="fcs/fbw/p-accel">
          <function>
            <product>
              <quotient>
                <property>fcs/fbw/yaw-accel</property>
                <max><value>0.01</value><abs><property>fcs/fbw/roll-yaw-share</property></abs></max>
              </quotient>
              <max>
                <value>1</value>
                <quotient>
                  <product><value>0.27925</value><property>fcs/fbw/yaw-accel</property></product>
                  <sum>
                    <value>1e-9</value>
                    <product>
                      <property>fcs/fbw/roll-yaw-share</property><property>fcs/fbw/roll-yaw-share</property>
                      <property>fcs/fbw/p-limited</property><property>fcs/fbw/p-limited</property>
                    </product>
                  </sum>
                </quotient>
              </max>
            </product>
          </function>
        </fcs_function>
        <!-- a roll is stopped as fast as the ailerons can -->
        <fcs_function name="fcs/fbw/p-accel-up">
          <function>
            <sum><property>fcs/fbw/p-accel</property>
              <product><value>1000</value><lt><property>fcs/fbw/p-cmd</property><value>0</value></lt></product></sum>
          </function>
        </fcs_function>
        <fcs_function name="fcs/fbw/p-accel-down">
          <function>
            <sum><property>fcs/fbw/p-accel</property>
              <product><value>1000</value><gt><property>fcs/fbw/p-cmd</property><value>0</value></gt></product></sum>
          </function>
        </fcs_function>
        <actuator name="fcs/fbw/p-cmd">
          <input>fcs/fbw/p-limited</input>
          <rate_limit sense="incr">fcs/fbw/p-accel-up</rate_limit>
          <rate_limit sense="decr">fcs/fbw/p-accel-down</rate_limit>
        </actuator>
        <fcs_function name="fcs/fbw/p-stability">
          <function>
            <sum>
              <product><property>velocities/p-rad_sec</property><cos><property>aero/alpha-rad</property></cos></product>
              <product><property>velocities/r-rad_sec</property><sin><property>aero/alpha-rad</property></sin></product>
            </sum>
          </function>
        </fcs_function>
        <fcs_function name="fcs/fbw/roll-error-rate">
          <function>
            <product><property>fcs/fbw/k-roll-i</property>
              <difference><property>fcs/fbw/p-cmd</property><property>fcs/fbw/p-stability</property></difference></product>
          </function>
        </fcs_function>
        <integrator name="fcs/fbw/roll-integral">
          <input>fcs/fbw/roll-error-rate</input>
          <c1>1.0</c1>
          <trigger>fcs/fbw/reset</trigger>
          <clipto> <min>-0.21817</min> <max>0.21817</max> </clipto>
        </integrator>
        <fcs_function name="fcs/fbw/aileron">
          <function>
            <sum>
              <product><property>fcs/fbw/k-roll-ff</property><property>fcs/fbw/p-cmd</property></product>
              <product><property>fcs/fbw/k-roll</property>
                <difference><property>fcs/fbw/p-cmd</property><property>fcs/fbw/p-stability</property></difference></product>
              <property>fcs/fbw/roll-integral</property>
            </sum>
          </function>
          <clipto> <min>-0.43633</min> <max>0.43633</max> </clipto>
        </fcs_function>
        <actuator name="fcs/left-aileron-actuator">
          <input>fcs/fbw/aileron</input>
          <lag>40</lag>
          <rate_limit>1.4</rate_limit>
          <output>fcs/left-aileron-pos-rad</output>
        </actuator>
        <pure_gain name="fcs/right-aileron">
          <input>fcs/left-aileron-pos-rad</input>
          <gain>-1</gain>
          <output>fcs/right-aileron-pos-rad</output>
        </pure_gain>
      </channel>
      <channel name="Yaw (fly-by-wire)">
        <!-- hangar: yaw damper, sideslip feedback, pedals command sideslip -->
        <summer name="fcs/yaw-trim-sum">
          <input>fcs/rudder-cmd-norm</input>
          <input>fcs/yaw-trim-cmd-norm</input>
          <clipto> <min>-1</min> <max>1</max> </clipto>
        </summer>
        <fcs_function name="fcs/fbw/k-yaw-r">
          <function>
            <table>
              <independentVar lookup="row">aero/qbar-psf</independentVar>
              <independentVar lookup="column">velocities/mach</independentVar>
              <tableData>
                       0.150     0.400     0.700     0.900     1.100     1.400     2.000
              10.0  -3.00000  -3.00000  -3.00000  -3.00000  -3.00000  -3.00000  -3.00000
              20.0  -3.00000  -3.00000  -3.00000  -3.00000  -3.00000  -3.00000  -3.00000
              40.0  -3.00000  -3.00000  -3.00000  -3.00000  -3.00000  -3.00000  -3.00000
              80.0  -2.64382  -2.74585  -2.54066  -2.25215  -3.00000  -3.00000  -3.00000
             150.0  -1.01665  -1.20476  -1.18364  -1.08850  -1.98829  -2.42544  -3.00000
             300.0  -0.33894  -0.54748  -0.56604  -0.52656  -0.97310  -1.20088  -1.92468
             600.0   0.00000  -0.21273  -0.25108  -0.23969  -0.45436  -0.57682  -0.95541
            1200.0   0.00000  -0.07726  -0.12460  -0.12594  -0.22244  -0.33529  -0.47423
            2400.0   0.00000  -0.01114  -0.06210  -0.06905  -0.12820  -0.20763  -0.30379
              </tableData>
            </table>
          </function>
        </fcs_function>
        <fcs_function name="fcs/fbw/k-yaw-beta">
          <function>
            <table>
              <independentVar lookup="row">aero/qbar-psf</independentVar>
              <independentVar lookup="column">velocities/mach</independentVar>
              <tableData>
                       0.150     0.400     0.700     0.900     1.100     1.400     2.000
              10.0   3.00000   3.00000   3.00000   3.00000   3.00000   3.00000   3.00000
              20.0   3.00000   3.00000   3.00000   3.00000   3.00000   3.00000   3.00000
              40.0   3.00000   3.00000   3.00000   3.00000   3.00000   3.00000   3.00000
              80.0   1.36227   1.42385   1.55507   1.65953   3.00000   2.01857   1.96471
             150.0   1.04086   1.03977   1.02835   0.99283   2.02931   1.76621   2.51301
             300.0   0.47527   0.46920   0.44990   0.41957   0.89332   0.79833   1.48812
             600.0   0.09038   0.08760   0.07977   0.07087   0.23431   0.11164   0.53996
            1200.0   0.00000   0.00000   0.00000   0.00000   0.00000   0.00000   0.00000
            2400.0   0.00000   0.00000   0.00000   0.00000   0.00000   0.00000   0.00000
              </tableData>
            </table>
          </function>
        </fcs_function>
        <fcs_function name="fcs/fbw/k-pedal">
          <function>
            <table>
              <independentVar lookup="row">aero/qbar-psf</independentVar>
              <independentVar lookup="column">velocities/mach</independentVar>
              <tableData>
                       0.150     0.400     0.700     0.900     1.100     1.400     2.000
              10.0   0.09621   0.09514   0.09163   0.08532   0.13084   0.18791   0.18791
              20.0   0.09621   0.09514   0.09163   0.08532   0.13084   0.18791   0.18791
              40.0   0.09621   0.09514   0.09163   0.06387   0.04551   0.18791   0.18791
              80.0   0.03694   0.03597   0.03386   0.03194   0.04917   0.07277   0.10068
             150.0   0.04228   0.04240   0.04244   0.04152   0.06476   0.08201   0.07053
             300.0   0.05477   0.05440   0.05303   0.05018   0.07741   0.10674   0.09511
             600.0   0.06002   0.05946   0.05757   0.05386   0.08264   0.11711   0.11203
            1200.0   0.06103   0.06036   0.05816   0.05417   0.08306   0.11918   0.11875
            2400.0   0.06092   0.06024   0.05800   0.05398   0.08278   0.11899   0.11924
              </tableData>
            </table>
          </function>
        </fcs_function>
        <!-- the yaw damper damps the sideslip's rate, the stability-axis yaw rate less
             the one that coordinates the bank and the side force: in the dutch roll the
             yaw rate itself, and zero in a steady coordinated turn, in a roll about the
             flight path and in a steady sideslip - it coordinates those as long as they
             last (a damper on the washed-out yaw rate stopped coordinating a sustained
             roll, and at low speed the roll turned the angle of attack into sideslip) -->
        <!-- on the wheels (the pitch's ground mode, fcs/fbw/ground) the pedals move the rudder
             directly over its travel, a ground law: the sideslip feedback, there the
             crosswind's, turned the nose into it, and as the C-17A's nose wheel unloaded
             towards its rotation it ran 8.6 m off its line across 10 m/s -->
        <fcs_function name="fcs/fbw/rudder">
          <function>
            <sum>
              <product>
                <difference><value>1</value><property>fcs/fbw/ground</property></difference>
                <sum>
                  <product><property>fcs/fbw/k-pedal</property><property>fcs/yaw-trim-sum</property></product>
                  <product><value>-1</value><property>fcs/fbw/k-yaw-beta</property>
                    <difference><property>aero/beta-rad</property>
                      <product><value>0.17453</value><property>fcs/yaw-trim-sum</property></product></difference></product>
                  <product><property>fcs/fbw/k-yaw-r</property><property>aero/betadot-rad_sec</property></product>
                </sum>
              </product>
              <product><property>fcs/fbw/ground</property><value>0.69813</value><property>fcs/yaw-trim-sum</property></product>
            </sum>
          </function>
          <clipto> <min>-0.69813</min> <max>0.69813</max> </clipto>
        </fcs_function>
        <actuator name="fcs/rudder-actuator">
          <input>fcs/fbw/rudder</input>
          <lag>40</lag>
          <rate_limit>1.4</rate_limit>
          <output>fcs/rudder-pos-rad</output>
        </actuator>
        <!-- the nose wheel steers with the pedals (JSBSim steers from fcs/steer-cmd-norm,
             positive right; the rudder command is positive left) -->
        <pure_gain name="fcs/steer-from-rudder">
          <input>fcs/yaw-trim-sum</input>
          <gain>-1</gain>
          <output>fcs/steer-cmd-norm</output>
        </pure_gain>
      </channel>
      <channel name="Flaps">
        <kinematic name="fcs/flaps-control">
          <input>fcs/flap-cmd-norm</input>
          <traverse>
            <setting> <position>0.0</position> <time>0.0</time> </setting>
            <setting> <position>10.0</position> <time>2.0</time> </setting>
            <setting> <position>20.0</position> <time>2.0</time> </setting>
            <setting> <position>30.0</position> <time>2.0</time> </setting>
            <setting> <position>40.0</position> <time>2.0</time> </setting>
          </traverse>
          <output>fcs/flap-pos-deg</output>
        </kinematic>
        <pure_gain name="fcs/flaps-normalized">
          <input>fcs/flap-pos-deg</input>
          <gain>0.025</gain>
          <output>fcs/flap-pos-norm</output>
        </pure_gain>
      </channel>
      <channel name="Speedbrake">
        <kinematic name="fcs/speedbrake-control">
          <input>fcs/speedbrake-cmd-norm</input>
          <traverse>
            <setting> <position>0</position> <time>0</time> </setting>
            <setting> <position>1</position> <time>2.00</time> </setting>
          </traverse>
          <output>fcs/speedbrake-pos-norm</output>
        </kinematic>
        <pure_gain name="fcs/speedbrake-rudder">
          <input>fcs/speedbrake-pos-norm</input>
          <gain>30</gain>
          <output>fcs/speedbrake-rudder-deg</output>
        </pure_gain>
        <pure_gain name="fcs/speedbrake-flap">
          <input>fcs/speedbrake-pos-norm</input>
          <gain>20</gain>
          <output>fcs/speedbrake-flap-deg</output>
        </pure_gain>
      </channel>
      <channel name="Leading-Edge Flaps">
        <fcs_function name="fcs/lef-schedule">
          <function>
            <sum>
              <product> <value>1.38</value> <property>aero/alpha-deg</property> </product>
              <product> <value>-9.05</value>
                <quotient> <property>aero/qbar-psf</property> <property>atmosphere/P-psf</property> </quotient>
              </product>
              <value>1.45</value>
            </sum>
          </function>
          <clipto> <min>-5</min> <max>34</max> </clipto>
        </fcs_function>
        <actuator name="fcs/lef-actuator">
          <input>fcs/lef-schedule</input>
          <lag>7.35</lag>
          <rate_limit>25</rate_limit>
          <output>fcs/lef-pos-deg</output>
        </actuator>
      </channel>
      <channel name="Throttle 0">
        <fcs_function name="fcs/throttle-lever-0">
          <function>
            <table>
              <independentVar lookup="row">fcs/throttle-cmd-norm[0]</independentVar>
              <tableData>
                0.0  0.0
                0.8  1.0
                1.0  2.0
              </tableData>
            </table>
          </function>
          <output>fcs/throttle-pos-norm[0]</output>
        </fcs_function>
      </channel>
      <channel name="Throttle 1">
        <fcs_function name="fcs/throttle-lever-1">
          <function>
            <table>
              <independentVar lookup="row">fcs/throttle-cmd-norm[1]</independentVar>
              <tableData>
                0.0  0.0
                0.8  1.0
                1.0  2.0
              </tableData>
            </table>
          </function>
          <output>fcs/throttle-pos-norm[1]</output>
        </fcs_function>
      </channel>
      <channel name="Landing Gear">
        <kinematic name="fcs/gear-control">
          <input>gear/gear-cmd-norm</input>
          <traverse>
            <setting> <position>0</position> <time>0</time> </setting>
            <setting> <position>1</position> <time>5</time> </setting>
          </traverse>
          <output>gear/gear-pos-norm</output>
        </kinematic>
      </channel>
    </flight_control>
    <aerodynamics>
        <function name="aero/function/mach-lift">
          <description>lift, and damping, over its low-speed value (hangar: aero/mach.py)</description>
          <table>
            <independentVar lookup="row">velocities/mach</independentVar>
            <tableData>
                 0.000     1.000000
                 0.300     1.016124
                 0.500     1.047969
                 0.600     1.072759
                 0.700     1.105992
                 0.800     1.151641
                 0.850     1.181658
                 0.900     1.219606
                 0.950     1.231877
                 1.000     1.245165
                 1.050     1.256843
                 1.100     1.264282
                 1.200     1.255937
                 1.400     0.996639
                 1.600     0.853502
                 1.800     0.745408
                 2.000     0.665396
                 2.300     0.576404
                 2.600     0.510360
            </tableData>
          </table>
        </function>
        <function name="aero/function/mach-side">
          <description>side force, rolling and yawing moment over their low-speed values</description>
          <table>
            <independentVar lookup="row">velocities/mach</independentVar>
            <tableData>
                 0.000     1.000000
                 0.300     1.005769
                 0.500     1.016583
                 0.600     1.024485
                 0.700     1.034380
                 0.800     1.046608
                 0.850     1.053656
                 0.900     1.061089
                 0.950     1.036425
                 1.000     0.994723
                 1.050     0.946309
                 1.100     0.901509
                 1.200     0.864047
                 1.400     1.067202
                 1.600     0.889344
                 1.800     0.768395
                 2.000     0.679495
                 2.300     0.581741
                 2.600     0.510212
            </tableData>
          </table>
        </function>
        <function name="aero/function/mach-dCm-dCL">
          <description>pitching moment per unit low-speed lift: the neutral point's move</description>
          <table>
            <independentVar lookup="row">velocities/mach</independentVar>
            <tableData>
                 0.000     0.000000
                 0.300    -0.000097
                 0.500     0.000005
                 0.600     0.000347
                 0.700     0.001176
                 0.800     0.003196
                 0.850     0.005289
                 0.900     0.009023
                 0.950    -0.010010
                 1.000    -0.047310
                 1.050    -0.095738
                 1.100    -0.147442
                 1.200    -0.226274
                 1.400    -0.217251
                 1.600    -0.208568
                 1.800    -0.185705
                 2.000    -0.167736
                 2.300    -0.147143
                 2.600    -0.131719
            </tableData>
          </table>
        </function>
        <function name="aero/function/mach-dCD0">
          <description>zero-lift drag's change: friction and wave drag</description>
          <table>
            <independentVar lookup="row">velocities/mach</independentVar>
            <tableData>
                 0.000     0.000000
                 0.300    -0.000128
                 0.500    -0.000349
                 0.600    -0.000497
                 0.700    -0.000667
                 0.800    -0.000445
                 0.850     0.000964
                 0.900     0.008627
                 0.950     0.022512
                 1.000     0.035801
                 1.050     0.041667
                 1.100     0.041547
                 1.200     0.041299
                 1.400     0.038754
                 1.600     0.037231
                 1.800     0.035899
                 2.000     0.034676
                 2.300     0.032990
                 2.600     0.031445
            </tableData>
          </table>
        </function>
        <function name="aero/function/mach-dK">
          <description>induced-drag factor's change (per CL^2)</description>
          <table>
            <independentVar lookup="row">velocities/mach</independentVar>
            <tableData>
                 0.000     0.000000
                 0.300     0.004295
                 0.500     0.012202
                 0.600     0.017876
                 0.700     0.024893
                 0.800     0.033558
                 0.850     0.038717
                 0.900     0.044702
                 0.950     0.046520
                 1.000     0.048429
                 1.050     0.067582
                 1.100     0.097418
                 1.200     0.107164
                 1.400     0.106692
                 1.600     0.097691
                 1.800     0.080765
                 2.000     0.057405
                 2.300     0.011357
                 2.600    -0.047181
            </tableData>
          </table>
        </function>
        <function name="aero/function/mach-aileron">
          <description>aileron power over its low-speed value</description>
          <table>
            <independentVar lookup="row">velocities/mach</independentVar>
            <tableData>
                 0.000     1.000000
                 0.300     1.014859
                 0.500     1.044738
                 0.600     1.068645
                 0.700     1.101905
                 0.800     1.150635
                 0.850     1.185142
                 0.900     1.232207
                 0.950     1.172058
                 1.000     1.066762
                 1.050     0.935369
                 1.100     0.796931
                 1.200     0.575122
                 1.400     0.425193
                 1.600     0.346248
                 1.800     0.295335
                 2.000     0.258978
                 2.300     0.219860
                 2.600     0.191729
            </tableData>
          </table>
        </function>
        <function name="aero/function/mach-elevator">
          <description>elevator power over its low-speed value</description>
          <table>
            <independentVar lookup="row">velocities/mach</independentVar>
            <tableData>
                 0.000     1.000000
                 0.300     1.019699
                 0.500     1.059553
                 0.600     1.091591
                 0.700     1.136200
                 0.800     1.201204
                 0.850     1.246762
                 0.900     1.308092
                 0.950     1.313675
                 1.000     1.318678
                 1.050     1.322568
                 1.100     1.324810
                 1.200     1.322225
                 1.400     1.125764
                 1.600     1.023023
                 1.800     0.875583
                 2.000     0.769529
                 2.300     0.654778
                 2.600     0.571883
            </tableData>
          </table>
        </function>
        <function name="aero/function/mach-flap">
          <description>flap power over its low-speed value</description>
          <table>
            <independentVar lookup="row">velocities/mach</independentVar>
            <tableData>
                 0.000     1.000000
                 0.300     1.026476
                 0.500     1.081323
                 0.600     1.126767
                 0.700     1.192337
                 0.800     1.293538
                 0.850     1.369188
                 0.900     1.478529
                 0.950     1.424713
                 1.000     1.303508
                 1.050     1.142178
                 1.100     0.967989
                 1.200     0.690091
                 1.400     0.510190
                 1.600     0.415464
                 1.800     0.354373
                 2.000     0.310749
                 2.300     0.263810
                 2.600     0.230056
            </tableData>
          </table>
        </function>
        <function name="aero/function/mach-rudder">
          <description>rudder power over its low-speed value</description>
          <table>
            <independentVar lookup="row">velocities/mach</independentVar>
            <tableData>
                 0.000     1.000000
                 0.300     1.013101
                 0.500     1.039499
                 0.600     1.060642
                 0.700     1.090012
                 0.800     1.132634
                 0.850     1.162173
                 0.900     1.200955
                 0.950     1.121496
                 1.000     0.988114
                 1.050     0.827242
                 1.100     0.665313
                 1.200     0.444017
                 1.400     0.548414
                 1.600     0.457016
                 1.800     0.394863
                 2.000     0.349179
                 2.300     0.298945
                 2.600     0.262188
            </tableData>
          </table>
        </function>
        <function name="aero/function/CL-base">
          <description>CL over alpha and beta at low speed</description>
          <table>
            <independentVar lookup="row">aero/alpha-deg</independentVar>
            <independentVar lookup="column">aero/beta-deg</independentVar>
            <tableData>
                        -90.00    -70.00    -50.00    -40.00    -30.00    -25.00    -20.00    -15.00    -10.00     -6.00     -3.00      0.00      3.00      6.00     10.00     15.00     20.00     25.00     30.00     40.00     50.00     70.00     90.00
             -180.00  -0.00000   0.00000   0.00000   0.00000   0.00000   0.00000   0.00000   0.00000   0.00000   0.00000   0.00000   0.00000   0.00000   0.00000   0.00000   0.00000   0.00000   0.00000   0.00000   0.00000   0.00000   0.00000  -0.00000
             -120.00   0.00000   0.15090   0.42639   0.57615   0.71250   0.77128   0.82105   0.86377   0.89096   0.90632   0.91284   0.91502   0.91284   0.90632   0.89096   0.86377   0.82105   0.77128   0.71250   0.57615   0.42639   0.15090   0.00000
              -70.00  -0.00000  -0.11847  -0.34040  -0.46205  -0.57318  -0.62081  -0.66258  -0.69522  -0.71933  -0.73190  -0.73724  -0.73902  -0.73724  -0.73190  -0.71933  -0.69522  -0.66258  -0.62081  -0.57318  -0.46205  -0.34040  -0.11847  -0.00000
              -46.00  -0.00000  -0.40056  -0.90111  -1.18739  -1.48584  -1.61454  -1.72753  -1.82609  -1.90873  -1.95979  -1.97913  -1.98800  -1.97913  -1.95979  -1.90873  -1.82609  -1.72753  -1.61454  -1.48584  -1.18739  -0.90111  -0.40056  -0.00000
              -32.00  -0.00000  -0.51425  -0.90279  -1.18447  -1.47658  -1.61271  -1.74104  -1.85637  -1.94711  -1.98974  -2.00773  -2.01356  -2.00773  -1.98974  -1.94711  -1.85637  -1.74104  -1.61271  -1.47658  -1.18447  -0.90279  -0.51425  -0.00000
              -22.00  -0.00000  -0.41365  -0.71675  -0.95642  -1.20175  -1.29975  -1.38048  -1.45854  -1.50808  -1.53347  -1.54416  -1.54771  -1.54416  -1.53347  -1.50808  -1.45854  -1.38048  -1.29975  -1.20175  -0.95642  -0.71675  -0.41365  -0.00000
              -17.00  -0.00000  -0.33625  -0.58013  -0.77508  -0.96854  -1.04259  -1.10403  -1.16125  -1.19649  -1.21455  -1.22214  -1.22466  -1.22214  -1.21455  -1.19649  -1.16125  -1.10403  -1.04259  -0.96854  -0.77508  -0.58013  -0.33625  -0.00000
              -13.00  -0.00000  -0.26777  -0.45018  -0.59991  -0.75077  -0.80485  -0.85870  -0.89500  -0.92053  -0.93349  -0.93889  -0.94067  -0.93889  -0.93349  -0.92053  -0.89500  -0.85870  -0.80485  -0.75077  -0.59991  -0.45018  -0.26777  -0.00000
               -9.00  -0.00000  -0.19334  -0.30898  -0.41437  -0.52113  -0.55558  -0.59532  -0.61806  -0.63397  -0.64183  -0.64501  -0.64604  -0.64501  -0.64183  -0.63397  -0.61806  -0.59532  -0.55558  -0.52113  -0.41437  -0.30898  -0.19334  -0.00000
               -5.00  -0.00000  -0.11252  -0.19477  -0.26189  -0.32652  -0.34372  -0.36938  -0.38156  -0.38992  -0.39386  -0.39531  -0.39573  -0.39531  -0.39386  -0.38992  -0.38156  -0.36938  -0.34372  -0.32652  -0.26189  -0.19477  -0.11252  -0.00000
               -1.00  -0.00000  -0.02199  -0.03531  -0.05229  -0.06839  -0.06386  -0.07558  -0.07375  -0.07221  -0.07126  -0.07074  -0.07046  -0.07074  -0.07126  -0.07221  -0.07375  -0.07558  -0.06386  -0.06839  -0.05229  -0.03531  -0.02199  -0.00000
                3.00   0.00000   0.07057   0.10525   0.12978   0.15998   0.16336   0.18497   0.19918   0.20927   0.21420   0.21607   0.21660   0.21607   0.21420   0.20927   0.19918   0.18497   0.16336   0.15998   0.12978   0.10525   0.07057   0.00000
                7.00   0.00000   0.16350   0.24916   0.32052   0.39597   0.41660   0.45209   0.47971   0.49942   0.50926   0.51326   0.51455   0.51326   0.50926   0.49942   0.47971   0.45209   0.41660   0.39597   0.32052   0.24916   0.16350   0.00000
               11.00   0.00000   0.25229   0.39633   0.50188   0.61873   0.67270   0.71509   0.75690   0.78662   0.80174   0.80805   0.81015   0.80805   0.80174   0.78662   0.75690   0.71509   0.67270   0.61873   0.50188   0.39633   0.25229   0.00000
               15.00   0.00000   0.32766   0.52692   0.67073   0.83791   0.91086   0.98002   1.03081   1.06447   1.08476   1.09332   1.09616   1.09332   1.08476   1.06447   1.03081   0.98002   0.91086   0.83791   0.67073   0.52692   0.32766   0.00000
               19.00   0.00000   0.39379   0.64677   0.83203   1.04414   1.13751   1.22709   1.29207   1.33336   1.35850   1.36917   1.37272   1.36917   1.35850   1.33336   1.29207   1.22709   1.13751   1.04414   0.83203   0.64677   0.39379   0.00000
               23.00   0.00000   0.45155   0.75037   0.98193   1.23940   1.36106   1.46735   1.54268   1.59268   1.62208   1.63420   1.63816   1.63420   1.62208   1.59268   1.54268   1.46735   1.36106   1.23940   0.98193   0.75037   0.45155   0.00000
               27.00   0.00000   0.50007   0.83575   1.10412   1.40563   1.54674   1.67101   1.74834   1.81073   1.84320   1.85734   1.86141   1.85734   1.84320   1.81073   1.74834   1.67101   1.54674   1.40563   1.10412   0.83575   0.50007   0.00000
               32.00   0.00000   0.54047   0.91510   1.20610   1.53219   1.68303   1.81942   1.91365   1.98207   2.01747   2.03305   2.03838   2.03305   2.01747   1.98207   1.91365   1.81942   1.68303   1.53219   1.20610   0.91510   0.54047   0.00000
               46.00   0.00000   0.38198   0.92540   1.22246   1.52987   1.66311   1.77383   1.86673   1.94379   1.99117   2.01398   2.01520   2.01398   1.99117   1.94379   1.86673   1.77383   1.66311   1.52987   1.22246   0.92540   0.38198   0.00000
               70.00   0.00000   0.11858   0.34079   0.46261   0.57389   0.62159   0.66346   0.69621   0.72036   0.73294   0.73829   0.74008   0.73829   0.73294   0.72036   0.69621   0.66346   0.62159   0.57389   0.46261   0.34079   0.11858   0.00000
              120.00  -0.00000  -0.15090  -0.42639  -0.57615  -0.71250  -0.77128  -0.82105  -0.86377  -0.89096  -0.90632  -0.91284  -0.91502  -0.91284  -0.90632  -0.89096  -0.86377  -0.82105  -0.77128  -0.71250  -0.57615  -0.42639  -0.15090  -0.00000
              180.00   0.00000   0.00000   0.00000   0.00000   0.00000   0.00000   0.00000   0.00000   0.00000   0.00000   0.00000   0.00000   0.00000   0.00000   0.00000   0.00000   0.00000   0.00000   0.00000   0.00000   0.00000   0.00000   0.00000
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            </tableData>
          </table>
        </function>
      <axis name="DRAG">
        <function name="aero/coefficient/CD_base">
          <description>CD over alpha and beta (hangar)</description>
          <product>
            <property>aero/qbar-psf</property>
            <property>metrics/Sw-sqft</property>
          <table>
            <independentVar lookup="row">aero/alpha-deg</independentVar>
            <independentVar lookup="column">aero/beta-deg</independentVar>
            <tableData>
                        -90.00    -70.00    -50.00    -40.00    -30.00    -25.00    -20.00    -15.00    -10.00     -6.00     -3.00      0.00      3.00      6.00     10.00     15.00     20.00     25.00     30.00     40.00     50.00     70.00     90.00
             -180.00   0.54793   0.41722   0.22092   0.13659   0.07531   0.05432   0.03945   0.02967   0.02106   0.02178   0.02262   0.02295   0.02262   0.02178   0.02106   0.02967   0.03945   0.05432   0.07531   0.13659   0.22092   0.41722   0.54793
             -120.00   0.54793   0.54127   0.74986   0.95104   1.18005   1.29069   1.39127   1.47546   1.53955   1.57342   1.58794   1.59281   1.58794   1.57342   1.53955   1.47546   1.39127   1.29069   1.18005   0.95104   0.74986   0.54127   0.54793
              -70.00   0.54793   0.60671   0.92520   1.19355   1.48878   1.62937   1.75573   1.86142   1.94098   1.98305   2.00108   2.00711   2.00108   1.98305   1.94098   1.86142   1.75573   1.62937   1.48878   1.19355   0.92520   0.60671   0.54793
              -46.00   0.54793   0.64359   0.92601   1.13896   1.39685   1.52410   1.63963   1.74026   1.82894   1.88425   1.91193   1.92212   1.91193   1.88425   1.82894   1.74026   1.63963   1.52410   1.39685   1.13896   0.92601   0.64359   0.54793
              -32.00   0.54793   0.61905   0.68508   0.74981   0.85832   0.92384   0.98606   1.04592   1.09483   1.11834   1.12835   1.13159   1.12835   1.11834   1.09483   1.04592   0.98606   0.92384   0.85832   0.74981   0.68508   0.61905   0.54793
              -22.00   0.54793   0.56970   0.50062   0.47530   0.48677   0.49780   0.50296   0.51425   0.51846   0.52074   0.52172   0.52205   0.52172   0.52074   0.51846   0.51425   0.50296   0.49780   0.48677   0.47530   0.50062   0.56970   0.54793
              -17.00   0.54793   0.54885   0.42934   0.36616   0.33354   0.32511   0.31372   0.30870   0.30149   0.29796   0.29652   0.29605   0.29652   0.29796   0.30149   0.30870   0.31372   0.32511   0.33354   0.36616   0.42934   0.54885   0.54793
              -13.00   0.54793   0.53579   0.38515   0.29814   0.24026   0.22129   0.20516   0.18760   0.17484   0.16847   0.16585   0.16499   0.16585   0.16847   0.17484   0.18760   0.20516   0.22129   0.24026   0.29814   0.38515   0.53579   0.54793
               -9.00   0.54793   0.52677   0.35468   0.25209   0.17791   0.15278   0.13112   0.10867   0.09276   0.08484   0.08158   0.08051   0.08158   0.08484   0.09276   0.10867   0.13112   0.15278   0.17791   0.25209   0.35468   0.52677   0.54793
               -5.00   0.54793   0.52192   0.33802   0.22729   0.14457   0.11685   0.09196   0.06761   0.05053   0.04212   0.03870   0.03759   0.03870   0.04212   0.05053   0.06761   0.09196   0.11685   0.14457   0.22729   0.33802   0.52192   0.54793
               -1.00   0.54793   0.52037   0.33018   0.21575   0.12943   0.10078   0.07440   0.04939   0.03196   0.02345   0.02005   0.01897   0.02005   0.02345   0.03196   0.04939   0.07440   0.10078   0.12943   0.21575   0.33018   0.52037   0.54793
                3.00   0.54793   0.52094   0.33130   0.21746   0.13195   0.10387   0.07817   0.05393   0.03705   0.02881   0.02549   0.02442   0.02549   0.02881   0.03705   0.05393   0.07817   0.10387   0.13195   0.21746   0.33130   0.52094   0.54793
                7.00   0.54793   0.52446   0.34116   0.23222   0.15200   0.12709   0.10267   0.08086   0.06561   0.05811   0.05506   0.05406   0.05506   0.05811   0.06561   0.08086   0.10267   0.12709   0.15200   0.23222   0.34116   0.52446   0.54793
               11.00   0.54793   0.53252   0.36224   0.26236   0.19440   0.17139   0.15323   0.13626   0.12428   0.11841   0.11601   0.11523   0.11601   0.11841   0.12428   0.13626   0.15323   0.17139   0.19440   0.26236   0.36224   0.53252   0.54793
               15.00   0.54793   0.54498   0.39628   0.31245   0.26768   0.25113   0.23947   0.22975   0.22242   0.21941   0.21821   0.21781   0.21821   0.21941   0.22242   0.22975   0.23947   0.25113   0.26768   0.31245   0.39628   0.54498   0.54793
               19.00   0.54793   0.56093   0.44394   0.38400   0.36899   0.36409   0.36625   0.36749   0.36672   0.36792   0.36850   0.36871   0.36850   0.36792   0.36672   0.36749   0.36625   0.36409   0.36899   0.38400   0.44394   0.56093   0.54793
               23.00   0.54793   0.57965   0.50327   0.47678   0.49273   0.51699   0.53674   0.55165   0.56176   0.56852   0.57122   0.57208   0.57122   0.56852   0.56176   0.55165   0.53674   0.51699   0.49273   0.47678   0.50327   0.57965   0.54793
               27.00   0.54793   0.60055   0.57227   0.58626   0.64946   0.69480   0.74167   0.77024   0.79418   0.80715   0.81290   0.81437   0.81290   0.80715   0.79418   0.77024   0.74167   0.69480   0.64946   0.58626   0.57227   0.60055   0.54793
               32.00   0.54793   0.62757   0.66731   0.73484   0.85850   0.93043   1.00459   1.05922   1.09784   1.11846   1.12767   1.13079   1.12767   1.11846   1.09784   1.05922   1.00459   0.93043   0.85850   0.73484   0.66731   0.62757   0.54793
               46.00   0.54793   0.63887   0.91137   1.13434   1.40720   1.54067   1.66048   1.76282   1.84793   1.90025   1.92507   1.92720   1.92507   1.90025   1.84793   1.76282   1.66048   1.54067   1.40720   1.13434   0.91137   0.63887   0.54793
               70.00   0.54793   0.60671   0.92517   1.19353   1.48877   1.62937   1.75572   1.86141   1.94098   1.98305   2.00108   2.00711   2.00108   1.98305   1.94098   1.86141   1.75572   1.62937   1.48877   1.19353   0.92517   0.60671   0.54793
              120.00   0.54793   0.54127   0.74986   0.95104   1.18005   1.29069   1.39127   1.47546   1.53955   1.57342   1.58794   1.59281   1.58794   1.57342   1.53955   1.47546   1.39127   1.29069   1.18005   0.95104   0.74986   0.54127   0.54793
              180.00   0.54793   0.41722   0.22092   0.13659   0.07531   0.05432   0.03945   0.02967   0.02106   0.02178   0.02262   0.02295   0.02262   0.02178   0.02106   0.02967   0.03945   0.05432   0.07531   0.13659   0.22092   0.41722   0.54793
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            </tableData>
          </table>
          </product>
        </function>
        <function name="aero/coefficient/CD_mach">
          <description>zero-lift drag's change with Mach: friction, wave drag</description>
          <product>
            <property>aero/qbar-psf</property>
            <property>metrics/Sw-sqft</property>
            <property>aero/function/mach-dCD0</property>
          </product>
        </function>
        <function name="aero/coefficient/CD_induced_mach">
          <description>induced drag's change with Mach (leading-edge suction lost)</description>
          <product>
            <property>aero/qbar-psf</property>
            <property>metrics/Sw-sqft</property>
            <property>aero/cl-squared</property>
            <property>aero/function/mach-dK</property>
          </product>
        </function>
        <function name="aero/coefficient/CD_aileron">
          <description>CD increment from aileron (deg), over alpha</description>
          <product>
            <property>aero/qbar-psf</property>
            <property>metrics/Sw-sqft</property>
            <property>aero/function/mach-aileron</property>
          <table>
            <independentVar lookup="row">aero/alpha-deg</independentVar>
            <independentVar lookup="column">fcs/left-aileron-pos-deg</independentVar>
            <tableData>
                        -25.00    -20.00    -15.00    -10.00     -5.00      0.00      5.00     10.00     15.00     20.00     25.00
             -180.00   0.00791   0.00409   0.00234   0.00109   0.00028   0.00000   0.00028   0.00109   0.00234   0.00409   0.00791
             -120.00   0.00022   0.00020   0.00014   0.00007   0.00002   0.00000   0.00002   0.00007   0.00014   0.00020   0.00022
              -70.00  -0.00197  -0.00121  -0.00066  -0.00029  -0.00007   0.00000  -0.00007  -0.00029  -0.00066  -0.00121  -0.00197
              -46.00   0.00018  -0.00010  -0.00018  -0.00013  -0.00004   0.00000  -0.00004  -0.00013  -0.00018  -0.00010   0.00018
              -32.00   0.00814   0.00477   0.00237   0.00086   0.00014   0.00000   0.00014   0.00086   0.00237   0.00477   0.00814
              -22.00   0.01610   0.01108   0.00660   0.00294   0.00069   0.00000   0.00069   0.00294   0.00660   0.01108   0.01610
              -17.00   0.02105   0.01468   0.00904   0.00431   0.00110   0.00000   0.00110   0.00431   0.00904   0.01468   0.02105
              -13.00   0.02281   0.01614   0.01034   0.00529   0.00146   0.00000   0.00146   0.00529   0.01034   0.01614   0.02281
               -9.00   0.02157   0.01497   0.00941   0.00473   0.00130   0.00000   0.00130   0.00473   0.00941   0.01497   0.02157
               -5.00   0.02097   0.01419   0.00862   0.00416   0.00110   0.00000   0.00110   0.00416   0.00862   0.01419   0.02097
               -1.00   0.02017   0.01376   0.00844   0.00409   0.00108   0.00000   0.00108   0.00409   0.00844   0.01376   0.02017
                3.00   0.02016   0.01375   0.00843   0.00408   0.00108   0.00000   0.00108   0.00408   0.00843   0.01375   0.02016
                7.00   0.02112   0.01478   0.00936   0.00467   0.00125   0.00000   0.00125   0.00467   0.00936   0.01478   0.02112
               11.00   0.02473   0.01801   0.01214   0.00674   0.00202   0.00000   0.00202   0.00674   0.01214   0.01801   0.02473
               15.00   0.02566   0.01888   0.01271   0.00702   0.00216   0.00000   0.00216   0.00702   0.01271   0.01888   0.02566
               19.00   0.02248   0.01646   0.01078   0.00547   0.00143   0.00000   0.00143   0.00547   0.01078   0.01646   0.02248
               23.00   0.01646   0.01100   0.00647   0.00275   0.00053   0.00000   0.00053   0.00275   0.00647   0.01100   0.01646
               27.00   0.01081   0.00598   0.00222   0.00011  -0.00020   0.00000  -0.00020   0.00011   0.00222   0.00598   0.01081
               32.00   0.00867   0.00548   0.00287   0.00109   0.00022   0.00000   0.00022   0.00109   0.00287   0.00548   0.00867
               46.00   0.00137   0.00233   0.00320   0.00422  -0.00095   0.00000  -0.00095   0.00422   0.00320   0.00233   0.00137
               70.00  -0.00197  -0.00121  -0.00066  -0.00029  -0.00007   0.00000  -0.00007  -0.00029  -0.00066  -0.00121  -0.00197
              120.00   0.00022   0.00020   0.00014   0.00007   0.00002   0.00000   0.00002   0.00007   0.00014   0.00020   0.00022
              180.00   0.00791   0.00409   0.00234   0.00109   0.00028   0.00000   0.00028   0.00109   0.00234   0.00409   0.00791
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            </tableData>
          </table>
          </product>
        </function>
        <function name="aero/coefficient/CD_elevator">
          <description>CD increment from elevator (deg), over alpha</description>
          <product>
            <property>aero/qbar-psf</property>
            <property>metrics/Sw-sqft</property>
            <property>aero/function/mach-elevator</property>
          <table>
            <independentVar lookup="row">aero/alpha-deg</independentVar>
            <independentVar lookup="column">fcs/elevator-pos-deg</independentVar>
            <tableData>
                        -24.00    -20.00    -15.00    -10.00     -5.00      0.00      5.00     10.00     15.00     20.00
             -180.00   0.04451   0.03128   0.01764   0.00358   0.00054   0.00000   0.00054   0.00358   0.01764   0.03128
             -120.00  -0.11035  -0.09189  -0.06820  -0.04452  -0.02155   0.00000   0.01948   0.03629   0.04993   0.05998
              -70.00   0.03059   0.03192   0.02984   0.02369   0.01364   0.00000  -0.01681  -0.03629  -0.05784   0.01588
              -46.00   0.16600   0.14229   0.11000   0.07508   0.03821   0.00000  -0.03934  -0.07868  -0.11333  -0.14433
              -32.00   0.20435   0.16856   0.12355   0.07902   0.03664   0.00000  -0.03435  -0.06675  -0.09399  -0.11710
              -22.00   0.18301   0.14569   0.10207   0.06381   0.03055   0.00000  -0.02414  -0.04369  -0.05883  -0.06976
              -17.00   0.16537   0.12872   0.08751   0.05351   0.02317   0.00000  -0.01757  -0.03068  -0.03932  -0.04222
              -13.00   0.15188   0.11505   0.07545   0.04277   0.01755   0.00000  -0.01237  -0.02018  -0.02303  -0.01866
               -9.00   0.13586   0.09925   0.06119   0.03200   0.01238   0.00000  -0.00738  -0.01003  -0.00716   0.00443
               -5.00   0.12271   0.08627   0.04948   0.02336   0.00801   0.00000  -0.00297  -0.00110   0.00663   0.02370
               -1.00   0.09136   0.05997   0.03048   0.01254   0.00350   0.00000   0.00131   0.00779   0.02198   0.04745
                3.00   0.06494   0.03819   0.01526   0.00354  -0.00076   0.00000   0.00557   0.01683   0.03719   0.06900
                7.00   0.03653   0.01569   0.00024  -0.00545  -0.00513   0.00000   0.01000   0.02671   0.05350   0.09044
               11.00   0.00533  -0.00827  -0.01553  -0.01530  -0.01000   0.00000   0.01533   0.03883   0.07126   0.11146
               15.00  -0.02642  -0.03245  -0.03209  -0.02609  -0.01541   0.00000   0.02184   0.05170   0.08693   0.12976
               19.00  -0.05705  -0.05612  -0.04922  -0.03759  -0.02142   0.00000   0.02882   0.06153   0.10069   0.14568
               23.00  -0.08636  -0.07975  -0.06715  -0.04998  -0.02823   0.00000   0.03335   0.07030   0.11397   0.16120
               27.00  -0.11329  -0.10213  -0.08417  -0.06183  -0.03396   0.00000   0.03556   0.07800   0.12398   0.17162
               32.00  -0.13918  -0.12305  -0.09903  -0.06974  -0.03509   0.00000   0.04197   0.08689   0.13302   0.17944
               46.00  -0.17596  -0.14997  -0.11338  -0.07088  -0.04138   0.00000   0.03902   0.07608   0.11223   0.14556
               70.00   0.12895   0.01562  -0.05784  -0.03629  -0.01681   0.00000   0.01364   0.02369   0.02984   0.03192
              120.00   0.06523   0.05998   0.04993   0.03629   0.01948   0.00000  -0.02155  -0.04452  -0.06820  -0.09189
              180.00   0.04451   0.03128   0.01764   0.00358   0.00054   0.00000   0.00054   0.00358   0.01764   0.03128
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            </tableData>
          </table>
          </product>
        </function>
        <function name="aero/coefficient/CD_flap">
          <description>CD increment from flap (deg), over alpha</description>
          <product>
            <property>aero/qbar-psf</property>
            <property>metrics/Sw-sqft</property>
            <property>aero/function/mach-flap</property>
          <table>
            <independentVar lookup="row">aero/alpha-deg</independentVar>
            <independentVar lookup="column">fcs/flap-pos-deg</independentVar>
            <tableData>
                          0.00      5.00     10.00     15.00     20.00     25.00     30.00     35.00     40.00
             -180.00   0.00000   0.00069   0.00273   0.00605   0.01057   0.01614   0.02259   0.02973   0.03734
             -120.00   0.00000   0.00069   0.00272   0.00605   0.01057   0.01614   0.02258   0.02972   0.03733
              -70.00   0.00000   0.00069   0.00272   0.00605   0.01057   0.01613   0.02258   0.02972   0.03732
              -46.00   0.00000  -0.02725  -0.05056  -0.06648  -0.07518  -0.07927  -0.08115  -0.08227  -0.08334
              -32.00   0.00000  -0.02904  -0.05382  -0.07055  -0.07957  -0.08366  -0.08538  -0.08628  -0.08712
              -22.00   0.00000  -0.01914  -0.03434  -0.04406  -0.04854  -0.04954  -0.04874  -0.04720  -0.04553
              -17.00   0.00000  -0.01536  -0.02586  -0.03159  -0.03324  -0.03213  -0.02948  -0.02610  -0.02248
              -13.00   0.00000  -0.01383  -0.02207  -0.02557  -0.02546  -0.02298  -0.01909  -0.01439  -0.00924
               -9.00   0.00000  -0.01072  -0.01593  -0.01646  -0.01354  -0.00826  -0.00129   0.00698   0.01627
               -5.00   0.00000  -0.00557  -0.00566  -0.00161   0.00465   0.01221   0.02085   0.03054   0.04123
               -1.00   0.00000   0.00106   0.00679   0.01496   0.02384   0.03313   0.04312   0.05404   0.06593
                3.00   0.00000   0.00727   0.01846   0.03066   0.04222   0.05341   0.06499   0.07744   0.09089
                7.00   0.00000   0.01330   0.03005   0.04644   0.06079   0.07390   0.08706   0.10103   0.11608
               11.00   0.00000   0.01750   0.03938   0.05993   0.07704   0.09199   0.10663   0.12205   0.13863
               15.00   0.00000   0.01671   0.04070   0.06396   0.08310   0.09947   0.11524   0.13177   0.14957
               19.00   0.00000   0.01292   0.03546   0.05934   0.07948   0.09670   0.11323   0.13057   0.14931
               23.00   0.00000   0.01074   0.03003   0.05223   0.07178   0.08876   0.10523   0.12266   0.14167
               27.00   0.00000   0.01169   0.02778   0.04658   0.06393   0.07947   0.09484   0.11136   0.12961
               32.00   0.00000   0.01430   0.02848   0.04332   0.05720   0.07003   0.08302   0.09723   0.11319
               46.00   0.00000   0.01829   0.03254   0.04263   0.04984   0.05629   0.07745   0.08456   0.09231
               70.00   0.00000   0.00069   0.00272   0.00605   0.01057   0.01613   0.02258   0.02972   0.03732
              120.00   0.00000   0.00069   0.00272   0.00605   0.01057   0.01614   0.02258   0.02972   0.03733
              180.00   0.00000   0.00069   0.00273   0.00605   0.01057   0.01614   0.02259   0.02973   0.03734
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            </tableData>
          </table>
          </product>
        </function>
        <function name="aero/coefficient/CD_rudder">
          <description>CD increment from rudder (deg), over alpha</description>
          <product>
            <property>aero/qbar-psf</property>
            <property>metrics/Sw-sqft</property>
            <property>aero/function/mach-rudder</property>
          <table>
            <independentVar lookup="row">aero/alpha-deg</independentVar>
            <independentVar lookup="column">fcs/rudder-pos-deg</independentVar>
            <tableData>
                        -40.00    -35.00    -30.00    -25.00    -20.00    -15.00    -10.00     -5.00      0.00      5.00     10.00     15.00     20.00     25.00     30.00     35.00     40.00
             -180.00   0.01241   0.00988   0.00751   0.00537   0.00351   0.00201   0.00091   0.00023   0.00000   0.00023   0.00091   0.00201   0.00351   0.00537   0.00751   0.00988   0.01241
             -120.00   0.00271   0.00216   0.00164   0.00117   0.00077   0.00044   0.00020   0.00005   0.00000   0.00005   0.00020   0.00044   0.00077   0.00117   0.00164   0.00216   0.00271
              -70.00   0.00154   0.00123   0.00093   0.00067   0.00044   0.00025   0.00011   0.00003   0.00000   0.00003   0.00011   0.00025   0.00044   0.00067   0.00093   0.00123   0.00154
              -46.00   0.01129   0.00940   0.00760   0.00592   0.00433   0.00278   0.00139   0.00038   0.00000   0.00038   0.00139   0.00278   0.00433   0.00592   0.00760   0.00940   0.01129
              -32.00   0.01553   0.01281   0.01037   0.00812   0.00602   0.00398   0.00204   0.00056   0.00000   0.00056   0.00204   0.00398   0.00602   0.00812   0.01037   0.01281   0.01553
              -22.00   0.02033   0.01686   0.01366   0.01073   0.00797   0.00529   0.00272   0.00074   0.00000   0.00074   0.00272   0.00529   0.00797   0.01073   0.01366   0.01686   0.02033
              -17.00   0.02186   0.01812   0.01469   0.01153   0.00857   0.00568   0.00292   0.00080   0.00000   0.00080   0.00292   0.00568   0.00857   0.01153   0.01469   0.01812   0.02186
              -13.00   0.02294   0.01902   0.01542   0.01210   0.00899   0.00596   0.00307   0.00084   0.00000   0.00084   0.00307   0.00596   0.00899   0.01210   0.01542   0.01902   0.02294
               -9.00   0.02381   0.01974   0.01600   0.01256   0.00934   0.00619   0.00319   0.00087   0.00000   0.00087   0.00319   0.00619   0.00934   0.01256   0.01600   0.01974   0.02381
               -5.00   0.02439   0.02023   0.01639   0.01287   0.00957   0.00635   0.00327   0.00089   0.00000   0.00089   0.00327   0.00635   0.00957   0.01287   0.01639   0.02023   0.02439
               -1.00   0.02463   0.02043   0.01656   0.01300   0.00966   0.00641   0.00330   0.00090   0.00000   0.00090   0.00330   0.00641   0.00966   0.01300   0.01656   0.02043   0.02463
                3.00   0.02454   0.02035   0.01649   0.01295   0.00962   0.00638   0.00329   0.00090   0.00000   0.00090   0.00329   0.00638   0.00962   0.01295   0.01649   0.02035   0.02454
                7.00   0.02409   0.01997   0.01618   0.01270   0.00944   0.00626   0.00322   0.00088   0.00000   0.00088   0.00322   0.00626   0.00944   0.01270   0.01618   0.01997   0.02409
               11.00   0.02330   0.01932   0.01566   0.01229   0.00913   0.00605   0.00312   0.00085   0.00000   0.00085   0.00312   0.00605   0.00913   0.01229   0.01566   0.01932   0.02330
               15.00   0.02225   0.01845   0.01495   0.01173   0.00872   0.00578   0.00298   0.00081   0.00000   0.00081   0.00298   0.00578   0.00872   0.01173   0.01495   0.01845   0.02225
               19.00   0.02109   0.01764   0.01445   0.01125   0.00829   0.00547   0.00281   0.00077   0.00000   0.00077   0.00281   0.00547   0.00829   0.01125   0.01445   0.01764   0.02109
               23.00   0.02039   0.01699   0.01382   0.01094   0.00831   0.00564   0.00288   0.00081   0.00000   0.00081   0.00288   0.00564   0.00831   0.01094   0.01382   0.01699   0.02039
               27.00   0.01781   0.01480   0.01205   0.00962   0.00736   0.00510   0.00288   0.00103   0.00000   0.00103   0.00288   0.00510   0.00736   0.00962   0.01205   0.01480   0.01781
               32.00   0.01566   0.01294   0.01044   0.00814   0.00597   0.00388   0.00191   0.00061   0.00000   0.00061   0.00191   0.00388   0.00597   0.00814   0.01044   0.01294   0.01566
               46.00   0.01847   0.01649   0.01450   0.01253   0.01047   0.00798   0.00535   0.00583   0.00000   0.00583   0.00535   0.00798   0.01047   0.01253   0.01450   0.01649   0.01847
               70.00   0.00154   0.00123   0.00093   0.00067   0.00044   0.00025   0.00011   0.00003   0.00000   0.00003   0.00011   0.00025   0.00044   0.00067   0.00093   0.00123   0.00154
              120.00   0.00271   0.00216   0.00164   0.00117   0.00077   0.00044   0.00020   0.00005   0.00000   0.00005   0.00020   0.00044   0.00077   0.00117   0.00164   0.00216   0.00271
              180.00   0.01241   0.00988   0.00751   0.00537   0.00351   0.00201   0.00091   0.00023   0.00000   0.00023   0.00091   0.00201   0.00351   0.00537   0.00751   0.00988   0.01241
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            </tableData>
          </table>
          </product>
        </function>
        <function name="aero/coefficient/CD_ground">
          <description>Induced drag change in ground effect</description>
          <product>
            <property>aero/qbar-psf</property>
            <property>metrics/Sw-sqft</property>
            <property>aero/cl-squared</property>
            <value>0.11021</value>
          <table>
            <independentVar lookup="row">aero/h_b-mac-ft</independentVar>
            <tableData>
                    0.00   -1.00000
                    0.10   -0.28090
                    0.20   -0.08897
                    0.40   -0.02383
                    0.60   -0.01073
                    0.80   -0.00607
                    1.00   -0.00389
                    1.10   -0.00322
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            </tableData>
          </table>
          </product>
        </function>
        <function name="aero/coefficient/CD_surfaces_rudder">
          <description>surfaces: the drag of its rudder deflected 30 deg at the full speedbrake, its forces cancelling (hangar)</description>
          <product>
            <property>aero/qbar-psf</property>
            <property>metrics/Sw-sqft</property>
            <table>
              <independentVar lookup="row">aero/alpha-deg</independentVar>
              <independentVar lookup="column">fcs/speedbrake-rudder-deg</independentVar>
              <tableData>
                          -40.00    -35.00    -30.00    -25.00    -20.00    -15.00    -10.00     -5.00      0.00      5.00     10.00     15.00     20.00     25.00     30.00     35.00     40.00
               -180.00   0.01241   0.00988   0.00751   0.00537   0.00351   0.00201   0.00091   0.00023   0.00000   0.00023   0.00091   0.00201   0.00351   0.00537   0.00751   0.00988   0.01241
                -35.00   0.01548   0.01297   0.01058   0.00836   0.00625   0.00416   0.00215   0.00059   0.00000   0.00059   0.00215   0.00416   0.00625   0.00836   0.01058   0.01297   0.01548
                -11.00   0.02340   0.01941   0.01573   0.01235   0.00918   0.00609   0.00313   0.00086   0.00000   0.00086   0.00313   0.00609   0.00918   0.01235   0.01573   0.01941   0.02340
                  4.00   0.02446   0.02028   0.01644   0.01290   0.00959   0.00636   0.00327   0.00089   0.00000   0.00089   0.00327   0.00636   0.00959   0.01290   0.01644   0.02028   0.02446
                 19.00   0.02109   0.01764   0.01445   0.01125   0.00829   0.00547   0.00281   0.00077   0.00000   0.00077   0.00281   0.00547   0.00829   0.01125   0.01445   0.01764   0.02109
                 42.00   0.02594   0.02298   0.02008   0.01721   0.01469   0.01396   0.01351   0.01249   0.00000   0.01249   0.01351   0.01396   0.01469   0.01721   0.02008   0.02298   0.02594
                180.00   0.01241   0.00988   0.00751   0.00537   0.00351   0.00201   0.00091   0.00023   0.00000   0.00023   0.00091   0.00201   0.00351   0.00537   0.00751   0.00988   0.01241
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              </tableData>
            </table>
          </product>
        </function>
        <function name="aero/coefficient/CD_surfaces_flap">
          <description>surfaces: the drag of its flap deflected 20 deg at the full speedbrake, its forces cancelling (hangar)</description>
          <product>
            <property>aero/qbar-psf</property>
            <property>metrics/Sw-sqft</property>
            <table>
              <independentVar lookup="row">aero/alpha-deg</independentVar>
              <independentVar lookup="column">fcs/speedbrake-flap-deg</independentVar>
              <tableData>
                            0.00      5.00     10.00     15.00     20.00     25.00     30.00     35.00     40.00
               -180.00   0.00000   0.00069   0.00273   0.00605   0.01057   0.01614   0.02259   0.02973   0.03734
                -35.00   0.00000  -0.02971  -0.05504  -0.07229  -0.08167  -0.08600  -0.08795  -0.08907  -0.09015
                -11.00   0.00000  -0.01259  -0.01960  -0.02194  -0.02079  -0.01730  -0.01226  -0.00605   0.00128
                  4.00   0.00000   0.00881   0.02136   0.03457   0.04682   0.05849   0.07046   0.08330   0.09715
                 19.00   0.00000   0.01292   0.03546   0.05934   0.07948   0.09670   0.11323   0.13057   0.14931
                 42.00   0.00000   0.02107   0.03615   0.04706   0.05583   0.06378   0.07196   0.08094   0.09101
                180.00   0.00000   0.00069   0.00273   0.00605   0.01057   0.01614   0.02259   0.02973   0.03734
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              </tableData>
            </table>
          </product>
        </function>
        <function name="aero/coefficient/CD_gear">
          <description>the gear extended: its wheels' and struts' drag by Raymer's components, 0.383 m2 (hangar)</description>
          <product>
            <property>aero/qbar-psf</property>
            <property>metrics/Sw-sqft</property>
            <value>0.00828652</value>
            <property>gear/gear-pos-norm</property>
          </product>
        </function>
      </axis>
      <axis name="SIDE">
        <function name="aero/coefficient/CY_base">
          <description>CY over alpha and beta (hangar)</description>
          <product>
            <property>aero/qbar-psf</property>
            <property>metrics/Sw-sqft</property>
            <property>aero/function/mach-side</property>
          <table>
            <independentVar lookup="row">aero/alpha-deg</independentVar>
            <independentVar lookup="column">aero/beta-deg</independentVar>
            <tableData>
                        -90.00    -70.00    -50.00    -40.00    -30.00    -25.00    -20.00    -15.00    -10.00     -6.00     -3.00      0.00      3.00      6.00     10.00     15.00     20.00     25.00     30.00     40.00     50.00     70.00     90.00
             -180.00   0.00000   0.15101   0.17530   0.14407   0.09824   0.07419   0.05161   0.03322   0.07190   0.07485   0.03863  -0.00000  -0.03863  -0.07485  -0.07190  -0.03322  -0.05161  -0.07419  -0.09824  -0.14407  -0.17530  -0.15101  -0.00000
              -35.00   0.00000  -0.14191  -0.15678  -0.20997  -0.23287  -0.21481  -0.20287  -0.17265  -0.12535  -0.06728  -0.03428  -0.00000   0.03428   0.06728   0.12535   0.17265   0.20287   0.21481   0.23287   0.20997   0.15678   0.14191  -0.00000
              -11.00   0.00000   0.15961   0.24142   0.21711   0.18296   0.17863   0.16540   0.12542   0.08308   0.04934   0.02448  -0.00000  -0.02448  -0.04934  -0.08308  -0.12542  -0.16540  -0.17863  -0.18296  -0.21711  -0.24142  -0.15961  -0.00000
                4.00   0.00000   0.18784   0.26861   0.24464   0.20534   0.20347   0.18157   0.13619   0.08932   0.05240   0.02572  -0.00000  -0.02572  -0.05240  -0.08932  -0.13619  -0.18157  -0.20347  -0.20534  -0.24464  -0.26861  -0.18784  -0.00000
               19.00   0.00000   0.07864   0.14369   0.11220   0.08738   0.06302   0.04525   0.03333   0.03260   0.01900   0.00933  -0.00000  -0.00933  -0.01900  -0.03260  -0.03333  -0.04525  -0.06302  -0.08738  -0.11220  -0.14369  -0.07864  -0.00000
               42.00   0.00000  -0.21499  -0.32559  -0.39199  -0.41381  -0.38921  -0.33509  -0.26334  -0.17856  -0.10117  -0.02629  -0.00000   0.02629   0.10117   0.17856   0.26334   0.33509   0.38921   0.41381   0.39199   0.32559   0.21499  -0.00000
              180.00   0.00000   0.15101   0.17530   0.14407   0.09824   0.07419   0.05161   0.03322   0.07190   0.07485   0.03863  -0.00000  -0.03863  -0.07485  -0.07190  -0.03322  -0.05161  -0.07419  -0.09824  -0.14407  -0.17530  -0.15101  -0.00000
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            </tableData>
          </table>
          </product>
        </function>
        <function name="aero/coefficient/CY_aileron">
          <description>CY increment from aileron (deg), over alpha</description>
          <product>
            <property>aero/qbar-psf</property>
            <property>metrics/Sw-sqft</property>
            <property>aero/function/mach-aileron</property>
          <table>
            <independentVar lookup="row">aero/alpha-deg</independentVar>
            <independentVar lookup="column">fcs/left-aileron-pos-deg</independentVar>
            <tableData>
                        -25.00    -20.00    -15.00    -10.00     -5.00      0.00      5.00     10.00     15.00     20.00     25.00
             -180.00  -0.00179  -0.00218  -0.00202  -0.00143  -0.00072   0.00000   0.00072   0.00143   0.00202   0.00218   0.00179
              -35.00   0.00471   0.00381   0.00290   0.00197   0.00100   0.00000  -0.00100  -0.00197  -0.00290  -0.00381  -0.00471
              -11.00   0.00990   0.00823   0.00644   0.00446   0.00228   0.00000  -0.00228  -0.00446  -0.00644  -0.00823  -0.00990
                4.00   0.01199   0.01002   0.00789   0.00549   0.00282   0.00000  -0.00282  -0.00549  -0.00789  -0.01002  -0.01199
               19.00   0.01122   0.00936   0.00734   0.00509   0.00260   0.00000  -0.00260  -0.00509  -0.00734  -0.00936  -0.01122
               42.00   0.00498   0.00291   0.00178   0.00105   0.00038   0.00000  -0.00038  -0.00105  -0.00178  -0.00291  -0.00498
              180.00  -0.00179  -0.00218  -0.00202  -0.00143  -0.00072   0.00000   0.00072   0.00143   0.00202   0.00218   0.00179
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            </tableData>
          </table>
          </product>
        </function>
        <function name="aero/coefficient/CY_rudder">
          <description>CY increment from rudder (deg), over alpha</description>
          <product>
            <property>aero/qbar-psf</property>
            <property>metrics/Sw-sqft</property>
            <property>aero/function/mach-rudder</property>
          <table>
            <independentVar lookup="row">aero/alpha-deg</independentVar>
            <independentVar lookup="column">fcs/rudder-pos-deg</independentVar>
            <tableData>
                        -40.00    -35.00    -30.00    -25.00    -20.00    -15.00    -10.00     -5.00      0.00      5.00     10.00     15.00     20.00     25.00     30.00     35.00     40.00
             -180.00  -0.00000  -0.00000   0.00000   0.00000   0.00000   0.00000   0.00000   0.00000   0.00000   0.00000   0.00000   0.00000   0.00000   0.00000   0.00000  -0.00000  -0.00000
              -35.00  -0.06487  -0.05781  -0.05182  -0.04639  -0.04078  -0.03388  -0.02471  -0.01304   0.00000   0.01304   0.02471   0.03388   0.04078   0.04639   0.05182   0.05781   0.06487
              -11.00  -0.07939  -0.07341  -0.06754  -0.06151  -0.05465  -0.04579  -0.03356  -0.01775   0.00000   0.01775   0.03356   0.04579   0.05465   0.06151   0.06754   0.07341   0.07939
                4.00  -0.08169  -0.07558  -0.06958  -0.06342  -0.05641  -0.04730  -0.03470  -0.01836   0.00000   0.01836   0.03470   0.04730   0.05641   0.06342   0.06958   0.07558   0.08169
               19.00  -0.07233  -0.06738  -0.06257  -0.05679  -0.05031  -0.04213  -0.03090  -0.01637   0.00000   0.01637   0.03090   0.04213   0.05031   0.05679   0.06257   0.06738   0.07233
               42.00  -0.06990  -0.06395  -0.05881  -0.05328  -0.04855  -0.05025  -0.05276  -0.05397   0.00000   0.05397   0.05276   0.05025   0.04855   0.05328   0.05881   0.06395   0.06990
              180.00   0.00000  -0.00000  -0.00000  -0.00000  -0.00000  -0.00000  -0.00000   0.00000   0.00000   0.00000  -0.00000  -0.00000  -0.00000  -0.00000  -0.00000  -0.00000   0.00000
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            </tableData>
          </table>
          </product>
        </function>
        <function name="aero/coefficient/CYp">
          <description>CY per p (non-dimensional), over alpha</description>
          <product>
            <property>aero/qbar-psf</property>
            <property>metrics/Sw-sqft</property>
            <property>aero/bi2vel</property>
            <property>velocities/p-aero-rad_sec</property>
            <property>aero/function/mach-lift</property>
          <table>
            <independentVar lookup="row">aero/alpha-deg</independentVar>
            <tableData>
                 -180.00   -0.23178
                 -165.00   -0.16795
                  -32.00    0.00059
                  -10.00    0.00395
                    5.00    0.02954
                   20.00    0.04270
                   46.00   -0.84340
                  180.00   -0.23178
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            </tableData>
          </table>
          </product>
        </function>
        <function name="aero/coefficient/CYr">
          <description>CY per r (non-dimensional), over alpha</description>
          <product>
            <property>aero/qbar-psf</property>
            <property>metrics/Sw-sqft</property>
            <property>aero/bi2vel</property>
            <property>velocities/r-aero-rad_sec</property>
            <property>aero/function/mach-lift</property>
          <table>
            <independentVar lookup="row">aero/alpha-deg</independentVar>
            <tableData>
                 -180.00    0.59884
                 -165.00    0.40073
                  -32.00    0.09606
                  -10.00    0.16986
                    5.00    0.18455
                   20.00    0.12495
                   46.00    0.61804
                  180.00    0.59884
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            </tableData>
          </table>
          </product>
        </function>
      </axis>
      <axis name="LIFT">
        <function name="aero/coefficient/CL_base">
          <description>CL over alpha and beta, ground effect, compressibility (hangar)</description>
          <product>
            <property>aero/qbar-psf</property>
            <property>metrics/Sw-sqft</property>
            <property>aero/function/CL-base</property>
            <property>aero/function/mach-lift</property>
          <table>
            <independentVar lookup="row">aero/h_b-mac-ft</independentVar>
            <tableData>
                    0.00    1.20000
                    0.10    1.08692
                    0.20    1.03778
                    0.40    1.00713
                    0.60    1.00135
                    0.80    1.00025
                    1.00    1.00005
                    1.10    1.00000
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            </tableData>
          </table>
          </product>
        </function>
        <function name="aero/coefficient/CL_elevator">
          <description>CL increment from elevator (deg), over alpha</description>
          <product>
            <property>aero/qbar-psf</property>
            <property>metrics/Sw-sqft</property>
            <property>aero/function/mach-elevator</property>
          <table>
            <independentVar lookup="row">aero/alpha-deg</independentVar>
            <independentVar lookup="column">fcs/elevator-pos-deg</independentVar>
            <tableData>
                        -24.00    -20.00    -15.00    -10.00     -5.00      0.00      5.00     10.00     15.00     20.00
             -180.00  -0.10186  -0.08811  -0.06853  -0.09681  -0.09475   0.00000   0.09475   0.09681   0.06853   0.08811
              -35.00  -0.08041  -0.07798  -0.06861  -0.05224  -0.02875   0.00000   0.02876   0.07100   0.12338   0.18150
              -11.00  -0.29440  -0.25384  -0.19833  -0.13594  -0.06851   0.00000   0.06976   0.14121   0.21449   0.29057
                4.00  -0.35567  -0.29559  -0.21898  -0.14406  -0.07171   0.00000   0.07100   0.14204   0.21405   0.28394
               19.00  -0.33683  -0.27621  -0.20308  -0.13285  -0.06500   0.00000   0.06071   0.10831   0.15125   0.18927
               42.00  -0.14841  -0.11022  -0.07577  -0.04895  -0.02122   0.00000   0.01437   0.02197   0.02311   0.01784
              180.00  -0.10186  -0.08811  -0.06853  -0.09681  -0.09475   0.00000   0.09475   0.09681   0.06853   0.08811
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            </tableData>
          </table>
          </product>
        </function>
        <function name="aero/coefficient/CL_flap">
          <description>CL increment from flap (deg), over alpha</description>
          <product>
            <property>aero/qbar-psf</property>
            <property>metrics/Sw-sqft</property>
            <property>aero/function/mach-flap</property>
          <table>
            <independentVar lookup="row">aero/alpha-deg</independentVar>
            <independentVar lookup="column">fcs/flap-pos-deg</independentVar>
            <tableData>
                          0.00      5.00     10.00     15.00     20.00     25.00     30.00     35.00     40.00
             -180.00   0.00000   0.00000   0.00000  -0.00000  -0.00000  -0.00000  -0.00000  -0.00000  -0.00000
              -35.00   0.00000   0.06196   0.11571   0.15498   0.18103   0.19938   0.21477   0.22972   0.24525
              -11.00   0.00000   0.08170   0.15364   0.20671   0.24210   0.26705   0.28787   0.30803   0.32903
                4.00   0.00000   0.08060   0.15091   0.20239   0.23641   0.26006   0.27959   0.29844   0.31798
               19.00   0.00000   0.07757   0.14175   0.18639   0.21446   0.23301   0.24769   0.26148   0.27562
               42.00   0.00000   0.06020   0.11397   0.15343   0.17849   0.19485   0.20756   0.21910   0.23039
              180.00   0.00000   0.00000   0.00000   0.00000   0.00000   0.00000   0.00000   0.00000   0.00000
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            </tableData>
          </table>
          <table>
            <independentVar lookup="row">aero/h_b-mac-ft</independentVar>
            <tableData>
                    0.00    1.20000
                    0.10    1.08692
                    0.20    1.03778
                    0.40    1.00713
                    0.60    1.00135
                    0.80    1.00025
                    1.00    1.00005
                    1.10    1.00000
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            </tableData>
          </table>
          </product>
        </function>
        <function name="aero/coefficient/CLq">
          <description>CL per q (non-dimensional), over alpha</description>
          <product>
            <property>aero/qbar-psf</property>
            <property>metrics/Sw-sqft</property>
            <property>aero/ci2vel</property>
            <property>velocities/q-aero-rad_sec</property>
            <property>aero/function/mach-lift</property>
          <table>
            <independentVar lookup="row">aero/alpha-deg</independentVar>
            <tableData>
                 -180.00   -1.93726
                 -165.00   -0.24979
                  -32.00    4.50659
                  -10.00    6.52087
                    5.00    6.61767
                   20.00    6.15343
                   46.00    3.90865
                  180.00   -1.93726
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            </tableData>
          </table>
          </product>
        </function>
        <function name="aero/coefficient/CLadot">
          <description>CL per alpha-dot (downwash lag at the tail)</description>
          <product>
            <property>aero/qbar-psf</property>
            <property>metrics/Sw-sqft</property>
            <property>aero/ci2vel</property>
            <property>aero/alphadot-rad_sec</property>
            <value>0.43674</value>
            <property>aero/function/mach-lift</property>
          </product>
        </function>
      </axis>
      <axis name="ROLL">
        <function name="aero/coefficient/Cl_base">
          <description>Cl over alpha and beta (hangar)</description>
          <product>
            <property>aero/qbar-psf</property>
            <property>metrics/Sw-sqft</property>
            <property>metrics/bw-ft</property>
            <property>aero/function/mach-side</property>
          <table>
            <independentVar lookup="row">aero/alpha-deg</independentVar>
            <independentVar lookup="column">aero/beta-deg</independentVar>
            <tableData>
                        -90.00    -70.00    -50.00    -40.00    -30.00    -25.00    -20.00    -15.00    -10.00     -6.00     -3.00      0.00      3.00      6.00     10.00     15.00     20.00     25.00     30.00     40.00     50.00     70.00     90.00
             -180.00   0.01609   0.01090   0.00698   0.00580   0.00480   0.00428   0.00369   0.00318   0.01021   0.01133   0.00605  -0.00000  -0.00605  -0.01133  -0.01021  -0.00318  -0.00369  -0.00428  -0.00480  -0.00580  -0.00698  -0.01090  -0.01609
              -35.00   0.01609   0.01442   0.01224   0.01007   0.00026  -0.00468  -0.00965  -0.01018  -0.00828  -0.00369  -0.00183  -0.00000   0.00183   0.00369   0.00828   0.01018   0.00965   0.00468  -0.00026  -0.01007  -0.01224  -0.01442  -0.01609
              -11.00   0.01609   0.00583   0.00010  -0.01024  -0.02570  -0.02617  -0.02004  -0.01517  -0.01027  -0.00621  -0.00312  -0.00000   0.00312   0.00621   0.01027   0.01517   0.02004   0.02617   0.02570   0.01024  -0.00010  -0.00583  -0.01609
                4.00   0.01609   0.00304   0.00060   0.00456   0.01289   0.01665   0.01622   0.01291   0.00900   0.00554   0.00280  -0.00000  -0.00280  -0.00554  -0.00900  -0.01291  -0.01622  -0.01665  -0.01289  -0.00456  -0.00060  -0.00304  -0.01609
               19.00   0.01609  -0.00243   0.00097   0.01513   0.05145   0.05726   0.05099   0.04021   0.02893   0.01769   0.00890  -0.00000  -0.00890  -0.01769  -0.02893  -0.04021  -0.05099  -0.05726  -0.05145  -0.01513  -0.00097   0.00243  -0.01609
               42.00   0.01609   0.00155  -0.00949  -0.01493  -0.02023  -0.02188  -0.02094  -0.01727  -0.01069  -0.00488   0.00119  -0.00000  -0.00119   0.00488   0.01069   0.01727   0.02094   0.02188   0.02023   0.01493   0.00949  -0.00155  -0.01609
              180.00   0.01609   0.01090   0.00698   0.00580   0.00480   0.00428   0.00369   0.00318   0.01021   0.01133   0.00605  -0.00000  -0.00605  -0.01133  -0.01021  -0.00318  -0.00369  -0.00428  -0.00480  -0.00580  -0.00698  -0.01090  -0.01609
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            </tableData>
          </table>
          </product>
        </function>
        <function name="aero/coefficient/Cl_aileron">
          <description>Cl increment from aileron (deg), over alpha</description>
          <product>
            <property>aero/qbar-psf</property>
            <property>metrics/Sw-sqft</property>
            <property>metrics/bw-ft</property>
            <property>aero/function/mach-aileron</property>
          <table>
            <independentVar lookup="row">aero/alpha-deg</independentVar>
            <independentVar lookup="column">fcs/left-aileron-pos-deg</independentVar>
            <tableData>
                        -25.00    -20.00    -15.00    -10.00     -5.00      0.00      5.00     10.00     15.00     20.00     25.00
             -180.00   0.01657   0.02019   0.01869   0.01321   0.00669   0.00000  -0.00669  -0.01321  -0.01869  -0.02019  -0.01657
              -35.00  -0.03134  -0.02707  -0.02215  -0.01602  -0.00847   0.00000   0.00847   0.01602   0.02215   0.02707   0.03134
              -11.00  -0.04325  -0.03717  -0.03014  -0.02153  -0.01122   0.00000   0.01122   0.02153   0.03014   0.03717   0.04325
                4.00  -0.04319  -0.03703  -0.03001  -0.02144  -0.01118   0.00000   0.01118   0.02144   0.03001   0.03703   0.04319
               19.00  -0.03957  -0.03436  -0.02812  -0.02019  -0.01053   0.00000   0.01053   0.02019   0.02812   0.03436   0.03957
               42.00  -0.02665  -0.02332  -0.01917  -0.01383  -0.00725   0.00000   0.00725   0.01383   0.01917   0.02332   0.02665
              180.00   0.01657   0.02019   0.01869   0.01321   0.00669   0.00000  -0.00669  -0.01321  -0.01869  -0.02019  -0.01657
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            </tableData>
          </table>
          </product>
        </function>
        <function name="aero/coefficient/Cl_rudder">
          <description>Cl increment from rudder (deg), over alpha</description>
          <product>
            <property>aero/qbar-psf</property>
            <property>metrics/Sw-sqft</property>
            <property>metrics/bw-ft</property>
            <property>aero/function/mach-rudder</property>
          <table>
            <independentVar lookup="row">aero/alpha-deg</independentVar>
            <independentVar lookup="column">fcs/rudder-pos-deg</independentVar>
            <tableData>
                        -40.00    -35.00    -30.00    -25.00    -20.00    -15.00    -10.00     -5.00      0.00      5.00     10.00     15.00     20.00     25.00     30.00     35.00     40.00
             -180.00  -0.00000  -0.00000  -0.00000  -0.00000  -0.00000  -0.00000  -0.00000  -0.00000   0.00000  -0.00000  -0.00000  -0.00000  -0.00000  -0.00000  -0.00000  -0.00000  -0.00000
              -35.00  -0.00725  -0.00622  -0.00543  -0.00476  -0.00410  -0.00334  -0.00240  -0.00126   0.00000   0.00126   0.00240   0.00334   0.00410   0.00476   0.00543   0.00622   0.00725
              -11.00  -0.00799  -0.00733  -0.00668  -0.00601  -0.00527  -0.00436  -0.00316  -0.00166   0.00000   0.00166   0.00316   0.00436   0.00527   0.00601   0.00668   0.00733   0.00799
                4.00  -0.00936  -0.00858  -0.00782  -0.00704  -0.00617  -0.00510  -0.00370  -0.00195   0.00000   0.00195   0.00370   0.00510   0.00617   0.00704   0.00782   0.00858   0.00936
               19.00  -0.00897  -0.00827  -0.00761  -0.00683  -0.00595  -0.00490  -0.00355  -0.00187   0.00000   0.00187   0.00355   0.00490   0.00595   0.00683   0.00761   0.00827   0.00897
               42.00  -0.00664  -0.00576  -0.00488  -0.00396  -0.00325  -0.00385  -0.00506  -0.00615   0.00000   0.00615   0.00506   0.00385   0.00325   0.00396   0.00488   0.00576   0.00664
              180.00  -0.00000  -0.00000  -0.00000  -0.00000  -0.00000  -0.00000  -0.00000  -0.00000   0.00000  -0.00000  -0.00000  -0.00000  -0.00000  -0.00000  -0.00000  -0.00000  -0.00000
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            </tableData>
          </table>
          </product>
        </function>
        <function name="aero/coefficient/Clp">
          <description>Cl per p (non-dimensional), over alpha</description>
          <product>
            <property>aero/qbar-psf</property>
            <property>metrics/Sw-sqft</property>
            <property>metrics/bw-ft</property>
            <property>aero/bi2vel</property>
            <property>velocities/p-aero-rad_sec</property>
            <property>aero/function/mach-lift</property>
          <table>
            <independentVar lookup="row">aero/alpha-deg</independentVar>
            <tableData>
                 -180.00   -0.72788
                 -165.00   -0.20411
                  -32.00   -0.40871
                  -10.00   -0.34471
                    5.00   -0.32558
                   20.00   -0.38327
                   46.00   -0.35259
                  180.00   -0.72788
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            </tableData>
          </table>
          </product>
        </function>
        <function name="aero/coefficient/Clr">
          <description>Cl per r (non-dimensional), over alpha</description>
          <product>
            <property>aero/qbar-psf</property>
            <property>metrics/Sw-sqft</property>
            <property>metrics/bw-ft</property>
            <property>aero/bi2vel</property>
            <property>velocities/r-aero-rad_sec</property>
            <property>aero/function/mach-lift</property>
          <table>
            <independentVar lookup="row">aero/alpha-deg</independentVar>
            <tableData>
                 -180.00    0.07854
                 -165.00    0.09344
                  -32.00   -0.23209
                  -10.00   -0.05908
                    5.00    0.06718
                   20.00    0.18044
                   46.00    0.55094
                  180.00    0.07854
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            </tableData>
          </table>
          </product>
        </function>
      </axis>
      <axis name="PITCH">
        <function name="aero/coefficient/Cm_base">
          <description>Cm over alpha and beta (hangar)</description>
          <product>
            <property>aero/qbar-psf</property>
            <property>metrics/Sw-sqft</property>
            <property>metrics/cbarw-ft</property>
          <table>
            <independentVar lookup="row">aero/alpha-deg</independentVar>
            <independentVar lookup="column">aero/beta-deg</independentVar>
            <tableData>
                        -90.00    -70.00    -50.00    -40.00    -30.00    -25.00    -20.00    -15.00    -10.00     -6.00     -3.00      0.00      3.00      6.00     10.00     15.00     20.00     25.00     30.00     40.00     50.00     70.00     90.00
             -180.00  -0.00000   0.00006   0.00031   0.00044   0.00055   0.00059   0.00063   0.00086   0.00489   0.00328   0.00123   0.00051   0.00123   0.00328   0.00489   0.00086   0.00063   0.00059   0.00055   0.00044   0.00031   0.00006  -0.00000
              -35.00   0.00000   0.01948  -0.03184  -0.06033  -0.07349  -0.08538  -0.09771  -0.11387  -0.12739  -0.13262  -0.13648  -0.13814  -0.13648  -0.13262  -0.12739  -0.11387  -0.09771  -0.08538  -0.07349  -0.06033  -0.03184   0.01948   0.00000
              -11.00  -0.00000   0.01619  -0.01851  -0.02891  -0.03279  -0.04058  -0.03855  -0.04009  -0.04080  -0.04088  -0.04081  -0.04076  -0.04081  -0.04088  -0.04080  -0.04009  -0.03855  -0.04058  -0.03279  -0.02891  -0.01851   0.01619  -0.00000
                4.00   0.00000  -0.00441   0.00300   0.00497   0.00307   0.01350   0.01295   0.01115   0.00952   0.00842   0.00778   0.00750   0.00778   0.00842   0.00952   0.01115   0.01295   0.01350   0.00307   0.00497   0.00300  -0.00441   0.00000
               19.00   0.00000  -0.01127   0.02424   0.04461   0.05589   0.06352   0.07121   0.07477   0.08012   0.08038   0.08045   0.08047   0.08045   0.08038   0.08012   0.07477   0.07121   0.06352   0.05589   0.04461   0.02424  -0.01127   0.00000
               42.00  -0.00000  -0.01195   0.03408   0.05123   0.07149   0.07720   0.08255   0.08563   0.08377   0.08023   0.07631   0.08865   0.07631   0.08023   0.08377   0.08563   0.08255   0.07720   0.07149   0.05123   0.03408  -0.01195  -0.00000
              180.00  -0.00000   0.00006   0.00031   0.00044   0.00055   0.00059   0.00063   0.00086   0.00489   0.00328   0.00123   0.00051   0.00123   0.00328   0.00489   0.00086   0.00063   0.00059   0.00055   0.00044   0.00031   0.00006  -0.00000
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            </tableData>
          </table>
          </product>
        </function>
        <function name="aero/coefficient/Cm_mach">
          <description>Cm from the neutral point's move with Mach</description>
          <product>
            <property>aero/qbar-psf</property>
            <property>metrics/Sw-sqft</property>
            <property>metrics/cbarw-ft</property>
            <property>aero/function/CL-base</property>
            <property>aero/function/mach-dCm-dCL</property>
          </product>
        </function>
        <function name="aero/coefficient/Cm_elevator">
          <description>Cm increment from elevator (deg), over alpha</description>
          <product>
            <property>aero/qbar-psf</property>
            <property>metrics/Sw-sqft</property>
            <property>metrics/cbarw-ft</property>
            <property>aero/function/mach-elevator</property>
          <table>
            <independentVar lookup="row">aero/alpha-deg</independentVar>
            <independentVar lookup="column">fcs/elevator-pos-deg</independentVar>
            <tableData>
                        -24.00    -20.00    -15.00    -10.00     -5.00      0.00      5.00     10.00     15.00     20.00
             -180.00  -0.16122  -0.14025  -0.10986  -0.15735  -0.15448   0.00000   0.15461   0.15819   0.11400   0.14759
              -35.00   0.15344   0.13874   0.11374   0.08168   0.04285   0.00000  -0.03811  -0.08905  -0.14738  -0.20829
              -11.00   0.30227   0.26005   0.20258   0.13810   0.06896   0.00000  -0.06954  -0.14046  -0.21300  -0.28821
                4.00   0.34225   0.28718   0.21435   0.14160   0.07089   0.00000  -0.07113  -0.14387  -0.22025  -0.29665
               19.00   0.32236   0.26822   0.20056   0.13364   0.06681   0.00000  -0.06631  -0.12006  -0.17339  -0.22438
               42.00   0.22194   0.17961   0.13451   0.09275   0.04447   0.00000  -0.03931  -0.07280  -0.10012  -0.12080
              180.00  -0.16122  -0.14025  -0.10986  -0.15735  -0.15448   0.00000   0.15461   0.15819   0.11400   0.14759
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            </tableData>
          </table>
          </product>
        </function>
        <function name="aero/coefficient/Cm_flap">
          <description>Cm increment from flap (deg), over alpha</description>
          <product>
            <property>aero/qbar-psf</property>
            <property>metrics/Sw-sqft</property>
            <property>metrics/cbarw-ft</property>
            <property>aero/function/mach-flap</property>
          <table>
            <independentVar lookup="row">aero/alpha-deg</independentVar>
            <independentVar lookup="column">fcs/flap-pos-deg</independentVar>
            <tableData>
                          0.00      5.00     10.00     15.00     20.00     25.00     30.00     35.00     40.00
             -180.00   0.00000   0.00001   0.00004   0.00008   0.00014   0.00022   0.00031   0.00040   0.00050
              -35.00   0.00000  -0.00965  -0.01857  -0.02596  -0.03176  -0.03658  -0.04106  -0.04555  -0.05020
              -11.00   0.00000  -0.00264  -0.00501  -0.00689  -0.00837  -0.00962  -0.01075  -0.01182  -0.01284
                4.00   0.00000  -0.00076  -0.00156  -0.00233  -0.00307  -0.00379  -0.00452  -0.00522  -0.00592
               19.00   0.00000  -0.00299  -0.00605  -0.00900  -0.01176  -0.01440  -0.01704  -0.01976  -0.02260
               42.00   0.00000  -0.01060  -0.01874  -0.02484  -0.02930  -0.03292  -0.03636  -0.03976  -0.04322
              180.00   0.00000   0.00001   0.00004   0.00008   0.00014   0.00022   0.00031   0.00040   0.00050
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            </tableData>
          </table>
          </product>
        </function>
        <function name="aero/coefficient/Cmq">
          <description>Cm per q (non-dimensional), over alpha</description>
          <product>
            <property>aero/qbar-psf</property>
            <property>metrics/Sw-sqft</property>
            <property>metrics/cbarw-ft</property>
            <property>aero/ci2vel</property>
            <property>velocities/q-aero-rad_sec</property>
            <property>aero/function/mach-lift</property>
          <table>
            <independentVar lookup="row">aero/alpha-deg</independentVar>
            <tableData>
                 -180.00   -8.31906
                 -165.00   -0.89344
                  -32.00   -4.44584
                  -10.00   -4.59157
                    5.00   -4.34659
                   20.00   -5.02241
                   46.00   -4.48682
                  180.00   -8.31906
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            </tableData>
          </table>
          </product>
        </function>
        <function name="aero/coefficient/Cmadot">
          <description>Cm per alpha-dot (downwash lag at the tail)</description>
          <product>
            <property>aero/qbar-psf</property>
            <property>metrics/Sw-sqft</property>
            <property>metrics/cbarw-ft</property>
            <property>aero/ci2vel</property>
            <property>aero/alphadot-rad_sec</property>
            <value>-0.53368</value>
            <property>aero/function/mach-lift</property>
          </product>
        </function>
        <function name="aero/coefficient/Cm_gear">
          <description>the gear's drag's pitching moment, -1.73 m from the reference point's height</description>
          <product>
            <property>aero/qbar-psf</property>
            <property>metrics/Sw-sqft</property>
            <property>metrics/cbarw-ft</property>
            <value>-0.00358836</value>
            <property>gear/gear-pos-norm</property>
          </product>
        </function>
      </axis>
      <axis name="YAW">
        <function name="aero/coefficient/Cn_base">
          <description>Cn over alpha and beta (hangar)</description>
          <product>
            <property>aero/qbar-psf</property>
            <property>metrics/Sw-sqft</property>
            <property>metrics/bw-ft</property>
            <property>aero/function/mach-side</property>
          <table>
            <independentVar lookup="row">aero/alpha-deg</independentVar>
            <independentVar lookup="column">aero/beta-deg</independentVar>
            <tableData>
                        -90.00    -70.00    -50.00    -40.00    -30.00    -25.00    -20.00    -15.00    -10.00     -6.00     -3.00      0.00      3.00      6.00     10.00     15.00     20.00     25.00     30.00     40.00     50.00     70.00     90.00
             -180.00  -0.01886  -0.04341  -0.06081  -0.06195  -0.05631  -0.05081  -0.04357  -0.03514  -0.04523  -0.04099  -0.02157  -0.00000   0.02157   0.04099   0.04523   0.03514   0.04357   0.05081   0.05631   0.06195   0.06081   0.04341   0.01886
              -35.00  -0.01886  -0.00124   0.01217   0.01871   0.01958   0.01462   0.01361   0.01091   0.00749   0.00103   0.00051  -0.00000  -0.00051  -0.00103  -0.00749  -0.01091  -0.01361  -0.01462  -0.01958  -0.01871  -0.01217   0.00124   0.01886
              -11.00  -0.01886   0.00084   0.01752   0.02386   0.01932   0.00993   0.00030  -0.00110  -0.00133  -0.00101  -0.00055  -0.00000   0.00055   0.00101   0.00133   0.00110  -0.00030  -0.00993  -0.01932  -0.02386  -0.01752  -0.00084   0.01886
                4.00  -0.01886  -0.00026   0.01586   0.02059   0.01405   0.00242  -0.00442  -0.00468  -0.00394  -0.00272  -0.00146  -0.00000   0.00146   0.00272   0.00394   0.00468   0.00442  -0.00242  -0.01405  -0.02059  -0.01586   0.00026   0.01886
               19.00  -0.01886   0.00025   0.01340   0.01936   0.01080   0.00901   0.00616   0.00307  -0.00230  -0.00162  -0.00084  -0.00000   0.00084   0.00162   0.00230  -0.00307  -0.00616  -0.00901  -0.01080  -0.01936  -0.01340  -0.00025   0.01886
               42.00  -0.01886  -0.00222   0.00792   0.01167   0.01408   0.01280   0.00833   0.00475   0.00121  -0.00179  -0.00684  -0.00000   0.00684   0.00179  -0.00121  -0.00475  -0.00833  -0.01280  -0.01408  -0.01167  -0.00792   0.00222   0.01886
              180.00  -0.01886  -0.04341  -0.06081  -0.06195  -0.05631  -0.05081  -0.04357  -0.03514  -0.04523  -0.04099  -0.02157  -0.00000   0.02157   0.04099   0.04523   0.03514   0.04357   0.05081   0.05631   0.06195   0.06081   0.04341   0.01886
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            </tableData>
          </table>
          </product>
        </function>
        <function name="aero/coefficient/Cn_aileron">
          <description>Cn increment from aileron (deg), over alpha</description>
          <product>
            <property>aero/qbar-psf</property>
            <property>metrics/Sw-sqft</property>
            <property>metrics/bw-ft</property>
            <property>aero/function/mach-aileron</property>
          <table>
            <independentVar lookup="row">aero/alpha-deg</independentVar>
            <independentVar lookup="column">fcs/left-aileron-pos-deg</independentVar>
            <tableData>
                        -25.00    -20.00    -15.00    -10.00     -5.00      0.00      5.00     10.00     15.00     20.00     25.00
             -180.00   0.00094   0.00115   0.00106   0.00075   0.00038   0.00000  -0.00038  -0.00075  -0.00106  -0.00115  -0.00094
              -35.00  -0.00353  -0.00258  -0.00168  -0.00095  -0.00042   0.00000   0.00042   0.00095   0.00168   0.00258   0.00353
              -11.00  -0.00460  -0.00371  -0.00280  -0.00184  -0.00088   0.00000   0.00088   0.00184   0.00280   0.00371   0.00460
                4.00  -0.00280  -0.00231  -0.00178  -0.00121  -0.00061   0.00000   0.00061   0.00121   0.00178   0.00231   0.00280
               19.00  -0.00294  -0.00310  -0.00321  -0.00306  -0.00211   0.00000   0.00211   0.00306   0.00321   0.00310   0.00294
               42.00  -0.00077  -0.00109  -0.00140  -0.00134  -0.00077   0.00000   0.00077   0.00134   0.00140   0.00109   0.00077
              180.00   0.00094   0.00115   0.00106   0.00075   0.00038   0.00000  -0.00038  -0.00075  -0.00106  -0.00115  -0.00094
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            </tableData>
          </table>
          </product>
        </function>
        <function name="aero/coefficient/Cn_rudder">
          <description>Cn increment from rudder (deg), over alpha</description>
          <product>
            <property>aero/qbar-psf</property>
            <property>metrics/Sw-sqft</property>
            <property>metrics/bw-ft</property>
            <property>aero/function/mach-rudder</property>
          <table>
            <independentVar lookup="row">aero/alpha-deg</independentVar>
            <independentVar lookup="column">fcs/rudder-pos-deg</independentVar>
            <tableData>
                        -40.00    -35.00    -30.00    -25.00    -20.00    -15.00    -10.00     -5.00      0.00      5.00     10.00     15.00     20.00     25.00     30.00     35.00     40.00
             -180.00  -0.00000   0.00000   0.00000   0.00000   0.00000   0.00000   0.00000   0.00000   0.00000   0.00000   0.00000   0.00000   0.00000   0.00000   0.00000   0.00000  -0.00000
              -35.00   0.02384   0.02134   0.01922   0.01730   0.01527   0.01274   0.00932   0.00492   0.00000  -0.00492  -0.00932  -0.01274  -0.01527  -0.01730  -0.01922  -0.02134  -0.02384
              -11.00   0.03049   0.02822   0.02601   0.02374   0.02115   0.01776   0.01304   0.00690   0.00000  -0.00690  -0.01304  -0.01776  -0.02115  -0.02374  -0.02601  -0.02822  -0.03049
                4.00   0.03298   0.03057   0.02823   0.02583   0.02307   0.01942   0.01429   0.00757   0.00000  -0.00757  -0.01429  -0.01942  -0.02307  -0.02583  -0.02823  -0.03057  -0.03298
               19.00   0.02758   0.02567   0.02384   0.02171   0.01930   0.01620   0.01190   0.00631   0.00000  -0.00631  -0.01190  -0.01620  -0.01930  -0.02171  -0.02384  -0.02567  -0.02758
               42.00   0.02469   0.02259   0.02058   0.01845   0.01651   0.01630   0.01602   0.01495   0.00000  -0.01495  -0.01602  -0.01630  -0.01651  -0.01845  -0.02058  -0.02259  -0.02469
              180.00  -0.00000   0.00000   0.00000   0.00000   0.00000   0.00000   0.00000   0.00000   0.00000   0.00000   0.00000   0.00000   0.00000   0.00000   0.00000   0.00000  -0.00000
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            </tableData>
          </table>
          </product>
        </function>
        <function name="aero/coefficient/Cnp">
          <description>Cn per p (non-dimensional), over alpha</description>
          <product>
            <property>aero/qbar-psf</property>
            <property>metrics/Sw-sqft</property>
            <property>metrics/bw-ft</property>
            <property>aero/bi2vel</property>
            <property>velocities/p-aero-rad_sec</property>
            <property>aero/function/mach-lift</property>
          <table>
            <independentVar lookup="row">aero/alpha-deg</independentVar>
            <tableData>
                 -180.00    0.09350
                 -165.00    0.06579
                  -32.00    0.02376
                  -10.00    0.04635
                    5.00   -0.02416
                   20.00   -0.01199
                   46.00    0.19709
                  180.00    0.09350
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            </tableData>
          </table>
          </product>
        </function>
        <function name="aero/coefficient/Cnr">
          <description>Cn per r (non-dimensional), over alpha</description>
          <product>
            <property>aero/qbar-psf</property>
            <property>metrics/Sw-sqft</property>
            <property>metrics/bw-ft</property>
            <property>aero/bi2vel</property>
            <property>velocities/r-aero-rad_sec</property>
            <property>aero/function/mach-lift</property>
          <table>
            <independentVar lookup="row">aero/alpha-deg</independentVar>
            <tableData>
                 -180.00   -0.15951
                 -165.00   -0.10698
                  -32.00   -0.14664
                  -10.00   -0.14736
                    5.00   -0.14463
                   20.00   -0.13802
                   46.00   -0.29848
                  180.00   -0.15951
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            </tableData>
          </table>
          </product>
        </function>
      </axis>
    </aerodynamics>
</fdm_config>
