<?xml version="1.0"?>
<!-- Generated by hangar: blade-element momentum theory for a 4-blade constant-speed
     propeller, 4.115 m diameter, governed at 1020 rpm, its blades 15.0-65.0 deg at 75 %
     radius (activity factor 272), on the ground down to ground idle's -4.43 deg, where it
     makes no thrust standing still; compressibility from the same blades at J 2.00 and
     40.0 deg (Lock's drag rise past Korn's drag divergence). -->
<propeller name="ec130h propeller 0">
  <ixx> 516.292 </ixx>
  <diameter unit="M"> 4.1150 </diameter>
  <numblades> 4 </numblades>
  <gearratio> 13.5400 </gearratio>
  <minpitch> 15.00 </minpitch>
  <maxpitch> 65.00 </maxpitch>
  <minrpm> 816.0 </minrpm>
  <maxrpm> 1122.0 </maxrpm>
  <table name="C_THRUST" type="internal">
    <tableData>
                -4.43     0.00     5.00    10.00    14.99    15.00    20.00    25.00    30.00    35.00    40.00    45.00    50.00    55.00    60.00    65.00
       0.00  -0.00092  0.06319  0.13691  0.23061  0.33618  0.33618  0.44268  0.53108  0.58755  0.57901  0.48862  0.38963  0.31911  0.25817  0.20756  0.16132
       0.10  -0.15399 -0.00319  0.10626  0.20310  0.30644  0.30644  0.41275  0.51715  0.58867  0.59911  0.53328  0.41091  0.33852  0.27734  0.22427  0.17613
       0.20  -0.22841 -0.04919  0.07575  0.17360  0.27409  0.27409  0.38107  0.48686  0.58011  0.61887  0.57218  0.44780  0.35961  0.30444  0.24151  0.19118
       0.30  -0.29594 -0.10049  0.04213  0.13660  0.23634  0.23634  0.34700  0.45445  0.55821  0.62626  0.60439  0.48709  0.38331  0.32334  0.25950  0.20658
       0.40  -0.36343 -0.15094  0.00807  0.09074  0.19738  0.19738  0.30846  0.42057  0.52681  0.62635  0.63691  0.54043  0.42161  0.34390  0.27869  0.22267
       0.50  -0.44185 -0.21306 -0.02974  0.05140  0.15524  0.15524  0.26851  0.38291  0.49355  0.59706  0.66789  0.59967  0.46278  0.36673  0.29968  0.23971
       0.60  -0.52842 -0.27086 -0.08584  0.01521  0.11717  0.11717  0.22589  0.34363  0.45898  0.56603  0.66449  0.64717  0.50741  0.39264  0.32781  0.25798
       0.70  -0.60110 -0.35095 -0.14380 -0.03063  0.07402  0.07402  0.18028  0.30193  0.42213  0.53340  0.63650  0.70427  0.56704  0.43555  0.35004  0.27776
       0.80  -0.67405 -0.43140 -0.20797 -0.08772  0.01217  0.01217  0.13816  0.25775  0.38164  0.49953  0.60716  0.70421  0.63428  0.46883  0.37476  0.29942
       0.90  -0.73366 -0.50611 -0.28060 -0.14287 -0.04311 -0.04311  0.08669  0.21104  0.34014  0.46378  0.57643  0.67873  0.71078  0.51920  0.40260  0.32984
       1.00  -0.79418 -0.58826 -0.34999 -0.20758 -0.10172 -0.10172  0.03225  0.16753  0.29648  0.42630  0.54442  0.65200  0.74692  0.58500  0.43487  0.35324
       1.10  -0.83902 -0.66479 -0.43030 -0.27823 -0.15611 -0.15611 -0.02519  0.11570  0.25062  0.38706  0.51091  0.62414  0.72494  0.68936  0.48506  0.37900
       1.20  -0.87643 -0.76348 -0.50876 -0.35173 -0.22173 -0.22173 -0.09037  0.06124  0.20251  0.34419  0.47603  0.59537  0.70174  0.79148  0.54202  0.40754
       1.30  -0.90374 -0.84422 -0.59299 -0.43181 -0.29149 -0.29149 -0.15426  0.00390  0.15706  0.30088  0.44031  0.56548  0.67763  0.77561  0.60160  0.43943
       1.40  -0.91478 -0.93379 -0.68749 -0.50691 -0.37057 -0.37057 -0.22103 -0.05564  0.10424  0.25567  0.40267  0.53444  0.65270  0.75668  0.72538  0.48818
       1.50  -0.91608 -0.98975 -0.78511 -0.59041 -0.43504 -0.43504 -0.29619 -0.11836  0.04910  0.20854  0.36351  0.50224  0.62707  0.73693  0.82829  0.53006
       1.60  -0.82955 -1.04255 -0.87297 -0.68820 -0.51441 -0.51441 -0.36904 -0.18388 -0.00841  0.15946  0.32282  0.46889  0.60057  0.71651  0.81598  0.59165
       1.70  -0.83338 -1.07372 -0.96178 -0.77733 -0.60891 -0.60891 -0.44507 -0.25285 -0.06830  0.10840  0.28057  0.43437  0.57319  0.69548  0.80099  0.72704
       1.80  -0.85309 -0.95796 -1.06542 -0.87162 -0.69216 -0.69216 -0.51270 -0.32754 -0.13039  0.05970  0.23478  0.39888  0.54492  0.67383  0.78543  0.86319
       1.90  -0.87901 -0.92846 -1.18963 -0.98152 -0.78259 -0.78259 -0.59323 -0.40667 -0.19491  0.00441  0.18902  0.36202  0.51572  0.65155  0.76939  0.86049
       2.00  -0.91140 -0.94834 -1.16142 -1.08663 -0.88399 -0.88399 -0.67971 -0.48281 -0.26190 -0.05292  0.14161  0.32341  0.48559  0.62871  0.75291  0.85206
       2.10  -0.94854 -0.97593 -1.11598 -1.18343 -0.98392 -0.98392 -0.76985 -0.56175 -0.33136 -0.11224  0.09254  0.28386  0.45450  0.60527  0.73600  0.84237
       2.20  -0.98997 -1.01047 -1.11779 -1.29655 -1.08160 -1.08160 -0.85395 -0.64460 -0.40334 -0.17342  0.04178  0.24301  0.42258  0.58115  0.71867  0.83195
       2.30  -1.03530 -1.05001 -1.11647 -1.24110 -1.18940 -1.18940 -0.96098 -0.73048 -0.47948 -0.23670 -0.01068  0.20175  0.38967  0.55635  0.70089  0.82097
       2.40  -1.08410 -1.09351 -1.13347 -1.22852 -1.30031 -1.30031 -1.06134 -0.81975 -0.55487 -0.30211 -0.06075  0.15839  0.35577  0.53084  0.68266  0.80953
       2.50  -1.13595 -1.14064 -1.15967 -1.24844 -1.41202 -1.41202 -1.16512 -0.91207 -0.63467 -0.37263 -0.11669  0.11368  0.32086  0.50463  0.66396  0.79767
       2.60  -1.19105 -1.19147 -1.20070 -1.26728 -1.41691 -1.41691 -1.27235 -0.99002 -0.71672 -0.44196 -0.17457  0.06762  0.28492  0.47769  0.64480  0.78543
       2.70  -1.24912 -1.24598 -1.24851 -1.30697 -1.38242 -1.38242 -1.38253 -1.08892 -0.80159 -0.51343 -0.23422  0.02018  0.24795  0.45002  0.62515  0.77282
       2.80  -1.30918 -1.30286 -1.29959 -1.33413 -1.39678 -1.39678 -1.48732 -1.19107 -0.88946 -0.58704 -0.29553 -0.02863  0.20994  0.42161  0.60501  0.75986
       2.90  -1.37283 -1.36296 -1.35432 -1.38472 -1.40851 -1.40851 -1.59942 -1.29653 -0.98006 -0.66143 -0.35842 -0.08082  0.17087  0.39244  0.58437  0.74654
       3.00  -1.43883 -1.42582 -1.41251 -1.43783 -1.44742 -1.44742 -1.71136 -1.40499 -1.08206 -0.73985 -0.42311 -0.13264  0.13073  0.36251  0.56322  0.73288
       3.10  -1.50779 -1.49137 -1.47355 -1.49277 -1.48779 -1.48779 -1.62422 -1.51649 -1.17893 -0.82081 -0.48960 -0.18587  0.08953  0.33181  0.54156  0.71886
       3.20  -1.57888 -1.56039 -1.53704 -1.54594 -1.52083 -1.52083 -1.61725 -1.63058 -1.27885 -0.90340 -0.55789 -0.24054  0.04724  0.30033  0.51937  0.70451
       3.30  -1.65304 -1.63111 -1.60357 -1.59357 -1.57808 -1.57808 -1.65347 -1.74625 -1.38176 -0.98871 -0.63094 -0.29664  0.00386  0.26808  0.49665  0.68981
       3.40  -1.72973 -1.70750 -1.67294 -1.64570 -1.63618 -1.63618 -1.65563 -1.86036 -1.48747 -1.07659 -0.70264 -0.35418 -0.04060  0.23503  0.47340  0.67477
       3.50  -1.80892 -1.78443 -1.74573 -1.70952 -1.69837 -1.69837 -1.71025 -1.96104 -1.59625 -1.16693 -0.77616 -0.41317 -0.08615  0.20120  0.44961  0.65937
       3.60  -1.89060 -1.86389 -1.82105 -1.77803 -1.76364 -1.76364 -1.74325 -1.96393 -1.70772 -1.26012 -0.85150 -0.47362 -0.13276  0.16664  0.42527  0.64363
       3.70  -1.97474 -1.94587 -1.89900 -1.84902 -1.83193 -1.83193 -1.79393 -1.93212 -1.82168 -1.35585 -0.92866 -0.53553 -0.18036  0.13128  0.40040  0.62752
       3.80  -2.06131 -2.03035 -1.97952 -1.92351 -1.90298 -1.90298 -1.84316 -1.96302 -1.90992 -1.45416 -1.00609 -0.59484 -0.22932  0.09510  0.37504  0.61106
       3.90  -2.15034 -2.11730 -2.06256 -2.00088 -1.97642 -1.97642 -1.90564 -1.98964 -2.02750 -1.55535 -1.08724 -0.65981 -0.27928  0.05811  0.34911  0.59424
       4.00  -2.24182 -2.20671 -2.14809 -2.08093 -2.05174 -2.05174 -1.96952 -2.03014 -2.14449 -1.65912 -1.17116 -0.72635 -0.33037  0.02030  0.32263  0.57705
       6.00  -2.24182 -2.20671 -2.14809 -2.08093 -2.05174 -2.05174 -1.96952 -2.03014 -2.14449 -1.65912 -1.17116 -0.72635 -0.33037  0.02030  0.32263  0.57705
    </tableData>
  </table>
  <table name="C_POWER" type="internal">
    <tableData>
                -4.43     0.00     5.00    10.00    14.99    15.00    20.00    25.00    30.00    35.00    40.00    45.00    50.00    55.00    60.00    65.00
       0.00   0.01673  0.03083  0.06217  0.11676  0.20079  0.20079  0.31114  0.43282  0.55052  0.62367  0.61413  0.59078  0.59885  0.60457  0.62122  0.62776
       0.10   0.01655  0.02764  0.05522  0.10974  0.19274  0.19274  0.30367  0.43933  0.57071  0.66232  0.67962  0.62179  0.62862  0.63976  0.65971  0.67325
       0.20   0.00123  0.01832  0.04674  0.09953  0.18185  0.18185  0.29357  0.43153  0.58373  0.70403  0.74292  0.67964  0.66080  0.69644  0.69705  0.71702
       0.30  -0.01812  0.00487  0.03599  0.08583  0.16619  0.16619  0.28008  0.42027  0.58486  0.73599  0.80190  0.74431  0.69805  0.72891  0.73368  0.75774
       0.40  -0.04322 -0.01083  0.02511  0.06657  0.14763  0.14763  0.26131  0.40571  0.57435  0.76410  0.86697  0.83586  0.76747  0.76418  0.77162  0.79701
       0.50  -0.07739 -0.03436  0.01028  0.04672  0.12464  0.12464  0.23895  0.38551  0.55972  0.75653  0.93759  0.94487  0.84354  0.80453  0.81354  0.83669
       0.60  -0.11969 -0.06025 -0.01431  0.02695  0.10051  0.10051  0.21174  0.36106  0.54116  0.74442  0.96774  1.04319  0.93079  0.85298  0.88065  0.87848
       0.70  -0.16018 -0.10104 -0.04351 -0.00069  0.07177  0.07177  0.17896  0.33128  0.51730  0.72769  0.96083  1.16818  1.05403  0.94607  0.92660  0.92419
       0.80  -0.20510 -0.14684 -0.08051 -0.03772  0.02703  0.02703  0.14522  0.29573  0.48617  0.70648  0.94916  1.21054  1.20400  1.01878  0.98018  0.97579
       0.90  -0.24607 -0.19374 -0.12619 -0.07788 -0.01793 -0.01793  0.10067  0.25399  0.45035  0.67961  0.93248  1.20724  1.38375  1.13925  1.04427  1.06323
       1.00  -0.29014 -0.25032 -0.17381 -0.12870 -0.06953 -0.06953  0.04939  0.21115  0.40820  0.64693  0.91069  1.19873  1.50355  1.30427  1.12391  1.12354
       1.10  -0.32521 -0.30751 -0.23424 -0.18719 -0.12204 -0.12204 -0.00901  0.15617  0.35936  0.60809  0.88315  1.18513  1.50818  1.57210  1.26177  1.19316
       1.20  -0.35566 -0.38592 -0.29861 -0.25319 -0.18862 -0.18862 -0.08006  0.09386  0.30347  0.55994  0.84977  1.16661  1.50701  1.85600  1.42617  1.27463
       1.30  -0.37832 -0.45542 -0.37180 -0.32949 -0.26287 -0.26287 -0.15439  0.02375  0.24643  0.50704  0.81137  1.14255  1.50080  1.87910  1.61186  1.37118
       1.40  -0.39058 -0.53640 -0.45935 -0.40683 -0.35110 -0.35110 -0.23670 -0.05398  0.17565  0.44695  0.76565  1.11269  1.48963  1.89113  1.98789  1.53215
       1.50  -0.39376 -0.59020 -0.55433 -0.49586 -0.42866 -0.42866 -0.33369 -0.14030  0.09690  0.37940  0.71316  1.07677  1.47358  1.89793  2.33128  1.67725
       1.60  -0.31990 -0.64481 -0.64404 -0.60662 -0.52778 -0.52778 -0.43298 -0.23521  0.00993  0.30413  0.65366  1.03466  1.45212  1.90004  2.36980  1.90229
       1.70  -0.31741 -0.68045 -0.73742 -0.71079 -0.64832 -0.64832 -0.54124 -0.33956 -0.08552  0.22090  0.58691  0.98619  1.42505  1.89748  2.39708  2.38584
       1.80  -0.31654 -0.56384 -0.85440 -0.82659 -0.76187 -0.76187 -0.64370 -0.45712 -0.18938  0.13696  0.50854  0.93175  1.39216  1.89014  2.41963  2.90034
       1.90  -0.31346 -0.52308 -1.00032 -0.96588 -0.88898 -0.88898 -0.76728 -0.58780 -0.30212  0.03715  0.42594  0.87010  1.35326  1.87784  2.43800  2.98423
       2.00  -0.31070 -0.52725 -0.95794 -1.10575 -1.03810 -1.03810 -0.90417 -0.71873 -0.42394 -0.07124  0.33545  0.79996  1.30819  1.86067  2.45236  3.04461
       2.10  -0.30875 -0.53054 -0.90074 -1.23760 -1.18820 -1.18820 -1.05148 -0.85919 -0.55501 -0.18826  0.23691  0.72362  1.25677  1.83843  2.46265  3.09808
       2.20  -0.30613 -0.53661 -0.89227 -1.39872 -1.33951 -1.33951 -1.19424 -1.01079 -0.69550 -0.31381  0.13015  0.63989  1.19932  1.81080  2.46879  3.14674
       2.30  -0.30387 -0.54399 -0.87167 -1.29389 -1.51143 -1.51143 -1.37706 -1.17247 -0.84822 -0.44838  0.01504  0.55146  1.13527  1.77766  2.47065  3.19131
       2.40  -0.30205 -0.55140 -0.86615 -1.26398 -1.69420 -1.69420 -1.55568 -1.34501 -1.00528 -0.59212 -0.09915  0.45307  1.06450  1.73887  2.46813  3.23208
       2.50  -0.30035 -0.55923 -0.86828 -1.27772 -1.88312 -1.88312 -1.74528 -1.52798 -1.17517 -0.75126 -0.23117  0.34692  0.98689  1.69431  2.46111  3.26915
       2.60  -0.29894 -0.56768 -0.88433 -1.28171 -1.86812 -1.86812 -1.94640 -1.68996 -1.35450 -0.91297 -0.37234  0.23290  0.90232  1.64389  2.44949  3.30260
       2.70  -0.29768 -0.57739 -0.90542 -1.30932 -1.77854 -1.77854 -2.15860 -1.89441 -1.54429 -1.08410 -0.52236  0.11092  0.81070  1.58750  2.43316  3.33244
       2.80  -0.29615 -0.58724 -0.92731 -1.31785 -1.78653 -1.78653 -2.36722 -2.11031 -1.74505 -1.26476 -0.68111 -0.01912  0.71193  1.52504  2.41205  3.35863
       2.90  -0.29513 -0.59778 -0.94965 -1.35753 -1.78389 -1.78389 -2.59251 -2.33815 -1.95637 -1.45223 -0.84843 -0.16384  0.60592  1.45643  2.38605  3.38115
       3.00  -0.29373 -0.60879 -0.97421 -1.39768 -1.82374 -1.82374 -2.82289 -2.57750 -2.19927 -1.65320 -1.02485 -0.31099  0.49260  1.38159  2.35510  3.39996
       3.10  -0.29194 -0.62025 -0.99968 -1.43745 -1.85649 -1.85649 -2.58282 -2.82910 -2.43446 -1.86473 -1.21043 -0.46647  0.37188  1.30045  2.31912  3.41505
       3.20  -0.28924 -0.63137 -1.02583 -1.47172 -1.87620 -1.87620 -2.53900 -3.09237 -2.68152 -2.08496 -1.40524 -0.63037  0.24370  1.21293  2.27804  3.42637
       3.30  -0.28734 -0.64355 -1.05310 -1.49546 -1.93716 -1.93716 -2.59426 -3.36373 -2.94056 -2.31626 -1.61743 -0.80273  0.10800  1.11897  2.23180  3.43390
       3.40  -0.28549 -0.65619 -1.08094 -1.52135 -1.99752 -1.99752 -2.56436 -3.63592 -3.21134 -2.55845 -1.83025 -0.98363 -0.03529  1.01852  2.18035  3.43758
       3.50  -0.28371 -0.66883 -1.10958 -1.56219 -2.06160 -2.06160 -2.64523 -3.88271 -3.49501 -2.81138 -2.05243 -1.17311 -0.18606  0.91160  2.12362  3.43737
       3.60  -0.28197 -0.68192 -1.13921 -1.60776 -2.12753 -2.12753 -2.66565 -3.84405 -3.79096 -3.07623 -2.28402 -1.37122 -0.34428  0.79845  2.06156  3.43323
       3.70  -0.28026 -0.69542 -1.16976 -1.65420 -2.19578 -2.19578 -2.72377 -3.70232 -4.09909 -3.35238 -2.52506 -1.57803 -0.50950  0.67867  1.99422  3.42513
       3.80  -0.27854 -0.70934 -1.20121 -1.70241 -2.26632 -2.26632 -2.77713 -3.75007 -4.34933 -3.64011 -2.77125 -1.77922 -0.68389  0.55222  1.92176  3.41303
       3.90  -0.27685 -0.72368 -1.23354 -1.75217 -2.33883 -2.33883 -2.85863 -3.78481 -4.67640 -3.94059 -3.03224 -2.00367 -0.86538  0.41906  1.84387  3.39690
       4.00  -0.27521 -0.73842 -1.26674 -1.80339 -2.41252 -2.41252 -2.94203 -3.85197 -5.00617 -4.25316 -3.30535 -2.23721 -1.05471  0.27915  1.76050  3.37670
       6.00  -0.27521 -0.73842 -1.26674 -1.80339 -2.41252 -2.41252 -2.94203 -3.85197 -5.00617 -4.25316 -3.30535 -2.23721 -1.05471  0.27915  1.76050  3.37670
    </tableData>
  </table>
  <table name="CT_MACH" type="internal">
    <tableData>
       0.00   1.0000
       0.60   1.0000
       0.70   1.0000
       0.75   0.9998
       0.80   0.9978
       0.85   0.9894
       0.90   0.9678
       0.95   0.9246
       1.00   0.8525
       1.05   0.7463
       1.10   0.6033
       1.20   0.2083
    </tableData>
  </table>
  <table name="CP_MACH" type="internal">
    <tableData>
       0.00   1.0000
       0.60   1.0000
       0.70   1.0000
       0.75   1.0003
       0.80   1.0035
       0.85   1.0159
       0.90   1.0472
       0.95   1.1077
       1.00   1.2050
       1.05   1.3431
       1.10   1.5214
       1.20   1.9820
    </tableData>
  </table>
</propeller>
