<?xml version="1.0"?>
<?xml-stylesheet type="text/xsl" href="http://jsbsim.sourceforge.net/JSBSim.xsl"?>
<!-- Generated by hangar 0.1.0 from ec130h.toml on 2026-10-01. Edit the design and rebuild; changes
     made here are overwritten.  -->
<fdm_config name="ec130h" version="2.0" release="ALPHA"
            xmlns:xsi="http://www.w3.org/2001/XMLSchema-instance"
            xsi:noNamespaceSchemaLocation="http://jsbsim.sourceforge.net/JSBSim.xsd">
    <fileheader>
      <author>hangar</author>
      <filecreationdate>2026-10-01</filecreationdate>
      <version>0.1.0</version>
      <description>Lockheed EC-130H Compass Call (hangar build)</description>
      <note>Aerodynamics: vortex lattice with viscous section polars, full-envelope
        strip model, slender-body fuselage (hangar). Mass: Raymer component
        weights on the geometry. Propeller: blade-element momentum theory.</note>
      <reference refID="fsim/applicability/aerobatic" author="the design" title="USAF EC-130H fact sheet: a transport airframe, not cleared for aerobatics" date="n/a"/>
      <reference refID="fsim/applicability/carrier" author="the design" title="USAF EC-130H fact sheet: a land-based electronic attack aircraft" date="n/a"/>
      <reference refID="fsim/applicability/drag_devices" author="the design" title="C-130H data: no spoilers or airbrakes" date="n/a"/>
      <reference refID="fsim/applicability/flaps" author="the design" title="C-130H data: Lockheed-Fowler trailing-edge flaps" date="n/a"/>
      <reference refID="fsim/applicability/ground_contact" author="the design" title="USAF EC-130H fact sheet: the C-130H's wheeled gear" date="n/a"/>
      <reference refID="fsim/applicability/releasable_stores" author="the design" title="USAF EC-130H fact sheet: the Compass Call mission equipment fills the hold; no weapons stations" date="n/a"/>
      <reference refID="fsim/applicability/retractable_gear" author="the design" title="C-130H data: the main gear retracts into the sponsons" date="n/a"/>
      <reference refID="fsim/applicability/vertical_flight" author="the design" title="USAF EC-130H fact sheet: the C-130H airframe, a conventional turboprop. Conventional take-off and landing: no rotors, lift fans or vectored lift to hover" date="n/a"/>
    </fileheader>
    <metrics>
      <wingarea unit="M2"> 163.1798 </wingarea>
      <wingspan unit="M"> 40.4100 </wingspan>
      <chord unit="M"> 4.1929 </chord>
      <htailarea unit="M2"> 45.0203 </htailarea>
      <htailarm unit="M"> 12.9557 </htailarm>
      <vtailarea unit="M2"> 27.2290 </vtailarea>
      <vtailarm unit="M"> 13.0099 </vtailarm>
      <location name="AERORP" unit="M">
        <x> 12.3897 </x>
        <y> 0.0000 </y>
        <z> 5.1474 </z>
      </location>
      <location name="EYEPOINT" unit="M">
        <x> 12.3897 </x>
        <y> 0.0000 </y>
        <z> 5.1474 </z>
      </location>
      <location name="VRP" unit="M">
        <x> 12.3000 </x>
        <y> 0.0000 </y>
        <z> 3.3000 </z>
      </location>
    </metrics>
    <mass_balance negated_crossproduct_inertia="false">
      <ixx unit="KG*M2"> 1126330.63 </ixx>
      <iyy unit="KG*M2"> 798948.91 </iyy>
      <izz unit="KG*M2"> 1776236.24 </izz>
      <ixy unit="KG*M2"> 3.968 </ixy>
      <ixz unit="KG*M2"> 74307.189 </ixz>
      <iyz unit="KG*M2"> 2.786 </iyz>
      <emptywt unit="KG"> 45813.00 </emptywt>
      <location name="CG" unit="M">
        <x> 12.3000 </x>
        <y> 0.0000 </y>
        <z> 3.3000 </z>
      </location>
      <pointmass name="flight crew">
        <weight unit="KG"> 400.00 </weight>
        <location unit="M">
          <x> 3.3000 </x>
          <y> 0.0000 </y>
          <z> 3.3000 </z>
        </location>
      </pointmass>
      <pointmass name="mission crew">
        <weight unit="KG"> 900.00 </weight>
        <location unit="M">
          <x> 11.0000 </x>
          <y> 0.0000 </y>
          <z> 2.4000 </z>
        </location>
      </pointmass>
    </mass_balance>
    <ground_reactions>
      <contact type="BOGEY" name="Nose Gear">
        <location unit="M">
          <x> 3.4200 </x>
          <y> 0.0000 </y>
          <z> -0.1500 </z>
        </location>
        <static_friction> 0.8 </static_friction>
        <dynamic_friction> 0.5 </dynamic_friction>
        <rolling_friction> 0.02 </rolling_friction>
        <spring_coeff unit="N/M"> 299075 </spring_coeff>
        <damping_coeff unit="N/M/SEC"> 36988 </damping_coeff>
        <damping_coeff_rebound unit="N/M/SEC"> 73977 </damping_coeff_rebound>
        <max_steer unit="DEG"> 60.0 </max_steer>
        <brake_group> NONE </brake_group>
        <retractable> 1 </retractable>
      </contact>
      <contact type="BOGEY" name="Left Main Gear Front">
        <location unit="M">
          <x> 12.3100 </x>
          <y> -2.1700 </y>
          <z> -0.1500 </z>
        </location>
        <static_friction> 0.8 </static_friction>
        <dynamic_friction> 0.5 </dynamic_friction>
        <rolling_friction> 0.02 </rolling_friction>
        <spring_coeff unit="N/M"> 899440 </spring_coeff>
        <damping_coeff unit="N/M/SEC"> 111239 </damping_coeff>
        <damping_coeff_rebound unit="N/M/SEC"> 222478 </damping_coeff_rebound>
        <max_steer unit="DEG"> 0.0 </max_steer>
        <brake_group> LEFT </brake_group>
        <retractable> 1 </retractable>
      </contact>
      <contact type="BOGEY" name="Right Main Gear Front">
        <location unit="M">
          <x> 12.3100 </x>
          <y> 2.1700 </y>
          <z> -0.1500 </z>
        </location>
        <static_friction> 0.8 </static_friction>
        <dynamic_friction> 0.5 </dynamic_friction>
        <rolling_friction> 0.02 </rolling_friction>
        <spring_coeff unit="N/M"> 899440 </spring_coeff>
        <damping_coeff unit="N/M/SEC"> 111239 </damping_coeff>
        <damping_coeff_rebound unit="N/M/SEC"> 222478 </damping_coeff_rebound>
        <max_steer unit="DEG"> 0.0 </max_steer>
        <brake_group> RIGHT </brake_group>
        <retractable> 1 </retractable>
      </contact>
      <contact type="BOGEY" name="Left Main Gear Rear">
        <location unit="M">
          <x> 13.8200 </x>
          <y> -2.1700 </y>
          <z> -0.1500 </z>
        </location>
        <static_friction> 0.8 </static_friction>
        <dynamic_friction> 0.5 </dynamic_friction>
        <rolling_friction> 0.02 </rolling_friction>
        <spring_coeff unit="N/M"> 899440 </spring_coeff>
        <damping_coeff unit="N/M/SEC"> 111239 </damping_coeff>
        <damping_coeff_rebound unit="N/M/SEC"> 222478 </damping_coeff_rebound>
        <max_steer unit="DEG"> 0.0 </max_steer>
        <brake_group> LEFT </brake_group>
        <retractable> 1 </retractable>
      </contact>
      <contact type="BOGEY" name="Right Main Gear Rear">
        <location unit="M">
          <x> 13.8200 </x>
          <y> 2.1700 </y>
          <z> -0.1500 </z>
        </location>
        <static_friction> 0.8 </static_friction>
        <dynamic_friction> 0.5 </dynamic_friction>
        <rolling_friction> 0.02 </rolling_friction>
        <spring_coeff unit="N/M"> 899440 </spring_coeff>
        <damping_coeff unit="N/M/SEC"> 111239 </damping_coeff>
        <damping_coeff_rebound unit="N/M/SEC"> 222478 </damping_coeff_rebound>
        <max_steer unit="DEG"> 0.0 </max_steer>
        <brake_group> RIGHT </brake_group>
        <retractable> 1 </retractable>
      </contact>
      <contact type="STRUCTURE" name="T56-A-15 outboard R propeller left front">
        <location unit="M">
          <x> 8.9700 </x>
          <y> -10.2500 </y>
          <z> 2.1325 </z>
        </location>
        <static_friction> 0.8 </static_friction>
        <dynamic_friction> 0.6 </dynamic_friction>
        <spring_coeff unit="N/M"> 6859113 </spring_coeff>
        <damping_coeff unit="N/M/SEC"> 228637 </damping_coeff>
        <damping_coeff_rebound unit="N/M/SEC"> 228637 </damping_coeff_rebound>
      </contact>
      <contact type="STRUCTURE" name="T56-A-15 outboard R propeller left front 2">
        <location unit="M">
          <x> 8.9700 </x>
          <y> -10.2500 </y>
          <z> 6.2475 </z>
        </location>
        <static_friction> 0.8 </static_friction>
        <dynamic_friction> 0.6 </dynamic_friction>
        <spring_coeff unit="N/M"> 6555309 </spring_coeff>
        <damping_coeff unit="N/M/SEC"> 218510 </damping_coeff>
        <damping_coeff_rebound unit="N/M/SEC"> 218510 </damping_coeff_rebound>
      </contact>
      <contact type="STRUCTURE" name="T56-A-15 outboard R propeller right front">
        <location unit="M">
          <x> 8.9700 </x>
          <y> 10.2500 </y>
          <z> 2.1325 </z>
        </location>
        <static_friction> 0.8 </static_friction>
        <dynamic_friction> 0.6 </dynamic_friction>
        <spring_coeff unit="N/M"> 6859077 </spring_coeff>
        <damping_coeff unit="N/M/SEC"> 228636 </damping_coeff>
        <damping_coeff_rebound unit="N/M/SEC"> 228636 </damping_coeff_rebound>
      </contact>
      <contact type="STRUCTURE" name="T56-A-15 outboard R propeller right front 2">
        <location unit="M">
          <x> 8.9700 </x>
          <y> 10.2500 </y>
          <z> 6.2475 </z>
        </location>
        <static_friction> 0.8 </static_friction>
        <dynamic_friction> 0.6 </dynamic_friction>
        <spring_coeff unit="N/M"> 6555278 </spring_coeff>
        <damping_coeff unit="N/M/SEC"> 218509 </damping_coeff>
        <damping_coeff_rebound unit="N/M/SEC"> 218509 </damping_coeff_rebound>
      </contact>
      <contact type="STRUCTURE" name="fin rear">
        <location unit="M">
          <x> 27.8800 </x>
          <y> 0.0000 </y>
          <z> 11.8000 </z>
        </location>
        <static_friction> 0.8 </static_friction>
        <dynamic_friction> 0.6 </dynamic_friction>
        <spring_coeff unit="N/M"> 2163052 </spring_coeff>
        <damping_coeff unit="N/M/SEC"> 72102 </damping_coeff>
        <damping_coeff_rebound unit="N/M/SEC"> 72102 </damping_coeff_rebound>
      </contact>
      <contact type="STRUCTURE" name="fuselage left bottom">
        <location unit="M">
          <x> 17.8009 </x>
          <y> -0.9654 </y>
          <z> 0.9503 </z>
        </location>
        <static_friction> 0.8 </static_friction>
        <dynamic_friction> 0.6 </dynamic_friction>
        <spring_coeff unit="N/M"> 6676355 </spring_coeff>
        <damping_coeff unit="N/M/SEC"> 222545 </damping_coeff>
        <damping_coeff_rebound unit="N/M/SEC"> 222545 </damping_coeff_rebound>
      </contact>
      <contact type="STRUCTURE" name="fuselage front">
        <location unit="M">
          <x> 0.0000 </x>
          <y> 0.0000 </y>
          <z> 2.2800 </z>
        </location>
        <static_friction> 0.8 </static_friction>
        <dynamic_friction> 0.6 </dynamic_friction>
        <spring_coeff unit="N/M"> 2117733 </spring_coeff>
        <damping_coeff unit="N/M/SEC"> 70591 </damping_coeff>
        <damping_coeff_rebound unit="N/M/SEC"> 70591 </damping_coeff_rebound>
      </contact>
      <contact type="STRUCTURE" name="fuselage front 2">
        <location unit="M">
          <x> 1.9300 </x>
          <y> -0.0000 </y>
          <z> 1.1000 </z>
        </location>
        <static_friction> 0.8 </static_friction>
        <dynamic_friction> 0.6 </dynamic_friction>
        <spring_coeff unit="N/M"> 1846338 </spring_coeff>
        <damping_coeff unit="N/M/SEC"> 61545 </damping_coeff>
        <damping_coeff_rebound unit="N/M/SEC"> 61545 </damping_coeff_rebound>
      </contact>
      <contact type="STRUCTURE" name="fuselage rear">
        <location unit="M">
          <x> 29.7900 </x>
          <y> 0.0000 </y>
          <z> 4.4100 </z>
        </location>
        <static_friction> 0.8 </static_friction>
        <dynamic_friction> 0.6 </dynamic_friction>
        <spring_coeff unit="N/M"> 2215394 </spring_coeff>
        <damping_coeff unit="N/M/SEC"> 73846 </damping_coeff>
        <damping_coeff_rebound unit="N/M/SEC"> 73846 </damping_coeff_rebound>
      </contact>
      <contact type="STRUCTURE" name="fuselage right bottom">
        <location unit="M">
          <x> 17.8009 </x>
          <y> 0.9654 </y>
          <z> 0.9503 </z>
        </location>
        <static_friction> 0.8 </static_friction>
        <dynamic_friction> 0.6 </dynamic_friction>
        <spring_coeff unit="N/M"> 6676365 </spring_coeff>
        <damping_coeff unit="N/M/SEC"> 222545 </damping_coeff>
        <damping_coeff_rebound unit="N/M/SEC"> 222545 </damping_coeff_rebound>
      </contact>
      <contact type="STRUCTURE" name="htail left rear">
        <location unit="M">
          <x> 27.5600 </x>
          <y> -8.0250 </y>
          <z> 4.5996 </z>
        </location>
        <static_friction> 0.8 </static_friction>
        <dynamic_friction> 0.6 </dynamic_friction>
        <spring_coeff unit="N/M"> 2412808 </spring_coeff>
        <damping_coeff unit="N/M/SEC"> 80427 </damping_coeff>
        <damping_coeff_rebound unit="N/M/SEC"> 80427 </damping_coeff_rebound>
      </contact>
      <contact type="STRUCTURE" name="htail right rear">
        <location unit="M">
          <x> 27.5600 </x>
          <y> 8.0250 </y>
          <z> 4.5996 </z>
        </location>
        <static_friction> 0.8 </static_friction>
        <dynamic_friction> 0.6 </dynamic_friction>
        <spring_coeff unit="N/M"> 2412823 </spring_coeff>
        <damping_coeff unit="N/M/SEC"> 80427 </damping_coeff>
        <damping_coeff_rebound unit="N/M/SEC"> 80427 </damping_coeff_rebound>
      </contact>
      <contact type="STRUCTURE" name="wing left bottom">
        <location unit="M">
          <x> 14.2999 </x>
          <y> -20.2060 </y>
          <z> 5.5736 </z>
        </location>
        <static_friction> 0.8 </static_friction>
        <dynamic_friction> 0.6 </dynamic_friction>
        <spring_coeff unit="N/M"> 1133300 </spring_coeff>
        <damping_coeff unit="N/M/SEC"> 37777 </damping_coeff>
        <damping_coeff_rebound unit="N/M/SEC"> 37777 </damping_coeff_rebound>
      </contact>
      <contact type="STRUCTURE" name="wing left front">
        <location unit="M">
          <x> 11.8000 </x>
          <y> -20.2050 </y>
          <z> 5.5960 </z>
        </location>
        <static_friction> 0.8 </static_friction>
        <dynamic_friction> 0.6 </dynamic_friction>
        <spring_coeff unit="N/M"> 1148075 </spring_coeff>
        <damping_coeff unit="N/M/SEC"> 38269 </damping_coeff>
        <damping_coeff_rebound unit="N/M/SEC"> 38269 </damping_coeff_rebound>
      </contact>
      <contact type="STRUCTURE" name="wing right front">
        <location unit="M">
          <x> 11.8000 </x>
          <y> 20.2050 </y>
          <z> 5.5960 </z>
        </location>
        <static_friction> 0.8 </static_friction>
        <dynamic_friction> 0.6 </dynamic_friction>
        <spring_coeff unit="N/M"> 1148075 </spring_coeff>
        <damping_coeff unit="N/M/SEC"> 38269 </damping_coeff>
        <damping_coeff_rebound unit="N/M/SEC"> 38269 </damping_coeff_rebound>
      </contact>
      <contact type="STRUCTURE" name="wing right bottom">
        <location unit="M">
          <x> 14.2999 </x>
          <y> 20.2060 </y>
          <z> 5.5736 </z>
        </location>
        <static_friction> 0.8 </static_friction>
        <dynamic_friction> 0.6 </dynamic_friction>
        <spring_coeff unit="N/M"> 1133303 </spring_coeff>
        <damping_coeff unit="N/M/SEC"> 37777 </damping_coeff>
        <damping_coeff_rebound unit="N/M/SEC"> 37777 </damping_coeff_rebound>
      </contact>
    </ground_reactions>
    <propulsion>
      <engine file="ec130h_engine0">
        <location unit="M">
          <x> 10.6000 </x>
          <y> -5.0800 </y>
          <z> 3.9500 </z>
        </location>
        <feed>0</feed>
        <feed>1</feed>
        <feed>2</feed>
        <feed>3</feed>
        <thruster file="ec130h_prop0">
          <location unit="M">
            <x> 8.9200 </x>
            <y> -5.0800 </y>
            <z> 3.9500 </z>
          </location>
          <orient unit="DEG"> <roll>0.00</roll> <pitch>0.00</pitch> <yaw>0.00</yaw> </orient>
          <sense>-1</sense>
        </thruster>
      </engine>
      <engine file="ec130h_engine0">
        <location unit="M">
          <x> 10.6000 </x>
          <y> 5.0800 </y>
          <z> 3.9500 </z>
        </location>
        <feed>0</feed>
        <feed>1</feed>
        <feed>2</feed>
        <feed>3</feed>
        <thruster file="ec130h_prop0">
          <location unit="M">
            <x> 8.9200 </x>
            <y> 5.0800 </y>
            <z> 3.9500 </z>
          </location>
          <orient unit="DEG"> <roll>0.00</roll> <pitch>0.00</pitch> <yaw>0.00</yaw> </orient>
          <sense>-1</sense>
        </thruster>
      </engine>
      <engine file="ec130h_engine1">
        <location unit="M">
          <x> 10.6500 </x>
          <y> -10.2500 </y>
          <z> 4.1900 </z>
        </location>
        <feed>0</feed>
        <feed>1</feed>
        <feed>2</feed>
        <feed>3</feed>
        <thruster file="ec130h_prop1">
          <location unit="M">
            <x> 8.9700 </x>
            <y> -10.2500 </y>
            <z> 4.1900 </z>
          </location>
          <orient unit="DEG"> <roll>0.00</roll> <pitch>0.00</pitch> <yaw>0.00</yaw> </orient>
          <sense>-1</sense>
        </thruster>
      </engine>
      <engine file="ec130h_engine1">
        <location unit="M">
          <x> 10.6500 </x>
          <y> 10.2500 </y>
          <z> 4.1900 </z>
        </location>
        <feed>0</feed>
        <feed>1</feed>
        <feed>2</feed>
        <feed>3</feed>
        <thruster file="ec130h_prop1">
          <location unit="M">
            <x> 8.9700 </x>
            <y> 10.2500 </y>
            <z> 4.1900 </z>
          </location>
          <orient unit="DEG"> <roll>0.00</roll> <pitch>0.00</pitch> <yaw>0.00</yaw> </orient>
          <sense>-1</sense>
        </thruster>
      </engine>
      <tank type="FUEL">
        <location unit="M">
          <x> 12.8000 </x>
          <y> -12.0000 </y>
          <z> 5.2000 </z>
        </location>
        <capacity unit="KG"> 5205.00 </capacity>
        <contents unit="KG"> 3123.00 </contents>
      </tank>
      <tank type="FUEL">
        <location unit="M">
          <x> 12.8000 </x>
          <y> -4.5000 </y>
          <z> 4.9600 </z>
        </location>
        <capacity unit="KG"> 5205.00 </capacity>
        <contents unit="KG"> 3123.00 </contents>
      </tank>
      <tank type="FUEL">
        <location unit="M">
          <x> 12.8000 </x>
          <y> 4.5000 </y>
          <z> 4.9600 </z>
        </location>
        <capacity unit="KG"> 5205.00 </capacity>
        <contents unit="KG"> 3123.00 </contents>
      </tank>
      <tank type="FUEL">
        <location unit="M">
          <x> 12.8000 </x>
          <y> 12.0000 </y>
          <z> 5.2000 </z>
        </location>
        <capacity unit="KG"> 5205.00 </capacity>
        <contents unit="KG"> 3123.00 </contents>
      </tank>
    </propulsion>
    <flight_control name="ec130h">
      <!-- the aircraft's profile for the platform (docs/control-architecture.md, section 7): what
           hangar knows of it - its design, its flight tests, its identified responses -->
      <property value="1">fsim/identity/version</property>
      <property value="1">fsim/identity/provenance</property>
      <property value="9">fsim/identity/class</property>
      <property value="1">fsim/identity/family</property>
      <property value="1">fsim/effectors/version</property>
      <property value="1">fsim/effectors/provenance</property>
      <property value="1">fsim/effectors/flaps</property>
      <property value="8">fsim/effectors/flaps_transit_s</property>
      <property value="0.0">fsim/effectors/neutral</property>
      <property value="0.0">fsim/effectors/pitch</property>
      <property value="1">fsim/effectors/pitch_trim</property>
      <property value="1">fsim/effectors/retractable_gear</property>
      <property value="0.0">fsim/effectors/roll</property>
      <property value="0.0">fsim/effectors/speedbrake</property>
      <property value="1">fsim/effectors/wheel_brakes</property>
      <property value="0.0">fsim/effectors/yaw</property>
      <property value="1">fsim/envelope/version</property>
      <property value="1">fsim/envelope/provenance</property>
      <property value="15.5376">fsim/envelope/clean/alpha_max_deg</property>
      <property value="54.706">fsim/envelope/clean/cas_min_ms</property>
      <property value="18.01">fsim/envelope/crosswind_max_ms</property>
      <property value="74.59">fsim/envelope/flaps/cas_max_ms</property>
      <property value="0.5">fsim/envelope/flaps_threshold</property>
      <property value="84.88">fsim/envelope/gear_cas_max_ms</property>
      <property value="13.43">fsim/envelope/ground_pitch_max_deg</property>
      <property value="21.63">fsim/envelope/ground_turn_radius_m</property>
      <property value="0.0402">fsim/envelope/ground_yaw_accel_rad_s2</property>
      <property value="1">fsim/propulsion/version</property>
      <property value="1">fsim/propulsion/provenance</property>
      <property value="0.0">fsim/propulsion/afterburner</property>
      <property value="4">fsim/propulsion/engines</property>
      <property value="0.947696">fsim/propulsion/spool_s</property>
      <property value="1">fsim/propulsion/type</property>
      <property value="1">fsim/plant/version</property>
      <property value="1">fsim/plant/provenance</property>
      <property value="-4.34225">fsim/plant/alpha_zero_lift_deg</property>
      <property value="3000">fsim/plant/altitude_m</property>
      <property value="93.1073">fsim/plant/eas_ms</property>
      <property value="0.000353603">fsim/plant/elevator_trim</property>
      <property value="-0.342213">fsim/plant/elevator_trim_lift</property>
      <property value="3.08932">fsim/plant/pitch/gain</property>
      <property value="0.409934">fsim/plant/pitch/tau_s</property>
      <property value="0.681588">fsim/plant/roll/gain</property>
      <property value="0.364466">fsim/plant/roll/tau_s</property>
      <property value="1.56834">fsim/plant/speed/gain</property>
      <property value="0.947696">fsim/plant/speed/tau_s</property>
      <property value="107.634">fsim/plant/tas_ms</property>
      <property value="0.647285">fsim/plant/throttle_trim</property>
      <property value="0.761867">fsim/plant/yaw/gain</property>
      <property value="1">fsim/performance/version</property>
      <property value="1">fsim/performance/provenance</property>
      <property value="7455.6">fsim/performance/ceiling_m</property>
      <property value="134.543">fsim/performance/max_tas_ms</property>
      <property value="54.706">fsim/performance/stall_cas_ms</property>
      <property value="1">fsim/applicability/version</property>
      <property value="1">fsim/applicability/provenance</property>
      <property value="0.0">fsim/applicability/aerobatic</property>
      <property value="1">fsim/applicability/carrier</property>
      <property value="1">fsim/applicability/drag_devices</property>
      <property value="1">fsim/applicability/flaps</property>
      <property value="1">fsim/applicability/ground_contact</property>
      <property value="1">fsim/applicability/releasable_stores</property>
      <property value="1">fsim/applicability/retractable_gear</property>
      <property value="0.0">fsim/applicability/vertical_flight</property>
      <property value="1">fsim/tables/version</property>
      <property value="1">fsim/tables/provenance</property>
      <property value="100">fsim/tables/altitude_m/h0</property>
      <property value="1490">fsim/tables/altitude_m/h1</property>
      <property value="2980">fsim/tables/altitude_m/h2</property>
      <property value="4470">fsim/tables/altitude_m/h3</property>
      <property value="5590">fsim/tables/altitude_m/h4</property>
      <property value="6340">fsim/tables/altitude_m/h5</property>
      <property value="7080">fsim/tables/altitude_m/h6</property>
      <property value="0.472607">fsim/tables/best_endurance_fuel_kg_s/h0/w0</property>
      <property value="0.516289">fsim/tables/best_endurance_fuel_kg_s/h0/w1</property>
      <property value="0.521606">fsim/tables/best_endurance_fuel_kg_s/h0/w2</property>
      <property value="0.560327">fsim/tables/best_endurance_fuel_kg_s/h0/w3</property>
      <property value="0.44672">fsim/tables/best_endurance_fuel_kg_s/h1/w0</property>
      <property value="0.493124">fsim/tables/best_endurance_fuel_kg_s/h1/w1</property>
      <property value="0.500196">fsim/tables/best_endurance_fuel_kg_s/h1/w2</property>
      <property value="0.562177">fsim/tables/best_endurance_fuel_kg_s/h1/w3</property>
      <property value="0.412413">fsim/tables/best_endurance_fuel_kg_s/h2/w0</property>
      <property value="0.479436">fsim/tables/best_endurance_fuel_kg_s/h2/w1</property>
      <property value="0.486991">fsim/tables/best_endurance_fuel_kg_s/h2/w2</property>
      <property value="0.546622">fsim/tables/best_endurance_fuel_kg_s/h2/w3</property>
      <property value="0.398708">fsim/tables/best_endurance_fuel_kg_s/h3/w0</property>
      <property value="0.467123">fsim/tables/best_endurance_fuel_kg_s/h3/w1</property>
      <property value="0.473807">fsim/tables/best_endurance_fuel_kg_s/h3/w2</property>
      <property value="0.54031">fsim/tables/best_endurance_fuel_kg_s/h3/w3</property>
      <property value="0.392835">fsim/tables/best_endurance_fuel_kg_s/h4/w0</property>
      <property value="0.461556">fsim/tables/best_endurance_fuel_kg_s/h4/w1</property>
      <property value="0.471658">fsim/tables/best_endurance_fuel_kg_s/h4/w2</property>
      <property value="0.548729">fsim/tables/best_endurance_fuel_kg_s/h4/w3</property>
      <property value="0.386222">fsim/tables/best_endurance_fuel_kg_s/h5/w0</property>
      <property value="0.467917">fsim/tables/best_endurance_fuel_kg_s/h5/w1</property>
      <property value="0.478152">fsim/tables/best_endurance_fuel_kg_s/h5/w2</property>
      <property value="0.539765">fsim/tables/best_endurance_fuel_kg_s/h5/w3</property>
      <property value="0.384302">fsim/tables/best_endurance_fuel_kg_s/h6/w0</property>
      <property value="0.47108">fsim/tables/best_endurance_fuel_kg_s/h6/w1</property>
      <property value="0.479984">fsim/tables/best_endurance_fuel_kg_s/h6/w2</property>
      <property value="73.2532">fsim/tables/best_endurance_tas_ms/h0/w0</property>
      <property value="75.538">fsim/tables/best_endurance_tas_ms/h0/w1</property>
      <property value="75.8206">fsim/tables/best_endurance_tas_ms/h0/w2</property>
      <property value="78.2289">fsim/tables/best_endurance_tas_ms/h0/w3</property>
      <property value="75.1028">fsim/tables/best_endurance_tas_ms/h1/w0</property>
      <property value="78.1852">fsim/tables/best_endurance_tas_ms/h1/w1</property>
      <property value="78.545">fsim/tables/best_endurance_tas_ms/h1/w2</property>
      <property value="81.5682">fsim/tables/best_endurance_tas_ms/h1/w3</property>
      <property value="77.3408">fsim/tables/best_endurance_tas_ms/h2/w0</property>
      <property value="81.2936">fsim/tables/best_endurance_tas_ms/h2/w1</property>
      <property value="81.7442">fsim/tables/best_endurance_tas_ms/h2/w2</property>
      <property value="87.5771">fsim/tables/best_endurance_tas_ms/h2/w3</property>
      <property value="80.4922">fsim/tables/best_endurance_tas_ms/h3/w0</property>
      <property value="88.7072">fsim/tables/best_endurance_tas_ms/h3/w1</property>
      <property value="88.6793">fsim/tables/best_endurance_tas_ms/h3/w2</property>
      <property value="90.2823">fsim/tables/best_endurance_tas_ms/h3/w3</property>
      <property value="83.5339">fsim/tables/best_endurance_tas_ms/h4/w0</property>
      <property value="89.1139">fsim/tables/best_endurance_tas_ms/h4/w1</property>
      <property value="89.738">fsim/tables/best_endurance_tas_ms/h4/w2</property>
      <property value="97.2441">fsim/tables/best_endurance_tas_ms/h4/w3</property>
      <property value="89.0913">fsim/tables/best_endurance_tas_ms/h5/w0</property>
      <property value="92.0156">fsim/tables/best_endurance_tas_ms/h5/w1</property>
      <property value="92.6854">fsim/tables/best_endurance_tas_ms/h5/w2</property>
      <property value="97.7351">fsim/tables/best_endurance_tas_ms/h5/w3</property>
      <property value="88.5826">fsim/tables/best_endurance_tas_ms/h6/w0</property>
      <property value="102.366">fsim/tables/best_endurance_tas_ms/h6/w1</property>
      <property value="103.818">fsim/tables/best_endurance_tas_ms/h6/w2</property>
      <property value="0.569143">fsim/tables/best_range_fuel_kg_s/h0/w0</property>
      <property value="0.601122">fsim/tables/best_range_fuel_kg_s/h0/w1</property>
      <property value="0.605361">fsim/tables/best_range_fuel_kg_s/h0/w2</property>
      <property value="0.643005">fsim/tables/best_range_fuel_kg_s/h0/w3</property>
      <property value="0.529756">fsim/tables/best_range_fuel_kg_s/h1/w0</property>
      <property value="0.564108">fsim/tables/best_range_fuel_kg_s/h1/w1</property>
      <property value="0.568595">fsim/tables/best_range_fuel_kg_s/h1/w2</property>
      <property value="0.61567">fsim/tables/best_range_fuel_kg_s/h1/w3</property>
      <property value="0.47565">fsim/tables/best_range_fuel_kg_s/h2/w0</property>
      <property value="0.521493">fsim/tables/best_range_fuel_kg_s/h2/w1</property>
      <property value="0.606502">fsim/tables/best_range_fuel_kg_s/h2/w2</property>
      <property value="0.634981">fsim/tables/best_range_fuel_kg_s/h2/w3</property>
      <property value="0.432835">fsim/tables/best_range_fuel_kg_s/h3/w0</property>
      <property value="0.54649">fsim/tables/best_range_fuel_kg_s/h3/w1</property>
      <property value="0.552053">fsim/tables/best_range_fuel_kg_s/h3/w2</property>
      <property value="0.589176">fsim/tables/best_range_fuel_kg_s/h3/w3</property>
      <property value="0.465509">fsim/tables/best_range_fuel_kg_s/h4/w0</property>
      <property value="0.50823">fsim/tables/best_range_fuel_kg_s/h4/w1</property>
      <property value="0.514462">fsim/tables/best_range_fuel_kg_s/h4/w2</property>
      <property value="0.652515">fsim/tables/best_range_fuel_kg_s/h4/w3</property>
      <property value="0.444546">fsim/tables/best_range_fuel_kg_s/h5/w0</property>
      <property value="0.494">fsim/tables/best_range_fuel_kg_s/h5/w1</property>
      <property value="0.526981">fsim/tables/best_range_fuel_kg_s/h5/w2</property>
      <property value="0.55756">fsim/tables/best_range_fuel_kg_s/h5/w3</property>
      <property value="0.426668">fsim/tables/best_range_fuel_kg_s/h6/w0</property>
      <property value="0.536418">fsim/tables/best_range_fuel_kg_s/h6/w1</property>
      <property value="0.532235">fsim/tables/best_range_fuel_kg_s/h6/w2</property>
      <property value="96.0096">fsim/tables/best_range_tas_ms/h0/w0</property>
      <property value="97.0828">fsim/tables/best_range_tas_ms/h0/w1</property>
      <property value="97.2851">fsim/tables/best_range_tas_ms/h0/w2</property>
      <property value="97.8503">fsim/tables/best_range_tas_ms/h0/w3</property>
      <property value="96.5858">fsim/tables/best_range_tas_ms/h1/w0</property>
      <property value="97.0957">fsim/tables/best_range_tas_ms/h1/w1</property>
      <property value="97.2361">fsim/tables/best_range_tas_ms/h1/w2</property>
      <property value="98.5356">fsim/tables/best_range_tas_ms/h1/w3</property>
      <property value="96.8834">fsim/tables/best_range_tas_ms/h2/w0</property>
      <property value="97.8671">fsim/tables/best_range_tas_ms/h2/w1</property>
      <property value="112.604">fsim/tables/best_range_tas_ms/h2/w2</property>
      <property value="111.576">fsim/tables/best_range_tas_ms/h2/w3</property>
      <property value="97.221">fsim/tables/best_range_tas_ms/h3/w0</property>
      <property value="112.454">fsim/tables/best_range_tas_ms/h3/w1</property>
      <property value="112.505">fsim/tables/best_range_tas_ms/h3/w2</property>
      <property value="111.391">fsim/tables/best_range_tas_ms/h3/w3</property>
      <property value="111.682">fsim/tables/best_range_tas_ms/h4/w0</property>
      <property value="110.86">fsim/tables/best_range_tas_ms/h4/w1</property>
      <property value="110.86">fsim/tables/best_range_tas_ms/h4/w2</property>
      <property value="128.319">fsim/tables/best_range_tas_ms/h4/w3</property>
      <property value="111.94">fsim/tables/best_range_tas_ms/h5/w0</property>
      <property value="110.441">fsim/tables/best_range_tas_ms/h5/w1</property>
      <property value="116.129">fsim/tables/best_range_tas_ms/h5/w2</property>
      <property value="117.044">fsim/tables/best_range_tas_ms/h5/w3</property>
      <property value="111.442">fsim/tables/best_range_tas_ms/h6/w0</property>
      <property value="123.24">fsim/tables/best_range_tas_ms/h6/w1</property>
      <property value="121.159">fsim/tables/best_range_tas_ms/h6/w2</property>
      <property value="76.1201">fsim/tables/climb_tas_ms/h0/w0</property>
      <property value="78.4587">fsim/tables/climb_tas_ms/h0/w1</property>
      <property value="78.6583">fsim/tables/climb_tas_ms/h0/w2</property>
      <property value="80.4861">fsim/tables/climb_tas_ms/h0/w3</property>
      <property value="84.6189">fsim/tables/climb_tas_ms/h1/w0</property>
      <property value="90.0475">fsim/tables/climb_tas_ms/h1/w1</property>
      <property value="90.6116">fsim/tables/climb_tas_ms/h1/w2</property>
      <property value="91.9442">fsim/tables/climb_tas_ms/h1/w3</property>
      <property value="86.2508">fsim/tables/climb_tas_ms/h2/w0</property>
      <property value="93.1339">fsim/tables/climb_tas_ms/h2/w1</property>
      <property value="93.5606">fsim/tables/climb_tas_ms/h2/w2</property>
      <property value="94.52">fsim/tables/climb_tas_ms/h2/w3</property>
      <property value="88.8427">fsim/tables/climb_tas_ms/h3/w0</property>
      <property value="95.5348">fsim/tables/climb_tas_ms/h3/w1</property>
      <property value="95.6145">fsim/tables/climb_tas_ms/h3/w2</property>
      <property value="96.7557">fsim/tables/climb_tas_ms/h3/w3</property>
      <property value="93.9684">fsim/tables/climb_tas_ms/h4/w0</property>
      <property value="97.9527">fsim/tables/climb_tas_ms/h4/w1</property>
      <property value="98.0274">fsim/tables/climb_tas_ms/h4/w2</property>
      <property value="98.7884">fsim/tables/climb_tas_ms/h4/w3</property>
      <property value="96.7426">fsim/tables/climb_tas_ms/h5/w0</property>
      <property value="99.3648">fsim/tables/climb_tas_ms/h5/w1</property>
      <property value="99.7234">fsim/tables/climb_tas_ms/h5/w2</property>
      <property value="101.83">fsim/tables/climb_tas_ms/h5/w3</property>
      <property value="99.7638">fsim/tables/climb_tas_ms/h6/w0</property>
      <property value="100.314">fsim/tables/climb_tas_ms/h6/w1</property>
      <property value="100.311">fsim/tables/climb_tas_ms/h6/w2</property>
      <property value="20820">fsim/tables/fuel_capacity_kg</property>
      <property value="0.472513">fsim/tables/fuel_kg_s/h0/w0/v0</property>
      <property value="0.480244">fsim/tables/fuel_kg_s/h0/w0/v1</property>
      <property value="0.780411">fsim/tables/fuel_kg_s/h0/w0/v10</property>
      <property value="0.842046">fsim/tables/fuel_kg_s/h0/w0/v11</property>
      <property value="0.902331">fsim/tables/fuel_kg_s/h0/w0/v12</property>
      <property value="0.963888">fsim/tables/fuel_kg_s/h0/w0/v13</property>
      <property value="1.02505">fsim/tables/fuel_kg_s/h0/w0/v14</property>
      <property value="1.11544">fsim/tables/fuel_kg_s/h0/w0/v15</property>
      <property value="0.494112">fsim/tables/fuel_kg_s/h0/w0/v2</property>
      <property value="0.52426">fsim/tables/fuel_kg_s/h0/w0/v3</property>
      <property value="0.549442">fsim/tables/fuel_kg_s/h0/w0/v4</property>
      <property value="0.570849">fsim/tables/fuel_kg_s/h0/w0/v5</property>
      <property value="0.607422">fsim/tables/fuel_kg_s/h0/w0/v6</property>
      <property value="0.65247">fsim/tables/fuel_kg_s/h0/w0/v7</property>
      <property value="0.693332">fsim/tables/fuel_kg_s/h0/w0/v8</property>
      <property value="0.730931">fsim/tables/fuel_kg_s/h0/w0/v9</property>
      <property value="0.516264">fsim/tables/fuel_kg_s/h0/w1/v0</property>
      <property value="0.519498">fsim/tables/fuel_kg_s/h0/w1/v1</property>
      <property value="0.80805">fsim/tables/fuel_kg_s/h0/w1/v10</property>
      <property value="0.865189">fsim/tables/fuel_kg_s/h0/w1/v11</property>
      <property value="0.919174">fsim/tables/fuel_kg_s/h0/w1/v12</property>
      <property value="0.973433">fsim/tables/fuel_kg_s/h0/w1/v13</property>
      <property value="1.02867">fsim/tables/fuel_kg_s/h0/w1/v14</property>
      <property value="1.11602">fsim/tables/fuel_kg_s/h0/w1/v15</property>
      <property value="0.544005">fsim/tables/fuel_kg_s/h0/w1/v2</property>
      <property value="0.563532">fsim/tables/fuel_kg_s/h0/w1/v3</property>
      <property value="0.58411">fsim/tables/fuel_kg_s/h0/w1/v4</property>
      <property value="0.60334">fsim/tables/fuel_kg_s/h0/w1/v5</property>
      <property value="0.644862">fsim/tables/fuel_kg_s/h0/w1/v6</property>
      <property value="0.683429">fsim/tables/fuel_kg_s/h0/w1/v7</property>
      <property value="0.722508">fsim/tables/fuel_kg_s/h0/w1/v8</property>
      <property value="0.754038">fsim/tables/fuel_kg_s/h0/w1/v9</property>
      <property value="0.52157">fsim/tables/fuel_kg_s/h0/w2/v0</property>
      <property value="0.526454">fsim/tables/fuel_kg_s/h0/w2/v1</property>
      <property value="0.811278">fsim/tables/fuel_kg_s/h0/w2/v10</property>
      <property value="0.867963">fsim/tables/fuel_kg_s/h0/w2/v11</property>
      <property value="0.921832">fsim/tables/fuel_kg_s/h0/w2/v12</property>
      <property value="0.975705">fsim/tables/fuel_kg_s/h0/w2/v13</property>
      <property value="1.02918">fsim/tables/fuel_kg_s/h0/w2/v14</property>
      <property value="1.11616">fsim/tables/fuel_kg_s/h0/w2/v15</property>
      <property value="0.549552">fsim/tables/fuel_kg_s/h0/w2/v2</property>
      <property value="0.568664">fsim/tables/fuel_kg_s/h0/w2/v3</property>
      <property value="0.58877">fsim/tables/fuel_kg_s/h0/w2/v4</property>
      <property value="0.607308">fsim/tables/fuel_kg_s/h0/w2/v5</property>
      <property value="0.64932">fsim/tables/fuel_kg_s/h0/w2/v6</property>
      <property value="0.687646">fsim/tables/fuel_kg_s/h0/w2/v7</property>
      <property value="0.725968">fsim/tables/fuel_kg_s/h0/w2/v8</property>
      <property value="0.757099">fsim/tables/fuel_kg_s/h0/w2/v9</property>
      <property value="0.560246">fsim/tables/fuel_kg_s/h0/w3/v0</property>
      <property value="0.577468">fsim/tables/fuel_kg_s/h0/w3/v1</property>
      <property value="0.835814">fsim/tables/fuel_kg_s/h0/w3/v10</property>
      <property value="0.88533">fsim/tables/fuel_kg_s/h0/w3/v11</property>
      <property value="0.936342">fsim/tables/fuel_kg_s/h0/w3/v12</property>
      <property value="0.986855">fsim/tables/fuel_kg_s/h0/w3/v13</property>
      <property value="1.03151">fsim/tables/fuel_kg_s/h0/w3/v14</property>
      <property value="1.10935">fsim/tables/fuel_kg_s/h0/w3/v15</property>
      <property value="0.595383">fsim/tables/fuel_kg_s/h0/w3/v2</property>
      <property value="0.61096">fsim/tables/fuel_kg_s/h0/w3/v3</property>
      <property value="0.62465">fsim/tables/fuel_kg_s/h0/w3/v4</property>
      <property value="0.649167">fsim/tables/fuel_kg_s/h0/w3/v5</property>
      <property value="0.685016">fsim/tables/fuel_kg_s/h0/w3/v6</property>
      <property value="0.720564">fsim/tables/fuel_kg_s/h0/w3/v7</property>
      <property value="0.751831">fsim/tables/fuel_kg_s/h0/w3/v8</property>
      <property value="0.778115">fsim/tables/fuel_kg_s/h0/w3/v9</property>
      <property value="0.446675">fsim/tables/fuel_kg_s/h1/w0/v0</property>
      <property value="0.452299">fsim/tables/fuel_kg_s/h1/w0/v1</property>
      <property value="0.764546">fsim/tables/fuel_kg_s/h1/w0/v10</property>
      <property value="0.820291">fsim/tables/fuel_kg_s/h1/w0/v11</property>
      <property value="0.872674">fsim/tables/fuel_kg_s/h1/w0/v12</property>
      <property value="0.936252">fsim/tables/fuel_kg_s/h1/w0/v13</property>
      <property value="1.01763">fsim/tables/fuel_kg_s/h1/w0/v14</property>
      <property value="1.09886">fsim/tables/fuel_kg_s/h1/w0/v15</property>
      <property value="0.478558">fsim/tables/fuel_kg_s/h1/w0/v2</property>
      <property value="0.500144">fsim/tables/fuel_kg_s/h1/w0/v3</property>
      <property value="0.518046">fsim/tables/fuel_kg_s/h1/w0/v4</property>
      <property value="0.545385">fsim/tables/fuel_kg_s/h1/w0/v5</property>
      <property value="0.587547">fsim/tables/fuel_kg_s/h1/w0/v6</property>
      <property value="0.625143">fsim/tables/fuel_kg_s/h1/w0/v7</property>
      <property value="0.661698">fsim/tables/fuel_kg_s/h1/w0/v8</property>
      <property value="0.70842">fsim/tables/fuel_kg_s/h1/w0/v9</property>
      <property value="0.49304">fsim/tables/fuel_kg_s/h1/w1/v0</property>
      <property value="0.509812">fsim/tables/fuel_kg_s/h1/w1/v1</property>
      <property value="0.789067">fsim/tables/fuel_kg_s/h1/w1/v10</property>
      <property value="0.839585">fsim/tables/fuel_kg_s/h1/w1/v11</property>
      <property value="0.888506">fsim/tables/fuel_kg_s/h1/w1/v12</property>
      <property value="0.940816">fsim/tables/fuel_kg_s/h1/w1/v13</property>
      <property value="1.01322">fsim/tables/fuel_kg_s/h1/w1/v14</property>
      <property value="1.08886">fsim/tables/fuel_kg_s/h1/w1/v15</property>
      <property value="0.527904">fsim/tables/fuel_kg_s/h1/w1/v2</property>
      <property value="0.544716">fsim/tables/fuel_kg_s/h1/w1/v3</property>
      <property value="0.558342">fsim/tables/fuel_kg_s/h1/w1/v4</property>
      <property value="0.591234">fsim/tables/fuel_kg_s/h1/w1/v5</property>
      <property value="0.625777">fsim/tables/fuel_kg_s/h1/w1/v6</property>
      <property value="0.659817">fsim/tables/fuel_kg_s/h1/w1/v7</property>
      <property value="0.689558">fsim/tables/fuel_kg_s/h1/w1/v8</property>
      <property value="0.737305">fsim/tables/fuel_kg_s/h1/w1/v9</property>
      <property value="0.50012">fsim/tables/fuel_kg_s/h1/w2/v0</property>
      <property value="0.516743">fsim/tables/fuel_kg_s/h1/w2/v1</property>
      <property value="0.792948">fsim/tables/fuel_kg_s/h1/w2/v10</property>
      <property value="0.842284">fsim/tables/fuel_kg_s/h1/w2/v11</property>
      <property value="0.891062">fsim/tables/fuel_kg_s/h1/w2/v12</property>
      <property value="0.943181">fsim/tables/fuel_kg_s/h1/w2/v13</property>
      <property value="1.0151">fsim/tables/fuel_kg_s/h1/w2/v14</property>
      <property value="1.08868">fsim/tables/fuel_kg_s/h1/w2/v15</property>
      <property value="0.534326">fsim/tables/fuel_kg_s/h1/w2/v2</property>
      <property value="0.549933">fsim/tables/fuel_kg_s/h1/w2/v3</property>
      <property value="0.563321">fsim/tables/fuel_kg_s/h1/w2/v4</property>
      <property value="0.596879">fsim/tables/fuel_kg_s/h1/w2/v5</property>
      <property value="0.630742">fsim/tables/fuel_kg_s/h1/w2/v6</property>
      <property value="0.664343">fsim/tables/fuel_kg_s/h1/w2/v7</property>
      <property value="0.692896">fsim/tables/fuel_kg_s/h1/w2/v8</property>
      <property value="0.741681">fsim/tables/fuel_kg_s/h1/w2/v9</property>
      <property value="0.562145">fsim/tables/fuel_kg_s/h1/w3/v0</property>
      <property value="0.572742">fsim/tables/fuel_kg_s/h1/w3/v1</property>
      <property value="0.820485">fsim/tables/fuel_kg_s/h1/w3/v10</property>
      <property value="0.864734">fsim/tables/fuel_kg_s/h1/w3/v11</property>
      <property value="0.909207">fsim/tables/fuel_kg_s/h1/w3/v12</property>
      <property value="0.956867">fsim/tables/fuel_kg_s/h1/w3/v13</property>
      <property value="1.02548">fsim/tables/fuel_kg_s/h1/w3/v14</property>
      <property value="1.09179">fsim/tables/fuel_kg_s/h1/w3/v15</property>
      <property value="0.582354">fsim/tables/fuel_kg_s/h1/w3/v2</property>
      <property value="0.590978">fsim/tables/fuel_kg_s/h1/w3/v3</property>
      <property value="0.614668">fsim/tables/fuel_kg_s/h1/w3/v4</property>
      <property value="0.643423">fsim/tables/fuel_kg_s/h1/w3/v5</property>
      <property value="0.671658">fsim/tables/fuel_kg_s/h1/w3/v6</property>
      <property value="0.697711">fsim/tables/fuel_kg_s/h1/w3/v7</property>
      <property value="0.726143">fsim/tables/fuel_kg_s/h1/w3/v8</property>
      <property value="0.774799">fsim/tables/fuel_kg_s/h1/w3/v9</property>
      <property value="0.412365">fsim/tables/fuel_kg_s/h2/w0/v0</property>
      <property value="0.423159">fsim/tables/fuel_kg_s/h2/w0/v1</property>
      <property value="0.663055">fsim/tables/fuel_kg_s/h2/w0/v10</property>
      <property value="0.707159">fsim/tables/fuel_kg_s/h2/w0/v11</property>
      <property value="0.750278">fsim/tables/fuel_kg_s/h2/w0/v12</property>
      <property value="0.791566">fsim/tables/fuel_kg_s/h2/w0/v13</property>
      <property value="0.855365">fsim/tables/fuel_kg_s/h2/w0/v14</property>
      <property value="0.924232">fsim/tables/fuel_kg_s/h2/w0/v15</property>
      <property value="0.440303">fsim/tables/fuel_kg_s/h2/w0/v2</property>
      <property value="0.455909">fsim/tables/fuel_kg_s/h2/w0/v3</property>
      <property value="0.468228">fsim/tables/fuel_kg_s/h2/w0/v4</property>
      <property value="0.49332">fsim/tables/fuel_kg_s/h2/w0/v5</property>
      <property value="0.52311">fsim/tables/fuel_kg_s/h2/w0/v6</property>
      <property value="0.553006">fsim/tables/fuel_kg_s/h2/w0/v7</property>
      <property value="0.579771">fsim/tables/fuel_kg_s/h2/w0/v8</property>
      <property value="0.617624">fsim/tables/fuel_kg_s/h2/w0/v9</property>
      <property value="0.479413">fsim/tables/fuel_kg_s/h2/w1/v0</property>
      <property value="0.486818">fsim/tables/fuel_kg_s/h2/w1/v1</property>
      <property value="0.692813">fsim/tables/fuel_kg_s/h2/w1/v10</property>
      <property value="0.73177">fsim/tables/fuel_kg_s/h2/w1/v11</property>
      <property value="0.769714">fsim/tables/fuel_kg_s/h2/w1/v12</property>
      <property value="0.80478">fsim/tables/fuel_kg_s/h2/w1/v13</property>
      <property value="0.864424">fsim/tables/fuel_kg_s/h2/w1/v14</property>
      <property value="0.922703">fsim/tables/fuel_kg_s/h2/w1/v15</property>
      <property value="0.494625">fsim/tables/fuel_kg_s/h2/w1/v2</property>
      <property value="0.501866">fsim/tables/fuel_kg_s/h2/w1/v3</property>
      <property value="0.521719">fsim/tables/fuel_kg_s/h2/w1/v4</property>
      <property value="0.546503">fsim/tables/fuel_kg_s/h2/w1/v5</property>
      <property value="0.569759">fsim/tables/fuel_kg_s/h2/w1/v6</property>
      <property value="0.590759">fsim/tables/fuel_kg_s/h2/w1/v7</property>
      <property value="0.612085">fsim/tables/fuel_kg_s/h2/w1/v8</property>
      <property value="0.654902">fsim/tables/fuel_kg_s/h2/w1/v9</property>
      <property value="0.486972">fsim/tables/fuel_kg_s/h2/w2/v0</property>
      <property value="0.493333">fsim/tables/fuel_kg_s/h2/w2/v1</property>
      <property value="0.695611">fsim/tables/fuel_kg_s/h2/w2/v10</property>
      <property value="0.734412">fsim/tables/fuel_kg_s/h2/w2/v11</property>
      <property value="0.771884">fsim/tables/fuel_kg_s/h2/w2/v12</property>
      <property value="0.805878">fsim/tables/fuel_kg_s/h2/w2/v13</property>
      <property value="0.864201">fsim/tables/fuel_kg_s/h2/w2/v14</property>
      <property value="0.922017">fsim/tables/fuel_kg_s/h2/w2/v15</property>
      <property value="0.50041">fsim/tables/fuel_kg_s/h2/w2/v2</property>
      <property value="0.506818">fsim/tables/fuel_kg_s/h2/w2/v3</property>
      <property value="0.528999">fsim/tables/fuel_kg_s/h2/w2/v4</property>
      <property value="0.552909">fsim/tables/fuel_kg_s/h2/w2/v5</property>
      <property value="0.574882">fsim/tables/fuel_kg_s/h2/w2/v6</property>
      <property value="0.595243">fsim/tables/fuel_kg_s/h2/w2/v7</property>
      <property value="0.617062">fsim/tables/fuel_kg_s/h2/w2/v8</property>
      <property value="0.659215">fsim/tables/fuel_kg_s/h2/w2/v9</property>
      <property value="0.547373">fsim/tables/fuel_kg_s/h2/w3/v0</property>
      <property value="0.54699">fsim/tables/fuel_kg_s/h2/w3/v1</property>
      <property value="0.724451">fsim/tables/fuel_kg_s/h2/w3/v10</property>
      <property value="0.758016">fsim/tables/fuel_kg_s/h2/w3/v11</property>
      <property value="0.788384">fsim/tables/fuel_kg_s/h2/w3/v12</property>
      <property value="0.82036">fsim/tables/fuel_kg_s/h2/w3/v13</property>
      <property value="0.867491">fsim/tables/fuel_kg_s/h2/w3/v14</property>
      <property value="0.918522">fsim/tables/fuel_kg_s/h2/w3/v15</property>
      <property value="0.55095">fsim/tables/fuel_kg_s/h2/w3/v2</property>
      <property value="0.568274">fsim/tables/fuel_kg_s/h2/w3/v3</property>
      <property value="0.584872">fsim/tables/fuel_kg_s/h2/w3/v4</property>
      <property value="0.600287">fsim/tables/fuel_kg_s/h2/w3/v5</property>
      <property value="0.617891">fsim/tables/fuel_kg_s/h2/w3/v6</property>
      <property value="0.633461">fsim/tables/fuel_kg_s/h2/w3/v7</property>
      <property value="0.659207">fsim/tables/fuel_kg_s/h2/w3/v8</property>
      <property value="0.692249">fsim/tables/fuel_kg_s/h2/w3/v9</property>
      <property value="0.398686">fsim/tables/fuel_kg_s/h3/w0/v0</property>
      <property value="0.40543">fsim/tables/fuel_kg_s/h3/w0/v1</property>
      <property value="0.571084">fsim/tables/fuel_kg_s/h3/w0/v10</property>
      <property value="0.604456">fsim/tables/fuel_kg_s/h3/w0/v11</property>
      <property value="0.636955">fsim/tables/fuel_kg_s/h3/w0/v12</property>
      <property value="0.667554">fsim/tables/fuel_kg_s/h3/w0/v13</property>
      <property value="0.707653">fsim/tables/fuel_kg_s/h3/w0/v14</property>
      <property value="0.759517">fsim/tables/fuel_kg_s/h3/w0/v15</property>
      <property value="0.411262">fsim/tables/fuel_kg_s/h3/w0/v2</property>
      <property value="0.41811">fsim/tables/fuel_kg_s/h3/w0/v3</property>
      <property value="0.430417">fsim/tables/fuel_kg_s/h3/w0/v4</property>
      <property value="0.452576">fsim/tables/fuel_kg_s/h3/w0/v5</property>
      <property value="0.473116">fsim/tables/fuel_kg_s/h3/w0/v6</property>
      <property value="0.490621">fsim/tables/fuel_kg_s/h3/w0/v7</property>
      <property value="0.509021">fsim/tables/fuel_kg_s/h3/w0/v8</property>
      <property value="0.5382">fsim/tables/fuel_kg_s/h3/w0/v9</property>
      <property value="0.468192">fsim/tables/fuel_kg_s/h3/w1/v0</property>
      <property value="0.467125">fsim/tables/fuel_kg_s/h3/w1/v1</property>
      <property value="0.604278">fsim/tables/fuel_kg_s/h3/w1/v10</property>
      <property value="0.631954">fsim/tables/fuel_kg_s/h3/w1/v11</property>
      <property value="0.657706">fsim/tables/fuel_kg_s/h3/w1/v12</property>
      <property value="0.682683">fsim/tables/fuel_kg_s/h3/w1/v13</property>
      <property value="0.712054">fsim/tables/fuel_kg_s/h3/w1/v14</property>
      <property value="0.755859">fsim/tables/fuel_kg_s/h3/w1/v15</property>
      <property value="0.468421">fsim/tables/fuel_kg_s/h3/w1/v2</property>
      <property value="0.481559">fsim/tables/fuel_kg_s/h3/w1/v3</property>
      <property value="0.494648">fsim/tables/fuel_kg_s/h3/w1/v4</property>
      <property value="0.509262">fsim/tables/fuel_kg_s/h3/w1/v5</property>
      <property value="0.523325">fsim/tables/fuel_kg_s/h3/w1/v6</property>
      <property value="0.536246">fsim/tables/fuel_kg_s/h3/w1/v7</property>
      <property value="0.552194">fsim/tables/fuel_kg_s/h3/w1/v8</property>
      <property value="0.577745">fsim/tables/fuel_kg_s/h3/w1/v9</property>
      <property value="0.475352">fsim/tables/fuel_kg_s/h3/w2/v0</property>
      <property value="0.473898">fsim/tables/fuel_kg_s/h3/w2/v1</property>
      <property value="0.6079">fsim/tables/fuel_kg_s/h3/w2/v10</property>
      <property value="0.635026">fsim/tables/fuel_kg_s/h3/w2/v11</property>
      <property value="0.660434">fsim/tables/fuel_kg_s/h3/w2/v12</property>
      <property value="0.683862">fsim/tables/fuel_kg_s/h3/w2/v13</property>
      <property value="0.712025">fsim/tables/fuel_kg_s/h3/w2/v14</property>
      <property value="0.754973">fsim/tables/fuel_kg_s/h3/w2/v15</property>
      <property value="0.477211">fsim/tables/fuel_kg_s/h3/w2/v2</property>
      <property value="0.489319">fsim/tables/fuel_kg_s/h3/w2/v3</property>
      <property value="0.502416">fsim/tables/fuel_kg_s/h3/w2/v4</property>
      <property value="0.516397">fsim/tables/fuel_kg_s/h3/w2/v5</property>
      <property value="0.529189">fsim/tables/fuel_kg_s/h3/w2/v6</property>
      <property value="0.541838">fsim/tables/fuel_kg_s/h3/w2/v7</property>
      <property value="0.557744">fsim/tables/fuel_kg_s/h3/w2/v8</property>
      <property value="0.58246">fsim/tables/fuel_kg_s/h3/w2/v9</property>
      <property value="0.540301">fsim/tables/fuel_kg_s/h3/w3/v0</property>
      <property value="0.542879">fsim/tables/fuel_kg_s/h3/w3/v1</property>
      <property value="0.644121">fsim/tables/fuel_kg_s/h3/w3/v10</property>
      <property value="0.662589">fsim/tables/fuel_kg_s/h3/w3/v11</property>
      <property value="0.682261">fsim/tables/fuel_kg_s/h3/w3/v12</property>
      <property value="0.701174">fsim/tables/fuel_kg_s/h3/w3/v13</property>
      <property value="0.722195">fsim/tables/fuel_kg_s/h3/w3/v14</property>
      <property value="0.752957">fsim/tables/fuel_kg_s/h3/w3/v15</property>
      <property value="0.547649">fsim/tables/fuel_kg_s/h3/w3/v2</property>
      <property value="0.555308">fsim/tables/fuel_kg_s/h3/w3/v3</property>
      <property value="0.561906">fsim/tables/fuel_kg_s/h3/w3/v4</property>
      <property value="0.569846">fsim/tables/fuel_kg_s/h3/w3/v5</property>
      <property value="0.577021">fsim/tables/fuel_kg_s/h3/w3/v6</property>
      <property value="0.587093">fsim/tables/fuel_kg_s/h3/w3/v7</property>
      <property value="0.606638">fsim/tables/fuel_kg_s/h3/w3/v8</property>
      <property value="0.625785">fsim/tables/fuel_kg_s/h3/w3/v9</property>
      <property value="0.392832">fsim/tables/fuel_kg_s/h4/w0/v0</property>
      <property value="0.393921">fsim/tables/fuel_kg_s/h4/w0/v1</property>
      <property value="0.513884">fsim/tables/fuel_kg_s/h4/w0/v10</property>
      <property value="0.53908">fsim/tables/fuel_kg_s/h4/w0/v11</property>
      <property value="0.563068">fsim/tables/fuel_kg_s/h4/w0/v12</property>
      <property value="0.587907">fsim/tables/fuel_kg_s/h4/w0/v13</property>
      <property value="0.612111">fsim/tables/fuel_kg_s/h4/w0/v14</property>
      <property value="0.650594">fsim/tables/fuel_kg_s/h4/w0/v15</property>
      <property value="0.395354">fsim/tables/fuel_kg_s/h4/w0/v2</property>
      <property value="0.400771">fsim/tables/fuel_kg_s/h4/w0/v3</property>
      <property value="0.414916">fsim/tables/fuel_kg_s/h4/w0/v4</property>
      <property value="0.427762">fsim/tables/fuel_kg_s/h4/w0/v5</property>
      <property value="0.443023">fsim/tables/fuel_kg_s/h4/w0/v6</property>
      <property value="0.455201">fsim/tables/fuel_kg_s/h4/w0/v7</property>
      <property value="0.468661">fsim/tables/fuel_kg_s/h4/w0/v8</property>
      <property value="0.488618">fsim/tables/fuel_kg_s/h4/w0/v9</property>
      <property value="0.461546">fsim/tables/fuel_kg_s/h4/w1/v0</property>
      <property value="0.464245">fsim/tables/fuel_kg_s/h4/w1/v1</property>
      <property value="0.554453">fsim/tables/fuel_kg_s/h4/w1/v10</property>
      <property value="0.571006">fsim/tables/fuel_kg_s/h4/w1/v11</property>
      <property value="0.587717">fsim/tables/fuel_kg_s/h4/w1/v12</property>
      <property value="0.605592">fsim/tables/fuel_kg_s/h4/w1/v13</property>
      <property value="0.625028">fsim/tables/fuel_kg_s/h4/w1/v14</property>
      <property value="0.647456">fsim/tables/fuel_kg_s/h4/w1/v15</property>
      <property value="0.468557">fsim/tables/fuel_kg_s/h4/w1/v2</property>
      <property value="0.475224">fsim/tables/fuel_kg_s/h4/w1/v3</property>
      <property value="0.481932">fsim/tables/fuel_kg_s/h4/w1/v4</property>
      <property value="0.489459">fsim/tables/fuel_kg_s/h4/w1/v5</property>
      <property value="0.496939">fsim/tables/fuel_kg_s/h4/w1/v6</property>
      <property value="0.503794">fsim/tables/fuel_kg_s/h4/w1/v7</property>
      <property value="0.519443">fsim/tables/fuel_kg_s/h4/w1/v8</property>
      <property value="0.536854">fsim/tables/fuel_kg_s/h4/w1/v9</property>
      <property value="0.47165">fsim/tables/fuel_kg_s/h4/w2/v0</property>
      <property value="0.47378">fsim/tables/fuel_kg_s/h4/w2/v1</property>
      <property value="0.558885">fsim/tables/fuel_kg_s/h4/w2/v10</property>
      <property value="0.575067">fsim/tables/fuel_kg_s/h4/w2/v11</property>
      <property value="0.590809">fsim/tables/fuel_kg_s/h4/w2/v12</property>
      <property value="0.607587">fsim/tables/fuel_kg_s/h4/w2/v13</property>
      <property value="0.626334">fsim/tables/fuel_kg_s/h4/w2/v14</property>
      <property value="0.64731">fsim/tables/fuel_kg_s/h4/w2/v15</property>
      <property value="0.477794">fsim/tables/fuel_kg_s/h4/w2/v2</property>
      <property value="0.483629">fsim/tables/fuel_kg_s/h4/w2/v3</property>
      <property value="0.48926">fsim/tables/fuel_kg_s/h4/w2/v4</property>
      <property value="0.496504">fsim/tables/fuel_kg_s/h4/w2/v5</property>
      <property value="0.503317">fsim/tables/fuel_kg_s/h4/w2/v6</property>
      <property value="0.510323">fsim/tables/fuel_kg_s/h4/w2/v7</property>
      <property value="0.525869">fsim/tables/fuel_kg_s/h4/w2/v8</property>
      <property value="0.542812">fsim/tables/fuel_kg_s/h4/w2/v9</property>
      <property value="0.549131">fsim/tables/fuel_kg_s/h4/w3/v0</property>
      <property value="0.548735">fsim/tables/fuel_kg_s/h4/w3/v1</property>
      <property value="0.599499">fsim/tables/fuel_kg_s/h4/w3/v10</property>
      <property value="0.610518">fsim/tables/fuel_kg_s/h4/w3/v11</property>
      <property value="0.621542">fsim/tables/fuel_kg_s/h4/w3/v12</property>
      <property value="0.632716">fsim/tables/fuel_kg_s/h4/w3/v13</property>
      <property value="0.644097">fsim/tables/fuel_kg_s/h4/w3/v14</property>
      <property value="0.652515">fsim/tables/fuel_kg_s/h4/w3/v15</property>
      <property value="0.548956">fsim/tables/fuel_kg_s/h4/w3/v2</property>
      <property value="0.549077">fsim/tables/fuel_kg_s/h4/w3/v3</property>
      <property value="0.551682">fsim/tables/fuel_kg_s/h4/w3/v4</property>
      <property value="0.554286">fsim/tables/fuel_kg_s/h4/w3/v5</property>
      <property value="0.559787">fsim/tables/fuel_kg_s/h4/w3/v6</property>
      <property value="0.569361">fsim/tables/fuel_kg_s/h4/w3/v7</property>
      <property value="0.578863">fsim/tables/fuel_kg_s/h4/w3/v8</property>
      <property value="0.589199">fsim/tables/fuel_kg_s/h4/w3/v9</property>
      <property value="0.387969">fsim/tables/fuel_kg_s/h5/w0/v0</property>
      <property value="0.386224">fsim/tables/fuel_kg_s/h5/w0/v1</property>
      <property value="0.482585">fsim/tables/fuel_kg_s/h5/w0/v10</property>
      <property value="0.499727">fsim/tables/fuel_kg_s/h5/w0/v11</property>
      <property value="0.520504">fsim/tables/fuel_kg_s/h5/w0/v12</property>
      <property value="0.539817">fsim/tables/fuel_kg_s/h5/w0/v13</property>
      <property value="0.559401">fsim/tables/fuel_kg_s/h5/w0/v14</property>
      <property value="0.583498">fsim/tables/fuel_kg_s/h5/w0/v15</property>
      <property value="0.388155">fsim/tables/fuel_kg_s/h5/w0/v2</property>
      <property value="0.395832">fsim/tables/fuel_kg_s/h5/w0/v3</property>
      <property value="0.406805">fsim/tables/fuel_kg_s/h5/w0/v4</property>
      <property value="0.416422">fsim/tables/fuel_kg_s/h5/w0/v5</property>
      <property value="0.426458">fsim/tables/fuel_kg_s/h5/w0/v6</property>
      <property value="0.435641">fsim/tables/fuel_kg_s/h5/w0/v7</property>
      <property value="0.444869">fsim/tables/fuel_kg_s/h5/w0/v8</property>
      <property value="0.462426">fsim/tables/fuel_kg_s/h5/w0/v9</property>
      <property value="0.467914">fsim/tables/fuel_kg_s/h5/w1/v0</property>
      <property value="0.468764">fsim/tables/fuel_kg_s/h5/w1/v1</property>
      <property value="0.526011">fsim/tables/fuel_kg_s/h5/w1/v10</property>
      <property value="0.53856">fsim/tables/fuel_kg_s/h5/w1/v11</property>
      <property value="0.54957">fsim/tables/fuel_kg_s/h5/w1/v12</property>
      <property value="0.562945">fsim/tables/fuel_kg_s/h5/w1/v13</property>
      <property value="0.575881">fsim/tables/fuel_kg_s/h5/w1/v14</property>
      <property value="0.588813">fsim/tables/fuel_kg_s/h5/w1/v15</property>
      <property value="0.470519">fsim/tables/fuel_kg_s/h5/w1/v2</property>
      <property value="0.472182">fsim/tables/fuel_kg_s/h5/w1/v3</property>
      <property value="0.475657">fsim/tables/fuel_kg_s/h5/w1/v4</property>
      <property value="0.479898">fsim/tables/fuel_kg_s/h5/w1/v5</property>
      <property value="0.484353">fsim/tables/fuel_kg_s/h5/w1/v6</property>
      <property value="0.490183">fsim/tables/fuel_kg_s/h5/w1/v7</property>
      <property value="0.502878">fsim/tables/fuel_kg_s/h5/w1/v8</property>
      <property value="0.513518">fsim/tables/fuel_kg_s/h5/w1/v9</property>
      <property value="0.478149">fsim/tables/fuel_kg_s/h5/w2/v0</property>
      <property value="0.478696">fsim/tables/fuel_kg_s/h5/w2/v1</property>
      <property value="0.531133">fsim/tables/fuel_kg_s/h5/w2/v10</property>
      <property value="0.54391">fsim/tables/fuel_kg_s/h5/w2/v11</property>
      <property value="0.554606">fsim/tables/fuel_kg_s/h5/w2/v12</property>
      <property value="0.566062">fsim/tables/fuel_kg_s/h5/w2/v13</property>
      <property value="0.579052">fsim/tables/fuel_kg_s/h5/w2/v14</property>
      <property value="0.591468">fsim/tables/fuel_kg_s/h5/w2/v15</property>
      <property value="0.479937">fsim/tables/fuel_kg_s/h5/w2/v2</property>
      <property value="0.480866">fsim/tables/fuel_kg_s/h5/w2/v3</property>
      <property value="0.483913">fsim/tables/fuel_kg_s/h5/w2/v4</property>
      <property value="0.487273">fsim/tables/fuel_kg_s/h5/w2/v5</property>
      <property value="0.491446">fsim/tables/fuel_kg_s/h5/w2/v6</property>
      <property value="0.498034">fsim/tables/fuel_kg_s/h5/w2/v7</property>
      <property value="0.510005">fsim/tables/fuel_kg_s/h5/w2/v8</property>
      <property value="0.520289">fsim/tables/fuel_kg_s/h5/w2/v9</property>
      <property value="0.539765">fsim/tables/fuel_kg_s/h5/w3/v0</property>
      <property value="0.54764">fsim/tables/fuel_kg_s/h5/w3/v1</property>
      <property value="0.567999">fsim/tables/fuel_kg_s/h5/w3/v10</property>
      <property value="0.56881">fsim/tables/fuel_kg_s/h5/w3/v11</property>
      <property value="0.56722">fsim/tables/fuel_kg_s/h5/w3/v12</property>
      <property value="0.561924">fsim/tables/fuel_kg_s/h5/w3/v13</property>
      <property value="0.556697">fsim/tables/fuel_kg_s/h5/w3/v14</property>
      <property value="0.592128">fsim/tables/fuel_kg_s/h5/w3/v15</property>
      <property value="0.550135">fsim/tables/fuel_kg_s/h5/w3/v2</property>
      <property value="0.54992">fsim/tables/fuel_kg_s/h5/w3/v3</property>
      <property value="0.550022">fsim/tables/fuel_kg_s/h5/w3/v4</property>
      <property value="0.551652">fsim/tables/fuel_kg_s/h5/w3/v5</property>
      <property value="0.554977">fsim/tables/fuel_kg_s/h5/w3/v6</property>
      <property value="0.55901">fsim/tables/fuel_kg_s/h5/w3/v7</property>
      <property value="0.562395">fsim/tables/fuel_kg_s/h5/w3/v8</property>
      <property value="0.565422">fsim/tables/fuel_kg_s/h5/w3/v9</property>
      <property value="0.384294">fsim/tables/fuel_kg_s/h6/w0/v0</property>
      <property value="0.386593">fsim/tables/fuel_kg_s/h6/w0/v1</property>
      <property value="0.456002">fsim/tables/fuel_kg_s/h6/w0/v10</property>
      <property value="0.470849">fsim/tables/fuel_kg_s/h6/w0/v11</property>
      <property value="0.484695">fsim/tables/fuel_kg_s/h6/w0/v12</property>
      <property value="0.499129">fsim/tables/fuel_kg_s/h6/w0/v13</property>
      <property value="0.514728">fsim/tables/fuel_kg_s/h6/w0/v14</property>
      <property value="0.530632">fsim/tables/fuel_kg_s/h6/w0/v15</property>
      <property value="0.390459">fsim/tables/fuel_kg_s/h6/w0/v2</property>
      <property value="0.394848">fsim/tables/fuel_kg_s/h6/w0/v3</property>
      <property value="0.39916">fsim/tables/fuel_kg_s/h6/w0/v4</property>
      <property value="0.405853">fsim/tables/fuel_kg_s/h6/w0/v5</property>
      <property value="0.412707">fsim/tables/fuel_kg_s/h6/w0/v6</property>
      <property value="0.419035">fsim/tables/fuel_kg_s/h6/w0/v7</property>
      <property value="0.427189">fsim/tables/fuel_kg_s/h6/w0/v8</property>
      <property value="0.442134">fsim/tables/fuel_kg_s/h6/w0/v9</property>
      <property value="0.474545">fsim/tables/fuel_kg_s/h6/w1/v0</property>
      <property value="0.472871">fsim/tables/fuel_kg_s/h6/w1/v1</property>
      <property value="0.499917">fsim/tables/fuel_kg_s/h6/w1/v10</property>
      <property value="0.507584">fsim/tables/fuel_kg_s/h6/w1/v11</property>
      <property value="0.515111">fsim/tables/fuel_kg_s/h6/w1/v12</property>
      <property value="0.522634">fsim/tables/fuel_kg_s/h6/w1/v13</property>
      <property value="0.531523">fsim/tables/fuel_kg_s/h6/w1/v14</property>
      <property value="0.536418">fsim/tables/fuel_kg_s/h6/w1/v15</property>
      <property value="0.471771">fsim/tables/fuel_kg_s/h6/w1/v2</property>
      <property value="0.471491">fsim/tables/fuel_kg_s/h6/w1/v3</property>
      <property value="0.471096">fsim/tables/fuel_kg_s/h6/w1/v4</property>
      <property value="0.471875">fsim/tables/fuel_kg_s/h6/w1/v5</property>
      <property value="0.473528">fsim/tables/fuel_kg_s/h6/w1/v6</property>
      <property value="0.478992">fsim/tables/fuel_kg_s/h6/w1/v7</property>
      <property value="0.486357">fsim/tables/fuel_kg_s/h6/w1/v8</property>
      <property value="0.493382">fsim/tables/fuel_kg_s/h6/w1/v9</property>
      <property value="0.486738">fsim/tables/fuel_kg_s/h6/w2/v0</property>
      <property value="0.484578">fsim/tables/fuel_kg_s/h6/w2/v1</property>
      <property value="0.503863">fsim/tables/fuel_kg_s/h6/w2/v10</property>
      <property value="0.5094">fsim/tables/fuel_kg_s/h6/w2/v11</property>
      <property value="0.516712">fsim/tables/fuel_kg_s/h6/w2/v12</property>
      <property value="0.524001">fsim/tables/fuel_kg_s/h6/w2/v13</property>
      <property value="0.529939">fsim/tables/fuel_kg_s/h6/w2/v14</property>
      <property value="0.532235">fsim/tables/fuel_kg_s/h6/w2/v15</property>
      <property value="0.482433">fsim/tables/fuel_kg_s/h6/w2/v2</property>
      <property value="0.481022">fsim/tables/fuel_kg_s/h6/w2/v3</property>
      <property value="0.480502">fsim/tables/fuel_kg_s/h6/w2/v4</property>
      <property value="0.480097">fsim/tables/fuel_kg_s/h6/w2/v5</property>
      <property value="0.481915">fsim/tables/fuel_kg_s/h6/w2/v6</property>
      <property value="0.486797">fsim/tables/fuel_kg_s/h6/w2/v7</property>
      <property value="0.491083">fsim/tables/fuel_kg_s/h6/w2/v8</property>
      <property value="0.497678">fsim/tables/fuel_kg_s/h6/w2/v9</property>
      <property value="14.8509">fsim/tables/max_climb_ms/h0/w0</property>
      <property value="11.7172">fsim/tables/max_climb_ms/h0/w1</property>
      <property value="11.4224">fsim/tables/max_climb_ms/h0/w2</property>
      <property value="9.34278">fsim/tables/max_climb_ms/h0/w3</property>
      <property value="12.8699">fsim/tables/max_climb_ms/h1/w0</property>
      <property value="10.0408">fsim/tables/max_climb_ms/h1/w1</property>
      <property value="9.77433">fsim/tables/max_climb_ms/h1/w2</property>
      <property value="7.88659">fsim/tables/max_climb_ms/h1/w3</property>
      <property value="9.89593">fsim/tables/max_climb_ms/h2/w0</property>
      <property value="7.42121">fsim/tables/max_climb_ms/h2/w1</property>
      <property value="7.18879">fsim/tables/max_climb_ms/h2/w2</property>
      <property value="5.51866">fsim/tables/max_climb_ms/h2/w3</property>
      <property value="7.21603">fsim/tables/max_climb_ms/h3/w0</property>
      <property value="5.04666">fsim/tables/max_climb_ms/h3/w1</property>
      <property value="4.84121">fsim/tables/max_climb_ms/h3/w2</property>
      <property value="3.33826">fsim/tables/max_climb_ms/h3/w3</property>
      <property value="5.37253">fsim/tables/max_climb_ms/h4/w0</property>
      <property value="3.38805">fsim/tables/max_climb_ms/h4/w1</property>
      <property value="3.19378">fsim/tables/max_climb_ms/h4/w2</property>
      <property value="1.75737">fsim/tables/max_climb_ms/h4/w3</property>
      <property value="4.20863">fsim/tables/max_climb_ms/h5/w0</property>
      <property value="2.31208">fsim/tables/max_climb_ms/h5/w1</property>
      <property value="2.12189">fsim/tables/max_climb_ms/h5/w2</property>
      <property value="0.735316">fsim/tables/max_climb_ms/h5/w3</property>
      <property value="3.1087">fsim/tables/max_climb_ms/h6/w0</property>
      <property value="1.2594">fsim/tables/max_climb_ms/h6/w1</property>
      <property value="1.08009">fsim/tables/max_climb_ms/h6/w2</property>
      <property value="147.048">fsim/tables/max_tas_ms/h0/w0</property>
      <property value="146.088">fsim/tables/max_tas_ms/h0/w1</property>
      <property value="145.981">fsim/tables/max_tas_ms/h0/w2</property>
      <property value="144.546">fsim/tables/max_tas_ms/h0/w3</property>
      <property value="152.455">fsim/tables/max_tas_ms/h1/w0</property>
      <property value="150.652">fsim/tables/max_tas_ms/h1/w1</property>
      <property value="150.512">fsim/tables/max_tas_ms/h1/w2</property>
      <property value="149.12">fsim/tables/max_tas_ms/h1/w3</property>
      <property value="150.088">fsim/tables/max_tas_ms/h2/w0</property>
      <property value="148.065">fsim/tables/max_tas_ms/h2/w1</property>
      <property value="147.75">fsim/tables/max_tas_ms/h2/w2</property>
      <property value="145.359">fsim/tables/max_tas_ms/h2/w3</property>
      <property value="145.938">fsim/tables/max_tas_ms/h3/w0</property>
      <property value="142.824">fsim/tables/max_tas_ms/h3/w1</property>
      <property value="142.388">fsim/tables/max_tas_ms/h3/w2</property>
      <property value="138.985">fsim/tables/max_tas_ms/h3/w3</property>
      <property value="142.149">fsim/tables/max_tas_ms/h4/w0</property>
      <property value="138.018">fsim/tables/max_tas_ms/h4/w1</property>
      <property value="137.444">fsim/tables/max_tas_ms/h4/w2</property>
      <property value="132.292">fsim/tables/max_tas_ms/h4/w3</property>
      <property value="139.078">fsim/tables/max_tas_ms/h5/w0</property>
      <property value="133.867">fsim/tables/max_tas_ms/h5/w1</property>
      <property value="133.223">fsim/tables/max_tas_ms/h5/w2</property>
      <property value="122.146">fsim/tables/max_tas_ms/h5/w3</property>
      <property value="135.841">fsim/tables/max_tas_ms/h6/w0</property>
      <property value="127.07">fsim/tables/max_tas_ms/h6/w1</property>
      <property value="124.922">fsim/tables/max_tas_ms/h6/w2</property>
      <property value="73.2532">fsim/tables/min_tas_ms/h0/w0</property>
      <property value="75.538">fsim/tables/min_tas_ms/h0/w1</property>
      <property value="75.8206">fsim/tables/min_tas_ms/h0/w2</property>
      <property value="78.2289">fsim/tables/min_tas_ms/h0/w3</property>
      <property value="75.1028">fsim/tables/min_tas_ms/h1/w0</property>
      <property value="78.1852">fsim/tables/min_tas_ms/h1/w1</property>
      <property value="78.545">fsim/tables/min_tas_ms/h1/w2</property>
      <property value="81.5682">fsim/tables/min_tas_ms/h1/w3</property>
      <property value="77.3408">fsim/tables/min_tas_ms/h2/w0</property>
      <property value="81.2936">fsim/tables/min_tas_ms/h2/w1</property>
      <property value="81.7442">fsim/tables/min_tas_ms/h2/w2</property>
      <property value="85.4067">fsim/tables/min_tas_ms/h2/w3</property>
      <property value="80.4922">fsim/tables/min_tas_ms/h3/w0</property>
      <property value="85.341">fsim/tables/min_tas_ms/h3/w1</property>
      <property value="85.8846">fsim/tables/min_tas_ms/h3/w2</property>
      <property value="90.2823">fsim/tables/min_tas_ms/h3/w3</property>
      <property value="83.5339">fsim/tables/min_tas_ms/h4/w0</property>
      <property value="89.1139">fsim/tables/min_tas_ms/h4/w1</property>
      <property value="89.738">fsim/tables/min_tas_ms/h4/w2</property>
      <property value="94.687">fsim/tables/min_tas_ms/h4/w3</property>
      <property value="85.9153">fsim/tables/min_tas_ms/h5/w0</property>
      <property value="92.0156">fsim/tables/min_tas_ms/h5/w1</property>
      <property value="92.6854">fsim/tables/min_tas_ms/h5/w2</property>
      <property value="97.6697">fsim/tables/min_tas_ms/h5/w3</property>
      <property value="88.5826">fsim/tables/min_tas_ms/h6/w0</property>
      <property value="95.1819">fsim/tables/min_tas_ms/h6/w1</property>
      <property value="95.9378">fsim/tables/min_tas_ms/h6/w2</property>
      <property value="14.7964">fsim/tables/ps_full_ms/h0/w0/v0</property>
      <property value="14.8419">fsim/tables/ps_full_ms/h0/w0/v1</property>
      <property value="9.60789">fsim/tables/ps_full_ms/h0/w0/v10</property>
      <property value="8.55455">fsim/tables/ps_full_ms/h0/w0/v11</property>
      <property value="7.36669">fsim/tables/ps_full_ms/h0/w0/v12</property>
      <property value="5.69762">fsim/tables/ps_full_ms/h0/w0/v13</property>
      <property value="3.87318">fsim/tables/ps_full_ms/h0/w0/v14</property>
      <property value="1.93679">fsim/tables/ps_full_ms/h0/w0/v15</property>
      <property value="14.7311">fsim/tables/ps_full_ms/h0/w0/v2</property>
      <property value="14.5668">fsim/tables/ps_full_ms/h0/w0/v3</property>
      <property value="14.3563">fsim/tables/ps_full_ms/h0/w0/v4</property>
      <property value="13.9861">fsim/tables/ps_full_ms/h0/w0/v5</property>
      <property value="13.3634">fsim/tables/ps_full_ms/h0/w0/v6</property>
      <property value="12.5587">fsim/tables/ps_full_ms/h0/w0/v7</property>
      <property value="11.6451">fsim/tables/ps_full_ms/h0/w0/v8</property>
      <property value="10.6469">fsim/tables/ps_full_ms/h0/w0/v9</property>
      <property value="11.6652">fsim/tables/ps_full_ms/h0/w1/v0</property>
      <property value="11.7098">fsim/tables/ps_full_ms/h0/w1/v1</property>
      <property value="7.57354">fsim/tables/ps_full_ms/h0/w1/v10</property>
      <property value="6.71658">fsim/tables/ps_full_ms/h0/w1/v11</property>
      <property value="5.839">fsim/tables/ps_full_ms/h0/w1/v12</property>
      <property value="4.60601">fsim/tables/ps_full_ms/h0/w1/v13</property>
      <property value="3.16905">fsim/tables/ps_full_ms/h0/w1/v14</property>
      <property value="1.6069">fsim/tables/ps_full_ms/h0/w1/v15</property>
      <property value="11.6295">fsim/tables/ps_full_ms/h0/w1/v2</property>
      <property value="11.517">fsim/tables/ps_full_ms/h0/w1/v3</property>
      <property value="11.3783">fsim/tables/ps_full_ms/h0/w1/v4</property>
      <property value="11.0733">fsim/tables/ps_full_ms/h0/w1/v5</property>
      <property value="10.5601">fsim/tables/ps_full_ms/h0/w1/v6</property>
      <property value="9.92056">fsim/tables/ps_full_ms/h0/w1/v7</property>
      <property value="9.1726">fsim/tables/ps_full_ms/h0/w1/v8</property>
      <property value="8.40288">fsim/tables/ps_full_ms/h0/w1/v9</property>
      <property value="11.3715">fsim/tables/ps_full_ms/h0/w2/v0</property>
      <property value="11.4143">fsim/tables/ps_full_ms/h0/w2/v1</property>
      <property value="7.38506">fsim/tables/ps_full_ms/h0/w2/v10</property>
      <property value="6.54539">fsim/tables/ps_full_ms/h0/w2/v11</property>
      <property value="5.68603">fsim/tables/ps_full_ms/h0/w2/v12</property>
      <property value="4.48144">fsim/tables/ps_full_ms/h0/w2/v13</property>
      <property value="3.10403">fsim/tables/ps_full_ms/h0/w2/v14</property>
      <property value="1.57676">fsim/tables/ps_full_ms/h0/w2/v15</property>
      <property value="11.3374">fsim/tables/ps_full_ms/h0/w2/v2</property>
      <property value="11.23">fsim/tables/ps_full_ms/h0/w2/v3</property>
      <property value="11.098">fsim/tables/ps_full_ms/h0/w2/v4</property>
      <property value="10.7959">fsim/tables/ps_full_ms/h0/w2/v5</property>
      <property value="10.2943">fsim/tables/ps_full_ms/h0/w2/v6</property>
      <property value="9.6704">fsim/tables/ps_full_ms/h0/w2/v7</property>
      <property value="8.94119">fsim/tables/ps_full_ms/h0/w2/v8</property>
      <property value="8.18635">fsim/tables/ps_full_ms/h0/w2/v9</property>
      <property value="9.30083">fsim/tables/ps_full_ms/h0/w3/v0</property>
      <property value="9.33303">fsim/tables/ps_full_ms/h0/w3/v1</property>
      <property value="6.06554">fsim/tables/ps_full_ms/h0/w3/v10</property>
      <property value="5.4087">fsim/tables/ps_full_ms/h0/w3/v11</property>
      <property value="4.70355">fsim/tables/ps_full_ms/h0/w3/v12</property>
      <property value="3.7532">fsim/tables/ps_full_ms/h0/w3/v13</property>
      <property value="2.65835">fsim/tables/ps_full_ms/h0/w3/v14</property>
      <property value="1.47623">fsim/tables/ps_full_ms/h0/w3/v15</property>
      <property value="9.28059">fsim/tables/ps_full_ms/h0/w3/v2</property>
      <property value="9.2139">fsim/tables/ps_full_ms/h0/w3/v3</property>
      <property value="9.1179">fsim/tables/ps_full_ms/h0/w3/v4</property>
      <property value="8.84816">fsim/tables/ps_full_ms/h0/w3/v5</property>
      <property value="8.43637">fsim/tables/ps_full_ms/h0/w3/v6</property>
      <property value="7.92616">fsim/tables/ps_full_ms/h0/w3/v7</property>
      <property value="7.34284">fsim/tables/ps_full_ms/h0/w3/v8</property>
      <property value="6.7375">fsim/tables/ps_full_ms/h0/w3/v9</property>
      <property value="12.6631">fsim/tables/ps_full_ms/h1/w0/v0</property>
      <property value="12.8459">fsim/tables/ps_full_ms/h1/w0/v1</property>
      <property value="9.01047">fsim/tables/ps_full_ms/h1/w0/v10</property>
      <property value="7.95627">fsim/tables/ps_full_ms/h1/w0/v11</property>
      <property value="6.63034">fsim/tables/ps_full_ms/h1/w0/v12</property>
      <property value="5.18055">fsim/tables/ps_full_ms/h1/w0/v13</property>
      <property value="3.5198">fsim/tables/ps_full_ms/h1/w0/v14</property>
      <property value="1.72571">fsim/tables/ps_full_ms/h1/w0/v15</property>
      <property value="12.8698">fsim/tables/ps_full_ms/h1/w0/v2</property>
      <property value="12.8499">fsim/tables/ps_full_ms/h1/w0/v3</property>
      <property value="12.6996">fsim/tables/ps_full_ms/h1/w0/v4</property>
      <property value="12.2976">fsim/tables/ps_full_ms/h1/w0/v5</property>
      <property value="11.7804">fsim/tables/ps_full_ms/h1/w0/v6</property>
      <property value="11.1669">fsim/tables/ps_full_ms/h1/w0/v7</property>
      <property value="10.491">fsim/tables/ps_full_ms/h1/w0/v8</property>
      <property value="9.76317">fsim/tables/ps_full_ms/h1/w0/v9</property>
      <property value="9.84606">fsim/tables/ps_full_ms/h1/w1/v0</property>
      <property value="9.99648">fsim/tables/ps_full_ms/h1/w1/v1</property>
      <property value="7.08246">fsim/tables/ps_full_ms/h1/w1/v10</property>
      <property value="6.26998">fsim/tables/ps_full_ms/h1/w1/v11</property>
      <property value="5.23817">fsim/tables/ps_full_ms/h1/w1/v12</property>
      <property value="4.18824">fsim/tables/ps_full_ms/h1/w1/v13</property>
      <property value="3.01784">fsim/tables/ps_full_ms/h1/w1/v14</property>
      <property value="1.63398">fsim/tables/ps_full_ms/h1/w1/v15</property>
      <property value="10.032">fsim/tables/ps_full_ms/h1/w1/v2</property>
      <property value="10.0312">fsim/tables/ps_full_ms/h1/w1/v3</property>
      <property value="9.86801">fsim/tables/ps_full_ms/h1/w1/v4</property>
      <property value="9.56876">fsim/tables/ps_full_ms/h1/w1/v5</property>
      <property value="9.17683">fsim/tables/ps_full_ms/h1/w1/v6</property>
      <property value="8.71855">fsim/tables/ps_full_ms/h1/w1/v7</property>
      <property value="8.20899">fsim/tables/ps_full_ms/h1/w1/v8</property>
      <property value="7.63851">fsim/tables/ps_full_ms/h1/w1/v9</property>
      <property value="9.58081">fsim/tables/ps_full_ms/h1/w2/v0</property>
      <property value="9.72745">fsim/tables/ps_full_ms/h1/w2/v1</property>
      <property value="6.88896">fsim/tables/ps_full_ms/h1/w2/v10</property>
      <property value="6.10582">fsim/tables/ps_full_ms/h1/w2/v11</property>
      <property value="5.09648">fsim/tables/ps_full_ms/h1/w2/v12</property>
      <property value="4.07024">fsim/tables/ps_full_ms/h1/w2/v13</property>
      <property value="2.92911">fsim/tables/ps_full_ms/h1/w2/v14</property>
      <property value="1.60897">fsim/tables/ps_full_ms/h1/w2/v15</property>
      <property value="9.76403">fsim/tables/ps_full_ms/h1/w2/v2</property>
      <property value="9.76468">fsim/tables/ps_full_ms/h1/w2/v3</property>
      <property value="9.59769">fsim/tables/ps_full_ms/h1/w2/v4</property>
      <property value="9.30816">fsim/tables/ps_full_ms/h1/w2/v5</property>
      <property value="8.92982">fsim/tables/ps_full_ms/h1/w2/v6</property>
      <property value="8.48137">fsim/tables/ps_full_ms/h1/w2/v7</property>
      <property value="7.99222">fsim/tables/ps_full_ms/h1/w2/v8</property>
      <property value="7.43477">fsim/tables/ps_full_ms/h1/w2/v9</property>
      <property value="7.71015">fsim/tables/ps_full_ms/h1/w3/v0</property>
      <property value="7.83309">fsim/tables/ps_full_ms/h1/w3/v1</property>
      <property value="5.57014">fsim/tables/ps_full_ms/h1/w3/v10</property>
      <property value="4.9278">fsim/tables/ps_full_ms/h1/w3/v11</property>
      <property value="4.13792">fsim/tables/ps_full_ms/h1/w3/v12</property>
      <property value="3.30286">fsim/tables/ps_full_ms/h1/w3/v13</property>
      <property value="2.37625">fsim/tables/ps_full_ms/h1/w3/v14</property>
      <property value="1.34326">fsim/tables/ps_full_ms/h1/w3/v15</property>
      <property value="7.87241">fsim/tables/ps_full_ms/h1/w3/v2</property>
      <property value="7.86141">fsim/tables/ps_full_ms/h1/w3/v3</property>
      <property value="7.69025">fsim/tables/ps_full_ms/h1/w3/v4</property>
      <property value="7.4703">fsim/tables/ps_full_ms/h1/w3/v5</property>
      <property value="7.17453">fsim/tables/ps_full_ms/h1/w3/v6</property>
      <property value="6.83772">fsim/tables/ps_full_ms/h1/w3/v7</property>
      <property value="6.4299">fsim/tables/ps_full_ms/h1/w3/v8</property>
      <property value="6.01498">fsim/tables/ps_full_ms/h1/w3/v9</property>
      <property value="9.71625">fsim/tables/ps_full_ms/h2/w0/v0</property>
      <property value="9.88078">fsim/tables/ps_full_ms/h2/w0/v1</property>
      <property value="6.82478">fsim/tables/ps_full_ms/h2/w0/v10</property>
      <property value="6.11354">fsim/tables/ps_full_ms/h2/w0/v11</property>
      <property value="5.05373">fsim/tables/ps_full_ms/h2/w0/v12</property>
      <property value="3.95824">fsim/tables/ps_full_ms/h2/w0/v13</property>
      <property value="2.81503">fsim/tables/ps_full_ms/h2/w0/v14</property>
      <property value="1.53538">fsim/tables/ps_full_ms/h2/w0/v15</property>
      <property value="9.8959">fsim/tables/ps_full_ms/h2/w0/v2</property>
      <property value="9.87535">fsim/tables/ps_full_ms/h2/w0/v3</property>
      <property value="9.78385">fsim/tables/ps_full_ms/h2/w0/v4</property>
      <property value="9.47456">fsim/tables/ps_full_ms/h2/w0/v5</property>
      <property value="9.08275">fsim/tables/ps_full_ms/h2/w0/v6</property>
      <property value="8.59371">fsim/tables/ps_full_ms/h2/w0/v7</property>
      <property value="8.0436">fsim/tables/ps_full_ms/h2/w0/v8</property>
      <property value="7.42252">fsim/tables/ps_full_ms/h2/w0/v9</property>
      <property value="7.24274">fsim/tables/ps_full_ms/h2/w1/v0</property>
      <property value="7.38143">fsim/tables/ps_full_ms/h2/w1/v1</property>
      <property value="5.13918">fsim/tables/ps_full_ms/h2/w1/v10</property>
      <property value="4.61629">fsim/tables/ps_full_ms/h2/w1/v11</property>
      <property value="3.84316">fsim/tables/ps_full_ms/h2/w1/v12</property>
      <property value="3.01907">fsim/tables/ps_full_ms/h2/w1/v13</property>
      <property value="2.1234">fsim/tables/ps_full_ms/h2/w1/v14</property>
      <property value="1.22813">fsim/tables/ps_full_ms/h2/w1/v15</property>
      <property value="7.40658">fsim/tables/ps_full_ms/h2/w1/v2</property>
      <property value="7.42018">fsim/tables/ps_full_ms/h2/w1/v3</property>
      <property value="7.28816">fsim/tables/ps_full_ms/h2/w1/v4</property>
      <property value="7.05577">fsim/tables/ps_full_ms/h2/w1/v5</property>
      <property value="6.76357">fsim/tables/ps_full_ms/h2/w1/v6</property>
      <property value="6.42961">fsim/tables/ps_full_ms/h2/w1/v7</property>
      <property value="6.02723">fsim/tables/ps_full_ms/h2/w1/v8</property>
      <property value="5.57993">fsim/tables/ps_full_ms/h2/w1/v9</property>
      <property value="7.00831">fsim/tables/ps_full_ms/h2/w2/v0</property>
      <property value="7.14483">fsim/tables/ps_full_ms/h2/w2/v1</property>
      <property value="4.99087">fsim/tables/ps_full_ms/h2/w2/v10</property>
      <property value="4.4839">fsim/tables/ps_full_ms/h2/w2/v11</property>
      <property value="3.73481">fsim/tables/ps_full_ms/h2/w2/v12</property>
      <property value="2.94728">fsim/tables/ps_full_ms/h2/w2/v13</property>
      <property value="2.08012">fsim/tables/ps_full_ms/h2/w2/v14</property>
      <property value="1.20832">fsim/tables/ps_full_ms/h2/w2/v15</property>
      <property value="7.16978">fsim/tables/ps_full_ms/h2/w2/v2</property>
      <property value="7.18684">fsim/tables/ps_full_ms/h2/w2/v3</property>
      <property value="7.05158">fsim/tables/ps_full_ms/h2/w2/v4</property>
      <property value="6.82426">fsim/tables/ps_full_ms/h2/w2/v5</property>
      <property value="6.54805">fsim/tables/ps_full_ms/h2/w2/v6</property>
      <property value="6.2232">fsim/tables/ps_full_ms/h2/w2/v7</property>
      <property value="5.84403">fsim/tables/ps_full_ms/h2/w2/v8</property>
      <property value="5.40411">fsim/tables/ps_full_ms/h2/w2/v9</property>
      <property value="5.349">fsim/tables/ps_full_ms/h2/w3/v0</property>
      <property value="5.46974">fsim/tables/ps_full_ms/h2/w3/v1</property>
      <property value="3.84575">fsim/tables/ps_full_ms/h2/w3/v10</property>
      <property value="3.49147">fsim/tables/ps_full_ms/h2/w3/v11</property>
      <property value="2.97608">fsim/tables/ps_full_ms/h2/w3/v12</property>
      <property value="2.33018">fsim/tables/ps_full_ms/h2/w3/v13</property>
      <property value="1.68583">fsim/tables/ps_full_ms/h2/w3/v14</property>
      <property value="1.02058">fsim/tables/ps_full_ms/h2/w3/v15</property>
      <property value="5.50296">fsim/tables/ps_full_ms/h2/w3/v2</property>
      <property value="5.48501">fsim/tables/ps_full_ms/h2/w3/v3</property>
      <property value="5.3588">fsim/tables/ps_full_ms/h2/w3/v4</property>
      <property value="5.19878">fsim/tables/ps_full_ms/h2/w3/v5</property>
      <property value="4.98901">fsim/tables/ps_full_ms/h2/w3/v6</property>
      <property value="4.76561">fsim/tables/ps_full_ms/h2/w3/v7</property>
      <property value="4.4867">fsim/tables/ps_full_ms/h2/w3/v8</property>
      <property value="4.18334">fsim/tables/ps_full_ms/h2/w3/v9</property>
      <property value="7.04049">fsim/tables/ps_full_ms/h3/w0/v0</property>
      <property value="7.16979">fsim/tables/ps_full_ms/h3/w0/v1</property>
      <property value="4.99786">fsim/tables/ps_full_ms/h3/w0/v10</property>
      <property value="4.47848">fsim/tables/ps_full_ms/h3/w0/v11</property>
      <property value="3.89775">fsim/tables/ps_full_ms/h3/w0/v12</property>
      <property value="3.07344">fsim/tables/ps_full_ms/h3/w0/v13</property>
      <property value="2.17801">fsim/tables/ps_full_ms/h3/w0/v14</property>
      <property value="1.23492">fsim/tables/ps_full_ms/h3/w0/v15</property>
      <property value="7.21589">fsim/tables/ps_full_ms/h3/w0/v2</property>
      <property value="7.2082">fsim/tables/ps_full_ms/h3/w0/v3</property>
      <property value="7.16508">fsim/tables/ps_full_ms/h3/w0/v4</property>
      <property value="6.93584">fsim/tables/ps_full_ms/h3/w0/v5</property>
      <property value="6.63242">fsim/tables/ps_full_ms/h3/w0/v6</property>
      <property value="6.29674">fsim/tables/ps_full_ms/h3/w0/v7</property>
      <property value="5.89914">fsim/tables/ps_full_ms/h3/w0/v8</property>
      <property value="5.45626">fsim/tables/ps_full_ms/h3/w0/v9</property>
      <property value="4.85675">fsim/tables/ps_full_ms/h3/w1/v0</property>
      <property value="4.97173">fsim/tables/ps_full_ms/h3/w1/v1</property>
      <property value="3.52257">fsim/tables/ps_full_ms/h3/w1/v10</property>
      <property value="3.17187">fsim/tables/ps_full_ms/h3/w1/v11</property>
      <property value="2.83203">fsim/tables/ps_full_ms/h3/w1/v12</property>
      <property value="2.27756">fsim/tables/ps_full_ms/h3/w1/v13</property>
      <property value="1.65328">fsim/tables/ps_full_ms/h3/w1/v14</property>
      <property value="0.996077">fsim/tables/ps_full_ms/h3/w1/v15</property>
      <property value="5.02064">fsim/tables/ps_full_ms/h3/w1/v2</property>
      <property value="5.04504">fsim/tables/ps_full_ms/h3/w1/v3</property>
      <property value="4.95543">fsim/tables/ps_full_ms/h3/w1/v4</property>
      <property value="4.78902">fsim/tables/ps_full_ms/h3/w1/v5</property>
      <property value="4.58287">fsim/tables/ps_full_ms/h3/w1/v6</property>
      <property value="4.35926">fsim/tables/ps_full_ms/h3/w1/v7</property>
      <property value="4.10225">fsim/tables/ps_full_ms/h3/w1/v8</property>
      <property value="3.82859">fsim/tables/ps_full_ms/h3/w1/v9</property>
      <property value="4.65148">fsim/tables/ps_full_ms/h3/w2/v0</property>
      <property value="4.75986">fsim/tables/ps_full_ms/h3/w2/v1</property>
      <property value="3.39016">fsim/tables/ps_full_ms/h3/w2/v10</property>
      <property value="3.05032">fsim/tables/ps_full_ms/h3/w2/v11</property>
      <property value="2.71894">fsim/tables/ps_full_ms/h3/w2/v12</property>
      <property value="2.21761">fsim/tables/ps_full_ms/h3/w2/v13</property>
      <property value="1.61355">fsim/tables/ps_full_ms/h3/w2/v14</property>
      <property value="0.9825">fsim/tables/ps_full_ms/h3/w2/v15</property>
      <property value="4.81155">fsim/tables/ps_full_ms/h3/w2/v2</property>
      <property value="4.8373">fsim/tables/ps_full_ms/h3/w2/v3</property>
      <property value="4.74502">fsim/tables/ps_full_ms/h3/w2/v4</property>
      <property value="4.58097">fsim/tables/ps_full_ms/h3/w2/v5</property>
      <property value="4.39235">fsim/tables/ps_full_ms/h3/w2/v6</property>
      <property value="4.17135">fsim/tables/ps_full_ms/h3/w2/v7</property>
      <property value="3.93506">fsim/tables/ps_full_ms/h3/w2/v8</property>
      <property value="3.67074">fsim/tables/ps_full_ms/h3/w2/v9</property>
      <property value="3.18647">fsim/tables/ps_full_ms/h3/w3/v0</property>
      <property value="3.25984">fsim/tables/ps_full_ms/h3/w3/v1</property>
      <property value="2.33699">fsim/tables/ps_full_ms/h3/w3/v10</property>
      <property value="2.13437">fsim/tables/ps_full_ms/h3/w3/v11</property>
      <property value="1.90174">fsim/tables/ps_full_ms/h3/w3/v12</property>
      <property value="1.6508">fsim/tables/ps_full_ms/h3/w3/v13</property>
      <property value="1.22709">fsim/tables/ps_full_ms/h3/w3/v14</property>
      <property value="0.805997">fsim/tables/ps_full_ms/h3/w3/v15</property>
      <property value="3.33441">fsim/tables/ps_full_ms/h3/w3/v2</property>
      <property value="3.29441">fsim/tables/ps_full_ms/h3/w3/v3</property>
      <property value="3.22076">fsim/tables/ps_full_ms/h3/w3/v4</property>
      <property value="3.11186">fsim/tables/ps_full_ms/h3/w3/v5</property>
      <property value="2.98679">fsim/tables/ps_full_ms/h3/w3/v6</property>
      <property value="2.84961">fsim/tables/ps_full_ms/h3/w3/v7</property>
      <property value="2.68632">fsim/tables/ps_full_ms/h3/w3/v8</property>
      <property value="2.51379">fsim/tables/ps_full_ms/h3/w3/v9</property>
      <property value="5.18507">fsim/tables/ps_full_ms/h4/w0/v0</property>
      <property value="5.29378">fsim/tables/ps_full_ms/h4/w0/v1</property>
      <property value="3.73456">fsim/tables/ps_full_ms/h4/w0/v10</property>
      <property value="3.36374">fsim/tables/ps_full_ms/h4/w0/v11</property>
      <property value="2.98663">fsim/tables/ps_full_ms/h4/w0/v12</property>
      <property value="2.46102">fsim/tables/ps_full_ms/h4/w0/v13</property>
      <property value="1.76182">fsim/tables/ps_full_ms/h4/w0/v14</property>
      <property value="1.05559">fsim/tables/ps_full_ms/h4/w0/v15</property>
      <property value="5.34007">fsim/tables/ps_full_ms/h4/w0/v2</property>
      <property value="5.37217">fsim/tables/ps_full_ms/h4/w0/v3</property>
      <property value="5.344">fsim/tables/ps_full_ms/h4/w0/v4</property>
      <property value="5.17517">fsim/tables/ps_full_ms/h4/w0/v5</property>
      <property value="4.92805">fsim/tables/ps_full_ms/h4/w0/v6</property>
      <property value="4.68493">fsim/tables/ps_full_ms/h4/w0/v7</property>
      <property value="4.37769">fsim/tables/ps_full_ms/h4/w0/v8</property>
      <property value="4.09191">fsim/tables/ps_full_ms/h4/w0/v9</property>
      <property value="3.20596">fsim/tables/ps_full_ms/h4/w1/v0</property>
      <property value="3.27449">fsim/tables/ps_full_ms/h4/w1/v1</property>
      <property value="2.3355">fsim/tables/ps_full_ms/h4/w1/v10</property>
      <property value="2.13012">fsim/tables/ps_full_ms/h4/w1/v11</property>
      <property value="1.90897">fsim/tables/ps_full_ms/h4/w1/v12</property>
      <property value="1.65863">fsim/tables/ps_full_ms/h4/w1/v13</property>
      <property value="1.28234">fsim/tables/ps_full_ms/h4/w1/v14</property>
      <property value="0.823716">fsim/tables/ps_full_ms/h4/w1/v15</property>
      <property value="3.34253">fsim/tables/ps_full_ms/h4/w1/v2</property>
      <property value="3.38765">fsim/tables/ps_full_ms/h4/w1/v3</property>
      <property value="3.30798">fsim/tables/ps_full_ms/h4/w1/v4</property>
      <property value="3.19252">fsim/tables/ps_full_ms/h4/w1/v5</property>
      <property value="3.04963">fsim/tables/ps_full_ms/h4/w1/v6</property>
      <property value="2.90484">fsim/tables/ps_full_ms/h4/w1/v7</property>
      <property value="2.71873">fsim/tables/ps_full_ms/h4/w1/v8</property>
      <property value="2.53779">fsim/tables/ps_full_ms/h4/w1/v9</property>
      <property value="3.01666">fsim/tables/ps_full_ms/h4/w2/v0</property>
      <property value="3.08337">fsim/tables/ps_full_ms/h4/w2/v1</property>
      <property value="2.20661">fsim/tables/ps_full_ms/h4/w2/v10</property>
      <property value="2.00724">fsim/tables/ps_full_ms/h4/w2/v11</property>
      <property value="1.79983">fsim/tables/ps_full_ms/h4/w2/v12</property>
      <property value="1.57861">fsim/tables/ps_full_ms/h4/w2/v13</property>
      <property value="1.24548">fsim/tables/ps_full_ms/h4/w2/v14</property>
      <property value="0.801043">fsim/tables/ps_full_ms/h4/w2/v15</property>
      <property value="3.14929">fsim/tables/ps_full_ms/h4/w2/v2</property>
      <property value="3.19033">fsim/tables/ps_full_ms/h4/w2/v3</property>
      <property value="3.11433">fsim/tables/ps_full_ms/h4/w2/v4</property>
      <property value="2.999">fsim/tables/ps_full_ms/h4/w2/v5</property>
      <property value="2.8717">fsim/tables/ps_full_ms/h4/w2/v6</property>
      <property value="2.72806">fsim/tables/ps_full_ms/h4/w2/v7</property>
      <property value="2.56383">fsim/tables/ps_full_ms/h4/w2/v8</property>
      <property value="2.38629">fsim/tables/ps_full_ms/h4/w2/v9</property>
      <property value="1.67059">fsim/tables/ps_full_ms/h4/w3/v0</property>
      <property value="1.7096">fsim/tables/ps_full_ms/h4/w3/v1</property>
      <property value="1.20681">fsim/tables/ps_full_ms/h4/w3/v10</property>
      <property value="1.09279">fsim/tables/ps_full_ms/h4/w3/v11</property>
      <property value="0.975719">fsim/tables/ps_full_ms/h4/w3/v12</property>
      <property value="0.8586">fsim/tables/ps_full_ms/h4/w3/v13</property>
      <property value="0.739868">fsim/tables/ps_full_ms/h4/w3/v14</property>
      <property value="0.603676">fsim/tables/ps_full_ms/h4/w3/v15</property>
      <property value="1.75626">fsim/tables/ps_full_ms/h4/w3/v2</property>
      <property value="1.75118">fsim/tables/ps_full_ms/h4/w3/v3</property>
      <property value="1.69756">fsim/tables/ps_full_ms/h4/w3/v4</property>
      <property value="1.64084">fsim/tables/ps_full_ms/h4/w3/v5</property>
      <property value="1.57306">fsim/tables/ps_full_ms/h4/w3/v6</property>
      <property value="1.49044">fsim/tables/ps_full_ms/h4/w3/v7</property>
      <property value="1.40411">fsim/tables/ps_full_ms/h4/w3/v8</property>
      <property value="1.30427">fsim/tables/ps_full_ms/h4/w3/v9</property>
      <property value="4.01088">fsim/tables/ps_full_ms/h5/w0/v0</property>
      <property value="4.09874">fsim/tables/ps_full_ms/h5/w0/v1</property>
      <property value="2.9124">fsim/tables/ps_full_ms/h5/w0/v10</property>
      <property value="2.67416">fsim/tables/ps_full_ms/h5/w0/v11</property>
      <property value="2.33274">fsim/tables/ps_full_ms/h5/w0/v12</property>
      <property value="1.99252">fsim/tables/ps_full_ms/h5/w0/v13</property>
      <property value="1.55044">fsim/tables/ps_full_ms/h5/w0/v14</property>
      <property value="0.964357">fsim/tables/ps_full_ms/h5/w0/v15</property>
      <property value="4.14159">fsim/tables/ps_full_ms/h5/w0/v2</property>
      <property value="4.20058">fsim/tables/ps_full_ms/h5/w0/v3</property>
      <property value="4.18908">fsim/tables/ps_full_ms/h5/w0/v4</property>
      <property value="4.04841">fsim/tables/ps_full_ms/h5/w0/v5</property>
      <property value="3.86449">fsim/tables/ps_full_ms/h5/w0/v6</property>
      <property value="3.65724">fsim/tables/ps_full_ms/h5/w0/v7</property>
      <property value="3.42438">fsim/tables/ps_full_ms/h5/w0/v8</property>
      <property value="3.18388">fsim/tables/ps_full_ms/h5/w0/v9</property>
      <property value="2.14574">fsim/tables/ps_full_ms/h5/w1/v0</property>
      <property value="2.19421">fsim/tables/ps_full_ms/h5/w1/v1</property>
      <property value="1.56862">fsim/tables/ps_full_ms/h5/w1/v10</property>
      <property value="1.41208">fsim/tables/ps_full_ms/h5/w1/v11</property>
      <property value="1.28167">fsim/tables/ps_full_ms/h5/w1/v12</property>
      <property value="1.0963">fsim/tables/ps_full_ms/h5/w1/v13</property>
      <property value="0.912823">fsim/tables/ps_full_ms/h5/w1/v14</property>
      <property value="0.728811">fsim/tables/ps_full_ms/h5/w1/v15</property>
      <property value="2.25679">fsim/tables/ps_full_ms/h5/w1/v2</property>
      <property value="2.31145">fsim/tables/ps_full_ms/h5/w1/v3</property>
      <property value="2.25624">fsim/tables/ps_full_ms/h5/w1/v4</property>
      <property value="2.17389">fsim/tables/ps_full_ms/h5/w1/v5</property>
      <property value="2.0741">fsim/tables/ps_full_ms/h5/w1/v6</property>
      <property value="1.97212">fsim/tables/ps_full_ms/h5/w1/v7</property>
      <property value="1.83471">fsim/tables/ps_full_ms/h5/w1/v8</property>
      <property value="1.7243">fsim/tables/ps_full_ms/h5/w1/v9</property>
      <property value="1.96779">fsim/tables/ps_full_ms/h5/w2/v0</property>
      <property value="2.01134">fsim/tables/ps_full_ms/h5/w2/v1</property>
      <property value="1.44187">fsim/tables/ps_full_ms/h5/w2/v10</property>
      <property value="1.28545">fsim/tables/ps_full_ms/h5/w2/v11</property>
      <property value="1.15806">fsim/tables/ps_full_ms/h5/w2/v12</property>
      <property value="1.00792">fsim/tables/ps_full_ms/h5/w2/v13</property>
      <property value="0.82487">fsim/tables/ps_full_ms/h5/w2/v14</property>
      <property value="0.660587">fsim/tables/ps_full_ms/h5/w2/v15</property>
      <property value="2.07523">fsim/tables/ps_full_ms/h5/w2/v2</property>
      <property value="2.12068">fsim/tables/ps_full_ms/h5/w2/v3</property>
      <property value="2.06701">fsim/tables/ps_full_ms/h5/w2/v4</property>
      <property value="1.99671">fsim/tables/ps_full_ms/h5/w2/v5</property>
      <property value="1.89959">fsim/tables/ps_full_ms/h5/w2/v6</property>
      <property value="1.81091">fsim/tables/ps_full_ms/h5/w2/v7</property>
      <property value="1.67933">fsim/tables/ps_full_ms/h5/w2/v8</property>
      <property value="1.56999">fsim/tables/ps_full_ms/h5/w2/v9</property>
      <property value="0.692853">fsim/tables/ps_full_ms/h5/w3/v0</property>
      <property value="0.69726">fsim/tables/ps_full_ms/h5/w3/v1</property>
      <property value="0.5532">fsim/tables/ps_full_ms/h5/w3/v10</property>
      <property value="0.497967">fsim/tables/ps_full_ms/h5/w3/v11</property>
      <property value="0.453602">fsim/tables/ps_full_ms/h5/w3/v12</property>
      <property value="0.411322">fsim/tables/ps_full_ms/h5/w3/v13</property>
      <property value="0.358834">fsim/tables/ps_full_ms/h5/w3/v14</property>
      <property value="0.290741">fsim/tables/ps_full_ms/h5/w3/v15</property>
      <property value="0.722455">fsim/tables/ps_full_ms/h5/w3/v2</property>
      <property value="0.735313">fsim/tables/ps_full_ms/h5/w3/v3</property>
      <property value="0.723189">fsim/tables/ps_full_ms/h5/w3/v4</property>
      <property value="0.713721">fsim/tables/ps_full_ms/h5/w3/v5</property>
      <property value="0.697262">fsim/tables/ps_full_ms/h5/w3/v6</property>
      <property value="0.662581">fsim/tables/ps_full_ms/h5/w3/v7</property>
      <property value="0.628433">fsim/tables/ps_full_ms/h5/w3/v8</property>
      <property value="0.59679">fsim/tables/ps_full_ms/h5/w3/v9</property>
      <property value="2.90683">fsim/tables/ps_full_ms/h6/w0/v0</property>
      <property value="2.96336">fsim/tables/ps_full_ms/h6/w0/v1</property>
      <property value="2.12908">fsim/tables/ps_full_ms/h6/w0/v10</property>
      <property value="1.89743">fsim/tables/ps_full_ms/h6/w0/v11</property>
      <property value="1.67189">fsim/tables/ps_full_ms/h6/w0/v12</property>
      <property value="1.44049">fsim/tables/ps_full_ms/h6/w0/v13</property>
      <property value="1.17184">fsim/tables/ps_full_ms/h6/w0/v14</property>
      <property value="0.814996">fsim/tables/ps_full_ms/h6/w0/v15</property>
      <property value="3.01007">fsim/tables/ps_full_ms/h6/w0/v2</property>
      <property value="3.06531">fsim/tables/ps_full_ms/h6/w0/v3</property>
      <property value="3.1045">fsim/tables/ps_full_ms/h6/w0/v4</property>
      <property value="2.98038">fsim/tables/ps_full_ms/h6/w0/v5</property>
      <property value="2.84014">fsim/tables/ps_full_ms/h6/w0/v6</property>
      <property value="2.68559">fsim/tables/ps_full_ms/h6/w0/v7</property>
      <property value="2.51156">fsim/tables/ps_full_ms/h6/w0/v8</property>
      <property value="2.31724">fsim/tables/ps_full_ms/h6/w0/v9</property>
      <property value="1.14852">fsim/tables/ps_full_ms/h6/w1/v0</property>
      <property value="1.16652">fsim/tables/ps_full_ms/h6/w1/v1</property>
      <property value="0.882131">fsim/tables/ps_full_ms/h6/w1/v10</property>
      <property value="0.789712">fsim/tables/ps_full_ms/h6/w1/v11</property>
      <property value="0.699177">fsim/tables/ps_full_ms/h6/w1/v12</property>
      <property value="0.610399">fsim/tables/ps_full_ms/h6/w1/v13</property>
      <property value="0.499404">fsim/tables/ps_full_ms/h6/w1/v14</property>
      <property value="0.384769">fsim/tables/ps_full_ms/h6/w1/v15</property>
      <property value="1.22757">fsim/tables/ps_full_ms/h6/w1/v2</property>
      <property value="1.25663">fsim/tables/ps_full_ms/h6/w1/v3</property>
      <property value="1.24712">fsim/tables/ps_full_ms/h6/w1/v4</property>
      <property value="1.21436">fsim/tables/ps_full_ms/h6/w1/v5</property>
      <property value="1.16092">fsim/tables/ps_full_ms/h6/w1/v6</property>
      <property value="1.11096">fsim/tables/ps_full_ms/h6/w1/v7</property>
      <property value="1.03078">fsim/tables/ps_full_ms/h6/w1/v8</property>
      <property value="0.953815">fsim/tables/ps_full_ms/h6/w1/v9</property>
      <property value="0.983097">fsim/tables/ps_full_ms/h6/w2/v0</property>
      <property value="0.993702">fsim/tables/ps_full_ms/h6/w2/v1</property>
      <property value="0.770097">fsim/tables/ps_full_ms/h6/w2/v10</property>
      <property value="0.713782">fsim/tables/ps_full_ms/h6/w2/v11</property>
      <property value="0.629545">fsim/tables/ps_full_ms/h6/w2/v12</property>
      <property value="0.546862">fsim/tables/ps_full_ms/h6/w2/v13</property>
      <property value="0.465248">fsim/tables/ps_full_ms/h6/w2/v14</property>
      <property value="0.386871">fsim/tables/ps_full_ms/h6/w2/v15</property>
      <property value="1.0497">fsim/tables/ps_full_ms/h6/w2/v2</property>
      <property value="1.07483">fsim/tables/ps_full_ms/h6/w2/v3</property>
      <property value="1.0626">fsim/tables/ps_full_ms/h6/w2/v4</property>
      <property value="1.04845">fsim/tables/ps_full_ms/h6/w2/v5</property>
      <property value="1.00142">fsim/tables/ps_full_ms/h6/w2/v6</property>
      <property value="0.962067">fsim/tables/ps_full_ms/h6/w2/v7</property>
      <property value="0.909848">fsim/tables/ps_full_ms/h6/w2/v8</property>
      <property value="0.836888">fsim/tables/ps_full_ms/h6/w2/v9</property>
      <property value="-5.04027">fsim/tables/ps_idle_ms/h0/w0/v0</property>
      <property value="-5.542">fsim/tables/ps_idle_ms/h0/w0/v1</property>
      <property value="-13.6258">fsim/tables/ps_idle_ms/h0/w0/v10</property>
      <property value="-15.0499">fsim/tables/ps_idle_ms/h0/w0/v11</property>
      <property value="-16.446">fsim/tables/ps_idle_ms/h0/w0/v12</property>
      <property value="-17.7696">fsim/tables/ps_idle_ms/h0/w0/v13</property>
      <property value="-19.2068">fsim/tables/ps_idle_ms/h0/w0/v14</property>
      <property value="-18.9063">fsim/tables/ps_idle_ms/h0/w0/v15</property>
      <property value="-6.12391">fsim/tables/ps_idle_ms/h0/w0/v2</property>
      <property value="-6.60346">fsim/tables/ps_idle_ms/h0/w0/v3</property>
      <property value="-7.07619">fsim/tables/ps_idle_ms/h0/w0/v4</property>
      <property value="-8.051">fsim/tables/ps_idle_ms/h0/w0/v5</property>
      <property value="-9.05798">fsim/tables/ps_idle_ms/h0/w0/v6</property>
      <property value="-9.99626">fsim/tables/ps_idle_ms/h0/w0/v7</property>
      <property value="-10.8403">fsim/tables/ps_idle_ms/h0/w0/v8</property>
      <property value="-12.1513">fsim/tables/ps_idle_ms/h0/w0/v9</property>
      <property value="-5.22076">fsim/tables/ps_idle_ms/h0/w1/v0</property>
      <property value="-5.6589">fsim/tables/ps_idle_ms/h0/w1/v1</property>
      <property value="-11.9667">fsim/tables/ps_idle_ms/h0/w1/v10</property>
      <property value="-13.1052">fsim/tables/ps_idle_ms/h0/w1/v11</property>
      <property value="-14.1691">fsim/tables/ps_idle_ms/h0/w1/v12</property>
      <property value="-15.1603">fsim/tables/ps_idle_ms/h0/w1/v13</property>
      <property value="-16.3564">fsim/tables/ps_idle_ms/h0/w1/v14</property>
      <property value="-16.4129">fsim/tables/ps_idle_ms/h0/w1/v15</property>
      <property value="-6.05977">fsim/tables/ps_idle_ms/h0/w1/v2</property>
      <property value="-6.35343">fsim/tables/ps_idle_ms/h0/w1/v3</property>
      <property value="-6.78174">fsim/tables/ps_idle_ms/h0/w1/v4</property>
      <property value="-7.56469">fsim/tables/ps_idle_ms/h0/w1/v5</property>
      <property value="-8.33027">fsim/tables/ps_idle_ms/h0/w1/v6</property>
      <property value="-9.03246">fsim/tables/ps_idle_ms/h0/w1/v7</property>
      <property value="-9.71658">fsim/tables/ps_idle_ms/h0/w1/v8</property>
      <property value="-10.7833">fsim/tables/ps_idle_ms/h0/w1/v9</property>
      <property value="-5.25757">fsim/tables/ps_idle_ms/h0/w2/v0</property>
      <property value="-5.67818">fsim/tables/ps_idle_ms/h0/w2/v1</property>
      <property value="-11.8174">fsim/tables/ps_idle_ms/h0/w2/v10</property>
      <property value="-12.9313">fsim/tables/ps_idle_ms/h0/w2/v11</property>
      <property value="-13.9741">fsim/tables/ps_idle_ms/h0/w2/v12</property>
      <property value="-14.9369">fsim/tables/ps_idle_ms/h0/w2/v13</property>
      <property value="-16.0899">fsim/tables/ps_idle_ms/h0/w2/v14</property>
      <property value="-16.1743">fsim/tables/ps_idle_ms/h0/w2/v15</property>
      <property value="-6.06154">fsim/tables/ps_idle_ms/h0/w2/v2</property>
      <property value="-6.33988">fsim/tables/ps_idle_ms/h0/w2/v3</property>
      <property value="-6.76952">fsim/tables/ps_idle_ms/h0/w2/v4</property>
      <property value="-7.52843">fsim/tables/ps_idle_ms/h0/w2/v5</property>
      <property value="-8.27262">fsim/tables/ps_idle_ms/h0/w2/v6</property>
      <property value="-8.9515">fsim/tables/ps_idle_ms/h0/w2/v7</property>
      <property value="-9.6195">fsim/tables/ps_idle_ms/h0/w2/v8</property>
      <property value="-10.6699">fsim/tables/ps_idle_ms/h0/w2/v9</property>
      <property value="-5.56585">fsim/tables/ps_idle_ms/h0/w3/v0</property>
      <property value="-5.85535">fsim/tables/ps_idle_ms/h0/w3/v1</property>
      <property value="-10.7772">fsim/tables/ps_idle_ms/h0/w3/v10</property>
      <property value="-11.6663">fsim/tables/ps_idle_ms/h0/w3/v11</property>
      <property value="-12.5363">fsim/tables/ps_idle_ms/h0/w3/v12</property>
      <property value="-13.3486">fsim/tables/ps_idle_ms/h0/w3/v13</property>
      <property value="-14.2156">fsim/tables/ps_idle_ms/h0/w3/v14</property>
      <property value="-14.4275">fsim/tables/ps_idle_ms/h0/w3/v15</property>
      <property value="-6.09317">fsim/tables/ps_idle_ms/h0/w3/v2</property>
      <property value="-6.27183">fsim/tables/ps_idle_ms/h0/w3/v3</property>
      <property value="-6.72077">fsim/tables/ps_idle_ms/h0/w3/v4</property>
      <property value="-7.31682">fsim/tables/ps_idle_ms/h0/w3/v5</property>
      <property value="-7.87859">fsim/tables/ps_idle_ms/h0/w3/v6</property>
      <property value="-8.41819">fsim/tables/ps_idle_ms/h0/w3/v7</property>
      <property value="-8.94678">fsim/tables/ps_idle_ms/h0/w3/v8</property>
      <property value="-9.82336">fsim/tables/ps_idle_ms/h0/w3/v9</property>
      <property value="-5.14781">fsim/tables/ps_idle_ms/h1/w0/v0</property>
      <property value="-5.65776">fsim/tables/ps_idle_ms/h1/w0/v1</property>
      <property value="-13.2993">fsim/tables/ps_idle_ms/h1/w0/v10</property>
      <property value="-14.5152">fsim/tables/ps_idle_ms/h1/w0/v11</property>
      <property value="-15.7492">fsim/tables/ps_idle_ms/h1/w0/v12</property>
      <property value="-17.4617">fsim/tables/ps_idle_ms/h1/w0/v13</property>
      <property value="-19.0389">fsim/tables/ps_idle_ms/h1/w0/v14</property>
      <property value="-18.8033">fsim/tables/ps_idle_ms/h1/w0/v15</property>
      <property value="-6.11745">fsim/tables/ps_idle_ms/h1/w0/v2</property>
      <property value="-6.44816">fsim/tables/ps_idle_ms/h1/w0/v3</property>
      <property value="-7.07653">fsim/tables/ps_idle_ms/h1/w0/v4</property>
      <property value="-7.99387">fsim/tables/ps_idle_ms/h1/w0/v5</property>
      <property value="-8.83543">fsim/tables/ps_idle_ms/h1/w0/v6</property>
      <property value="-9.59637">fsim/tables/ps_idle_ms/h1/w0/v7</property>
      <property value="-10.6471">fsim/tables/ps_idle_ms/h1/w0/v8</property>
      <property value="-12.0047">fsim/tables/ps_idle_ms/h1/w0/v9</property>
      <property value="-5.53811">fsim/tables/ps_idle_ms/h1/w1/v0</property>
      <property value="-5.85779">fsim/tables/ps_idle_ms/h1/w1/v1</property>
      <property value="-11.6542">fsim/tables/ps_idle_ms/h1/w1/v10</property>
      <property value="-12.6225">fsim/tables/ps_idle_ms/h1/w1/v11</property>
      <property value="-13.5525">fsim/tables/ps_idle_ms/h1/w1/v12</property>
      <property value="-14.7644">fsim/tables/ps_idle_ms/h1/w1/v13</property>
      <property value="-16.0253">fsim/tables/ps_idle_ms/h1/w1/v14</property>
      <property value="-16.1876">fsim/tables/ps_idle_ms/h1/w1/v15</property>
      <property value="-6.1097">fsim/tables/ps_idle_ms/h1/w1/v2</property>
      <property value="-6.33644">fsim/tables/ps_idle_ms/h1/w1/v3</property>
      <property value="-6.94049">fsim/tables/ps_idle_ms/h1/w1/v4</property>
      <property value="-7.57581">fsim/tables/ps_idle_ms/h1/w1/v5</property>
      <property value="-8.19473">fsim/tables/ps_idle_ms/h1/w1/v6</property>
      <property value="-8.74401">fsim/tables/ps_idle_ms/h1/w1/v7</property>
      <property value="-9.61315">fsim/tables/ps_idle_ms/h1/w1/v8</property>
      <property value="-10.6706">fsim/tables/ps_idle_ms/h1/w1/v9</property>
      <property value="-5.57952">fsim/tables/ps_idle_ms/h1/w2/v0</property>
      <property value="-5.88292">fsim/tables/ps_idle_ms/h1/w2/v1</property>
      <property value="-11.5226">fsim/tables/ps_idle_ms/h1/w2/v10</property>
      <property value="-12.458">fsim/tables/ps_idle_ms/h1/w2/v11</property>
      <property value="-13.3672">fsim/tables/ps_idle_ms/h1/w2/v12</property>
      <property value="-14.5482">fsim/tables/ps_idle_ms/h1/w2/v13</property>
      <property value="-15.7788">fsim/tables/ps_idle_ms/h1/w2/v14</property>
      <property value="-15.942">fsim/tables/ps_idle_ms/h1/w2/v15</property>
      <property value="-6.11444">fsim/tables/ps_idle_ms/h1/w2/v2</property>
      <property value="-6.34099">fsim/tables/ps_idle_ms/h1/w2/v3</property>
      <property value="-6.93857">fsim/tables/ps_idle_ms/h1/w2/v4</property>
      <property value="-7.55233">fsim/tables/ps_idle_ms/h1/w2/v5</property>
      <property value="-8.14274">fsim/tables/ps_idle_ms/h1/w2/v6</property>
      <property value="-8.68013">fsim/tables/ps_idle_ms/h1/w2/v7</property>
      <property value="-9.52966">fsim/tables/ps_idle_ms/h1/w2/v8</property>
      <property value="-10.5621">fsim/tables/ps_idle_ms/h1/w2/v9</property>
      <property value="-5.89889">fsim/tables/ps_idle_ms/h1/w3/v0</property>
      <property value="-6.07594">fsim/tables/ps_idle_ms/h1/w3/v1</property>
      <property value="-10.5999">fsim/tables/ps_idle_ms/h1/w3/v10</property>
      <property value="-11.3649">fsim/tables/ps_idle_ms/h1/w3/v11</property>
      <property value="-12.0738">fsim/tables/ps_idle_ms/h1/w3/v12</property>
      <property value="-12.9895">fsim/tables/ps_idle_ms/h1/w3/v13</property>
      <property value="-14.046">fsim/tables/ps_idle_ms/h1/w3/v14</property>
      <property value="-14.2508">fsim/tables/ps_idle_ms/h1/w3/v15</property>
      <property value="-6.19283">fsim/tables/ps_idle_ms/h1/w3/v2</property>
      <property value="-6.48726">fsim/tables/ps_idle_ms/h1/w3/v3</property>
      <property value="-6.96307">fsim/tables/ps_idle_ms/h1/w3/v4</property>
      <property value="-7.41537">fsim/tables/ps_idle_ms/h1/w3/v5</property>
      <property value="-7.84183">fsim/tables/ps_idle_ms/h1/w3/v6</property>
      <property value="-8.25734">fsim/tables/ps_idle_ms/h1/w3/v7</property>
      <property value="-9.01264">fsim/tables/ps_idle_ms/h1/w3/v8</property>
      <property value="-9.8145">fsim/tables/ps_idle_ms/h1/w3/v9</property>
      <property value="-5.502">fsim/tables/ps_idle_ms/h2/w0/v0</property>
      <property value="-5.82549">fsim/tables/ps_idle_ms/h2/w0/v1</property>
      <property value="-11.7242">fsim/tables/ps_idle_ms/h2/w0/v10</property>
      <property value="-12.7386">fsim/tables/ps_idle_ms/h2/w0/v11</property>
      <property value="-13.6913">fsim/tables/ps_idle_ms/h2/w0/v12</property>
      <property value="-14.8665">fsim/tables/ps_idle_ms/h2/w0/v13</property>
      <property value="-16.1713">fsim/tables/ps_idle_ms/h2/w0/v14</property>
      <property value="-16.3527">fsim/tables/ps_idle_ms/h2/w0/v15</property>
      <property value="-6.12032">fsim/tables/ps_idle_ms/h2/w0/v2</property>
      <property value="-6.34403">fsim/tables/ps_idle_ms/h2/w0/v3</property>
      <property value="-6.90704">fsim/tables/ps_idle_ms/h2/w0/v4</property>
      <property value="-7.5794">fsim/tables/ps_idle_ms/h2/w0/v5</property>
      <property value="-8.21407">fsim/tables/ps_idle_ms/h2/w0/v6</property>
      <property value="-8.78691">fsim/tables/ps_idle_ms/h2/w0/v7</property>
      <property value="-9.61402">fsim/tables/ps_idle_ms/h2/w0/v8</property>
      <property value="-10.7043">fsim/tables/ps_idle_ms/h2/w0/v9</property>
      <property value="-5.93706">fsim/tables/ps_idle_ms/h2/w1/v0</property>
      <property value="-6.0958">fsim/tables/ps_idle_ms/h2/w1/v1</property>
      <property value="-10.4515">fsim/tables/ps_idle_ms/h2/w1/v10</property>
      <property value="-11.2243">fsim/tables/ps_idle_ms/h2/w1/v11</property>
      <property value="-11.9306">fsim/tables/ps_idle_ms/h2/w1/v12</property>
      <property value="-12.7431">fsim/tables/ps_idle_ms/h2/w1/v13</property>
      <property value="-13.7802">fsim/tables/ps_idle_ms/h2/w1/v14</property>
      <property value="-14.019">fsim/tables/ps_idle_ms/h2/w1/v15</property>
      <property value="-6.2138">fsim/tables/ps_idle_ms/h2/w1/v2</property>
      <property value="-6.46666">fsim/tables/ps_idle_ms/h2/w1/v3</property>
      <property value="-6.93949">fsim/tables/ps_idle_ms/h2/w1/v4</property>
      <property value="-7.37933">fsim/tables/ps_idle_ms/h2/w1/v5</property>
      <property value="-7.81379">fsim/tables/ps_idle_ms/h2/w1/v6</property>
      <property value="-8.18607">fsim/tables/ps_idle_ms/h2/w1/v7</property>
      <property value="-8.88414">fsim/tables/ps_idle_ms/h2/w1/v8</property>
      <property value="-9.68437">fsim/tables/ps_idle_ms/h2/w1/v9</property>
      <property value="-5.98234">fsim/tables/ps_idle_ms/h2/w2/v0</property>
      <property value="-6.1217">fsim/tables/ps_idle_ms/h2/w2/v1</property>
      <property value="-10.3268">fsim/tables/ps_idle_ms/h2/w2/v10</property>
      <property value="-11.0791">fsim/tables/ps_idle_ms/h2/w2/v11</property>
      <property value="-11.7691">fsim/tables/ps_idle_ms/h2/w2/v12</property>
      <property value="-12.5344">fsim/tables/ps_idle_ms/h2/w2/v13</property>
      <property value="-13.5357">fsim/tables/ps_idle_ms/h2/w2/v14</property>
      <property value="-13.7837">fsim/tables/ps_idle_ms/h2/w2/v15</property>
      <property value="-6.22753">fsim/tables/ps_idle_ms/h2/w2/v2</property>
      <property value="-6.49133">fsim/tables/ps_idle_ms/h2/w2/v3</property>
      <property value="-6.94691">fsim/tables/ps_idle_ms/h2/w2/v4</property>
      <property value="-7.36861">fsim/tables/ps_idle_ms/h2/w2/v5</property>
      <property value="-7.77973">fsim/tables/ps_idle_ms/h2/w2/v6</property>
      <property value="-8.139">fsim/tables/ps_idle_ms/h2/w2/v7</property>
      <property value="-8.81297">fsim/tables/ps_idle_ms/h2/w2/v8</property>
      <property value="-9.59387">fsim/tables/ps_idle_ms/h2/w2/v9</property>
      <property value="-6.3094">fsim/tables/ps_idle_ms/h2/w3/v0</property>
      <property value="-6.32236">fsim/tables/ps_idle_ms/h2/w3/v1</property>
      <property value="-9.57276">fsim/tables/ps_idle_ms/h2/w3/v10</property>
      <property value="-10.1406">fsim/tables/ps_idle_ms/h2/w3/v11</property>
      <property value="-10.6612">fsim/tables/ps_idle_ms/h2/w3/v12</property>
      <property value="-11.2194">fsim/tables/ps_idle_ms/h2/w3/v13</property>
      <property value="-11.9323">fsim/tables/ps_idle_ms/h2/w3/v14</property>
      <property value="-12.1726">fsim/tables/ps_idle_ms/h2/w3/v15</property>
      <property value="-6.41366">fsim/tables/ps_idle_ms/h2/w3/v2</property>
      <property value="-6.7291">fsim/tables/ps_idle_ms/h2/w3/v3</property>
      <property value="-7.04173">fsim/tables/ps_idle_ms/h2/w3/v4</property>
      <property value="-7.33301">fsim/tables/ps_idle_ms/h2/w3/v5</property>
      <property value="-7.59902">fsim/tables/ps_idle_ms/h2/w3/v6</property>
      <property value="-7.88125">fsim/tables/ps_idle_ms/h2/w3/v7</property>
      <property value="-8.40783">fsim/tables/ps_idle_ms/h2/w3/v8</property>
      <property value="-8.99246">fsim/tables/ps_idle_ms/h2/w3/v9</property>
      <property value="-5.93351">fsim/tables/ps_idle_ms/h3/w0/v0</property>
      <property value="-6.09236">fsim/tables/ps_idle_ms/h3/w0/v1</property>
      <property value="-10.2712">fsim/tables/ps_idle_ms/h3/w0/v10</property>
      <property value="-11.0603">fsim/tables/ps_idle_ms/h3/w0/v11</property>
      <property value="-11.7834">fsim/tables/ps_idle_ms/h3/w0/v12</property>
      <property value="-12.4938">fsim/tables/ps_idle_ms/h3/w0/v13</property>
      <property value="-13.4247">fsim/tables/ps_idle_ms/h3/w0/v14</property>
      <property value="-13.7209">fsim/tables/ps_idle_ms/h3/w0/v15</property>
      <property value="-6.21121">fsim/tables/ps_idle_ms/h3/w0/v2</property>
      <property value="-6.39699">fsim/tables/ps_idle_ms/h3/w0/v3</property>
      <property value="-6.86276">fsim/tables/ps_idle_ms/h3/w0/v4</property>
      <property value="-7.32016">fsim/tables/ps_idle_ms/h3/w0/v5</property>
      <property value="-7.76235">fsim/tables/ps_idle_ms/h3/w0/v6</property>
      <property value="-8.13392">fsim/tables/ps_idle_ms/h3/w0/v7</property>
      <property value="-8.69107">fsim/tables/ps_idle_ms/h3/w0/v8</property>
      <property value="-9.49278">fsim/tables/ps_idle_ms/h3/w0/v9</property>
      <property value="-6.37653">fsim/tables/ps_idle_ms/h3/w1/v0</property>
      <property value="-6.37364">fsim/tables/ps_idle_ms/h3/w1/v1</property>
      <property value="-9.28582">fsim/tables/ps_idle_ms/h3/w1/v10</property>
      <property value="-9.83926">fsim/tables/ps_idle_ms/h3/w1/v11</property>
      <property value="-10.3541">fsim/tables/ps_idle_ms/h3/w1/v12</property>
      <property value="-10.8494">fsim/tables/ps_idle_ms/h3/w1/v13</property>
      <property value="-11.3721">fsim/tables/ps_idle_ms/h3/w1/v14</property>
      <property value="-11.63">fsim/tables/ps_idle_ms/h3/w1/v15</property>
      <property value="-6.42631">fsim/tables/ps_idle_ms/h3/w1/v2</property>
      <property value="-6.70308">fsim/tables/ps_idle_ms/h3/w1/v3</property>
      <property value="-7.00522">fsim/tables/ps_idle_ms/h3/w1/v4</property>
      <property value="-7.29089">fsim/tables/ps_idle_ms/h3/w1/v5</property>
      <property value="-7.55047">fsim/tables/ps_idle_ms/h3/w1/v6</property>
      <property value="-7.77938">fsim/tables/ps_idle_ms/h3/w1/v7</property>
      <property value="-8.20674">fsim/tables/ps_idle_ms/h3/w1/v8</property>
      <property value="-8.73813">fsim/tables/ps_idle_ms/h3/w1/v9</property>
      <property value="-6.41606">fsim/tables/ps_idle_ms/h3/w2/v0</property>
      <property value="-6.40456">fsim/tables/ps_idle_ms/h3/w2/v1</property>
      <property value="-9.19285">fsim/tables/ps_idle_ms/h3/w2/v10</property>
      <property value="-9.72509">fsim/tables/ps_idle_ms/h3/w2/v11</property>
      <property value="-10.229">fsim/tables/ps_idle_ms/h3/w2/v12</property>
      <property value="-10.6948">fsim/tables/ps_idle_ms/h3/w2/v13</property>
      <property value="-11.1756">fsim/tables/ps_idle_ms/h3/w2/v14</property>
      <property value="-11.4197">fsim/tables/ps_idle_ms/h3/w2/v15</property>
      <property value="-6.465">fsim/tables/ps_idle_ms/h3/w2/v2</property>
      <property value="-6.73815">fsim/tables/ps_idle_ms/h3/w2/v3</property>
      <property value="-7.02247">fsim/tables/ps_idle_ms/h3/w2/v4</property>
      <property value="-7.29643">fsim/tables/ps_idle_ms/h3/w2/v5</property>
      <property value="-7.53485">fsim/tables/ps_idle_ms/h3/w2/v6</property>
      <property value="-7.75657">fsim/tables/ps_idle_ms/h3/w2/v7</property>
      <property value="-8.16124">fsim/tables/ps_idle_ms/h3/w2/v8</property>
      <property value="-8.67694">fsim/tables/ps_idle_ms/h3/w2/v9</property>
      <property value="-6.69343">fsim/tables/ps_idle_ms/h3/w3/v0</property>
      <property value="-6.68944">fsim/tables/ps_idle_ms/h3/w3/v1</property>
      <property value="-8.6688">fsim/tables/ps_idle_ms/h3/w3/v10</property>
      <property value="-9.02245">fsim/tables/ps_idle_ms/h3/w3/v11</property>
      <property value="-9.38717">fsim/tables/ps_idle_ms/h3/w3/v12</property>
      <property value="-9.72393">fsim/tables/ps_idle_ms/h3/w3/v13</property>
      <property value="-10.0149">fsim/tables/ps_idle_ms/h3/w3/v14</property>
      <property value="-10.0204">fsim/tables/ps_idle_ms/h3/w3/v15</property>
      <property value="-6.84213">fsim/tables/ps_idle_ms/h3/w3/v2</property>
      <property value="-7.02836">fsim/tables/ps_idle_ms/h3/w3/v3</property>
      <property value="-7.19245">fsim/tables/ps_idle_ms/h3/w3/v4</property>
      <property value="-7.36519">fsim/tables/ps_idle_ms/h3/w3/v5</property>
      <property value="-7.50759">fsim/tables/ps_idle_ms/h3/w3/v6</property>
      <property value="-7.65068">fsim/tables/ps_idle_ms/h3/w3/v7</property>
      <property value="-7.94389">fsim/tables/ps_idle_ms/h3/w3/v8</property>
      <property value="-8.30419">fsim/tables/ps_idle_ms/h3/w3/v9</property>
      <property value="-6.28386">fsim/tables/ps_idle_ms/h4/w0/v0</property>
      <property value="-6.32871">fsim/tables/ps_idle_ms/h4/w0/v1</property>
      <property value="-9.37704">fsim/tables/ps_idle_ms/h4/w0/v10</property>
      <property value="-9.96944">fsim/tables/ps_idle_ms/h4/w0/v11</property>
      <property value="-10.5427">fsim/tables/ps_idle_ms/h4/w0/v12</property>
      <property value="-11.1047">fsim/tables/ps_idle_ms/h4/w0/v13</property>
      <property value="-11.6251">fsim/tables/ps_idle_ms/h4/w0/v14</property>
      <property value="-11.8743">fsim/tables/ps_idle_ms/h4/w0/v15</property>
      <property value="-6.35331">fsim/tables/ps_idle_ms/h4/w0/v2</property>
      <property value="-6.56711">fsim/tables/ps_idle_ms/h4/w0/v3</property>
      <property value="-6.91896">fsim/tables/ps_idle_ms/h4/w0/v4</property>
      <property value="-7.24113">fsim/tables/ps_idle_ms/h4/w0/v5</property>
      <property value="-7.56465">fsim/tables/ps_idle_ms/h4/w0/v6</property>
      <property value="-7.82055">fsim/tables/ps_idle_ms/h4/w0/v7</property>
      <property value="-8.19733">fsim/tables/ps_idle_ms/h4/w0/v8</property>
      <property value="-8.75586">fsim/tables/ps_idle_ms/h4/w0/v9</property>
      <property value="-6.67569">fsim/tables/ps_idle_ms/h4/w1/v0</property>
      <property value="-6.64968">fsim/tables/ps_idle_ms/h4/w1/v1</property>
      <property value="-8.62957">fsim/tables/ps_idle_ms/h4/w1/v10</property>
      <property value="-9.0038">fsim/tables/ps_idle_ms/h4/w1/v11</property>
      <property value="-9.37299">fsim/tables/ps_idle_ms/h4/w1/v12</property>
      <property value="-9.74127">fsim/tables/ps_idle_ms/h4/w1/v13</property>
      <property value="-10.0491">fsim/tables/ps_idle_ms/h4/w1/v14</property>
      <property value="-10.0286">fsim/tables/ps_idle_ms/h4/w1/v15</property>
      <property value="-6.75688">fsim/tables/ps_idle_ms/h4/w1/v2</property>
      <property value="-6.9489">fsim/tables/ps_idle_ms/h4/w1/v3</property>
      <property value="-7.13062">fsim/tables/ps_idle_ms/h4/w1/v4</property>
      <property value="-7.31887">fsim/tables/ps_idle_ms/h4/w1/v5</property>
      <property value="-7.48826">fsim/tables/ps_idle_ms/h4/w1/v6</property>
      <property value="-7.62963">fsim/tables/ps_idle_ms/h4/w1/v7</property>
      <property value="-7.88036">fsim/tables/ps_idle_ms/h4/w1/v8</property>
      <property value="-8.24456">fsim/tables/ps_idle_ms/h4/w1/v9</property>
      <property value="-6.7138">fsim/tables/ps_idle_ms/h4/w2/v0</property>
      <property value="-6.69544">fsim/tables/ps_idle_ms/h4/w2/v1</property>
      <property value="-8.56007">fsim/tables/ps_idle_ms/h4/w2/v10</property>
      <property value="-8.92284">fsim/tables/ps_idle_ms/h4/w2/v11</property>
      <property value="-9.2718">fsim/tables/ps_idle_ms/h4/w2/v12</property>
      <property value="-9.61378">fsim/tables/ps_idle_ms/h4/w2/v13</property>
      <property value="-9.90158">fsim/tables/ps_idle_ms/h4/w2/v14</property>
      <property value="-9.86387">fsim/tables/ps_idle_ms/h4/w2/v15</property>
      <property value="-6.81132">fsim/tables/ps_idle_ms/h4/w2/v2</property>
      <property value="-6.98924">fsim/tables/ps_idle_ms/h4/w2/v3</property>
      <property value="-7.15566">fsim/tables/ps_idle_ms/h4/w2/v4</property>
      <property value="-7.33402">fsim/tables/ps_idle_ms/h4/w2/v5</property>
      <property value="-7.48568">fsim/tables/ps_idle_ms/h4/w2/v6</property>
      <property value="-7.62384">fsim/tables/ps_idle_ms/h4/w2/v7</property>
      <property value="-7.85327">fsim/tables/ps_idle_ms/h4/w2/v8</property>
      <property value="-8.20389">fsim/tables/ps_idle_ms/h4/w2/v9</property>
      <property value="-7.08119">fsim/tables/ps_idle_ms/h4/w3/v0</property>
      <property value="-7.14885">fsim/tables/ps_idle_ms/h4/w3/v1</property>
      <property value="-8.1701">fsim/tables/ps_idle_ms/h4/w3/v10</property>
      <property value="-8.39221">fsim/tables/ps_idle_ms/h4/w3/v11</property>
      <property value="-8.61559">fsim/tables/ps_idle_ms/h4/w3/v12</property>
      <property value="-8.82253">fsim/tables/ps_idle_ms/h4/w3/v13</property>
      <property value="-8.96754">fsim/tables/ps_idle_ms/h4/w3/v14</property>
      <property value="-8.82009">fsim/tables/ps_idle_ms/h4/w3/v15</property>
      <property value="-7.21796">fsim/tables/ps_idle_ms/h4/w3/v2</property>
      <property value="-7.29093">fsim/tables/ps_idle_ms/h4/w3/v3</property>
      <property value="-7.38267">fsim/tables/ps_idle_ms/h4/w3/v4</property>
      <property value="-7.46991">fsim/tables/ps_idle_ms/h4/w3/v5</property>
      <property value="-7.53791">fsim/tables/ps_idle_ms/h4/w3/v6</property>
      <property value="-7.61159">fsim/tables/ps_idle_ms/h4/w3/v7</property>
      <property value="-7.73699">fsim/tables/ps_idle_ms/h4/w3/v8</property>
      <property value="-7.95107">fsim/tables/ps_idle_ms/h4/w3/v9</property>
      <property value="-6.50938">fsim/tables/ps_idle_ms/h5/w0/v0</property>
      <property value="-6.50375">fsim/tables/ps_idle_ms/h5/w0/v1</property>
      <property value="-8.87023">fsim/tables/ps_idle_ms/h5/w0/v10</property>
      <property value="-9.3163">fsim/tables/ps_idle_ms/h5/w0/v11</property>
      <property value="-9.81663">fsim/tables/ps_idle_ms/h5/w0/v12</property>
      <property value="-10.272">fsim/tables/ps_idle_ms/h5/w0/v13</property>
      <property value="-10.6371">fsim/tables/ps_idle_ms/h5/w0/v14</property>
      <property value="-10.7089">fsim/tables/ps_idle_ms/h5/w0/v15</property>
      <property value="-6.51825">fsim/tables/ps_idle_ms/h5/w0/v2</property>
      <property value="-6.71891">fsim/tables/ps_idle_ms/h5/w0/v3</property>
      <property value="-6.99044">fsim/tables/ps_idle_ms/h5/w0/v4</property>
      <property value="-7.23752">fsim/tables/ps_idle_ms/h5/w0/v5</property>
      <property value="-7.48182">fsim/tables/ps_idle_ms/h5/w0/v6</property>
      <property value="-7.6878">fsim/tables/ps_idle_ms/h5/w0/v7</property>
      <property value="-7.93828">fsim/tables/ps_idle_ms/h5/w0/v8</property>
      <property value="-8.38718">fsim/tables/ps_idle_ms/h5/w0/v9</property>
      <property value="-6.88921">fsim/tables/ps_idle_ms/h5/w1/v0</property>
      <property value="-6.9262">fsim/tables/ps_idle_ms/h5/w1/v1</property>
      <property value="-8.2701">fsim/tables/ps_idle_ms/h5/w1/v10</property>
      <property value="-8.55382">fsim/tables/ps_idle_ms/h5/w1/v11</property>
      <property value="-8.81836">fsim/tables/ps_idle_ms/h5/w1/v12</property>
      <property value="-9.10623">fsim/tables/ps_idle_ms/h5/w1/v13</property>
      <property value="-9.30934">fsim/tables/ps_idle_ms/h5/w1/v14</property>
      <property value="-9.18541">fsim/tables/ps_idle_ms/h5/w1/v15</property>
      <property value="-7.0275">fsim/tables/ps_idle_ms/h5/w1/v2</property>
      <property value="-7.13419">fsim/tables/ps_idle_ms/h5/w1/v3</property>
      <property value="-7.25369">fsim/tables/ps_idle_ms/h5/w1/v4</property>
      <property value="-7.37851">fsim/tables/ps_idle_ms/h5/w1/v5</property>
      <property value="-7.49182">fsim/tables/ps_idle_ms/h5/w1/v6</property>
      <property value="-7.58656">fsim/tables/ps_idle_ms/h5/w1/v7</property>
      <property value="-7.74013">fsim/tables/ps_idle_ms/h5/w1/v8</property>
      <property value="-7.98612">fsim/tables/ps_idle_ms/h5/w1/v9</property>
      <property value="-6.93697">fsim/tables/ps_idle_ms/h5/w2/v0</property>
      <property value="-6.98996">fsim/tables/ps_idle_ms/h5/w2/v1</property>
      <property value="-8.22051">fsim/tables/ps_idle_ms/h5/w2/v10</property>
      <property value="-8.49507">fsim/tables/ps_idle_ms/h5/w2/v11</property>
      <property value="-8.74466">fsim/tables/ps_idle_ms/h5/w2/v12</property>
      <property value="-8.99876">fsim/tables/ps_idle_ms/h5/w2/v13</property>
      <property value="-9.2029">fsim/tables/ps_idle_ms/h5/w2/v14</property>
      <property value="-9.07317">fsim/tables/ps_idle_ms/h5/w2/v15</property>
      <property value="-7.08351">fsim/tables/ps_idle_ms/h5/w2/v2</property>
      <property value="-7.17701">fsim/tables/ps_idle_ms/h5/w2/v3</property>
      <property value="-7.28619">fsim/tables/ps_idle_ms/h5/w2/v4</property>
      <property value="-7.39939">fsim/tables/ps_idle_ms/h5/w2/v5</property>
      <property value="-7.50209">fsim/tables/ps_idle_ms/h5/w2/v6</property>
      <property value="-7.58715">fsim/tables/ps_idle_ms/h5/w2/v7</property>
      <property value="-7.72819">fsim/tables/ps_idle_ms/h5/w2/v8</property>
      <property value="-7.96298">fsim/tables/ps_idle_ms/h5/w2/v9</property>
      <property value="-7.42166">fsim/tables/ps_idle_ms/h5/w3/v0</property>
      <property value="-7.45039">fsim/tables/ps_idle_ms/h5/w3/v1</property>
      <property value="-7.73036">fsim/tables/ps_idle_ms/h5/w3/v10</property>
      <property value="-7.81378">fsim/tables/ps_idle_ms/h5/w3/v11</property>
      <property value="-7.91513">fsim/tables/ps_idle_ms/h5/w3/v12</property>
      <property value="-7.99017">fsim/tables/ps_idle_ms/h5/w3/v13</property>
      <property value="-8.0026">fsim/tables/ps_idle_ms/h5/w3/v14</property>
      <property value="-7.85648">fsim/tables/ps_idle_ms/h5/w3/v15</property>
      <property value="-7.47291">fsim/tables/ps_idle_ms/h5/w3/v2</property>
      <property value="-7.49078">fsim/tables/ps_idle_ms/h5/w3/v3</property>
      <property value="-7.51475">fsim/tables/ps_idle_ms/h5/w3/v4</property>
      <property value="-7.54804">fsim/tables/ps_idle_ms/h5/w3/v5</property>
      <property value="-7.58186">fsim/tables/ps_idle_ms/h5/w3/v6</property>
      <property value="-7.61628">fsim/tables/ps_idle_ms/h5/w3/v7</property>
      <property value="-7.6521">fsim/tables/ps_idle_ms/h5/w3/v8</property>
      <property value="-7.68441">fsim/tables/ps_idle_ms/h5/w3/v9</property>
      <property value="-6.71724">fsim/tables/ps_idle_ms/h6/w0/v0</property>
      <property value="-6.69362">fsim/tables/ps_idle_ms/h6/w0/v1</property>
      <property value="-8.46751">fsim/tables/ps_idle_ms/h6/w0/v10</property>
      <property value="-8.84429">fsim/tables/ps_idle_ms/h6/w0/v11</property>
      <property value="-9.20897">fsim/tables/ps_idle_ms/h6/w0/v12</property>
      <property value="-9.5529">fsim/tables/ps_idle_ms/h6/w0/v13</property>
      <property value="-9.85248">fsim/tables/ps_idle_ms/h6/w0/v14</property>
      <property value="-9.80563">fsim/tables/ps_idle_ms/h6/w0/v15</property>
      <property value="-6.75831">fsim/tables/ps_idle_ms/h6/w0/v2</property>
      <property value="-6.91978">fsim/tables/ps_idle_ms/h6/w0/v3</property>
      <property value="-7.09062">fsim/tables/ps_idle_ms/h6/w0/v4</property>
      <property value="-7.27694">fsim/tables/ps_idle_ms/h6/w0/v5</property>
      <property value="-7.45485">fsim/tables/ps_idle_ms/h6/w0/v6</property>
      <property value="-7.60658">fsim/tables/ps_idle_ms/h6/w0/v7</property>
      <property value="-7.77731">fsim/tables/ps_idle_ms/h6/w0/v8</property>
      <property value="-8.10941">fsim/tables/ps_idle_ms/h6/w0/v9</property>
      <property value="-7.18644">fsim/tables/ps_idle_ms/h6/w1/v0</property>
      <property value="-7.24482">fsim/tables/ps_idle_ms/h6/w1/v1</property>
      <property value="-7.87463">fsim/tables/ps_idle_ms/h6/w1/v10</property>
      <property value="-8.06432">fsim/tables/ps_idle_ms/h6/w1/v11</property>
      <property value="-8.25165">fsim/tables/ps_idle_ms/h6/w1/v12</property>
      <property value="-8.41135">fsim/tables/ps_idle_ms/h6/w1/v13</property>
      <property value="-8.50848">fsim/tables/ps_idle_ms/h6/w1/v14</property>
      <property value="-8.39338">fsim/tables/ps_idle_ms/h6/w1/v15</property>
      <property value="-7.3002">fsim/tables/ps_idle_ms/h6/w1/v2</property>
      <property value="-7.34678">fsim/tables/ps_idle_ms/h6/w1/v3</property>
      <property value="-7.39377">fsim/tables/ps_idle_ms/h6/w1/v4</property>
      <property value="-7.45776">fsim/tables/ps_idle_ms/h6/w1/v5</property>
      <property value="-7.52178">fsim/tables/ps_idle_ms/h6/w1/v6</property>
      <property value="-7.57084">fsim/tables/ps_idle_ms/h6/w1/v7</property>
      <property value="-7.63155">fsim/tables/ps_idle_ms/h6/w1/v8</property>
      <property value="-7.71974">fsim/tables/ps_idle_ms/h6/w1/v9</property>
      <property value="-7.25841">fsim/tables/ps_idle_ms/h6/w2/v0</property>
      <property value="-7.30824">fsim/tables/ps_idle_ms/h6/w2/v1</property>
      <property value="-7.78557">fsim/tables/ps_idle_ms/h6/w2/v10</property>
      <property value="-7.93253">fsim/tables/ps_idle_ms/h6/w2/v11</property>
      <property value="-8.09265">fsim/tables/ps_idle_ms/h6/w2/v12</property>
      <property value="-8.23754">fsim/tables/ps_idle_ms/h6/w2/v13</property>
      <property value="-8.30611">fsim/tables/ps_idle_ms/h6/w2/v14</property>
      <property value="-8.17076">fsim/tables/ps_idle_ms/h6/w2/v15</property>
      <property value="-7.35245">fsim/tables/ps_idle_ms/h6/w2/v2</property>
      <property value="-7.38818">fsim/tables/ps_idle_ms/h6/w2/v3</property>
      <property value="-7.42627">fsim/tables/ps_idle_ms/h6/w2/v4</property>
      <property value="-7.47315">fsim/tables/ps_idle_ms/h6/w2/v5</property>
      <property value="-7.52875">fsim/tables/ps_idle_ms/h6/w2/v6</property>
      <property value="-7.57322">fsim/tables/ps_idle_ms/h6/w2/v7</property>
      <property value="-7.61735">fsim/tables/ps_idle_ms/h6/w2/v8</property>
      <property value="-7.68032">fsim/tables/ps_idle_ms/h6/w2/v9</property>
      <property value="147.048">fsim/tables/reach_tas_ms/h0/w0</property>
      <property value="146.088">fsim/tables/reach_tas_ms/h0/w1</property>
      <property value="145.981">fsim/tables/reach_tas_ms/h0/w2</property>
      <property value="144.546">fsim/tables/reach_tas_ms/h0/w3</property>
      <property value="152.455">fsim/tables/reach_tas_ms/h1/w0</property>
      <property value="150.652">fsim/tables/reach_tas_ms/h1/w1</property>
      <property value="150.512">fsim/tables/reach_tas_ms/h1/w2</property>
      <property value="149.12">fsim/tables/reach_tas_ms/h1/w3</property>
      <property value="150.088">fsim/tables/reach_tas_ms/h2/w0</property>
      <property value="148.065">fsim/tables/reach_tas_ms/h2/w1</property>
      <property value="147.75">fsim/tables/reach_tas_ms/h2/w2</property>
      <property value="145.359">fsim/tables/reach_tas_ms/h2/w3</property>
      <property value="145.938">fsim/tables/reach_tas_ms/h3/w0</property>
      <property value="142.824">fsim/tables/reach_tas_ms/h3/w1</property>
      <property value="142.388">fsim/tables/reach_tas_ms/h3/w2</property>
      <property value="138.985">fsim/tables/reach_tas_ms/h3/w3</property>
      <property value="142.149">fsim/tables/reach_tas_ms/h4/w0</property>
      <property value="138.018">fsim/tables/reach_tas_ms/h4/w1</property>
      <property value="137.444">fsim/tables/reach_tas_ms/h4/w2</property>
      <property value="132.292">fsim/tables/reach_tas_ms/h4/w3</property>
      <property value="139.078">fsim/tables/reach_tas_ms/h5/w0</property>
      <property value="133.867">fsim/tables/reach_tas_ms/h5/w1</property>
      <property value="133.223">fsim/tables/reach_tas_ms/h5/w2</property>
      <property value="122.146">fsim/tables/reach_tas_ms/h5/w3</property>
      <property value="135.841">fsim/tables/reach_tas_ms/h6/w0</property>
      <property value="127.07">fsim/tables/reach_tas_ms/h6/w1</property>
      <property value="124.922">fsim/tables/reach_tas_ms/h6/w2</property>
      <property value="0.0">fsim/tables/speed_fraction/v0</property>
      <property value="0.0666667">fsim/tables/speed_fraction/v1</property>
      <property value="0.666667">fsim/tables/speed_fraction/v10</property>
      <property value="0.733333">fsim/tables/speed_fraction/v11</property>
      <property value="0.8">fsim/tables/speed_fraction/v12</property>
      <property value="0.866667">fsim/tables/speed_fraction/v13</property>
      <property value="0.933333">fsim/tables/speed_fraction/v14</property>
      <property value="1">fsim/tables/speed_fraction/v15</property>
      <property value="0.133333">fsim/tables/speed_fraction/v2</property>
      <property value="0.2">fsim/tables/speed_fraction/v3</property>
      <property value="0.266667">fsim/tables/speed_fraction/v4</property>
      <property value="0.333333">fsim/tables/speed_fraction/v5</property>
      <property value="0.4">fsim/tables/speed_fraction/v6</property>
      <property value="0.466667">fsim/tables/speed_fraction/v7</property>
      <property value="0.533333">fsim/tables/speed_fraction/v8</property>
      <property value="0.6">fsim/tables/speed_fraction/v9</property>
      <property value="49.5846">fsim/tables/stall_cas_ms/h0/w0</property>
      <property value="54.1006">fsim/tables/stall_cas_ms/h0/w1</property>
      <property value="54.5793">fsim/tables/stall_cas_ms/h0/w2</property>
      <property value="58.2676">fsim/tables/stall_cas_ms/h0/w3</property>
      <property value="49.4936">fsim/tables/stall_cas_ms/h1/w0</property>
      <property value="54.0012">fsim/tables/stall_cas_ms/h1/w1</property>
      <property value="54.4791">fsim/tables/stall_cas_ms/h1/w2</property>
      <property value="58.1606">fsim/tables/stall_cas_ms/h1/w3</property>
      <property value="49.265">fsim/tables/stall_cas_ms/h2/w0</property>
      <property value="53.7519">fsim/tables/stall_cas_ms/h2/w1</property>
      <property value="54.2275">fsim/tables/stall_cas_ms/h2/w2</property>
      <property value="57.892">fsim/tables/stall_cas_ms/h2/w3</property>
      <property value="49.0786">fsim/tables/stall_cas_ms/h3/w0</property>
      <property value="53.5485">fsim/tables/stall_cas_ms/h3/w1</property>
      <property value="54.0223">fsim/tables/stall_cas_ms/h3/w2</property>
      <property value="57.6729">fsim/tables/stall_cas_ms/h3/w3</property>
      <property value="49.0982">fsim/tables/stall_cas_ms/h4/w0</property>
      <property value="53.5698">fsim/tables/stall_cas_ms/h4/w1</property>
      <property value="54.0439">fsim/tables/stall_cas_ms/h4/w2</property>
      <property value="57.696">fsim/tables/stall_cas_ms/h4/w3</property>
      <property value="49.0481">fsim/tables/stall_cas_ms/h5/w0</property>
      <property value="53.5152">fsim/tables/stall_cas_ms/h5/w1</property>
      <property value="53.9887">fsim/tables/stall_cas_ms/h5/w2</property>
      <property value="57.6371">fsim/tables/stall_cas_ms/h5/w3</property>
      <property value="49.1687">fsim/tables/stall_cas_ms/h6/w0</property>
      <property value="53.6468">fsim/tables/stall_cas_ms/h6/w1</property>
      <property value="54.1215">fsim/tables/stall_cas_ms/h6/w2</property>
      <property value="49195">fsim/tables/weight_kg/w0</property>
      <property value="58564">fsim/tables/weight_kg/w1</property>
      <property value="59605">fsim/tables/weight_kg/w2</property>
      <property value="67933">fsim/tables/weight_kg/w3</property>
      <channel name="Pitch">
        <summer name="fcs/pitch-trim-sum">
          <input>fcs/elevator-cmd-norm</input>
          <input>fcs/pitch-trim-cmd-norm</input>
          <clipto> <min>-1</min> <max>1</max> </clipto>
        </summer>
        <aerosurface_scale name="fcs/elevator-control">
          <input>fcs/pitch-trim-sum</input>
          <range> <min>-25.00</min> <max>15.00</max> </range>
          <gain>0.0174533</gain>
        </aerosurface_scale>
        <actuator name="fcs/elevator-actuator">
          <input>fcs/elevator-control</input>
          <rate_limit>2.0</rate_limit>
          <output>fcs/elevator-pos-rad</output>
        </actuator>
      </channel>
      <channel name="Roll">
        <summer name="fcs/roll-trim-sum">
          <input>fcs/aileron-cmd-norm</input>
          <input>fcs/roll-trim-cmd-norm</input>
          <clipto> <min>-1</min> <max>1</max> </clipto>
        </summer>
        <aerosurface_scale name="fcs/left-aileron-control">
          <input>fcs/roll-trim-sum</input>
          <range> <min>-20.00</min> <max>20.00</max> </range>
          <gain>0.0174533</gain>
        </aerosurface_scale>
        <actuator name="fcs/left-aileron-actuator">
          <input>fcs/left-aileron-control</input>
          <rate_limit>2.0</rate_limit>
          <output>fcs/left-aileron-pos-rad</output>
        </actuator>
        <pure_gain name="fcs/right-aileron">
          <input>fcs/left-aileron-pos-rad</input>
          <gain>-1</gain>
          <output>fcs/right-aileron-pos-rad</output>
        </pure_gain>
      </channel>
      <channel name="Yaw">
        <summer name="fcs/yaw-trim-sum">
          <input>fcs/rudder-cmd-norm</input>
          <input>fcs/yaw-trim-cmd-norm</input>
          <clipto> <min>-1</min> <max>1</max> </clipto>
        </summer>
        <aerosurface_scale name="fcs/rudder-control">
          <input>fcs/yaw-trim-sum</input>
          <range> <min>-35.00</min> <max>35.00</max> </range>
          <gain>0.0174533</gain>
        </aerosurface_scale>
        <actuator name="fcs/rudder-actuator">
          <input>fcs/rudder-control</input>
          <rate_limit>2.0</rate_limit>
          <output>fcs/rudder-pos-rad</output>
        </actuator>
        <!-- the nose or tail wheel steers with the rudder pedals (JSBSim steers from
             fcs/steer-cmd-norm, positive right; the rudder command is positive left) -->
        <pure_gain name="fcs/steer-from-rudder">
          <input>fcs/yaw-trim-sum</input>
          <gain>-1</gain>
          <output>fcs/steer-cmd-norm</output>
        </pure_gain>
      </channel>
      <channel name="Flaps">
        <kinematic name="fcs/flaps-control">
          <input>fcs/flap-cmd-norm</input>
          <traverse>
            <setting> <position>0.0</position> <time>0.0</time> </setting>
            <setting> <position>8.8</position> <time>2.0</time> </setting>
            <setting> <position>17.5</position> <time>2.0</time> </setting>
            <setting> <position>26.2</position> <time>2.0</time> </setting>
            <setting> <position>35.0</position> <time>2.0</time> </setting>
          </traverse>
          <output>fcs/flap-pos-deg</output>
        </kinematic>
        <pure_gain name="fcs/flaps-normalized">
          <input>fcs/flap-pos-deg</input>
          <gain>0.0285714</gain>
          <output>fcs/flap-pos-norm</output>
        </pure_gain>
      </channel>
      <channel name="Propeller Governor 0">
        <!-- T56-A-15 inboard L: the propeller governed at 1020 rpm. The ground range: with weight
             on the wheels and time running, a throttle below 0.2 sets the blades, from
             ground idle's -4.43 deg (no thrust standing still) to the low stop, 15.0,
             and N1 holds the propeller's speed - not below 51.0 %, nor above 56.5 % at
             ground idle rising to the flight range's where it takes over, 62.9 %; past
             1030 rpm the blades open further -->
        <fcs_function name="fcs/propeller-ground-range-0">
          <function>
            <and>
              <gt> <property>simulation/dt</property> <value>0</value> </gt>
              <gt> <property>gear/wow</property> <value>0</value> </gt>
              <lt> <property>fcs/throttle-cmd-norm[0]</property> <value>0.2</value> </lt>
            </and>
          </function>
        </fcs_function>
        <fcs_function name="fcs/propeller-beta-blade-0">
          <function>
            <sum>
              <value>-4.4300</value>
              <product>
                <value>97.15</value>
                <max> <value>0</value> <property>fcs/throttle-cmd-norm[0]</property> </max>
              </product>
            </sum>
          </function>
          <clipto> <min>-4.4300</min> <max>15.0000</max> </clipto>
        </fcs_function>
        <!-- the fuel control: the N1 that holds the governed speed standing still with the
             blades there (sea level), less 0.07052 % for each rpm the propeller runs fast -->
        <fcs_function name="fcs/propeller-beta-n1-0">
          <function>
            <min>
              <sum>
                <value>56.5463</value>
                <product>
                  <value>31.9452</value>
                  <max> <value>0</value> <property>fcs/throttle-cmd-norm[0]</property> </max>
                </product>
              </sum>
              <max>
                <value>51.0000</value>
                <sum>
                  <table>
                    <independentVar>fcs/propeller-beta-blade-0</independentVar>
                    <tableData>
                         -4.43   53.6692
                          0.00   56.4694
                          5.00   61.8638
                         10.00   69.5577
                         15.00   78.7509
                         20.00   88.2933
                    </tableData>
                  </table>
                  <product>
                    <value>0.0705175</value>
                    <difference> <value>1020.0000</value> <property>propulsion/engine[0]/propeller-rpm</property> </difference>
                  </product>
                </sum>
              </max>
            </min>
          </function>
        </fcs_function>
        <!-- JSBSim's turboprop drops its N1 to idle as time runs again after standing still (a
             reset, a trim; its power reads 0 then): in that step the throttle puts N1 back where
             it was, or in the ground range where the fuel control wants it -->
        <fcs_function name="fcs/propeller-throttle-0">
          <function>
            <ifthen>
              <gt> <property>fcs/propeller-ground-range-0</property> <value>0</value> </gt>
              <quotient>
                <difference>
                  <ifthen>
                    <lt> <property>propulsion/engine[0]/power-hp</property> <value>0.5</value> </lt>
                    <ifthen>
                      <gt> <property>fcs/propeller-beta-n1-0</property> <value>53.6692</value> </gt>
                      <sum>
                        <value>53.6692</value>
                        <quotient>
                          <difference> <property>fcs/propeller-beta-n1-0</property> <value>53.6692</value> </difference>
                          <difference>
                            <value>1</value>
                            <exp> <quotient> <property>simulation/dt</property> <value>-1.0000</value> </quotient> </exp>
                          </difference>
                        </quotient>
                      </sum>
                      <quotient>
                        <difference>
                          <property>fcs/propeller-beta-n1-0</property>
                          <product>
                            <value>53.6692</value>
                            <exp> <quotient> <property>simulation/dt</property> <value>-2.4000</value> </quotient> </exp>
                          </product>
                        </difference>
                        <difference>
                          <value>1</value>
                          <exp> <quotient> <property>simulation/dt</property> <value>-2.4000</value> </quotient> </exp>
                        </difference>
                      </quotient>
                    </ifthen>
                    <property>fcs/propeller-beta-n1-0</property>
                  </ifthen>
                  <value>53.6692</value>
                </difference>
                <value>46.3308</value>
              </quotient>
              <ifthen>
                <and>
                  <gt> <property>simulation/dt</property> <value>0</value> </gt>
                  <lt> <property>propulsion/engine[0]/power-hp</property> <value>0.5</value> </lt>
                </and>
                <quotient>
                  <difference> <property>propulsion/engine[0]/n1</property> <value>53.6692</value> </difference>
                  <product>
                    <value>46.3308</value>
                    <difference>
                      <value>1</value>
                      <exp> <quotient> <property>simulation/dt</property> <value>-1.0000</value> </quotient> </exp>
                    </difference>
                  </product>
                </quotient>
                <property>fcs/throttle-cmd-norm[0]</property>
              </ifthen>
            </ifthen>
          </function>
          <output>fcs/throttle-pos-norm[0]</output>
        </fcs_function>
        <!-- the speed's rate of change: the power the engine gives the propeller less the
             power it takes, over its spin inertia (rpm/s); none read while the engine's
             power reads 0 (time stood still) -->
        <fcs_function name="fcs/propeller-rpm-rate-0">
          <function>
            <product>
              <ge> <property>propulsion/engine[0]/power-hp</property> <value>0.5</value> </ge>
              <quotient>
                <difference>
                  <product> <property>propulsion/engine[0]/power-hp</property> <value>550</value> </product>
                  <property>propulsion/engine[0]/propeller-power-ftlbps</property>
                </difference>
                <max>
                  <value>577.501</value>
                  <product> <value>5.66178</value> <property>propulsion/engine[0]/propeller-rpm</property> </product>
                </max>
              </quotient>
            </product>
          </function>
        </fcs_function>
        <fcs_function name="fcs/propeller-advance-0">
          <function>
            <quotient>
              <difference>
                <value>204.0</value>
                <product>
                  <gt> <property>simulation/dt</property> <value>0</value> </gt>
                  <value>0.1500</value>
                  <property>fcs/propeller-rpm-rate-0</property>
                </product>
              </difference>
              <value>306.0</value>
            </quotient>
          </function>
          <clipto> <min>0</min> <max>1</max> </clipto>
          <output>fcs/advance-cmd-norm[0]</output>
        </fcs_function>
        <!-- time standing still: the blades held where they take the engine's power; in the
             ground range: set -->
        <fcs_function name="fcs/propeller-governing-0">
          <function>
            <and>
              <gt> <property>simulation/dt</property> <value>0</value> </gt>
              <lt> <property>fcs/propeller-ground-range-0</property> <value>1</value> </lt>
            </and>
          </function>
          <output>propulsion/engine[0]/constant-speed-mode</output>
        </fcs_function>
        <fcs_function name="fcs/propeller-advance-ratio-0">
          <function>
            <max> <value>0</value> <quotient> <property>velocities/u-aero-fps</property> <value>229.5112</value> </quotient> </max>
          </function>
        </fcs_function>
        <!-- the engine's power coefficient at the governed speed: its core at the throttle's
             N1 (the full one at a start: JSBSim starts engines at full throttle), the lapse -->
        <fcs_function name="fcs/propeller-power-coefficient-0">
          <function>
            <quotient>
              <min>
                <value>4590.3</value>
                <product>
                  <value>4590.3</value>
                  <max>
                    <value>0</value>
                    <quotient>
                      <difference>
                        <pow>
                          <sum>
                            <value>0.5367</value>
                            <product>
                              <value>0.4633</value>
                              <ifthen>
                                <gt> <property>fcs/throttle-pos-norm[0]</property> <value>0.001</value> </gt>
                                <property>fcs/throttle-pos-norm[0]</property>
                                <value>1</value>
                              </ifthen>
                            </product>
                          </sum>
                          <value>3</value>
                        </pow>
                        <value>0.125000</value>
                      </difference>
                      <value>0.875000</value>
                    </quotient>
                  </max>
                  <product>
                    <quotient> <property>atmosphere/P-psf</property> <value>2116.228</value> </quotient>
                    <pow> <sum> <value>1</value> <product> <value>0.2</value> <property>velocities/mach</property> <property>velocities/mach</property> </product> </sum> <value>3.5</value> </pow>
                    <max>
                      <value>0</value>
                      <difference>
                        <value>1</value>
                        <product>
                          <max>
                            <value>0</value>
                            <difference>
                              <product> <quotient> <property>atmosphere/T-R</property> <value>518.67</value> </quotient> <sum> <value>1</value> <product> <value>0.2</value> <property>velocities/mach</property> <property>velocities/mach</property> </product> </sum> </product>
                              <value>1.0000</value>
                            </difference>
                          </max>
                          <table>
                            <independentVar lookup="row">velocities/mach</independentVar>
                            <tableData>
                                0.00    0.0000
                                0.10    0.0000
                                0.20    8.0192
                                0.30    5.1535
                                0.40    4.2484
                                0.50    3.9000
                                0.60    3.8290
                                0.70    3.9654
                                0.80    4.3246
                                0.90    5.0088
                            </tableData>
                          </table>
                        </product>
                      </difference>
                    </max>
                  </product>
                </product>
              </min>
              <product> <property>atmosphere/rho-slugs_ft3</property> <value>4.00644e+06</value> </product>
            </quotient>
          </function>
        </fcs_function>
        <fcs_function name="fcs/propeller-blade-angle-0">
          <function>
            <ifthen>
              <gt> <property>simulation/dt</property> <value>0</value> </gt>
              <ifthen>
                <gt> <property>fcs/propeller-ground-range-0</property> <value>0</value> </gt>
                <min>
                  <value>65.0000</value>
                  <sum>
                    <property>fcs/propeller-beta-blade-0</property>
                    <product>
                      <value>1.03923</value>
                      <max>
                        <value>0</value>
                        <difference> <property>propulsion/engine[0]/propeller-rpm</property> <value>1030.2000</value> </difference>
                      </max>
                    </product>
                  </sum>
                </min>
                <property>propulsion/engine[0]/blade-angle</property>
              </ifthen>
              <table>
                <independentVar lookup="row">fcs/propeller-advance-ratio-0</independentVar>
                <independentVar lookup="column">fcs/propeller-power-coefficient-0</independentVar>
                <tableData>
                    0.00    0.05    0.10    0.15    0.20    0.25    0.30    0.35    0.40    0.45    0.50    0.55    0.60    0.65    0.70    0.75    0.80    0.85    0.90    0.95    1.00    1.05    1.10    1.15    1.20
              0.00    15.00   15.00   15.00   15.00   15.00   17.23   19.50   21.60   23.65   25.73   27.85   29.98   33.38   65.00   65.00   65.00   65.00   65.00   65.00   65.00   65.00   65.00   65.00   65.00   65.00
              0.10    15.00   15.00   15.00   15.00   15.33   17.58   19.83   21.71   23.55   25.41   27.31   29.21   31.60   34.33   65.00   65.00   65.00   65.00   65.00   65.00   65.00   65.00   65.00   65.00   65.00
              0.20    15.00   15.00   15.00   15.00   15.81   18.05   20.23   22.05   23.86   25.61   27.25   28.89   30.68   32.75   34.83   65.00   65.00   65.00   65.00   65.00   65.00   65.00   65.00   65.00   65.00
              0.30    15.00   15.00   15.00   15.00   16.48   18.68   20.71   22.49   24.28   25.90   27.42   28.94   30.50   32.16   33.81   36.06   39.86   65.00   65.00   65.00   65.00   65.00   65.00   65.00   65.00
              0.40    15.00   15.00   15.00   15.10   17.30   19.50   21.34   23.07   24.80   26.31   27.80   29.28   30.68   31.99   33.31   34.63   36.74   39.18   65.00   65.00   65.00   65.00   65.00   65.00   65.00
              0.50    15.00   15.00   15.00   16.11   18.30   20.38   22.08   23.79   25.42   26.85   28.29   29.72   31.02   32.29   33.56   34.83   36.20   37.58   38.96   65.00   65.00   65.00   65.00   65.00   65.00
              0.60    15.00   15.00   15.00   17.22   19.47   21.28   22.96   24.63   26.08   27.47   28.86   30.22   31.45   32.68   33.91   35.12   36.24   37.36   38.48   39.60   42.14   65.00   65.00   65.00   65.00
              0.70    15.00   15.00   16.32   18.65   20.69   22.33   23.97   25.50   26.85   28.19   29.54   30.78   31.97   33.15   34.34   35.48   36.55   37.62   38.70   39.77   40.94   42.15   43.36   44.56   65.00
              0.80    15.00   15.97   18.09   20.16   21.82   23.48   25.11   26.42   27.74   29.05   30.31   31.45   32.58   33.72   34.85   35.90   36.93   37.96   38.99   40.02   40.97   41.93   42.89   43.84   44.80
              0.90    15.76   17.86   19.97   21.61   23.24   24.87   26.17   27.44   28.72   29.99   31.08   32.17   33.26   34.35   35.40   36.39   37.38   38.37   39.36   40.32   41.23   42.14   43.05   43.96   44.87
              1.00    17.92   20.02   21.56   23.11   24.66   25.99   27.25   28.52   29.79   30.88   31.92   32.97   34.02   35.06   36.01   36.95   37.90   38.85   39.80   40.68   41.55   42.42   43.29   44.15   45.02
              1.10    20.27   21.79   23.30   24.81   26.08   27.31   28.54   29.77   30.82   31.82   32.83   33.83   34.84   35.76   36.67   37.58   38.49   39.40   40.28   41.11   41.93   42.76   43.59   44.42   45.23
              1.20    22.30   23.74   25.15   26.34   27.53   28.72   29.92   30.91   31.88   32.86   33.83   34.81   35.69   36.55   37.42   38.28   39.14   40.00   40.79   41.58   42.37   43.16   43.95   44.74   45.49
              1.30    24.33   25.59   26.71   27.83   28.96   30.07   31.03   31.99   32.95   33.91   34.86   35.71   36.53   37.35   38.17   38.99   39.81   40.58   41.34   42.09   42.85   43.60   44.36   45.10   45.80
              1.40    26.18   27.26   28.35   29.44   30.45   31.37   32.29   33.21   34.13   35.05   35.83   36.62   37.40   38.19   38.97   39.75   40.49   41.22   41.94   42.66   43.38   44.10   44.82   45.49   46.16
              1.50    27.96   29.01   30.05   30.94   31.82   32.71   33.59   34.48   35.31   36.06   36.81   37.56   38.30   39.05   39.80   40.51   41.19   41.88   42.57   43.26   43.94   44.63   45.29   45.92   46.55
              1.60    29.80   30.68   31.53   32.38   33.23   34.08   34.93   35.66   36.37   37.09   37.80   38.52   39.23   39.95   40.61   41.26   41.92   42.58   43.23   43.89   44.55   45.18   45.78   46.38   46.98
              1.70    31.40   32.21   33.03   33.84   34.66   35.40   36.08   36.76   37.45   38.13   38.81   39.50   40.16   40.79   41.42   42.04   42.67   43.29   43.92   44.55   45.16   45.73   46.30   46.87   47.44
              1.80    32.90   33.67   34.43   35.18   35.85   36.52   37.19   37.87   38.54   39.21   39.89   40.49   41.08   41.67   42.26   42.85   43.44   44.03   44.62   45.20   45.74   46.28   46.83   47.37   47.91
              1.90    34.45   35.17   35.81   36.45   37.09   37.74   38.38   39.02   39.67   40.27   40.83   41.40   41.96   42.52   43.09   43.65   44.21   44.77   45.31   45.83   46.34   46.86   47.38   47.90   48.41
              2.00    35.88   36.49   37.11   37.72   38.33   38.95   39.56   40.16   40.69   41.23   41.77   42.31   42.85   43.39   43.92   44.46   45.00   45.49   45.98   46.48   46.97   47.46   47.95   48.44   48.94
              2.10    37.21   37.80   38.39   38.98   39.57   40.13   40.65   41.16   41.68   42.19   42.70   43.22   43.73   44.24   44.76   45.25   45.72   46.19   46.65   47.12   47.59   48.06   48.53   49.00   49.47
              2.20    38.53   39.10   39.66   40.19   40.69   41.18   41.67   42.16   42.65   43.14   43.63   44.12   44.61   45.09   45.54   45.98   46.43   46.88   47.32   47.77   48.22   48.67   49.11   49.56   50.01
              2.30    39.84   40.33   40.79   41.26   41.72   42.19   42.66   43.12   43.59   44.05   44.52   44.99   45.42   45.84   46.27   46.70   47.13   47.56   47.99   48.41   48.84   49.27   49.70   50.11   50.50
              2.40    40.90   41.35   41.80   42.26   42.71   43.16   43.61   44.07   44.52   44.97   45.38   45.79   46.20   46.61   47.02   47.43   47.84   48.25   48.65   49.06   49.47   49.88   50.26   50.63   51.00
              2.50    42.00   42.43   42.86   43.30   43.73   44.16   44.59   45.02   45.41   45.81   46.20   46.59   46.98   47.37   47.76   48.15   48.54   48.93   49.32   49.71   50.09   50.45   50.80   51.15   51.51
              2.60    43.08   43.49   43.90   44.32   44.73   45.13   45.50   45.87   46.25   46.62   47.00   47.37   47.74   48.12   48.49   48.86   49.24   49.61   49.98   50.32   50.66   51.00   51.33   51.67   52.01
              2.70    44.12   44.52   44.91   45.28   45.64   45.99   46.35   46.71   47.07   47.42   47.78   48.14   48.49   48.85   49.21   49.57   49.92   50.25   50.57   50.90   51.22   51.54   51.86   52.18   52.51
              2.80    45.13   45.47   45.81   46.16   46.50   46.84   47.18   47.52   47.87   48.21   48.55   48.89   49.23   49.58   49.92   50.23   50.54   50.85   51.16   51.46   51.77   52.08   52.39   52.69   53.00
              2.90    46.06   46.39   46.71   47.04   47.36   47.69   48.01   48.34   48.66   48.99   49.31   49.64   49.96   50.26   50.55   50.85   51.14   51.43   51.73   52.02   52.32   52.61   52.90   53.20   53.49
              3.00    46.93   47.25   47.56   47.87   48.18   48.49   48.80   49.11   49.42   49.73   50.04   50.32   50.60   50.89   51.17   51.45   51.73   52.01   52.29   52.57   52.85   53.14   53.42   53.70   53.98
              3.10    47.78   48.08   48.38   48.68   48.97   49.27   49.57   49.87   50.15   50.42   50.69   50.96   51.23   51.50   51.77   52.04   52.31   52.57   52.84   53.11   53.38   53.65   53.92   54.19   54.46
              3.20    48.61   48.89   49.18   49.46   49.75   50.03   50.29   50.55   50.81   51.06   51.32   51.58   51.84   52.10   52.35   52.61   52.87   53.13   53.39   53.64   53.90   54.16   54.42   54.68   54.93
              3.30    49.41   49.68   49.96   50.21   50.46   50.70   50.95   51.20   51.44   51.69   51.94   52.19   52.43   52.68   52.93   53.18   53.42   53.67   53.92   54.16   54.41   54.66   54.91   55.14   55.36
              3.40    50.17   50.40   50.64   50.88   51.12   51.35   51.59   51.83   52.07   52.30   52.54   52.78   53.01   53.25   53.49   53.73   53.96   54.20   54.44   54.67   54.91   55.14   55.35   55.57   55.78
              3.50    50.85   51.08   51.30   51.53   51.76   51.99   52.21   52.44   52.67   52.90   53.13   53.35   53.58   53.81   54.04   54.26   54.49   54.72   54.95   55.16   55.36   55.57   55.78   55.98   56.19
              3.60    51.51   51.73   51.94   52.16   52.38   52.60   52.82   53.04   53.26   53.48   53.69   53.91   54.13   54.35   54.57   54.79   55.01   55.20   55.40   55.60   55.80   56.00   56.19   56.39   56.59
              3.70    52.14   52.35   52.56   52.78   52.99   53.20   53.41   53.62   53.83   54.04   54.25   54.46   54.67   54.88   55.08   55.27   55.46   55.65   55.84   56.03   56.22   56.41   56.60   56.79   56.98
              3.80    52.77   52.97   53.17   53.37   53.58   53.78   53.98   54.18   54.38   54.59   54.79   54.99   55.17   55.36   55.54   55.72   55.90   56.09   56.27   56.45   56.63   56.82   57.00   57.18   57.36
              3.90    53.37   53.56   53.76   53.95   54.15   54.34   54.54   54.73   54.93   55.11   55.28   55.46   55.63   55.81   55.99   56.16   56.34   56.51   56.69   56.86   57.04   57.21   57.39   57.57   57.74
              4.00    53.95   54.14   54.33   54.52   54.70   54.89   55.07   55.24   55.41   55.58   55.75   55.91   56.08   56.25   56.42   56.59   56.76   56.93   57.10   57.26   57.43   57.60   57.77   57.94   58.11
                </tableData>
              </table>
            </ifthen>
          </function>
          <output>propulsion/engine[0]/blade-angle</output>
        </fcs_function>
      </channel>
      <channel name="Propeller Governor 1">
        <!-- T56-A-15 inboard R: the propeller governed at 1020 rpm. The ground range: with weight
             on the wheels and time running, a throttle below 0.2 sets the blades, from
             ground idle's -4.43 deg (no thrust standing still) to the low stop, 15.0,
             and N1 holds the propeller's speed - not below 51.0 %, nor above 56.5 % at
             ground idle rising to the flight range's where it takes over, 62.9 %; past
             1030 rpm the blades open further -->
        <fcs_function name="fcs/propeller-ground-range-1">
          <function>
            <and>
              <gt> <property>simulation/dt</property> <value>0</value> </gt>
              <gt> <property>gear/wow</property> <value>0</value> </gt>
              <lt> <property>fcs/throttle-cmd-norm[1]</property> <value>0.2</value> </lt>
            </and>
          </function>
        </fcs_function>
        <fcs_function name="fcs/propeller-beta-blade-1">
          <function>
            <sum>
              <value>-4.4300</value>
              <product>
                <value>97.15</value>
                <max> <value>0</value> <property>fcs/throttle-cmd-norm[1]</property> </max>
              </product>
            </sum>
          </function>
          <clipto> <min>-4.4300</min> <max>15.0000</max> </clipto>
        </fcs_function>
        <!-- the fuel control: the N1 that holds the governed speed standing still with the
             blades there (sea level), less 0.07052 % for each rpm the propeller runs fast -->
        <fcs_function name="fcs/propeller-beta-n1-1">
          <function>
            <min>
              <sum>
                <value>56.5463</value>
                <product>
                  <value>31.9452</value>
                  <max> <value>0</value> <property>fcs/throttle-cmd-norm[1]</property> </max>
                </product>
              </sum>
              <max>
                <value>51.0000</value>
                <sum>
                  <table>
                    <independentVar>fcs/propeller-beta-blade-1</independentVar>
                    <tableData>
                         -4.43   53.6692
                          0.00   56.4694
                          5.00   61.8638
                         10.00   69.5577
                         15.00   78.7509
                         20.00   88.2933
                    </tableData>
                  </table>
                  <product>
                    <value>0.0705175</value>
                    <difference> <value>1020.0000</value> <property>propulsion/engine[1]/propeller-rpm</property> </difference>
                  </product>
                </sum>
              </max>
            </min>
          </function>
        </fcs_function>
        <!-- JSBSim's turboprop drops its N1 to idle as time runs again after standing still (a
             reset, a trim; its power reads 0 then): in that step the throttle puts N1 back where
             it was, or in the ground range where the fuel control wants it -->
        <fcs_function name="fcs/propeller-throttle-1">
          <function>
            <ifthen>
              <gt> <property>fcs/propeller-ground-range-1</property> <value>0</value> </gt>
              <quotient>
                <difference>
                  <ifthen>
                    <lt> <property>propulsion/engine[1]/power-hp</property> <value>0.5</value> </lt>
                    <ifthen>
                      <gt> <property>fcs/propeller-beta-n1-1</property> <value>53.6692</value> </gt>
                      <sum>
                        <value>53.6692</value>
                        <quotient>
                          <difference> <property>fcs/propeller-beta-n1-1</property> <value>53.6692</value> </difference>
                          <difference>
                            <value>1</value>
                            <exp> <quotient> <property>simulation/dt</property> <value>-1.0000</value> </quotient> </exp>
                          </difference>
                        </quotient>
                      </sum>
                      <quotient>
                        <difference>
                          <property>fcs/propeller-beta-n1-1</property>
                          <product>
                            <value>53.6692</value>
                            <exp> <quotient> <property>simulation/dt</property> <value>-2.4000</value> </quotient> </exp>
                          </product>
                        </difference>
                        <difference>
                          <value>1</value>
                          <exp> <quotient> <property>simulation/dt</property> <value>-2.4000</value> </quotient> </exp>
                        </difference>
                      </quotient>
                    </ifthen>
                    <property>fcs/propeller-beta-n1-1</property>
                  </ifthen>
                  <value>53.6692</value>
                </difference>
                <value>46.3308</value>
              </quotient>
              <ifthen>
                <and>
                  <gt> <property>simulation/dt</property> <value>0</value> </gt>
                  <lt> <property>propulsion/engine[1]/power-hp</property> <value>0.5</value> </lt>
                </and>
                <quotient>
                  <difference> <property>propulsion/engine[1]/n1</property> <value>53.6692</value> </difference>
                  <product>
                    <value>46.3308</value>
                    <difference>
                      <value>1</value>
                      <exp> <quotient> <property>simulation/dt</property> <value>-1.0000</value> </quotient> </exp>
                    </difference>
                  </product>
                </quotient>
                <property>fcs/throttle-cmd-norm[1]</property>
              </ifthen>
            </ifthen>
          </function>
          <output>fcs/throttle-pos-norm[1]</output>
        </fcs_function>
        <!-- the speed's rate of change: the power the engine gives the propeller less the
             power it takes, over its spin inertia (rpm/s); none read while the engine's
             power reads 0 (time stood still) -->
        <fcs_function name="fcs/propeller-rpm-rate-1">
          <function>
            <product>
              <ge> <property>propulsion/engine[1]/power-hp</property> <value>0.5</value> </ge>
              <quotient>
                <difference>
                  <product> <property>propulsion/engine[1]/power-hp</property> <value>550</value> </product>
                  <property>propulsion/engine[1]/propeller-power-ftlbps</property>
                </difference>
                <max>
                  <value>577.501</value>
                  <product> <value>5.66178</value> <property>propulsion/engine[1]/propeller-rpm</property> </product>
                </max>
              </quotient>
            </product>
          </function>
        </fcs_function>
        <fcs_function name="fcs/propeller-advance-1">
          <function>
            <quotient>
              <difference>
                <value>204.0</value>
                <product>
                  <gt> <property>simulation/dt</property> <value>0</value> </gt>
                  <value>0.1500</value>
                  <property>fcs/propeller-rpm-rate-1</property>
                </product>
              </difference>
              <value>306.0</value>
            </quotient>
          </function>
          <clipto> <min>0</min> <max>1</max> </clipto>
          <output>fcs/advance-cmd-norm[1]</output>
        </fcs_function>
        <!-- time standing still: the blades held where they take the engine's power; in the
             ground range: set -->
        <fcs_function name="fcs/propeller-governing-1">
          <function>
            <and>
              <gt> <property>simulation/dt</property> <value>0</value> </gt>
              <lt> <property>fcs/propeller-ground-range-1</property> <value>1</value> </lt>
            </and>
          </function>
          <output>propulsion/engine[1]/constant-speed-mode</output>
        </fcs_function>
        <fcs_function name="fcs/propeller-advance-ratio-1">
          <function>
            <max> <value>0</value> <quotient> <property>velocities/u-aero-fps</property> <value>229.5112</value> </quotient> </max>
          </function>
        </fcs_function>
        <!-- the engine's power coefficient at the governed speed: its core at the throttle's
             N1 (the full one at a start: JSBSim starts engines at full throttle), the lapse -->
        <fcs_function name="fcs/propeller-power-coefficient-1">
          <function>
            <quotient>
              <min>
                <value>4590.3</value>
                <product>
                  <value>4590.3</value>
                  <max>
                    <value>0</value>
                    <quotient>
                      <difference>
                        <pow>
                          <sum>
                            <value>0.5367</value>
                            <product>
                              <value>0.4633</value>
                              <ifthen>
                                <gt> <property>fcs/throttle-pos-norm[1]</property> <value>0.001</value> </gt>
                                <property>fcs/throttle-pos-norm[1]</property>
                                <value>1</value>
                              </ifthen>
                            </product>
                          </sum>
                          <value>3</value>
                        </pow>
                        <value>0.125000</value>
                      </difference>
                      <value>0.875000</value>
                    </quotient>
                  </max>
                  <product>
                    <quotient> <property>atmosphere/P-psf</property> <value>2116.228</value> </quotient>
                    <pow> <sum> <value>1</value> <product> <value>0.2</value> <property>velocities/mach</property> <property>velocities/mach</property> </product> </sum> <value>3.5</value> </pow>
                    <max>
                      <value>0</value>
                      <difference>
                        <value>1</value>
                        <product>
                          <max>
                            <value>0</value>
                            <difference>
                              <product> <quotient> <property>atmosphere/T-R</property> <value>518.67</value> </quotient> <sum> <value>1</value> <product> <value>0.2</value> <property>velocities/mach</property> <property>velocities/mach</property> </product> </sum> </product>
                              <value>1.0000</value>
                            </difference>
                          </max>
                          <table>
                            <independentVar lookup="row">velocities/mach</independentVar>
                            <tableData>
                                0.00    0.0000
                                0.10    0.0000
                                0.20    8.0192
                                0.30    5.1535
                                0.40    4.2484
                                0.50    3.9000
                                0.60    3.8290
                                0.70    3.9654
                                0.80    4.3246
                                0.90    5.0088
                            </tableData>
                          </table>
                        </product>
                      </difference>
                    </max>
                  </product>
                </product>
              </min>
              <product> <property>atmosphere/rho-slugs_ft3</property> <value>4.00644e+06</value> </product>
            </quotient>
          </function>
        </fcs_function>
        <fcs_function name="fcs/propeller-blade-angle-1">
          <function>
            <ifthen>
              <gt> <property>simulation/dt</property> <value>0</value> </gt>
              <ifthen>
                <gt> <property>fcs/propeller-ground-range-1</property> <value>0</value> </gt>
                <min>
                  <value>65.0000</value>
                  <sum>
                    <property>fcs/propeller-beta-blade-1</property>
                    <product>
                      <value>1.03923</value>
                      <max>
                        <value>0</value>
                        <difference> <property>propulsion/engine[1]/propeller-rpm</property> <value>1030.2000</value> </difference>
                      </max>
                    </product>
                  </sum>
                </min>
                <property>propulsion/engine[1]/blade-angle</property>
              </ifthen>
              <table>
                <independentVar lookup="row">fcs/propeller-advance-ratio-1</independentVar>
                <independentVar lookup="column">fcs/propeller-power-coefficient-1</independentVar>
                <tableData>
                    0.00    0.05    0.10    0.15    0.20    0.25    0.30    0.35    0.40    0.45    0.50    0.55    0.60    0.65    0.70    0.75    0.80    0.85    0.90    0.95    1.00    1.05    1.10    1.15    1.20
              0.00    15.00   15.00   15.00   15.00   15.00   17.23   19.50   21.60   23.65   25.73   27.85   29.98   33.38   65.00   65.00   65.00   65.00   65.00   65.00   65.00   65.00   65.00   65.00   65.00   65.00
              0.10    15.00   15.00   15.00   15.00   15.33   17.58   19.83   21.71   23.55   25.41   27.31   29.21   31.60   34.33   65.00   65.00   65.00   65.00   65.00   65.00   65.00   65.00   65.00   65.00   65.00
              0.20    15.00   15.00   15.00   15.00   15.81   18.05   20.23   22.05   23.86   25.61   27.25   28.89   30.68   32.75   34.83   65.00   65.00   65.00   65.00   65.00   65.00   65.00   65.00   65.00   65.00
              0.30    15.00   15.00   15.00   15.00   16.48   18.68   20.71   22.49   24.28   25.90   27.42   28.94   30.50   32.16   33.81   36.06   39.86   65.00   65.00   65.00   65.00   65.00   65.00   65.00   65.00
              0.40    15.00   15.00   15.00   15.10   17.30   19.50   21.34   23.07   24.80   26.31   27.80   29.28   30.68   31.99   33.31   34.63   36.74   39.18   65.00   65.00   65.00   65.00   65.00   65.00   65.00
              0.50    15.00   15.00   15.00   16.11   18.30   20.38   22.08   23.79   25.42   26.85   28.29   29.72   31.02   32.29   33.56   34.83   36.20   37.58   38.96   65.00   65.00   65.00   65.00   65.00   65.00
              0.60    15.00   15.00   15.00   17.22   19.47   21.28   22.96   24.63   26.08   27.47   28.86   30.22   31.45   32.68   33.91   35.12   36.24   37.36   38.48   39.60   42.14   65.00   65.00   65.00   65.00
              0.70    15.00   15.00   16.32   18.65   20.69   22.33   23.97   25.50   26.85   28.19   29.54   30.78   31.97   33.15   34.34   35.48   36.55   37.62   38.70   39.77   40.94   42.15   43.36   44.56   65.00
              0.80    15.00   15.97   18.09   20.16   21.82   23.48   25.11   26.42   27.74   29.05   30.31   31.45   32.58   33.72   34.85   35.90   36.93   37.96   38.99   40.02   40.97   41.93   42.89   43.84   44.80
              0.90    15.76   17.86   19.97   21.61   23.24   24.87   26.17   27.44   28.72   29.99   31.08   32.17   33.26   34.35   35.40   36.39   37.38   38.37   39.36   40.32   41.23   42.14   43.05   43.96   44.87
              1.00    17.92   20.02   21.56   23.11   24.66   25.99   27.25   28.52   29.79   30.88   31.92   32.97   34.02   35.06   36.01   36.95   37.90   38.85   39.80   40.68   41.55   42.42   43.29   44.15   45.02
              1.10    20.27   21.79   23.30   24.81   26.08   27.31   28.54   29.77   30.82   31.82   32.83   33.83   34.84   35.76   36.67   37.58   38.49   39.40   40.28   41.11   41.93   42.76   43.59   44.42   45.23
              1.20    22.30   23.74   25.15   26.34   27.53   28.72   29.92   30.91   31.88   32.86   33.83   34.81   35.69   36.55   37.42   38.28   39.14   40.00   40.79   41.58   42.37   43.16   43.95   44.74   45.49
              1.30    24.33   25.59   26.71   27.83   28.96   30.07   31.03   31.99   32.95   33.91   34.86   35.71   36.53   37.35   38.17   38.99   39.81   40.58   41.34   42.09   42.85   43.60   44.36   45.10   45.80
              1.40    26.18   27.26   28.35   29.44   30.45   31.37   32.29   33.21   34.13   35.05   35.83   36.62   37.40   38.19   38.97   39.75   40.49   41.22   41.94   42.66   43.38   44.10   44.82   45.49   46.16
              1.50    27.96   29.01   30.05   30.94   31.82   32.71   33.59   34.48   35.31   36.06   36.81   37.56   38.30   39.05   39.80   40.51   41.19   41.88   42.57   43.26   43.94   44.63   45.29   45.92   46.55
              1.60    29.80   30.68   31.53   32.38   33.23   34.08   34.93   35.66   36.37   37.09   37.80   38.52   39.23   39.95   40.61   41.26   41.92   42.58   43.23   43.89   44.55   45.18   45.78   46.38   46.98
              1.70    31.40   32.21   33.03   33.84   34.66   35.40   36.08   36.76   37.45   38.13   38.81   39.50   40.16   40.79   41.42   42.04   42.67   43.29   43.92   44.55   45.16   45.73   46.30   46.87   47.44
              1.80    32.90   33.67   34.43   35.18   35.85   36.52   37.19   37.87   38.54   39.21   39.89   40.49   41.08   41.67   42.26   42.85   43.44   44.03   44.62   45.20   45.74   46.28   46.83   47.37   47.91
              1.90    34.45   35.17   35.81   36.45   37.09   37.74   38.38   39.02   39.67   40.27   40.83   41.40   41.96   42.52   43.09   43.65   44.21   44.77   45.31   45.83   46.34   46.86   47.38   47.90   48.41
              2.00    35.88   36.49   37.11   37.72   38.33   38.95   39.56   40.16   40.69   41.23   41.77   42.31   42.85   43.39   43.92   44.46   45.00   45.49   45.98   46.48   46.97   47.46   47.95   48.44   48.94
              2.10    37.21   37.80   38.39   38.98   39.57   40.13   40.65   41.16   41.68   42.19   42.70   43.22   43.73   44.24   44.76   45.25   45.72   46.19   46.65   47.12   47.59   48.06   48.53   49.00   49.47
              2.20    38.53   39.10   39.66   40.19   40.69   41.18   41.67   42.16   42.65   43.14   43.63   44.12   44.61   45.09   45.54   45.98   46.43   46.88   47.32   47.77   48.22   48.67   49.11   49.56   50.01
              2.30    39.84   40.33   40.79   41.26   41.72   42.19   42.66   43.12   43.59   44.05   44.52   44.99   45.42   45.84   46.27   46.70   47.13   47.56   47.99   48.41   48.84   49.27   49.70   50.11   50.50
              2.40    40.90   41.35   41.80   42.26   42.71   43.16   43.61   44.07   44.52   44.97   45.38   45.79   46.20   46.61   47.02   47.43   47.84   48.25   48.65   49.06   49.47   49.88   50.26   50.63   51.00
              2.50    42.00   42.43   42.86   43.30   43.73   44.16   44.59   45.02   45.41   45.81   46.20   46.59   46.98   47.37   47.76   48.15   48.54   48.93   49.32   49.71   50.09   50.45   50.80   51.15   51.51
              2.60    43.08   43.49   43.90   44.32   44.73   45.13   45.50   45.87   46.25   46.62   47.00   47.37   47.74   48.12   48.49   48.86   49.24   49.61   49.98   50.32   50.66   51.00   51.33   51.67   52.01
              2.70    44.12   44.52   44.91   45.28   45.64   45.99   46.35   46.71   47.07   47.42   47.78   48.14   48.49   48.85   49.21   49.57   49.92   50.25   50.57   50.90   51.22   51.54   51.86   52.18   52.51
              2.80    45.13   45.47   45.81   46.16   46.50   46.84   47.18   47.52   47.87   48.21   48.55   48.89   49.23   49.58   49.92   50.23   50.54   50.85   51.16   51.46   51.77   52.08   52.39   52.69   53.00
              2.90    46.06   46.39   46.71   47.04   47.36   47.69   48.01   48.34   48.66   48.99   49.31   49.64   49.96   50.26   50.55   50.85   51.14   51.43   51.73   52.02   52.32   52.61   52.90   53.20   53.49
              3.00    46.93   47.25   47.56   47.87   48.18   48.49   48.80   49.11   49.42   49.73   50.04   50.32   50.60   50.89   51.17   51.45   51.73   52.01   52.29   52.57   52.85   53.14   53.42   53.70   53.98
              3.10    47.78   48.08   48.38   48.68   48.97   49.27   49.57   49.87   50.15   50.42   50.69   50.96   51.23   51.50   51.77   52.04   52.31   52.57   52.84   53.11   53.38   53.65   53.92   54.19   54.46
              3.20    48.61   48.89   49.18   49.46   49.75   50.03   50.29   50.55   50.81   51.06   51.32   51.58   51.84   52.10   52.35   52.61   52.87   53.13   53.39   53.64   53.90   54.16   54.42   54.68   54.93
              3.30    49.41   49.68   49.96   50.21   50.46   50.70   50.95   51.20   51.44   51.69   51.94   52.19   52.43   52.68   52.93   53.18   53.42   53.67   53.92   54.16   54.41   54.66   54.91   55.14   55.36
              3.40    50.17   50.40   50.64   50.88   51.12   51.35   51.59   51.83   52.07   52.30   52.54   52.78   53.01   53.25   53.49   53.73   53.96   54.20   54.44   54.67   54.91   55.14   55.35   55.57   55.78
              3.50    50.85   51.08   51.30   51.53   51.76   51.99   52.21   52.44   52.67   52.90   53.13   53.35   53.58   53.81   54.04   54.26   54.49   54.72   54.95   55.16   55.36   55.57   55.78   55.98   56.19
              3.60    51.51   51.73   51.94   52.16   52.38   52.60   52.82   53.04   53.26   53.48   53.69   53.91   54.13   54.35   54.57   54.79   55.01   55.20   55.40   55.60   55.80   56.00   56.19   56.39   56.59
              3.70    52.14   52.35   52.56   52.78   52.99   53.20   53.41   53.62   53.83   54.04   54.25   54.46   54.67   54.88   55.08   55.27   55.46   55.65   55.84   56.03   56.22   56.41   56.60   56.79   56.98
              3.80    52.77   52.97   53.17   53.37   53.58   53.78   53.98   54.18   54.38   54.59   54.79   54.99   55.17   55.36   55.54   55.72   55.90   56.09   56.27   56.45   56.63   56.82   57.00   57.18   57.36
              3.90    53.37   53.56   53.76   53.95   54.15   54.34   54.54   54.73   54.93   55.11   55.28   55.46   55.63   55.81   55.99   56.16   56.34   56.51   56.69   56.86   57.04   57.21   57.39   57.57   57.74
              4.00    53.95   54.14   54.33   54.52   54.70   54.89   55.07   55.24   55.41   55.58   55.75   55.91   56.08   56.25   56.42   56.59   56.76   56.93   57.10   57.26   57.43   57.60   57.77   57.94   58.11
                </tableData>
              </table>
            </ifthen>
          </function>
          <output>propulsion/engine[1]/blade-angle</output>
        </fcs_function>
      </channel>
      <channel name="Propeller Governor 2">
        <!-- T56-A-15 outboard L: the propeller governed at 1020 rpm. The ground range: with weight
             on the wheels and time running, a throttle below 0.2 sets the blades, from
             ground idle's -4.43 deg (no thrust standing still) to the low stop, 15.0,
             and N1 holds the propeller's speed - not below 51.0 %, nor above 56.5 % at
             ground idle rising to the flight range's where it takes over, 62.9 %; past
             1030 rpm the blades open further -->
        <fcs_function name="fcs/propeller-ground-range-2">
          <function>
            <and>
              <gt> <property>simulation/dt</property> <value>0</value> </gt>
              <gt> <property>gear/wow</property> <value>0</value> </gt>
              <lt> <property>fcs/throttle-cmd-norm[2]</property> <value>0.2</value> </lt>
            </and>
          </function>
        </fcs_function>
        <fcs_function name="fcs/propeller-beta-blade-2">
          <function>
            <sum>
              <value>-4.4300</value>
              <product>
                <value>97.15</value>
                <max> <value>0</value> <property>fcs/throttle-cmd-norm[2]</property> </max>
              </product>
            </sum>
          </function>
          <clipto> <min>-4.4300</min> <max>15.0000</max> </clipto>
        </fcs_function>
        <!-- the fuel control: the N1 that holds the governed speed standing still with the
             blades there (sea level), less 0.07052 % for each rpm the propeller runs fast -->
        <fcs_function name="fcs/propeller-beta-n1-2">
          <function>
            <min>
              <sum>
                <value>56.5463</value>
                <product>
                  <value>31.9452</value>
                  <max> <value>0</value> <property>fcs/throttle-cmd-norm[2]</property> </max>
                </product>
              </sum>
              <max>
                <value>51.0000</value>
                <sum>
                  <table>
                    <independentVar>fcs/propeller-beta-blade-2</independentVar>
                    <tableData>
                         -4.43   53.6692
                          0.00   56.4694
                          5.00   61.8638
                         10.00   69.5577
                         15.00   78.7509
                         20.00   88.2933
                    </tableData>
                  </table>
                  <product>
                    <value>0.0705175</value>
                    <difference> <value>1020.0000</value> <property>propulsion/engine[2]/propeller-rpm</property> </difference>
                  </product>
                </sum>
              </max>
            </min>
          </function>
        </fcs_function>
        <!-- JSBSim's turboprop drops its N1 to idle as time runs again after standing still (a
             reset, a trim; its power reads 0 then): in that step the throttle puts N1 back where
             it was, or in the ground range where the fuel control wants it -->
        <fcs_function name="fcs/propeller-throttle-2">
          <function>
            <ifthen>
              <gt> <property>fcs/propeller-ground-range-2</property> <value>0</value> </gt>
              <quotient>
                <difference>
                  <ifthen>
                    <lt> <property>propulsion/engine[2]/power-hp</property> <value>0.5</value> </lt>
                    <ifthen>
                      <gt> <property>fcs/propeller-beta-n1-2</property> <value>53.6692</value> </gt>
                      <sum>
                        <value>53.6692</value>
                        <quotient>
                          <difference> <property>fcs/propeller-beta-n1-2</property> <value>53.6692</value> </difference>
                          <difference>
                            <value>1</value>
                            <exp> <quotient> <property>simulation/dt</property> <value>-1.0000</value> </quotient> </exp>
                          </difference>
                        </quotient>
                      </sum>
                      <quotient>
                        <difference>
                          <property>fcs/propeller-beta-n1-2</property>
                          <product>
                            <value>53.6692</value>
                            <exp> <quotient> <property>simulation/dt</property> <value>-2.4000</value> </quotient> </exp>
                          </product>
                        </difference>
                        <difference>
                          <value>1</value>
                          <exp> <quotient> <property>simulation/dt</property> <value>-2.4000</value> </quotient> </exp>
                        </difference>
                      </quotient>
                    </ifthen>
                    <property>fcs/propeller-beta-n1-2</property>
                  </ifthen>
                  <value>53.6692</value>
                </difference>
                <value>46.3308</value>
              </quotient>
              <ifthen>
                <and>
                  <gt> <property>simulation/dt</property> <value>0</value> </gt>
                  <lt> <property>propulsion/engine[2]/power-hp</property> <value>0.5</value> </lt>
                </and>
                <quotient>
                  <difference> <property>propulsion/engine[2]/n1</property> <value>53.6692</value> </difference>
                  <product>
                    <value>46.3308</value>
                    <difference>
                      <value>1</value>
                      <exp> <quotient> <property>simulation/dt</property> <value>-1.0000</value> </quotient> </exp>
                    </difference>
                  </product>
                </quotient>
                <property>fcs/throttle-cmd-norm[2]</property>
              </ifthen>
            </ifthen>
          </function>
          <output>fcs/throttle-pos-norm[2]</output>
        </fcs_function>
        <!-- the speed's rate of change: the power the engine gives the propeller less the
             power it takes, over its spin inertia (rpm/s); none read while the engine's
             power reads 0 (time stood still) -->
        <fcs_function name="fcs/propeller-rpm-rate-2">
          <function>
            <product>
              <ge> <property>propulsion/engine[2]/power-hp</property> <value>0.5</value> </ge>
              <quotient>
                <difference>
                  <product> <property>propulsion/engine[2]/power-hp</property> <value>550</value> </product>
                  <property>propulsion/engine[2]/propeller-power-ftlbps</property>
                </difference>
                <max>
                  <value>577.501</value>
                  <product> <value>5.66178</value> <property>propulsion/engine[2]/propeller-rpm</property> </product>
                </max>
              </quotient>
            </product>
          </function>
        </fcs_function>
        <fcs_function name="fcs/propeller-advance-2">
          <function>
            <quotient>
              <difference>
                <value>204.0</value>
                <product>
                  <gt> <property>simulation/dt</property> <value>0</value> </gt>
                  <value>0.1500</value>
                  <property>fcs/propeller-rpm-rate-2</property>
                </product>
              </difference>
              <value>306.0</value>
            </quotient>
          </function>
          <clipto> <min>0</min> <max>1</max> </clipto>
          <output>fcs/advance-cmd-norm[2]</output>
        </fcs_function>
        <!-- time standing still: the blades held where they take the engine's power; in the
             ground range: set -->
        <fcs_function name="fcs/propeller-governing-2">
          <function>
            <and>
              <gt> <property>simulation/dt</property> <value>0</value> </gt>
              <lt> <property>fcs/propeller-ground-range-2</property> <value>1</value> </lt>
            </and>
          </function>
          <output>propulsion/engine[2]/constant-speed-mode</output>
        </fcs_function>
        <fcs_function name="fcs/propeller-advance-ratio-2">
          <function>
            <max> <value>0</value> <quotient> <property>velocities/u-aero-fps</property> <value>229.5112</value> </quotient> </max>
          </function>
        </fcs_function>
        <!-- the engine's power coefficient at the governed speed: its core at the throttle's
             N1 (the full one at a start: JSBSim starts engines at full throttle), the lapse -->
        <fcs_function name="fcs/propeller-power-coefficient-2">
          <function>
            <quotient>
              <min>
                <value>4590.3</value>
                <product>
                  <value>4590.3</value>
                  <max>
                    <value>0</value>
                    <quotient>
                      <difference>
                        <pow>
                          <sum>
                            <value>0.5367</value>
                            <product>
                              <value>0.4633</value>
                              <ifthen>
                                <gt> <property>fcs/throttle-pos-norm[2]</property> <value>0.001</value> </gt>
                                <property>fcs/throttle-pos-norm[2]</property>
                                <value>1</value>
                              </ifthen>
                            </product>
                          </sum>
                          <value>3</value>
                        </pow>
                        <value>0.125000</value>
                      </difference>
                      <value>0.875000</value>
                    </quotient>
                  </max>
                  <product>
                    <quotient> <property>atmosphere/P-psf</property> <value>2116.228</value> </quotient>
                    <pow> <sum> <value>1</value> <product> <value>0.2</value> <property>velocities/mach</property> <property>velocities/mach</property> </product> </sum> <value>3.5</value> </pow>
                    <max>
                      <value>0</value>
                      <difference>
                        <value>1</value>
                        <product>
                          <max>
                            <value>0</value>
                            <difference>
                              <product> <quotient> <property>atmosphere/T-R</property> <value>518.67</value> </quotient> <sum> <value>1</value> <product> <value>0.2</value> <property>velocities/mach</property> <property>velocities/mach</property> </product> </sum> </product>
                              <value>1.0000</value>
                            </difference>
                          </max>
                          <table>
                            <independentVar lookup="row">velocities/mach</independentVar>
                            <tableData>
                                0.00    0.0000
                                0.10    0.0000
                                0.20    8.0192
                                0.30    5.1535
                                0.40    4.2484
                                0.50    3.9000
                                0.60    3.8290
                                0.70    3.9654
                                0.80    4.3246
                                0.90    5.0088
                            </tableData>
                          </table>
                        </product>
                      </difference>
                    </max>
                  </product>
                </product>
              </min>
              <product> <property>atmosphere/rho-slugs_ft3</property> <value>4.00644e+06</value> </product>
            </quotient>
          </function>
        </fcs_function>
        <fcs_function name="fcs/propeller-blade-angle-2">
          <function>
            <ifthen>
              <gt> <property>simulation/dt</property> <value>0</value> </gt>
              <ifthen>
                <gt> <property>fcs/propeller-ground-range-2</property> <value>0</value> </gt>
                <min>
                  <value>65.0000</value>
                  <sum>
                    <property>fcs/propeller-beta-blade-2</property>
                    <product>
                      <value>1.03923</value>
                      <max>
                        <value>0</value>
                        <difference> <property>propulsion/engine[2]/propeller-rpm</property> <value>1030.2000</value> </difference>
                      </max>
                    </product>
                  </sum>
                </min>
                <property>propulsion/engine[2]/blade-angle</property>
              </ifthen>
              <table>
                <independentVar lookup="row">fcs/propeller-advance-ratio-2</independentVar>
                <independentVar lookup="column">fcs/propeller-power-coefficient-2</independentVar>
                <tableData>
                    0.00    0.05    0.10    0.15    0.20    0.25    0.30    0.35    0.40    0.45    0.50    0.55    0.60    0.65    0.70    0.75    0.80    0.85    0.90    0.95    1.00    1.05    1.10    1.15    1.20
              0.00    15.00   15.00   15.00   15.00   15.00   17.23   19.50   21.60   23.65   25.73   27.85   29.98   33.38   65.00   65.00   65.00   65.00   65.00   65.00   65.00   65.00   65.00   65.00   65.00   65.00
              0.10    15.00   15.00   15.00   15.00   15.33   17.58   19.83   21.71   23.55   25.41   27.31   29.21   31.60   34.33   65.00   65.00   65.00   65.00   65.00   65.00   65.00   65.00   65.00   65.00   65.00
              0.20    15.00   15.00   15.00   15.00   15.81   18.05   20.23   22.05   23.86   25.61   27.25   28.89   30.68   32.75   34.83   65.00   65.00   65.00   65.00   65.00   65.00   65.00   65.00   65.00   65.00
              0.30    15.00   15.00   15.00   15.00   16.48   18.68   20.71   22.49   24.28   25.90   27.42   28.94   30.50   32.16   33.81   36.06   39.86   65.00   65.00   65.00   65.00   65.00   65.00   65.00   65.00
              0.40    15.00   15.00   15.00   15.10   17.30   19.50   21.34   23.07   24.80   26.31   27.80   29.28   30.68   31.99   33.31   34.63   36.74   39.18   65.00   65.00   65.00   65.00   65.00   65.00   65.00
              0.50    15.00   15.00   15.00   16.11   18.30   20.38   22.08   23.79   25.42   26.85   28.29   29.72   31.02   32.29   33.56   34.83   36.20   37.58   38.96   65.00   65.00   65.00   65.00   65.00   65.00
              0.60    15.00   15.00   15.00   17.22   19.47   21.28   22.96   24.63   26.08   27.47   28.86   30.22   31.45   32.68   33.91   35.12   36.24   37.36   38.48   39.60   42.14   65.00   65.00   65.00   65.00
              0.70    15.00   15.00   16.32   18.65   20.69   22.33   23.97   25.50   26.85   28.19   29.54   30.78   31.97   33.15   34.34   35.48   36.55   37.62   38.70   39.77   40.94   42.15   43.36   44.56   65.00
              0.80    15.00   15.97   18.09   20.16   21.82   23.48   25.11   26.42   27.74   29.05   30.31   31.45   32.58   33.72   34.85   35.90   36.93   37.96   38.99   40.02   40.97   41.93   42.89   43.84   44.80
              0.90    15.76   17.86   19.97   21.61   23.24   24.87   26.17   27.44   28.72   29.99   31.08   32.17   33.26   34.35   35.40   36.39   37.38   38.37   39.36   40.32   41.23   42.14   43.05   43.96   44.87
              1.00    17.92   20.02   21.56   23.11   24.66   25.99   27.25   28.52   29.79   30.88   31.92   32.97   34.02   35.06   36.01   36.95   37.90   38.85   39.80   40.68   41.55   42.42   43.29   44.15   45.02
              1.10    20.27   21.79   23.30   24.81   26.08   27.31   28.54   29.77   30.82   31.82   32.83   33.83   34.84   35.76   36.67   37.58   38.49   39.40   40.28   41.11   41.93   42.76   43.59   44.42   45.23
              1.20    22.30   23.74   25.15   26.34   27.53   28.72   29.92   30.91   31.88   32.86   33.83   34.81   35.69   36.55   37.42   38.28   39.14   40.00   40.79   41.58   42.37   43.16   43.95   44.74   45.49
              1.30    24.33   25.59   26.71   27.83   28.96   30.07   31.03   31.99   32.95   33.91   34.86   35.71   36.53   37.35   38.17   38.99   39.81   40.58   41.34   42.09   42.85   43.60   44.36   45.10   45.80
              1.40    26.18   27.26   28.35   29.44   30.45   31.37   32.29   33.21   34.13   35.05   35.83   36.62   37.40   38.19   38.97   39.75   40.49   41.22   41.94   42.66   43.38   44.10   44.82   45.49   46.16
              1.50    27.96   29.01   30.05   30.94   31.82   32.71   33.59   34.48   35.31   36.06   36.81   37.56   38.30   39.05   39.80   40.51   41.19   41.88   42.57   43.26   43.94   44.63   45.29   45.92   46.55
              1.60    29.80   30.68   31.53   32.38   33.23   34.08   34.93   35.66   36.37   37.09   37.80   38.52   39.23   39.95   40.61   41.26   41.92   42.58   43.23   43.89   44.55   45.18   45.78   46.38   46.98
              1.70    31.40   32.21   33.03   33.84   34.66   35.40   36.08   36.76   37.45   38.13   38.81   39.50   40.16   40.79   41.42   42.04   42.67   43.29   43.92   44.55   45.16   45.73   46.30   46.87   47.44
              1.80    32.90   33.67   34.43   35.18   35.85   36.52   37.19   37.87   38.54   39.21   39.89   40.49   41.08   41.67   42.26   42.85   43.44   44.03   44.62   45.20   45.74   46.28   46.83   47.37   47.91
              1.90    34.45   35.17   35.81   36.45   37.09   37.74   38.38   39.02   39.67   40.27   40.83   41.40   41.96   42.52   43.09   43.65   44.21   44.77   45.31   45.83   46.34   46.86   47.38   47.90   48.41
              2.00    35.88   36.49   37.11   37.72   38.33   38.95   39.56   40.16   40.69   41.23   41.77   42.31   42.85   43.39   43.92   44.46   45.00   45.49   45.98   46.48   46.97   47.46   47.95   48.44   48.94
              2.10    37.21   37.80   38.39   38.98   39.57   40.13   40.65   41.16   41.68   42.19   42.70   43.22   43.73   44.24   44.76   45.25   45.72   46.19   46.65   47.12   47.59   48.06   48.53   49.00   49.47
              2.20    38.53   39.10   39.66   40.19   40.69   41.18   41.67   42.16   42.65   43.14   43.63   44.12   44.61   45.09   45.54   45.98   46.43   46.88   47.32   47.77   48.22   48.67   49.11   49.56   50.01
              2.30    39.84   40.33   40.79   41.26   41.72   42.19   42.66   43.12   43.59   44.05   44.52   44.99   45.42   45.84   46.27   46.70   47.13   47.56   47.99   48.41   48.84   49.27   49.70   50.11   50.50
              2.40    40.90   41.35   41.80   42.26   42.71   43.16   43.61   44.07   44.52   44.97   45.38   45.79   46.20   46.61   47.02   47.43   47.84   48.25   48.65   49.06   49.47   49.88   50.26   50.63   51.00
              2.50    42.00   42.43   42.86   43.30   43.73   44.16   44.59   45.02   45.41   45.81   46.20   46.59   46.98   47.37   47.76   48.15   48.54   48.93   49.32   49.71   50.09   50.45   50.80   51.15   51.51
              2.60    43.08   43.49   43.90   44.32   44.73   45.13   45.50   45.87   46.25   46.62   47.00   47.37   47.74   48.12   48.49   48.86   49.24   49.61   49.98   50.32   50.66   51.00   51.33   51.67   52.01
              2.70    44.12   44.52   44.91   45.28   45.64   45.99   46.35   46.71   47.07   47.42   47.78   48.14   48.49   48.85   49.21   49.57   49.92   50.25   50.57   50.90   51.22   51.54   51.86   52.18   52.51
              2.80    45.13   45.47   45.81   46.16   46.50   46.84   47.18   47.52   47.87   48.21   48.55   48.89   49.23   49.58   49.92   50.23   50.54   50.85   51.16   51.46   51.77   52.08   52.39   52.69   53.00
              2.90    46.06   46.39   46.71   47.04   47.36   47.69   48.01   48.34   48.66   48.99   49.31   49.64   49.96   50.26   50.55   50.85   51.14   51.43   51.73   52.02   52.32   52.61   52.90   53.20   53.49
              3.00    46.93   47.25   47.56   47.87   48.18   48.49   48.80   49.11   49.42   49.73   50.04   50.32   50.60   50.89   51.17   51.45   51.73   52.01   52.29   52.57   52.85   53.14   53.42   53.70   53.98
              3.10    47.78   48.08   48.38   48.68   48.97   49.27   49.57   49.87   50.15   50.42   50.69   50.96   51.23   51.50   51.77   52.04   52.31   52.57   52.84   53.11   53.38   53.65   53.92   54.19   54.46
              3.20    48.61   48.89   49.18   49.46   49.75   50.03   50.29   50.55   50.81   51.06   51.32   51.58   51.84   52.10   52.35   52.61   52.87   53.13   53.39   53.64   53.90   54.16   54.42   54.68   54.93
              3.30    49.41   49.68   49.96   50.21   50.46   50.70   50.95   51.20   51.44   51.69   51.94   52.19   52.43   52.68   52.93   53.18   53.42   53.67   53.92   54.16   54.41   54.66   54.91   55.14   55.36
              3.40    50.17   50.40   50.64   50.88   51.12   51.35   51.59   51.83   52.07   52.30   52.54   52.78   53.01   53.25   53.49   53.73   53.96   54.20   54.44   54.67   54.91   55.14   55.35   55.57   55.78
              3.50    50.85   51.08   51.30   51.53   51.76   51.99   52.21   52.44   52.67   52.90   53.13   53.35   53.58   53.81   54.04   54.26   54.49   54.72   54.95   55.16   55.36   55.57   55.78   55.98   56.19
              3.60    51.51   51.73   51.94   52.16   52.38   52.60   52.82   53.04   53.26   53.48   53.69   53.91   54.13   54.35   54.57   54.79   55.01   55.20   55.40   55.60   55.80   56.00   56.19   56.39   56.59
              3.70    52.14   52.35   52.56   52.78   52.99   53.20   53.41   53.62   53.83   54.04   54.25   54.46   54.67   54.88   55.08   55.27   55.46   55.65   55.84   56.03   56.22   56.41   56.60   56.79   56.98
              3.80    52.77   52.97   53.17   53.37   53.58   53.78   53.98   54.18   54.38   54.59   54.79   54.99   55.17   55.36   55.54   55.72   55.90   56.09   56.27   56.45   56.63   56.82   57.00   57.18   57.36
              3.90    53.37   53.56   53.76   53.95   54.15   54.34   54.54   54.73   54.93   55.11   55.28   55.46   55.63   55.81   55.99   56.16   56.34   56.51   56.69   56.86   57.04   57.21   57.39   57.57   57.74
              4.00    53.95   54.14   54.33   54.52   54.70   54.89   55.07   55.24   55.41   55.58   55.75   55.91   56.08   56.25   56.42   56.59   56.76   56.93   57.10   57.26   57.43   57.60   57.77   57.94   58.11
                </tableData>
              </table>
            </ifthen>
          </function>
          <output>propulsion/engine[2]/blade-angle</output>
        </fcs_function>
      </channel>
      <channel name="Propeller Governor 3">
        <!-- T56-A-15 outboard R: the propeller governed at 1020 rpm. The ground range: with weight
             on the wheels and time running, a throttle below 0.2 sets the blades, from
             ground idle's -4.43 deg (no thrust standing still) to the low stop, 15.0,
             and N1 holds the propeller's speed - not below 51.0 %, nor above 56.5 % at
             ground idle rising to the flight range's where it takes over, 62.9 %; past
             1030 rpm the blades open further -->
        <fcs_function name="fcs/propeller-ground-range-3">
          <function>
            <and>
              <gt> <property>simulation/dt</property> <value>0</value> </gt>
              <gt> <property>gear/wow</property> <value>0</value> </gt>
              <lt> <property>fcs/throttle-cmd-norm[3]</property> <value>0.2</value> </lt>
            </and>
          </function>
        </fcs_function>
        <fcs_function name="fcs/propeller-beta-blade-3">
          <function>
            <sum>
              <value>-4.4300</value>
              <product>
                <value>97.15</value>
                <max> <value>0</value> <property>fcs/throttle-cmd-norm[3]</property> </max>
              </product>
            </sum>
          </function>
          <clipto> <min>-4.4300</min> <max>15.0000</max> </clipto>
        </fcs_function>
        <!-- the fuel control: the N1 that holds the governed speed standing still with the
             blades there (sea level), less 0.07052 % for each rpm the propeller runs fast -->
        <fcs_function name="fcs/propeller-beta-n1-3">
          <function>
            <min>
              <sum>
                <value>56.5463</value>
                <product>
                  <value>31.9452</value>
                  <max> <value>0</value> <property>fcs/throttle-cmd-norm[3]</property> </max>
                </product>
              </sum>
              <max>
                <value>51.0000</value>
                <sum>
                  <table>
                    <independentVar>fcs/propeller-beta-blade-3</independentVar>
                    <tableData>
                         -4.43   53.6692
                          0.00   56.4694
                          5.00   61.8638
                         10.00   69.5577
                         15.00   78.7509
                         20.00   88.2933
                    </tableData>
                  </table>
                  <product>
                    <value>0.0705175</value>
                    <difference> <value>1020.0000</value> <property>propulsion/engine[3]/propeller-rpm</property> </difference>
                  </product>
                </sum>
              </max>
            </min>
          </function>
        </fcs_function>
        <!-- JSBSim's turboprop drops its N1 to idle as time runs again after standing still (a
             reset, a trim; its power reads 0 then): in that step the throttle puts N1 back where
             it was, or in the ground range where the fuel control wants it -->
        <fcs_function name="fcs/propeller-throttle-3">
          <function>
            <ifthen>
              <gt> <property>fcs/propeller-ground-range-3</property> <value>0</value> </gt>
              <quotient>
                <difference>
                  <ifthen>
                    <lt> <property>propulsion/engine[3]/power-hp</property> <value>0.5</value> </lt>
                    <ifthen>
                      <gt> <property>fcs/propeller-beta-n1-3</property> <value>53.6692</value> </gt>
                      <sum>
                        <value>53.6692</value>
                        <quotient>
                          <difference> <property>fcs/propeller-beta-n1-3</property> <value>53.6692</value> </difference>
                          <difference>
                            <value>1</value>
                            <exp> <quotient> <property>simulation/dt</property> <value>-1.0000</value> </quotient> </exp>
                          </difference>
                        </quotient>
                      </sum>
                      <quotient>
                        <difference>
                          <property>fcs/propeller-beta-n1-3</property>
                          <product>
                            <value>53.6692</value>
                            <exp> <quotient> <property>simulation/dt</property> <value>-2.4000</value> </quotient> </exp>
                          </product>
                        </difference>
                        <difference>
                          <value>1</value>
                          <exp> <quotient> <property>simulation/dt</property> <value>-2.4000</value> </quotient> </exp>
                        </difference>
                      </quotient>
                    </ifthen>
                    <property>fcs/propeller-beta-n1-3</property>
                  </ifthen>
                  <value>53.6692</value>
                </difference>
                <value>46.3308</value>
              </quotient>
              <ifthen>
                <and>
                  <gt> <property>simulation/dt</property> <value>0</value> </gt>
                  <lt> <property>propulsion/engine[3]/power-hp</property> <value>0.5</value> </lt>
                </and>
                <quotient>
                  <difference> <property>propulsion/engine[3]/n1</property> <value>53.6692</value> </difference>
                  <product>
                    <value>46.3308</value>
                    <difference>
                      <value>1</value>
                      <exp> <quotient> <property>simulation/dt</property> <value>-1.0000</value> </quotient> </exp>
                    </difference>
                  </product>
                </quotient>
                <property>fcs/throttle-cmd-norm[3]</property>
              </ifthen>
            </ifthen>
          </function>
          <output>fcs/throttle-pos-norm[3]</output>
        </fcs_function>
        <!-- the speed's rate of change: the power the engine gives the propeller less the
             power it takes, over its spin inertia (rpm/s); none read while the engine's
             power reads 0 (time stood still) -->
        <fcs_function name="fcs/propeller-rpm-rate-3">
          <function>
            <product>
              <ge> <property>propulsion/engine[3]/power-hp</property> <value>0.5</value> </ge>
              <quotient>
                <difference>
                  <product> <property>propulsion/engine[3]/power-hp</property> <value>550</value> </product>
                  <property>propulsion/engine[3]/propeller-power-ftlbps</property>
                </difference>
                <max>
                  <value>577.501</value>
                  <product> <value>5.66178</value> <property>propulsion/engine[3]/propeller-rpm</property> </product>
                </max>
              </quotient>
            </product>
          </function>
        </fcs_function>
        <fcs_function name="fcs/propeller-advance-3">
          <function>
            <quotient>
              <difference>
                <value>204.0</value>
                <product>
                  <gt> <property>simulation/dt</property> <value>0</value> </gt>
                  <value>0.1500</value>
                  <property>fcs/propeller-rpm-rate-3</property>
                </product>
              </difference>
              <value>306.0</value>
            </quotient>
          </function>
          <clipto> <min>0</min> <max>1</max> </clipto>
          <output>fcs/advance-cmd-norm[3]</output>
        </fcs_function>
        <!-- time standing still: the blades held where they take the engine's power; in the
             ground range: set -->
        <fcs_function name="fcs/propeller-governing-3">
          <function>
            <and>
              <gt> <property>simulation/dt</property> <value>0</value> </gt>
              <lt> <property>fcs/propeller-ground-range-3</property> <value>1</value> </lt>
            </and>
          </function>
          <output>propulsion/engine[3]/constant-speed-mode</output>
        </fcs_function>
        <fcs_function name="fcs/propeller-advance-ratio-3">
          <function>
            <max> <value>0</value> <quotient> <property>velocities/u-aero-fps</property> <value>229.5112</value> </quotient> </max>
          </function>
        </fcs_function>
        <!-- the engine's power coefficient at the governed speed: its core at the throttle's
             N1 (the full one at a start: JSBSim starts engines at full throttle), the lapse -->
        <fcs_function name="fcs/propeller-power-coefficient-3">
          <function>
            <quotient>
              <min>
                <value>4590.3</value>
                <product>
                  <value>4590.3</value>
                  <max>
                    <value>0</value>
                    <quotient>
                      <difference>
                        <pow>
                          <sum>
                            <value>0.5367</value>
                            <product>
                              <value>0.4633</value>
                              <ifthen>
                                <gt> <property>fcs/throttle-pos-norm[3]</property> <value>0.001</value> </gt>
                                <property>fcs/throttle-pos-norm[3]</property>
                                <value>1</value>
                              </ifthen>
                            </product>
                          </sum>
                          <value>3</value>
                        </pow>
                        <value>0.125000</value>
                      </difference>
                      <value>0.875000</value>
                    </quotient>
                  </max>
                  <product>
                    <quotient> <property>atmosphere/P-psf</property> <value>2116.228</value> </quotient>
                    <pow> <sum> <value>1</value> <product> <value>0.2</value> <property>velocities/mach</property> <property>velocities/mach</property> </product> </sum> <value>3.5</value> </pow>
                    <max>
                      <value>0</value>
                      <difference>
                        <value>1</value>
                        <product>
                          <max>
                            <value>0</value>
                            <difference>
                              <product> <quotient> <property>atmosphere/T-R</property> <value>518.67</value> </quotient> <sum> <value>1</value> <product> <value>0.2</value> <property>velocities/mach</property> <property>velocities/mach</property> </product> </sum> </product>
                              <value>1.0000</value>
                            </difference>
                          </max>
                          <table>
                            <independentVar lookup="row">velocities/mach</independentVar>
                            <tableData>
                                0.00    0.0000
                                0.10    0.0000
                                0.20    8.0192
                                0.30    5.1535
                                0.40    4.2484
                                0.50    3.9000
                                0.60    3.8290
                                0.70    3.9654
                                0.80    4.3246
                                0.90    5.0088
                            </tableData>
                          </table>
                        </product>
                      </difference>
                    </max>
                  </product>
                </product>
              </min>
              <product> <property>atmosphere/rho-slugs_ft3</property> <value>4.00644e+06</value> </product>
            </quotient>
          </function>
        </fcs_function>
        <fcs_function name="fcs/propeller-blade-angle-3">
          <function>
            <ifthen>
              <gt> <property>simulation/dt</property> <value>0</value> </gt>
              <ifthen>
                <gt> <property>fcs/propeller-ground-range-3</property> <value>0</value> </gt>
                <min>
                  <value>65.0000</value>
                  <sum>
                    <property>fcs/propeller-beta-blade-3</property>
                    <product>
                      <value>1.03923</value>
                      <max>
                        <value>0</value>
                        <difference> <property>propulsion/engine[3]/propeller-rpm</property> <value>1030.2000</value> </difference>
                      </max>
                    </product>
                  </sum>
                </min>
                <property>propulsion/engine[3]/blade-angle</property>
              </ifthen>
              <table>
                <independentVar lookup="row">fcs/propeller-advance-ratio-3</independentVar>
                <independentVar lookup="column">fcs/propeller-power-coefficient-3</independentVar>
                <tableData>
                    0.00    0.05    0.10    0.15    0.20    0.25    0.30    0.35    0.40    0.45    0.50    0.55    0.60    0.65    0.70    0.75    0.80    0.85    0.90    0.95    1.00    1.05    1.10    1.15    1.20
              0.00    15.00   15.00   15.00   15.00   15.00   17.23   19.50   21.60   23.65   25.73   27.85   29.98   33.38   65.00   65.00   65.00   65.00   65.00   65.00   65.00   65.00   65.00   65.00   65.00   65.00
              0.10    15.00   15.00   15.00   15.00   15.33   17.58   19.83   21.71   23.55   25.41   27.31   29.21   31.60   34.33   65.00   65.00   65.00   65.00   65.00   65.00   65.00   65.00   65.00   65.00   65.00
              0.20    15.00   15.00   15.00   15.00   15.81   18.05   20.23   22.05   23.86   25.61   27.25   28.89   30.68   32.75   34.83   65.00   65.00   65.00   65.00   65.00   65.00   65.00   65.00   65.00   65.00
              0.30    15.00   15.00   15.00   15.00   16.48   18.68   20.71   22.49   24.28   25.90   27.42   28.94   30.50   32.16   33.81   36.06   39.86   65.00   65.00   65.00   65.00   65.00   65.00   65.00   65.00
              0.40    15.00   15.00   15.00   15.10   17.30   19.50   21.34   23.07   24.80   26.31   27.80   29.28   30.68   31.99   33.31   34.63   36.74   39.18   65.00   65.00   65.00   65.00   65.00   65.00   65.00
              0.50    15.00   15.00   15.00   16.11   18.30   20.38   22.08   23.79   25.42   26.85   28.29   29.72   31.02   32.29   33.56   34.83   36.20   37.58   38.96   65.00   65.00   65.00   65.00   65.00   65.00
              0.60    15.00   15.00   15.00   17.22   19.47   21.28   22.96   24.63   26.08   27.47   28.86   30.22   31.45   32.68   33.91   35.12   36.24   37.36   38.48   39.60   42.14   65.00   65.00   65.00   65.00
              0.70    15.00   15.00   16.32   18.65   20.69   22.33   23.97   25.50   26.85   28.19   29.54   30.78   31.97   33.15   34.34   35.48   36.55   37.62   38.70   39.77   40.94   42.15   43.36   44.56   65.00
              0.80    15.00   15.97   18.09   20.16   21.82   23.48   25.11   26.42   27.74   29.05   30.31   31.45   32.58   33.72   34.85   35.90   36.93   37.96   38.99   40.02   40.97   41.93   42.89   43.84   44.80
              0.90    15.76   17.86   19.97   21.61   23.24   24.87   26.17   27.44   28.72   29.99   31.08   32.17   33.26   34.35   35.40   36.39   37.38   38.37   39.36   40.32   41.23   42.14   43.05   43.96   44.87
              1.00    17.92   20.02   21.56   23.11   24.66   25.99   27.25   28.52   29.79   30.88   31.92   32.97   34.02   35.06   36.01   36.95   37.90   38.85   39.80   40.68   41.55   42.42   43.29   44.15   45.02
              1.10    20.27   21.79   23.30   24.81   26.08   27.31   28.54   29.77   30.82   31.82   32.83   33.83   34.84   35.76   36.67   37.58   38.49   39.40   40.28   41.11   41.93   42.76   43.59   44.42   45.23
              1.20    22.30   23.74   25.15   26.34   27.53   28.72   29.92   30.91   31.88   32.86   33.83   34.81   35.69   36.55   37.42   38.28   39.14   40.00   40.79   41.58   42.37   43.16   43.95   44.74   45.49
              1.30    24.33   25.59   26.71   27.83   28.96   30.07   31.03   31.99   32.95   33.91   34.86   35.71   36.53   37.35   38.17   38.99   39.81   40.58   41.34   42.09   42.85   43.60   44.36   45.10   45.80
              1.40    26.18   27.26   28.35   29.44   30.45   31.37   32.29   33.21   34.13   35.05   35.83   36.62   37.40   38.19   38.97   39.75   40.49   41.22   41.94   42.66   43.38   44.10   44.82   45.49   46.16
              1.50    27.96   29.01   30.05   30.94   31.82   32.71   33.59   34.48   35.31   36.06   36.81   37.56   38.30   39.05   39.80   40.51   41.19   41.88   42.57   43.26   43.94   44.63   45.29   45.92   46.55
              1.60    29.80   30.68   31.53   32.38   33.23   34.08   34.93   35.66   36.37   37.09   37.80   38.52   39.23   39.95   40.61   41.26   41.92   42.58   43.23   43.89   44.55   45.18   45.78   46.38   46.98
              1.70    31.40   32.21   33.03   33.84   34.66   35.40   36.08   36.76   37.45   38.13   38.81   39.50   40.16   40.79   41.42   42.04   42.67   43.29   43.92   44.55   45.16   45.73   46.30   46.87   47.44
              1.80    32.90   33.67   34.43   35.18   35.85   36.52   37.19   37.87   38.54   39.21   39.89   40.49   41.08   41.67   42.26   42.85   43.44   44.03   44.62   45.20   45.74   46.28   46.83   47.37   47.91
              1.90    34.45   35.17   35.81   36.45   37.09   37.74   38.38   39.02   39.67   40.27   40.83   41.40   41.96   42.52   43.09   43.65   44.21   44.77   45.31   45.83   46.34   46.86   47.38   47.90   48.41
              2.00    35.88   36.49   37.11   37.72   38.33   38.95   39.56   40.16   40.69   41.23   41.77   42.31   42.85   43.39   43.92   44.46   45.00   45.49   45.98   46.48   46.97   47.46   47.95   48.44   48.94
              2.10    37.21   37.80   38.39   38.98   39.57   40.13   40.65   41.16   41.68   42.19   42.70   43.22   43.73   44.24   44.76   45.25   45.72   46.19   46.65   47.12   47.59   48.06   48.53   49.00   49.47
              2.20    38.53   39.10   39.66   40.19   40.69   41.18   41.67   42.16   42.65   43.14   43.63   44.12   44.61   45.09   45.54   45.98   46.43   46.88   47.32   47.77   48.22   48.67   49.11   49.56   50.01
              2.30    39.84   40.33   40.79   41.26   41.72   42.19   42.66   43.12   43.59   44.05   44.52   44.99   45.42   45.84   46.27   46.70   47.13   47.56   47.99   48.41   48.84   49.27   49.70   50.11   50.50
              2.40    40.90   41.35   41.80   42.26   42.71   43.16   43.61   44.07   44.52   44.97   45.38   45.79   46.20   46.61   47.02   47.43   47.84   48.25   48.65   49.06   49.47   49.88   50.26   50.63   51.00
              2.50    42.00   42.43   42.86   43.30   43.73   44.16   44.59   45.02   45.41   45.81   46.20   46.59   46.98   47.37   47.76   48.15   48.54   48.93   49.32   49.71   50.09   50.45   50.80   51.15   51.51
              2.60    43.08   43.49   43.90   44.32   44.73   45.13   45.50   45.87   46.25   46.62   47.00   47.37   47.74   48.12   48.49   48.86   49.24   49.61   49.98   50.32   50.66   51.00   51.33   51.67   52.01
              2.70    44.12   44.52   44.91   45.28   45.64   45.99   46.35   46.71   47.07   47.42   47.78   48.14   48.49   48.85   49.21   49.57   49.92   50.25   50.57   50.90   51.22   51.54   51.86   52.18   52.51
              2.80    45.13   45.47   45.81   46.16   46.50   46.84   47.18   47.52   47.87   48.21   48.55   48.89   49.23   49.58   49.92   50.23   50.54   50.85   51.16   51.46   51.77   52.08   52.39   52.69   53.00
              2.90    46.06   46.39   46.71   47.04   47.36   47.69   48.01   48.34   48.66   48.99   49.31   49.64   49.96   50.26   50.55   50.85   51.14   51.43   51.73   52.02   52.32   52.61   52.90   53.20   53.49
              3.00    46.93   47.25   47.56   47.87   48.18   48.49   48.80   49.11   49.42   49.73   50.04   50.32   50.60   50.89   51.17   51.45   51.73   52.01   52.29   52.57   52.85   53.14   53.42   53.70   53.98
              3.10    47.78   48.08   48.38   48.68   48.97   49.27   49.57   49.87   50.15   50.42   50.69   50.96   51.23   51.50   51.77   52.04   52.31   52.57   52.84   53.11   53.38   53.65   53.92   54.19   54.46
              3.20    48.61   48.89   49.18   49.46   49.75   50.03   50.29   50.55   50.81   51.06   51.32   51.58   51.84   52.10   52.35   52.61   52.87   53.13   53.39   53.64   53.90   54.16   54.42   54.68   54.93
              3.30    49.41   49.68   49.96   50.21   50.46   50.70   50.95   51.20   51.44   51.69   51.94   52.19   52.43   52.68   52.93   53.18   53.42   53.67   53.92   54.16   54.41   54.66   54.91   55.14   55.36
              3.40    50.17   50.40   50.64   50.88   51.12   51.35   51.59   51.83   52.07   52.30   52.54   52.78   53.01   53.25   53.49   53.73   53.96   54.20   54.44   54.67   54.91   55.14   55.35   55.57   55.78
              3.50    50.85   51.08   51.30   51.53   51.76   51.99   52.21   52.44   52.67   52.90   53.13   53.35   53.58   53.81   54.04   54.26   54.49   54.72   54.95   55.16   55.36   55.57   55.78   55.98   56.19
              3.60    51.51   51.73   51.94   52.16   52.38   52.60   52.82   53.04   53.26   53.48   53.69   53.91   54.13   54.35   54.57   54.79   55.01   55.20   55.40   55.60   55.80   56.00   56.19   56.39   56.59
              3.70    52.14   52.35   52.56   52.78   52.99   53.20   53.41   53.62   53.83   54.04   54.25   54.46   54.67   54.88   55.08   55.27   55.46   55.65   55.84   56.03   56.22   56.41   56.60   56.79   56.98
              3.80    52.77   52.97   53.17   53.37   53.58   53.78   53.98   54.18   54.38   54.59   54.79   54.99   55.17   55.36   55.54   55.72   55.90   56.09   56.27   56.45   56.63   56.82   57.00   57.18   57.36
              3.90    53.37   53.56   53.76   53.95   54.15   54.34   54.54   54.73   54.93   55.11   55.28   55.46   55.63   55.81   55.99   56.16   56.34   56.51   56.69   56.86   57.04   57.21   57.39   57.57   57.74
              4.00    53.95   54.14   54.33   54.52   54.70   54.89   55.07   55.24   55.41   55.58   55.75   55.91   56.08   56.25   56.42   56.59   56.76   56.93   57.10   57.26   57.43   57.60   57.77   57.94   58.11
                </tableData>
              </table>
            </ifthen>
          </function>
          <output>propulsion/engine[3]/blade-angle</output>
        </fcs_function>
      </channel>
      <channel name="Landing Gear">
        <kinematic name="fcs/gear-control">
          <input>gear/gear-cmd-norm</input>
          <traverse>
            <setting> <position>0</position> <time>0</time> </setting>
            <setting> <position>1</position> <time>5</time> </setting>
          </traverse>
          <output>gear/gear-pos-norm</output>
        </kinematic>
      </channel>
    </flight_control>
    <aerodynamics>
        <function name="aero/function/mach-lift">
          <description>lift, and damping, over its low-speed value (hangar: aero/mach.py)</description>
          <table>
            <independentVar lookup="row">velocities/mach</independentVar>
            <tableData>
                 0.000     1.000000
                 0.300     1.035304
                 0.500     1.110231
                 0.600     1.174155
                 0.700     1.269322
                 0.800     1.422821
                 0.850     1.542490
                 0.900     1.721789
            </tableData>
          </table>
        </function>
        <function name="aero/function/mach-side">
          <description>side force, rolling and yawing moment over their low-speed values</description>
          <table>
            <independentVar lookup="row">velocities/mach</independentVar>
            <tableData>
                 0.000     1.000000
                 0.300     1.019840
                 0.500     1.061041
                 0.600     1.095361
                 0.700     1.145348
                 0.800     1.224152
                 0.850     1.284937
                 0.900     1.376759
            </tableData>
          </table>
        </function>
        <function name="aero/function/mach-dCm-dCL">
          <description>pitching moment per unit low-speed lift: the neutral point's move</description>
          <table>
            <independentVar lookup="row">velocities/mach</independentVar>
            <tableData>
                 0.000     0.000000
                 0.300    -0.007571
                 0.500    -0.012136
                 0.600    -0.021260
                 0.700    -0.031355
                 0.800    -0.039215
                 0.850    -0.038873
                 0.900    -0.030695
            </tableData>
          </table>
        </function>
        <function name="aero/function/mach-dCD0">
          <description>zero-lift drag's change: friction and wave drag</description>
          <table>
            <independentVar lookup="row">velocities/mach</independentVar>
            <tableData>
                 0.000     0.000000
                 0.300    -0.000119
                 0.500    -0.000324
                 0.600    -0.000430
                 0.700     0.002797
                 0.800     0.095404
                 0.850     0.174639
                 0.900     0.258657
            </tableData>
          </table>
        </function>
        <function name="aero/function/mach-dK">
          <description>induced-drag factor's change (per CL^2)</description>
          <table>
            <independentVar lookup="row">velocities/mach</independentVar>
            <tableData>
                 0.000     0.000000
                 0.300     0.002404
                 0.500     0.006767
                 0.600     0.009849
                 0.700     0.013603
                 0.800     0.018147
                 0.850     0.020788
                 0.900     0.023764
            </tableData>
          </table>
        </function>
        <function name="aero/function/mach-aileron">
          <description>aileron power over its low-speed value</description>
          <table>
            <independentVar lookup="row">velocities/mach</independentVar>
            <tableData>
                 0.000     1.000000
                 0.300     1.031808
                 0.500     1.098590
                 0.600     1.154837
                 0.700     1.237450
                 0.800     1.368275
                 0.850     1.468604
                 0.900     1.617199
            </tableData>
          </table>
        </function>
        <function name="aero/function/mach-elevator">
          <description>elevator power over its low-speed value</description>
          <table>
            <independentVar lookup="row">velocities/mach</independentVar>
            <tableData>
                 0.000     1.000000
                 0.300     1.032088
                 0.500     1.099461
                 0.600     1.156174
                 0.700     1.239352
                 0.800     1.370627
                 0.850     1.470900
                 0.900     1.619187
            </tableData>
          </table>
        </function>
        <function name="aero/function/mach-flap">
          <description>flap power over its low-speed value</description>
          <table>
            <independentVar lookup="row">velocities/mach</independentVar>
            <tableData>
                 0.000     1.000000
                 0.300     1.038268
                 0.500     1.119864
                 0.600     1.189882
                 0.700     1.294810
                 0.800     1.465842
                 0.850     1.600804
                 0.900     1.806065
            </tableData>
          </table>
        </function>
        <function name="aero/function/mach-rudder">
          <description>rudder power over its low-speed value</description>
          <table>
            <independentVar lookup="row">velocities/mach</independentVar>
            <tableData>
                 0.000     1.000000
                 0.300     1.024068
                 0.500     1.073702
                 0.600     1.114598
                 0.700     1.173227
                 0.800     1.262761
                 0.850     1.328826
                 0.900     1.422772
            </tableData>
          </table>
        </function>
        <function name="aero/function/CL-base">
          <description>CL over alpha and beta at low speed</description>
          <table>
            <independentVar lookup="row">aero/alpha-deg</independentVar>
            <independentVar lookup="column">aero/beta-deg</independentVar>
            <tableData>
                        -90.00    -70.00    -50.00    -40.00    -30.00    -25.00    -20.00    -15.00    -10.00     -6.00     -3.00      0.00      3.00      6.00     10.00     15.00     20.00     25.00     30.00     40.00     50.00     70.00     90.00
             -180.00   0.00000   0.01114   0.07467   0.10806   0.13900   0.15247   0.16408   0.17349   0.18042   0.18403   0.18557   0.18609   0.18557   0.18403   0.18042   0.17349   0.16408   0.15247   0.13900   0.10806   0.07467   0.01114   0.00000
             -120.00  -0.00000   0.19154   0.47303   0.61630   0.74316   0.79672   0.84208   0.87829   0.90464   0.91910   0.92565   0.92588   0.92565   0.91910   0.90464   0.87829   0.84208   0.79672   0.74316   0.61630   0.47303   0.19154  -0.00000
              -70.00  -0.00000  -0.16240  -0.42455  -0.56307  -0.68808  -0.74153  -0.78712  -0.82374  -0.85052  -0.86517  -0.86865  -0.86801  -0.86865  -0.86517  -0.85052  -0.82374  -0.78712  -0.74153  -0.68808  -0.56307  -0.42455  -0.16240  -0.00000
              -46.00  -0.00000  -0.27359  -0.72398  -0.95986  -1.17172  -1.26225  -1.33956  -1.40656  -1.44301  -1.46032  -1.46779  -1.47027  -1.46779  -1.46032  -1.44301  -1.40656  -1.33956  -1.26225  -1.17172  -0.95986  -0.72398  -0.27359  -0.00000
              -32.00  -0.00000  -0.28742  -0.78339  -1.04073  -1.26739  -1.36328  -1.44449  -1.50095  -1.54199  -1.56310  -1.57200  -1.57496  -1.57200  -1.56310  -1.54199  -1.50095  -1.44449  -1.36328  -1.26739  -1.04073  -0.78339  -0.28742  -0.00000
              -22.00  -0.00000  -0.28000  -0.87088  -1.20736  -1.53677  -1.66053  -1.76161  -1.84454  -1.90392  -1.93413  -1.94676  -1.95095  -1.94676  -1.93413  -1.90392  -1.84454  -1.76161  -1.66053  -1.53677  -1.20736  -0.87088  -0.28000  -0.00000
              -17.00  -0.00000  -0.24560  -0.80023  -1.03533  -1.19287  -1.27852  -1.35373  -1.41183  -1.45271  -1.47307  -1.48142  -1.48415  -1.48142  -1.47307  -1.45271  -1.41183  -1.35373  -1.27852  -1.19287  -1.03533  -0.80023  -0.24560  -0.00000
              -13.00  -0.00000  -0.20773  -0.59984  -0.72996  -0.84721  -0.91187  -0.96275  -1.00121  -1.02746  -1.03999  -1.04491  -1.04646  -1.04491  -1.03999  -1.02746  -1.00121  -0.96275  -0.91187  -0.84721  -0.72996  -0.59984  -0.20773  -0.00000
               -9.00  -0.00000  -0.12891  -0.34900  -0.42742  -0.49942  -0.53668  -0.56352  -0.58287  -0.59502  -0.59998  -0.60152  -0.60189  -0.60152  -0.59998  -0.59502  -0.58287  -0.56352  -0.53668  -0.49942  -0.42742  -0.34900  -0.12891  -0.00000
               -5.00  -0.00000  -0.04186  -0.09607  -0.12361  -0.15263  -0.16125  -0.16486  -0.16613  -0.16543  -0.16375  -0.16227  -0.16150  -0.16227  -0.16375  -0.16543  -0.16613  -0.16486  -0.16125  -0.15263  -0.12361  -0.09607  -0.04186  -0.00000
               -1.00  -0.00000   0.04572   0.14760   0.16413   0.18722   0.20771   0.22650   0.24225   0.25440   0.26120   0.26443   0.26569   0.26443   0.26120   0.25440   0.24225   0.22650   0.20771   0.18722   0.16413   0.14760   0.04572  -0.00000
                3.00   0.00000   0.13350   0.39511   0.46011   0.53071   0.57962   0.62101   0.65387   0.67739   0.68911   0.69378   0.69526   0.69378   0.68911   0.67739   0.65387   0.62101   0.57962   0.53071   0.46011   0.39511   0.13350   0.00000
                7.00   0.00000   0.21036   0.64856   0.76951   0.88204   0.95680   1.02116   1.07189   1.10782   1.12560   1.13271   1.13490   1.13271   1.12560   1.10782   1.07189   1.02116   0.95680   0.88204   0.76951   0.64856   0.21036   0.00000
               11.00   0.00000   0.26447   0.88558   1.06631   1.22361   1.32650   1.41455   1.48357   1.53268   1.55726   1.56725   1.57045   1.56725   1.55726   1.53268   1.48357   1.41455   1.32650   1.22361   1.06631   0.88558   0.26447   0.00000
               15.00   0.00000   0.28965   0.96623   1.28766   1.54323   1.66970   1.78225   1.87037   1.93346   1.96537   1.97855   1.98285   1.97855   1.96537   1.93346   1.87037   1.78225   1.66970   1.54323   1.28766   0.96623   0.28965   0.00000
               19.00   0.00000   0.29198   0.87820   1.24101   1.51920   1.64085   1.74961   1.83514   1.89291   1.92094   1.93228   1.93594   1.93228   1.92094   1.89291   1.83514   1.74961   1.64085   1.51920   1.24101   0.87820   0.29198   0.00000
               23.00   0.00000   0.28772   0.80648   1.09891   1.38258   1.50672   1.61060   1.68453   1.73636   1.76254   1.77346   1.77709   1.77346   1.76254   1.73636   1.68453   1.61060   1.50672   1.38258   1.09891   0.80648   0.28772   0.00000
               27.00   0.00000   0.28233   0.78492   1.04885   1.29428   1.40403   1.48945   1.55284   1.59605   1.61493   1.61577   1.61688   1.61577   1.61493   1.59605   1.55284   1.48945   1.40403   1.29428   1.04885   0.78492   0.28233   0.00000
               32.00   0.00000   0.28242   0.76950   1.02236   1.24666   1.34270   1.42330   1.48046   1.52074   1.54137   1.55004   1.55293   1.55004   1.54137   1.52074   1.48046   1.42330   1.34270   1.24666   1.02236   0.76950   0.28242   0.00000
               46.00   0.00000   0.26848   0.70621   0.93446   1.13711   1.22275   1.29538   1.35716   1.39190   1.40722   1.41384   1.41604   1.41384   1.40722   1.39190   1.35716   1.29538   1.22275   1.13711   0.93446   0.70621   0.26848   0.00000
               70.00   0.00000   0.15208   0.38831   0.51163   0.62237   0.66957   0.70976   0.74201   0.76557   0.77854   0.78130   0.78042   0.78130   0.77854   0.76557   0.74201   0.70976   0.66957   0.62237   0.51163   0.38831   0.15208   0.00000
              120.00   0.00000  -0.19700  -0.49210  -0.64335  -0.77772  -0.83456  -0.88275  -0.92126  -0.94930  -0.96465  -0.97157  -0.97193  -0.97157  -0.96465  -0.94930  -0.92126  -0.88275  -0.83456  -0.77772  -0.64335  -0.49210  -0.19700   0.00000
              180.00   0.00000   0.01114   0.07467   0.10806   0.13900   0.15247   0.16408   0.17349   0.18042   0.18403   0.18557   0.18609   0.18557   0.18403   0.18042   0.17349   0.16408   0.15247   0.13900   0.10806   0.07467   0.01114   0.00000
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            </tableData>
          </table>
        </function>
      <axis name="DRAG">
        <function name="aero/coefficient/CD_base">
          <description>CD over alpha and beta (hangar)</description>
          <product>
            <property>aero/qbar-psf</property>
            <property>metrics/Sw-sqft</property>
          <table>
            <independentVar lookup="row">aero/alpha-deg</independentVar>
            <independentVar lookup="column">aero/beta-deg</independentVar>
            <tableData>
                        -90.00    -70.00    -50.00    -40.00    -30.00    -25.00    -20.00    -15.00    -10.00     -6.00     -3.00      0.00      3.00      6.00     10.00     15.00     20.00     25.00     30.00     40.00     50.00     70.00     90.00
             -180.00   1.00228   0.80376   0.43901   0.27169   0.14660   0.10307   0.07201   0.05214   0.03900   0.03670   0.03688   0.03705   0.03688   0.03670   0.03900   0.05214   0.07201   0.10307   0.14660   0.27169   0.43901   0.80376   1.00228
              -35.00   1.00228   0.94124   0.79567   0.74827   0.74512   0.75978   0.78515   0.78711   0.79061   0.79271   0.79362   0.79391   0.79362   0.79271   0.79061   0.78711   0.78515   0.75978   0.74512   0.74827   0.79567   0.94124   1.00228
              -11.00   1.00228   0.89117   0.56170   0.39596   0.27955   0.20510   0.15498   0.11783   0.09201   0.07930   0.07410   0.07239   0.07410   0.07930   0.09201   0.11783   0.15498   0.20510   0.27955   0.39596   0.56170   0.89117   1.00228
                4.00   1.00228   0.88763   0.54890   0.37698   0.26058   0.18001   0.13028   0.09433   0.07115   0.06033   0.05577   0.05429   0.05577   0.06033   0.07115   0.09433   0.13028   0.18001   0.26058   0.37698   0.54890   0.88763   1.00228
               19.00   1.00228   0.90599   0.63387   0.52047   0.44967   0.38830   0.34974   0.32526   0.30662   0.29527   0.28990   0.28789   0.28990   0.29527   0.30662   0.32526   0.34974   0.38830   0.44967   0.52047   0.63387   0.90599   1.00228
               42.00   1.00228   0.96440   0.91560   0.93188   0.98328   1.01802   1.05662   1.09120   1.10550   1.11349   1.11700   1.11816   1.11700   1.11349   1.10550   1.09120   1.05662   1.01802   0.98328   0.93188   0.91560   0.96440   1.00228
              180.00   1.00228   0.80376   0.43901   0.27169   0.14660   0.10307   0.07201   0.05214   0.03900   0.03670   0.03688   0.03705   0.03688   0.03670   0.03900   0.05214   0.07201   0.10307   0.14660   0.27169   0.43901   0.80376   1.00228
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            </tableData>
          </table>
          </product>
        </function>
        <function name="aero/coefficient/CD_mach">
          <description>zero-lift drag's change with Mach: friction, wave drag</description>
          <product>
            <property>aero/qbar-psf</property>
            <property>metrics/Sw-sqft</property>
            <property>aero/function/mach-dCD0</property>
          </product>
        </function>
        <function name="aero/coefficient/CD_induced_mach">
          <description>induced drag's change with Mach (leading-edge suction lost)</description>
          <product>
            <property>aero/qbar-psf</property>
            <property>metrics/Sw-sqft</property>
            <property>aero/cl-squared</property>
            <property>aero/function/mach-dK</property>
          </product>
        </function>
        <function name="aero/coefficient/CD_aileron">
          <description>CD increment from aileron (deg), over alpha</description>
          <product>
            <property>aero/qbar-psf</property>
            <property>metrics/Sw-sqft</property>
            <property>aero/function/mach-aileron</property>
          <table>
            <independentVar lookup="row">aero/alpha-deg</independentVar>
            <independentVar lookup="column">fcs/left-aileron-pos-deg</independentVar>
            <tableData>
                        -20.00    -15.00    -10.00     -5.00      0.00      5.00     10.00     15.00     20.00
             -180.00   0.00363   0.00208   0.00094   0.00024   0.00000   0.00024   0.00094   0.00208   0.00363
              -35.00   0.00971   0.00621   0.00311   0.00084   0.00000   0.00084   0.00311   0.00621   0.00971
              -11.00   0.00951   0.00629   0.00324   0.00088   0.00000   0.00088   0.00324   0.00629   0.00951
                4.00   0.00947   0.00628   0.00323   0.00088   0.00000   0.00088   0.00323   0.00628   0.00947
               19.00   0.04305   0.03169   0.01887   0.00666   0.00000   0.00666   0.01887   0.03169   0.04305
               42.00   0.00977   0.00623   0.00309   0.00083   0.00000   0.00083   0.00309   0.00623   0.00977
              180.00   0.00363   0.00208   0.00094   0.00024   0.00000   0.00024   0.00094   0.00208   0.00363
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            </tableData>
          </table>
          </product>
        </function>
        <function name="aero/coefficient/CD_elevator">
          <description>CD increment from elevator (deg), over alpha</description>
          <product>
            <property>aero/qbar-psf</property>
            <property>metrics/Sw-sqft</property>
            <property>aero/function/mach-elevator</property>
          <table>
            <independentVar lookup="row">aero/alpha-deg</independentVar>
            <independentVar lookup="column">fcs/elevator-pos-deg</independentVar>
            <tableData>
                        -25.00    -20.00    -15.00    -10.00     -5.00      0.00      5.00     10.00     15.00
             -180.00   0.00873   0.00572   0.00327   0.00147   0.00037   0.00000   0.00037   0.00147   0.00327
              -35.00   0.00054  -0.00017  -0.00063  -0.00097  -0.00099   0.00000   0.00274   0.00756   0.01413
              -11.00   0.03669   0.03067   0.02400   0.01614   0.00760   0.00000  -0.00541  -0.00812  -0.00831
                4.00   0.00676   0.00311   0.00008  -0.00193  -0.00217   0.00000   0.00453   0.01057   0.01676
               19.00  -0.02402  -0.02482  -0.02362  -0.01927  -0.01116   0.00000   0.01292   0.02584   0.03689
               42.00   0.03052   0.02228   0.01474   0.00809   0.00297   0.00000  -0.00076   0.00016   0.00189
              180.00   0.00873   0.00572   0.00327   0.00147   0.00037   0.00000   0.00037   0.00147   0.00327
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            </tableData>
          </table>
          </product>
        </function>
        <function name="aero/coefficient/CD_flap">
          <description>CD increment from flap (deg), over alpha</description>
          <product>
            <property>aero/qbar-psf</property>
            <property>metrics/Sw-sqft</property>
            <property>aero/function/mach-flap</property>
          <table>
            <independentVar lookup="row">aero/alpha-deg</independentVar>
            <independentVar lookup="column">fcs/flap-pos-deg</independentVar>
            <tableData>
                          0.00      5.00     10.00     15.00     20.00     25.00     30.00     35.00
             -180.00   0.00000   0.00050   0.00197   0.00438   0.00765   0.01168   0.01635   0.02152
              -35.00   0.00000   0.01887   0.04301   0.07096   0.10155   0.13407   0.16771   0.20131
              -11.00   0.00000  -0.00613  -0.00772  -0.00481   0.00185   0.01130   0.02286   0.03623
                4.00   0.00000   0.01097   0.02608   0.04419   0.06387   0.08416   0.10485   0.12620
               19.00   0.00000   0.01304   0.04520   0.08998   0.14011   0.19050   0.23975   0.28795
               42.00   0.00000  -0.02054  -0.03687  -0.04877  -0.05693  -0.06226  -0.06547  -0.06707
              180.00   0.00000   0.00050   0.00197   0.00438   0.00765   0.01168   0.01635   0.02152
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            </tableData>
          </table>
          </product>
        </function>
        <function name="aero/coefficient/CD_rudder">
          <description>CD increment from rudder (deg), over alpha</description>
          <product>
            <property>aero/qbar-psf</property>
            <property>metrics/Sw-sqft</property>
            <property>aero/function/mach-rudder</property>
          <table>
            <independentVar lookup="row">aero/alpha-deg</independentVar>
            <independentVar lookup="column">fcs/rudder-pos-deg</independentVar>
            <tableData>
                        -35.00    -30.00    -25.00    -20.00    -15.00    -10.00     -5.00      0.00      5.00     10.00     15.00     20.00     25.00     30.00     35.00
             -180.00   0.01089   0.00828   0.00591   0.00387   0.00222   0.00100   0.00025   0.00000   0.00025   0.00100   0.00222   0.00387   0.00591   0.00828   0.01089
              -35.00   0.01651   0.01364   0.01098   0.00839   0.00573   0.00301   0.00083   0.00000   0.00083   0.00301   0.00573   0.00839   0.01098   0.01364   0.01651
              -11.00   0.02450   0.02009   0.01602   0.01213   0.00821   0.00430   0.00119   0.00000   0.00119   0.00430   0.00821   0.01213   0.01602   0.02009   0.02450
                4.00   0.02486   0.02035   0.01619   0.01223   0.00826   0.00431   0.00119   0.00000   0.00119   0.00431   0.00826   0.01223   0.01619   0.02035   0.02486
               19.00   0.02130   0.01746   0.01393   0.01055   0.00714   0.00374   0.00103   0.00000   0.00103   0.00374   0.00714   0.01055   0.01393   0.01746   0.02130
               42.00   0.01465   0.01215   0.00984   0.00759   0.00523   0.00276   0.00076   0.00000   0.00076   0.00276   0.00523   0.00759   0.00984   0.01215   0.01465
              180.00   0.01089   0.00828   0.00591   0.00387   0.00222   0.00100   0.00025   0.00000   0.00025   0.00100   0.00222   0.00387   0.00591   0.00828   0.01089
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            </tableData>
          </table>
          </product>
        </function>
        <function name="aero/coefficient/CD_ground">
          <description>Induced drag change in ground effect</description>
          <product>
            <property>aero/qbar-psf</property>
            <property>metrics/Sw-sqft</property>
            <property>aero/cl-squared</property>
            <value>0.03742</value>
          <table>
            <independentVar lookup="row">aero/h_b-mac-ft</independentVar>
            <tableData>
                    0.00   -1.00000
                    0.10   -0.28090
                    0.20   -0.08897
                    0.40   -0.02383
                    0.60   -0.01073
                    0.80   -0.00607
                    1.00   -0.00389
                    1.10   -0.00322
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            </tableData>
          </table>
          </product>
        </function>
      </axis>
      <axis name="SIDE">
        <function name="aero/coefficient/CY_base">
          <description>CY over alpha and beta (hangar)</description>
          <product>
            <property>aero/qbar-psf</property>
            <property>metrics/Sw-sqft</property>
            <property>aero/function/mach-side</property>
          <table>
            <independentVar lookup="row">aero/alpha-deg</independentVar>
            <independentVar lookup="column">aero/beta-deg</independentVar>
            <tableData>
                        -90.00    -70.00    -50.00    -40.00    -30.00    -25.00    -20.00    -15.00    -10.00     -6.00     -3.00      0.00      3.00      6.00     10.00     15.00     20.00     25.00     30.00     40.00     50.00     70.00     90.00
             -180.00  -0.00000   0.28848   0.34885   0.29028   0.19884   0.14974   0.10325   0.06268   0.06263   0.07334   0.03804  -0.00000  -0.03804  -0.07334  -0.06263  -0.06268  -0.10325  -0.14974  -0.19884  -0.29028  -0.34885  -0.28848   0.00000
              -35.00   0.00000   0.17881   0.18412   0.14009   0.09992   0.09233   0.12257   0.08477   0.05212   0.02995   0.01475  -0.00000  -0.01475  -0.02995  -0.05212  -0.08477  -0.12257  -0.09233  -0.09992  -0.14009  -0.18412  -0.17881  -0.00000
              -11.00   0.00000   0.31669   0.43767   0.40830   0.36442   0.36135   0.29186   0.21397   0.13802   0.08058   0.03966  -0.00000  -0.03966  -0.08058  -0.13802  -0.21397  -0.29186  -0.36135  -0.36442  -0.40830  -0.43767  -0.31669  -0.00000
                4.00   0.00000   0.32566   0.44844   0.41662   0.37089   0.36171   0.29247   0.21188   0.13407   0.07645   0.03675  -0.00000  -0.03675  -0.07645  -0.13407  -0.21188  -0.29247  -0.36171  -0.37089  -0.41662  -0.44844  -0.32566  -0.00000
               19.00   0.00000   0.26836   0.35055   0.30578   0.26989   0.23979   0.19914   0.15775   0.10194   0.05917   0.02882  -0.00000  -0.02882  -0.05917  -0.10194  -0.15775  -0.19914  -0.23979  -0.26989  -0.30578  -0.35055  -0.26836  -0.00000
               42.00   0.00000   0.11678   0.05078  -0.00612  -0.04304  -0.04507  -0.03044   0.01384   0.00459   0.00049  -0.00002  -0.00000   0.00002  -0.00049  -0.00459  -0.01384   0.03044   0.04507   0.04304   0.00612  -0.05078  -0.11678  -0.00000
              180.00  -0.00000   0.28848   0.34885   0.29028   0.19884   0.14974   0.10325   0.06268   0.06263   0.07334   0.03804  -0.00000  -0.03804  -0.07334  -0.06263  -0.06268  -0.10325  -0.14974  -0.19884  -0.29028  -0.34885  -0.28848   0.00000
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            </tableData>
          </table>
          </product>
        </function>
        <function name="aero/coefficient/CY_aileron">
          <description>CY increment from aileron (deg), over alpha</description>
          <product>
            <property>aero/qbar-psf</property>
            <property>metrics/Sw-sqft</property>
            <property>aero/function/mach-aileron</property>
          <table>
            <independentVar lookup="row">aero/alpha-deg</independentVar>
            <independentVar lookup="column">fcs/left-aileron-pos-deg</independentVar>
            <tableData>
                        -20.00    -15.00    -10.00     -5.00      0.00      5.00     10.00     15.00     20.00
             -180.00   0.00000   0.00000   0.00000   0.00000   0.00000   0.00000   0.00000   0.00000   0.00000
              -35.00  -0.00236  -0.00211  -0.00162  -0.00088   0.00000   0.00088   0.00162   0.00211   0.00236
              -11.00  -0.00424  -0.00362  -0.00269  -0.00143   0.00000   0.00143   0.00269   0.00362   0.00424
                4.00  -0.00478  -0.00408  -0.00304  -0.00162   0.00000   0.00162   0.00304   0.00408   0.00478
               19.00  -0.02805  -0.02469  -0.01956  -0.01178   0.00000   0.01178   0.01956   0.02469   0.02805
               42.00  -0.00613  -0.00520  -0.00387  -0.00206   0.00000   0.00206   0.00387   0.00520   0.00613
              180.00   0.00000   0.00000   0.00000   0.00000   0.00000   0.00000   0.00000   0.00000   0.00000
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            </tableData>
          </table>
          </product>
        </function>
        <function name="aero/coefficient/CY_rudder">
          <description>CY increment from rudder (deg), over alpha</description>
          <product>
            <property>aero/qbar-psf</property>
            <property>metrics/Sw-sqft</property>
            <property>aero/function/mach-rudder</property>
          <table>
            <independentVar lookup="row">aero/alpha-deg</independentVar>
            <independentVar lookup="column">fcs/rudder-pos-deg</independentVar>
            <tableData>
                        -35.00    -30.00    -25.00    -20.00    -15.00    -10.00     -5.00      0.00      5.00     10.00     15.00     20.00     25.00     30.00     35.00
             -180.00   0.00000   0.00000   0.00000   0.00000   0.00000   0.00000   0.00000   0.00000   0.00000   0.00000   0.00000   0.00000   0.00000   0.00000   0.00000
              -35.00  -0.07689  -0.07182  -0.06657  -0.06027  -0.05140  -0.03814  -0.02027   0.00000   0.02027   0.03814   0.05140   0.06027   0.06657   0.07182   0.07689
              -11.00  -0.11121  -0.10399  -0.09651  -0.08752  -0.07475  -0.05561  -0.02965   0.00000   0.02965   0.05561   0.07475   0.08752   0.09651   0.10399   0.11121
                4.00  -0.11592  -0.10832  -0.10046  -0.09104  -0.07770  -0.05777  -0.03078   0.00000   0.03078   0.05777   0.07770   0.09104   0.10046   0.10832   0.11592
               19.00  -0.10486  -0.09808  -0.09106  -0.08261  -0.07057  -0.05249  -0.02796   0.00000   0.02796   0.05249   0.07057   0.08261   0.09106   0.09808   0.10486
               42.00  -0.08319  -0.07758  -0.07179  -0.06491  -0.05526  -0.04076  -0.02156   0.00000   0.02156   0.04076   0.05526   0.06491   0.07179   0.07758   0.08319
              180.00   0.00000   0.00000   0.00000   0.00000   0.00000   0.00000   0.00000   0.00000   0.00000   0.00000   0.00000   0.00000   0.00000   0.00000   0.00000
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            </tableData>
          </table>
          </product>
        </function>
        <function name="aero/coefficient/CYp">
          <description>CY per p (non-dimensional), over alpha</description>
          <product>
            <property>aero/qbar-psf</property>
            <property>metrics/Sw-sqft</property>
            <property>aero/bi2vel</property>
            <property>velocities/p-aero-rad_sec</property>
            <property>aero/function/mach-lift</property>
          <table>
            <independentVar lookup="row">aero/alpha-deg</independentVar>
            <tableData>
                 -180.00   -0.19995
                 -165.00   -0.11095
                  -32.00   -0.10458
                  -10.00   -0.05885
                    5.00   -0.07310
                   20.00    0.77347
                   46.00    0.00747
                  180.00   -0.19995
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            </tableData>
          </table>
          </product>
        </function>
        <function name="aero/coefficient/CYr">
          <description>CY per r (non-dimensional), over alpha</description>
          <product>
            <property>aero/qbar-psf</property>
            <property>metrics/Sw-sqft</property>
            <property>aero/bi2vel</property>
            <property>velocities/r-aero-rad_sec</property>
            <property>aero/function/mach-lift</property>
          <table>
            <independentVar lookup="row">aero/alpha-deg</independentVar>
            <tableData>
                 -180.00    0.51332
                 -165.00    0.50018
                  -32.00    0.32810
                  -10.00    0.41843
                    5.00    0.43639
                   20.00    0.76930
                   46.00    0.42328
                  180.00    0.51332
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            </tableData>
          </table>
          </product>
        </function>
      </axis>
      <axis name="LIFT">
        <function name="aero/coefficient/CL_base">
          <description>CL over alpha and beta, ground effect, compressibility (hangar)</description>
          <product>
            <property>aero/qbar-psf</property>
            <property>metrics/Sw-sqft</property>
            <property>aero/function/CL-base</property>
            <property>aero/function/mach-lift</property>
          <table>
            <independentVar lookup="row">aero/h_b-mac-ft</independentVar>
            <tableData>
                    0.00    1.20000
                    0.10    1.08692
                    0.20    1.03778
                    0.40    1.00713
                    0.60    1.00135
                    0.80    1.00025
                    1.00    1.00005
                    1.10    1.00000
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            </tableData>
          </table>
          </product>
        </function>
        <function name="aero/coefficient/CL_elevator">
          <description>CL increment from elevator (deg), over alpha</description>
          <product>
            <property>aero/qbar-psf</property>
            <property>metrics/Sw-sqft</property>
            <property>aero/function/mach-elevator</property>
          <table>
            <independentVar lookup="row">aero/alpha-deg</independentVar>
            <independentVar lookup="column">fcs/elevator-pos-deg</independentVar>
            <tableData>
                        -25.00    -20.00    -15.00    -10.00     -5.00      0.00      5.00     10.00     15.00
             -180.00   0.00000   0.00000   0.00000   0.00000   0.00000   0.00000   0.00000   0.00000   0.00000
              -35.00  -0.06387  -0.06071  -0.05458  -0.04303  -0.02434   0.00000   0.02654   0.05075   0.06833
              -11.00  -0.19701  -0.18032  -0.15537  -0.11645  -0.06243   0.00000   0.06293   0.11825   0.15878
                4.00  -0.20772  -0.18924  -0.16228  -0.12102  -0.06452   0.00000   0.06432   0.12026   0.16081
               19.00  -0.17805  -0.15895  -0.13351  -0.09749  -0.05098   0.00000   0.04945   0.09197   0.12320
               42.00  -0.08982  -0.08338  -0.07257  -0.05464  -0.02925   0.00000   0.02894   0.05375   0.07157
              180.00   0.00000   0.00000   0.00000   0.00000   0.00000   0.00000   0.00000   0.00000   0.00000
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            </tableData>
          </table>
          </product>
        </function>
        <function name="aero/coefficient/CL_flap">
          <description>CL increment from flap (deg), over alpha</description>
          <product>
            <property>aero/qbar-psf</property>
            <property>metrics/Sw-sqft</property>
            <property>aero/function/mach-flap</property>
          <table>
            <independentVar lookup="row">aero/alpha-deg</independentVar>
            <independentVar lookup="column">fcs/flap-pos-deg</independentVar>
            <tableData>
                          0.00      5.00     10.00     15.00     20.00     25.00     30.00     35.00
             -180.00   0.00000   0.00000   0.00000   0.00000   0.00000   0.00000   0.00000   0.00000
              -35.00   0.00000   0.06998   0.14251   0.21262   0.27532   0.32812   0.37246   0.41158
              -11.00   0.00000   0.17395   0.34805   0.51227   0.65966   0.78946   0.90575   1.01430
                4.00   0.00000   0.16759   0.33413   0.49009   0.62896   0.75019   0.85811   0.95816
               19.00   0.00000   0.16158   0.31497   0.45281   0.57093   0.67039   0.75449   0.82724
               42.00   0.00000   0.05969   0.11796   0.17116   0.21689   0.25512   0.28733   0.31522
              180.00   0.00000   0.00000   0.00000   0.00000   0.00000   0.00000   0.00000   0.00000
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            </tableData>
          </table>
          <table>
            <independentVar lookup="row">aero/h_b-mac-ft</independentVar>
            <tableData>
                    0.00    1.20000
                    0.10    1.08692
                    0.20    1.03778
                    0.40    1.00713
                    0.60    1.00135
                    0.80    1.00025
                    1.00    1.00005
                    1.10    1.00000
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            </tableData>
          </table>
          </product>
        </function>
        <function name="aero/coefficient/CLq">
          <description>CL per q (non-dimensional), over alpha</description>
          <product>
            <property>aero/qbar-psf</property>
            <property>metrics/Sw-sqft</property>
            <property>aero/ci2vel</property>
            <property>velocities/q-aero-rad_sec</property>
            <property>aero/function/mach-lift</property>
          <table>
            <independentVar lookup="row">aero/alpha-deg</independentVar>
            <tableData>
                 -180.00   -2.96914
                 -165.00   -0.48490
                  -32.00    0.38999
                  -10.00   14.11134
                    5.00   14.30336
                   20.00   -0.27541
                   46.00    2.69776
                  180.00   -2.96914
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            </tableData>
          </table>
          </product>
        </function>
        <function name="aero/coefficient/CLadot">
          <description>CL per alpha-dot (downwash lag at the tail)</description>
          <product>
            <property>aero/qbar-psf</property>
            <property>metrics/Sw-sqft</property>
            <property>aero/ci2vel</property>
            <property>aero/alphadot-rad_sec</property>
            <value>1.78978</value>
            <property>aero/function/mach-lift</property>
          </product>
        </function>
      </axis>
      <axis name="ROLL">
        <function name="aero/coefficient/Cl_base">
          <description>Cl over alpha and beta (hangar)</description>
          <product>
            <property>aero/qbar-psf</property>
            <property>metrics/Sw-sqft</property>
            <property>metrics/bw-ft</property>
            <property>aero/function/mach-side</property>
          <table>
            <independentVar lookup="row">aero/alpha-deg</independentVar>
            <independentVar lookup="column">aero/beta-deg</independentVar>
            <tableData>
                        -90.00    -70.00    -50.00    -40.00    -30.00    -25.00    -20.00    -15.00    -10.00     -6.00     -3.00      0.00      3.00      6.00     10.00     15.00     20.00     25.00     30.00     40.00     50.00     70.00     90.00
             -180.00  -0.03144  -0.01352   0.00958   0.01595   0.01827   0.01780   0.01622   0.01358   0.01173   0.00981   0.00525  -0.00000  -0.00525  -0.00981  -0.01173  -0.01358  -0.01622  -0.01780  -0.01827  -0.01595  -0.00958   0.01352   0.03144
              -35.00  -0.03144  -0.02830  -0.01892  -0.00963  -0.00032   0.00331   0.00805   0.00739   0.00545   0.00343   0.00176  -0.00000  -0.00176  -0.00343  -0.00545  -0.00739  -0.00805  -0.00331   0.00032   0.00963   0.01892   0.02830   0.03144
              -11.00  -0.03144  -0.01304   0.00776   0.01813   0.02249   0.02465   0.02257   0.01834   0.01302   0.00810   0.00412  -0.00000  -0.00412  -0.00810  -0.01302  -0.01834  -0.02257  -0.02465  -0.02249  -0.01813  -0.00776   0.01304   0.03144
                4.00  -0.03144  -0.01255   0.00932   0.02067   0.02516   0.02726   0.02533   0.02057   0.01463   0.00916   0.00470  -0.00000  -0.00470  -0.00916  -0.01463  -0.02057  -0.02533  -0.02726  -0.02516  -0.02067  -0.00932   0.01255   0.03144
               19.00  -0.03144  -0.03531  -0.02846  -0.01680  -0.00348   0.00082   0.00292   0.00465   0.00307   0.00161   0.00070  -0.00000  -0.00070  -0.00161  -0.00307  -0.00465  -0.00292  -0.00082   0.00348   0.01680   0.02846   0.03531   0.03144
               42.00  -0.03144  -0.02694  -0.01777  -0.01154  -0.00412  -0.00102   0.00153   0.00505   0.00422   0.00265   0.00136  -0.00000  -0.00136  -0.00265  -0.00422  -0.00505  -0.00153   0.00102   0.00412   0.01154   0.01777   0.02694   0.03144
              180.00  -0.03144  -0.01352   0.00958   0.01595   0.01827   0.01780   0.01622   0.01358   0.01173   0.00981   0.00525  -0.00000  -0.00525  -0.00981  -0.01173  -0.01358  -0.01622  -0.01780  -0.01827  -0.01595  -0.00958   0.01352   0.03144
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            </tableData>
          </table>
          </product>
        </function>
        <function name="aero/coefficient/Cl_aileron">
          <description>Cl increment from aileron (deg), over alpha</description>
          <product>
            <property>aero/qbar-psf</property>
            <property>metrics/Sw-sqft</property>
            <property>metrics/bw-ft</property>
            <property>aero/function/mach-aileron</property>
          <table>
            <independentVar lookup="row">aero/alpha-deg</independentVar>
            <independentVar lookup="column">fcs/left-aileron-pos-deg</independentVar>
            <tableData>
                        -20.00    -15.00    -10.00     -5.00      0.00      5.00     10.00     15.00     20.00
             -180.00   0.00000   0.00000   0.00000   0.00000   0.00000   0.00000   0.00000   0.00000   0.00000
              -35.00  -0.01406  -0.01293  -0.01016  -0.00559   0.00000   0.00559   0.01016   0.01293   0.01406
              -11.00  -0.05486  -0.04680  -0.03477  -0.01852   0.00000   0.01852   0.03477   0.04680   0.05486
                4.00  -0.05488  -0.04688  -0.03488  -0.01859   0.00000   0.01859   0.03488   0.04688   0.05488
               19.00  -0.07006  -0.05977  -0.04457  -0.02405   0.00000   0.02405   0.04457   0.05977   0.07006
               42.00  -0.01079  -0.01004  -0.00795  -0.00438   0.00000   0.00438   0.00795   0.01004   0.01079
              180.00   0.00000   0.00000   0.00000   0.00000   0.00000   0.00000   0.00000   0.00000   0.00000
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            </tableData>
          </table>
          </product>
        </function>
        <function name="aero/coefficient/Cl_rudder">
          <description>Cl increment from rudder (deg), over alpha</description>
          <product>
            <property>aero/qbar-psf</property>
            <property>metrics/Sw-sqft</property>
            <property>metrics/bw-ft</property>
            <property>aero/function/mach-rudder</property>
          <table>
            <independentVar lookup="row">aero/alpha-deg</independentVar>
            <independentVar lookup="column">fcs/rudder-pos-deg</independentVar>
            <tableData>
                        -35.00    -30.00    -25.00    -20.00    -15.00    -10.00     -5.00      0.00      5.00     10.00     15.00     20.00     25.00     30.00     35.00
             -180.00   0.00000   0.00000   0.00000   0.00000   0.00000   0.00000   0.00000   0.00000   0.00000   0.00000   0.00000   0.00000   0.00000   0.00000   0.00000
              -35.00  -0.00499  -0.00464  -0.00428  -0.00385  -0.00327  -0.00242  -0.00129   0.00000   0.00129   0.00242   0.00327   0.00385   0.00428   0.00464   0.00499
              -11.00  -0.00649  -0.00602  -0.00554  -0.00498  -0.00422  -0.00312  -0.00166   0.00000   0.00166   0.00312   0.00422   0.00498   0.00554   0.00602   0.00649
                4.00  -0.00685  -0.00636  -0.00586  -0.00527  -0.00447  -0.00330  -0.00175   0.00000   0.00175   0.00330   0.00447   0.00527   0.00586   0.00636   0.00685
               19.00  -0.00664  -0.00618  -0.00570  -0.00514  -0.00437  -0.00324  -0.00172   0.00000   0.00172   0.00324   0.00437   0.00514   0.00570   0.00618   0.00664
               42.00  -0.00527  -0.00489  -0.00451  -0.00405  -0.00344  -0.00253  -0.00134   0.00000   0.00134   0.00253   0.00344   0.00405   0.00451   0.00489   0.00527
              180.00   0.00000   0.00000   0.00000   0.00000   0.00000   0.00000   0.00000   0.00000   0.00000   0.00000   0.00000   0.00000   0.00000   0.00000   0.00000
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            </tableData>
          </table>
          </product>
        </function>
        <function name="aero/coefficient/Clp">
          <description>Cl per p (non-dimensional), over alpha</description>
          <product>
            <property>aero/qbar-psf</property>
            <property>metrics/Sw-sqft</property>
            <property>metrics/bw-ft</property>
            <property>aero/bi2vel</property>
            <property>velocities/p-aero-rad_sec</property>
            <property>aero/function/mach-lift</property>
          <table>
            <independentVar lookup="row">aero/alpha-deg</independentVar>
            <tableData>
                 -180.00   -0.73629
                 -165.00   -0.21259
                  -32.00   -0.17057
                  -10.00   -0.56145
                    5.00   -0.56304
                   20.00    0.41121
                   46.00   -0.26145
                  180.00   -0.73629
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            </tableData>
          </table>
          </product>
        </function>
        <function name="aero/coefficient/Clr">
          <description>Cl per r (non-dimensional), over alpha</description>
          <product>
            <property>aero/qbar-psf</property>
            <property>metrics/Sw-sqft</property>
            <property>metrics/bw-ft</property>
            <property>aero/bi2vel</property>
            <property>velocities/r-aero-rad_sec</property>
            <property>aero/function/mach-lift</property>
          <table>
            <independentVar lookup="row">aero/alpha-deg</independentVar>
            <tableData>
                 -180.00    0.06723
                 -165.00    0.08695
                  -32.00   -0.26797
                  -10.00   -0.00906
                    5.00    0.17681
                   20.00    0.68221
                   46.00    0.23491
                  180.00    0.06723
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            </tableData>
          </table>
          </product>
        </function>
      </axis>
      <axis name="PITCH">
        <function name="aero/coefficient/Cm_base">
          <description>Cm over alpha and beta (hangar)</description>
          <product>
            <property>aero/qbar-psf</property>
            <property>metrics/Sw-sqft</property>
            <property>metrics/cbarw-ft</property>
          <table>
            <independentVar lookup="row">aero/alpha-deg</independentVar>
            <independentVar lookup="column">aero/beta-deg</independentVar>
            <tableData>
                        -90.00    -70.00    -50.00    -40.00    -30.00    -25.00    -20.00    -15.00    -10.00     -6.00     -3.00      0.00      3.00      6.00     10.00     15.00     20.00     25.00     30.00     40.00     50.00     70.00     90.00
             -180.00  -0.00000   0.00681   0.04112   0.05937   0.07627   0.08364   0.08998   0.09512   0.10333   0.10491   0.10259   0.10169   0.10259   0.10491   0.10333   0.09512   0.08998   0.08364   0.07627   0.05937   0.04112   0.00681  -0.00000
              -35.00  -0.00000   0.06915   0.25508   0.35773   0.44300   0.47878   0.50567   0.52236   0.53535   0.54169   0.54428   0.54512   0.54428   0.54169   0.53535   0.52236   0.50567   0.47878   0.44300   0.35773   0.25508   0.06915  -0.00000
              -11.00  -0.00000   0.09507   0.28132   0.28208   0.29604   0.30496   0.33829   0.36764   0.38892   0.39987   0.40447   0.40599   0.40447   0.39987   0.38892   0.36764   0.33829   0.30496   0.29604   0.28208   0.28132   0.09507  -0.00000
                4.00  -0.00000  -0.05016  -0.11527  -0.06343  -0.04835  -0.05108  -0.04947  -0.04679  -0.04552  -0.04542  -0.04569  -0.04587  -0.04569  -0.04542  -0.04552  -0.04679  -0.04947  -0.05108  -0.04835  -0.06343  -0.11527  -0.05016  -0.00000
               19.00  -0.00000  -0.09051  -0.35545  -0.56078  -0.55518  -0.54637  -0.57889  -0.60837  -0.62520  -0.63340  -0.63657  -0.63752  -0.63657  -0.63340  -0.62520  -0.60837  -0.57889  -0.54637  -0.55518  -0.56078  -0.35545  -0.09051  -0.00000
               42.00  -0.00000  -0.08132  -0.30068  -0.42905  -0.54089  -0.58678  -0.62830  -0.66010  -0.65553  -0.65260  -0.65129  -0.65077  -0.65129  -0.65260  -0.65553  -0.66010  -0.62830  -0.58678  -0.54089  -0.42905  -0.30068  -0.08132  -0.00000
              180.00  -0.00000   0.00681   0.04112   0.05937   0.07627   0.08364   0.08998   0.09512   0.10333   0.10491   0.10259   0.10169   0.10259   0.10491   0.10333   0.09512   0.08998   0.08364   0.07627   0.05937   0.04112   0.00681  -0.00000
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            </tableData>
          </table>
          </product>
        </function>
        <function name="aero/coefficient/Cm_mach">
          <description>Cm from the neutral point's move with Mach</description>
          <product>
            <property>aero/qbar-psf</property>
            <property>metrics/Sw-sqft</property>
            <property>metrics/cbarw-ft</property>
            <property>aero/function/CL-base</property>
            <property>aero/function/mach-dCm-dCL</property>
          </product>
        </function>
        <function name="aero/coefficient/Cm_elevator">
          <description>Cm increment from elevator (deg), over alpha</description>
          <product>
            <property>aero/qbar-psf</property>
            <property>metrics/Sw-sqft</property>
            <property>metrics/cbarw-ft</property>
            <property>aero/function/mach-elevator</property>
          <table>
            <independentVar lookup="row">aero/alpha-deg</independentVar>
            <independentVar lookup="column">fcs/elevator-pos-deg</independentVar>
            <tableData>
                        -25.00    -20.00    -15.00    -10.00     -5.00      0.00      5.00     10.00     15.00
             -180.00   0.00114   0.00075   0.00043   0.00019   0.00005   0.00000   0.00005   0.00019   0.00043
              -35.00   0.16143   0.15236   0.13618   0.10659   0.05956   0.00000  -0.06219  -0.11505  -0.14815
              -11.00   0.58874   0.53640   0.46021   0.34367   0.18367   0.00000  -0.18425  -0.34570  -0.46385
                4.00   0.60545   0.55141   0.47277   0.35269   0.18827   0.00000  -0.18844  -0.35331  -0.47400
               19.00   0.61085   0.55048   0.46653   0.34365   0.18125   0.00000  -0.17861  -0.33433  -0.45029
               42.00   0.12399   0.12880   0.12258   0.09901   0.05599   0.00000  -0.06013  -0.11500  -0.15665
              180.00   0.00114   0.00075   0.00043   0.00019   0.00005   0.00000   0.00005   0.00019   0.00043
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            </tableData>
          </table>
          </product>
        </function>
        <function name="aero/coefficient/Cm_flap">
          <description>Cm increment from flap (deg), over alpha</description>
          <product>
            <property>aero/qbar-psf</property>
            <property>metrics/Sw-sqft</property>
            <property>metrics/cbarw-ft</property>
            <property>aero/function/mach-flap</property>
          <table>
            <independentVar lookup="row">aero/alpha-deg</independentVar>
            <independentVar lookup="column">fcs/flap-pos-deg</independentVar>
            <tableData>
                          0.00      5.00     10.00     15.00     20.00     25.00     30.00     35.00
             -180.00   0.00000   0.00003   0.00010   0.00022   0.00039   0.00059   0.00083   0.00109
              -35.00   0.00000  -0.00810  -0.01599  -0.02317  -0.02918  -0.03380  -0.03734  -0.04021
              -11.00   0.00000   0.00734   0.01475   0.02172   0.02782   0.03290   0.03710   0.04058
                4.00   0.00000   0.01570   0.03140   0.04607   0.05899   0.07005   0.07976   0.08868
               19.00   0.00000   0.02901   0.05603   0.07948   0.09850   0.11329   0.12442   0.13253
               42.00   0.00000  -0.00148  -0.00336  -0.00535  -0.00715  -0.00864  -0.00991  -0.01115
              180.00   0.00000   0.00003   0.00010   0.00022   0.00039   0.00059   0.00083   0.00109
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            </tableData>
          </table>
          </product>
        </function>
        <function name="aero/coefficient/Cmq">
          <description>Cm per q (non-dimensional), over alpha</description>
          <product>
            <property>aero/qbar-psf</property>
            <property>metrics/Sw-sqft</property>
            <property>metrics/cbarw-ft</property>
            <property>aero/ci2vel</property>
            <property>velocities/q-aero-rad_sec</property>
            <property>aero/function/mach-lift</property>
          <table>
            <independentVar lookup="row">aero/alpha-deg</independentVar>
            <tableData>
                 -180.00  -10.79423
                 -165.00   -3.65125
                  -32.00   -5.25317
                  -10.00  -25.11871
                    5.00  -25.37504
                   20.00  -15.97166
                   46.00  -13.22145
                  180.00  -10.79423
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            </tableData>
          </table>
          </product>
        </function>
        <function name="aero/coefficient/Cmadot">
          <description>Cm per alpha-dot (downwash lag at the tail)</description>
          <product>
            <property>aero/qbar-psf</property>
            <property>metrics/Sw-sqft</property>
            <property>metrics/cbarw-ft</property>
            <property>aero/ci2vel</property>
            <property>aero/alphadot-rad_sec</property>
            <value>-5.53029</value>
            <property>aero/function/mach-lift</property>
          </product>
        </function>
      </axis>
      <axis name="YAW">
        <function name="aero/coefficient/Cn_base">
          <description>Cn over alpha and beta (hangar)</description>
          <product>
            <property>aero/qbar-psf</property>
            <property>metrics/Sw-sqft</property>
            <property>metrics/bw-ft</property>
            <property>aero/function/mach-side</property>
          <table>
            <independentVar lookup="row">aero/alpha-deg</independentVar>
            <independentVar lookup="column">aero/beta-deg</independentVar>
            <tableData>
                        -90.00    -70.00    -50.00    -40.00    -30.00    -25.00    -20.00    -15.00    -10.00     -6.00     -3.00      0.00      3.00      6.00     10.00     15.00     20.00     25.00     30.00     40.00     50.00     70.00     90.00
             -180.00  -0.06357  -0.08084  -0.08161  -0.07423  -0.06149  -0.05329  -0.04403  -0.03387  -0.03457  -0.03635  -0.01960  -0.00000   0.01960   0.03635   0.03457   0.03387   0.04403   0.05329   0.06149   0.07423   0.08161   0.08084   0.06357
              -35.00  -0.06357  -0.04247  -0.02255  -0.01481  -0.01308  -0.01618  -0.02993  -0.02116  -0.01331  -0.00777  -0.00386  -0.00000   0.00386   0.00777   0.01331   0.02116   0.02993   0.01618   0.01308   0.01481   0.02255   0.04247   0.06357
              -11.00  -0.06357  -0.04502  -0.02493  -0.01839  -0.02824  -0.03829  -0.03379  -0.02630  -0.01791  -0.01085  -0.00544  -0.00000   0.00544   0.01085   0.01791   0.02630   0.03379   0.03829   0.02824   0.01839   0.02493   0.04502   0.06357
                4.00  -0.06357  -0.03592  -0.01428  -0.01201  -0.02596  -0.03555  -0.03260  -0.02542  -0.01733  -0.01048  -0.00522  -0.00000   0.00522   0.01048   0.01733   0.02542   0.03260   0.03555   0.02596   0.01201   0.01428   0.03592   0.06357
               19.00  -0.06357  -0.04093  -0.02261  -0.01833  -0.02896  -0.02815  -0.02736  -0.02636  -0.01851  -0.01135  -0.00571  -0.00000   0.00571   0.01135   0.01851   0.02636   0.02736   0.02815   0.02896   0.01833   0.02261   0.04093   0.06357
               42.00  -0.06357  -0.04367  -0.02355  -0.01607  -0.01258  -0.01322  -0.01678  -0.02600  -0.01717  -0.00998  -0.00499  -0.00000   0.00499   0.00998   0.01717   0.02600   0.01678   0.01322   0.01258   0.01607   0.02355   0.04367   0.06357
              180.00  -0.06357  -0.08084  -0.08161  -0.07423  -0.06149  -0.05329  -0.04403  -0.03387  -0.03457  -0.03635  -0.01960  -0.00000   0.01960   0.03635   0.03457   0.03387   0.04403   0.05329   0.06149   0.07423   0.08161   0.08084   0.06357
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            </tableData>
          </table>
          </product>
        </function>
        <function name="aero/coefficient/Cn_aileron">
          <description>Cn increment from aileron (deg), over alpha</description>
          <product>
            <property>aero/qbar-psf</property>
            <property>metrics/Sw-sqft</property>
            <property>metrics/bw-ft</property>
            <property>aero/function/mach-aileron</property>
          <table>
            <independentVar lookup="row">aero/alpha-deg</independentVar>
            <independentVar lookup="column">fcs/left-aileron-pos-deg</independentVar>
            <tableData>
                        -20.00    -15.00    -10.00     -5.00      0.00      5.00     10.00     15.00     20.00
             -180.00  -0.00000  -0.00000  -0.00000  -0.00000   0.00000  -0.00000  -0.00000  -0.00000  -0.00000
              -35.00   0.02009   0.01674   0.01223   0.00645   0.00000  -0.00645  -0.01223  -0.01674  -0.02009
              -11.00   0.00626   0.00531   0.00392   0.00208   0.00000  -0.00208  -0.00392  -0.00531  -0.00626
                4.00  -0.00039  -0.00033  -0.00025  -0.00013   0.00000   0.00013   0.00025   0.00033   0.00039
               19.00  -0.01576  -0.01255  -0.00885  -0.00467   0.00000   0.00467   0.00885   0.01255   0.01576
               42.00  -0.02070  -0.01742  -0.01281  -0.00679   0.00000   0.00679   0.01281   0.01742   0.02070
              180.00  -0.00000  -0.00000  -0.00000  -0.00000   0.00000  -0.00000  -0.00000  -0.00000  -0.00000
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            </tableData>
          </table>
          </product>
        </function>
        <function name="aero/coefficient/Cn_rudder">
          <description>Cn increment from rudder (deg), over alpha</description>
          <product>
            <property>aero/qbar-psf</property>
            <property>metrics/Sw-sqft</property>
            <property>metrics/bw-ft</property>
            <property>aero/function/mach-rudder</property>
          <table>
            <independentVar lookup="row">aero/alpha-deg</independentVar>
            <independentVar lookup="column">fcs/rudder-pos-deg</independentVar>
            <tableData>
                        -35.00    -30.00    -25.00    -20.00    -15.00    -10.00     -5.00      0.00      5.00     10.00     15.00     20.00     25.00     30.00     35.00
             -180.00  -0.00000  -0.00000  -0.00000  -0.00000  -0.00000  -0.00000  -0.00000   0.00000  -0.00000  -0.00000  -0.00000  -0.00000  -0.00000  -0.00000  -0.00000
              -35.00   0.02619   0.02444   0.02264   0.02048   0.01745   0.01295   0.00688   0.00000  -0.00688  -0.01295  -0.01745  -0.02048  -0.02264  -0.02444  -0.02619
              -11.00   0.03796   0.03546   0.03288   0.02978   0.02541   0.01889   0.01007   0.00000  -0.01007  -0.01889  -0.02541  -0.02978  -0.03288  -0.03546  -0.03796
                4.00   0.04132   0.03858   0.03575   0.03237   0.02760   0.02051   0.01093   0.00000  -0.01093  -0.02051  -0.02760  -0.03237  -0.03575  -0.03858  -0.04132
               19.00   0.03603   0.03366   0.03120   0.02826   0.02410   0.01791   0.00953   0.00000  -0.00953  -0.01791  -0.02410  -0.02826  -0.03120  -0.03366  -0.03603
               42.00   0.02868   0.02672   0.02470   0.02230   0.01897   0.01399   0.00741   0.00000  -0.00741  -0.01399  -0.01897  -0.02230  -0.02470  -0.02672  -0.02868
              180.00  -0.00000  -0.00000  -0.00000  -0.00000  -0.00000  -0.00000  -0.00000   0.00000  -0.00000  -0.00000  -0.00000  -0.00000  -0.00000  -0.00000  -0.00000
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            </tableData>
          </table>
          </product>
        </function>
        <function name="aero/coefficient/Cnp">
          <description>Cn per p (non-dimensional), over alpha</description>
          <product>
            <property>aero/qbar-psf</property>
            <property>metrics/Sw-sqft</property>
            <property>metrics/bw-ft</property>
            <property>aero/bi2vel</property>
            <property>velocities/p-aero-rad_sec</property>
            <property>aero/function/mach-lift</property>
          <table>
            <independentVar lookup="row">aero/alpha-deg</independentVar>
            <tableData>
                 -180.00    0.01873
                 -165.00    0.03310
                  -32.00    0.06964
                  -10.00    0.12792
                    5.00   -0.10711
                   20.00    0.07296
                   46.00    0.01848
                  180.00    0.01873
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            </tableData>
          </table>
          </product>
        </function>
        <function name="aero/coefficient/Cnr">
          <description>Cn per r (non-dimensional), over alpha</description>
          <product>
            <property>aero/qbar-psf</property>
            <property>metrics/Sw-sqft</property>
            <property>metrics/bw-ft</property>
            <property>aero/bi2vel</property>
            <property>velocities/r-aero-rad_sec</property>
            <property>aero/function/mach-lift</property>
          <table>
            <independentVar lookup="row">aero/alpha-deg</independentVar>
            <tableData>
                 -180.00   -0.19405
                 -165.00   -0.19479
                  -32.00   -0.06584
                  -10.00   -0.14286
                    5.00   -0.14259
                   20.00    0.00972
                   46.00   -0.08659
                  180.00   -0.19405
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            </tableData>
          </table>
          </product>
        </function>
      </axis>
    </aerodynamics>
</fdm_config>
