<?xml version="1.0"?>
<!-- Generated by hangar: a turbofan of 79.2 kN dry, 129.4 kN with afterburner, bypass ratio 0.36.
     Thrust lapse: Mattingly, Heiser & Pratt, Aircraft Engine Design (2002),
     eq. 2.54, low-bypass mixed-flow turbofan, throttle ratio 1.07. -->
<turbine_engine name="F100-PW-229">
  <milthrust> 17804.9 </milthrust>
  <maxthrust> 29090.3 </maxthrust>
  <bypassratio> 0.360 </bypassratio>
  <tsfc> 0.740 </tsfc>
  <atsfc> 2.050 </atsfc>
  <idlen1> 30.0 </idlen1>
  <idlen2> 60.0 </idlen2>
  <maxn1> 100.0 </maxn1>
  <maxn2> 100.0 </maxn2>
  <augmented> 1 </augmented>
  <augmethod> 2 </augmethod>
  <injected> 0 </injected>
  <function name="IdleThrust">
   <table>
    <independentVar lookup="row">velocities/mach</independentVar>
    <independentVar lookup="column">atmosphere/density-altitude</independentVar>
    <tableData>
            -10000         0     10000     20000     30000     40000     50000     60000
     0.00     0.0709    0.0500    0.0344    0.0230    0.0148    0.0093    0.0057    0.0035
     0.20     0.0482    0.0340    0.0234    0.0156    0.0101    0.0063    0.0039    0.0024
     0.40     0.0255    0.0180    0.0124    0.0083    0.0053    0.0033    0.0021    0.0013
     0.60     0.0028    0.0020    0.0014    0.0009    0.0006    0.0004    0.0002    0.0001
     0.80    -0.0199   -0.0140   -0.0096   -0.0064   -0.0042   -0.0026   -0.0016   -0.0010
     1.00    -0.0426   -0.0300   -0.0206   -0.0138   -0.0089   -0.0056   -0.0034   -0.0021
     1.20    -0.0652   -0.0460   -0.0316   -0.0211   -0.0137   -0.0085   -0.0053   -0.0033
     1.40    -0.0879   -0.0620   -0.0426   -0.0285   -0.0184   -0.0115   -0.0071   -0.0044
     1.60    -0.1106   -0.0780   -0.0536   -0.0358   -0.0232   -0.0144   -0.0089   -0.0055
     1.80    -0.1200   -0.0940   -0.0646   -0.0432   -0.0279   -0.0174   -0.0108   -0.0067
     2.00    -0.1200   -0.1100   -0.0756   -0.0505   -0.0327   -0.0204   -0.0126   -0.0078
     2.20    -0.1200   -0.1200   -0.0867   -0.0579   -0.0374   -0.0233   -0.0144   -0.0089
     2.40    -0.1200   -0.1200   -0.0977   -0.0653   -0.0422   -0.0263   -0.0163   -0.0101
     2.60    -0.1200   -0.1200   -0.1087   -0.0726   -0.0469   -0.0292   -0.0181   -0.0112
    </tableData>
   </table>
  </function>
  <function name="MilThrust">
   <table>
    <independentVar lookup="row">velocities/mach</independentVar>
    <independentVar lookup="column">atmosphere/density-altitude</independentVar>
    <tableData>
            -10000         0     10000     20000     30000     40000     50000     60000
     0.00     1.4183    1.0000    0.6877    0.4595    0.2970    0.1851    0.1145    0.0000
     0.20     1.4209    1.0283    0.7072    0.4725    0.3054    0.1903    0.1177    0.0000
     0.40     1.4038    1.1166    0.7679    0.5131    0.3316    0.2067    0.1278    0.0000
     0.60     1.3548    1.2665    0.8772    0.5861    0.3788    0.2361    0.1460    0.0000
     0.80     1.2382    1.2265    1.0483    0.7005    0.4527    0.2821    0.1745    0.0000
     1.00     0.9943    1.1137    1.0915    0.8699    0.5621    0.3504    0.2167    0.0000
     1.20     0.5288    0.8653    0.9838    0.9585    0.7201    0.4488    0.2775    0.0000
     1.40     0.0000    0.3850    0.7367    0.8580    0.8317    0.5890    0.3642    0.0000
     1.60     0.0000    0.0000    0.2563    0.6209    0.7422    0.6110    0.3778    0.0000
     1.80     0.0000    0.0000    0.0000    0.1600    0.5262    0.5120    0.3166    0.0000
     2.00     0.0000    0.0000    0.0000    0.0000    0.1067    0.2960    0.1830    0.0000
     2.20     0.0000    0.0000    0.0000    0.0000    0.0000    0.0000    0.0000    0.0000
     2.40     0.0000    0.0000    0.0000    0.0000    0.0000    0.0000    0.0000    0.0000
     2.60     0.0000    0.0000    0.0000    0.0000    0.0000    0.0000    0.0000    0.0000
    </tableData>
   </table>
  </function>
  <function name="AugThrust">
   <table>
    <independentVar lookup="row">velocities/mach</independentVar>
    <independentVar lookup="column">atmosphere/density-altitude</independentVar>
    <tableData>
            -10000         0     10000     20000     30000     40000     50000     60000
     0.00     1.4183    1.0000    0.6877    0.4595    0.2970    0.1851    0.1145    0.0000
     0.20     1.4238    1.0283    0.7072    0.4725    0.3054    0.1903    0.1177    0.0000
     0.40     1.4180    1.1166    0.7679    0.5131    0.3316    0.2067    0.1278    0.0000
     0.60     1.3907    1.2672    0.8772    0.5861    0.3788    0.2361    0.1460    0.0000
     0.80     1.3112    1.2500    1.0483    0.7005    0.4527    0.2821    0.1745    0.0000
     1.00     1.1278    1.1752    1.1081    0.8699    0.5621    0.3504    0.2167    0.0000
     1.20     0.7586    0.9884    1.0378    0.9708    0.7201    0.4488    0.2775    0.0000
     1.40     0.0781    0.6058    0.8513    0.9057    0.8406    0.5890    0.3642    0.0000
     1.60     0.0000    0.0000    0.4669    0.7261    0.7832    0.6248    0.3864    0.0000
     1.80     0.0000    0.0000    0.0000    0.3558    0.6194    0.5556    0.3436    0.0000
     2.00     0.0000    0.0000    0.0000    0.0000    0.2817    0.3869    0.2393    0.0000
     2.20     0.0000    0.0000    0.0000    0.0000    0.0000    0.0613    0.0379    0.0000
     2.40     0.0000    0.0000    0.0000    0.0000    0.0000    0.0000    0.0000    0.0000
     2.60     0.0000    0.0000    0.0000    0.0000    0.0000    0.0000    0.0000    0.0000
    </tableData>
   </table>
  </function>
</turbine_engine>
