<?xml version="1.0"?>
<?xml-stylesheet type="text/xsl" href="http://jsbsim.sourceforge.net/JSBSim.xsl"?>
<!-- Generated by hangar 0.1.0 from f16c.toml on 2026-10-01. Edit the design and rebuild; changes
     made here are overwritten.  -->
<fdm_config name="f16c" version="2.0" release="ALPHA"
            xmlns:xsi="http://www.w3.org/2001/XMLSchema-instance"
            xsi:noNamespaceSchemaLocation="http://jsbsim.sourceforge.net/JSBSim.xsd">
    <fileheader>
      <author>hangar</author>
      <filecreationdate>2026-10-01</filecreationdate>
      <version>0.1.0</version>
      <description>General Dynamics F-16C Block 52 Fighting Falcon (hangar build)</description>
      <note>Aerodynamics: vortex lattice with viscous section polars, full-envelope
        strip model, slender-body fuselage (hangar). Mass: Raymer component
        weights on the geometry. Propeller: blade-element momentum theory.</note>
      <reference refID="fsim/applicability/aerobatic" author="the design" title="USAF F-16 fact sheet: +9 g (fsim/envelope/clean/n_max)" date="n/a"/>
      <reference refID="fsim/applicability/carrier" author="the design" title="USAF F-16 fact sheet: a land-based fighter; its tailhook is a runway emergency hook, not carrier-rated, and it has no launch bar" date="n/a"/>
      <reference refID="fsim/applicability/drag_devices" author="the design" title="Jane's All the World's Aircraft: split speed brakes either side of the nozzle" date="n/a"/>
      <reference refID="fsim/applicability/flaps" author="the design" title="NASA TP-1538 and Jane's: flaperons give the flap function" date="n/a"/>
      <reference refID="fsim/applicability/ground_contact" author="the design" title="USAF F-16 fact sheet: tricycle wheeled gear" date="n/a"/>
      <reference refID="fsim/applicability/releasable_stores" author="the design" title="USAF F-16 fact sheet: nine stations for air-to-air and air-to-ground weapons" date="n/a"/>
      <reference refID="fsim/applicability/retractable_gear" author="the design" title="Jane's All the World's Aircraft: retractable gear" date="n/a"/>
      <reference refID="fsim/applicability/vertical_flight" author="the design" title="USAF F-16 fact sheet: a conventional take-off and landing fighter. Conventional take-off and landing: no rotors, lift fans or vectored lift to hover" date="n/a"/>
    </fileheader>
    <metrics>
      <wingarea unit="M2"> 27.8709 </wingarea>
      <wingspan unit="M"> 9.1440 </wingspan>
      <chord unit="M"> 3.4499 </chord>
      <htailarea unit="M2"> 12.0405 </htailarea>
      <htailarm unit="M"> 4.0880 </htailarm>
      <vtailarea unit="M2"> 5.4835 </vtailarea>
      <vtailarm unit="M"> 4.1189 </vtailarm>
      <location name="AERORP" unit="M">
        <x> 8.0300 </x>
        <y> 0.0000 </y>
        <z> 0.0000 </z>
      </location>
      <location name="EYEPOINT" unit="M">
        <x> 4.3000 </x>
        <y> 0.0000 </y>
        <z> 1.2500 </z>
      </location>
      <location name="VRP" unit="M">
        <x> 8.0000 </x>
        <y> 0.0000 </y>
        <z> 0.0000 </z>
      </location>
    </metrics>
    <mass_balance negated_crossproduct_inertia="false">
      <ixx unit="KG*M2"> 11236.48 </ixx>
      <iyy unit="KG*M2"> 72065.34 </iyy>
      <izz unit="KG*M2"> 78834.84 </izz>
      <ixy unit="KG*M2"> 0.000 </ixy>
      <ixz unit="KG*M2"> -2471.494 </ixz>
      <iyz unit="KG*M2"> -0.057 </iyz>
      <emptywt unit="KG"> 8670.00 </emptywt>
      <location name="CG" unit="M">
        <x> 8.0000 </x>
        <y> 0.0000 </y>
        <z> 0.0000 </z>
      </location>
      <pointmass name="pilot">
        <weight unit="KG"> 100.00 </weight>
        <location unit="M">
          <x> 4.3000 </x>
          <y> 0.0000 </y>
          <z> 0.5500 </z>
        </location>
      </pointmass>
      <pointmass name="gun ammunition">
        <weight unit="KG"> 150.00 </weight>
        <location unit="M">
          <x> 6.5000 </x>
          <y> -0.6000 </y>
          <z> 0.2000 </z>
        </location>
      </pointmass>
    </mass_balance>
    <ground_reactions>
      <contact type="BOGEY" name="Nose Gear">
        <location unit="M">
          <x> 4.7700 </x>
          <y> 0.0000 </y>
          <z> -2.0000 </z>
        </location>
        <static_friction> 0.8 </static_friction>
        <dynamic_friction> 0.5 </dynamic_friction>
        <rolling_friction> 0.02 </rolling_friction>
        <spring_coeff unit="N/M"> 196166 </spring_coeff>
        <damping_coeff unit="N/M/SEC"> 21700 </damping_coeff>
        <damping_coeff_rebound unit="N/M/SEC"> 43399 </damping_coeff_rebound>
        <max_steer unit="DEG"> 32.0 </max_steer>
        <brake_group> NONE </brake_group>
        <retractable> 1 </retractable>
      </contact>
      <contact type="BOGEY" name="Left Main Gear">
        <location unit="M">
          <x> 8.7800 </x>
          <y> -1.1810 </y>
          <z> -2.0000 </z>
        </location>
        <static_friction> 0.8 </static_friction>
        <dynamic_friction> 0.5 </dynamic_friction>
        <rolling_friction> 0.02 </rolling_friction>
        <spring_coeff unit="N/M"> 339541 </spring_coeff>
        <damping_coeff unit="N/M/SEC"> 40569 </damping_coeff>
        <damping_coeff_rebound unit="N/M/SEC"> 81138 </damping_coeff_rebound>
        <max_steer unit="DEG"> 0.0 </max_steer>
        <brake_group> LEFT </brake_group>
        <retractable> 1 </retractable>
      </contact>
      <contact type="BOGEY" name="Right Main Gear">
        <location unit="M">
          <x> 8.7800 </x>
          <y> 1.1810 </y>
          <z> -2.0000 </z>
        </location>
        <static_friction> 0.8 </static_friction>
        <dynamic_friction> 0.5 </dynamic_friction>
        <rolling_friction> 0.02 </rolling_friction>
        <spring_coeff unit="N/M"> 339541 </spring_coeff>
        <damping_coeff unit="N/M/SEC"> 40569 </damping_coeff>
        <damping_coeff_rebound unit="N/M/SEC"> 81138 </damping_coeff_rebound>
        <max_steer unit="DEG"> 0.0 </max_steer>
        <brake_group> RIGHT </brake_group>
        <retractable> 1 </retractable>
      </contact>
      <contact type="STRUCTURE" name="canopy front">
        <location unit="M">
          <x> 3.1129 </x>
          <y> 0.0000 </y>
          <z> 0.9441 </z>
        </location>
        <static_friction> 0.8 </static_friction>
        <dynamic_friction> 0.6 </dynamic_friction>
        <spring_coeff unit="N/M"> 1897360 </spring_coeff>
        <damping_coeff unit="N/M/SEC"> 63245 </damping_coeff>
        <damping_coeff_rebound unit="N/M/SEC"> 63245 </damping_coeff_rebound>
      </contact>
      <contact type="STRUCTURE" name="fin rear">
        <location unit="M">
          <x> 14.6100 </x>
          <y> 0.0000 </y>
          <z> 3.1800 </z>
        </location>
        <static_friction> 0.8 </static_friction>
        <dynamic_friction> 0.6 </dynamic_friction>
        <spring_coeff unit="N/M"> 530120 </spring_coeff>
        <damping_coeff unit="N/M/SEC"> 17671 </damping_coeff>
        <damping_coeff_rebound unit="N/M/SEC"> 17671 </damping_coeff_rebound>
      </contact>
      <contact type="STRUCTURE" name="htail left rear">
        <location unit="M">
          <x> 13.9000 </x>
          <y> -2.7900 </y>
          <z> -0.4101 </z>
        </location>
        <static_friction> 0.8 </static_friction>
        <dynamic_friction> 0.6 </dynamic_friction>
        <spring_coeff unit="N/M"> 691381 </spring_coeff>
        <damping_coeff unit="N/M/SEC"> 23046 </damping_coeff>
        <damping_coeff_rebound unit="N/M/SEC"> 23046 </damping_coeff_rebound>
      </contact>
      <contact type="STRUCTURE" name="htail right rear">
        <location unit="M">
          <x> 13.9000 </x>
          <y> 2.7900 </y>
          <z> -0.4101 </z>
        </location>
        <static_friction> 0.8 </static_friction>
        <dynamic_friction> 0.6 </dynamic_friction>
        <spring_coeff unit="N/M"> 691381 </spring_coeff>
        <damping_coeff unit="N/M/SEC"> 23046 </damping_coeff>
        <damping_coeff_rebound unit="N/M/SEC"> 23046 </damping_coeff_rebound>
      </contact>
      <contact type="STRUCTURE" name="pitot front">
        <location unit="M">
          <x> -0.5640 </x>
          <y> 0.0000 </y>
          <z> -0.3600 </z>
        </location>
        <static_friction> 0.8 </static_friction>
        <dynamic_friction> 0.6 </dynamic_friction>
        <spring_coeff unit="N/M"> 793053 </spring_coeff>
        <damping_coeff unit="N/M/SEC"> 26435 </damping_coeff>
        <damping_coeff_rebound unit="N/M/SEC"> 26435 </damping_coeff_rebound>
      </contact>
      <contact type="STRUCTURE" name="tip launcher left rear">
        <location unit="M">
          <x> 10.7500 </x>
          <y> -4.6603 </y>
          <z> 0.0144 </z>
        </location>
        <static_friction> 0.8 </static_friction>
        <dynamic_friction> 0.6 </dynamic_friction>
        <spring_coeff unit="N/M"> 414787 </spring_coeff>
        <damping_coeff unit="N/M/SEC"> 13826 </damping_coeff>
        <damping_coeff_rebound unit="N/M/SEC"> 13826 </damping_coeff_rebound>
      </contact>
      <contact type="STRUCTURE" name="tip launcher left rear 2">
        <location unit="M">
          <x> 7.9500 </x>
          <y> -4.6350 </y>
          <z> 0.0000 </z>
        </location>
        <static_friction> 0.8 </static_friction>
        <dynamic_friction> 0.6 </dynamic_friction>
        <spring_coeff unit="N/M"> 440578 </spring_coeff>
        <damping_coeff unit="N/M/SEC"> 14686 </damping_coeff>
        <damping_coeff_rebound unit="N/M/SEC"> 14686 </damping_coeff_rebound>
      </contact>
      <contact type="STRUCTURE" name="tip launcher right rear">
        <location unit="M">
          <x> 7.9500 </x>
          <y> 4.6350 </y>
          <z> 0.0000 </z>
        </location>
        <static_friction> 0.8 </static_friction>
        <dynamic_friction> 0.6 </dynamic_friction>
        <spring_coeff unit="N/M"> 440578 </spring_coeff>
        <damping_coeff unit="N/M/SEC"> 14686 </damping_coeff>
        <damping_coeff_rebound unit="N/M/SEC"> 14686 </damping_coeff_rebound>
      </contact>
      <contact type="STRUCTURE" name="tip launcher right rear 2">
        <location unit="M">
          <x> 10.7500 </x>
          <y> 4.6603 </y>
          <z> 0.0144 </z>
        </location>
        <static_friction> 0.8 </static_friction>
        <dynamic_friction> 0.6 </dynamic_friction>
        <spring_coeff unit="N/M"> 414787 </spring_coeff>
        <damping_coeff unit="N/M/SEC"> 13826 </damping_coeff>
        <damping_coeff_rebound unit="N/M/SEC"> 13826 </damping_coeff_rebound>
      </contact>
      <contact type="STRUCTURE" name="ventral left rear">
        <location unit="M">
          <x> 11.3100 </x>
          <y> -0.6400 </y>
          <z> -1.4000 </z>
        </location>
        <static_friction> 0.8 </static_friction>
        <dynamic_friction> 0.6 </dynamic_friction>
        <spring_coeff unit="N/M"> 1012150 </spring_coeff>
        <damping_coeff unit="N/M/SEC"> 33738 </damping_coeff>
        <damping_coeff_rebound unit="N/M/SEC"> 33738 </damping_coeff_rebound>
      </contact>
      <contact type="STRUCTURE" name="ventral right rear">
        <location unit="M">
          <x> 11.3100 </x>
          <y> 0.6400 </y>
          <z> -1.4000 </z>
        </location>
        <static_friction> 0.8 </static_friction>
        <dynamic_friction> 0.6 </dynamic_friction>
        <spring_coeff unit="N/M"> 1012149 </spring_coeff>
        <damping_coeff unit="N/M/SEC"> 33738 </damping_coeff>
        <damping_coeff_rebound unit="N/M/SEC"> 33738 </damping_coeff_rebound>
      </contact>
    </ground_reactions>
    <propulsion>
      <engine file="f16c_engine0">
        <location unit="M">
          <x> 11.3000 </x>
          <y> 0.0000 </y>
          <z> -0.0500 </z>
        </location>
        <feed>0</feed>
        <feed>1</feed>
        <feed>2</feed>
        <feed>3</feed>
        <thruster file="f16c_nozzle0">
          <location unit="M">
            <x> 14.0000 </x>
            <y> 0.0000 </y>
            <z> -0.0500 </z>
          </location>
          <orient unit="DEG"> <roll>0.00</roll> <pitch>0.00</pitch> <yaw>0.00</yaw> </orient>

        </thruster>
      </engine>
      <tank type="FUEL">
        <location unit="M">
          <x> 6.5000 </x>
          <y> 0.0000 </y>
          <z> 0.1000 </z>
        </location>
        <capacity unit="KG"> 1000.00 </capacity>
        <contents unit="KG"> 1000.00 </contents>
      </tank>
      <tank type="FUEL">
        <location unit="M">
          <x> 9.3000 </x>
          <y> 0.0000 </y>
          <z> 0.1000 </z>
        </location>
        <capacity unit="KG"> 1335.00 </capacity>
        <contents unit="KG"> 1335.00 </contents>
      </tank>
      <tank type="FUEL">
        <location unit="M">
          <x> 8.2000 </x>
          <y> -2.0000 </y>
          <z> 0.0000 </z>
        </location>
        <capacity unit="KG"> 420.00 </capacity>
        <contents unit="KG"> 420.00 </contents>
      </tank>
      <tank type="FUEL">
        <location unit="M">
          <x> 8.2000 </x>
          <y> 2.0000 </y>
          <z> 0.0000 </z>
        </location>
        <capacity unit="KG"> 420.00 </capacity>
        <contents unit="KG"> 420.00 </contents>
      </tank>
    </propulsion>
    <flight_control name="f16c">
      <!-- the aircraft's profile for the platform (docs/control-architecture.md, section 7): what
           hangar knows of it - its design, its flight tests, its identified responses -->
      <property value="1">fsim/identity/version</property>
      <property value="1">fsim/identity/provenance</property>
      <property value="2">fsim/identity/class</property>
      <property value="2">fsim/identity/family</property>
      <property value="1">fsim/effectors/version</property>
      <property value="1">fsim/effectors/provenance</property>
      <property value="1">fsim/effectors/flaps</property>
      <property value="8">fsim/effectors/flaps_transit_s</property>
      <property value="1">fsim/effectors/neutral</property>
      <property value="1">fsim/effectors/pitch</property>
      <property value="0.0">fsim/effectors/pitch_trim</property>
      <property value="1">fsim/effectors/retractable_gear</property>
      <property value="1">fsim/effectors/roll</property>
      <property value="1">fsim/effectors/speedbrake</property>
      <property value="1">fsim/effectors/speedbrake_approach</property>
      <property value="1">fsim/effectors/wheel_brakes</property>
      <property value="0.0">fsim/effectors/yaw</property>
      <property value="1">fsim/envelope/version</property>
      <property value="1">fsim/envelope/provenance</property>
      <property value="25">fsim/envelope/clean/alpha_max_deg</property>
      <property value="62.5677">fsim/envelope/clean/cas_min_ms</property>
      <property value="9">fsim/envelope/clean/n_max</property>
      <property value="-3">fsim/envelope/clean/n_min</property>
      <property value="308">fsim/envelope/clean/roll_rate_max_deg_s</property>
      <property value="12.86">fsim/envelope/crosswind_max_ms</property>
      <property value="128.61">fsim/envelope/gear_cas_max_ms</property>
      <property value="10.3">fsim/envelope/ground_pitch_max_deg</property>
      <property value="6.71">fsim/envelope/ground_turn_radius_m</property>
      <property value="0.6987">fsim/envelope/ground_yaw_accel_rad_s2</property>
      <property value="1">fsim/envelope/law_alpha</property>
      <property value="1">fsim/envelope/law_load_factor</property>
      <property value="1">fsim/envelope/law_roll_rate</property>
      <property value="1">fsim/propulsion/version</property>
      <property value="1">fsim/propulsion/provenance</property>
      <property value="1">fsim/propulsion/afterburner</property>
      <property value="1">fsim/propulsion/engines</property>
      <property value="0.168615">fsim/propulsion/spool_s</property>
      <property value="2">fsim/propulsion/type</property>
      <property value="1">fsim/plant/version</property>
      <property value="1">fsim/plant/provenance</property>
      <property value="-1.31642">fsim/plant/alpha_zero_lift_deg</property>
      <property value="3000">fsim/plant/altitude_m</property>
      <property value="143.067">fsim/plant/eas_ms</property>
      <property value="0.0">fsim/plant/elevator_trim</property>
      <property value="0.0">fsim/plant/elevator_trim_lift</property>
      <property value="9.55513">fsim/plant/pitch/gain</property>
      <property value="0.763893">fsim/plant/pitch/tau_s</property>
      <property value="3.74816">fsim/plant/roll/gain</property>
      <property value="0.247073">fsim/plant/roll/tau_s</property>
      <property value="6.4528">fsim/plant/speed/gain</property>
      <property value="0.168615">fsim/plant/speed/tau_s</property>
      <property value="163.54">fsim/plant/tas_ms</property>
      <property value="0.327522">fsim/plant/throttle_trim</property>
      <property value="0.172463">fsim/plant/yaw/gain</property>
      <property value="1">fsim/performance/version</property>
      <property value="1">fsim/performance/provenance</property>
      <property value="18994.2">fsim/performance/ceiling_m</property>
      <property value="318.865">fsim/performance/climb_ms</property>
      <property value="446.352">fsim/performance/max_tas_ms</property>
      <property value="1">fsim/applicability/version</property>
      <property value="1">fsim/applicability/provenance</property>
      <property value="1">fsim/applicability/aerobatic</property>
      <property value="1">fsim/applicability/carrier</property>
      <property value="2">fsim/applicability/drag_devices</property>
      <property value="1">fsim/applicability/flaps</property>
      <property value="1">fsim/applicability/ground_contact</property>
      <property value="2">fsim/applicability/releasable_stores</property>
      <property value="1">fsim/applicability/retractable_gear</property>
      <property value="0.0">fsim/applicability/vertical_flight</property>
      <property value="1">fsim/tables/version</property>
      <property value="1">fsim/tables/provenance</property>
      <property value="100">fsim/tables/altitude_m/h0</property>
      <property value="3800">fsim/tables/altitude_m/h1</property>
      <property value="7590">fsim/tables/altitude_m/h2</property>
      <property value="11390">fsim/tables/altitude_m/h3</property>
      <property value="12192">fsim/tables/altitude_m/h4</property>
      <property value="14240">fsim/tables/altitude_m/h5</property>
      <property value="16140">fsim/tables/altitude_m/h6</property>
      <property value="18030">fsim/tables/altitude_m/h7</property>
      <property value="0.311064">fsim/tables/best_endurance_fuel_kg_s/h0/w0</property>
      <property value="0.347423">fsim/tables/best_endurance_fuel_kg_s/h0/w1</property>
      <property value="0.367216">fsim/tables/best_endurance_fuel_kg_s/h0/w2</property>
      <property value="0.262454">fsim/tables/best_endurance_fuel_kg_s/h1/w0</property>
      <property value="0.293725">fsim/tables/best_endurance_fuel_kg_s/h1/w1</property>
      <property value="0.319462">fsim/tables/best_endurance_fuel_kg_s/h1/w2</property>
      <property value="0.226605">fsim/tables/best_endurance_fuel_kg_s/h2/w0</property>
      <property value="0.252129">fsim/tables/best_endurance_fuel_kg_s/h2/w1</property>
      <property value="0.27563">fsim/tables/best_endurance_fuel_kg_s/h2/w2</property>
      <property value="0.192573">fsim/tables/best_endurance_fuel_kg_s/h3/w0</property>
      <property value="0.214242">fsim/tables/best_endurance_fuel_kg_s/h3/w1</property>
      <property value="0.237658">fsim/tables/best_endurance_fuel_kg_s/h3/w2</property>
      <property value="0.18692">fsim/tables/best_endurance_fuel_kg_s/h4/w0</property>
      <property value="0.209653">fsim/tables/best_endurance_fuel_kg_s/h4/w1</property>
      <property value="0.23559">fsim/tables/best_endurance_fuel_kg_s/h4/w2</property>
      <property value="0.182048">fsim/tables/best_endurance_fuel_kg_s/h5/w0</property>
      <property value="0.207884">fsim/tables/best_endurance_fuel_kg_s/h5/w1</property>
      <property value="0.240131">fsim/tables/best_endurance_fuel_kg_s/h5/w2</property>
      <property value="0.187935">fsim/tables/best_endurance_fuel_kg_s/h6/w0</property>
      <property value="0.739407">fsim/tables/best_endurance_fuel_kg_s/h6/w1</property>
      <property value="0.882526">fsim/tables/best_endurance_fuel_kg_s/h6/w2</property>
      <property value="0.687142">fsim/tables/best_endurance_fuel_kg_s/h7/w0</property>
      <property value="0.864075">fsim/tables/best_endurance_fuel_kg_s/h7/w1</property>
      <property value="1.29213">fsim/tables/best_endurance_fuel_kg_s/h7/w2</property>
      <property value="147.623">fsim/tables/best_endurance_tas_ms/h0/w0</property>
      <property value="158.953">fsim/tables/best_endurance_tas_ms/h0/w1</property>
      <property value="150.922">fsim/tables/best_endurance_tas_ms/h0/w2</property>
      <property value="150.043">fsim/tables/best_endurance_tas_ms/h1/w0</property>
      <property value="151.295">fsim/tables/best_endurance_tas_ms/h1/w1</property>
      <property value="173.077">fsim/tables/best_endurance_tas_ms/h1/w2</property>
      <property value="186.384">fsim/tables/best_endurance_tas_ms/h2/w0</property>
      <property value="198.665">fsim/tables/best_endurance_tas_ms/h2/w1</property>
      <property value="211.93">fsim/tables/best_endurance_tas_ms/h2/w2</property>
      <property value="230.569">fsim/tables/best_endurance_tas_ms/h3/w0</property>
      <property value="240.528">fsim/tables/best_endurance_tas_ms/h3/w1</property>
      <property value="248.497">fsim/tables/best_endurance_tas_ms/h3/w2</property>
      <property value="240.763">fsim/tables/best_endurance_tas_ms/h4/w0</property>
      <property value="248.578">fsim/tables/best_endurance_tas_ms/h4/w1</property>
      <property value="251.764">fsim/tables/best_endurance_tas_ms/h4/w2</property>
      <property value="258.593">fsim/tables/best_endurance_tas_ms/h5/w0</property>
      <property value="258.465">fsim/tables/best_endurance_tas_ms/h5/w1</property>
      <property value="263.257">fsim/tables/best_endurance_tas_ms/h5/w2</property>
      <property value="263.788">fsim/tables/best_endurance_tas_ms/h6/w0</property>
      <property value="270.727">fsim/tables/best_endurance_tas_ms/h6/w1</property>
      <property value="275.668">fsim/tables/best_endurance_tas_ms/h6/w2</property>
      <property value="276.242">fsim/tables/best_endurance_tas_ms/h7/w0</property>
      <property value="280.024">fsim/tables/best_endurance_tas_ms/h7/w1</property>
      <property value="394.387">fsim/tables/best_endurance_tas_ms/h7/w2</property>
      <property value="0.381669">fsim/tables/best_range_fuel_kg_s/h0/w0</property>
      <property value="0.429335">fsim/tables/best_range_fuel_kg_s/h0/w1</property>
      <property value="0.471341">fsim/tables/best_range_fuel_kg_s/h0/w2</property>
      <property value="0.335665">fsim/tables/best_range_fuel_kg_s/h1/w0</property>
      <property value="0.372108">fsim/tables/best_range_fuel_kg_s/h1/w1</property>
      <property value="0.398719">fsim/tables/best_range_fuel_kg_s/h1/w2</property>
      <property value="0.266789">fsim/tables/best_range_fuel_kg_s/h2/w0</property>
      <property value="0.285185">fsim/tables/best_range_fuel_kg_s/h2/w1</property>
      <property value="0.30573">fsim/tables/best_range_fuel_kg_s/h2/w2</property>
      <property value="0.199092">fsim/tables/best_range_fuel_kg_s/h3/w0</property>
      <property value="0.226331">fsim/tables/best_range_fuel_kg_s/h3/w1</property>
      <property value="0.248315">fsim/tables/best_range_fuel_kg_s/h3/w2</property>
      <property value="0.191704">fsim/tables/best_range_fuel_kg_s/h4/w0</property>
      <property value="0.219064">fsim/tables/best_range_fuel_kg_s/h4/w1</property>
      <property value="0.247631">fsim/tables/best_range_fuel_kg_s/h4/w2</property>
      <property value="0.185455">fsim/tables/best_range_fuel_kg_s/h5/w0</property>
      <property value="0.217239">fsim/tables/best_range_fuel_kg_s/h5/w1</property>
      <property value="0.249876">fsim/tables/best_range_fuel_kg_s/h5/w2</property>
      <property value="0.196779">fsim/tables/best_range_fuel_kg_s/h6/w0</property>
      <property value="0.763903">fsim/tables/best_range_fuel_kg_s/h6/w1</property>
      <property value="0.908111">fsim/tables/best_range_fuel_kg_s/h6/w2</property>
      <property value="0.707517">fsim/tables/best_range_fuel_kg_s/h7/w0</property>
      <property value="1.39821">fsim/tables/best_range_fuel_kg_s/h7/w1</property>
      <property value="1.54897">fsim/tables/best_range_fuel_kg_s/h7/w2</property>
      <property value="191.259">fsim/tables/best_range_tas_ms/h0/w0</property>
      <property value="207.679">fsim/tables/best_range_tas_ms/h0/w1</property>
      <property value="220.927">fsim/tables/best_range_tas_ms/h0/w2</property>
      <property value="231.57">fsim/tables/best_range_tas_ms/h1/w0</property>
      <property value="247.164">fsim/tables/best_range_tas_ms/h1/w1</property>
      <property value="257.316">fsim/tables/best_range_tas_ms/h1/w2</property>
      <property value="258.662">fsim/tables/best_range_tas_ms/h2/w0</property>
      <property value="262.572">fsim/tables/best_range_tas_ms/h2/w1</property>
      <property value="267.347">fsim/tables/best_range_tas_ms/h2/w2</property>
      <property value="257.673">fsim/tables/best_range_tas_ms/h3/w0</property>
      <property value="266.113">fsim/tables/best_range_tas_ms/h3/w1</property>
      <property value="269.206">fsim/tables/best_range_tas_ms/h3/w2</property>
      <property value="260.277">fsim/tables/best_range_tas_ms/h4/w0</property>
      <property value="269.164">fsim/tables/best_range_tas_ms/h4/w1</property>
      <property value="270.768">fsim/tables/best_range_tas_ms/h4/w2</property>
      <property value="271.267">fsim/tables/best_range_tas_ms/h5/w0</property>
      <property value="270.236">fsim/tables/best_range_tas_ms/h5/w1</property>
      <property value="273.355">fsim/tables/best_range_tas_ms/h5/w2</property>
      <property value="276.114">fsim/tables/best_range_tas_ms/h6/w0</property>
      <property value="279.467">fsim/tables/best_range_tas_ms/h6/w1</property>
      <property value="284.343">fsim/tables/best_range_tas_ms/h6/w2</property>
      <property value="285.462">fsim/tables/best_range_tas_ms/h7/w0</property>
      <property value="505.188">fsim/tables/best_range_tas_ms/h7/w1</property>
      <property value="516.28">fsim/tables/best_range_tas_ms/h7/w2</property>
      <property value="306.242">fsim/tables/climb_tas_ms/h0/w0</property>
      <property value="306.193">fsim/tables/climb_tas_ms/h0/w1</property>
      <property value="309.265">fsim/tables/climb_tas_ms/h0/w2</property>
      <property value="299.347">fsim/tables/climb_tas_ms/h1/w0</property>
      <property value="302.38">fsim/tables/climb_tas_ms/h1/w1</property>
      <property value="301.308">fsim/tables/climb_tas_ms/h1/w2</property>
      <property value="426.09">fsim/tables/climb_tas_ms/h2/w0</property>
      <property value="291.822">fsim/tables/climb_tas_ms/h2/w1</property>
      <property value="291.378">fsim/tables/climb_tas_ms/h2/w2</property>
      <property value="471.736">fsim/tables/climb_tas_ms/h3/w0</property>
      <property value="470.38">fsim/tables/climb_tas_ms/h3/w1</property>
      <property value="471.545">fsim/tables/climb_tas_ms/h3/w2</property>
      <property value="470.603">fsim/tables/climb_tas_ms/h4/w0</property>
      <property value="471.164">fsim/tables/climb_tas_ms/h4/w1</property>
      <property value="470.514">fsim/tables/climb_tas_ms/h4/w2</property>
      <property value="470.748">fsim/tables/climb_tas_ms/h5/w0</property>
      <property value="470.371">fsim/tables/climb_tas_ms/h5/w1</property>
      <property value="470.473">fsim/tables/climb_tas_ms/h5/w2</property>
      <property value="470.633">fsim/tables/climb_tas_ms/h6/w0</property>
      <property value="470.138">fsim/tables/climb_tas_ms/h6/w1</property>
      <property value="470.266">fsim/tables/climb_tas_ms/h6/w2</property>
      <property value="469.818">fsim/tables/climb_tas_ms/h7/w0</property>
      <property value="467.54">fsim/tables/climb_tas_ms/h7/w1</property>
      <property value="455.234">fsim/tables/climb_tas_ms/h7/w2</property>
      <property value="3175">fsim/tables/fuel_capacity_kg</property>
      <property value="0.31105">fsim/tables/fuel_kg_s/h0/w0/v0</property>
      <property value="0.335708">fsim/tables/fuel_kg_s/h0/w0/v1</property>
      <property value="1.24058">fsim/tables/fuel_kg_s/h0/w0/v10</property>
      <property value="1.71268">fsim/tables/fuel_kg_s/h0/w0/v11</property>
      <property value="5.40493">fsim/tables/fuel_kg_s/h0/w0/v12</property>
      <property value="5.94387">fsim/tables/fuel_kg_s/h0/w0/v13</property>
      <property value="6.49125">fsim/tables/fuel_kg_s/h0/w0/v14</property>
      <property value="7.02846">fsim/tables/fuel_kg_s/h0/w0/v15</property>
      <property value="0.370242">fsim/tables/fuel_kg_s/h0/w0/v2</property>
      <property value="0.409294">fsim/tables/fuel_kg_s/h0/w0/v3</property>
      <property value="0.454358">fsim/tables/fuel_kg_s/h0/w0/v4</property>
      <property value="0.501536">fsim/tables/fuel_kg_s/h0/w0/v5</property>
      <property value="0.552279">fsim/tables/fuel_kg_s/h0/w0/v6</property>
      <property value="0.610743">fsim/tables/fuel_kg_s/h0/w0/v7</property>
      <property value="0.682541">fsim/tables/fuel_kg_s/h0/w0/v8</property>
      <property value="0.810277">fsim/tables/fuel_kg_s/h0/w0/v9</property>
      <property value="0.347412">fsim/tables/fuel_kg_s/h0/w1/v0</property>
      <property value="0.371209">fsim/tables/fuel_kg_s/h0/w1/v1</property>
      <property value="1.33383">fsim/tables/fuel_kg_s/h0/w1/v10</property>
      <property value="1.73978">fsim/tables/fuel_kg_s/h0/w1/v11</property>
      <property value="5.46863">fsim/tables/fuel_kg_s/h0/w1/v12</property>
      <property value="5.98876">fsim/tables/fuel_kg_s/h0/w1/v13</property>
      <property value="6.5139">fsim/tables/fuel_kg_s/h0/w1/v14</property>
      <property value="7.02969">fsim/tables/fuel_kg_s/h0/w1/v15</property>
      <property value="0.404801">fsim/tables/fuel_kg_s/h0/w1/v2</property>
      <property value="0.441491">fsim/tables/fuel_kg_s/h0/w1/v3</property>
      <property value="0.485301">fsim/tables/fuel_kg_s/h0/w1/v4</property>
      <property value="0.530548">fsim/tables/fuel_kg_s/h0/w1/v5</property>
      <property value="0.579489">fsim/tables/fuel_kg_s/h0/w1/v6</property>
      <property value="0.634449">fsim/tables/fuel_kg_s/h0/w1/v7</property>
      <property value="0.707499">fsim/tables/fuel_kg_s/h0/w1/v8</property>
      <property value="0.855876">fsim/tables/fuel_kg_s/h0/w1/v9</property>
      <property value="0.367209">fsim/tables/fuel_kg_s/h0/w2/v0</property>
      <property value="0.382781">fsim/tables/fuel_kg_s/h0/w2/v1</property>
      <property value="1.26873">fsim/tables/fuel_kg_s/h0/w2/v10</property>
      <property value="1.72291">fsim/tables/fuel_kg_s/h0/w2/v11</property>
      <property value="5.42919">fsim/tables/fuel_kg_s/h0/w2/v12</property>
      <property value="5.96415">fsim/tables/fuel_kg_s/h0/w2/v13</property>
      <property value="6.50552">fsim/tables/fuel_kg_s/h0/w2/v14</property>
      <property value="7.03628">fsim/tables/fuel_kg_s/h0/w2/v15</property>
      <property value="0.408043">fsim/tables/fuel_kg_s/h0/w2/v2</property>
      <property value="0.443293">fsim/tables/fuel_kg_s/h0/w2/v3</property>
      <property value="0.481894">fsim/tables/fuel_kg_s/h0/w2/v4</property>
      <property value="0.52782">fsim/tables/fuel_kg_s/h0/w2/v5</property>
      <property value="0.57538">fsim/tables/fuel_kg_s/h0/w2/v6</property>
      <property value="0.629294">fsim/tables/fuel_kg_s/h0/w2/v7</property>
      <property value="0.695455">fsim/tables/fuel_kg_s/h0/w2/v8</property>
      <property value="0.82557">fsim/tables/fuel_kg_s/h0/w2/v9</property>
      <property value="0.264492">fsim/tables/fuel_kg_s/h1/w0/v0</property>
      <property value="0.26415">fsim/tables/fuel_kg_s/h1/w0/v1</property>
      <property value="1.21104">fsim/tables/fuel_kg_s/h1/w0/v10</property>
      <property value="4.05709">fsim/tables/fuel_kg_s/h1/w0/v11</property>
      <property value="4.48046">fsim/tables/fuel_kg_s/h1/w0/v12</property>
      <property value="4.91771">fsim/tables/fuel_kg_s/h1/w0/v13</property>
      <property value="5.37289">fsim/tables/fuel_kg_s/h1/w0/v14</property>
      <property value="5.86747">fsim/tables/fuel_kg_s/h1/w0/v15</property>
      <property value="0.278714">fsim/tables/fuel_kg_s/h1/w0/v2</property>
      <property value="0.303462">fsim/tables/fuel_kg_s/h1/w0/v3</property>
      <property value="0.333629">fsim/tables/fuel_kg_s/h1/w0/v4</property>
      <property value="0.37025">fsim/tables/fuel_kg_s/h1/w0/v5</property>
      <property value="0.411698">fsim/tables/fuel_kg_s/h1/w0/v6</property>
      <property value="0.481151">fsim/tables/fuel_kg_s/h1/w0/v7</property>
      <property value="0.752647">fsim/tables/fuel_kg_s/h1/w0/v8</property>
      <property value="1.07637">fsim/tables/fuel_kg_s/h1/w0/v9</property>
      <property value="0.293724">fsim/tables/fuel_kg_s/h1/w1/v0</property>
      <property value="0.294308">fsim/tables/fuel_kg_s/h1/w1/v1</property>
      <property value="1.24323">fsim/tables/fuel_kg_s/h1/w1/v10</property>
      <property value="4.13851">fsim/tables/fuel_kg_s/h1/w1/v11</property>
      <property value="4.54826">fsim/tables/fuel_kg_s/h1/w1/v12</property>
      <property value="4.97054">fsim/tables/fuel_kg_s/h1/w1/v13</property>
      <property value="5.40994">fsim/tables/fuel_kg_s/h1/w1/v14</property>
      <property value="5.87824">fsim/tables/fuel_kg_s/h1/w1/v15</property>
      <property value="0.308555">fsim/tables/fuel_kg_s/h1/w1/v2</property>
      <property value="0.33189">fsim/tables/fuel_kg_s/h1/w1/v3</property>
      <property value="0.360927">fsim/tables/fuel_kg_s/h1/w1/v4</property>
      <property value="0.395362">fsim/tables/fuel_kg_s/h1/w1/v5</property>
      <property value="0.439398">fsim/tables/fuel_kg_s/h1/w1/v6</property>
      <property value="0.525202">fsim/tables/fuel_kg_s/h1/w1/v7</property>
      <property value="0.85733">fsim/tables/fuel_kg_s/h1/w1/v8</property>
      <property value="1.11264">fsim/tables/fuel_kg_s/h1/w1/v9</property>
      <property value="0.333431">fsim/tables/fuel_kg_s/h1/w2/v0</property>
      <property value="0.319833">fsim/tables/fuel_kg_s/h1/w2/v1</property>
      <property value="1.24232">fsim/tables/fuel_kg_s/h1/w2/v10</property>
      <property value="4.13546">fsim/tables/fuel_kg_s/h1/w2/v11</property>
      <property value="4.54261">fsim/tables/fuel_kg_s/h1/w2/v12</property>
      <property value="4.97078">fsim/tables/fuel_kg_s/h1/w2/v13</property>
      <property value="5.41538">fsim/tables/fuel_kg_s/h1/w2/v14</property>
      <property value="5.89006">fsim/tables/fuel_kg_s/h1/w2/v15</property>
      <property value="0.325809">fsim/tables/fuel_kg_s/h1/w2/v2</property>
      <property value="0.343358">fsim/tables/fuel_kg_s/h1/w2/v3</property>
      <property value="0.370289">fsim/tables/fuel_kg_s/h1/w2/v4</property>
      <property value="0.400402">fsim/tables/fuel_kg_s/h1/w2/v5</property>
      <property value="0.442182">fsim/tables/fuel_kg_s/h1/w2/v6</property>
      <property value="0.520035">fsim/tables/fuel_kg_s/h1/w2/v7</property>
      <property value="0.828377">fsim/tables/fuel_kg_s/h1/w2/v8</property>
      <property value="1.10985">fsim/tables/fuel_kg_s/h1/w2/v9</property>
      <property value="0.258197">fsim/tables/fuel_kg_s/h2/w0/v0</property>
      <property value="0.231407">fsim/tables/fuel_kg_s/h2/w0/v1</property>
      <property value="2.88236">fsim/tables/fuel_kg_s/h2/w0/v10</property>
      <property value="3.19198">fsim/tables/fuel_kg_s/h2/w0/v11</property>
      <property value="3.54561">fsim/tables/fuel_kg_s/h2/w0/v12</property>
      <property value="3.91549">fsim/tables/fuel_kg_s/h2/w0/v13</property>
      <property value="4.30037">fsim/tables/fuel_kg_s/h2/w0/v14</property>
      <property value="4.69961">fsim/tables/fuel_kg_s/h2/w0/v15</property>
      <property value="0.226783">fsim/tables/fuel_kg_s/h2/w0/v2</property>
      <property value="0.235815">fsim/tables/fuel_kg_s/h2/w0/v3</property>
      <property value="0.252854">fsim/tables/fuel_kg_s/h2/w0/v4</property>
      <property value="0.279225">fsim/tables/fuel_kg_s/h2/w0/v5</property>
      <property value="0.371101">fsim/tables/fuel_kg_s/h2/w0/v6</property>
      <property value="0.629023">fsim/tables/fuel_kg_s/h2/w0/v7</property>
      <property value="0.724102">fsim/tables/fuel_kg_s/h2/w0/v8</property>
      <property value="0.823239">fsim/tables/fuel_kg_s/h2/w0/v9</property>
      <property value="0.278269">fsim/tables/fuel_kg_s/h2/w1/v0</property>
      <property value="0.255516">fsim/tables/fuel_kg_s/h2/w1/v1</property>
      <property value="2.98205">fsim/tables/fuel_kg_s/h2/w1/v10</property>
      <property value="3.28425">fsim/tables/fuel_kg_s/h2/w1/v11</property>
      <property value="3.61973">fsim/tables/fuel_kg_s/h2/w1/v12</property>
      <property value="3.96891">fsim/tables/fuel_kg_s/h2/w1/v13</property>
      <property value="4.3312">fsim/tables/fuel_kg_s/h2/w1/v14</property>
      <property value="4.71436">fsim/tables/fuel_kg_s/h2/w1/v15</property>
      <property value="0.252421">fsim/tables/fuel_kg_s/h2/w1/v2</property>
      <property value="0.260665">fsim/tables/fuel_kg_s/h2/w1/v3</property>
      <property value="0.276947">fsim/tables/fuel_kg_s/h2/w1/v4</property>
      <property value="0.309256">fsim/tables/fuel_kg_s/h2/w1/v5</property>
      <property value="0.473508">fsim/tables/fuel_kg_s/h2/w1/v6</property>
      <property value="0.66797">fsim/tables/fuel_kg_s/h2/w1/v7</property>
      <property value="0.762335">fsim/tables/fuel_kg_s/h2/w1/v8</property>
      <property value="0.857515">fsim/tables/fuel_kg_s/h2/w1/v9</property>
      <property value="0.320067">fsim/tables/fuel_kg_s/h2/w2/v0</property>
      <property value="0.28799">fsim/tables/fuel_kg_s/h2/w2/v1</property>
      <property value="3.02078">fsim/tables/fuel_kg_s/h2/w2/v10</property>
      <property value="3.32255">fsim/tables/fuel_kg_s/h2/w2/v11</property>
      <property value="3.65766">fsim/tables/fuel_kg_s/h2/w2/v12</property>
      <property value="4.00704">fsim/tables/fuel_kg_s/h2/w2/v13</property>
      <property value="4.36716">fsim/tables/fuel_kg_s/h2/w2/v14</property>
      <property value="4.73848">fsim/tables/fuel_kg_s/h2/w2/v15</property>
      <property value="0.276197">fsim/tables/fuel_kg_s/h2/w2/v2</property>
      <property value="0.27967">fsim/tables/fuel_kg_s/h2/w2/v3</property>
      <property value="0.292441">fsim/tables/fuel_kg_s/h2/w2/v4</property>
      <property value="0.323036">fsim/tables/fuel_kg_s/h2/w2/v5</property>
      <property value="0.484647">fsim/tables/fuel_kg_s/h2/w2/v6</property>
      <property value="0.678008">fsim/tables/fuel_kg_s/h2/w2/v7</property>
      <property value="0.773379">fsim/tables/fuel_kg_s/h2/w2/v8</property>
      <property value="2.73105">fsim/tables/fuel_kg_s/h2/w2/v9</property>
      <property value="0.258971">fsim/tables/fuel_kg_s/h3/w0/v0</property>
      <property value="0.215342">fsim/tables/fuel_kg_s/h3/w0/v1</property>
      <property value="2.18775">fsim/tables/fuel_kg_s/h3/w0/v10</property>
      <property value="2.43431">fsim/tables/fuel_kg_s/h3/w0/v11</property>
      <property value="2.68783">fsim/tables/fuel_kg_s/h3/w0/v12</property>
      <property value="2.95234">fsim/tables/fuel_kg_s/h3/w0/v13</property>
      <property value="3.22449">fsim/tables/fuel_kg_s/h3/w0/v14</property>
      <property value="3.5064">fsim/tables/fuel_kg_s/h3/w0/v15</property>
      <property value="0.196567">fsim/tables/fuel_kg_s/h3/w0/v2</property>
      <property value="0.192828">fsim/tables/fuel_kg_s/h3/w0/v3</property>
      <property value="0.201614">fsim/tables/fuel_kg_s/h3/w0/v4</property>
      <property value="0.30363">fsim/tables/fuel_kg_s/h3/w0/v5</property>
      <property value="0.408324">fsim/tables/fuel_kg_s/h3/w0/v6</property>
      <property value="0.475138">fsim/tables/fuel_kg_s/h3/w0/v7</property>
      <property value="1.75244">fsim/tables/fuel_kg_s/h3/w0/v8</property>
      <property value="1.95506">fsim/tables/fuel_kg_s/h3/w0/v9</property>
      <property value="0.275905">fsim/tables/fuel_kg_s/h3/w1/v0</property>
      <property value="0.23691">fsim/tables/fuel_kg_s/h3/w1/v1</property>
      <property value="2.26981">fsim/tables/fuel_kg_s/h3/w1/v10</property>
      <property value="2.50778">fsim/tables/fuel_kg_s/h3/w1/v11</property>
      <property value="2.75214">fsim/tables/fuel_kg_s/h3/w1/v12</property>
      <property value="3.00733">fsim/tables/fuel_kg_s/h3/w1/v13</property>
      <property value="3.26927">fsim/tables/fuel_kg_s/h3/w1/v14</property>
      <property value="3.54087">fsim/tables/fuel_kg_s/h3/w1/v15</property>
      <property value="0.219262">fsim/tables/fuel_kg_s/h3/w1/v2</property>
      <property value="0.215527">fsim/tables/fuel_kg_s/h3/w1/v3</property>
      <property value="0.23456">fsim/tables/fuel_kg_s/h3/w1/v4</property>
      <property value="0.373847">fsim/tables/fuel_kg_s/h3/w1/v5</property>
      <property value="0.444338">fsim/tables/fuel_kg_s/h3/w1/v6</property>
      <property value="1.67393">fsim/tables/fuel_kg_s/h3/w1/v7</property>
      <property value="1.85548">fsim/tables/fuel_kg_s/h3/w1/v8</property>
      <property value="2.04806">fsim/tables/fuel_kg_s/h3/w1/v9</property>
      <property value="0.322464">fsim/tables/fuel_kg_s/h3/w2/v0</property>
      <property value="0.272099">fsim/tables/fuel_kg_s/h3/w2/v1</property>
      <property value="2.32768">fsim/tables/fuel_kg_s/h3/w2/v10</property>
      <property value="2.55909">fsim/tables/fuel_kg_s/h3/w2/v11</property>
      <property value="2.79391">fsim/tables/fuel_kg_s/h3/w2/v12</property>
      <property value="3.04471">fsim/tables/fuel_kg_s/h3/w2/v13</property>
      <property value="3.30404">fsim/tables/fuel_kg_s/h3/w2/v14</property>
      <property value="3.57334">fsim/tables/fuel_kg_s/h3/w2/v15</property>
      <property value="0.24769">fsim/tables/fuel_kg_s/h3/w2/v2</property>
      <property value="0.237915">fsim/tables/fuel_kg_s/h3/w2/v3</property>
      <property value="0.255149">fsim/tables/fuel_kg_s/h3/w2/v4</property>
      <property value="0.399921">fsim/tables/fuel_kg_s/h3/w2/v5</property>
      <property value="0.467437">fsim/tables/fuel_kg_s/h3/w2/v6</property>
      <property value="1.74042">fsim/tables/fuel_kg_s/h3/w2/v7</property>
      <property value="1.91814">fsim/tables/fuel_kg_s/h3/w2/v8</property>
      <property value="2.10952">fsim/tables/fuel_kg_s/h3/w2/v9</property>
      <property value="0.266602">fsim/tables/fuel_kg_s/h4/w0/v0</property>
      <property value="0.217491">fsim/tables/fuel_kg_s/h4/w0/v1</property>
      <property value="1.96097">fsim/tables/fuel_kg_s/h4/w0/v10</property>
      <property value="2.1764">fsim/tables/fuel_kg_s/h4/w0/v11</property>
      <property value="2.39747">fsim/tables/fuel_kg_s/h4/w0/v12</property>
      <property value="2.62891">fsim/tables/fuel_kg_s/h4/w0/v13</property>
      <property value="2.86676">fsim/tables/fuel_kg_s/h4/w0/v14</property>
      <property value="3.11343">fsim/tables/fuel_kg_s/h4/w0/v15</property>
      <property value="0.19557">fsim/tables/fuel_kg_s/h4/w0/v2</property>
      <property value="0.186961">fsim/tables/fuel_kg_s/h4/w0/v3</property>
      <property value="0.193359">fsim/tables/fuel_kg_s/h4/w0/v4</property>
      <property value="0.284923">fsim/tables/fuel_kg_s/h4/w0/v5</property>
      <property value="0.373197">fsim/tables/fuel_kg_s/h4/w0/v6</property>
      <property value="0.433184">fsim/tables/fuel_kg_s/h4/w0/v7</property>
      <property value="1.59147">fsim/tables/fuel_kg_s/h4/w0/v8</property>
      <property value="1.76157">fsim/tables/fuel_kg_s/h4/w0/v9</property>
      <property value="0.28436">fsim/tables/fuel_kg_s/h4/w1/v0</property>
      <property value="0.240086">fsim/tables/fuel_kg_s/h4/w1/v1</property>
      <property value="2.05093">fsim/tables/fuel_kg_s/h4/w1/v10</property>
      <property value="2.25459">fsim/tables/fuel_kg_s/h4/w1/v11</property>
      <property value="2.46108">fsim/tables/fuel_kg_s/h4/w1/v12</property>
      <property value="2.68094">fsim/tables/fuel_kg_s/h4/w1/v13</property>
      <property value="2.90905">fsim/tables/fuel_kg_s/h4/w1/v14</property>
      <property value="3.14584">fsim/tables/fuel_kg_s/h4/w1/v15</property>
      <property value="0.218586">fsim/tables/fuel_kg_s/h4/w1/v2</property>
      <property value="0.209876">fsim/tables/fuel_kg_s/h4/w1/v3</property>
      <property value="0.225123">fsim/tables/fuel_kg_s/h4/w1/v4</property>
      <property value="0.352262">fsim/tables/fuel_kg_s/h4/w1/v5</property>
      <property value="0.412179">fsim/tables/fuel_kg_s/h4/w1/v6</property>
      <property value="1.53509">fsim/tables/fuel_kg_s/h4/w1/v7</property>
      <property value="1.69078">fsim/tables/fuel_kg_s/h4/w1/v8</property>
      <property value="1.85917">fsim/tables/fuel_kg_s/h4/w1/v9</property>
      <property value="0.334845">fsim/tables/fuel_kg_s/h4/w2/v0</property>
      <property value="0.277232">fsim/tables/fuel_kg_s/h4/w2/v1</property>
      <property value="2.11161">fsim/tables/fuel_kg_s/h4/w2/v10</property>
      <property value="2.31301">fsim/tables/fuel_kg_s/h4/w2/v11</property>
      <property value="2.51636">fsim/tables/fuel_kg_s/h4/w2/v12</property>
      <property value="2.73071">fsim/tables/fuel_kg_s/h4/w2/v13</property>
      <property value="2.94913">fsim/tables/fuel_kg_s/h4/w2/v14</property>
      <property value="3.1765">fsim/tables/fuel_kg_s/h4/w2/v15</property>
      <property value="0.247979">fsim/tables/fuel_kg_s/h4/w2/v2</property>
      <property value="0.235889">fsim/tables/fuel_kg_s/h4/w2/v3</property>
      <property value="0.25688">fsim/tables/fuel_kg_s/h4/w2/v4</property>
      <property value="0.381195">fsim/tables/fuel_kg_s/h4/w2/v5</property>
      <property value="1.44198">fsim/tables/fuel_kg_s/h4/w2/v6</property>
      <property value="1.61732">fsim/tables/fuel_kg_s/h4/w2/v7</property>
      <property value="1.75581">fsim/tables/fuel_kg_s/h4/w2/v8</property>
      <property value="1.92305">fsim/tables/fuel_kg_s/h4/w2/v9</property>
      <property value="0.953572">fsim/tables/fuel_kg_s/h5/w0/v0</property>
      <property value="0.226649">fsim/tables/fuel_kg_s/h5/w0/v1</property>
      <property value="1.55266">fsim/tables/fuel_kg_s/h5/w0/v10</property>
      <property value="1.7028">fsim/tables/fuel_kg_s/h5/w0/v11</property>
      <property value="1.85438">fsim/tables/fuel_kg_s/h5/w0/v12</property>
      <property value="2.01465">fsim/tables/fuel_kg_s/h5/w0/v13</property>
      <property value="2.1778">fsim/tables/fuel_kg_s/h5/w0/v14</property>
      <property value="2.34815">fsim/tables/fuel_kg_s/h5/w0/v15</property>
      <property value="0.196906">fsim/tables/fuel_kg_s/h5/w0/v2</property>
      <property value="0.18285">fsim/tables/fuel_kg_s/h5/w0/v3</property>
      <property value="0.1863">fsim/tables/fuel_kg_s/h5/w0/v4</property>
      <property value="0.271598">fsim/tables/fuel_kg_s/h5/w0/v5</property>
      <property value="1.0562">fsim/tables/fuel_kg_s/h5/w0/v6</property>
      <property value="1.19355">fsim/tables/fuel_kg_s/h5/w0/v7</property>
      <property value="1.29587">fsim/tables/fuel_kg_s/h5/w0/v8</property>
      <property value="1.41268">fsim/tables/fuel_kg_s/h5/w0/v9</property>
      <property value="1.02284">fsim/tables/fuel_kg_s/h5/w1/v0</property>
      <property value="0.254064">fsim/tables/fuel_kg_s/h5/w1/v1</property>
      <property value="1.63621">fsim/tables/fuel_kg_s/h5/w1/v10</property>
      <property value="1.77622">fsim/tables/fuel_kg_s/h5/w1/v11</property>
      <property value="1.92005">fsim/tables/fuel_kg_s/h5/w1/v12</property>
      <property value="2.07241">fsim/tables/fuel_kg_s/h5/w1/v13</property>
      <property value="2.22731">fsim/tables/fuel_kg_s/h5/w1/v14</property>
      <property value="2.38888">fsim/tables/fuel_kg_s/h5/w1/v15</property>
      <property value="0.223558">fsim/tables/fuel_kg_s/h5/w1/v2</property>
      <property value="0.208877">fsim/tables/fuel_kg_s/h5/w1/v3</property>
      <property value="0.243296">fsim/tables/fuel_kg_s/h5/w1/v4</property>
      <property value="1.0505">fsim/tables/fuel_kg_s/h5/w1/v5</property>
      <property value="1.19461">fsim/tables/fuel_kg_s/h5/w1/v6</property>
      <property value="1.30462">fsim/tables/fuel_kg_s/h5/w1/v7</property>
      <property value="1.40125">fsim/tables/fuel_kg_s/h5/w1/v8</property>
      <property value="1.50857">fsim/tables/fuel_kg_s/h5/w1/v9</property>
      <property value="1.20094">fsim/tables/fuel_kg_s/h5/w2/v0</property>
      <property value="0.981896">fsim/tables/fuel_kg_s/h5/w2/v1</property>
      <property value="1.70871">fsim/tables/fuel_kg_s/h5/w2/v10</property>
      <property value="1.84291">fsim/tables/fuel_kg_s/h5/w2/v11</property>
      <property value="1.97259">fsim/tables/fuel_kg_s/h5/w2/v12</property>
      <property value="2.11136">fsim/tables/fuel_kg_s/h5/w2/v13</property>
      <property value="2.25854">fsim/tables/fuel_kg_s/h5/w2/v14</property>
      <property value="2.41364">fsim/tables/fuel_kg_s/h5/w2/v15</property>
      <property value="0.260182">fsim/tables/fuel_kg_s/h5/w2/v2</property>
      <property value="0.241224">fsim/tables/fuel_kg_s/h5/w2/v3</property>
      <property value="0.283291">fsim/tables/fuel_kg_s/h5/w2/v4</property>
      <property value="1.15842">fsim/tables/fuel_kg_s/h5/w2/v5</property>
      <property value="1.30042">fsim/tables/fuel_kg_s/h5/w2/v6</property>
      <property value="1.40484">fsim/tables/fuel_kg_s/h5/w2/v7</property>
      <property value="1.48391">fsim/tables/fuel_kg_s/h5/w2/v8</property>
      <property value="1.58634">fsim/tables/fuel_kg_s/h5/w2/v9</property>
      <property value="0.795816">fsim/tables/fuel_kg_s/h6/w0/v1</property>
      <property value="1.275">fsim/tables/fuel_kg_s/h6/w0/v10</property>
      <property value="1.37508">fsim/tables/fuel_kg_s/h6/w0/v11</property>
      <property value="1.47337">fsim/tables/fuel_kg_s/h6/w0/v12</property>
      <property value="1.57721">fsim/tables/fuel_kg_s/h6/w0/v13</property>
      <property value="1.68346">fsim/tables/fuel_kg_s/h6/w0/v14</property>
      <property value="1.79671">fsim/tables/fuel_kg_s/h6/w0/v15</property>
      <property value="0.207405">fsim/tables/fuel_kg_s/h6/w0/v2</property>
      <property value="0.187949">fsim/tables/fuel_kg_s/h6/w0/v3</property>
      <property value="0.205389">fsim/tables/fuel_kg_s/h6/w0/v4</property>
      <property value="0.865507">fsim/tables/fuel_kg_s/h6/w0/v5</property>
      <property value="0.971412">fsim/tables/fuel_kg_s/h6/w0/v6</property>
      <property value="1.05481">fsim/tables/fuel_kg_s/h6/w0/v7</property>
      <property value="1.11503">fsim/tables/fuel_kg_s/h6/w0/v8</property>
      <property value="1.18417">fsim/tables/fuel_kg_s/h6/w0/v9</property>
      <property value="0.9106">fsim/tables/fuel_kg_s/h6/w1/v1</property>
      <property value="1.36893">fsim/tables/fuel_kg_s/h6/w1/v10</property>
      <property value="1.45846">fsim/tables/fuel_kg_s/h6/w1/v11</property>
      <property value="1.55028">fsim/tables/fuel_kg_s/h6/w1/v12</property>
      <property value="1.64684">fsim/tables/fuel_kg_s/h6/w1/v13</property>
      <property value="1.74733">fsim/tables/fuel_kg_s/h6/w1/v14</property>
      <property value="1.84841">fsim/tables/fuel_kg_s/h6/w1/v15</property>
      <property value="0.797478">fsim/tables/fuel_kg_s/h6/w1/v2</property>
      <property value="0.743843">fsim/tables/fuel_kg_s/h6/w1/v3</property>
      <property value="0.879614">fsim/tables/fuel_kg_s/h6/w1/v4</property>
      <property value="1.01321">fsim/tables/fuel_kg_s/h6/w1/v5</property>
      <property value="1.12204">fsim/tables/fuel_kg_s/h6/w1/v6</property>
      <property value="1.1816">fsim/tables/fuel_kg_s/h6/w1/v7</property>
      <property value="1.22792">fsim/tables/fuel_kg_s/h6/w1/v8</property>
      <property value="1.28926">fsim/tables/fuel_kg_s/h6/w1/v9</property>
      <property value="1.06424">fsim/tables/fuel_kg_s/h6/w2/v1</property>
      <property value="1.46303">fsim/tables/fuel_kg_s/h6/w2/v10</property>
      <property value="1.54706">fsim/tables/fuel_kg_s/h6/w2/v11</property>
      <property value="1.63014">fsim/tables/fuel_kg_s/h6/w2/v12</property>
      <property value="1.71427">fsim/tables/fuel_kg_s/h6/w2/v13</property>
      <property value="1.80539">fsim/tables/fuel_kg_s/h6/w2/v14</property>
      <property value="1.89912">fsim/tables/fuel_kg_s/h6/w2/v15</property>
      <property value="0.938205">fsim/tables/fuel_kg_s/h6/w2/v2</property>
      <property value="0.889205">fsim/tables/fuel_kg_s/h6/w2/v3</property>
      <property value="1.0417">fsim/tables/fuel_kg_s/h6/w2/v4</property>
      <property value="1.1517">fsim/tables/fuel_kg_s/h6/w2/v5</property>
      <property value="1.26561">fsim/tables/fuel_kg_s/h6/w2/v6</property>
      <property value="1.30499">fsim/tables/fuel_kg_s/h6/w2/v7</property>
      <property value="1.3428">fsim/tables/fuel_kg_s/h6/w2/v8</property>
      <property value="1.38896">fsim/tables/fuel_kg_s/h6/w2/v9</property>
      <property value="1.10099">fsim/tables/fuel_kg_s/h7/w0/v10</property>
      <property value="1.16179">fsim/tables/fuel_kg_s/h7/w0/v11</property>
      <property value="1.22396">fsim/tables/fuel_kg_s/h7/w0/v12</property>
      <property value="1.28478">fsim/tables/fuel_kg_s/h7/w0/v13</property>
      <property value="1.35088">fsim/tables/fuel_kg_s/h7/w0/v14</property>
      <property value="1.41529">fsim/tables/fuel_kg_s/h7/w0/v15</property>
      <property value="0.723786">fsim/tables/fuel_kg_s/h7/w0/v2</property>
      <property value="0.692385">fsim/tables/fuel_kg_s/h7/w0/v3</property>
      <property value="0.800072">fsim/tables/fuel_kg_s/h7/w0/v4</property>
      <property value="0.88155">fsim/tables/fuel_kg_s/h7/w0/v5</property>
      <property value="0.969419">fsim/tables/fuel_kg_s/h7/w0/v6</property>
      <property value="1.00051">fsim/tables/fuel_kg_s/h7/w0/v7</property>
      <property value="1.02026">fsim/tables/fuel_kg_s/h7/w0/v8</property>
      <property value="1.04957">fsim/tables/fuel_kg_s/h7/w0/v9</property>
      <property value="1.20938">fsim/tables/fuel_kg_s/h7/w1/v10</property>
      <property value="1.25883">fsim/tables/fuel_kg_s/h7/w1/v11</property>
      <property value="1.31614">fsim/tables/fuel_kg_s/h7/w1/v12</property>
      <property value="1.36324">fsim/tables/fuel_kg_s/h7/w1/v13</property>
      <property value="1.42003">fsim/tables/fuel_kg_s/h7/w1/v14</property>
      <property value="1.4838">fsim/tables/fuel_kg_s/h7/w1/v15</property>
      <property value="0.901434">fsim/tables/fuel_kg_s/h7/w1/v2</property>
      <property value="0.866804">fsim/tables/fuel_kg_s/h7/w1/v3</property>
      <property value="0.952861">fsim/tables/fuel_kg_s/h7/w1/v4</property>
      <property value="1.02927">fsim/tables/fuel_kg_s/h7/w1/v5</property>
      <property value="1.12192">fsim/tables/fuel_kg_s/h7/w1/v6</property>
      <property value="1.1547">fsim/tables/fuel_kg_s/h7/w1/v7</property>
      <property value="1.15957">fsim/tables/fuel_kg_s/h7/w1/v8</property>
      <property value="1.16968">fsim/tables/fuel_kg_s/h7/w1/v9</property>
      <property value="1.36135">fsim/tables/fuel_kg_s/h7/w2/v10</property>
      <property value="1.396">fsim/tables/fuel_kg_s/h7/w2/v11</property>
      <property value="1.43847">fsim/tables/fuel_kg_s/h7/w2/v12</property>
      <property value="1.47512">fsim/tables/fuel_kg_s/h7/w2/v13</property>
      <property value="1.50846">fsim/tables/fuel_kg_s/h7/w2/v14</property>
      <property value="1.55027">fsim/tables/fuel_kg_s/h7/w2/v15</property>
      <property value="1.35415">fsim/tables/fuel_kg_s/h7/w2/v4</property>
      <property value="1.37536">fsim/tables/fuel_kg_s/h7/w2/v5</property>
      <property value="1.41082">fsim/tables/fuel_kg_s/h7/w2/v6</property>
      <property value="1.30062">fsim/tables/fuel_kg_s/h7/w2/v7</property>
      <property value="1.31573">fsim/tables/fuel_kg_s/h7/w2/v8</property>
      <property value="1.33255">fsim/tables/fuel_kg_s/h7/w2/v9</property>
      <property value="394.233">fsim/tables/max_climb_ms/h0/w0</property>
      <property value="345.57">fsim/tables/max_climb_ms/h0/w1</property>
      <property value="306.303">fsim/tables/max_climb_ms/h0/w2</property>
      <property value="307.853">fsim/tables/max_climb_ms/h1/w0</property>
      <property value="268.705">fsim/tables/max_climb_ms/h1/w1</property>
      <property value="237.314">fsim/tables/max_climb_ms/h1/w2</property>
      <property value="229.299">fsim/tables/max_climb_ms/h2/w0</property>
      <property value="197.743">fsim/tables/max_climb_ms/h2/w1</property>
      <property value="173.316">fsim/tables/max_climb_ms/h2/w2</property>
      <property value="193.579">fsim/tables/max_climb_ms/h3/w0</property>
      <property value="164.042">fsim/tables/max_climb_ms/h3/w1</property>
      <property value="140.905">fsim/tables/max_climb_ms/h3/w2</property>
      <property value="165.94">fsim/tables/max_climb_ms/h4/w0</property>
      <property value="139.389">fsim/tables/max_climb_ms/h4/w1</property>
      <property value="118.62">fsim/tables/max_climb_ms/h4/w2</property>
      <property value="117.015">fsim/tables/max_climb_ms/h5/w0</property>
      <property value="96.3163">fsim/tables/max_climb_ms/h5/w1</property>
      <property value="79.3583">fsim/tables/max_climb_ms/h5/w2</property>
      <property value="74.1112">fsim/tables/max_climb_ms/h6/w0</property>
      <property value="57.4562">fsim/tables/max_climb_ms/h6/w1</property>
      <property value="43.5711">fsim/tables/max_climb_ms/h6/w2</property>
      <property value="38.3611">fsim/tables/max_climb_ms/h7/w0</property>
      <property value="24.1077">fsim/tables/max_climb_ms/h7/w1</property>
      <property value="12.1498">fsim/tables/max_climb_ms/h7/w2</property>
      <property value="446.537">fsim/tables/max_tas_ms/h0/w0</property>
      <property value="446.209">fsim/tables/max_tas_ms/h0/w1</property>
      <property value="446.067">fsim/tables/max_tas_ms/h0/w2</property>
      <property value="499.064">fsim/tables/max_tas_ms/h1/w0</property>
      <property value="498.742">fsim/tables/max_tas_ms/h1/w1</property>
      <property value="498.138">fsim/tables/max_tas_ms/h1/w2</property>
      <property value="556.673">fsim/tables/max_tas_ms/h2/w0</property>
      <property value="555.838">fsim/tables/max_tas_ms/h2/w1</property>
      <property value="554.751">fsim/tables/max_tas_ms/h2/w2</property>
      <property value="610.403">fsim/tables/max_tas_ms/h3/w0</property>
      <property value="607.909">fsim/tables/max_tas_ms/h3/w1</property>
      <property value="605.479">fsim/tables/max_tas_ms/h3/w2</property>
      <property value="607.385">fsim/tables/max_tas_ms/h4/w0</property>
      <property value="604.629">fsim/tables/max_tas_ms/h4/w1</property>
      <property value="601.953">fsim/tables/max_tas_ms/h4/w2</property>
      <property value="604.389">fsim/tables/max_tas_ms/h5/w0</property>
      <property value="599.683">fsim/tables/max_tas_ms/h5/w1</property>
      <property value="592.419">fsim/tables/max_tas_ms/h5/w2</property>
      <property value="589.634">fsim/tables/max_tas_ms/h6/w0</property>
      <property value="581.213">fsim/tables/max_tas_ms/h6/w1</property>
      <property value="571.789">fsim/tables/max_tas_ms/h6/w2</property>
      <property value="566.138">fsim/tables/max_tas_ms/h7/w0</property>
      <property value="550.619">fsim/tables/max_tas_ms/h7/w1</property>
      <property value="532.247">fsim/tables/max_tas_ms/h7/w2</property>
      <property value="147.623">fsim/tables/min_tas_ms/h0/w0</property>
      <property value="158.953">fsim/tables/min_tas_ms/h0/w1</property>
      <property value="150.922">fsim/tables/min_tas_ms/h0/w2</property>
      <property value="137.986">fsim/tables/min_tas_ms/h1/w0</property>
      <property value="151.295">fsim/tables/min_tas_ms/h1/w1</property>
      <property value="146.244">fsim/tables/min_tas_ms/h1/w2</property>
      <property value="136.989">fsim/tables/min_tas_ms/h2/w0</property>
      <property value="153.023">fsim/tables/min_tas_ms/h2/w1</property>
      <property value="153.687">fsim/tables/min_tas_ms/h2/w2</property>
      <property value="147.644">fsim/tables/min_tas_ms/h3/w0</property>
      <property value="165.117">fsim/tables/min_tas_ms/h3/w1</property>
      <property value="168.599">fsim/tables/min_tas_ms/h3/w2</property>
      <property value="150.967">fsim/tables/min_tas_ms/h4/w0</property>
      <property value="168.837">fsim/tables/min_tas_ms/h4/w1</property>
      <property value="173.326">fsim/tables/min_tas_ms/h4/w2</property>
      <property value="166.07">fsim/tables/min_tas_ms/h5/w0</property>
      <property value="184.316">fsim/tables/min_tas_ms/h5/w1</property>
      <property value="191.459">fsim/tables/min_tas_ms/h5/w2</property>
      <property value="185.869">fsim/tables/min_tas_ms/h6/w0</property>
      <property value="203.93">fsim/tables/min_tas_ms/h6/w1</property>
      <property value="213.21">fsim/tables/min_tas_ms/h6/w2</property>
      <property value="215.58">fsim/tables/min_tas_ms/h7/w0</property>
      <property value="221.991">fsim/tables/min_tas_ms/h7/w1</property>
      <property value="276.089">fsim/tables/min_tas_ms/h7/w2</property>
      <property value="206.147">fsim/tables/ps_full_ms/h0/w0/v0</property>
      <property value="231.778">fsim/tables/ps_full_ms/h0/w0/v1</property>
      <property value="350.889">fsim/tables/ps_full_ms/h0/w0/v10</property>
      <property value="279.161">fsim/tables/ps_full_ms/h0/w0/v11</property>
      <property value="220.215">fsim/tables/ps_full_ms/h0/w0/v12</property>
      <property value="172.714">fsim/tables/ps_full_ms/h0/w0/v13</property>
      <property value="116.82">fsim/tables/ps_full_ms/h0/w0/v14</property>
      <property value="50.8492">fsim/tables/ps_full_ms/h0/w0/v15</property>
      <property value="256.412">fsim/tables/ps_full_ms/h0/w0/v2</property>
      <property value="280.593">fsim/tables/ps_full_ms/h0/w0/v3</property>
      <property value="304.542">fsim/tables/ps_full_ms/h0/w0/v4</property>
      <property value="328.455">fsim/tables/ps_full_ms/h0/w0/v5</property>
      <property value="352.544">fsim/tables/ps_full_ms/h0/w0/v6</property>
      <property value="375.906">fsim/tables/ps_full_ms/h0/w0/v7</property>
      <property value="392.637">fsim/tables/ps_full_ms/h0/w0/v8</property>
      <property value="388.224">fsim/tables/ps_full_ms/h0/w0/v9</property>
      <property value="188.627">fsim/tables/ps_full_ms/h0/w1/v0</property>
      <property value="209.716">fsim/tables/ps_full_ms/h0/w1/v1</property>
      <property value="294.81">fsim/tables/ps_full_ms/h0/w1/v10</property>
      <property value="229.553">fsim/tables/ps_full_ms/h0/w1/v11</property>
      <property value="186.146">fsim/tables/ps_full_ms/h0/w1/v12</property>
      <property value="145.948">fsim/tables/ps_full_ms/h0/w1/v13</property>
      <property value="98.6811">fsim/tables/ps_full_ms/h0/w1/v14</property>
      <property value="43.8523">fsim/tables/ps_full_ms/h0/w1/v15</property>
      <property value="230.589">fsim/tables/ps_full_ms/h0/w1/v2</property>
      <property value="251.199">fsim/tables/ps_full_ms/h0/w1/v3</property>
      <property value="271.817">fsim/tables/ps_full_ms/h0/w1/v4</property>
      <property value="292.528">fsim/tables/ps_full_ms/h0/w1/v5</property>
      <property value="313.294">fsim/tables/ps_full_ms/h0/w1/v6</property>
      <property value="332.895">fsim/tables/ps_full_ms/h0/w1/v7</property>
      <property value="345.198">fsim/tables/ps_full_ms/h0/w1/v8</property>
      <property value="336.291">fsim/tables/ps_full_ms/h0/w1/v9</property>
      <property value="155.956">fsim/tables/ps_full_ms/h0/w2/v0</property>
      <property value="175.507">fsim/tables/ps_full_ms/h0/w2/v1</property>
      <property value="267.762">fsim/tables/ps_full_ms/h0/w2/v10</property>
      <property value="207.046">fsim/tables/ps_full_ms/h0/w2/v11</property>
      <property value="166.788">fsim/tables/ps_full_ms/h0/w2/v12</property>
      <property value="130.753">fsim/tables/ps_full_ms/h0/w2/v13</property>
      <property value="88.2344">fsim/tables/ps_full_ms/h0/w2/v14</property>
      <property value="38.6645">fsim/tables/ps_full_ms/h0/w2/v15</property>
      <property value="194.836">fsim/tables/ps_full_ms/h0/w2/v2</property>
      <property value="213.93">fsim/tables/ps_full_ms/h0/w2/v3</property>
      <property value="233.102">fsim/tables/ps_full_ms/h0/w2/v4</property>
      <property value="252.216">fsim/tables/ps_full_ms/h0/w2/v5</property>
      <property value="271.096">fsim/tables/ps_full_ms/h0/w2/v6</property>
      <property value="289.447">fsim/tables/ps_full_ms/h0/w2/v7</property>
      <property value="304.039">fsim/tables/ps_full_ms/h0/w2/v8</property>
      <property value="301.691">fsim/tables/ps_full_ms/h0/w2/v9</property>
      <property value="149.384">fsim/tables/ps_full_ms/h1/w0/v0</property>
      <property value="174.531">fsim/tables/ps_full_ms/h1/w0/v1</property>
      <property value="255.798">fsim/tables/ps_full_ms/h1/w0/v10</property>
      <property value="247.344">fsim/tables/ps_full_ms/h1/w0/v11</property>
      <property value="217.133">fsim/tables/ps_full_ms/h1/w0/v12</property>
      <property value="176.478">fsim/tables/ps_full_ms/h1/w0/v13</property>
      <property value="125.034">fsim/tables/ps_full_ms/h1/w0/v14</property>
      <property value="52.2692">fsim/tables/ps_full_ms/h1/w0/v15</property>
      <property value="197.27">fsim/tables/ps_full_ms/h1/w0/v2</property>
      <property value="219.854">fsim/tables/ps_full_ms/h1/w0/v3</property>
      <property value="243.317">fsim/tables/ps_full_ms/h1/w0/v4</property>
      <property value="267.904">fsim/tables/ps_full_ms/h1/w0/v5</property>
      <property value="292.731">fsim/tables/ps_full_ms/h1/w0/v6</property>
      <property value="307.846">fsim/tables/ps_full_ms/h1/w0/v7</property>
      <property value="293.383">fsim/tables/ps_full_ms/h1/w0/v8</property>
      <property value="262.254">fsim/tables/ps_full_ms/h1/w0/v9</property>
      <property value="137.436">fsim/tables/ps_full_ms/h1/w1/v0</property>
      <property value="157.97">fsim/tables/ps_full_ms/h1/w1/v1</property>
      <property value="220.006">fsim/tables/ps_full_ms/h1/w1/v10</property>
      <property value="210.497">fsim/tables/ps_full_ms/h1/w1/v11</property>
      <property value="183.008">fsim/tables/ps_full_ms/h1/w1/v12</property>
      <property value="148.431">fsim/tables/ps_full_ms/h1/w1/v13</property>
      <property value="104.95">fsim/tables/ps_full_ms/h1/w1/v14</property>
      <property value="44.7207">fsim/tables/ps_full_ms/h1/w1/v15</property>
      <property value="178.446">fsim/tables/ps_full_ms/h1/w1/v2</property>
      <property value="198.896">fsim/tables/ps_full_ms/h1/w1/v3</property>
      <property value="219.486">fsim/tables/ps_full_ms/h1/w1/v4</property>
      <property value="240.704">fsim/tables/ps_full_ms/h1/w1/v5</property>
      <property value="261.035">fsim/tables/ps_full_ms/h1/w1/v6</property>
      <property value="267.857">fsim/tables/ps_full_ms/h1/w1/v7</property>
      <property value="245.439">fsim/tables/ps_full_ms/h1/w1/v8</property>
      <property value="222.221">fsim/tables/ps_full_ms/h1/w1/v9</property>
      <property value="114.281">fsim/tables/ps_full_ms/h1/w2/v0</property>
      <property value="133.063">fsim/tables/ps_full_ms/h1/w2/v1</property>
      <property value="192.2">fsim/tables/ps_full_ms/h1/w2/v10</property>
      <property value="185.754">fsim/tables/ps_full_ms/h1/w2/v11</property>
      <property value="161.963">fsim/tables/ps_full_ms/h1/w2/v12</property>
      <property value="131.159">fsim/tables/ps_full_ms/h1/w2/v13</property>
      <property value="93.0233">fsim/tables/ps_full_ms/h1/w2/v14</property>
      <property value="39.3187">fsim/tables/ps_full_ms/h1/w2/v15</property>
      <property value="151.559">fsim/tables/ps_full_ms/h1/w2/v2</property>
      <property value="170.297">fsim/tables/ps_full_ms/h1/w2/v3</property>
      <property value="189.244">fsim/tables/ps_full_ms/h1/w2/v4</property>
      <property value="208.482">fsim/tables/ps_full_ms/h1/w2/v5</property>
      <property value="227.219">fsim/tables/ps_full_ms/h1/w2/v6</property>
      <property value="237.095">fsim/tables/ps_full_ms/h1/w2/v7</property>
      <property value="218.594">fsim/tables/ps_full_ms/h1/w2/v8</property>
      <property value="194.266">fsim/tables/ps_full_ms/h1/w2/v9</property>
      <property value="108.86">fsim/tables/ps_full_ms/h2/w0/v0</property>
      <property value="132.463">fsim/tables/ps_full_ms/h2/w0/v1</property>
      <property value="225.804">fsim/tables/ps_full_ms/h2/w0/v10</property>
      <property value="228.339">fsim/tables/ps_full_ms/h2/w0/v11</property>
      <property value="207.295">fsim/tables/ps_full_ms/h2/w0/v12</property>
      <property value="177.149">fsim/tables/ps_full_ms/h2/w0/v13</property>
      <property value="123.094">fsim/tables/ps_full_ms/h2/w0/v14</property>
      <property value="49.9701">fsim/tables/ps_full_ms/h2/w0/v15</property>
      <property value="151.133">fsim/tables/ps_full_ms/h2/w0/v2</property>
      <property value="171.637">fsim/tables/ps_full_ms/h2/w0/v3</property>
      <property value="194.688">fsim/tables/ps_full_ms/h2/w0/v4</property>
      <property value="218.311">fsim/tables/ps_full_ms/h2/w0/v5</property>
      <property value="226.896">fsim/tables/ps_full_ms/h2/w0/v6</property>
      <property value="210.44">fsim/tables/ps_full_ms/h2/w0/v7</property>
      <property value="212.325">fsim/tables/ps_full_ms/h2/w0/v8</property>
      <property value="218.172">fsim/tables/ps_full_ms/h2/w0/v9</property>
      <property value="100.007">fsim/tables/ps_full_ms/h2/w1/v0</property>
      <property value="119.044">fsim/tables/ps_full_ms/h2/w1/v1</property>
      <property value="193.499">fsim/tables/ps_full_ms/h2/w1/v10</property>
      <property value="193.826">fsim/tables/ps_full_ms/h2/w1/v11</property>
      <property value="174.355">fsim/tables/ps_full_ms/h2/w1/v12</property>
      <property value="149.543">fsim/tables/ps_full_ms/h2/w1/v13</property>
      <property value="103.769">fsim/tables/ps_full_ms/h2/w1/v14</property>
      <property value="43.1064">fsim/tables/ps_full_ms/h2/w1/v15</property>
      <property value="137.793">fsim/tables/ps_full_ms/h2/w1/v2</property>
      <property value="156.773">fsim/tables/ps_full_ms/h2/w1/v3</property>
      <property value="176.678">fsim/tables/ps_full_ms/h2/w1/v4</property>
      <property value="195.039">fsim/tables/ps_full_ms/h2/w1/v5</property>
      <property value="192.035">fsim/tables/ps_full_ms/h2/w1/v6</property>
      <property value="179">fsim/tables/ps_full_ms/h2/w1/v7</property>
      <property value="182.913">fsim/tables/ps_full_ms/h2/w1/v8</property>
      <property value="187.562">fsim/tables/ps_full_ms/h2/w1/v9</property>
      <property value="85.8087">fsim/tables/ps_full_ms/h2/w2/v0</property>
      <property value="102.892">fsim/tables/ps_full_ms/h2/w2/v1</property>
      <property value="167.921">fsim/tables/ps_full_ms/h2/w2/v10</property>
      <property value="168.434">fsim/tables/ps_full_ms/h2/w2/v11</property>
      <property value="151.27">fsim/tables/ps_full_ms/h2/w2/v12</property>
      <property value="129.278">fsim/tables/ps_full_ms/h2/w2/v13</property>
      <property value="89.7677">fsim/tables/ps_full_ms/h2/w2/v14</property>
      <property value="37.3559">fsim/tables/ps_full_ms/h2/w2/v15</property>
      <property value="119.579">fsim/tables/ps_full_ms/h2/w2/v2</property>
      <property value="136.368">fsim/tables/ps_full_ms/h2/w2/v3</property>
      <property value="154.123">fsim/tables/ps_full_ms/h2/w2/v4</property>
      <property value="170.676">fsim/tables/ps_full_ms/h2/w2/v5</property>
      <property value="167.809">fsim/tables/ps_full_ms/h2/w2/v6</property>
      <property value="155.821">fsim/tables/ps_full_ms/h2/w2/v7</property>
      <property value="159.221">fsim/tables/ps_full_ms/h2/w2/v8</property>
      <property value="162.939">fsim/tables/ps_full_ms/h2/w2/v9</property>
      <property value="73.2099">fsim/tables/ps_full_ms/h3/w0/v0</property>
      <property value="95.1328">fsim/tables/ps_full_ms/h3/w0/v1</property>
      <property value="187.853">fsim/tables/ps_full_ms/h3/w0/v10</property>
      <property value="193.504">fsim/tables/ps_full_ms/h3/w0/v11</property>
      <property value="184.819">fsim/tables/ps_full_ms/h3/w0/v12</property>
      <property value="167.623">fsim/tables/ps_full_ms/h3/w0/v13</property>
      <property value="112.261">fsim/tables/ps_full_ms/h3/w0/v14</property>
      <property value="46.8444">fsim/tables/ps_full_ms/h3/w0/v15</property>
      <property value="109.52">fsim/tables/ps_full_ms/h3/w0/v2</property>
      <property value="127.928">fsim/tables/ps_full_ms/h3/w0/v3</property>
      <property value="148.232">fsim/tables/ps_full_ms/h3/w0/v4</property>
      <property value="150.783">fsim/tables/ps_full_ms/h3/w0/v5</property>
      <property value="150.513">fsim/tables/ps_full_ms/h3/w0/v6</property>
      <property value="158.98">fsim/tables/ps_full_ms/h3/w0/v7</property>
      <property value="170.319">fsim/tables/ps_full_ms/h3/w0/v8</property>
      <property value="179.576">fsim/tables/ps_full_ms/h3/w0/v9</property>
      <property value="68.3324">fsim/tables/ps_full_ms/h3/w1/v0</property>
      <property value="84.3102">fsim/tables/ps_full_ms/h3/w1/v1</property>
      <property value="160.215">fsim/tables/ps_full_ms/h3/w1/v10</property>
      <property value="163.569">fsim/tables/ps_full_ms/h3/w1/v11</property>
      <property value="155.223">fsim/tables/ps_full_ms/h3/w1/v12</property>
      <property value="140.575">fsim/tables/ps_full_ms/h3/w1/v13</property>
      <property value="94.1361">fsim/tables/ps_full_ms/h3/w1/v14</property>
      <property value="40.1809">fsim/tables/ps_full_ms/h3/w1/v15</property>
      <property value="100.373">fsim/tables/ps_full_ms/h3/w1/v2</property>
      <property value="116.902">fsim/tables/ps_full_ms/h3/w1/v3</property>
      <property value="131.102">fsim/tables/ps_full_ms/h3/w1/v4</property>
      <property value="126.018">fsim/tables/ps_full_ms/h3/w1/v5</property>
      <property value="130.245">fsim/tables/ps_full_ms/h3/w1/v6</property>
      <property value="136.654">fsim/tables/ps_full_ms/h3/w1/v7</property>
      <property value="145.623">fsim/tables/ps_full_ms/h3/w1/v8</property>
      <property value="153.448">fsim/tables/ps_full_ms/h3/w1/v9</property>
      <property value="57.7336">fsim/tables/ps_full_ms/h3/w2/v0</property>
      <property value="72.3443">fsim/tables/ps_full_ms/h3/w2/v1</property>
      <property value="137.42">fsim/tables/ps_full_ms/h3/w2/v10</property>
      <property value="140.575">fsim/tables/ps_full_ms/h3/w2/v11</property>
      <property value="133.559">fsim/tables/ps_full_ms/h3/w2/v12</property>
      <property value="121.799">fsim/tables/ps_full_ms/h3/w2/v13</property>
      <property value="81.806">fsim/tables/ps_full_ms/h3/w2/v14</property>
      <property value="34.9797">fsim/tables/ps_full_ms/h3/w2/v15</property>
      <property value="86.5176">fsim/tables/ps_full_ms/h3/w2/v2</property>
      <property value="101.263">fsim/tables/ps_full_ms/h3/w2/v3</property>
      <property value="113.464">fsim/tables/ps_full_ms/h3/w2/v4</property>
      <property value="107.947">fsim/tables/ps_full_ms/h3/w2/v5</property>
      <property value="111.827">fsim/tables/ps_full_ms/h3/w2/v6</property>
      <property value="117.5">fsim/tables/ps_full_ms/h3/w2/v7</property>
      <property value="125.006">fsim/tables/ps_full_ms/h3/w2/v8</property>
      <property value="131.641">fsim/tables/ps_full_ms/h3/w2/v9</property>
      <property value="60.2649">fsim/tables/ps_full_ms/h4/w0/v0</property>
      <property value="82.1896">fsim/tables/ps_full_ms/h4/w0/v1</property>
      <property value="161.025">fsim/tables/ps_full_ms/h4/w0/v10</property>
      <property value="165.898">fsim/tables/ps_full_ms/h4/w0/v11</property>
      <property value="158.009">fsim/tables/ps_full_ms/h4/w0/v12</property>
      <property value="144.375">fsim/tables/ps_full_ms/h4/w0/v13</property>
      <property value="97.1792">fsim/tables/ps_full_ms/h4/w0/v14</property>
      <property value="40.7715">fsim/tables/ps_full_ms/h4/w0/v15</property>
      <property value="94.0792">fsim/tables/ps_full_ms/h4/w0/v2</property>
      <property value="110.885">fsim/tables/ps_full_ms/h4/w0/v3</property>
      <property value="128.65">fsim/tables/ps_full_ms/h4/w0/v4</property>
      <property value="129.075">fsim/tables/ps_full_ms/h4/w0/v5</property>
      <property value="129.793">fsim/tables/ps_full_ms/h4/w0/v6</property>
      <property value="136.372">fsim/tables/ps_full_ms/h4/w0/v7</property>
      <property value="145.613">fsim/tables/ps_full_ms/h4/w0/v8</property>
      <property value="153.755">fsim/tables/ps_full_ms/h4/w0/v9</property>
      <property value="57.6274">fsim/tables/ps_full_ms/h4/w1/v0</property>
      <property value="71.8187">fsim/tables/ps_full_ms/h4/w1/v1</property>
      <property value="135.952">fsim/tables/ps_full_ms/h4/w1/v10</property>
      <property value="139.097">fsim/tables/ps_full_ms/h4/w1/v11</property>
      <property value="132.091">fsim/tables/ps_full_ms/h4/w1/v12</property>
      <property value="120.705">fsim/tables/ps_full_ms/h4/w1/v13</property>
      <property value="81.2832">fsim/tables/ps_full_ms/h4/w1/v14</property>
      <property value="34.7468">fsim/tables/ps_full_ms/h4/w1/v15</property>
      <property value="85.9427">fsim/tables/ps_full_ms/h4/w1/v2</property>
      <property value="100.699">fsim/tables/ps_full_ms/h4/w1/v3</property>
      <property value="112.796">fsim/tables/ps_full_ms/h4/w1/v4</property>
      <property value="107.164">fsim/tables/ps_full_ms/h4/w1/v5</property>
      <property value="110.861">fsim/tables/ps_full_ms/h4/w1/v6</property>
      <property value="116.415">fsim/tables/ps_full_ms/h4/w1/v7</property>
      <property value="123.795">fsim/tables/ps_full_ms/h4/w1/v8</property>
      <property value="130.296">fsim/tables/ps_full_ms/h4/w1/v9</property>
      <property value="47.9375">fsim/tables/ps_full_ms/h4/w2/v0</property>
      <property value="61.1232">fsim/tables/ps_full_ms/h4/w2/v1</property>
      <property value="115.824">fsim/tables/ps_full_ms/h4/w2/v10</property>
      <property value="118.373">fsim/tables/ps_full_ms/h4/w2/v11</property>
      <property value="112.089">fsim/tables/ps_full_ms/h4/w2/v12</property>
      <property value="102.918">fsim/tables/ps_full_ms/h4/w2/v13</property>
      <property value="69.9645">fsim/tables/ps_full_ms/h4/w2/v14</property>
      <property value="30.1786">fsim/tables/ps_full_ms/h4/w2/v15</property>
      <property value="73.5788">fsim/tables/ps_full_ms/h4/w2/v2</property>
      <property value="86.8211">fsim/tables/ps_full_ms/h4/w2/v3</property>
      <property value="96.6346">fsim/tables/ps_full_ms/h4/w2/v4</property>
      <property value="91.2083">fsim/tables/ps_full_ms/h4/w2/v5</property>
      <property value="94.5498">fsim/tables/ps_full_ms/h4/w2/v6</property>
      <property value="99.0229">fsim/tables/ps_full_ms/h4/w2/v7</property>
      <property value="105.712">fsim/tables/ps_full_ms/h4/w2/v8</property>
      <property value="111.201">fsim/tables/ps_full_ms/h4/w2/v9</property>
      <property value="39.6119">fsim/tables/ps_full_ms/h5/w0/v0</property>
      <property value="56.1381">fsim/tables/ps_full_ms/h5/w0/v1</property>
      <property value="113.849">fsim/tables/ps_full_ms/h5/w0/v10</property>
      <property value="116.851">fsim/tables/ps_full_ms/h5/w0/v11</property>
      <property value="110.968">fsim/tables/ps_full_ms/h5/w0/v12</property>
      <property value="101.924">fsim/tables/ps_full_ms/h5/w0/v13</property>
      <property value="68.6679">fsim/tables/ps_full_ms/h5/w0/v14</property>
      <property value="29.1944">fsim/tables/ps_full_ms/h5/w0/v15</property>
      <property value="66.0358">fsim/tables/ps_full_ms/h5/w0/v2</property>
      <property value="80.517">fsim/tables/ps_full_ms/h5/w0/v3</property>
      <property value="91.873">fsim/tables/ps_full_ms/h5/w0/v4</property>
      <property value="88.6376">fsim/tables/ps_full_ms/h5/w0/v5</property>
      <property value="91.7531">fsim/tables/ps_full_ms/h5/w0/v6</property>
      <property value="95.6139">fsim/tables/ps_full_ms/h5/w0/v7</property>
      <property value="102.827">fsim/tables/ps_full_ms/h5/w0/v8</property>
      <property value="108.896">fsim/tables/ps_full_ms/h5/w0/v9</property>
      <property value="37.2726">fsim/tables/ps_full_ms/h5/w1/v0</property>
      <property value="48.4267">fsim/tables/ps_full_ms/h5/w1/v1</property>
      <property value="94.1719">fsim/tables/ps_full_ms/h5/w1/v10</property>
      <property value="95.9371">fsim/tables/ps_full_ms/h5/w1/v11</property>
      <property value="90.6684">fsim/tables/ps_full_ms/h5/w1/v12</property>
      <property value="83.3464">fsim/tables/ps_full_ms/h5/w1/v13</property>
      <property value="56.7768">fsim/tables/ps_full_ms/h5/w1/v14</property>
      <property value="24.5979">fsim/tables/ps_full_ms/h5/w1/v15</property>
      <property value="59.279">fsim/tables/ps_full_ms/h5/w1/v2</property>
      <property value="71.3805">fsim/tables/ps_full_ms/h5/w1/v3</property>
      <property value="75.7165">fsim/tables/ps_full_ms/h5/w1/v4</property>
      <property value="72.7255">fsim/tables/ps_full_ms/h5/w1/v5</property>
      <property value="75.3178">fsim/tables/ps_full_ms/h5/w1/v6</property>
      <property value="79.7858">fsim/tables/ps_full_ms/h5/w1/v7</property>
      <property value="84.9438">fsim/tables/ps_full_ms/h5/w1/v8</property>
      <property value="90.0513">fsim/tables/ps_full_ms/h5/w1/v9</property>
      <property value="29.3334">fsim/tables/ps_full_ms/h5/w2/v0</property>
      <property value="39.5321">fsim/tables/ps_full_ms/h5/w2/v1</property>
      <property value="77.3244">fsim/tables/ps_full_ms/h5/w2/v10</property>
      <property value="79.3116">fsim/tables/ps_full_ms/h5/w2/v11</property>
      <property value="75.45">fsim/tables/ps_full_ms/h5/w2/v12</property>
      <property value="69.8216">fsim/tables/ps_full_ms/h5/w2/v13</property>
      <property value="50.7668">fsim/tables/ps_full_ms/h5/w2/v14</property>
      <property value="23.8976">fsim/tables/ps_full_ms/h5/w2/v15</property>
      <property value="49.1923">fsim/tables/ps_full_ms/h5/w2/v2</property>
      <property value="60.0535">fsim/tables/ps_full_ms/h5/w2/v3</property>
      <property value="61.8186">fsim/tables/ps_full_ms/h5/w2/v4</property>
      <property value="60.1064">fsim/tables/ps_full_ms/h5/w2/v5</property>
      <property value="61.7676">fsim/tables/ps_full_ms/h5/w2/v6</property>
      <property value="65.2745">fsim/tables/ps_full_ms/h5/w2/v7</property>
      <property value="70.0088">fsim/tables/ps_full_ms/h5/w2/v8</property>
      <property value="74.0804">fsim/tables/ps_full_ms/h5/w2/v9</property>
      <property value="28.1288">fsim/tables/ps_full_ms/h6/w0/v0</property>
      <property value="32.7387">fsim/tables/ps_full_ms/h6/w0/v1</property>
      <property value="71.9915">fsim/tables/ps_full_ms/h6/w0/v10</property>
      <property value="74.0834">fsim/tables/ps_full_ms/h6/w0/v11</property>
      <property value="70.6783">fsim/tables/ps_full_ms/h6/w0/v12</property>
      <property value="65.0953">fsim/tables/ps_full_ms/h6/w0/v13</property>
      <property value="48.9154">fsim/tables/ps_full_ms/h6/w0/v14</property>
      <property value="22.9483">fsim/tables/ps_full_ms/h6/w0/v15</property>
      <property value="43.8199">fsim/tables/ps_full_ms/h6/w0/v2</property>
      <property value="53.9852">fsim/tables/ps_full_ms/h6/w0/v3</property>
      <property value="59.2356">fsim/tables/ps_full_ms/h6/w0/v4</property>
      <property value="55.9392">fsim/tables/ps_full_ms/h6/w0/v5</property>
      <property value="57.5583">fsim/tables/ps_full_ms/h6/w0/v6</property>
      <property value="60.2618">fsim/tables/ps_full_ms/h6/w0/v7</property>
      <property value="64.834">fsim/tables/ps_full_ms/h6/w0/v8</property>
      <property value="69.0292">fsim/tables/ps_full_ms/h6/w0/v9</property>
      <property value="19.4228">fsim/tables/ps_full_ms/h6/w1/v0</property>
      <property value="27.4834">fsim/tables/ps_full_ms/h6/w1/v1</property>
      <property value="55.9241">fsim/tables/ps_full_ms/h6/w1/v10</property>
      <property value="57.3961">fsim/tables/ps_full_ms/h6/w1/v11</property>
      <property value="54.6063">fsim/tables/ps_full_ms/h6/w1/v12</property>
      <property value="49.8959">fsim/tables/ps_full_ms/h6/w1/v13</property>
      <property value="39.5354">fsim/tables/ps_full_ms/h6/w1/v14</property>
      <property value="19.3364">fsim/tables/ps_full_ms/h6/w1/v15</property>
      <property value="36.8868">fsim/tables/ps_full_ms/h6/w1/v2</property>
      <property value="44.9353">fsim/tables/ps_full_ms/h6/w1/v3</property>
      <property value="43.949">fsim/tables/ps_full_ms/h6/w1/v4</property>
      <property value="43.294">fsim/tables/ps_full_ms/h6/w1/v5</property>
      <property value="43.2735">fsim/tables/ps_full_ms/h6/w1/v6</property>
      <property value="46.3893">fsim/tables/ps_full_ms/h6/w1/v7</property>
      <property value="50.1574">fsim/tables/ps_full_ms/h6/w1/v8</property>
      <property value="53.4311">fsim/tables/ps_full_ms/h6/w1/v9</property>
      <property value="12.1506">fsim/tables/ps_full_ms/h6/w2/v0</property>
      <property value="19.2049">fsim/tables/ps_full_ms/h6/w2/v1</property>
      <property value="42.3347">fsim/tables/ps_full_ms/h6/w2/v10</property>
      <property value="43.4069">fsim/tables/ps_full_ms/h6/w2/v11</property>
      <property value="41.896">fsim/tables/ps_full_ms/h6/w2/v12</property>
      <property value="38.3095">fsim/tables/ps_full_ms/h6/w2/v13</property>
      <property value="33.2574">fsim/tables/ps_full_ms/h6/w2/v14</property>
      <property value="16.8126">fsim/tables/ps_full_ms/h6/w2/v15</property>
      <property value="28.5023">fsim/tables/ps_full_ms/h6/w2/v2</property>
      <property value="34.5436">fsim/tables/ps_full_ms/h6/w2/v3</property>
      <property value="32.5964">fsim/tables/ps_full_ms/h6/w2/v4</property>
      <property value="32.227">fsim/tables/ps_full_ms/h6/w2/v5</property>
      <property value="31.2316">fsim/tables/ps_full_ms/h6/w2/v6</property>
      <property value="34.2008">fsim/tables/ps_full_ms/h6/w2/v7</property>
      <property value="37.5847">fsim/tables/ps_full_ms/h6/w2/v8</property>
      <property value="40.4998">fsim/tables/ps_full_ms/h6/w2/v9</property>
      <property value="6.89155">fsim/tables/ps_full_ms/h7/w0/v0</property>
      <property value="17.3824">fsim/tables/ps_full_ms/h7/w0/v1</property>
      <property value="37.4161">fsim/tables/ps_full_ms/h7/w0/v10</property>
      <property value="38.2349">fsim/tables/ps_full_ms/h7/w0/v11</property>
      <property value="37.0809">fsim/tables/ps_full_ms/h7/w0/v12</property>
      <property value="33.5667">fsim/tables/ps_full_ms/h7/w0/v13</property>
      <property value="29.0826">fsim/tables/ps_full_ms/h7/w0/v14</property>
      <property value="15.9416">fsim/tables/ps_full_ms/h7/w0/v15</property>
      <property value="25.4473">fsim/tables/ps_full_ms/h7/w0/v2</property>
      <property value="31.1365">fsim/tables/ps_full_ms/h7/w0/v3</property>
      <property value="29.1173">fsim/tables/ps_full_ms/h7/w0/v4</property>
      <property value="28.4614">fsim/tables/ps_full_ms/h7/w0/v5</property>
      <property value="27.0591">fsim/tables/ps_full_ms/h7/w0/v6</property>
      <property value="29.6093">fsim/tables/ps_full_ms/h7/w0/v7</property>
      <property value="32.8969">fsim/tables/ps_full_ms/h7/w0/v8</property>
      <property value="35.9317">fsim/tables/ps_full_ms/h7/w0/v9</property>
      <property value="1.33447">fsim/tables/ps_full_ms/h7/w1/v0</property>
      <property value="9.23657">fsim/tables/ps_full_ms/h7/w1/v1</property>
      <property value="23.0401">fsim/tables/ps_full_ms/h7/w1/v10</property>
      <property value="23.884">fsim/tables/ps_full_ms/h7/w1/v11</property>
      <property value="24.0736">fsim/tables/ps_full_ms/h7/w1/v12</property>
      <property value="21.9328">fsim/tables/ps_full_ms/h7/w1/v13</property>
      <property value="18.4241">fsim/tables/ps_full_ms/h7/w1/v14</property>
      <property value="13.0026">fsim/tables/ps_full_ms/h7/w1/v15</property>
      <property value="17.0854">fsim/tables/ps_full_ms/h7/w1/v2</property>
      <property value="19.2456">fsim/tables/ps_full_ms/h7/w1/v3</property>
      <property value="19.7519">fsim/tables/ps_full_ms/h7/w1/v4</property>
      <property value="18.1205">fsim/tables/ps_full_ms/h7/w1/v5</property>
      <property value="14.8497">fsim/tables/ps_full_ms/h7/w1/v6</property>
      <property value="15.4196">fsim/tables/ps_full_ms/h7/w1/v7</property>
      <property value="18.5852">fsim/tables/ps_full_ms/h7/w1/v8</property>
      <property value="21.5225">fsim/tables/ps_full_ms/h7/w1/v9</property>
      <property value="10.0103">fsim/tables/ps_full_ms/h7/w2/v0</property>
      <property value="9.80853">fsim/tables/ps_full_ms/h7/w2/v1</property>
      <property value="11.6438">fsim/tables/ps_full_ms/h7/w2/v10</property>
      <property value="12.1128">fsim/tables/ps_full_ms/h7/w2/v11</property>
      <property value="11.941">fsim/tables/ps_full_ms/h7/w2/v12</property>
      <property value="10.6454">fsim/tables/ps_full_ms/h7/w2/v13</property>
      <property value="8.57334">fsim/tables/ps_full_ms/h7/w2/v14</property>
      <property value="6.0548">fsim/tables/ps_full_ms/h7/w2/v15</property>
      <property value="9.54406">fsim/tables/ps_full_ms/h7/w2/v2</property>
      <property value="8.24427">fsim/tables/ps_full_ms/h7/w2/v3</property>
      <property value="6.95366">fsim/tables/ps_full_ms/h7/w2/v4</property>
      <property value="5.69187">fsim/tables/ps_full_ms/h7/w2/v5</property>
      <property value="4.39894">fsim/tables/ps_full_ms/h7/w2/v6</property>
      <property value="6.99787">fsim/tables/ps_full_ms/h7/w2/v7</property>
      <property value="9.22439">fsim/tables/ps_full_ms/h7/w2/v8</property>
      <property value="10.8098">fsim/tables/ps_full_ms/h7/w2/v9</property>
      <property value="-14.4058">fsim/tables/ps_idle_ms/h0/w0/v0</property>
      <property value="-18.8267">fsim/tables/ps_idle_ms/h0/w0/v1</property>
      <property value="-230.738">fsim/tables/ps_idle_ms/h0/w0/v10</property>
      <property value="-328.443">fsim/tables/ps_idle_ms/h0/w0/v11</property>
      <property value="-401.162">fsim/tables/ps_idle_ms/h0/w0/v12</property>
      <property value="-465.623">fsim/tables/ps_idle_ms/h0/w0/v13</property>
      <property value="-513.965">fsim/tables/ps_idle_ms/h0/w0/v14</property>
      <property value="-542.514">fsim/tables/ps_idle_ms/h0/w0/v15</property>
      <property value="-24.7484">fsim/tables/ps_idle_ms/h0/w0/v2</property>
      <property value="-31.9695">fsim/tables/ps_idle_ms/h0/w0/v3</property>
      <property value="-40.8336">fsim/tables/ps_idle_ms/h0/w0/v4</property>
      <property value="-51.0863">fsim/tables/ps_idle_ms/h0/w0/v5</property>
      <property value="-62.9734">fsim/tables/ps_idle_ms/h0/w0/v6</property>
      <property value="-77.5663">fsim/tables/ps_idle_ms/h0/w0/v7</property>
      <property value="-96.1723">fsim/tables/ps_idle_ms/h0/w0/v8</property>
      <property value="-130.626">fsim/tables/ps_idle_ms/h0/w0/v9</property>
      <property value="-16.0546">fsim/tables/ps_idle_ms/h0/w1/v0</property>
      <property value="-20.2264">fsim/tables/ps_idle_ms/h0/w1/v1</property>
      <property value="-217.609">fsim/tables/ps_idle_ms/h0/w1/v10</property>
      <property value="-295.997">fsim/tables/ps_idle_ms/h0/w1/v11</property>
      <property value="-353.964">fsim/tables/ps_idle_ms/h0/w1/v12</property>
      <property value="-407.276">fsim/tables/ps_idle_ms/h0/w1/v13</property>
      <property value="-453.706">fsim/tables/ps_idle_ms/h0/w1/v14</property>
      <property value="-477.878">fsim/tables/ps_idle_ms/h0/w1/v15</property>
      <property value="-25.7275">fsim/tables/ps_idle_ms/h0/w1/v2</property>
      <property value="-32.1985">fsim/tables/ps_idle_ms/h0/w1/v3</property>
      <property value="-40.1713">fsim/tables/ps_idle_ms/h0/w1/v4</property>
      <property value="-49.2534">fsim/tables/ps_idle_ms/h0/w1/v5</property>
      <property value="-59.638">fsim/tables/ps_idle_ms/h0/w1/v6</property>
      <property value="-72.1535">fsim/tables/ps_idle_ms/h0/w1/v7</property>
      <property value="-89.3379">fsim/tables/ps_idle_ms/h0/w1/v8</property>
      <property value="-126.699">fsim/tables/ps_idle_ms/h0/w1/v9</property>
      <property value="-14.2979">fsim/tables/ps_idle_ms/h0/w2/v0</property>
      <property value="-17.5789">fsim/tables/ps_idle_ms/h0/w2/v1</property>
      <property value="-178.881">fsim/tables/ps_idle_ms/h0/w2/v10</property>
      <property value="-255.08">fsim/tables/ps_idle_ms/h0/w2/v11</property>
      <property value="-308.305">fsim/tables/ps_idle_ms/h0/w2/v12</property>
      <property value="-356.664">fsim/tables/ps_idle_ms/h0/w2/v13</property>
      <property value="-404.916">fsim/tables/ps_idle_ms/h0/w2/v14</property>
      <property value="-427.393">fsim/tables/ps_idle_ms/h0/w2/v15</property>
      <property value="-21.8749">fsim/tables/ps_idle_ms/h0/w2/v2</property>
      <property value="-27.4677">fsim/tables/ps_idle_ms/h0/w2/v3</property>
      <property value="-34.0051">fsim/tables/ps_idle_ms/h0/w2/v4</property>
      <property value="-42.027">fsim/tables/ps_idle_ms/h0/w2/v5</property>
      <property value="-51.095">fsim/tables/ps_idle_ms/h0/w2/v6</property>
      <property value="-61.7401">fsim/tables/ps_idle_ms/h0/w2/v7</property>
      <property value="-75.4369">fsim/tables/ps_idle_ms/h0/w2/v8</property>
      <property value="-101.707">fsim/tables/ps_idle_ms/h0/w2/v9</property>
      <property value="-13.318">fsim/tables/ps_idle_ms/h1/w0/v0</property>
      <property value="-16.0421">fsim/tables/ps_idle_ms/h1/w0/v1</property>
      <property value="-263.227">fsim/tables/ps_idle_ms/h1/w0/v10</property>
      <property value="-313.585">fsim/tables/ps_idle_ms/h1/w0/v11</property>
      <property value="-367.279">fsim/tables/ps_idle_ms/h1/w0/v12</property>
      <property value="-426.008">fsim/tables/ps_idle_ms/h1/w0/v13</property>
      <property value="-489.832">fsim/tables/ps_idle_ms/h1/w0/v14</property>
      <property value="-522.195">fsim/tables/ps_idle_ms/h1/w0/v15</property>
      <property value="-20.3277">fsim/tables/ps_idle_ms/h1/w0/v2</property>
      <property value="-26.2133">fsim/tables/ps_idle_ms/h1/w0/v3</property>
      <property value="-33.5797">fsim/tables/ps_idle_ms/h1/w0/v4</property>
      <property value="-42.8246">fsim/tables/ps_idle_ms/h1/w0/v5</property>
      <property value="-54.0683">fsim/tables/ps_idle_ms/h1/w0/v6</property>
      <property value="-71.9041">fsim/tables/ps_idle_ms/h1/w0/v7</property>
      <property value="-135.488">fsim/tables/ps_idle_ms/h1/w0/v8</property>
      <property value="-213.057">fsim/tables/ps_idle_ms/h1/w0/v9</property>
      <property value="-14.873">fsim/tables/ps_idle_ms/h1/w1/v0</property>
      <property value="-17.5754">fsim/tables/ps_idle_ms/h1/w1/v1</property>
      <property value="-236.834">fsim/tables/ps_idle_ms/h1/w1/v10</property>
      <property value="-279.348">fsim/tables/ps_idle_ms/h1/w1/v11</property>
      <property value="-324.388">fsim/tables/ps_idle_ms/h1/w1/v12</property>
      <property value="-373.625">fsim/tables/ps_idle_ms/h1/w1/v13</property>
      <property value="-428.025">fsim/tables/ps_idle_ms/h1/w1/v14</property>
      <property value="-458.87">fsim/tables/ps_idle_ms/h1/w1/v15</property>
      <property value="-21.6383">fsim/tables/ps_idle_ms/h1/w1/v2</property>
      <property value="-27.0106">fsim/tables/ps_idle_ms/h1/w1/v3</property>
      <property value="-33.7005">fsim/tables/ps_idle_ms/h1/w1/v4</property>
      <property value="-41.8701">fsim/tables/ps_idle_ms/h1/w1/v5</property>
      <property value="-52.3152">fsim/tables/ps_idle_ms/h1/w1/v6</property>
      <property value="-71.9526">fsim/tables/ps_idle_ms/h1/w1/v7</property>
      <property value="-138.953">fsim/tables/ps_idle_ms/h1/w1/v8</property>
      <property value="-196.834">fsim/tables/ps_idle_ms/h1/w1/v9</property>
      <property value="-15.0074">fsim/tables/ps_idle_ms/h1/w2/v0</property>
      <property value="-16.7591">fsim/tables/ps_idle_ms/h1/w2/v1</property>
      <property value="-207.377">fsim/tables/ps_idle_ms/h1/w2/v10</property>
      <property value="-245.038">fsim/tables/ps_idle_ms/h1/w2/v11</property>
      <property value="-284.544">fsim/tables/ps_idle_ms/h1/w2/v12</property>
      <property value="-328.241">fsim/tables/ps_idle_ms/h1/w2/v13</property>
      <property value="-376.837">fsim/tables/ps_idle_ms/h1/w2/v14</property>
      <property value="-408.931">fsim/tables/ps_idle_ms/h1/w2/v15</property>
      <property value="-19.9165">fsim/tables/ps_idle_ms/h1/w2/v2</property>
      <property value="-24.3183">fsim/tables/ps_idle_ms/h1/w2/v3</property>
      <property value="-30.1027">fsim/tables/ps_idle_ms/h1/w2/v4</property>
      <property value="-36.9338">fsim/tables/ps_idle_ms/h1/w2/v5</property>
      <property value="-45.9058">fsim/tables/ps_idle_ms/h1/w2/v6</property>
      <property value="-61.2428">fsim/tables/ps_idle_ms/h1/w2/v7</property>
      <property value="-116.024">fsim/tables/ps_idle_ms/h1/w2/v8</property>
      <property value="-171.444">fsim/tables/ps_idle_ms/h1/w2/v9</property>
      <property value="-16.3596">fsim/tables/ps_idle_ms/h2/w0/v0</property>
      <property value="-17.1175">fsim/tables/ps_idle_ms/h2/w0/v1</property>
      <property value="-230.856">fsim/tables/ps_idle_ms/h2/w0/v10</property>
      <property value="-272.643">fsim/tables/ps_idle_ms/h2/w0/v11</property>
      <property value="-321.291">fsim/tables/ps_idle_ms/h2/w0/v12</property>
      <property value="-375.606">fsim/tables/ps_idle_ms/h2/w0/v13</property>
      <property value="-435.315">fsim/tables/ps_idle_ms/h2/w0/v14</property>
      <property value="-479.182">fsim/tables/ps_idle_ms/h2/w0/v15</property>
      <property value="-19.7921">fsim/tables/ps_idle_ms/h2/w0/v2</property>
      <property value="-24.2197">fsim/tables/ps_idle_ms/h2/w0/v3</property>
      <property value="-30.2243">fsim/tables/ps_idle_ms/h2/w0/v4</property>
      <property value="-38.4551">fsim/tables/ps_idle_ms/h2/w0/v5</property>
      <property value="-61.0965">fsim/tables/ps_idle_ms/h2/w0/v6</property>
      <property value="-121.28">fsim/tables/ps_idle_ms/h2/w0/v7</property>
      <property value="-156.778">fsim/tables/ps_idle_ms/h2/w0/v8</property>
      <property value="-193.007">fsim/tables/ps_idle_ms/h2/w0/v9</property>
      <property value="-17.6809">fsim/tables/ps_idle_ms/h2/w1/v0</property>
      <property value="-18.6677">fsim/tables/ps_idle_ms/h2/w1/v1</property>
      <property value="-209.124">fsim/tables/ps_idle_ms/h2/w1/v10</property>
      <property value="-244.656">fsim/tables/ps_idle_ms/h2/w1/v11</property>
      <property value="-285.455">fsim/tables/ps_idle_ms/h2/w1/v12</property>
      <property value="-330.587">fsim/tables/ps_idle_ms/h2/w1/v13</property>
      <property value="-379.765">fsim/tables/ps_idle_ms/h2/w1/v14</property>
      <property value="-419.239">fsim/tables/ps_idle_ms/h2/w1/v15</property>
      <property value="-21.3289">fsim/tables/ps_idle_ms/h2/w1/v2</property>
      <property value="-25.4172">fsim/tables/ps_idle_ms/h2/w1/v3</property>
      <property value="-30.8943">fsim/tables/ps_idle_ms/h2/w1/v4</property>
      <property value="-39.4115">fsim/tables/ps_idle_ms/h2/w1/v5</property>
      <property value="-73.2073">fsim/tables/ps_idle_ms/h2/w1/v6</property>
      <property value="-117.613">fsim/tables/ps_idle_ms/h2/w1/v7</property>
      <property value="-146.23">fsim/tables/ps_idle_ms/h2/w1/v8</property>
      <property value="-176.825">fsim/tables/ps_idle_ms/h2/w1/v9</property>
      <property value="-18.9859">fsim/tables/ps_idle_ms/h2/w2/v0</property>
      <property value="-19.3402">fsim/tables/ps_idle_ms/h2/w2/v1</property>
      <property value="-186.576">fsim/tables/ps_idle_ms/h2/w2/v10</property>
      <property value="-217.836">fsim/tables/ps_idle_ms/h2/w2/v11</property>
      <property value="-253.747">fsim/tables/ps_idle_ms/h2/w2/v12</property>
      <property value="-293.632">fsim/tables/ps_idle_ms/h2/w2/v13</property>
      <property value="-336.999">fsim/tables/ps_idle_ms/h2/w2/v14</property>
      <property value="-373.902">fsim/tables/ps_idle_ms/h2/w2/v15</property>
      <property value="-21.2084">fsim/tables/ps_idle_ms/h2/w2/v2</property>
      <property value="-24.5468">fsim/tables/ps_idle_ms/h2/w2/v3</property>
      <property value="-29.2101">fsim/tables/ps_idle_ms/h2/w2/v4</property>
      <property value="-36.6971">fsim/tables/ps_idle_ms/h2/w2/v5</property>
      <property value="-66.3938">fsim/tables/ps_idle_ms/h2/w2/v6</property>
      <property value="-105.454">fsim/tables/ps_idle_ms/h2/w2/v7</property>
      <property value="-130.73">fsim/tables/ps_idle_ms/h2/w2/v8</property>
      <property value="-157.94">fsim/tables/ps_idle_ms/h2/w2/v9</property>
      <property value="-22.8692">fsim/tables/ps_idle_ms/h3/w0/v0</property>
      <property value="-21.4267">fsim/tables/ps_idle_ms/h3/w0/v1</property>
      <property value="-191.138">fsim/tables/ps_idle_ms/h3/w0/v10</property>
      <property value="-226.831">fsim/tables/ps_idle_ms/h3/w0/v11</property>
      <property value="-266.112">fsim/tables/ps_idle_ms/h3/w0/v12</property>
      <property value="-309.491">fsim/tables/ps_idle_ms/h3/w0/v13</property>
      <property value="-356.633">fsim/tables/ps_idle_ms/h3/w0/v14</property>
      <property value="-400.097">fsim/tables/ps_idle_ms/h3/w0/v15</property>
      <property value="-22.3177">fsim/tables/ps_idle_ms/h3/w0/v2</property>
      <property value="-25.0662">fsim/tables/ps_idle_ms/h3/w0/v3</property>
      <property value="-30.1122">fsim/tables/ps_idle_ms/h3/w0/v4</property>
      <property value="-55.3837">fsim/tables/ps_idle_ms/h3/w0/v5</property>
      <property value="-85.35">fsim/tables/ps_idle_ms/h3/w0/v6</property>
      <property value="-109.2">fsim/tables/ps_idle_ms/h3/w0/v7</property>
      <property value="-132.794">fsim/tables/ps_idle_ms/h3/w0/v8</property>
      <property value="-159.485">fsim/tables/ps_idle_ms/h3/w0/v9</property>
      <property value="-23.9579">fsim/tables/ps_idle_ms/h3/w1/v0</property>
      <property value="-22.9804">fsim/tables/ps_idle_ms/h3/w1/v1</property>
      <property value="-173.269">fsim/tables/ps_idle_ms/h3/w1/v10</property>
      <property value="-203.443">fsim/tables/ps_idle_ms/h3/w1/v11</property>
      <property value="-236.502">fsim/tables/ps_idle_ms/h3/w1/v12</property>
      <property value="-272.897">fsim/tables/ps_idle_ms/h3/w1/v13</property>
      <property value="-312.264">fsim/tables/ps_idle_ms/h3/w1/v14</property>
      <property value="-350.273">fsim/tables/ps_idle_ms/h3/w1/v15</property>
      <property value="-23.9144">fsim/tables/ps_idle_ms/h3/w1/v2</property>
      <property value="-26.5391">fsim/tables/ps_idle_ms/h3/w1/v3</property>
      <property value="-33.0398">fsim/tables/ps_idle_ms/h3/w1/v4</property>
      <property value="-63.2779">fsim/tables/ps_idle_ms/h3/w1/v5</property>
      <property value="-83.229">fsim/tables/ps_idle_ms/h3/w1/v6</property>
      <property value="-103.534">fsim/tables/ps_idle_ms/h3/w1/v7</property>
      <property value="-123.867">fsim/tables/ps_idle_ms/h3/w1/v8</property>
      <property value="-146.605">fsim/tables/ps_idle_ms/h3/w1/v9</property>
      <property value="-26.1587">fsim/tables/ps_idle_ms/h3/w2/v0</property>
      <property value="-24.5359">fsim/tables/ps_idle_ms/h3/w2/v1</property>
      <property value="-156.457">fsim/tables/ps_idle_ms/h3/w2/v10</property>
      <property value="-182.741">fsim/tables/ps_idle_ms/h3/w2/v11</property>
      <property value="-211.202">fsim/tables/ps_idle_ms/h3/w2/v12</property>
      <property value="-242.742">fsim/tables/ps_idle_ms/h3/w2/v13</property>
      <property value="-277.113">fsim/tables/ps_idle_ms/h3/w2/v14</property>
      <property value="-311.806">fsim/tables/ps_idle_ms/h3/w2/v15</property>
      <property value="-24.9227">fsim/tables/ps_idle_ms/h3/w2/v2</property>
      <property value="-26.7698">fsim/tables/ps_idle_ms/h3/w2/v3</property>
      <property value="-32.9038">fsim/tables/ps_idle_ms/h3/w2/v4</property>
      <property value="-60.1253">fsim/tables/ps_idle_ms/h3/w2/v5</property>
      <property value="-77.526">fsim/tables/ps_idle_ms/h3/w2/v6</property>
      <property value="-95.1624">fsim/tables/ps_idle_ms/h3/w2/v7</property>
      <property value="-112.956">fsim/tables/ps_idle_ms/h3/w2/v8</property>
      <property value="-133.031">fsim/tables/ps_idle_ms/h3/w2/v9</property>
      <property value="-25.3323">fsim/tables/ps_idle_ms/h4/w0/v0</property>
      <property value="-22.9983">fsim/tables/ps_idle_ms/h4/w0/v1</property>
      <property value="-170.863">fsim/tables/ps_idle_ms/h4/w0/v10</property>
      <property value="-202.067">fsim/tables/ps_idle_ms/h4/w0/v11</property>
      <property value="-236.373">fsim/tables/ps_idle_ms/h4/w0/v12</property>
      <property value="-274.309">fsim/tables/ps_idle_ms/h4/w0/v13</property>
      <property value="-315.267">fsim/tables/ps_idle_ms/h4/w0/v14</property>
      <property value="-354.717">fsim/tables/ps_idle_ms/h4/w0/v15</property>
      <property value="-23.293">fsim/tables/ps_idle_ms/h4/w0/v2</property>
      <property value="-25.2391">fsim/tables/ps_idle_ms/h4/w0/v3</property>
      <property value="-29.6867">fsim/tables/ps_idle_ms/h4/w0/v4</property>
      <property value="-52.9551">fsim/tables/ps_idle_ms/h4/w0/v5</property>
      <property value="-78.4414">fsim/tables/ps_idle_ms/h4/w0/v6</property>
      <property value="-99.6548">fsim/tables/ps_idle_ms/h4/w0/v7</property>
      <property value="-120.491">fsim/tables/ps_idle_ms/h4/w0/v8</property>
      <property value="-143.538">fsim/tables/ps_idle_ms/h4/w0/v9</property>
      <property value="-26.2334">fsim/tables/ps_idle_ms/h4/w1/v0</property>
      <property value="-24.6095">fsim/tables/ps_idle_ms/h4/w1/v1</property>
      <property value="-156.134">fsim/tables/ps_idle_ms/h4/w1/v10</property>
      <property value="-182.313">fsim/tables/ps_idle_ms/h4/w1/v11</property>
      <property value="-210.697">fsim/tables/ps_idle_ms/h4/w1/v12</property>
      <property value="-242.119">fsim/tables/ps_idle_ms/h4/w1/v13</property>
      <property value="-276.214">fsim/tables/ps_idle_ms/h4/w1/v14</property>
      <property value="-310.495">fsim/tables/ps_idle_ms/h4/w1/v15</property>
      <property value="-24.9991">fsim/tables/ps_idle_ms/h4/w1/v2</property>
      <property value="-26.8479">fsim/tables/ps_idle_ms/h4/w1/v3</property>
      <property value="-32.9574">fsim/tables/ps_idle_ms/h4/w1/v4</property>
      <property value="-60.0843">fsim/tables/ps_idle_ms/h4/w1/v5</property>
      <property value="-77.4903">fsim/tables/ps_idle_ms/h4/w1/v6</property>
      <property value="-95.1036">fsim/tables/ps_idle_ms/h4/w1/v7</property>
      <property value="-112.808">fsim/tables/ps_idle_ms/h4/w1/v8</property>
      <property value="-132.799">fsim/tables/ps_idle_ms/h4/w1/v9</property>
      <property value="-28.6638">fsim/tables/ps_idle_ms/h4/w2/v0</property>
      <property value="-26.4347">fsim/tables/ps_idle_ms/h4/w2/v1</property>
      <property value="-141.616">fsim/tables/ps_idle_ms/h4/w2/v10</property>
      <property value="-164.619">fsim/tables/ps_idle_ms/h4/w2/v11</property>
      <property value="-189.422">fsim/tables/ps_idle_ms/h4/w2/v12</property>
      <property value="-216.835">fsim/tables/ps_idle_ms/h4/w2/v13</property>
      <property value="-246.073">fsim/tables/ps_idle_ms/h4/w2/v14</property>
      <property value="-276.793">fsim/tables/ps_idle_ms/h4/w2/v15</property>
      <property value="-26.2268">fsim/tables/ps_idle_ms/h4/w2/v2</property>
      <property value="-27.6688">fsim/tables/ps_idle_ms/h4/w2/v3</property>
      <property value="-34.0919">fsim/tables/ps_idle_ms/h4/w2/v4</property>
      <property value="-57.7558">fsim/tables/ps_idle_ms/h4/w2/v5</property>
      <property value="-72.8238">fsim/tables/ps_idle_ms/h4/w2/v6</property>
      <property value="-88.6253">fsim/tables/ps_idle_ms/h4/w2/v7</property>
      <property value="-103.58">fsim/tables/ps_idle_ms/h4/w2/v8</property>
      <property value="-121.113">fsim/tables/ps_idle_ms/h4/w2/v9</property>
      <property value="-31.7754">fsim/tables/ps_idle_ms/h5/w0/v0</property>
      <property value="-27.9755">fsim/tables/ps_idle_ms/h5/w0/v1</property>
      <property value="-136.015">fsim/tables/ps_idle_ms/h5/w0/v10</property>
      <property value="-158.514">fsim/tables/ps_idle_ms/h5/w0/v11</property>
      <property value="-182.909">fsim/tables/ps_idle_ms/h5/w0/v12</property>
      <property value="-210.033">fsim/tables/ps_idle_ms/h5/w0/v13</property>
      <property value="-238.627">fsim/tables/ps_idle_ms/h5/w0/v14</property>
      <property value="-268.496">fsim/tables/ps_idle_ms/h5/w0/v15</property>
      <property value="-27.002">fsim/tables/ps_idle_ms/h5/w0/v2</property>
      <property value="-27.7901">fsim/tables/ps_idle_ms/h5/w0/v3</property>
      <property value="-31.6068">fsim/tables/ps_idle_ms/h5/w0/v4</property>
      <property value="-53.4813">fsim/tables/ps_idle_ms/h5/w0/v5</property>
      <property value="-69.1946">fsim/tables/ps_idle_ms/h5/w0/v6</property>
      <property value="-84.8972">fsim/tables/ps_idle_ms/h5/w0/v7</property>
      <property value="-99.4895">fsim/tables/ps_idle_ms/h5/w0/v8</property>
      <property value="-116.021">fsim/tables/ps_idle_ms/h5/w0/v9</property>
      <property value="-32.7078">fsim/tables/ps_idle_ms/h5/w1/v0</property>
      <property value="-29.8129">fsim/tables/ps_idle_ms/h5/w1/v1</property>
      <property value="-124.972">fsim/tables/ps_idle_ms/h5/w1/v10</property>
      <property value="-143.532">fsim/tables/ps_idle_ms/h5/w1/v11</property>
      <property value="-163.825">fsim/tables/ps_idle_ms/h5/w1/v12</property>
      <property value="-186.358">fsim/tables/ps_idle_ms/h5/w1/v13</property>
      <property value="-210.005">fsim/tables/ps_idle_ms/h5/w1/v14</property>
      <property value="-234.849">fsim/tables/ps_idle_ms/h5/w1/v15</property>
      <property value="-28.9732">fsim/tables/ps_idle_ms/h5/w1/v2</property>
      <property value="-29.7252">fsim/tables/ps_idle_ms/h5/w1/v3</property>
      <property value="-39.0196">fsim/tables/ps_idle_ms/h5/w1/v4</property>
      <property value="-56.4233">fsim/tables/ps_idle_ms/h5/w1/v5</property>
      <property value="-69.6242">fsim/tables/ps_idle_ms/h5/w1/v6</property>
      <property value="-82.0208">fsim/tables/ps_idle_ms/h5/w1/v7</property>
      <property value="-94.3888">fsim/tables/ps_idle_ms/h5/w1/v8</property>
      <property value="-108.426">fsim/tables/ps_idle_ms/h5/w1/v9</property>
      <property value="-35.5818">fsim/tables/ps_idle_ms/h5/w2/v0</property>
      <property value="-32.163">fsim/tables/ps_idle_ms/h5/w2/v1</property>
      <property value="-114.38">fsim/tables/ps_idle_ms/h5/w2/v10</property>
      <property value="-130.432">fsim/tables/ps_idle_ms/h5/w2/v11</property>
      <property value="-147.239">fsim/tables/ps_idle_ms/h5/w2/v12</property>
      <property value="-165.951">fsim/tables/ps_idle_ms/h5/w2/v13</property>
      <property value="-185.583">fsim/tables/ps_idle_ms/h5/w2/v14</property>
      <property value="-206.713">fsim/tables/ps_idle_ms/h5/w2/v15</property>
      <property value="-30.9894">fsim/tables/ps_idle_ms/h5/w2/v2</property>
      <property value="-31.4912">fsim/tables/ps_idle_ms/h5/w2/v3</property>
      <property value="-40.9268">fsim/tables/ps_idle_ms/h5/w2/v4</property>
      <property value="-55.3765">fsim/tables/ps_idle_ms/h5/w2/v5</property>
      <property value="-67.1594">fsim/tables/ps_idle_ms/h5/w2/v6</property>
      <property value="-77.8687">fsim/tables/ps_idle_ms/h5/w2/v7</property>
      <property value="-88.0873">fsim/tables/ps_idle_ms/h5/w2/v8</property>
      <property value="-100.105">fsim/tables/ps_idle_ms/h5/w2/v9</property>
      <property value="-38.0993">fsim/tables/ps_idle_ms/h6/w0/v0</property>
      <property value="-33.7038">fsim/tables/ps_idle_ms/h6/w0/v1</property>
      <property value="-110.689">fsim/tables/ps_idle_ms/h6/w0/v10</property>
      <property value="-126.385">fsim/tables/ps_idle_ms/h6/w0/v11</property>
      <property value="-142.852">fsim/tables/ps_idle_ms/h6/w0/v12</property>
      <property value="-161.124">fsim/tables/ps_idle_ms/h6/w0/v13</property>
      <property value="-180.221">fsim/tables/ps_idle_ms/h6/w0/v14</property>
      <property value="-200.269">fsim/tables/ps_idle_ms/h6/w0/v15</property>
      <property value="-31.8597">fsim/tables/ps_idle_ms/h6/w0/v2</property>
      <property value="-31.6096">fsim/tables/ps_idle_ms/h6/w0/v3</property>
      <property value="-38.2377">fsim/tables/ps_idle_ms/h6/w0/v4</property>
      <property value="-53.2862">fsim/tables/ps_idle_ms/h6/w0/v5</property>
      <property value="-64.7158">fsim/tables/ps_idle_ms/h6/w0/v6</property>
      <property value="-75.5999">fsim/tables/ps_idle_ms/h6/w0/v7</property>
      <property value="-85.6445">fsim/tables/ps_idle_ms/h6/w0/v8</property>
      <property value="-96.8156">fsim/tables/ps_idle_ms/h6/w0/v9</property>
      <property value="-39.87">fsim/tables/ps_idle_ms/h6/w1/v0</property>
      <property value="-35.9667">fsim/tables/ps_idle_ms/h6/w1/v1</property>
      <property value="-102.953">fsim/tables/ps_idle_ms/h6/w1/v10</property>
      <property value="-115.77">fsim/tables/ps_idle_ms/h6/w1/v11</property>
      <property value="-129.184">fsim/tables/ps_idle_ms/h6/w1/v12</property>
      <property value="-144.012">fsim/tables/ps_idle_ms/h6/w1/v13</property>
      <property value="-159.652">fsim/tables/ps_idle_ms/h6/w1/v14</property>
      <property value="-175.834">fsim/tables/ps_idle_ms/h6/w1/v15</property>
      <property value="-34.2883">fsim/tables/ps_idle_ms/h6/w1/v2</property>
      <property value="-34.8212">fsim/tables/ps_idle_ms/h6/w1/v3</property>
      <property value="-44.7583">fsim/tables/ps_idle_ms/h6/w1/v4</property>
      <property value="-55.643">fsim/tables/ps_idle_ms/h6/w1/v5</property>
      <property value="-66.3604">fsim/tables/ps_idle_ms/h6/w1/v6</property>
      <property value="-74.4667">fsim/tables/ps_idle_ms/h6/w1/v7</property>
      <property value="-82.3397">fsim/tables/ps_idle_ms/h6/w1/v8</property>
      <property value="-91.696">fsim/tables/ps_idle_ms/h6/w1/v9</property>
      <property value="-42.8516">fsim/tables/ps_idle_ms/h6/w2/v0</property>
      <property value="-38.9551">fsim/tables/ps_idle_ms/h6/w2/v1</property>
      <property value="-96.3168">fsim/tables/ps_idle_ms/h6/w2/v10</property>
      <property value="-107.272">fsim/tables/ps_idle_ms/h6/w2/v11</property>
      <property value="-118.563">fsim/tables/ps_idle_ms/h6/w2/v12</property>
      <property value="-130.442">fsim/tables/ps_idle_ms/h6/w2/v13</property>
      <property value="-143.214">fsim/tables/ps_idle_ms/h6/w2/v14</property>
      <property value="-156.84">fsim/tables/ps_idle_ms/h6/w2/v15</property>
      <property value="-36.8376">fsim/tables/ps_idle_ms/h6/w2/v2</property>
      <property value="-37.9119">fsim/tables/ps_idle_ms/h6/w2/v3</property>
      <property value="-47.5886">fsim/tables/ps_idle_ms/h6/w2/v4</property>
      <property value="-56.4752">fsim/tables/ps_idle_ms/h6/w2/v5</property>
      <property value="-66.6903">fsim/tables/ps_idle_ms/h6/w2/v6</property>
      <property value="-72.8592">fsim/tables/ps_idle_ms/h6/w2/v7</property>
      <property value="-79.4205">fsim/tables/ps_idle_ms/h6/w2/v8</property>
      <property value="-86.7027">fsim/tables/ps_idle_ms/h6/w2/v9</property>
      <property value="-43.927">fsim/tables/ps_idle_ms/h7/w0/v0</property>
      <property value="-39.925">fsim/tables/ps_idle_ms/h7/w0/v1</property>
      <property value="-94.3269">fsim/tables/ps_idle_ms/h7/w0/v10</property>
      <property value="-104.709">fsim/tables/ps_idle_ms/h7/w0/v11</property>
      <property value="-115.642">fsim/tables/ps_idle_ms/h7/w0/v12</property>
      <property value="-126.839">fsim/tables/ps_idle_ms/h7/w0/v13</property>
      <property value="-138.944">fsim/tables/ps_idle_ms/h7/w0/v14</property>
      <property value="-151.664">fsim/tables/ps_idle_ms/h7/w0/v15</property>
      <property value="-37.6309">fsim/tables/ps_idle_ms/h7/w0/v2</property>
      <property value="-38.8526">fsim/tables/ps_idle_ms/h7/w0/v3</property>
      <property value="-48.0419">fsim/tables/ps_idle_ms/h7/w0/v4</property>
      <property value="-56.6907">fsim/tables/ps_idle_ms/h7/w0/v5</property>
      <property value="-66.9241">fsim/tables/ps_idle_ms/h7/w0/v6</property>
      <property value="-73.0744">fsim/tables/ps_idle_ms/h7/w0/v7</property>
      <property value="-78.7053">fsim/tables/ps_idle_ms/h7/w0/v8</property>
      <property value="-85.4377">fsim/tables/ps_idle_ms/h7/w0/v9</property>
      <property value="-49.3719">fsim/tables/ps_idle_ms/h7/w1/v0</property>
      <property value="-44.5438">fsim/tables/ps_idle_ms/h7/w1/v1</property>
      <property value="-88.0483">fsim/tables/ps_idle_ms/h7/w1/v10</property>
      <property value="-96.2101">fsim/tables/ps_idle_ms/h7/w1/v11</property>
      <property value="-105.29">fsim/tables/ps_idle_ms/h7/w1/v12</property>
      <property value="-113.466">fsim/tables/ps_idle_ms/h7/w1/v13</property>
      <property value="-122.627">fsim/tables/ps_idle_ms/h7/w1/v14</property>
      <property value="-133.913">fsim/tables/ps_idle_ms/h7/w1/v15</property>
      <property value="-41.5508">fsim/tables/ps_idle_ms/h7/w1/v2</property>
      <property value="-42.6129">fsim/tables/ps_idle_ms/h7/w1/v3</property>
      <property value="-49.9234">fsim/tables/ps_idle_ms/h7/w1/v4</property>
      <property value="-57.5316">fsim/tables/ps_idle_ms/h7/w1/v5</property>
      <property value="-66.9401">fsim/tables/ps_idle_ms/h7/w1/v6</property>
      <property value="-72.5338">fsim/tables/ps_idle_ms/h7/w1/v7</property>
      <property value="-76.7231">fsim/tables/ps_idle_ms/h7/w1/v8</property>
      <property value="-81.0207">fsim/tables/ps_idle_ms/h7/w1/v9</property>
      <property value="-45.3619">fsim/tables/ps_idle_ms/h7/w2/v0</property>
      <property value="-48.0103">fsim/tables/ps_idle_ms/h7/w2/v1</property>
      <property value="-89.4354">fsim/tables/ps_idle_ms/h7/w2/v10</property>
      <property value="-95.1184">fsim/tables/ps_idle_ms/h7/w2/v11</property>
      <property value="-101.113">fsim/tables/ps_idle_ms/h7/w2/v12</property>
      <property value="-106.306">fsim/tables/ps_idle_ms/h7/w2/v13</property>
      <property value="-112.402">fsim/tables/ps_idle_ms/h7/w2/v14</property>
      <property value="-120.511">fsim/tables/ps_idle_ms/h7/w2/v15</property>
      <property value="-53.2692">fsim/tables/ps_idle_ms/h7/w2/v2</property>
      <property value="-58.8624">fsim/tables/ps_idle_ms/h7/w2/v3</property>
      <property value="-65.7939">fsim/tables/ps_idle_ms/h7/w2/v4</property>
      <property value="-72.2934">fsim/tables/ps_idle_ms/h7/w2/v5</property>
      <property value="-74.6991">fsim/tables/ps_idle_ms/h7/w2/v6</property>
      <property value="-77.4154">fsim/tables/ps_idle_ms/h7/w2/v7</property>
      <property value="-80.0228">fsim/tables/ps_idle_ms/h7/w2/v8</property>
      <property value="-84.2276">fsim/tables/ps_idle_ms/h7/w2/v9</property>
      <property value="446.537">fsim/tables/reach_tas_ms/h0/w0</property>
      <property value="446.209">fsim/tables/reach_tas_ms/h0/w1</property>
      <property value="446.067">fsim/tables/reach_tas_ms/h0/w2</property>
      <property value="499.064">fsim/tables/reach_tas_ms/h1/w0</property>
      <property value="498.742">fsim/tables/reach_tas_ms/h1/w1</property>
      <property value="498.138">fsim/tables/reach_tas_ms/h1/w2</property>
      <property value="556.673">fsim/tables/reach_tas_ms/h2/w0</property>
      <property value="555.838">fsim/tables/reach_tas_ms/h2/w1</property>
      <property value="554.751">fsim/tables/reach_tas_ms/h2/w2</property>
      <property value="610.403">fsim/tables/reach_tas_ms/h3/w0</property>
      <property value="607.909">fsim/tables/reach_tas_ms/h3/w1</property>
      <property value="605.479">fsim/tables/reach_tas_ms/h3/w2</property>
      <property value="607.385">fsim/tables/reach_tas_ms/h4/w0</property>
      <property value="604.629">fsim/tables/reach_tas_ms/h4/w1</property>
      <property value="601.953">fsim/tables/reach_tas_ms/h4/w2</property>
      <property value="604.389">fsim/tables/reach_tas_ms/h5/w0</property>
      <property value="599.683">fsim/tables/reach_tas_ms/h5/w1</property>
      <property value="592.419">fsim/tables/reach_tas_ms/h5/w2</property>
      <property value="589.634">fsim/tables/reach_tas_ms/h6/w0</property>
      <property value="581.213">fsim/tables/reach_tas_ms/h6/w1</property>
      <property value="571.789">fsim/tables/reach_tas_ms/h6/w2</property>
      <property value="566.138">fsim/tables/reach_tas_ms/h7/w0</property>
      <property value="550.619">fsim/tables/reach_tas_ms/h7/w1</property>
      <property value="532.247">fsim/tables/reach_tas_ms/h7/w2</property>
      <property value="0.0">fsim/tables/speed_fraction/v0</property>
      <property value="0.0666667">fsim/tables/speed_fraction/v1</property>
      <property value="0.666667">fsim/tables/speed_fraction/v10</property>
      <property value="0.733333">fsim/tables/speed_fraction/v11</property>
      <property value="0.8">fsim/tables/speed_fraction/v12</property>
      <property value="0.866667">fsim/tables/speed_fraction/v13</property>
      <property value="0.933333">fsim/tables/speed_fraction/v14</property>
      <property value="1">fsim/tables/speed_fraction/v15</property>
      <property value="0.133333">fsim/tables/speed_fraction/v2</property>
      <property value="0.2">fsim/tables/speed_fraction/v3</property>
      <property value="0.266667">fsim/tables/speed_fraction/v4</property>
      <property value="0.333333">fsim/tables/speed_fraction/v5</property>
      <property value="0.4">fsim/tables/speed_fraction/v6</property>
      <property value="0.466667">fsim/tables/speed_fraction/v7</property>
      <property value="0.533333">fsim/tables/speed_fraction/v8</property>
      <property value="0.6">fsim/tables/speed_fraction/v9</property>
      <property value="54.6795">fsim/tables/stall_cas_ms/h0/w0</property>
      <property value="58.7561">fsim/tables/stall_cas_ms/h0/w1</property>
      <property value="62.5677">fsim/tables/stall_cas_ms/h0/w2</property>
      <property value="54.934">fsim/tables/stall_cas_ms/h1/w0</property>
      <property value="59.0296">fsim/tables/stall_cas_ms/h1/w1</property>
      <property value="62.8589">fsim/tables/stall_cas_ms/h1/w2</property>
      <property value="55.3745">fsim/tables/stall_cas_ms/h2/w0</property>
      <property value="59.5029">fsim/tables/stall_cas_ms/h2/w1</property>
      <property value="63.3629">fsim/tables/stall_cas_ms/h2/w2</property>
      <property value="56.3058">fsim/tables/stall_cas_ms/h3/w0</property>
      <property value="60.5036">fsim/tables/stall_cas_ms/h3/w1</property>
      <property value="64.4286">fsim/tables/stall_cas_ms/h3/w2</property>
      <property value="56.6039">fsim/tables/stall_cas_ms/h4/w0</property>
      <property value="60.824">fsim/tables/stall_cas_ms/h4/w1</property>
      <property value="64.7697">fsim/tables/stall_cas_ms/h4/w2</property>
      <property value="56.9401">fsim/tables/stall_cas_ms/h5/w0</property>
      <property value="61.1853">fsim/tables/stall_cas_ms/h5/w1</property>
      <property value="65.1544">fsim/tables/stall_cas_ms/h5/w2</property>
      <property value="57.3989">fsim/tables/stall_cas_ms/h6/w0</property>
      <property value="61.6783">fsim/tables/stall_cas_ms/h6/w1</property>
      <property value="65.6795">fsim/tables/stall_cas_ms/h6/w2</property>
      <property value="57.9388">fsim/tables/stall_cas_ms/h7/w0</property>
      <property value="62.2584">fsim/tables/stall_cas_ms/h7/w1</property>
      <property value="66.2972">fsim/tables/stall_cas_ms/h7/w2</property>
      <property value="9237.5">fsim/tables/weight_kg/w0</property>
      <property value="10666.2">fsim/tables/weight_kg/w1</property>
      <property value="12095">fsim/tables/weight_kg/w2</property>
      <channel name="Pitch (fly-by-wire)">
        <!-- hangar: load factor command, alpha and pitch-rate inner loop (hangar/fcs.py) -->
        <summer name="fcs/pitch-trim-sum">
          <input>fcs/elevator-cmd-norm</input>
          <input>fcs/pitch-trim-cmd-norm</input>
          <clipto> <min>-1</min> <max>1</max> </clipto>
        </summer>
        <!-- the integrators are reset below 60 kt and while a wheel carries weight
             (on the ground, taking off and landing) -->
        <switch name="fcs/fbw/reset">
          <default value="0"/>
          <test logic="OR" value="-1">
            velocities/vc-kts lt 60
            gear/wow gt 0
          </test>
        </switch>
        <fcs_function name="fcs/fbw/k-alpha">
          <function>
            <table>
              <independentVar lookup="row">aero/qbar-psf</independentVar>
              <independentVar lookup="column">velocities/mach</independentVar>
              <tableData>
                       0.150     0.400     0.700     0.900     1.100     1.400     2.000
              10.0  -5.55786  -5.65008  -5.14991  -4.40305  -4.59101  -4.27759  -6.00000
              20.0  -2.54377  -2.71668  -2.48166  -2.09491  -2.00979  -1.76271  -3.20066
              40.0  -1.05977  -1.25316  -1.14857  -0.94146  -0.71954  -0.50546  -1.18500
              80.0  -0.47133  -0.70146  -0.70973  -0.63737  -0.23747   0.02369   0.00772
             150.0  -0.38794  -0.64656  -0.67182  -0.60045  -0.21353   0.04029   0.04428
             300.0  -0.31264  -0.54913  -0.60261  -0.54378  -0.17389   0.06528   0.05915
             600.0  -0.35275  -0.44213  -0.52022  -0.47716  -0.12375   0.09869   0.08087
            1200.0  -0.77076  -0.19370  -0.19725  -0.12072   0.22200   0.42002   0.16612
            2400.0  -2.29195  -0.15853  -0.00333   0.07057   0.47205   0.67927   0.59277
              </tableData>
            </table>
          </function>
        </fcs_function>
        <fcs_function name="fcs/fbw/k-q">
          <function>
            <table>
              <independentVar lookup="row">aero/qbar-psf</independentVar>
              <independentVar lookup="column">velocities/mach</independentVar>
              <tableData>
                       0.150     0.400     0.700     0.900     1.100     1.400     2.000
              10.0  -3.00000  -3.00000  -3.00000  -3.00000  -3.00000  -3.00000  -3.00000
              20.0  -2.63237  -2.90622  -2.72324  -2.37246  -2.67759  -2.62620  -3.00000
              40.0  -1.06690  -1.35921  -1.30949  -1.14773  -1.30677  -1.28942  -2.10801
              80.0  -0.33445  -0.62715  -0.66241  -0.62075  -0.68819  -0.67816  -0.91177
             150.0  -0.13036  -0.41106  -0.45503  -0.43030  -0.48295  -0.47987  -0.66098
             300.0   0.03726  -0.23875  -0.29072  -0.28018  -0.32088  -0.32326  -0.45178
             600.0   0.14328  -0.12538  -0.18103  -0.18073  -0.21151  -0.21668  -0.30635
            1200.0   0.25612  -0.01747  -0.06970  -0.07112  -0.09793  -0.10767  -0.20209
            2400.0   0.40302   0.06698   0.00601  -0.00527  -0.02471  -0.03635  -0.08879
              </tableData>
            </table>
          </function>
        </fcs_function>
        <fcs_function name="fcs/fbw/k-ff">
          <function>
            <table>
              <independentVar lookup="row">aero/qbar-psf</independentVar>
              <independentVar lookup="column">velocities/mach</independentVar>
              <tableData>
                       0.150     0.400     0.700     0.900     1.100     1.400     2.000
              10.0  -0.30000  -0.30000  -0.30000  -0.30000  -0.30000  -0.30000  -0.30000
              20.0  -0.30000  -0.30000  -0.30000  -0.30000  -0.30000  -0.30000  -0.30000
              40.0  -0.30000  -0.30000  -0.30000  -0.30000  -0.30000  -0.30000  -0.30000
              80.0  -0.26625  -0.25925  -0.23906  -0.21048  -0.25703  -0.26592  -0.30000
             150.0  -0.14319  -0.13941  -0.12854  -0.11318  -0.13889  -0.14426  -0.22702
             300.0  -0.07210  -0.07013  -0.06452  -0.05663  -0.06973  -0.07254  -0.11647
             600.0  -0.03616  -0.03519  -0.03242  -0.02851  -0.03506  -0.03646  -0.05828
            1200.0  -0.01276  -0.01213  -0.01043  -0.00828  -0.01097  -0.01165  -0.02760
            2400.0  -0.00324  -0.00308  -0.00264  -0.00210  -0.00278  -0.00296  -0.00701
              </tableData>
            </table>
          </function>
        </fcs_function>
        <fcs_function name="fcs/fbw/k-i">
          <function>
            <table>
              <independentVar lookup="row">aero/qbar-psf</independentVar>
              <independentVar lookup="column">velocities/mach</independentVar>
              <tableData>
                       0.150     0.400     0.700     0.900     1.100     1.400     2.000
              10.0  -0.60000  -0.60000  -0.60000  -0.60000  -0.60000  -0.60000  -0.60000
              20.0  -0.60000  -0.60000  -0.60000  -0.60000  -0.60000  -0.60000  -0.60000
              40.0  -0.60000  -0.60000  -0.60000  -0.60000  -0.60000  -0.60000  -0.60000
              80.0  -0.26625  -0.25925  -0.23906  -0.21048  -0.25703  -0.26592  -0.40431
             150.0  -0.14319  -0.13941  -0.12854  -0.11318  -0.13889  -0.14426  -0.22702
             300.0  -0.07210  -0.07013  -0.06452  -0.05663  -0.06973  -0.07254  -0.11647
             600.0  -0.03616  -0.03519  -0.03242  -0.02851  -0.03506  -0.03646  -0.05828
            1200.0  -0.01276  -0.01213  -0.01043  -0.00828  -0.01097  -0.01165  -0.02760
            2400.0  -0.00324  -0.00308  -0.00264  -0.00210  -0.00278  -0.00296  -0.00701
              </tableData>
            </table>
          </function>
        </fcs_function>
        <fcs_function name="fcs/fbw/n-alpha">
          <function>
            <table>
              <independentVar lookup="row">aero/qbar-psf</independentVar>
              <independentVar lookup="column">velocities/mach</independentVar>
              <tableData>
                       0.150     0.400     0.700     0.900     1.100     1.400     2.000
              10.0   1.00000   1.00000   1.00000   1.00000   1.00000   1.00000   1.00000
              20.0   1.00000   1.00000   1.00000   1.00000   1.00000   1.00000   1.00000
              40.0   1.18014   1.20818   1.29572   1.43547   1.33169   1.30466   1.00000
              80.0   3.43219   3.53215   3.83926   4.31678   3.96375   3.87020   2.17860
             150.0   6.73262   6.88674   7.36733   8.12488   7.56231   7.41580   5.01685
             300.0  13.23725  13.55013  14.52725  16.04128  14.91752  14.62483   9.88613
             600.0  25.99445  26.59613  28.47516  31.48130  29.24858  28.66708  19.53734
            1200.0  51.37730  52.58344  56.35021  62.36952  57.89791  56.73491  38.43320
            2400.0 102.27325 104.69230 112.24698 124.30701 115.35108 113.01854  76.31236
              </tableData>
            </table>
          </function>
        </fcs_function>
        <!-- the pitching moment's departures from a straight line through the
             angle-of-attack envelope (-0.014 per rad about the CG), cancelled by the
             elevator: the gains are designed on the line -->
        <fcs_function name="fcs/fbw/moment-comp">
          <function>
            <table>
              <independentVar lookup="row">aero/alpha-rad</independentVar>
              <independentVar lookup="column">velocities/mach</independentVar>
              <tableData>
                       0.150     0.400     0.700     0.900     1.100     1.400     2.000
          -0.17453  -0.03012  -0.02919  -0.02654  -0.02295  -0.02567  -0.02501  -0.04008
          -0.15708  -0.02343  -0.02271  -0.02064  -0.01786  -0.01997  -0.01945  -0.03118
          -0.13963  -0.01747  -0.01692  -0.01539  -0.01331  -0.01488  -0.01450  -0.02324
          -0.12217  -0.01265  -0.01226  -0.01114  -0.00964  -0.01078  -0.01050  -0.01683
          -0.10472  -0.00820  -0.00794  -0.00722  -0.00625  -0.00699  -0.00681  -0.01091
          -0.08727  -0.00621  -0.00602  -0.00547  -0.00473  -0.00529  -0.00515  -0.00826
          -0.06981  -0.00275  -0.00267  -0.00242  -0.00210  -0.00234  -0.00228  -0.00366
          -0.05236   0.00289   0.00280   0.00255   0.00220   0.00247   0.00240   0.00385
          -0.03491   0.00975   0.00944   0.00859   0.00743   0.00830   0.00809   0.01297
          -0.01745   0.02034   0.01971   0.01792   0.01550   0.01733   0.01688   0.02706
           0.00000   0.01505   0.01458   0.01326   0.01147   0.01283   0.01249   0.02003
           0.01745   0.00600   0.00581   0.00528   0.00457   0.00511   0.00498   0.00798
           0.03491   0.00500   0.00484   0.00440   0.00381   0.00426   0.00415   0.00665
           0.05236   0.00616   0.00597   0.00542   0.00469   0.00525   0.00511   0.00819
           0.06981   0.00952   0.00923   0.00839   0.00726   0.00811   0.00790   0.01267
           0.08727   0.01039   0.01006   0.00915   0.00792   0.00885   0.00862   0.01382
           0.10472   0.01168   0.01132   0.01029   0.00890   0.00996   0.00970   0.01555
           0.12217   0.01148   0.01112   0.01011   0.00875   0.00978   0.00953   0.01527
           0.13963   0.01124   0.01089   0.00990   0.00856   0.00957   0.00933   0.01495
           0.15708   0.01044   0.01011   0.00920   0.00795   0.00889   0.00867   0.01389
           0.17453   0.00954   0.00924   0.00840   0.00727   0.00813   0.00792   0.01270
           0.19199   0.00848   0.00822   0.00747   0.00646   0.00723   0.00704   0.01129
           0.20944   0.00733   0.00710   0.00646   0.00559   0.00625   0.00608   0.00975
           0.22689   0.00665   0.00645   0.00586   0.00507   0.00567   0.00552   0.00885
           0.24435   0.00597   0.00578   0.00526   0.00455   0.00509   0.00496   0.00794
           0.26180   0.00619   0.00600   0.00546   0.00472   0.00528   0.00514   0.00824
           0.27925   0.00652   0.00632   0.00574   0.00497   0.00556   0.00541   0.00868
           0.29671   0.00386   0.00374   0.00340   0.00294   0.00329   0.00321   0.00514
           0.31416   0.00082   0.00080   0.00073   0.00063   0.00070   0.00068   0.00110
           0.33161  -0.00359  -0.00347  -0.00316  -0.00273  -0.00306  -0.00298  -0.00477
           0.34907  -0.00857  -0.00830  -0.00755  -0.00653  -0.00730  -0.00711  -0.01140
           0.36652  -0.01135  -0.01100  -0.01000  -0.00865  -0.00967  -0.00942  -0.01510
           0.38397  -0.01427  -0.01383  -0.01258  -0.01088  -0.01216  -0.01185  -0.01900
           0.40143  -0.01735  -0.01681  -0.01528  -0.01322  -0.01478  -0.01440  -0.02309
           0.41888  -0.02031  -0.01968  -0.01789  -0.01548  -0.01731  -0.01686  -0.02703
           0.43633  -0.02199  -0.02131  -0.01937  -0.01676  -0.01874  -0.01826  -0.02926
              </tableData>
            </table>
          </function>
        </fcs_function>
        <!-- the gravity reference: the load factor that holds the flight path -->
        <fcs_function name="fcs/fbw/g-ref">
          <function>
            <product>
              <cos><property>attitude/theta-rad</property></cos>
              <cos><property>attitude/phi-rad</property></cos>
            </product>
          </function>
        </fcs_function>
        <!-- stick to load factor beyond the gravity reference, aft (negative) to n_max,
             no more than the lift at the angle-of-attack limits gives - beyond the
             gravity reference of the moment, so that full aft stick still reaches
             the limit in a steep climb or inverted - through a 0.2 s prefilter and
             a 12 g/s onset limit (a full pull at once pitches an agile airframe
             faster than its nose-down control can stop at the angle-of-attack
             limit) -->
        <fcs_function name="fcs/fbw/dn-stick">
          <function>
            <max>
              <min>
                <table>
                  <independentVar lookup="row">fcs/pitch-trim-sum</independentVar>
                  <tableData>
                    -1.0  8.000
                     0.0  0.0
                     1.0  -4.000
                  </tableData>
                </table>
                <difference><product><property>fcs/fbw/n-alpha</property><value>0.43633</value></product><property>fcs/fbw/g-ref</property></difference>
              </min>
              <difference><product><property>fcs/fbw/n-alpha</property><value>-0.17453</value></product><property>fcs/fbw/g-ref</property></difference>
            </max>
          </function>
        </fcs_function>
        <lag_filter name="fcs/fbw/dn-lag">
          <input>fcs/fbw/dn-stick</input>
          <c1>5.0</c1>
        </lag_filter>
        <actuator name="fcs/fbw/dn-cmd">
          <input>fcs/fbw/dn-lag</input>
          <rate_limit>12.0</rate_limit>
        </actuator>
        <!-- the response the command should produce (the short period's rise): the
             integrator trims away what differs from it, not the rise itself -->
        <lag_filter name="fcs/fbw/dn-model">
          <input>fcs/fbw/dn-cmd</input>
          <c1>2.5</c1>
        </lag_filter>
        <fcs_function name="fcs/fbw/dn">
          <function>
            <difference><property>accelerations/Nz</property><property>fcs/fbw/g-ref</property></difference>
          </function>
        </fcs_function>
        <!-- the angle of attack with its rise over the next 0.35 s counted as spent
             (the rise, not the pitch rate: in a steady pull the nose turns with the
             flight path and the angle of attack holds), and the load factor the
             angle of attack left to each limit gives -->
        <fcs_function name="fcs/fbw/alpha-ahead">
          <function>
            <sum>
              <property>aero/alpha-rad</property>
              <product><value>0.35</value><property>aero/alphadot-rad_sec</property></product>
            </sum>
          </function>
        </fcs_function>
        <fcs_function name="fcs/fbw/dn-room-up">
          <function>
            <product><property>fcs/fbw/n-alpha</property>
              <difference><value>0.43633</value><property>fcs/fbw/alpha-ahead</property></difference></product>
          </function>
        </fcs_function>
        <fcs_function name="fcs/fbw/dn-room-down">
          <function>
            <product><property>fcs/fbw/n-alpha</property>
              <difference><value>-0.17453</value><property>fcs/fbw/alpha-ahead</property></difference></product>
          </function>
        </fcs_function>
        <!-- the command limited to the load factor the aircraft pulls now plus what
             the angle of attack left gives: at a limit the feedforward asks for the
             load factor the airframe gives there, whatever elevator holds it - a
             steady pull on a stable airframe, a push on an unstable one (a
             feedforward faded out past the limit instead took about 10 deg of
             elevator per deg of alpha, on one side of it only: the actuator's rate
             limit could not follow, and the MiG-29A cycled between 24 and 29 deg) -->
        <fcs_function name="fcs/fbw/dn-limited">
          <function>
            <max>
              <min>
                <property>fcs/fbw/dn-cmd</property>
                <sum><property>fcs/fbw/dn</property><property>fcs/fbw/dn-room-up</property></sum>
              </min>
              <sum><property>fcs/fbw/dn</property><property>fcs/fbw/dn-room-down</property></sum>
            </max>
          </function>
        </fcs_function>
        <!-- the integrator's error: the load factor's departure from the model
             response, and at a limit the angle of attack left, counted five times -
             it trims what the airframe needs there beyond the linear design (vortex
             lift, the tail's power at high alpha) in a fraction of a second, not
             over the pull -->
        <fcs_function name="fcs/fbw/pitch-error">
          <function>
            <max>
              <min>
                <difference><property>fcs/fbw/dn-model</property><property>fcs/fbw/dn</property></difference>
                <product><value>5.0</value><property>fcs/fbw/dn-room-up</property></product>
              </min>
              <product><value>5.0</value><property>fcs/fbw/dn-room-down</property></product>
            </max>
          </function>
        </fcs_function>
        <fcs_function name="fcs/fbw/pitch-error-rate">
          <function><product><property>fcs/fbw/k-i</property><property>fcs/fbw/pitch-error</property></product></function>
        </fcs_function>
        <!-- the integrator: reset below 60 kt and on the wheels, held while the
             elevator is at a stop it would push further into (anti-windup) -->
        <switch name="fcs/fbw/pitch-hold">
          <default value="0"/>
          <test logic="OR" value="-1">
            velocities/vc-kts lt 60
            gear/wow gt 0
          </test>
          <test logic="AND" value="1">
            fcs/fbw/elevator-raw gt 0.43633
            fcs/fbw/pitch-error-rate gt 0
          </test>
          <test logic="AND" value="1">
            fcs/fbw/elevator-raw lt -0.43633
            fcs/fbw/pitch-error-rate lt 0
          </test>
        </switch>
        <integrator name="fcs/fbw/pitch-integral">
          <input>fcs/fbw/pitch-error-rate</input>
          <c1>1.0</c1>
          <trigger>fcs/fbw/pitch-hold</trigger>
          <clipto> <min>-0.5</min> <max>0.5</max> </clipto>
        </integrator>
        <!-- past an angle-of-attack limit (the next 0.35 s counted) a push back
             in proportion, all the travel 4 deg beyond: an unstable airframe
             pitching up fast needs it at once, not when an integrator winds -->
        <fcs_function name="fcs/fbw/alpha-push">
          <function>
            <difference>
              <product><value>6.25000</value>
                <max><value>0</value><difference><property>fcs/fbw/alpha-ahead</property><value>0.43633</value></difference></max></product>
              <product><value>6.25000</value>
                <max><value>0</value><difference><value>-0.17453</value><property>fcs/fbw/alpha-ahead</property></difference></max></product>
            </difference>
          </function>
        </fcs_function>
        <lag_filter name="fcs/fbw/ground">
          <input>gear/wow</input>
          <c1>2.0</c1>
        </lag_filter>
        <fcs_function name="fcs/fbw/ground-direct">
          <function>
            <product>
              <property>fcs/fbw/ground</property>
              <table>
                <independentVar lookup="row">fcs/pitch-trim-sum</independentVar>
                <tableData>
                  -1.0  -0.43633
                   0.0  0.0
                   1.0  0.43633
                </tableData>
              </table>
            </product>
          </function>
        </fcs_function>
        <!-- the elevator: the push, the moment compensation, angle-of-attack and
             pitch-rate feedback, the feedforward of the limited command, the
             integrator, the ground mode's direct stick -->
        <fcs_function name="fcs/fbw/elevator-raw">
          <function>
            <sum>
              <property>fcs/fbw/alpha-push</property>
              <property>fcs/fbw/moment-comp</property>
              <product><value>-1</value><property>fcs/fbw/k-alpha</property><property>aero/alpha-rad</property></product>
              <product><value>-1</value><property>fcs/fbw/k-q</property><property>velocities/q-rad_sec</property></product>
              <product><property>fcs/fbw/k-ff</property><property>fcs/fbw/dn-limited</property></product>
              <property>fcs/fbw/pitch-integral</property>
              <property>fcs/fbw/ground-direct</property>
            </sum>
          </function>
        </fcs_function>
        <pure_gain name="fcs/fbw/elevator">
          <input>fcs/fbw/elevator-raw</input>
          <gain>1.0</gain>
          <clipto> <min>-0.43633</min> <max>0.43633</max> </clipto>
        </pure_gain>
        <!-- full travel in 0.83 s: 60 deg/s for a +-25 deg tail, faster for a
             canard's longer throw -->
        <actuator name="fcs/elevator-actuator">
          <input>fcs/fbw/elevator</input>
          <lag>40</lag>
          <rate_limit>1.051</rate_limit>
          <output>fcs/elevator-pos-rad</output>
        </actuator>
      </channel>
      <channel name="Roll (fly-by-wire)">
        <!-- hangar: roll-rate command about the flight path, limited to what the rudder can
             coordinate; bank hold at neutral stick -->
        <summer name="fcs/roll-trim-sum">
          <input>fcs/aileron-cmd-norm</input>
          <input>fcs/roll-trim-cmd-norm</input>
          <clipto> <min>-1</min> <max>1</max> </clipto>
        </summer>
        <fcs_function name="fcs/fbw/k-roll">
          <function>
            <table>
              <independentVar lookup="row">aero/qbar-psf</independentVar>
              <independentVar lookup="column">velocities/mach</independentVar>
              <tableData>
                       0.150     0.400     0.700     0.900     1.100     1.400     2.000
              10.0   1.50000   1.50000   1.50000   1.50000   1.50000   1.50000   1.50000
              20.0   1.50000   1.50000   1.50000   1.50000   1.50000   1.50000   1.50000
              40.0   1.21752   1.33945   1.26404   1.08493   1.50000   1.50000   1.50000
              80.0   0.47480   0.62025   0.60565   0.52454   1.09005   1.50000   1.50000
             150.0   0.13486   0.29155   0.30421   0.26757   0.56527   0.86428   1.44189
             300.0   0.00000   0.09923   0.12810   0.11663   0.25876   0.40841   0.71549
             600.0   0.00000   0.00000   0.03607   0.03802   0.09923   0.17140   0.33872
            1200.0   0.00000   0.00000   0.00000   0.00000   0.01567   0.04738   0.14428
            2400.0   0.00000   0.00000   0.00000   0.00000   0.00000   0.00000   0.04228
              </tableData>
            </table>
          </function>
        </fcs_function>
        <fcs_function name="fcs/fbw/k-roll-ff">
          <function>
            <table>
              <independentVar lookup="row">aero/qbar-psf</independentVar>
              <independentVar lookup="column">velocities/mach</independentVar>
              <tableData>
                       0.150     0.400     0.700     0.900     1.100     1.400     2.000
              10.0   0.25582   0.09566   0.05384   0.03958   0.06140   0.07050   0.05399
              20.0   0.25582   0.09566   0.05384   0.03958   0.06140   0.07050   0.05399
              40.0   0.25582   0.09566   0.05384   0.03958   0.06140   0.07050   0.05399
              80.0   0.26220   0.09810   0.05528   0.04070   0.06308   0.07240   0.05505
             150.0   0.26635   0.09971   0.05629   0.04158   0.06429   0.07374   0.05567
             300.0   0.27521   0.10302   0.05815   0.04293   0.06640   0.07616   0.05729
             600.0   0.28407   0.10634   0.06003   0.04432   0.06855   0.07864   0.05900
            1200.0   0.29078   0.10879   0.06132   0.04517   0.06998   0.08031   0.06088
            2400.0   0.29366   0.10984   0.06185   0.04551   0.07056   0.08100   0.06178
              </tableData>
            </table>
          </function>
        </fcs_function>
        <fcs_function name="fcs/fbw/k-roll-i">
          <function>
            <table>
              <independentVar lookup="row">aero/qbar-psf</independentVar>
              <independentVar lookup="column">velocities/mach</independentVar>
              <tableData>
                       0.150     0.400     0.700     0.900     1.100     1.400     2.000
              10.0   0.52386   0.51026   0.46858   0.39983   0.81716   1.00000   1.00000
              20.0   0.26193   0.25513   0.23429   0.19991   0.40858   0.60941   0.98923
              40.0   0.13096   0.12757   0.11714   0.09996   0.20429   0.30470   0.49461
              80.0   0.06551   0.06385   0.05875   0.05024   0.10250   0.15283   0.24698
             150.0   0.03566   0.03478   0.03204   0.02748   0.05596   0.08338   0.13312
             300.0   0.01844   0.01798   0.01656   0.01418   0.02890   0.04307   0.06869
             600.0   0.00951   0.00927   0.00854   0.00732   0.01491   0.02223   0.03535
            1200.0   0.00487   0.00474   0.00436   0.00373   0.00761   0.01135   0.01824
            2400.0   0.00246   0.00239   0.00220   0.00188   0.00383   0.00572   0.00925
              </tableData>
            </table>
          </function>
        </fcs_function>
        <fcs_function name="fcs/fbw/p-max">
          <function>
            <table>
              <independentVar lookup="row">aero/qbar-psf</independentVar>
              <independentVar lookup="column">velocities/mach</independentVar>
              <tableData>
                       0.150     0.400     0.700     0.900     1.100     1.400     2.000
              10.0   1.17346   3.13806   5.37561   5.37561   4.88884   4.25811   5.37561
              20.0   1.17346   3.13806   5.37561   5.37561   4.88884   4.25811   5.37561
              40.0   1.17346   3.13806   5.37561   5.37561   4.88884   4.25811   5.37561
              80.0   1.14492   3.06021   5.37561   5.37561   4.75923   4.14625   5.37561
             150.0   1.12707   3.01069   5.33286   5.37561   4.66968   4.07108   5.37561
             300.0   1.09081   2.91403   5.16282   5.37561   4.52133   3.94140   5.24017
             600.0   1.05677   2.82293   5.00057   5.37561   4.37926   3.81751   5.08765
            1200.0   1.03240   2.75931   4.89546   5.37561   4.28962   3.73782   4.93111
            2400.0   1.02225   2.73312   4.85361   5.37561   4.25447   3.70620   4.85877
              </tableData>
            </table>
          </function>
        </fcs_function>
        <!-- the stick's rate halves towards alpha_max -->
        <fcs_function name="fcs/fbw/p-stick">
          <function>
            <product>
              <property>fcs/roll-trim-sum</property>
              <property>fcs/fbw/p-max</property>
              <table>
                <independentVar lookup="row">aero/alpha-rad</independentVar>
                <tableData>
                  0.17453 1.0
                  0.43633 0.5
                </tableData>
              </table>
            </product>
          </function>
        </fcs_function>
        <!-- the rudder's yaw acceleration at full travel (1/s^2), and the yaw damping (1/s) -->
        <fcs_function name="fcs/fbw/yaw-accel">
          <function>
            <table>
              <independentVar lookup="row">aero/qbar-psf</independentVar>
              <independentVar lookup="column">velocities/mach</independentVar>
              <tableData>
                       0.150     0.400     0.700     0.900     1.100     1.400     2.000
              10.0   0.06653   0.06798   0.07256   0.08009   0.04825   0.02966   0.02797
              20.0   0.13305   0.13596   0.14511   0.16019   0.09650   0.05933   0.05593
              40.0   0.26611   0.27191   0.29023   0.32038   0.19300   0.11866   0.11186
              80.0   0.62376   0.64050   0.69279   0.77755   0.46289   0.28358   0.23954
             150.0   1.26592   1.29558   1.38904   1.54193   0.92513   0.56812   0.51829
             300.0   2.60702   2.66538   2.84949   3.15164   1.89591   1.16515   1.08633
             600.0   5.26870   5.38472   5.75084   6.35246   3.82498   2.35130   2.20801
            1200.0  10.57742  10.80900  11.53986  12.74263   7.67458   4.71806   4.44093
            2400.0  21.18880  21.65166  23.11244  25.51708  15.37012   9.44938   8.90253
              </tableData>
            </table>
          </function>
        </fcs_function>
        <fcs_function name="fcs/fbw/yaw-damping">
          <function>
            <table>
              <independentVar lookup="row">aero/qbar-psf</independentVar>
              <independentVar lookup="column">velocities/mach</independentVar>
              <tableData>
                       0.150     0.400     0.700     0.900     1.100     1.400     2.000
              10.0   0.02962   0.01137   0.00697   0.00601   0.00456   0.00351   0.00166
              20.0   0.05924   0.02274   0.01394   0.01201   0.00912   0.00702   0.00331
              40.0   0.11849   0.04549   0.02788   0.02402   0.01823   0.01403   0.00662
              80.0   0.29413   0.11394   0.07147   0.06316   0.04708   0.03605   0.01446
             150.0   0.61659   0.23708   0.14592   0.12640   0.09558   0.07349   0.03345
             300.0   1.26732   0.48679   0.29876   0.25794   0.19550   0.15043   0.07025
             600.0   2.56298   0.98420   0.60359   0.52069   0.39489   0.30390   0.14269
            1200.0   5.15884   1.98082   1.21444   1.04707   0.79441   0.61144   0.28763
            2400.0  10.35333   3.97504   2.43661   2.10020   1.59375   1.22674   0.57786
              </tableData>
            </table>
          </function>
        </fcs_function>
        <!-- the rudder's share of the yaw a roll about the flight path needs, per unit of
             its roll acceleration: sin(alpha), less the ailerons' own yaw and what a
             principal axis inclined to the body axis gives -->
        <fcs_function name="fcs/fbw/roll-yaw-share">
          <function>
            <table>
              <independentVar lookup="row">aero/alpha-rad</independentVar>
              <tableData>
                   -0.34907  -0.32852
                   -0.26180  -0.25407
                   -0.17453  -0.16977
                   -0.08727  -0.07049
                    0.00000   0.02078
                    0.08727   0.09520
                    0.17453   0.17129
                    0.26180   0.24233
                    0.34907   0.30908
                    0.43633   0.38408
                    0.52360   0.47681
                    0.61087   0.56308
                    0.69813   0.62930
                    0.78540   0.67452
                    0.87266   0.70618
              </tableData>
            </table>
          </function>
        </fcs_function>
        <!-- the yaw acceleration each rad/s of roll rate needs while the aircraft pitches
             under it: the pitch rate's inertia coupling, the angle of attack rising, and
             the yaw damping the roll's yaw rate meets -->
        <fcs_function name="fcs/fbw/p-yaw-need">
          <function>
            <abs>
              <sum>
                <product>
                  <sum>
                    <property>aero/alphadot-rad_sec</property>
                    <product><value>0.71938</value><property>velocities/q-rad_sec</property></product>
                  </sum>
                  <cos><property>aero/alpha-rad</property></cos>
                </product>
                <product><property>fcs/fbw/yaw-damping</property><sin><property>aero/alpha-rad</property></sin></product>
              </sum>
            </abs>
          </function>
        </fcs_function>
        <!-- no more roll rate than 0.5 of the rudder's yaw holds: a roll the rudder cannot
             follow turns the angle of attack into sideslip -->
        <fcs_function name="fcs/fbw/p-yaw-max">
          <function>
            <quotient>
              <product><value>0.5</value><property>fcs/fbw/yaw-accel</property></product>
              <max><value>0.001</value><property>fcs/fbw/p-yaw-need</property></max>
            </quotient>
          </function>
        </fcs_function>
        <fcs_function name="fcs/fbw/p-limited">
          <function>
            <max>
              <min><property>fcs/fbw/p-stick</property><property>fcs/fbw/p-yaw-max</property></min>
              <product><value>-1</value><property>fcs/fbw/p-yaw-max</property></product>
            </max>
          </function>
        </fcs_function>
        <!-- and while the rate grows, no faster roll acceleration than all of it
             coordinates, unless the roll asked for could not leave 2.0 deg of sideslip
             even uncoordinated: at worst c^2 p^2 / (8 Y), c the rudder's share, Y its yaw
             acceleration, p the rate asked for -->
        <fcs_function name="fcs/fbw/p-accel">
          <function>
            <product>
              <quotient>
                <property>fcs/fbw/yaw-accel</property>
                <max><value>0.01</value><abs><property>fcs/fbw/roll-yaw-share</property></abs></max>
              </quotient>
              <max>
                <value>1</value>
                <quotient>
                  <product><value>0.27925</value><property>fcs/fbw/yaw-accel</property></product>
                  <sum>
                    <value>1e-9</value>
                    <product>
                      <property>fcs/fbw/roll-yaw-share</property><property>fcs/fbw/roll-yaw-share</property>
                      <property>fcs/fbw/p-limited</property><property>fcs/fbw/p-limited</property>
                    </product>
                  </sum>
                </quotient>
              </max>
            </product>
          </function>
        </fcs_function>
        <!-- a roll is stopped as fast as the ailerons can -->
        <fcs_function name="fcs/fbw/p-accel-up">
          <function>
            <sum><property>fcs/fbw/p-accel</property>
              <product><value>1000</value><lt><property>fcs/fbw/p-cmd</property><value>0</value></lt></product></sum>
          </function>
        </fcs_function>
        <fcs_function name="fcs/fbw/p-accel-down">
          <function>
            <sum><property>fcs/fbw/p-accel</property>
              <product><value>1000</value><gt><property>fcs/fbw/p-cmd</property><value>0</value></gt></product></sum>
          </function>
        </fcs_function>
        <actuator name="fcs/fbw/p-cmd">
          <input>fcs/fbw/p-limited</input>
          <rate_limit sense="incr">fcs/fbw/p-accel-up</rate_limit>
          <rate_limit sense="decr">fcs/fbw/p-accel-down</rate_limit>
        </actuator>
        <fcs_function name="fcs/fbw/p-stability">
          <function>
            <sum>
              <product><property>velocities/p-rad_sec</property><cos><property>aero/alpha-rad</property></cos></product>
              <product><property>velocities/r-rad_sec</property><sin><property>aero/alpha-rad</property></sin></product>
            </sum>
          </function>
        </fcs_function>
        <fcs_function name="fcs/fbw/roll-error-rate">
          <function>
            <product><property>fcs/fbw/k-roll-i</property>
              <difference><property>fcs/fbw/p-cmd</property><property>fcs/fbw/p-stability</property></difference></product>
          </function>
        </fcs_function>
        <integrator name="fcs/fbw/roll-integral">
          <input>fcs/fbw/roll-error-rate</input>
          <c1>1.0</c1>
          <trigger>fcs/fbw/reset</trigger>
          <clipto> <min>-0.18762</min> <max>0.18762</max> </clipto>
        </integrator>
        <fcs_function name="fcs/fbw/aileron">
          <function>
            <sum>
              <product><property>fcs/fbw/k-roll-ff</property><property>fcs/fbw/p-cmd</property></product>
              <product><property>fcs/fbw/k-roll</property>
                <difference><property>fcs/fbw/p-cmd</property><property>fcs/fbw/p-stability</property></difference></product>
              <property>fcs/fbw/roll-integral</property>
            </sum>
          </function>
          <clipto> <min>-0.37525</min> <max>0.37525</max> </clipto>
        </fcs_function>
        <actuator name="fcs/left-aileron-actuator">
          <input>fcs/fbw/aileron</input>
          <lag>40</lag>
          <rate_limit>1.4</rate_limit>
          <output>fcs/left-aileron-pos-rad</output>
        </actuator>
        <pure_gain name="fcs/right-aileron">
          <input>fcs/left-aileron-pos-rad</input>
          <gain>-1</gain>
          <output>fcs/right-aileron-pos-rad</output>
        </pure_gain>
      </channel>
      <channel name="Yaw (fly-by-wire)">
        <!-- hangar: yaw damper, sideslip feedback, pedals command sideslip -->
        <summer name="fcs/yaw-trim-sum">
          <input>fcs/rudder-cmd-norm</input>
          <input>fcs/yaw-trim-cmd-norm</input>
          <clipto> <min>-1</min> <max>1</max> </clipto>
        </summer>
        <fcs_function name="fcs/fbw/k-yaw-r">
          <function>
            <table>
              <independentVar lookup="row">aero/qbar-psf</independentVar>
              <independentVar lookup="column">velocities/mach</independentVar>
              <tableData>
                       0.150     0.400     0.700     0.900     1.100     1.400     2.000
              10.0  -3.00000  -3.00000  -3.00000  -3.00000  -3.00000  -3.00000  -3.00000
              20.0  -3.00000  -3.00000  -3.00000  -3.00000  -3.00000  -3.00000  -3.00000
              40.0  -3.00000  -3.00000  -3.00000  -3.00000  -3.00000  -3.00000  -3.00000
              80.0  -1.65434  -1.77662  -1.65443  -1.44794  -2.52219  -3.00000  -3.00000
             150.0  -0.68409  -0.86817  -0.85943  -0.78819  -1.34462  -2.02765  -2.50123
             300.0  -0.27961  -0.47868  -0.50298  -0.47494  -0.80761  -1.22119  -1.38279
             600.0  -0.07387  -0.27825  -0.31469  -0.30376  -0.52121  -0.79398  -0.87948
            1200.0   0.00000  -0.15370  -0.19630  -0.19434  -0.34034  -0.52511  -0.58793
            2400.0   0.00000  -0.06958  -0.11593  -0.11966  -0.21734  -0.34248  -0.39648
              </tableData>
            </table>
          </function>
        </fcs_function>
        <fcs_function name="fcs/fbw/k-yaw-beta">
          <function>
            <table>
              <independentVar lookup="row">aero/qbar-psf</independentVar>
              <independentVar lookup="column">velocities/mach</independentVar>
              <tableData>
                       0.150     0.400     0.700     0.900     1.100     1.400     2.000
              10.0   3.00000   3.00000   3.00000   3.00000   3.00000   3.00000   3.00000
              20.0   0.00000   0.00000   0.00000   0.00000   0.00000   1.19601   2.40177
              40.0   0.00000   0.00000   0.00000   0.00000   0.00000   0.00000   0.00000
              80.0   0.00000   0.00000   0.00000   0.00000   0.00000   0.00000   0.00000
             150.0   0.00000   0.00000   0.00000   0.00000   0.00000   0.00000   0.00000
             300.0   0.00000   0.00000   0.00000   0.00000   0.00000   0.00000   0.00000
             600.0   0.00000   0.00000   0.00000   0.00000   0.00000   0.00000   0.00000
            1200.0   0.00000   0.00000   0.00000   0.00000   0.00000   0.00000   0.00000
            2400.0   0.00000   0.00000   0.00000   0.00000   0.00000   0.00000   0.00000
              </tableData>
            </table>
          </function>
        </fcs_function>
        <fcs_function name="fcs/fbw/k-pedal">
          <function>
            <table>
              <independentVar lookup="row">aero/qbar-psf</independentVar>
              <independentVar lookup="column">velocities/mach</independentVar>
              <tableData>
                       0.150     0.400     0.700     0.900     1.100     1.400     2.000
              10.0   0.18930   0.18835   0.18496   0.17774   0.28908   0.39148   0.39148
              20.0   0.18930   0.18835   0.18496   0.17774   0.28908   0.39148   0.39148
              40.0   0.18930   0.18835   0.18496   0.17774   0.28908   0.39148   0.39148
              80.0   0.22155   0.22315   0.22633   0.22536   0.35731   0.48026   0.41068
             150.0   0.26090   0.26034   0.25777   0.25033   0.40406   0.52360   0.51374
             300.0   0.27562   0.27451   0.27039   0.26081   0.42303   0.52360   0.52360
             600.0   0.28117   0.27986   0.27515   0.26477   0.43019   0.52360   0.52360
            1200.0   0.28338   0.28200   0.27707   0.26641   0.43312   0.52360   0.52360
            2400.0   0.28417   0.28275   0.27771   0.26693   0.43406   0.52360   0.52360
              </tableData>
            </table>
          </function>
        </fcs_function>
        <!-- the yaw damper damps the sideslip's rate, the stability-axis yaw rate less
             the one that coordinates the bank and the side force: in the dutch roll the
             yaw rate itself, and zero in a steady coordinated turn, in a roll about the
             flight path and in a steady sideslip - it coordinates those as long as they
             last (a damper on the washed-out yaw rate stopped coordinating a sustained
             roll, and at low speed the roll turned the angle of attack into sideslip) -->
        <!-- on the wheels (the pitch's ground mode, fcs/fbw/ground) the pedals move the rudder
             directly over its travel, a ground law: the sideslip feedback, there the
             crosswind's, turned the nose into it, and as the C-17A's nose wheel unloaded
             towards its rotation it ran 8.6 m off its line across 10 m/s -->
        <fcs_function name="fcs/fbw/rudder">
          <function>
            <sum>
              <product>
                <difference><value>1</value><property>fcs/fbw/ground</property></difference>
                <sum>
                  <product><property>fcs/fbw/k-pedal</property><property>fcs/yaw-trim-sum</property></product>
                  <product><value>-1</value><property>fcs/fbw/k-yaw-beta</property>
                    <difference><property>aero/beta-rad</property>
                      <product><value>0.17453</value><property>fcs/yaw-trim-sum</property></product></difference></product>
                  <product><property>fcs/fbw/k-yaw-r</property><property>aero/betadot-rad_sec</property></product>
                </sum>
              </product>
              <product><property>fcs/fbw/ground</property><value>0.52360</value><property>fcs/yaw-trim-sum</property></product>
            </sum>
          </function>
          <clipto> <min>-0.52360</min> <max>0.52360</max> </clipto>
        </fcs_function>
        <actuator name="fcs/rudder-actuator">
          <input>fcs/fbw/rudder</input>
          <lag>40</lag>
          <rate_limit>1.4</rate_limit>
          <output>fcs/rudder-pos-rad</output>
        </actuator>
        <!-- the nose wheel steers with the pedals (JSBSim steers from fcs/steer-cmd-norm,
             positive right; the rudder command is positive left) -->
        <pure_gain name="fcs/steer-from-rudder">
          <input>fcs/yaw-trim-sum</input>
          <gain>-1</gain>
          <output>fcs/steer-cmd-norm</output>
        </pure_gain>
      </channel>
      <channel name="Flaps">
        <kinematic name="fcs/flaps-control">
          <input>fcs/flap-cmd-norm</input>
          <traverse>
            <setting> <position>0.0</position> <time>0.0</time> </setting>
            <setting> <position>5.4</position> <time>2.0</time> </setting>
            <setting> <position>10.8</position> <time>2.0</time> </setting>
            <setting> <position>16.1</position> <time>2.0</time> </setting>
            <setting> <position>21.5</position> <time>2.0</time> </setting>
          </traverse>
          <output>fcs/flap-pos-deg</output>
        </kinematic>
        <pure_gain name="fcs/flaps-normalized">
          <input>fcs/flap-pos-deg</input>
          <gain>0.0465116</gain>
          <output>fcs/flap-pos-norm</output>
        </pure_gain>
      </channel>
      <channel name="Speedbrake">
        <kinematic name="fcs/speedbrake-control">
          <input>fcs/speedbrake-cmd-norm</input>
          <traverse>
            <setting> <position>0</position> <time>0</time> </setting>
            <setting> <position>1</position> <time>2.00</time> </setting>
          </traverse>
          <output>fcs/speedbrake-pos-norm</output>
        </kinematic>
      </channel>
      <channel name="Leading-Edge Flaps">
        <fcs_function name="fcs/lef-schedule">
          <function>
            <sum>
              <product> <value>1.38</value> <property>aero/alpha-deg</property> </product>
              <product> <value>-9.05</value>
                <quotient> <property>aero/qbar-psf</property> <property>atmosphere/P-psf</property> </quotient>
              </product>
              <value>1.45</value>
            </sum>
          </function>
          <clipto> <min>-2</min> <max>25</max> </clipto>
        </fcs_function>
        <actuator name="fcs/lef-actuator">
          <input>fcs/lef-schedule</input>
          <lag>7.35</lag>
          <rate_limit>25</rate_limit>
          <output>fcs/lef-pos-deg</output>
        </actuator>
      </channel>
      <channel name="Throttle 0">
        <fcs_function name="fcs/throttle-lever-0">
          <function>
            <table>
              <independentVar lookup="row">fcs/throttle-cmd-norm[0]</independentVar>
              <tableData>
                0.0  0.0
                0.8  1.0
                1.0  2.0
              </tableData>
            </table>
          </function>
          <output>fcs/throttle-pos-norm[0]</output>
        </fcs_function>
      </channel>
      <channel name="Landing Gear">
        <kinematic name="fcs/gear-control">
          <input>gear/gear-cmd-norm</input>
          <traverse>
            <setting> <position>0</position> <time>0</time> </setting>
            <setting> <position>1</position> <time>5</time> </setting>
          </traverse>
          <output>gear/gear-pos-norm</output>
        </kinematic>
      </channel>
    </flight_control>
    <aerodynamics>
        <function name="aero/function/mach-lift">
          <description>lift, and damping, over its low-speed value (hangar: aero/mach.py)</description>
          <table>
            <independentVar lookup="row">velocities/mach</independentVar>
            <tableData>
                 0.000     1.000000
                 0.300     1.016052
                 0.500     1.047888
                 0.600     1.072862
                 0.700     1.106746
                 0.800     1.154262
                 0.850     1.186046
                 0.900     1.226116
                 0.950     1.223399
                 1.000     1.202557
                 1.050     1.171333
                 1.100     1.137470
                 1.200     1.092803
                 1.400     1.114383
                 1.600     0.950142
                 1.800     0.836349
                 2.000     0.751065
                 2.300     0.655250
                 2.600     0.583507
            </tableData>
          </table>
        </function>
        <function name="aero/function/mach-side">
          <description>side force, rolling and yawing moment over their low-speed values</description>
          <table>
            <independentVar lookup="row">velocities/mach</independentVar>
            <tableData>
                 0.000     1.000000
                 0.300     1.011440
                 0.500     1.033462
                 0.600     1.050100
                 0.700     1.071730
                 0.800     1.100053
                 0.850     1.117456
                 0.900     1.136889
                 0.950     1.138715
                 1.000     1.135301
                 1.050     1.126921
                 1.100     1.113852
                 1.200     1.074747
                 1.400     0.927381
                 1.600     1.131200
                 1.800     0.984232
                 2.000     0.874293
                 2.300     0.751860
                 2.600     0.661385
            </tableData>
          </table>
        </function>
        <function name="aero/function/mach-dCm-dCL">
          <description>pitching moment per unit low-speed lift: the neutral point's move</description>
          <table>
            <independentVar lookup="row">velocities/mach</independentVar>
            <tableData>
                 0.000     0.000000
                 0.300    -0.002599
                 0.500    -0.007924
                 0.600    -0.012257
                 0.700    -0.018324
                 0.800    -0.026963
                 0.850    -0.032393
                 0.900    -0.037463
                 0.950    -0.055931
                 1.000    -0.082482
                 1.050    -0.111880
                 1.100    -0.139727
                 1.200    -0.179217
                 1.400    -0.201351
                 1.600    -0.180103
                 1.800    -0.160269
                 2.000    -0.143386
                 2.300    -0.123009
                 2.600    -0.107207
            </tableData>
          </table>
        </function>
        <function name="aero/function/mach-dCD0">
          <description>zero-lift drag's change: friction and wave drag</description>
          <table>
            <independentVar lookup="row">velocities/mach</independentVar>
            <tableData>
                 0.000     0.000000
                 0.300    -0.000126
                 0.500    -0.000343
                 0.600    -0.000488
                 0.700    -0.000654
                 0.800    -0.000840
                 0.850    -0.000799
                 0.900    -0.000423
                 0.950     0.001869
                 1.000     0.012996
                 1.050     0.020837
                 1.100     0.020719
                 1.200     0.020475
                 1.400     0.019143
                 1.600     0.018213
                 1.800     0.017356
                 2.000     0.016545
                 2.300     0.015401
                 2.600     0.014339
            </tableData>
          </table>
        </function>
        <function name="aero/function/mach-dK">
          <description>induced-drag factor's change (per CL^2)</description>
          <table>
            <independentVar lookup="row">velocities/mach</independentVar>
            <tableData>
                 0.000     0.000000
                 0.300     0.004750
                 0.500     0.013533
                 0.600     0.019883
                 0.700     0.027820
                 0.800     0.037795
                 0.850     0.043809
                 0.900     0.050735
                 0.950     0.050286
                 1.000     0.046747
                 1.050     0.045914
                 1.100     0.052998
                 1.200     0.084902
                 1.400     0.108079
                 1.600     0.102024
                 1.800     0.089962
                 2.000     0.072785
                 2.300     0.038406
                 2.600    -0.005598
            </tableData>
          </table>
        </function>
        <function name="aero/function/mach-aileron">
          <description>aileron power over its low-speed value</description>
          <table>
            <independentVar lookup="row">velocities/mach</independentVar>
            <tableData>
                 0.000     1.000000
                 0.300     1.017480
                 0.500     1.053747
                 0.600     1.083919
                 0.700     1.127738
                 0.800     1.196071
                 0.850     1.247529
                 0.900     1.321660
                 0.950     1.230043
                 1.000     1.058560
                 1.050     0.849879
                 1.100     0.646670
                 1.200     0.427342
                 1.400     0.433564
                 1.600     0.355141
                 1.800     0.303926
                 2.000     0.267094
                 2.300     0.227250
                 2.600     0.198470
            </tableData>
          </table>
        </function>
        <function name="aero/function/mach-elevator">
          <description>elevator power over its low-speed value</description>
          <table>
            <independentVar lookup="row">velocities/mach</independentVar>
            <tableData>
                 0.000     1.000000
                 0.300     1.021469
                 0.500     1.064738
                 0.600     1.099355
                 0.700     1.147293
                 0.800     1.216399
                 0.850     1.263957
                 0.900     1.326388
                 0.950     1.321864
                 1.000     1.288421
                 1.050     1.238906
                 1.100     1.186170
                 1.200     1.122429
                 1.400     1.217514
                 1.600     1.003820
                 1.800     0.862199
                 2.000     0.759528
                 2.300     0.647777
                 2.600     0.566664
            </tableData>
          </table>
        </function>
        <function name="aero/function/mach-flap">
          <description>flap power over its low-speed value</description>
          <table>
            <independentVar lookup="row">velocities/mach</independentVar>
            <tableData>
                 0.000     1.000000
                 0.300     1.024862
                 0.500     1.076276
                 0.600     1.118843
                 0.700     1.180339
                 0.800     1.275768
                 0.850     1.347712
                 0.900     1.452763
                 0.950     1.360240
                 1.000     1.174038
                 1.050     0.943021
                 1.100     0.716054
                 1.200     0.469732
                 1.400     0.476572
                 1.600     0.390370
                 1.800     0.334074
                 2.000     0.293589
                 2.300     0.249792
                 2.600     0.218158
            </tableData>
          </table>
        </function>
        <function name="aero/function/mach-rudder">
          <description>rudder power over its low-speed value</description>
          <table>
            <independentVar lookup="row">velocities/mach</independentVar>
            <tableData>
                 0.000     1.000000
                 0.300     1.014672
                 0.500     1.043937
                 0.600     1.067054
                 0.700     1.098639
                 0.800     1.143367
                 0.850     1.173675
                 0.900     1.212779
                 0.950     1.142446
                 1.000     1.023174
                 1.050     0.878157
                 1.100     0.730584
                 1.200     0.520543
                 1.400     0.449168
                 1.600     0.547885
                 1.800     0.476703
                 2.000     0.423455
                 2.300     0.364156
                 2.600     0.320335
            </tableData>
          </table>
        </function>
        <function name="aero/function/CL-base">
          <description>CL over alpha and beta at low speed</description>
          <table>
            <independentVar lookup="row">aero/alpha-deg</independentVar>
            <independentVar lookup="column">aero/beta-deg</independentVar>
            <tableData>
                        -90.00    -70.00    -50.00    -40.00    -30.00    -25.00    -20.00    -15.00    -10.00     -6.00     -3.00      0.00      3.00      6.00     10.00     15.00     20.00     25.00     30.00     40.00     50.00     70.00     90.00
             -180.00  -0.00000   0.00000   0.00000   0.00000   0.00000   0.00000   0.00000   0.00000   0.00000   0.00000   0.00000   0.00000   0.00000   0.00000   0.00000   0.00000   0.00000   0.00000   0.00000   0.00000   0.00000   0.00000  -0.00000
             -120.00   0.00000   0.11772   0.37084   0.51649   0.65241   0.71164   0.76268   0.80386   0.83508   0.85135   0.85884   0.85910   0.85884   0.85135   0.83508   0.80386   0.76268   0.71164   0.65241   0.51649   0.37084   0.11772   0.00000
              -70.00  -0.00000  -0.09167  -0.28995  -0.40453  -0.51156  -0.55821  -0.59838  -0.63078  -0.65497  -0.66742  -0.67400  -0.67279  -0.67400  -0.66742  -0.65497  -0.63078  -0.59838  -0.55821  -0.51156  -0.40453  -0.28995  -0.09167  -0.00000
              -46.00  -0.00000  -0.32734  -0.74172  -0.99262  -1.25937  -1.37652  -1.47770  -1.56023  -1.63701  -1.67930  -1.70288  -1.71121  -1.70288  -1.67930  -1.63701  -1.56023  -1.47770  -1.37652  -1.25937  -0.99262  -0.74172  -0.32734  -0.00000
              -32.00  -0.00000  -0.41871  -0.75892  -1.00342  -1.27767  -1.41008  -1.52806  -1.62786  -1.68917  -1.72112  -1.73440  -1.73893  -1.73440  -1.72112  -1.68917  -1.62786  -1.52806  -1.41008  -1.27767  -1.00342  -0.75892  -0.41871  -0.00000
              -22.00  -0.00000  -0.36341  -0.59169  -0.81160  -1.03700  -1.12740  -1.20813  -1.26487  -1.30563  -1.32652  -1.33528  -1.33818  -1.33528  -1.32652  -1.30563  -1.26487  -1.20813  -1.12740  -1.03700  -0.81160  -0.59169  -0.36341  -0.00000
              -17.00  -0.00000  -0.29569  -0.46786  -0.65517  -0.82732  -0.89515  -0.95397  -0.99431  -1.02372  -1.03892  -1.04533  -1.04744  -1.04533  -1.03892  -1.02372  -0.99431  -0.95397  -0.89515  -0.82732  -0.65517  -0.46786  -0.29569  -0.00000
              -13.00  -0.00000  -0.23042  -0.35558  -0.49713  -0.63751  -0.68272  -0.72477  -0.75386  -0.77504  -0.78594  -0.79052  -0.79203  -0.79052  -0.78594  -0.77504  -0.75386  -0.72477  -0.68272  -0.63751  -0.49713  -0.35558  -0.23042  -0.00000
               -9.00  -0.00000  -0.15744  -0.23630  -0.33399  -0.43295  -0.46725  -0.48804  -0.50550  -0.51815  -0.52461  -0.52729  -0.52816  -0.52729  -0.52461  -0.51815  -0.50550  -0.48804  -0.46725  -0.43295  -0.33399  -0.23630  -0.15744  -0.00000
               -5.00  -0.00000  -0.07307  -0.11581  -0.16852  -0.21923  -0.23670  -0.24494  -0.25043  -0.25434  -0.25626  -0.25701  -0.25723  -0.25701  -0.25626  -0.25434  -0.25043  -0.24494  -0.23670  -0.21923  -0.16852  -0.11581  -0.07307  -0.00000
               -1.00  -0.00000   0.01215  -0.00244  -0.01514  -0.02291  -0.02374  -0.01843  -0.01283  -0.00865  -0.00641  -0.00541  -0.00504  -0.00541  -0.00641  -0.00865  -0.01283  -0.01843  -0.02374  -0.02291  -0.01514  -0.00244   0.01215  -0.00000
                3.00   0.00000   0.09645   0.12084   0.14958   0.18726   0.20595   0.22588   0.24363   0.25666   0.26342   0.26627   0.26722   0.26627   0.26342   0.25666   0.24363   0.22588   0.20595   0.18726   0.14958   0.12084   0.09645   0.00000
                7.00   0.00000   0.18150   0.24143   0.31469   0.40017   0.43734   0.46955   0.49955   0.52152   0.53290   0.53771   0.53931   0.53771   0.53290   0.52152   0.49955   0.46955   0.43734   0.40017   0.31469   0.24143   0.18150   0.00000
               11.00   0.00000   0.25630   0.37344   0.51397   0.63755   0.67268   0.71821   0.76085   0.79210   0.80832   0.81519   0.81748   0.81519   0.80832   0.79210   0.76085   0.71821   0.67268   0.63755   0.51397   0.37344   0.25630   0.00000
               15.00   0.00000   0.32223   0.50913   0.66129   0.82768   0.89392   0.96234   1.01696   1.05701   1.07781   1.08663   1.08956   1.08663   1.07781   1.05701   1.01696   0.96234   0.89392   0.82768   0.66129   0.50913   0.32223   0.00000
               19.00   0.00000   0.37976   0.61007   0.80253   1.01468   1.10658   1.19133   1.25806   1.30720   1.33281   1.34367   1.34728   1.34367   1.33281   1.30720   1.25806   1.19133   1.10658   1.01468   0.80253   0.61007   0.37976   0.00000
               23.00   0.00000   0.42217   0.69195   0.92024   1.18437   1.29792   1.39709   1.47364   1.52985   1.55907   1.57146   1.57558   1.57146   1.55907   1.52985   1.47364   1.39709   1.29792   1.18437   0.92024   0.69195   0.42217   0.00000
               27.00   0.00000   0.44247   0.75602   1.01020   1.31231   1.45307   1.56602   1.64930   1.70946   1.74072   1.75397   1.75839   1.75397   1.74072   1.70946   1.64930   1.56602   1.45307   1.31231   1.01020   0.75602   0.44247   0.00000
               32.00   0.00000   0.45002   0.81623   1.09119   1.40770   1.56024   1.69632   1.79442   1.85805   1.89056   1.90437   1.90897   1.90437   1.89056   1.85805   1.79442   1.69632   1.56024   1.40770   1.09119   0.81623   0.45002   0.00000
               46.00   0.00000   0.33700   0.80234   1.07789   1.37182   1.49998   1.61003   1.70326   1.77756   1.82823   1.85484   1.86359   1.85484   1.82823   1.77756   1.70326   1.61003   1.49998   1.37182   1.07789   0.80234   0.33700   0.00000
               70.00   0.00000   0.09171   0.29029   0.40501   0.51217   0.55888   0.59910   0.63156   0.65579   0.66826   0.67485   0.67364   0.67485   0.66826   0.65579   0.63156   0.59910   0.55888   0.51217   0.40501   0.29029   0.09171   0.00000
              120.00  -0.00000  -0.11772  -0.37084  -0.51649  -0.65241  -0.71164  -0.76268  -0.80386  -0.83508  -0.85135  -0.85884  -0.85910  -0.85884  -0.85135  -0.83508  -0.80386  -0.76268  -0.71164  -0.65241  -0.51649  -0.37084  -0.11772  -0.00000
              180.00   0.00000   0.00000   0.00000   0.00000   0.00000   0.00000   0.00000   0.00000   0.00000   0.00000   0.00000   0.00000   0.00000   0.00000   0.00000   0.00000   0.00000   0.00000   0.00000   0.00000   0.00000   0.00000   0.00000
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            </tableData>
          </table>
        </function>
      <axis name="DRAG">
        <function name="aero/coefficient/CD_base">
          <description>CD over alpha and beta (hangar)</description>
          <product>
            <property>aero/qbar-psf</property>
            <property>metrics/Sw-sqft</property>
          <table>
            <independentVar lookup="row">aero/alpha-deg</independentVar>
            <independentVar lookup="column">aero/beta-deg</independentVar>
            <tableData>
                        -90.00    -70.00    -50.00    -40.00    -30.00    -25.00    -20.00    -15.00    -10.00     -6.00     -3.00      0.00      3.00      6.00     10.00     15.00     20.00     25.00     30.00     40.00     50.00     70.00     90.00
             -180.00   0.39285   0.32847   0.20484   0.14062   0.08849   0.06761   0.05056   0.03751   0.02433   0.02238   0.02235   0.02232   0.02235   0.02238   0.02433   0.03751   0.05056   0.06761   0.08849   0.14062   0.20484   0.32847   0.39285
             -120.00   0.39285   0.40331   0.61620   0.82110   1.05774   1.17375   1.27976   1.36970   1.43817   1.47445   1.49024   1.49573   1.49024   1.47445   1.43817   1.36970   1.27976   1.17375   1.05774   0.82110   0.61620   0.40331   0.39285
              -70.00   0.39285   0.43198   0.72118   0.98265   1.27981   1.42451   1.55642   1.66816   1.75322   1.79855   1.81788   1.82458   1.81788   1.79855   1.75322   1.66816   1.55642   1.42451   1.27981   0.98265   0.72118   0.43198   0.39285
              -46.00   0.39285   0.46202   0.67880   0.86851   1.10911   1.22862   1.33884   1.43318   1.51687   1.57267   1.60136   1.61143   1.60136   1.57267   1.51687   1.43318   1.33884   1.22862   1.10911   0.86851   0.67880   0.46202   0.39285
              -32.00   0.39285   0.44496   0.50167   0.57258   0.69069   0.75994   0.82553   0.88703   0.92127   0.93948   0.94693   0.94952   0.94693   0.93948   0.92127   0.88703   0.82553   0.75994   0.69069   0.57258   0.50167   0.44496   0.39285
              -22.00   0.39285   0.41698   0.35410   0.35039   0.38366   0.39820   0.42354   0.42955   0.43340   0.43545   0.43633   0.43662   0.43633   0.43545   0.43340   0.42955   0.42354   0.39820   0.38366   0.35039   0.35410   0.41698   0.39285
              -17.00   0.39285   0.39994   0.29601   0.25955   0.25453   0.25173   0.26111   0.25267   0.24643   0.24328   0.24197   0.24153   0.24197   0.24328   0.24643   0.25267   0.26111   0.25173   0.25453   0.25955   0.29601   0.39994   0.39285
              -13.00   0.39285   0.38854   0.26161   0.20522   0.17924   0.16710   0.16792   0.15249   0.14109   0.13523   0.13276   0.13194   0.13276   0.13523   0.14109   0.15249   0.16792   0.16710   0.17924   0.20522   0.26161   0.38854   0.39285
               -9.00   0.39285   0.38072   0.23934   0.17071   0.13075   0.11384   0.10957   0.09005   0.07564   0.06820   0.06506   0.06402   0.06506   0.06820   0.07564   0.09005   0.10957   0.11384   0.13075   0.17071   0.23934   0.38072   0.39285
               -5.00   0.39285   0.37730   0.22710   0.15160   0.10483   0.08495   0.07841   0.05707   0.04133   0.03320   0.02979   0.02866   0.02979   0.03320   0.04133   0.05707   0.07841   0.08495   0.10483   0.15160   0.22710   0.37730   0.39285
               -1.00   0.39285   0.37680   0.22215   0.14421   0.09577   0.08342   0.06778   0.04629   0.03046   0.02230   0.01888   0.01775   0.01888   0.02230   0.03046   0.04629   0.06778   0.08342   0.09577   0.14421   0.22215   0.37680   0.39285
                3.00   0.39285   0.37759   0.22371   0.14684   0.10066   0.08989   0.07516   0.05510   0.04036   0.03277   0.02959   0.02855   0.02959   0.03277   0.04036   0.05510   0.07516   0.08989   0.10066   0.14684   0.22371   0.37759   0.39285
                7.00   0.39285   0.38060   0.23216   0.16001   0.12026   0.11299   0.10126   0.08425   0.07177   0.06536   0.06267   0.06178   0.06267   0.06536   0.07177   0.08425   0.10126   0.11299   0.12026   0.16001   0.23216   0.38060   0.39285
               11.00   0.39285   0.38771   0.24824   0.18396   0.15752   0.15618   0.14983   0.13786   0.12915   0.12471   0.12285   0.12224   0.12285   0.12471   0.12915   0.13786   0.14983   0.15618   0.15752   0.18396   0.24824   0.38771   0.39285
               15.00   0.39285   0.39907   0.27200   0.22549   0.21614   0.23030   0.22615   0.22176   0.21874   0.21728   0.21669   0.21650   0.21669   0.21728   0.21874   0.22176   0.22615   0.23030   0.21614   0.22549   0.27200   0.39907   0.39285
               19.00   0.39285   0.41339   0.31379   0.28721   0.30177   0.32749   0.33574   0.34156   0.34626   0.34889   0.35005   0.35044   0.35005   0.34889   0.34626   0.34156   0.33574   0.32749   0.30177   0.28721   0.31379   0.41339   0.39285
               23.00   0.39285   0.42725   0.36447   0.36354   0.41395   0.44916   0.47859   0.49697   0.51110   0.51869   0.52197   0.52307   0.52197   0.51869   0.51110   0.49697   0.47859   0.44916   0.41395   0.36354   0.36447   0.42725   0.39285
               27.00   0.39285   0.43797   0.42176   0.45053   0.53880   0.59358   0.64774   0.67996   0.70449   0.71758   0.72321   0.72510   0.72321   0.71758   0.70449   0.67996   0.64774   0.59358   0.53880   0.45053   0.42176   0.43797   0.39285
               32.00   0.39285   0.44953   0.50045   0.57274   0.70613   0.78652   0.87296   0.92963   0.96797   0.98802   0.99666   0.99955   0.99666   0.98802   0.96797   0.92963   0.87296   0.78652   0.70613   0.57274   0.50045   0.44953   0.39285
               46.00   0.39285   0.46387   0.69219   0.89796   1.15876   1.28857   1.40872   1.51446   1.60352   1.66302   1.69395   1.70440   1.69395   1.66302   1.60352   1.51446   1.40872   1.28857   1.15876   0.89796   0.69219   0.46387   0.39285
               70.00   0.39285   0.43195   0.72118   0.98265   1.27981   1.42451   1.55642   1.66816   1.75322   1.79855   1.81788   1.82458   1.81788   1.79855   1.75322   1.66816   1.55642   1.42451   1.27981   0.98265   0.72118   0.43195   0.39285
              120.00   0.39285   0.40331   0.61620   0.82110   1.05774   1.17375   1.27976   1.36970   1.43817   1.47445   1.49024   1.49573   1.49024   1.47445   1.43817   1.36970   1.27976   1.17375   1.05774   0.82110   0.61620   0.40331   0.39285
              180.00   0.39285   0.32847   0.20484   0.14062   0.08849   0.06761   0.05056   0.03751   0.02433   0.02238   0.02235   0.02232   0.02235   0.02238   0.02433   0.03751   0.05056   0.06761   0.08849   0.14062   0.20484   0.32847   0.39285
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            </tableData>
          </table>
          </product>
        </function>
        <function name="aero/coefficient/CD_mach">
          <description>zero-lift drag's change with Mach: friction, wave drag</description>
          <product>
            <property>aero/qbar-psf</property>
            <property>metrics/Sw-sqft</property>
            <property>aero/function/mach-dCD0</property>
          </product>
        </function>
        <function name="aero/coefficient/CD_induced_mach">
          <description>induced drag's change with Mach (leading-edge suction lost)</description>
          <product>
            <property>aero/qbar-psf</property>
            <property>metrics/Sw-sqft</property>
            <property>aero/cl-squared</property>
            <property>aero/function/mach-dK</property>
          </product>
        </function>
        <function name="aero/coefficient/CD_aileron">
          <description>CD increment from aileron (deg), over alpha</description>
          <product>
            <property>aero/qbar-psf</property>
            <property>metrics/Sw-sqft</property>
            <property>aero/function/mach-aileron</property>
          <table>
            <independentVar lookup="row">aero/alpha-deg</independentVar>
            <independentVar lookup="column">fcs/left-aileron-pos-deg</independentVar>
            <tableData>
                        -21.50    -20.00    -15.00    -10.00     -5.00      0.00      5.00     10.00     15.00     20.00     21.50
             -180.00   0.00818   0.00714   0.00410   0.00184   0.00046   0.00000   0.00046   0.00184   0.00410   0.00714   0.00818
             -120.00   0.00663   0.00578   0.00332   0.00150   0.00038   0.00000   0.00038   0.00150   0.00332   0.00578   0.00663
              -70.00   0.00609   0.00531   0.00306   0.00138   0.00035   0.00000   0.00035   0.00138   0.00306   0.00531   0.00609
              -46.00   0.00158   0.00123   0.00038   0.00001  -0.00003   0.00000  -0.00003   0.00001   0.00038   0.00123   0.00158
              -32.00   0.00577   0.00480   0.00215   0.00057   0.00004   0.00000   0.00004   0.00057   0.00215   0.00480   0.00577
              -22.00   0.01866   0.01694   0.01123   0.00572   0.00154   0.00000   0.00154   0.00572   0.01123   0.01694   0.01866
              -17.00   0.02444   0.02250   0.01578   0.00864   0.00248   0.00000   0.00248   0.00864   0.01578   0.02250   0.02444
              -13.00   0.02265   0.02079   0.01442   0.00782   0.00223   0.00000   0.00223   0.00782   0.01442   0.02079   0.02265
               -9.00   0.01894   0.01716   0.01140   0.00593   0.00165   0.00000   0.00165   0.00593   0.01140   0.01716   0.01894
               -5.00   0.01787   0.01614   0.01055   0.00537   0.00145   0.00000   0.00145   0.00537   0.01055   0.01614   0.01787
               -1.00   0.01723   0.01556   0.01017   0.00518   0.00141   0.00000   0.00141   0.00518   0.01017   0.01556   0.01723
                3.00   0.01886   0.01702   0.01112   0.00566   0.00154   0.00000   0.00154   0.00566   0.01112   0.01702   0.01886
                7.00   0.02147   0.01947   0.01285   0.00653   0.00176   0.00000   0.00176   0.00653   0.01285   0.01947   0.02147
               11.00   0.03076   0.02834   0.01967   0.01029   0.00275   0.00000   0.00275   0.01029   0.01967   0.02834   0.03076
               15.00   0.04007   0.03751   0.02793   0.01614   0.00472   0.00000   0.00472   0.01614   0.02793   0.03751   0.04007
               19.00   0.04379   0.04121   0.03153   0.01926   0.00612   0.00000   0.00612   0.01926   0.03153   0.04121   0.04379
               23.00   0.03980   0.03733   0.02817   0.01698   0.00544   0.00000   0.00544   0.01698   0.02817   0.03733   0.03980
               27.00   0.02969   0.02755   0.01977   0.01097   0.00317   0.00000   0.00317   0.01097   0.01977   0.02755   0.02969
               32.00   0.01625   0.01449   0.00872   0.00356   0.00060   0.00000   0.00060   0.00356   0.00872   0.01449   0.01625
               46.00  -0.00450  -0.00464  -0.00442  -0.00296  -0.00093   0.00000  -0.00093  -0.00296  -0.00442  -0.00464  -0.00450
               70.00   0.00609   0.00531   0.00306   0.00138   0.00035   0.00000   0.00035   0.00138   0.00306   0.00531   0.00609
              120.00   0.00663   0.00578   0.00332   0.00150   0.00038   0.00000   0.00038   0.00150   0.00332   0.00578   0.00663
              180.00   0.00818   0.00714   0.00410   0.00184   0.00046   0.00000   0.00046   0.00184   0.00410   0.00714   0.00818
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            </tableData>
          </table>
          </product>
        </function>
        <function name="aero/coefficient/CD_elevator">
          <description>CD increment from elevator (deg), over alpha</description>
          <product>
            <property>aero/qbar-psf</property>
            <property>metrics/Sw-sqft</property>
            <property>aero/function/mach-elevator</property>
          <table>
            <independentVar lookup="row">aero/alpha-deg</independentVar>
            <independentVar lookup="column">fcs/elevator-pos-deg</independentVar>
            <tableData>
                        -25.00    -20.00    -15.00    -10.00     -5.00      0.00      5.00     10.00     15.00     20.00     25.00
             -180.00   0.04206   0.02734   0.01540   0.00323   0.00050   0.00000   0.00050   0.00323   0.01540   0.02734   0.04206
             -120.00  -0.09726  -0.07790  -0.05789  -0.03783  -0.01834   0.00000   0.01663   0.03104   0.04279   0.05153   0.05699
              -70.00   0.02601   0.02756   0.02562   0.02025   0.01163   0.00000  -0.01427  -0.03076  -0.04872  -0.00131   0.08651
              -46.00   0.13654   0.11453   0.08965   0.06200   0.03199   0.00000  -0.03374  -0.06824  -0.10195  -0.13168  -0.15732
              -32.00   0.17332   0.13863   0.10298   0.06709   0.03220   0.00000  -0.02651  -0.05288  -0.07773  -0.09888  -0.11662
              -22.00   0.15119   0.11468   0.08019   0.04967   0.02447   0.00000  -0.02128  -0.03886  -0.05301  -0.06354  -0.07012
              -17.00   0.13472   0.09950   0.06852   0.04313   0.01987   0.00000  -0.01583  -0.02802  -0.03648  -0.04097  -0.04086
              -13.00   0.12075   0.08720   0.05883   0.03524   0.01534   0.00000  -0.01140  -0.01900  -0.02265  -0.02200  -0.01611
               -9.00   0.10541   0.07346   0.04736   0.02663   0.01106   0.00000  -0.00709  -0.01021  -0.00922  -0.00361   0.00774
               -5.00   0.08854   0.05880   0.03559   0.01867   0.00714   0.00000  -0.00309  -0.00210   0.00315   0.01334   0.02977
               -1.00   0.06917   0.04269   0.02334   0.01062   0.00314   0.00000   0.00098   0.00609   0.01556   0.03022   0.05131
                3.00   0.04607   0.02454   0.01035   0.00232  -0.00095   0.00000   0.00506   0.01427   0.02810   0.04763   0.07370
                7.00   0.02243   0.00650  -0.00253  -0.00603  -0.00508   0.00000   0.00914   0.02247   0.04067   0.06448   0.09421
               11.00  -0.00222  -0.01214  -0.01587  -0.01474  -0.00939   0.00000   0.01338   0.03113   0.05376   0.08088   0.11351
               15.00  -0.02781  -0.03158  -0.02997  -0.02400  -0.01396   0.00000   0.01800   0.04053   0.06612   0.09611   0.13096
               19.00  -0.05382  -0.05153  -0.04466  -0.03366  -0.01875   0.00000   0.02305   0.04875   0.07705   0.11048   0.14789
               23.00  -0.07911  -0.07132  -0.05933  -0.04337  -0.02372   0.00000   0.02674   0.05482   0.08800   0.12504   0.16428
               27.00  -0.10180  -0.08899  -0.07221  -0.05180  -0.02753   0.00000   0.02811   0.06099   0.09763   0.13602   0.17477
               32.00  -0.12238  -0.10406  -0.08220  -0.05654  -0.02842   0.00000   0.03321   0.06926   0.10624   0.14309   0.17899
               46.00  -0.16353  -0.13800  -0.10530  -0.07004  -0.03445   0.00000   0.03243   0.06267   0.09038   0.11519   0.13703
               70.00   0.08508  -0.00179  -0.04872  -0.03076  -0.01427   0.00000   0.01163   0.02025   0.02562   0.02756   0.02601
              120.00   0.05699   0.05153   0.04279   0.03104   0.01663   0.00000  -0.01834  -0.03783  -0.05789  -0.07790  -0.09726
              180.00   0.04206   0.02734   0.01540   0.00323   0.00050   0.00000   0.00050   0.00323   0.01540   0.02734   0.04206
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            </tableData>
          </table>
          </product>
        </function>
        <function name="aero/coefficient/CD_flap">
          <description>CD increment from flap (deg), over alpha</description>
          <product>
            <property>aero/qbar-psf</property>
            <property>metrics/Sw-sqft</property>
            <property>aero/function/mach-flap</property>
          <table>
            <independentVar lookup="row">aero/alpha-deg</independentVar>
            <independentVar lookup="column">fcs/flap-pos-deg</independentVar>
            <tableData>
                        -21.50    -20.00    -15.00    -10.00     -5.00      0.00      5.00     10.00     15.00     20.00     21.50
             -180.00   0.00762   0.00664   0.00380   0.00171   0.00043   0.00000   0.00043   0.00171   0.00380   0.00664   0.00762
             -120.00   0.00762   0.00664   0.00380   0.00171   0.00043   0.00000   0.00043   0.00171   0.00380   0.00664   0.00762
              -70.00   0.00762   0.00664   0.00380   0.00171   0.00043   0.00000   0.00043   0.00171   0.00380   0.00664   0.00762
              -46.00   0.05779   0.05559   0.04682   0.03457   0.01839   0.00000  -0.01835  -0.03417  -0.04512  -0.05128  -0.05245
              -32.00   0.06604   0.06313   0.05195   0.03743   0.01953   0.00000  -0.01925  -0.03579  -0.04716  -0.05350  -0.05468
              -22.00   0.06558   0.06206   0.04878   0.03266   0.01543   0.00000  -0.01291  -0.02324  -0.03014  -0.03364  -0.03418
              -17.00   0.06623   0.06271   0.04934   0.03287   0.01514   0.00000  -0.01105  -0.01831  -0.02222  -0.02347  -0.02347
              -13.00   0.05871   0.05557   0.04377   0.02933   0.01363   0.00000  -0.00971  -0.01552  -0.01801  -0.01809  -0.01777
               -9.00   0.04397   0.04140   0.03204   0.02107   0.00958   0.00000  -0.00635  -0.00930  -0.00924  -0.00699  -0.00601
               -5.00   0.02836   0.02636   0.01941   0.01197   0.00494   0.00000  -0.00193  -0.00087   0.00225   0.00646   0.00785
               -1.00   0.01595   0.01437   0.00924   0.00448   0.00099   0.00000   0.00195   0.00628   0.01168   0.01726   0.01896
                3.00   0.00335   0.00207  -0.00161  -0.00389  -0.00365   0.00000   0.00700   0.01610   0.02528   0.03358   0.03594
                7.00  -0.00916  -0.00999  -0.01192  -0.01174  -0.00800   0.00000   0.01163   0.02494   0.03727   0.04770   0.05055
               11.00  -0.01046  -0.01148  -0.01437  -0.01527  -0.01105   0.00000   0.01624   0.03426   0.05024   0.06309   0.06649
               15.00  -0.00637  -0.00721  -0.00994  -0.01222  -0.01063   0.00000   0.01908   0.04124   0.06074   0.07596   0.07990
               19.00  -0.00507  -0.00555  -0.00678  -0.00778  -0.00751   0.00000   0.01831   0.04237   0.06428   0.08127   0.08562
               23.00  -0.00842  -0.00849  -0.00792  -0.00641  -0.00476   0.00000   0.01423   0.03644   0.05836   0.07585   0.08035
               27.00  -0.01647  -0.01617  -0.01392  -0.00974  -0.00500   0.00000   0.01029   0.02827   0.04787   0.06429   0.06857
               32.00  -0.02486  -0.02432  -0.02093  -0.01474  -0.00702   0.00000   0.00786   0.02016   0.03491   0.04824   0.05184
               46.00  -0.02968  -0.02915  -0.02565  -0.01879  -0.00939   0.00000   0.00760   0.01313   0.01733   0.02086   0.02186
               70.00   0.00762   0.00664   0.00380   0.00171   0.00043   0.00000   0.00043   0.00171   0.00380   0.00664   0.00762
              120.00   0.00762   0.00664   0.00380   0.00171   0.00043   0.00000   0.00043   0.00171   0.00380   0.00664   0.00762
              180.00   0.00762   0.00664   0.00380   0.00171   0.00043   0.00000   0.00043   0.00171   0.00380   0.00664   0.00762
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            </tableData>
          </table>
          </product>
        </function>
        <function name="aero/coefficient/CD_rudder">
          <description>CD increment from rudder (deg), over alpha</description>
          <product>
            <property>aero/qbar-psf</property>
            <property>metrics/Sw-sqft</property>
            <property>aero/function/mach-rudder</property>
          <table>
            <independentVar lookup="row">aero/alpha-deg</independentVar>
            <independentVar lookup="column">fcs/rudder-pos-deg</independentVar>
            <tableData>
                        -30.00    -25.00    -20.00    -15.00    -10.00     -5.00      0.00      5.00     10.00     15.00     20.00     25.00     30.00
             -180.00   0.00576   0.00411   0.00269   0.00154   0.00069   0.00017   0.00000   0.00017   0.00069   0.00154   0.00269   0.00411   0.00576
             -120.00   0.00072   0.00051   0.00034   0.00019   0.00009   0.00002   0.00000   0.00002   0.00009   0.00019   0.00034   0.00051   0.00072
              -70.00   0.00025   0.00018   0.00012   0.00007   0.00003   0.00001   0.00000   0.00001   0.00003   0.00007   0.00012   0.00018   0.00024
              -46.00   0.00412   0.00325   0.00243   0.00162   0.00085   0.00023   0.00000   0.00023   0.00085   0.00162   0.00243   0.00325   0.00411
              -32.00   0.00812   0.00642   0.00481   0.00322   0.00166   0.00046   0.00000   0.00046   0.00166   0.00322   0.00481   0.00642   0.00812
              -22.00   0.01068   0.00844   0.00633   0.00424   0.00220   0.00060   0.00000   0.00060   0.00220   0.00424   0.00633   0.00844   0.01068
              -17.00   0.01163   0.00919   0.00688   0.00460   0.00239   0.00065   0.00000   0.00065   0.00239   0.00460   0.00688   0.00919   0.01163
              -13.00   0.01226   0.00968   0.00725   0.00484   0.00251   0.00069   0.00000   0.00069   0.00251   0.00484   0.00725   0.00968   0.01226
               -9.00   0.01271   0.01004   0.00751   0.00502   0.00260   0.00071   0.00000   0.00071   0.00260   0.00502   0.00751   0.01004   0.01271
               -5.00   0.01298   0.01025   0.00766   0.00512   0.00265   0.00073   0.00000   0.00073   0.00265   0.00512   0.00766   0.01025   0.01298
               -1.00   0.01305   0.01030   0.00770   0.00514   0.00266   0.00073   0.00000   0.00073   0.00266   0.00514   0.00770   0.01030   0.01305
                3.00   0.01292   0.01019   0.00761   0.00508   0.00263   0.00072   0.00000   0.00072   0.00263   0.00508   0.00761   0.01019   0.01292
                7.00   0.01259   0.00992   0.00741   0.00494   0.00255   0.00070   0.00000   0.00070   0.00255   0.00494   0.00741   0.00992   0.01259
               11.00   0.01208   0.00951   0.00709   0.00472   0.00244   0.00067   0.00000   0.00067   0.00244   0.00472   0.00709   0.00951   0.01208
               15.00   0.01140   0.00897   0.00668   0.00445   0.00230   0.00063   0.00000   0.00063   0.00230   0.00445   0.00668   0.00897   0.01140
               19.00   0.01058   0.00832   0.00619   0.00412   0.00212   0.00058   0.00000   0.00058   0.00212   0.00412   0.00619   0.00832   0.01058
               23.00   0.00965   0.00758   0.00564   0.00374   0.00193   0.00053   0.00000   0.00053   0.00193   0.00374   0.00564   0.00758   0.00966
               27.00   0.00865   0.00678   0.00503   0.00334   0.00172   0.00047   0.00000   0.00047   0.00172   0.00334   0.00503   0.00678   0.00865
               32.00   0.00742   0.00581   0.00431   0.00286   0.00147   0.00040   0.00000   0.00040   0.00147   0.00286   0.00431   0.00581   0.00742
               46.00   0.00460   0.00365   0.00275   0.00185   0.00097   0.00027   0.00000   0.00027   0.00097   0.00185   0.00275   0.00365   0.00460
               70.00   0.00025   0.00018   0.00012   0.00007   0.00003   0.00001   0.00000   0.00001   0.00003   0.00007   0.00012   0.00018   0.00024
              120.00   0.00072   0.00051   0.00034   0.00019   0.00009   0.00002   0.00000   0.00002   0.00009   0.00019   0.00034   0.00051   0.00072
              180.00   0.00576   0.00411   0.00269   0.00154   0.00069   0.00017   0.00000   0.00017   0.00069   0.00154   0.00269   0.00411   0.00576
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            </tableData>
          </table>
          </product>
        </function>
        <function name="aero/coefficient/CD_ground">
          <description>Induced drag change in ground effect</description>
          <product>
            <property>aero/qbar-psf</property>
            <property>metrics/Sw-sqft</property>
            <property>aero/cl-squared</property>
            <value>0.12483</value>
          <table>
            <independentVar lookup="row">aero/h_b-mac-ft</independentVar>
            <tableData>
                    0.00   -1.00000
                    0.10   -0.28090
                    0.15   -0.14793
                    0.20   -0.08897
                    0.30   -0.04160
                    0.40   -0.02383
                    0.50   -0.01538
                    0.60   -0.01073
                    0.70   -0.00791
                    0.80   -0.00607
                    0.90   -0.00480
                    1.00   -0.00389
                    1.10   -0.00322
            </tableData>
          </table>
          </product>
        </function>
        <function name="aero/coefficient/CD_speed_brakes">
          <description>speed brakes: drag of its airbrake plates, 1.44 m2 opened to 60 deg (hangar)</description>
          <product>
            <property>aero/qbar-psf</property>
            <property>metrics/Sw-sqft</property>
            <value>0.0621723</value>
            <pow>
              <sin>
                <product>
                  <property>fcs/speedbrake-pos-norm</property>
                  <value>1.0472</value>
                </product>
              </sin>
              <value>2</value>
            </pow>
          </product>
        </function>
        <function name="aero/coefficient/CD_gear">
          <description>the gear extended: its wheels' and struts' drag by Raymer's components, 0.241 m2 (hangar)</description>
          <product>
            <property>aero/qbar-psf</property>
            <property>metrics/Sw-sqft</property>
            <value>0.0086462</value>
            <property>gear/gear-pos-norm</property>
          </product>
        </function>
      </axis>
      <axis name="SIDE">
        <function name="aero/coefficient/CY_base">
          <description>CY over alpha and beta (hangar)</description>
          <product>
            <property>aero/qbar-psf</property>
            <property>metrics/Sw-sqft</property>
            <property>aero/function/mach-side</property>
          <table>
            <independentVar lookup="row">aero/alpha-deg</independentVar>
            <independentVar lookup="column">aero/beta-deg</independentVar>
            <tableData>
                        -90.00    -70.00    -50.00    -40.00    -30.00    -25.00    -20.00    -15.00    -10.00     -6.00     -3.00      0.00      3.00      6.00     10.00     15.00     20.00     25.00     30.00     40.00     50.00     70.00     90.00
             -180.00  -0.00000   0.11669   0.16767   0.17353   0.14852   0.12723   0.10308   0.07741   0.10669   0.12125   0.06481  -0.00000  -0.06481  -0.12125  -0.10669  -0.07741  -0.10308  -0.12723  -0.14852  -0.17353  -0.16767  -0.11669   0.00000
             -120.00   0.00000  -0.07154  -0.32582  -0.42022  -0.43922  -0.41397  -0.36530  -0.29365  -0.21034  -0.12428  -0.04716  -0.00000   0.04716   0.12428   0.21034   0.29365   0.36530   0.41397   0.43922   0.42022   0.32582   0.07154  -0.00000
              -70.00   0.00000  -0.10740  -0.41943  -0.53160  -0.55054  -0.51728  -0.45506  -0.36647  -0.25673  -0.15438  -0.06342  -0.00000   0.06342   0.15438   0.25673   0.36647   0.45506   0.51728   0.55054   0.53160   0.41943   0.10740  -0.00000
              -46.00   0.00000  -0.17473  -0.34233  -0.40985  -0.43094  -0.40534  -0.35326  -0.27286  -0.13933  -0.08517  -0.04529  -0.00000   0.04529   0.08517   0.13933   0.27286   0.35326   0.40534   0.43094   0.40985   0.34233   0.17473  -0.00000
              -32.00   0.00000  -0.09763  -0.11456  -0.15613  -0.17420  -0.16258  -0.13565  -0.04760  -0.03728  -0.02262  -0.01217  -0.00000   0.01217   0.02262   0.03728   0.04760   0.13565   0.16258   0.17420   0.15613   0.11456   0.09763  -0.00000
              -22.00   0.00000   0.01736   0.05629   0.02602   0.02006   0.02071   0.09229   0.07179   0.04784   0.02859   0.01423  -0.00000  -0.01423  -0.02859  -0.04784  -0.07179  -0.09229  -0.02071  -0.02006  -0.02602  -0.05629  -0.01736  -0.00000
              -17.00   0.00000   0.07238   0.12308   0.09639   0.09267   0.09035   0.15018   0.11597   0.07831   0.04715   0.02356  -0.00000  -0.02356  -0.04715  -0.07831  -0.11597  -0.15018  -0.09035  -0.09267  -0.09639  -0.12308  -0.07238  -0.00000
              -13.00   0.00000   0.10751   0.15996   0.14054   0.13180   0.12882   0.18017   0.13946   0.09455   0.05704   0.02853  -0.00000  -0.02853  -0.05704  -0.09455  -0.13946  -0.18017  -0.12882  -0.13180  -0.14054  -0.15996  -0.10751  -0.00000
               -9.00   0.00000   0.13203   0.18231   0.16679   0.15692   0.15091   0.19679   0.15248   0.10349   0.06246   0.03124  -0.00000  -0.03124  -0.06246  -0.10349  -0.15248  -0.19679  -0.15091  -0.15692  -0.16679  -0.18231  -0.13203  -0.00000
               -5.00   0.00000   0.14369   0.19281   0.17877   0.17028   0.16317   0.20292   0.15722   0.10668   0.06433   0.03214  -0.00000  -0.03214  -0.06433  -0.10668  -0.15722  -0.20292  -0.16317  -0.17028  -0.17877  -0.19281  -0.14369  -0.00000
               -1.00   0.00000   0.14650   0.19477   0.18079   0.17295   0.19943   0.20155   0.15607   0.10584   0.06375   0.03180  -0.00000  -0.03180  -0.06375  -0.10584  -0.15607  -0.20155  -0.19943  -0.17295  -0.18079  -0.19477  -0.14650  -0.00000
                3.00   0.00000   0.14492   0.18971   0.17394   0.16560   0.19165   0.19211   0.14863   0.10074   0.06068   0.03029  -0.00000  -0.03029  -0.06068  -0.10074  -0.14863  -0.19211  -0.19165  -0.16560  -0.17394  -0.18971  -0.14492  -0.00000
                7.00   0.00000   0.13640   0.17691   0.15783   0.14787   0.17388   0.17546   0.13555   0.09181   0.05532   0.02763  -0.00000  -0.02763  -0.05532  -0.09181  -0.13555  -0.17546  -0.17388  -0.14787  -0.15783  -0.17691  -0.13640  -0.00000
               11.00   0.00000   0.11608   0.15283   0.12395   0.11384   0.14503   0.14931   0.11496   0.07768   0.04676   0.02335  -0.00000  -0.02335  -0.04676  -0.07768  -0.11496  -0.14931  -0.14503  -0.11384  -0.12395  -0.15283  -0.11608  -0.00000
               15.00   0.00000   0.08338   0.11523   0.08719   0.07603   0.13071   0.11034   0.08418   0.05646   0.03383   0.01685  -0.00000  -0.01685  -0.03383  -0.05646  -0.08418  -0.11034  -0.13071  -0.07603  -0.08719  -0.11523  -0.08338  -0.00000
               19.00   0.00000   0.04161   0.07179   0.03782   0.02366   0.07536   0.06187   0.04567   0.02976   0.01751   0.00863  -0.00000  -0.00863  -0.01751  -0.02976  -0.04567  -0.06187  -0.07536  -0.02366  -0.03782  -0.07179  -0.04161  -0.00000
               23.00   0.00000  -0.00593   0.01856  -0.02224  -0.04217  -0.01448   0.00200  -0.00200  -0.00336  -0.00278  -0.00159  -0.00000   0.00159   0.00278   0.00336   0.00200  -0.00200   0.01448   0.04217   0.02224  -0.01856   0.00593  -0.00000
               27.00   0.00000  -0.05279  -0.04361  -0.09115  -0.12005  -0.11321  -0.06402  -0.05694  -0.04145  -0.02607  -0.01332  -0.00000   0.01332   0.02607   0.04145   0.05694   0.06402   0.11321   0.12005   0.09115   0.04361   0.05279  -0.00000
               32.00   0.00000  -0.10856  -0.13158  -0.18716  -0.21800  -0.20815  -0.14017  -0.12353  -0.08970  -0.05603  -0.02844  -0.00000   0.02844   0.05603   0.08970   0.12353   0.14017   0.20815   0.21800   0.18716   0.13158   0.10856  -0.00000
               46.00   0.00000  -0.17798  -0.37464  -0.44980  -0.47680  -0.44880  -0.38909  -0.28671  -0.19619  -0.12586  -0.06084  -0.00000   0.06084   0.12586   0.19619   0.28671   0.38909   0.44880   0.47680   0.44980   0.37464   0.17798  -0.00000
               70.00   0.00000  -0.10722  -0.41943  -0.53161  -0.55055  -0.51730  -0.45510  -0.36647  -0.25679  -0.15440  -0.06343  -0.00000   0.06343   0.15440   0.25679   0.36647   0.45510   0.51730   0.55055   0.53161   0.41943   0.10722  -0.00000
              120.00   0.00000  -0.07154  -0.32582  -0.42022  -0.43922  -0.41397  -0.36530  -0.29365  -0.21034  -0.12428  -0.04716  -0.00000   0.04716   0.12428   0.21034   0.29365   0.36530   0.41397   0.43922   0.42022   0.32582   0.07154  -0.00000
              180.00  -0.00000   0.11669   0.16767   0.17353   0.14852   0.12723   0.10308   0.07741   0.10669   0.12125   0.06481  -0.00000  -0.06481  -0.12125  -0.10669  -0.07741  -0.10308  -0.12723  -0.14852  -0.17353  -0.16767  -0.11669   0.00000
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            </tableData>
          </table>
          </product>
        </function>
        <function name="aero/coefficient/CY_aileron">
          <description>CY increment from aileron (deg), over alpha</description>
          <product>
            <property>aero/qbar-psf</property>
            <property>metrics/Sw-sqft</property>
            <property>aero/function/mach-aileron</property>
          <table>
            <independentVar lookup="row">aero/alpha-deg</independentVar>
            <independentVar lookup="column">fcs/left-aileron-pos-deg</independentVar>
            <tableData>
                        -21.50    -20.00    -15.00    -10.00     -5.00      0.00      5.00     10.00     15.00     20.00     21.50
             -180.00  -0.01554  -0.01464  -0.01125  -0.00756  -0.00379   0.00000   0.00379   0.00756   0.01125   0.01464   0.01554
              -35.00   0.01632   0.01547   0.01232   0.00866   0.00450   0.00000  -0.00450  -0.00866  -0.01232  -0.01547  -0.01632
              -11.00   0.01043   0.00974   0.00740   0.00499   0.00251   0.00000  -0.00251  -0.00499  -0.00740  -0.00974  -0.01043
                4.00   0.01296   0.01215   0.00937   0.00641   0.00327   0.00000  -0.00327  -0.00641  -0.00937  -0.01215  -0.01296
               19.00   0.01663   0.01562   0.01210   0.00829   0.00419   0.00000  -0.00419  -0.00829  -0.01210  -0.01562  -0.01663
               42.00  -0.00941  -0.00914  -0.00790  -0.00591  -0.00316   0.00000   0.00316   0.00591   0.00790   0.00914   0.00941
              180.00  -0.01554  -0.01464  -0.01125  -0.00756  -0.00379   0.00000   0.00379   0.00756   0.01125   0.01464   0.01554
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            </tableData>
          </table>
          </product>
        </function>
        <function name="aero/coefficient/CY_rudder">
          <description>CY increment from rudder (deg), over alpha</description>
          <product>
            <property>aero/qbar-psf</property>
            <property>metrics/Sw-sqft</property>
            <property>aero/function/mach-rudder</property>
          <table>
            <independentVar lookup="row">aero/alpha-deg</independentVar>
            <independentVar lookup="column">fcs/rudder-pos-deg</independentVar>
            <tableData>
                        -30.00    -25.00    -20.00    -15.00    -10.00     -5.00      0.00      5.00     10.00     15.00     20.00     25.00     30.00
             -180.00   0.00000   0.00000   0.00000   0.00000   0.00000   0.00000   0.00000   0.00000   0.00000   0.00000   0.00000   0.00000   0.00000
              -35.00  -0.06801  -0.06279  -0.05664  -0.04813  -0.03556  -0.01887   0.00000   0.01887   0.03556   0.04813   0.05664   0.06279   0.06801
              -11.00  -0.07401  -0.06826  -0.06149  -0.05219  -0.03864  -0.02054   0.00000   0.02054   0.03864   0.05219   0.06149   0.06826   0.07401
                4.00  -0.06855  -0.06326  -0.05701  -0.04840  -0.03585  -0.01906   0.00000   0.01906   0.03585   0.04841   0.05701   0.06326   0.06855
               19.00  -0.05420  -0.05008  -0.04520  -0.03843  -0.02849  -0.01516   0.00000   0.01516   0.02849   0.03843   0.04520   0.05008   0.05420
               42.00  -0.04756  -0.04448  -0.04065  -0.03492  -0.02595  -0.01367   0.00000   0.01367   0.02595   0.03492   0.04065   0.04448   0.04756
              180.00   0.00000   0.00000   0.00000   0.00000   0.00000   0.00000   0.00000   0.00000   0.00000   0.00000   0.00000   0.00000   0.00000
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            </tableData>
          </table>
          </product>
        </function>
        <function name="aero/coefficient/CYp">
          <description>CY per p (non-dimensional), over alpha</description>
          <product>
            <property>aero/qbar-psf</property>
            <property>metrics/Sw-sqft</property>
            <property>aero/bi2vel</property>
            <property>velocities/p-aero-rad_sec</property>
            <property>aero/function/mach-lift</property>
          <table>
            <independentVar lookup="row">aero/alpha-deg</independentVar>
            <tableData>
                 -180.00   -0.20343
                 -165.00   -0.26739
                  -32.00   -0.06909
                  -10.00   -0.06646
                    5.00   -0.04451
                   20.00   -0.05755
                   46.00   -0.15622
                  180.00   -0.20343
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            </tableData>
          </table>
          </product>
        </function>
        <function name="aero/coefficient/CYr">
          <description>CY per r (non-dimensional), over alpha</description>
          <product>
            <property>aero/qbar-psf</property>
            <property>metrics/Sw-sqft</property>
            <property>aero/bi2vel</property>
            <property>velocities/r-aero-rad_sec</property>
            <property>aero/function/mach-lift</property>
          <table>
            <independentVar lookup="row">aero/alpha-deg</independentVar>
            <tableData>
                 -180.00    1.12940
                 -165.00    1.01733
                  -32.00    0.60458
                  -10.00    0.59175
                    5.00    0.52769
                   20.00    0.39570
                   46.00    0.42558
                  180.00    1.12940
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            </tableData>
          </table>
          </product>
        </function>
      </axis>
      <axis name="LIFT">
        <function name="aero/coefficient/CL_base">
          <description>CL over alpha and beta, ground effect, compressibility (hangar)</description>
          <product>
            <property>aero/qbar-psf</property>
            <property>metrics/Sw-sqft</property>
            <property>aero/function/CL-base</property>
            <property>aero/function/mach-lift</property>
          <table>
            <independentVar lookup="row">aero/h_b-mac-ft</independentVar>
            <tableData>
                    0.00    1.20000
                    0.10    1.08692
                    0.20    1.03778
                    0.40    1.00713
                    0.60    1.00135
                    0.80    1.00025
                    1.00    1.00005
                    1.10    1.00000
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            </tableData>
          </table>
          </product>
        </function>
        <function name="aero/coefficient/CL_elevator">
          <description>CL increment from elevator (deg), over alpha</description>
          <product>
            <property>aero/qbar-psf</property>
            <property>metrics/Sw-sqft</property>
            <property>aero/function/mach-elevator</property>
          <table>
            <independentVar lookup="row">aero/alpha-deg</independentVar>
            <independentVar lookup="column">fcs/elevator-pos-deg</independentVar>
            <tableData>
                        -25.00    -20.00    -15.00    -10.00     -5.00      0.00      5.00     10.00     15.00     20.00     25.00
             -180.00  -0.09053  -0.07596  -0.05909  -0.08273  -0.08302   0.00000   0.08302   0.08273   0.05909   0.07596   0.09053
              -35.00  -0.05171  -0.05268  -0.04832  -0.03822  -0.02215   0.00000   0.02735   0.05390   0.09460   0.14464   0.19912
              -11.00  -0.25718  -0.21678  -0.17083  -0.11868  -0.06072   0.00000   0.06260   0.12653   0.19131   0.25637   0.32077
                4.00  -0.32408  -0.26283  -0.19847  -0.13259  -0.06623   0.00000   0.06552   0.12979   0.19209   0.25118   0.30558
               19.00  -0.32481  -0.25607  -0.18868  -0.12356  -0.06041   0.00000   0.05668   0.10434   0.14372   0.17846   0.20738
               42.00  -0.12668  -0.08648  -0.06284  -0.03761  -0.01585   0.00000   0.00989   0.01407   0.01307   0.00736  -0.00258
              180.00  -0.09053  -0.07596  -0.05909  -0.08273  -0.08302   0.00000   0.08302   0.08273   0.05909   0.07596   0.09053
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            </tableData>
          </table>
          </product>
        </function>
        <function name="aero/coefficient/CL_flap">
          <description>CL increment from flap (deg), over alpha</description>
          <product>
            <property>aero/qbar-psf</property>
            <property>metrics/Sw-sqft</property>
            <property>aero/function/mach-flap</property>
          <table>
            <independentVar lookup="row">aero/alpha-deg</independentVar>
            <independentVar lookup="column">fcs/flap-pos-deg</independentVar>
            <tableData>
                        -21.50    -20.00    -15.00    -10.00     -5.00      0.00      5.00     10.00     15.00     20.00     21.50
             -180.00   0.00000   0.00000   0.00000   0.00000   0.00000   0.00000   0.00000   0.00000   0.00000   0.00000   0.00000
              -35.00  -0.13047  -0.12649  -0.10880  -0.08129  -0.04338   0.00000   0.04312   0.08052   0.10791   0.12617   0.13044
              -11.00  -0.14263  -0.13833  -0.11923  -0.08950  -0.04811   0.00000   0.04873   0.09168   0.12321   0.14395   0.14871
                4.00  -0.16389  -0.15844  -0.13512  -0.10034  -0.05337   0.00000   0.05312   0.09942   0.13333   0.15575   0.16091
               19.00  -0.16875  -0.16332  -0.13965  -0.10340  -0.05407   0.00000   0.05037   0.09161   0.12028   0.13822   0.14219
               42.00  -0.11964  -0.11615  -0.10074  -0.07651  -0.04182   0.00000   0.04377   0.08238   0.10919   0.12501   0.12831
              180.00  -0.00000  -0.00000  -0.00000   0.00000   0.00000   0.00000   0.00000   0.00000  -0.00000  -0.00000  -0.00000
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            </tableData>
          </table>
          <table>
            <independentVar lookup="row">aero/h_b-mac-ft</independentVar>
            <tableData>
                    0.00    1.20000
                    0.10    1.08692
                    0.20    1.03778
                    0.40    1.00713
                    0.60    1.00135
                    0.80    1.00025
                    1.00    1.00005
                    1.10    1.00000
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            </tableData>
          </table>
          </product>
        </function>
        <function name="aero/coefficient/CLq">
          <description>CL per q (non-dimensional), over alpha</description>
          <product>
            <property>aero/qbar-psf</property>
            <property>metrics/Sw-sqft</property>
            <property>aero/ci2vel</property>
            <property>velocities/q-aero-rad_sec</property>
            <property>aero/function/mach-lift</property>
          <table>
            <independentVar lookup="row">aero/alpha-deg</independentVar>
            <tableData>
                 -180.00   -0.87566
                 -165.00   -0.13773
                  -32.00    4.29201
                  -10.00    5.95968
                    5.00    6.31131
                   20.00    5.88550
                   46.00    3.34280
                  180.00   -0.87566
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            </tableData>
          </table>
          </product>
        </function>
        <function name="aero/coefficient/CLadot">
          <description>CL per alpha-dot (downwash lag at the tail)</description>
          <product>
            <property>aero/qbar-psf</property>
            <property>metrics/Sw-sqft</property>
            <property>aero/ci2vel</property>
            <property>aero/alphadot-rad_sec</property>
            <value>0.52450</value>
            <property>aero/function/mach-lift</property>
          </product>
        </function>
      </axis>
      <axis name="ROLL">
        <function name="aero/coefficient/Cl_base">
          <description>Cl over alpha and beta (hangar)</description>
          <product>
            <property>aero/qbar-psf</property>
            <property>metrics/Sw-sqft</property>
            <property>metrics/bw-ft</property>
            <property>aero/function/mach-side</property>
          <table>
            <independentVar lookup="row">aero/alpha-deg</independentVar>
            <independentVar lookup="column">aero/beta-deg</independentVar>
            <tableData>
                        -90.00    -70.00    -50.00    -40.00    -30.00    -25.00    -20.00    -15.00    -10.00     -6.00     -3.00      0.00      3.00      6.00     10.00     15.00     20.00     25.00     30.00     40.00     50.00     70.00     90.00
             -180.00   0.03405   0.03058   0.02087   0.00817   0.00013  -0.00125  -0.00177  -0.00176   0.00393   0.00944   0.00531  -0.00000  -0.00531  -0.00944  -0.00393   0.00176   0.00177   0.00125  -0.00013  -0.00817  -0.02087  -0.03058  -0.03405
              -35.00   0.03405   0.03519   0.01916   0.01528   0.00338  -0.00373  -0.00831  -0.00182  -0.00129  -0.00149  -0.00068  -0.00000   0.00068   0.00149   0.00129   0.00182   0.00831   0.00373  -0.00338  -0.01528  -0.01916  -0.03519  -0.03405
              -11.00   0.03405   0.01789   0.01164  -0.00461  -0.02569  -0.02853  -0.01326  -0.01034  -0.00713  -0.00435  -0.00219  -0.00000   0.00219   0.00435   0.00713   0.01034   0.01326   0.02853   0.02569   0.00461  -0.01164  -0.01789  -0.03405
                4.00   0.03405   0.01601   0.01362   0.01695   0.02637   0.03446   0.03482   0.02701   0.01841   0.01117   0.00561  -0.00000  -0.00561  -0.01117  -0.01841  -0.02701  -0.03482  -0.03446  -0.02637  -0.01695  -0.01362  -0.01601  -0.03405
               19.00   0.03405   0.01134   0.01629   0.03361   0.07884   0.09613   0.08568   0.06663   0.04554   0.02767   0.01391  -0.00000  -0.01391  -0.02767  -0.04554  -0.06663  -0.08568  -0.09613  -0.07884  -0.03361  -0.01629  -0.01134  -0.03405
               42.00   0.03405   0.02023   0.00637  -0.00129  -0.00847  -0.01095  -0.01223  -0.00260  -0.00175  -0.00000   0.00067  -0.00000  -0.00067   0.00000   0.00175   0.00260   0.01223   0.01095   0.00847   0.00129  -0.00637  -0.02023  -0.03405
              180.00   0.03405   0.03058   0.02087   0.00817   0.00013  -0.00125  -0.00177  -0.00176   0.00393   0.00944   0.00531  -0.00000  -0.00531  -0.00944  -0.00393   0.00176   0.00177   0.00125  -0.00013  -0.00817  -0.02087  -0.03058  -0.03405
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            </tableData>
          </table>
          </product>
        </function>
        <function name="aero/coefficient/Cl_aileron">
          <description>Cl increment from aileron (deg), over alpha</description>
          <product>
            <property>aero/qbar-psf</property>
            <property>metrics/Sw-sqft</property>
            <property>metrics/bw-ft</property>
            <property>aero/function/mach-aileron</property>
          <table>
            <independentVar lookup="row">aero/alpha-deg</independentVar>
            <independentVar lookup="column">fcs/left-aileron-pos-deg</independentVar>
            <tableData>
                        -21.50    -20.00    -15.00    -10.00     -5.00      0.00      5.00     10.00     15.00     20.00     21.50
             -180.00   0.01765   0.01662   0.01277   0.00859   0.00431   0.00000  -0.00431  -0.00859  -0.01277  -0.01662  -0.01765
              -35.00  -0.02703  -0.02587  -0.02137  -0.01550  -0.00815   0.00000   0.00815   0.01550   0.02137   0.02587   0.02703
              -11.00  -0.02971  -0.02842  -0.02343  -0.01696  -0.00890   0.00000   0.00890   0.01696   0.02343   0.02842   0.02971
                4.00  -0.02824  -0.02699  -0.02221  -0.01605  -0.00842   0.00000   0.00842   0.01605   0.02221   0.02699   0.02824
               19.00  -0.02953  -0.02824  -0.02326  -0.01683  -0.00884   0.00000   0.00884   0.01683   0.02326   0.02824   0.02953
               42.00  -0.02365  -0.02265  -0.01877  -0.01364  -0.00717   0.00000   0.00717   0.01364   0.01877   0.02265   0.02365
              180.00   0.01765   0.01662   0.01277   0.00859   0.00431   0.00000  -0.00431  -0.00859  -0.01277  -0.01662  -0.01765
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            </tableData>
          </table>
          </product>
        </function>
        <function name="aero/coefficient/Cl_rudder">
          <description>Cl increment from rudder (deg), over alpha</description>
          <product>
            <property>aero/qbar-psf</property>
            <property>metrics/Sw-sqft</property>
            <property>metrics/bw-ft</property>
            <property>aero/function/mach-rudder</property>
          <table>
            <independentVar lookup="row">aero/alpha-deg</independentVar>
            <independentVar lookup="column">fcs/rudder-pos-deg</independentVar>
            <tableData>
                        -30.00    -25.00    -20.00    -15.00    -10.00     -5.00      0.00      5.00     10.00     15.00     20.00     25.00     30.00
             -180.00   0.00000   0.00000   0.00000   0.00000   0.00000   0.00000   0.00000   0.00000   0.00000   0.00000   0.00000   0.00000   0.00000
              -35.00  -0.00868  -0.00793  -0.00707  -0.00595  -0.00436  -0.00231   0.00000   0.00231   0.00436   0.00595   0.00707   0.00793   0.00868
              -11.00  -0.01131  -0.01032  -0.00919  -0.00771  -0.00566  -0.00300   0.00000   0.00300   0.00566   0.00771   0.00919   0.01032   0.01131
                4.00  -0.01190  -0.01086  -0.00968  -0.00813  -0.00597  -0.00316   0.00000   0.00316   0.00597   0.00813   0.00968   0.01086   0.01190
               19.00  -0.01052  -0.00961  -0.00856  -0.00719  -0.00528  -0.00280   0.00000   0.00280   0.00528   0.00719   0.00856   0.00961   0.01052
               42.00  -0.00867  -0.00803  -0.00727  -0.00619  -0.00457  -0.00242   0.00000   0.00242   0.00457   0.00619   0.00727   0.00803   0.00867
              180.00   0.00000   0.00000   0.00000   0.00000   0.00000   0.00000   0.00000   0.00000   0.00000   0.00000   0.00000   0.00000   0.00000
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            </tableData>
          </table>
          </product>
        </function>
        <function name="aero/coefficient/Clp">
          <description>Cl per p (non-dimensional), over alpha</description>
          <product>
            <property>aero/qbar-psf</property>
            <property>metrics/Sw-sqft</property>
            <property>metrics/bw-ft</property>
            <property>aero/bi2vel</property>
            <property>velocities/p-aero-rad_sec</property>
            <property>aero/function/mach-lift</property>
          <table>
            <independentVar lookup="row">aero/alpha-deg</independentVar>
            <tableData>
                 -180.00   -0.73825
                 -165.00   -0.23616
                  -32.00   -0.27131
                  -10.00   -0.28866
                    5.00   -0.27744
                   20.00   -0.27887
                   46.00   -0.14524
                  180.00   -0.73825
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            </tableData>
          </table>
          </product>
        </function>
        <function name="aero/coefficient/Clr">
          <description>Cl per r (non-dimensional), over alpha</description>
          <product>
            <property>aero/qbar-psf</property>
            <property>metrics/Sw-sqft</property>
            <property>metrics/bw-ft</property>
            <property>aero/bi2vel</property>
            <property>velocities/r-aero-rad_sec</property>
            <property>aero/function/mach-lift</property>
          <table>
            <independentVar lookup="row">aero/alpha-deg</independentVar>
            <tableData>
                 -180.00    0.11042
                 -165.00    0.17807
                  -32.00   -0.14729
                  -10.00    0.01266
                    5.00    0.12157
                   20.00    0.21948
                   46.00    0.54041
                  180.00    0.11042
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            </tableData>
          </table>
          </product>
        </function>
      </axis>
      <axis name="PITCH">
        <function name="aero/coefficient/Cm_base">
          <description>Cm over alpha and beta (hangar)</description>
          <product>
            <property>aero/qbar-psf</property>
            <property>metrics/Sw-sqft</property>
            <property>metrics/cbarw-ft</property>
          <table>
            <independentVar lookup="row">aero/alpha-deg</independentVar>
            <independentVar lookup="column">aero/beta-deg</independentVar>
            <tableData>
                        -90.00    -70.00    -50.00    -40.00    -30.00    -25.00    -20.00    -15.00    -10.00     -6.00     -3.00      0.00      3.00      6.00     10.00     15.00     20.00     25.00     30.00     40.00     50.00     70.00     90.00
             -180.00  -0.00000   0.00000  -0.00023  -0.00063  -0.00059  -0.00050  -0.00041  -0.00034   0.00351   0.00322   0.00053  -0.00046   0.00053   0.00322   0.00351  -0.00034  -0.00041  -0.00050  -0.00059  -0.00063  -0.00023   0.00000  -0.00000
              -35.00   0.00000  -0.11943  -0.01142  -0.02752  -0.04077  -0.05671  -0.07650  -0.09252  -0.09257  -0.08938  -0.08858  -0.08816  -0.08858  -0.08938  -0.09257  -0.09252  -0.07650  -0.05671  -0.04077  -0.02752  -0.01142  -0.11943   0.00000
              -11.00  -0.00000  -0.01458  -0.02161  -0.00826   0.00373  -0.00990  -0.02853  -0.03331  -0.03653  -0.03809  -0.03873  -0.03896  -0.03873  -0.03809  -0.03653  -0.03331  -0.02853  -0.00990   0.00373  -0.00826  -0.02161  -0.01458  -0.00000
                4.00   0.00000  -0.01850   0.00262   0.01124   0.01615   0.01224   0.00843   0.00667   0.00535   0.00457   0.00418   0.00401   0.00418   0.00457   0.00535   0.00667   0.00843   0.01224   0.01615   0.01124   0.00262  -0.01850   0.00000
               19.00  -0.00000  -0.01287  -0.01892   0.00354   0.01127   0.00980   0.00581   0.00533   0.00473   0.00433   0.00416   0.00410   0.00416   0.00433   0.00473   0.00533   0.00581   0.00980   0.01127   0.00354  -0.01892  -0.01287  -0.00000
               42.00  -0.00000   0.12759  -0.00171  -0.00641  -0.01277  -0.01541  -0.01476  -0.00862   0.01103   0.02579   0.03375   0.03727   0.03375   0.02579   0.01103  -0.00862  -0.01476  -0.01541  -0.01277  -0.00641  -0.00171   0.12759  -0.00000
              180.00  -0.00000   0.00000  -0.00023  -0.00063  -0.00059  -0.00050  -0.00041  -0.00034   0.00351   0.00322   0.00053  -0.00046   0.00053   0.00322   0.00351  -0.00034  -0.00041  -0.00050  -0.00059  -0.00063  -0.00023   0.00000  -0.00000
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            </tableData>
          </table>
          </product>
        </function>
        <function name="aero/coefficient/Cm_mach">
          <description>Cm from the neutral point's move with Mach</description>
          <product>
            <property>aero/qbar-psf</property>
            <property>metrics/Sw-sqft</property>
            <property>metrics/cbarw-ft</property>
            <property>aero/function/CL-base</property>
            <property>aero/function/mach-dCm-dCL</property>
          </product>
        </function>
        <function name="aero/coefficient/Cm_elevator">
          <description>Cm increment from elevator (deg), over alpha</description>
          <product>
            <property>aero/qbar-psf</property>
            <property>metrics/Sw-sqft</property>
            <property>metrics/cbarw-ft</property>
            <property>aero/function/mach-elevator</property>
          <table>
            <independentVar lookup="row">aero/alpha-deg</independentVar>
            <independentVar lookup="column">fcs/elevator-pos-deg</independentVar>
            <tableData>
                        -25.00    -20.00    -15.00    -10.00     -5.00      0.00      5.00     10.00     15.00     20.00     25.00
             -180.00  -0.13980  -0.11780  -0.09201  -0.12980  -0.13055   0.00000   0.13062   0.13024   0.09410   0.12150   0.14550
              -35.00   0.12255   0.11000   0.09144   0.06669   0.03596   0.00000  -0.03895  -0.07203  -0.11965  -0.17502  -0.23238
              -11.00   0.26736   0.22489   0.17706   0.12303   0.06269   0.00000  -0.06412  -0.12909  -0.19440  -0.25938  -0.32265
                4.00   0.31781   0.26041   0.19812   0.13309   0.06679   0.00000  -0.06667  -0.13266  -0.19724  -0.25909  -0.31645
               19.00   0.32497   0.25991   0.19416   0.12899   0.06401   0.00000  -0.06217  -0.11530  -0.16131  -0.20525  -0.24454
               42.00   0.19057   0.14449   0.11310   0.07469   0.03547   0.00000  -0.03034  -0.05498  -0.07394  -0.08736  -0.09556
              180.00  -0.13980  -0.11780  -0.09201  -0.12980  -0.13055   0.00000   0.13062   0.13024   0.09410   0.12150   0.14550
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            </tableData>
          </table>
          </product>
        </function>
        <function name="aero/coefficient/Cm_flap">
          <description>Cm increment from flap (deg), over alpha</description>
          <product>
            <property>aero/qbar-psf</property>
            <property>metrics/Sw-sqft</property>
            <property>metrics/cbarw-ft</property>
            <property>aero/function/mach-flap</property>
          <table>
            <independentVar lookup="row">aero/alpha-deg</independentVar>
            <independentVar lookup="column">fcs/flap-pos-deg</independentVar>
            <tableData>
                        -21.50    -20.00    -15.00    -10.00     -5.00      0.00      5.00     10.00     15.00     20.00     21.50
             -180.00   0.00000   0.00000   0.00000   0.00000   0.00000   0.00000   0.00000   0.00000   0.00000   0.00000   0.00000
              -35.00   0.01140   0.01078   0.00861   0.00617   0.00333   0.00000  -0.00376  -0.00759  -0.01111  -0.01415  -0.01498
              -11.00  -0.03942  -0.03792  -0.03185  -0.02336  -0.01232   0.00000   0.01212   0.02268   0.03068   0.03642   0.03784
                4.00  -0.02588  -0.02493  -0.02108  -0.01559  -0.00831   0.00000   0.00833   0.01568   0.02122   0.02511   0.02606
               19.00  -0.00198  -0.00216  -0.00256  -0.00240  -0.00149   0.00000   0.00170   0.00313   0.00387   0.00394   0.00387
               42.00   0.02611   0.02478   0.01983   0.01380   0.00692   0.00000  -0.00638  -0.01191  -0.01638  -0.01997  -0.02094
              180.00   0.00000   0.00000   0.00000   0.00000   0.00000   0.00000   0.00000   0.00000   0.00000   0.00000   0.00000
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            </tableData>
          </table>
          </product>
        </function>
        <function name="aero/coefficient/Cmq">
          <description>Cm per q (non-dimensional), over alpha</description>
          <product>
            <property>aero/qbar-psf</property>
            <property>metrics/Sw-sqft</property>
            <property>metrics/cbarw-ft</property>
            <property>aero/ci2vel</property>
            <property>velocities/q-aero-rad_sec</property>
            <property>aero/function/mach-lift</property>
          <table>
            <independentVar lookup="row">aero/alpha-deg</independentVar>
            <tableData>
                 -180.00   -9.52469
                 -165.00   -0.20861
                  -32.00   -4.38362
                  -10.00   -4.62882
                    5.00   -4.70230
                   20.00   -5.07265
                   46.00   -3.36219
                  180.00   -9.52469
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            </tableData>
          </table>
          </product>
        </function>
        <function name="aero/coefficient/Cmadot">
          <description>Cm per alpha-dot (downwash lag at the tail)</description>
          <product>
            <property>aero/qbar-psf</property>
            <property>metrics/Sw-sqft</property>
            <property>metrics/cbarw-ft</property>
            <property>aero/ci2vel</property>
            <property>aero/alphadot-rad_sec</property>
            <value>-0.62151</value>
            <property>aero/function/mach-lift</property>
          </product>
        </function>
        <function name="aero/coefficient/Cm_gear">
          <description>the gear's drag's pitching moment, -1.39 m from the reference point's height</description>
          <product>
            <property>aero/qbar-psf</property>
            <property>metrics/Sw-sqft</property>
            <property>metrics/cbarw-ft</property>
            <value>-0.00349021</value>
            <property>gear/gear-pos-norm</property>
          </product>
        </function>
      </axis>
      <axis name="YAW">
        <function name="aero/coefficient/Cn_base">
          <description>Cn over alpha and beta (hangar)</description>
          <product>
            <property>aero/qbar-psf</property>
            <property>metrics/Sw-sqft</property>
            <property>metrics/bw-ft</property>
            <property>aero/function/mach-side</property>
          <table>
            <independentVar lookup="row">aero/alpha-deg</independentVar>
            <independentVar lookup="column">aero/beta-deg</independentVar>
            <tableData>
                        -90.00    -70.00    -50.00    -40.00    -30.00    -25.00    -20.00    -15.00    -10.00     -6.00     -3.00      0.00      3.00      6.00     10.00     15.00     20.00     25.00     30.00     40.00     50.00     70.00     90.00
             -180.00  -0.10992  -0.12146  -0.11904  -0.11457  -0.09936  -0.08707  -0.07255  -0.05624  -0.06561  -0.06988  -0.03751  -0.00000   0.03751   0.06988   0.06561   0.05624   0.07255   0.08707   0.09936   0.11457   0.11904   0.12146   0.10992
              -35.00  -0.10992  -0.09172  -0.06251  -0.04376  -0.03068  -0.02774  -0.02687  -0.04231  -0.03776  -0.02341  -0.01162  -0.00000   0.01162   0.02341   0.03776   0.04231   0.02687   0.02774   0.03068   0.04376   0.06251   0.09172   0.10992
              -11.00  -0.10992  -0.09906  -0.05843  -0.03957  -0.03458  -0.03606  -0.06313  -0.04958  -0.03407  -0.02074  -0.01042  -0.00000   0.01042   0.02074   0.03407   0.04958   0.06313   0.03606   0.03458   0.03957   0.05843   0.09906   0.10992
                4.00  -0.10992  -0.09972  -0.05618  -0.03721  -0.03514  -0.05146  -0.05837  -0.04597  -0.03175  -0.01943  -0.00980  -0.00000   0.00980   0.01943   0.03175   0.04597   0.05837   0.05146   0.03514   0.03721   0.05618   0.09972   0.10992
               19.00  -0.10992  -0.10002  -0.05518  -0.03072  -0.02006  -0.04239  -0.03776  -0.02974  -0.02050  -0.01249  -0.00628  -0.00000   0.00628   0.01249   0.02050   0.02974   0.03776   0.04239   0.02006   0.03072   0.05518   0.10002   0.10992
               42.00  -0.10992  -0.09080  -0.06082  -0.04173  -0.02454  -0.01995  -0.01830  -0.03013  -0.02012  -0.01168  -0.00634  -0.00000   0.00634   0.01168   0.02012   0.03013   0.01830   0.01995   0.02454   0.04173   0.06082   0.09080   0.10992
              180.00  -0.10992  -0.12146  -0.11904  -0.11457  -0.09936  -0.08707  -0.07255  -0.05624  -0.06561  -0.06988  -0.03751  -0.00000   0.03751   0.06988   0.06561   0.05624   0.07255   0.08707   0.09936   0.11457   0.11904   0.12146   0.10992
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            </tableData>
          </table>
          </product>
        </function>
        <function name="aero/coefficient/Cn_aileron">
          <description>Cn increment from aileron (deg), over alpha</description>
          <product>
            <property>aero/qbar-psf</property>
            <property>metrics/Sw-sqft</property>
            <property>metrics/bw-ft</property>
            <property>aero/function/mach-aileron</property>
          <table>
            <independentVar lookup="row">aero/alpha-deg</independentVar>
            <independentVar lookup="column">fcs/left-aileron-pos-deg</independentVar>
            <tableData>
                        -21.50    -20.00    -15.00    -10.00     -5.00      0.00      5.00     10.00     15.00     20.00     21.50
             -180.00   0.00922   0.00869   0.00668   0.00449   0.00225   0.00000  -0.00225  -0.00449  -0.00668  -0.00869  -0.00922
              -35.00  -0.00458  -0.00416  -0.00281  -0.00166  -0.00076   0.00000   0.00076   0.00166   0.00281   0.00416   0.00458
              -11.00  -0.00646  -0.00604  -0.00461  -0.00310  -0.00154   0.00000   0.00154   0.00310   0.00461   0.00604   0.00646
                4.00  -0.00462  -0.00428  -0.00315  -0.00206  -0.00102   0.00000   0.00102   0.00206   0.00315   0.00428   0.00462
               19.00  -0.00949  -0.00908  -0.00759  -0.00570  -0.00310   0.00000   0.00310   0.00570   0.00759   0.00908   0.00949
               42.00  -0.00416  -0.00424  -0.00426  -0.00360  -0.00206   0.00000   0.00206   0.00360   0.00426   0.00424   0.00416
              180.00   0.00922   0.00869   0.00668   0.00449   0.00225   0.00000  -0.00225  -0.00449  -0.00668  -0.00869  -0.00922
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            </tableData>
          </table>
          </product>
        </function>
        <function name="aero/coefficient/Cn_rudder">
          <description>Cn increment from rudder (deg), over alpha</description>
          <product>
            <property>aero/qbar-psf</property>
            <property>metrics/Sw-sqft</property>
            <property>metrics/bw-ft</property>
            <property>aero/function/mach-rudder</property>
          <table>
            <independentVar lookup="row">aero/alpha-deg</independentVar>
            <independentVar lookup="column">fcs/rudder-pos-deg</independentVar>
            <tableData>
                        -30.00    -25.00    -20.00    -15.00    -10.00     -5.00      0.00      5.00     10.00     15.00     20.00     25.00     30.00
             -180.00  -0.00000  -0.00000  -0.00000  -0.00000  -0.00000  -0.00000   0.00000  -0.00000  -0.00000  -0.00000  -0.00000  -0.00000  -0.00000
              -35.00   0.03295   0.03037   0.02734   0.02320   0.01712   0.00909   0.00000  -0.00909  -0.01712  -0.02320  -0.02734  -0.03037  -0.03295
              -11.00   0.03861   0.03554   0.03195   0.02707   0.02001   0.01063   0.00000  -0.01063  -0.02001  -0.02707  -0.03195  -0.03554  -0.03861
                4.00   0.03765   0.03468   0.03120   0.02645   0.01956   0.01039   0.00000  -0.01039  -0.01956  -0.02645  -0.03120  -0.03468  -0.03765
               19.00   0.03195   0.02947   0.02654   0.02253   0.01667   0.00886   0.00000  -0.00886  -0.01667  -0.02253  -0.02654  -0.02947  -0.03195
               42.00   0.02706   0.02519   0.02292   0.01961   0.01453   0.00768   0.00000  -0.00768  -0.01453  -0.01961  -0.02292  -0.02519  -0.02706
              180.00  -0.00000  -0.00000  -0.00000  -0.00000  -0.00000  -0.00000   0.00000  -0.00000  -0.00000  -0.00000  -0.00000  -0.00000  -0.00000
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            </tableData>
          </table>
          </product>
        </function>
        <function name="aero/coefficient/Cnp">
          <description>Cn per p (non-dimensional), over alpha</description>
          <product>
            <property>aero/qbar-psf</property>
            <property>metrics/Sw-sqft</property>
            <property>metrics/bw-ft</property>
            <property>aero/bi2vel</property>
            <property>velocities/p-aero-rad_sec</property>
            <property>aero/function/mach-lift</property>
          <table>
            <independentVar lookup="row">aero/alpha-deg</independentVar>
            <tableData>
                 -180.00    0.13684
                 -165.00    0.17938
                  -32.00    0.04927
                  -10.00    0.07254
                    5.00    0.00104
                   20.00    0.00446
                   46.00    0.06476
                  180.00    0.13684
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            </tableData>
          </table>
          </product>
        </function>
        <function name="aero/coefficient/Cnr">
          <description>Cn per r (non-dimensional), over alpha</description>
          <product>
            <property>aero/qbar-psf</property>
            <property>metrics/Sw-sqft</property>
            <property>metrics/bw-ft</property>
            <property>aero/bi2vel</property>
            <property>velocities/r-aero-rad_sec</property>
            <property>aero/function/mach-lift</property>
          <table>
            <independentVar lookup="row">aero/alpha-deg</independentVar>
            <tableData>
                 -180.00   -0.54106
                 -165.00   -0.50632
                  -32.00   -0.35385
                  -10.00   -0.34553
                    5.00   -0.31630
                   20.00   -0.25127
                   46.00   -0.24488
                  180.00   -0.54106
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            </tableData>
          </table>
          </product>
        </function>
      </axis>
    </aerodynamics>
</fdm_config>
