<?xml version="1.0"?>
<!-- Generated by hangar: a turbofan of 125.0 kN dry, 191.0 kN with afterburner, bypass ratio 0.57.
     Thrust lapse: density lapse and ram gain, cut back past the throttle
     ratio 1.50 (Mattingly, Heiser & Pratt, Aircraft Engine Design, 2002). -->
<turbine_engine name="F135-PW-100">
  <milthrust> 28101.1 </milthrust>
  <maxthrust> 42938.5 </maxthrust>
  <bypassratio> 0.570 </bypassratio>
  <tsfc> 0.720 </tsfc>
  <atsfc> 1.900 </atsfc>
  <idlen1> 30.0 </idlen1>
  <idlen2> 60.0 </idlen2>
  <maxn1> 100.0 </maxn1>
  <maxn2> 100.0 </maxn2>
  <augmented> 1 </augmented>
  <augmethod> 2 </augmethod>
  <injected> 0 </injected>
  <function name="IdleThrust">
   <table>
    <independentVar lookup="row">velocities/mach</independentVar>
    <independentVar lookup="column">atmosphere/density-altitude</independentVar>
    <tableData>
            -10000         0     10000     20000     30000     36089     40000     50000     60000     70000
     0.00     0.0709    0.0500    0.0344    0.0230    0.0148    0.0112    0.0093    0.0057    0.0035    0.0022
     0.20     0.0482    0.0340    0.0234    0.0156    0.0101    0.0076    0.0063    0.0039    0.0024    0.0015
     0.40     0.0255    0.0180    0.0124    0.0083    0.0053    0.0040    0.0033    0.0021    0.0013    0.0008
     0.60     0.0028    0.0020    0.0014    0.0009    0.0006    0.0004    0.0004    0.0002    0.0001    0.0001
     0.80    -0.0199   -0.0140   -0.0096   -0.0064   -0.0042   -0.0031   -0.0026   -0.0016   -0.0010   -0.0006
     1.00    -0.0426   -0.0300   -0.0206   -0.0138   -0.0089   -0.0067   -0.0056   -0.0034   -0.0021   -0.0013
     1.20    -0.0652   -0.0460   -0.0316   -0.0211   -0.0137   -0.0103   -0.0085   -0.0053   -0.0033   -0.0020
     1.40    -0.0879   -0.0620   -0.0426   -0.0285   -0.0184   -0.0138   -0.0115   -0.0071   -0.0044   -0.0027
     1.60    -0.1106   -0.0780   -0.0536   -0.0358   -0.0232   -0.0174   -0.0144   -0.0089   -0.0055   -0.0034
     1.80    -0.1200   -0.0940   -0.0646   -0.0432   -0.0279   -0.0210   -0.0174   -0.0108   -0.0067   -0.0041
     2.00    -0.1200   -0.1100   -0.0756   -0.0505   -0.0327   -0.0246   -0.0204   -0.0126   -0.0078   -0.0048
     2.20    -0.1200   -0.1200   -0.0867   -0.0579   -0.0374   -0.0281   -0.0233   -0.0144   -0.0089   -0.0055
     2.40    -0.1200   -0.1200   -0.0977   -0.0653   -0.0422   -0.0317   -0.0263   -0.0163   -0.0101   -0.0062
     2.60    -0.1200   -0.1200   -0.1087   -0.0726   -0.0469   -0.0353   -0.0292   -0.0181   -0.0112   -0.0069
    </tableData>
   </table>
  </function>
  <function name="MilThrust">
   <table>
    <independentVar lookup="row">velocities/mach</independentVar>
    <independentVar lookup="column">atmosphere/density-altitude</independentVar>
    <tableData>
            -10000         0     10000     20000     30000     36089     40000     50000     60000     70000
     0.00     1.3271    1.0000    0.7385    0.5328    0.3741    0.2971    0.2462    0.1522    0.0941    0.0582
     0.20     1.3377    1.0080    0.7444    0.5371    0.3771    0.2995    0.2481    0.1534    0.0949    0.0587
     0.40     1.3696    1.0320    0.7621    0.5499    0.3861    0.3066    0.2540    0.1571    0.0971    0.0601
     0.60     1.4227    1.0720    0.7916    0.5712    0.4011    0.3185    0.2639    0.1632    0.1009    0.0624
     0.80     1.4970    1.1280    0.8330    0.6010    0.4220    0.3351    0.2777    0.1717    0.1062    0.0657
     1.00     1.5925    1.2000    0.8862    0.6394    0.4490    0.3565    0.2954    0.1827    0.1130    0.0699
     1.20     1.7093    1.2880    0.9512    0.6863    0.4819    0.3826    0.3171    0.1961    0.1212    0.0750
     1.40     1.8473    1.3920    1.0280    0.7417    0.5208    0.4135    0.3427    0.2119    0.1310    0.0810
     1.60     1.5746    1.4760    1.1166    0.8056    0.5657    0.4492    0.3722    0.2302    0.1423    0.0880
     1.80     1.2136    1.2040    1.1345    0.8781    0.6166    0.4896    0.4057    0.2509    0.1551    0.0959
     2.00     0.8102    0.9000    0.9100    0.8618    0.6734    0.5347    0.4431    0.2740    0.1694    0.1048
     2.20     0.3643    0.5640    0.6619    0.6828    0.6485    0.5846    0.4845    0.2996    0.1853    0.1146
     2.40     0.0000    0.1960    0.3901    0.4867    0.5108    0.4994    0.4138    0.2559    0.1583    0.0979
     2.60     0.0000    0.0000    0.0947    0.2736    0.3612    0.3806    0.3154    0.1950    0.1206    0.0746
    </tableData>
   </table>
  </function>
  <function name="AugThrust">
   <table>
    <independentVar lookup="row">velocities/mach</independentVar>
    <independentVar lookup="column">atmosphere/density-altitude</independentVar>
    <tableData>
            -10000         0     10000     20000     30000     36089     40000     50000     60000     70000
     0.00     1.2191    1.0000    0.8088    0.6436    0.5025    0.4276    0.3543    0.2191    0.1355    0.0838
     0.20     1.2288    1.0080    0.8153    0.6487    0.5065    0.4310    0.3571    0.2208    0.1366    0.0845
     0.40     1.2581    1.0320    0.8347    0.6642    0.5186    0.4413    0.3656    0.2261    0.1398    0.0865
     0.60     1.3069    1.0720    0.8670    0.6899    0.5387    0.4584    0.3798    0.2349    0.1452    0.0898
     0.80     1.3751    1.1280    0.9123    0.7260    0.5668    0.4823    0.3996    0.2471    0.1528    0.0945
     1.00     1.4629    1.2000    0.9705    0.7723    0.6030    0.5131    0.4252    0.2629    0.1626    0.1005
     1.20     1.5702    1.2880    1.0417    0.8289    0.6472    0.5507    0.4563    0.2822    0.1745    0.1079
     1.40     1.6970    1.3920    1.1258    0.8959    0.6994    0.5952    0.4932    0.3050    0.1886    0.1166
     1.60     1.5126    1.4820    1.2229    0.9731    0.7597    0.6465    0.5357    0.3313    0.2049    0.1267
     1.80     1.2639    1.2780    1.2576    1.0606    0.8281    0.7046    0.5839    0.3611    0.2233    0.1381
     2.00     0.9859    1.0500    1.0732    1.0605    0.9045    0.7696    0.6377    0.3944    0.2439    0.1508
     2.20     0.6787    0.7980    0.8693    0.8984    0.8906    0.8415    0.6973    0.4312    0.2666    0.1649
     2.40     0.3423    0.5220    0.6461    0.7207    0.7520    0.7523    0.6234    0.3855    0.2384    0.1474
     2.60     0.0000    0.2220    0.4035    0.5277    0.6012    0.6241    0.5171    0.3198    0.1978    0.1223
    </tableData>
   </table>
  </function>
</turbine_engine>
