<?xml version="1.0"?>
<?xml-stylesheet type="text/xsl" href="http://jsbsim.sourceforge.net/JSBSim.xsl"?>
<!-- Generated by hangar 0.1.0 from f35a.toml on 2026-10-01. Edit the design and rebuild; changes
     made here are overwritten.  -->
<fdm_config name="f35a" version="2.0" release="ALPHA"
            xmlns:xsi="http://www.w3.org/2001/XMLSchema-instance"
            xsi:noNamespaceSchemaLocation="http://jsbsim.sourceforge.net/JSBSim.xsd">
    <fileheader>
      <author>hangar</author>
      <filecreationdate>2026-10-01</filecreationdate>
      <version>0.1.0</version>
      <description>Lockheed Martin F-35A Lightning II (hangar build)</description>
      <note>Aerodynamics: vortex lattice with viscous section polars, full-envelope
        strip model, slender-body fuselage (hangar). Mass: Raymer component
        weights on the geometry. Propeller: blade-element momentum theory.</note>
      <reference refID="fsim/applicability/aerobatic" author="the design" title="USAF F-35A fact sheet: +9 g (fsim/envelope/clean/n_max)" date="n/a"/>
      <reference refID="fsim/applicability/carrier" author="the design" title="USAF F-35A fact sheet: the land-based variant (the F-35C is the carrier variant, with a launch bar and a carrier hook)" date="n/a"/>
      <reference refID="fsim/applicability/drag_devices" author="the design" title="Lockheed Martin F-35 data: no dedicated speed brake; the control surfaces deflect as one" date="n/a"/>
      <reference refID="fsim/applicability/flaps" author="the design" title="Lockheed Martin F-35 data: flaperons give the flap function" date="n/a"/>
      <reference refID="fsim/applicability/ground_contact" author="the design" title="USAF F-35A fact sheet: tricycle wheeled gear" date="n/a"/>
      <reference refID="fsim/applicability/releasable_stores" author="the design" title="USAF F-35A fact sheet: internal weapons bays and external stations" date="n/a"/>
      <reference refID="fsim/applicability/retractable_gear" author="the design" title="Lockheed Martin F-35 data: retractable gear" date="n/a"/>
      <reference refID="fsim/applicability/vertical_flight" author="the design" title="USAF F-35A fact sheet: the conventional take-off and landing variant (the lift fan is the F-35B's). Conventional take-off and landing: no rotors, lift fans or vectored lift to hover" date="n/a"/>
    </fileheader>
    <metrics>
      <wingarea unit="M2"> 42.9070 </wingarea>
      <wingspan unit="M"> 10.7000 </wingspan>
      <chord unit="M"> 4.5171 </chord>
      <htailarea unit="M2"> 15.5324 </htailarea>
      <htailarm unit="M"> 4.3113 </htailarm>
      <vtailarea unit="M2"> 7.7729 </vtailarea>
      <vtailarm unit="M"> 3.8360 </vtailarm>
      <location name="AERORP" unit="M">
        <x> 9.0700 </x>
        <y> 0.0000 </y>
        <z> 0.0000 </z>
      </location>
      <location name="EYEPOINT" unit="M">
        <x> 3.7000 </x>
        <y> 0.0000 </y>
        <z> 1.1500 </z>
      </location>
      <location name="VRP" unit="M">
        <x> 8.9550 </x>
        <y> 0.0000 </y>
        <z> -0.3000 </z>
      </location>
    </metrics>
    <mass_balance negated_crossproduct_inertia="false">
      <ixx unit="KG*M2"> 25714.57 </ixx>
      <iyy unit="KG*M2"> 131201.06 </iyy>
      <izz unit="KG*M2"> 156656.52 </izz>
      <ixy unit="KG*M2"> 0.220 </ixy>
      <ixz unit="KG*M2"> 5757.900 </ixz>
      <iyz unit="KG*M2"> 0.424 </iyz>
      <emptywt unit="KG"> 13290.00 </emptywt>
      <location name="CG" unit="M">
        <x> 8.9550 </x>
        <y> 0.0000 </y>
        <z> -0.3000 </z>
      </location>
      <pointmass name="pilot">
        <weight unit="KG"> 100.00 </weight>
        <location unit="M">
          <x> 3.7000 </x>
          <y> 0.0000 </y>
          <z> 0.4500 </z>
        </location>
      </pointmass>
      <pointmass name="internal missiles">
        <weight unit="KG"> 608.00 </weight>
        <location unit="M">
          <x> 8.9550 </x>
          <y> 0.0000 </y>
          <z> -0.8000 </z>
        </location>
      </pointmass>
      <pointmass name="gun ammunition">
        <weight unit="KG"> 90.00 </weight>
        <location unit="M">
          <x> 7.4550 </x>
          <y> -1.1000 </y>
          <z> 0.2000 </z>
        </location>
      </pointmass>
    </mass_balance>
    <ground_reactions>
      <contact type="BOGEY" name="Nose Gear">
        <location unit="M">
          <x> 4.0800 </x>
          <y> 0.0000 </y>
          <z> -2.1600 </z>
        </location>
        <static_friction> 0.8 </static_friction>
        <dynamic_friction> 0.5 </dynamic_friction>
        <rolling_friction> 0.02 </rolling_friction>
        <spring_coeff unit="N/M"> 274695 </spring_coeff>
        <damping_coeff unit="N/M/SEC"> 32821 </damping_coeff>
        <damping_coeff_rebound unit="N/M/SEC"> 65642 </damping_coeff_rebound>
        <max_steer unit="DEG"> 60.0 </max_steer>
        <brake_group> NONE </brake_group>
        <retractable> 1 </retractable>
      </contact>
      <contact type="BOGEY" name="Left Main Gear">
        <location unit="M">
          <x> 10.1000 </x>
          <y> -2.1700 </y>
          <z> -2.1900 </z>
        </location>
        <static_friction> 0.8 </static_friction>
        <dynamic_friction> 0.5 </dynamic_friction>
        <rolling_friction> 0.02 </rolling_friction>
        <spring_coeff unit="N/M"> 532052 </spring_coeff>
        <damping_coeff unit="N/M/SEC"> 70052 </damping_coeff>
        <damping_coeff_rebound unit="N/M/SEC"> 140103 </damping_coeff_rebound>
        <max_steer unit="DEG"> 0.0 </max_steer>
        <brake_group> LEFT </brake_group>
        <retractable> 1 </retractable>
      </contact>
      <contact type="BOGEY" name="Right Main Gear">
        <location unit="M">
          <x> 10.1000 </x>
          <y> 2.1700 </y>
          <z> -2.1900 </z>
        </location>
        <static_friction> 0.8 </static_friction>
        <dynamic_friction> 0.5 </dynamic_friction>
        <rolling_friction> 0.02 </rolling_friction>
        <spring_coeff unit="N/M"> 532052 </spring_coeff>
        <damping_coeff unit="N/M/SEC"> 70052 </damping_coeff>
        <damping_coeff_rebound unit="N/M/SEC"> 140103 </damping_coeff_rebound>
        <max_steer unit="DEG"> 0.0 </max_steer>
        <brake_group> RIGHT </brake_group>
        <retractable> 1 </retractable>
      </contact>
      <contact type="STRUCTURE" name="belly left bottom">
        <location unit="M">
          <x> 6.5000 </x>
          <y> -1.0511 </y>
          <z> -1.0716 </z>
        </location>
        <static_friction> 0.8 </static_friction>
        <dynamic_friction> 0.6 </dynamic_friction>
        <spring_coeff unit="N/M"> 4969315 </spring_coeff>
        <damping_coeff unit="N/M/SEC"> 165644 </damping_coeff>
        <damping_coeff_rebound unit="N/M/SEC"> 165644 </damping_coeff_rebound>
      </contact>
      <contact type="STRUCTURE" name="belly right bottom">
        <location unit="M">
          <x> 6.5000 </x>
          <y> 1.0511 </y>
          <z> -1.0716 </z>
        </location>
        <static_friction> 0.8 </static_friction>
        <dynamic_friction> 0.6 </dynamic_friction>
        <spring_coeff unit="N/M"> 4969336 </spring_coeff>
        <damping_coeff unit="N/M/SEC"> 165645 </damping_coeff>
        <damping_coeff_rebound unit="N/M/SEC"> 165645 </damping_coeff_rebound>
      </contact>
      <contact type="STRUCTURE" name="canopy front">
        <location unit="M">
          <x> 2.9000 </x>
          <y> 0.0000 </y>
          <z> 0.9941 </z>
        </location>
        <static_friction> 0.8 </static_friction>
        <dynamic_friction> 0.6 </dynamic_friction>
        <spring_coeff unit="N/M"> 2252969 </spring_coeff>
        <damping_coeff unit="N/M/SEC"> 75099 </damping_coeff>
        <damping_coeff_rebound unit="N/M/SEC"> 75099 </damping_coeff_rebound>
      </contact>
      <contact type="STRUCTURE" name="fin left rear">
        <location unit="M">
          <x> 14.7800 </x>
          <y> -2.2501 </y>
          <z> 2.3600 </z>
        </location>
        <static_friction> 0.8 </static_friction>
        <dynamic_friction> 0.6 </dynamic_friction>
        <spring_coeff unit="N/M"> 1203799 </spring_coeff>
        <damping_coeff unit="N/M/SEC"> 40127 </damping_coeff>
        <damping_coeff_rebound unit="N/M/SEC"> 40127 </damping_coeff_rebound>
      </contact>
      <contact type="STRUCTURE" name="fin right rear">
        <location unit="M">
          <x> 14.7800 </x>
          <y> 2.2501 </y>
          <z> 2.3600 </z>
        </location>
        <static_friction> 0.8 </static_friction>
        <dynamic_friction> 0.6 </dynamic_friction>
        <spring_coeff unit="N/M"> 1203808 </spring_coeff>
        <damping_coeff unit="N/M/SEC"> 40127 </damping_coeff>
        <damping_coeff_rebound unit="N/M/SEC"> 40127 </damping_coeff_rebound>
      </contact>
      <contact type="STRUCTURE" name="fuselage front">
        <location unit="M">
          <x> 0.0000 </x>
          <y> 0.0000 </y>
          <z> -0.2400 </z>
        </location>
        <static_friction> 0.8 </static_friction>
        <dynamic_friction> 0.6 </dynamic_friction>
        <spring_coeff unit="N/M"> 1311023 </spring_coeff>
        <damping_coeff unit="N/M/SEC"> 43701 </damping_coeff>
        <damping_coeff_rebound unit="N/M/SEC"> 43701 </damping_coeff_rebound>
      </contact>
      <contact type="STRUCTURE" name="fuselage front 2">
        <location unit="M">
          <x> 1.5000 </x>
          <y> -0.0000 </y>
          <z> -0.8400 </z>
        </location>
        <static_friction> 0.8 </static_friction>
        <dynamic_friction> 0.6 </dynamic_friction>
        <spring_coeff unit="N/M"> 1796160 </spring_coeff>
        <damping_coeff unit="N/M/SEC"> 59872 </damping_coeff>
        <damping_coeff_rebound unit="N/M/SEC"> 59872 </damping_coeff_rebound>
      </contact>
      <contact type="STRUCTURE" name="htail left rear">
        <location unit="M">
          <x> 15.0300 </x>
          <y> -3.6500 </y>
          <z> 0.1199 </z>
        </location>
        <static_friction> 0.8 </static_friction>
        <dynamic_friction> 0.6 </dynamic_friction>
        <spring_coeff unit="N/M"> 1020650 </spring_coeff>
        <damping_coeff unit="N/M/SEC"> 34022 </damping_coeff>
        <damping_coeff_rebound unit="N/M/SEC"> 34022 </damping_coeff_rebound>
      </contact>
      <contact type="STRUCTURE" name="htail left rear 2">
        <location unit="M">
          <x> 15.7100 </x>
          <y> -1.0000 </y>
          <z> -0.0203 </z>
        </location>
        <static_friction> 0.8 </static_friction>
        <dynamic_friction> 0.6 </dynamic_friction>
        <spring_coeff unit="N/M"> 1944231 </spring_coeff>
        <damping_coeff unit="N/M/SEC"> 64808 </damping_coeff>
        <damping_coeff_rebound unit="N/M/SEC"> 64808 </damping_coeff_rebound>
      </contact>
      <contact type="STRUCTURE" name="htail right rear">
        <location unit="M">
          <x> 15.7100 </x>
          <y> 1.0000 </y>
          <z> -0.0203 </z>
        </location>
        <static_friction> 0.8 </static_friction>
        <dynamic_friction> 0.6 </dynamic_friction>
        <spring_coeff unit="N/M"> 1944245 </spring_coeff>
        <damping_coeff unit="N/M/SEC"> 64808 </damping_coeff>
        <damping_coeff_rebound unit="N/M/SEC"> 64808 </damping_coeff_rebound>
      </contact>
      <contact type="STRUCTURE" name="htail right rear 2">
        <location unit="M">
          <x> 15.0300 </x>
          <y> 3.6500 </y>
          <z> 0.1199 </z>
        </location>
        <static_friction> 0.8 </static_friction>
        <dynamic_friction> 0.6 </dynamic_friction>
        <spring_coeff unit="N/M"> 1020663 </spring_coeff>
        <damping_coeff unit="N/M/SEC"> 34022 </damping_coeff>
        <damping_coeff_rebound unit="N/M/SEC"> 34022 </damping_coeff_rebound>
      </contact>
      <contact type="STRUCTURE" name="keel rear">
        <location unit="M">
          <x> 11.4000 </x>
          <y> 0.0000 </y>
          <z> -1.2608 </z>
        </location>
        <static_friction> 0.8 </static_friction>
        <dynamic_friction> 0.6 </dynamic_friction>
        <spring_coeff unit="N/M"> 5743906 </spring_coeff>
        <damping_coeff unit="N/M/SEC"> 191464 </damping_coeff>
        <damping_coeff_rebound unit="N/M/SEC"> 191464 </damping_coeff_rebound>
      </contact>
      <contact type="STRUCTURE" name="wing left rear">
        <location unit="M">
          <x> 10.0600 </x>
          <y> -5.3500 </y>
          <z> 0.0000 </z>
        </location>
        <static_friction> 0.8 </static_friction>
        <dynamic_friction> 0.6 </dynamic_friction>
        <spring_coeff unit="N/M"> 371481 </spring_coeff>
        <damping_coeff unit="N/M/SEC"> 12383 </damping_coeff>
        <damping_coeff_rebound unit="N/M/SEC"> 12383 </damping_coeff_rebound>
      </contact>
      <contact type="STRUCTURE" name="wing left rear 2">
        <location unit="M">
          <x> 11.6000 </x>
          <y> -5.3500 </y>
          <z> -0.0001 </z>
        </location>
        <static_friction> 0.8 </static_friction>
        <dynamic_friction> 0.6 </dynamic_friction>
        <spring_coeff unit="N/M"> 358724 </spring_coeff>
        <damping_coeff unit="N/M/SEC"> 11957 </damping_coeff>
        <damping_coeff_rebound unit="N/M/SEC"> 11957 </damping_coeff_rebound>
      </contact>
      <contact type="STRUCTURE" name="wing right rear">
        <location unit="M">
          <x> 10.0600 </x>
          <y> 5.3500 </y>
          <z> 0.0000 </z>
        </location>
        <static_friction> 0.8 </static_friction>
        <dynamic_friction> 0.6 </dynamic_friction>
        <spring_coeff unit="N/M"> 371483 </spring_coeff>
        <damping_coeff unit="N/M/SEC"> 12383 </damping_coeff>
        <damping_coeff_rebound unit="N/M/SEC"> 12383 </damping_coeff_rebound>
      </contact>
      <contact type="STRUCTURE" name="wing right rear 2">
        <location unit="M">
          <x> 11.6000 </x>
          <y> 5.3500 </y>
          <z> -0.0001 </z>
        </location>
        <static_friction> 0.8 </static_friction>
        <dynamic_friction> 0.6 </dynamic_friction>
        <spring_coeff unit="N/M"> 358727 </spring_coeff>
        <damping_coeff unit="N/M/SEC"> 11958 </damping_coeff>
        <damping_coeff_rebound unit="N/M/SEC"> 11958 </damping_coeff_rebound>
      </contact>
    </ground_reactions>
    <propulsion>
      <engine file="f35a_engine0">
        <location unit="M">
          <x> 11.4000 </x>
          <y> 0.0000 </y>
          <z> -0.1000 </z>
        </location>
        <feed>0</feed>
        <feed>1</feed>
        <feed>2</feed>
        <feed>3</feed>
        <feed>4</feed>
        <thruster file="f35a_nozzle0">
          <location unit="M">
            <x> 14.1000 </x>
            <y> 0.0000 </y>
            <z> -0.1000 </z>
          </location>
          <orient unit="DEG"> <roll>0.00</roll> <pitch>0.00</pitch> <yaw>0.00</yaw> </orient>

        </thruster>
      </engine>
      <tank type="FUEL">
        <location unit="M">
          <x> 7.8050 </x>
          <y> 0.0000 </y>
          <z> -0.2000 </z>
        </location>
        <capacity unit="KG"> 2800.00 </capacity>
        <contents unit="KG"> 2800.00 </contents>
      </tank>
      <tank type="FUEL">
        <location unit="M">
          <x> 9.8050 </x>
          <y> 0.0000 </y>
          <z> -0.2000 </z>
        </location>
        <capacity unit="KG"> 2700.00 </capacity>
        <contents unit="KG"> 2700.00 </contents>
      </tank>
      <tank type="FUEL">
        <location unit="M">
          <x> 11.3550 </x>
          <y> 0.0000 </y>
          <z> -0.2500 </z>
        </location>
        <capacity unit="KG"> 1400.00 </capacity>
        <contents unit="KG"> 1400.00 </contents>
      </tank>
      <tank type="FUEL">
        <location unit="M">
          <x> 9.1210 </x>
          <y> -2.5000 </y>
          <z> 0.0000 </z>
        </location>
        <capacity unit="KG"> 690.00 </capacity>
        <contents unit="KG"> 690.00 </contents>
      </tank>
      <tank type="FUEL">
        <location unit="M">
          <x> 9.1210 </x>
          <y> 2.5000 </y>
          <z> 0.0000 </z>
        </location>
        <capacity unit="KG"> 690.00 </capacity>
        <contents unit="KG"> 690.00 </contents>
      </tank>
    </propulsion>
    <flight_control name="f35a">
      <!-- the aircraft's profile for the platform (docs/control-architecture.md, section 7): what
           hangar knows of it - its design, its flight tests, its identified responses -->
      <property value="1">fsim/identity/version</property>
      <property value="1">fsim/identity/provenance</property>
      <property value="2">fsim/identity/class</property>
      <property value="2">fsim/identity/family</property>
      <property value="1">fsim/effectors/version</property>
      <property value="1">fsim/effectors/provenance</property>
      <property value="1">fsim/effectors/flaps</property>
      <property value="8">fsim/effectors/flaps_transit_s</property>
      <property value="1">fsim/effectors/neutral</property>
      <property value="1">fsim/effectors/pitch</property>
      <property value="0.0">fsim/effectors/pitch_trim</property>
      <property value="1">fsim/effectors/retractable_gear</property>
      <property value="1">fsim/effectors/roll</property>
      <property value="1">fsim/effectors/speedbrake</property>
      <property value="1">fsim/effectors/speedbrake_approach</property>
      <property value="1">fsim/effectors/wheel_brakes</property>
      <property value="0.0">fsim/effectors/yaw</property>
      <property value="1">fsim/envelope/version</property>
      <property value="1">fsim/envelope/provenance</property>
      <property value="20">fsim/envelope/clean/alpha_max_deg</property>
      <property value="75.8956">fsim/envelope/clean/cas_min_ms</property>
      <property value="9">fsim/envelope/clean/n_max</property>
      <property value="-3">fsim/envelope/clean/n_min</property>
      <property value="240">fsim/envelope/clean/roll_rate_max_deg_s</property>
      <property value="15.43">fsim/envelope/crosswind_max_ms</property>
      <property value="19.62">fsim/envelope/ground_pitch_max_deg</property>
      <property value="4.07">fsim/envelope/ground_turn_radius_m</property>
      <property value="0.3995">fsim/envelope/ground_yaw_accel_rad_s2</property>
      <property value="1">fsim/envelope/law_alpha</property>
      <property value="1">fsim/envelope/law_load_factor</property>
      <property value="1">fsim/envelope/law_roll_rate</property>
      <property value="1">fsim/propulsion/version</property>
      <property value="1">fsim/propulsion/provenance</property>
      <property value="1">fsim/propulsion/afterburner</property>
      <property value="1">fsim/propulsion/engines</property>
      <property value="0.189934">fsim/propulsion/spool_s</property>
      <property value="2">fsim/propulsion/type</property>
      <property value="1">fsim/plant/version</property>
      <property value="1">fsim/plant/provenance</property>
      <property value="-0.843233">fsim/plant/alpha_zero_lift_deg</property>
      <property value="3000">fsim/plant/altitude_m</property>
      <property value="157.108">fsim/plant/eas_ms</property>
      <property value="0.0">fsim/plant/elevator_trim</property>
      <property value="0.0">fsim/plant/elevator_trim_lift</property>
      <property value="9.34723">fsim/plant/pitch/gain</property>
      <property value="0.737082">fsim/plant/pitch/tau_s</property>
      <property value="4.12773">fsim/plant/roll/gain</property>
      <property value="0.19887">fsim/plant/roll/tau_s</property>
      <property value="5.32879">fsim/plant/speed/gain</property>
      <property value="0.189934">fsim/plant/speed/tau_s</property>
      <property value="179.245">fsim/plant/tas_ms</property>
      <property value="0.308447">fsim/plant/throttle_trim</property>
      <property value="0.101451">fsim/plant/yaw/gain</property>
      <property value="1">fsim/performance/version</property>
      <property value="1">fsim/performance/provenance</property>
      <property value="17533.4">fsim/performance/ceiling_m</property>
      <property value="228.289">fsim/performance/climb_ms</property>
      <property value="387.81">fsim/performance/max_tas_ms</property>
      <property value="1">fsim/applicability/version</property>
      <property value="1">fsim/applicability/provenance</property>
      <property value="1">fsim/applicability/aerobatic</property>
      <property value="1">fsim/applicability/carrier</property>
      <property value="3">fsim/applicability/drag_devices</property>
      <property value="1">fsim/applicability/flaps</property>
      <property value="1">fsim/applicability/ground_contact</property>
      <property value="2">fsim/applicability/releasable_stores</property>
      <property value="1">fsim/applicability/retractable_gear</property>
      <property value="0.0">fsim/applicability/vertical_flight</property>
      <property value="1">fsim/tables/version</property>
      <property value="1">fsim/tables/provenance</property>
      <property value="100">fsim/tables/altitude_m/h0</property>
      <property value="3510">fsim/tables/altitude_m/h1</property>
      <property value="7010">fsim/tables/altitude_m/h2</property>
      <property value="10520">fsim/tables/altitude_m/h3</property>
      <property value="12192">fsim/tables/altitude_m/h4</property>
      <property value="13150">fsim/tables/altitude_m/h5</property>
      <property value="14900">fsim/tables/altitude_m/h6</property>
      <property value="16660">fsim/tables/altitude_m/h7</property>
      <property value="0.618448">fsim/tables/best_endurance_fuel_kg_s/h0/w0</property>
      <property value="0.625656">fsim/tables/best_endurance_fuel_kg_s/h0/w1</property>
      <property value="0.614022">fsim/tables/best_endurance_fuel_kg_s/h0/w2</property>
      <property value="0.459695">fsim/tables/best_endurance_fuel_kg_s/h1/w0</property>
      <property value="0.501877">fsim/tables/best_endurance_fuel_kg_s/h1/w1</property>
      <property value="0.541553">fsim/tables/best_endurance_fuel_kg_s/h1/w2</property>
      <property value="0.366574">fsim/tables/best_endurance_fuel_kg_s/h2/w0</property>
      <property value="0.417496">fsim/tables/best_endurance_fuel_kg_s/h2/w1</property>
      <property value="0.474185">fsim/tables/best_endurance_fuel_kg_s/h2/w2</property>
      <property value="0.306867">fsim/tables/best_endurance_fuel_kg_s/h3/w0</property>
      <property value="0.358226">fsim/tables/best_endurance_fuel_kg_s/h3/w1</property>
      <property value="0.418449">fsim/tables/best_endurance_fuel_kg_s/h3/w2</property>
      <property value="0.288405">fsim/tables/best_endurance_fuel_kg_s/h4/w0</property>
      <property value="0.344927">fsim/tables/best_endurance_fuel_kg_s/h4/w1</property>
      <property value="0.423864">fsim/tables/best_endurance_fuel_kg_s/h4/w2</property>
      <property value="0.286116">fsim/tables/best_endurance_fuel_kg_s/h5/w0</property>
      <property value="0.352173">fsim/tables/best_endurance_fuel_kg_s/h5/w1</property>
      <property value="0.443367">fsim/tables/best_endurance_fuel_kg_s/h5/w2</property>
      <property value="0.286013">fsim/tables/best_endurance_fuel_kg_s/h6/w0</property>
      <property value="0.386349">fsim/tables/best_endurance_fuel_kg_s/h6/w1</property>
      <property value="1.5892">fsim/tables/best_endurance_fuel_kg_s/h6/w2</property>
      <property value="0.999867">fsim/tables/best_endurance_fuel_kg_s/h7/w0</property>
      <property value="1.40009">fsim/tables/best_endurance_fuel_kg_s/h7/w1</property>
      <property value="1.83953">fsim/tables/best_endurance_fuel_kg_s/h7/w2</property>
      <property value="199.343">fsim/tables/best_endurance_tas_ms/h0/w0</property>
      <property value="191.664">fsim/tables/best_endurance_tas_ms/h0/w1</property>
      <property value="152.149">fsim/tables/best_endurance_tas_ms/h0/w2</property>
      <property value="198.14">fsim/tables/best_endurance_tas_ms/h1/w0</property>
      <property value="196.811">fsim/tables/best_endurance_tas_ms/h1/w1</property>
      <property value="179.845">fsim/tables/best_endurance_tas_ms/h1/w2</property>
      <property value="206.15">fsim/tables/best_endurance_tas_ms/h2/w0</property>
      <property value="199.666">fsim/tables/best_endurance_tas_ms/h2/w1</property>
      <property value="216.511">fsim/tables/best_endurance_tas_ms/h2/w2</property>
      <property value="226.031">fsim/tables/best_endurance_tas_ms/h3/w0</property>
      <property value="236.425">fsim/tables/best_endurance_tas_ms/h3/w1</property>
      <property value="243.348">fsim/tables/best_endurance_tas_ms/h3/w2</property>
      <property value="240.935">fsim/tables/best_endurance_tas_ms/h4/w0</property>
      <property value="244.671">fsim/tables/best_endurance_tas_ms/h4/w1</property>
      <property value="249.284">fsim/tables/best_endurance_tas_ms/h4/w2</property>
      <property value="242.935">fsim/tables/best_endurance_tas_ms/h5/w0</property>
      <property value="249.137">fsim/tables/best_endurance_tas_ms/h5/w1</property>
      <property value="253.399">fsim/tables/best_endurance_tas_ms/h5/w2</property>
      <property value="251.852">fsim/tables/best_endurance_tas_ms/h6/w0</property>
      <property value="259.054">fsim/tables/best_endurance_tas_ms/h6/w1</property>
      <property value="262.464">fsim/tables/best_endurance_tas_ms/h6/w2</property>
      <property value="266.242">fsim/tables/best_endurance_tas_ms/h7/w0</property>
      <property value="263.869">fsim/tables/best_endurance_tas_ms/h7/w1</property>
      <property value="271.851">fsim/tables/best_endurance_tas_ms/h7/w2</property>
      <property value="0.618448">fsim/tables/best_range_fuel_kg_s/h0/w0</property>
      <property value="0.659653">fsim/tables/best_range_fuel_kg_s/h0/w1</property>
      <property value="0.764801">fsim/tables/best_range_fuel_kg_s/h0/w2</property>
      <property value="0.503382">fsim/tables/best_range_fuel_kg_s/h1/w0</property>
      <property value="0.577687">fsim/tables/best_range_fuel_kg_s/h1/w1</property>
      <property value="0.639036">fsim/tables/best_range_fuel_kg_s/h1/w2</property>
      <property value="0.410214">fsim/tables/best_range_fuel_kg_s/h2/w0</property>
      <property value="0.459609">fsim/tables/best_range_fuel_kg_s/h2/w1</property>
      <property value="0.50779">fsim/tables/best_range_fuel_kg_s/h2/w2</property>
      <property value="0.316185">fsim/tables/best_range_fuel_kg_s/h3/w0</property>
      <property value="0.373359">fsim/tables/best_range_fuel_kg_s/h3/w1</property>
      <property value="0.435556">fsim/tables/best_range_fuel_kg_s/h3/w2</property>
      <property value="0.296948">fsim/tables/best_range_fuel_kg_s/h4/w0</property>
      <property value="0.354023">fsim/tables/best_range_fuel_kg_s/h4/w1</property>
      <property value="0.437778">fsim/tables/best_range_fuel_kg_s/h4/w2</property>
      <property value="0.288483">fsim/tables/best_range_fuel_kg_s/h5/w0</property>
      <property value="0.35847">fsim/tables/best_range_fuel_kg_s/h5/w1</property>
      <property value="0.455991">fsim/tables/best_range_fuel_kg_s/h5/w2</property>
      <property value="0.290513">fsim/tables/best_range_fuel_kg_s/h6/w0</property>
      <property value="0.394609">fsim/tables/best_range_fuel_kg_s/h6/w1</property>
      <property value="1.60019">fsim/tables/best_range_fuel_kg_s/h6/w2</property>
      <property value="0.999867">fsim/tables/best_range_fuel_kg_s/h7/w0</property>
      <property value="1.41979">fsim/tables/best_range_fuel_kg_s/h7/w1</property>
      <property value="1.87921">fsim/tables/best_range_fuel_kg_s/h7/w2</property>
      <property value="199.343">fsim/tables/best_range_tas_ms/h0/w0</property>
      <property value="202.246">fsim/tables/best_range_tas_ms/h0/w1</property>
      <property value="224.27">fsim/tables/best_range_tas_ms/h0/w2</property>
      <property value="217.82">fsim/tables/best_range_tas_ms/h1/w0</property>
      <property value="236.793">fsim/tables/best_range_tas_ms/h1/w1</property>
      <property value="249.849">fsim/tables/best_range_tas_ms/h1/w2</property>
      <property value="243.485">fsim/tables/best_range_tas_ms/h2/w0</property>
      <property value="251.843">fsim/tables/best_range_tas_ms/h2/w1</property>
      <property value="257.609">fsim/tables/best_range_tas_ms/h2/w2</property>
      <property value="244.918">fsim/tables/best_range_tas_ms/h3/w0</property>
      <property value="251.024">fsim/tables/best_range_tas_ms/h3/w1</property>
      <property value="256.789">fsim/tables/best_range_tas_ms/h3/w2</property>
      <property value="250.244">fsim/tables/best_range_tas_ms/h4/w0</property>
      <property value="252.988">fsim/tables/best_range_tas_ms/h4/w1</property>
      <property value="258.116">fsim/tables/best_range_tas_ms/h4/w2</property>
      <property value="251.549">fsim/tables/best_range_tas_ms/h5/w0</property>
      <property value="256.386">fsim/tables/best_range_tas_ms/h5/w1</property>
      <property value="261.101">fsim/tables/best_range_tas_ms/h5/w2</property>
      <property value="258.165">fsim/tables/best_range_tas_ms/h6/w0</property>
      <property value="259.378">fsim/tables/best_range_tas_ms/h6/w1</property>
      <property value="267.689">fsim/tables/best_range_tas_ms/h6/w2</property>
      <property value="266.242">fsim/tables/best_range_tas_ms/h7/w0</property>
      <property value="269.281">fsim/tables/best_range_tas_ms/h7/w1</property>
      <property value="278.905">fsim/tables/best_range_tas_ms/h7/w2</property>
      <property value="284.336">fsim/tables/climb_tas_ms/h0/w0</property>
      <property value="288.115">fsim/tables/climb_tas_ms/h0/w1</property>
      <property value="290.812">fsim/tables/climb_tas_ms/h0/w2</property>
      <property value="280.59">fsim/tables/climb_tas_ms/h1/w0</property>
      <property value="281.153">fsim/tables/climb_tas_ms/h1/w1</property>
      <property value="284.809">fsim/tables/climb_tas_ms/h1/w2</property>
      <property value="273.351">fsim/tables/climb_tas_ms/h2/w0</property>
      <property value="275.573">fsim/tables/climb_tas_ms/h2/w1</property>
      <property value="275.485">fsim/tables/climb_tas_ms/h2/w2</property>
      <property value="264.292">fsim/tables/climb_tas_ms/h3/w0</property>
      <property value="267.247">fsim/tables/climb_tas_ms/h3/w1</property>
      <property value="267.762">fsim/tables/climb_tas_ms/h3/w2</property>
      <property value="263.79">fsim/tables/climb_tas_ms/h4/w0</property>
      <property value="265.777">fsim/tables/climb_tas_ms/h4/w1</property>
      <property value="266.815">fsim/tables/climb_tas_ms/h4/w2</property>
      <property value="262.695">fsim/tables/climb_tas_ms/h5/w0</property>
      <property value="266.424">fsim/tables/climb_tas_ms/h5/w1</property>
      <property value="266.906">fsim/tables/climb_tas_ms/h5/w2</property>
      <property value="233.292">fsim/tables/climb_tas_ms/h6/w0</property>
      <property value="267.067">fsim/tables/climb_tas_ms/h6/w1</property>
      <property value="267.474">fsim/tables/climb_tas_ms/h6/w2</property>
      <property value="266.19">fsim/tables/climb_tas_ms/h7/w0</property>
      <property value="267.03">fsim/tables/climb_tas_ms/h7/w1</property>
      <property value="271.336">fsim/tables/climb_tas_ms/h7/w2</property>
      <property value="8280">fsim/tables/fuel_capacity_kg</property>
      <property value="0.618448">fsim/tables/fuel_kg_s/h0/w0/v0</property>
      <property value="0.65927">fsim/tables/fuel_kg_s/h0/w0/v1</property>
      <property value="1.89767">fsim/tables/fuel_kg_s/h0/w0/v10</property>
      <property value="2.53306">fsim/tables/fuel_kg_s/h0/w0/v11</property>
      <property value="8.84305">fsim/tables/fuel_kg_s/h0/w0/v12</property>
      <property value="8.28352">fsim/tables/fuel_kg_s/h0/w0/v13</property>
      <property value="9.97069">fsim/tables/fuel_kg_s/h0/w0/v14</property>
      <property value="11.4542">fsim/tables/fuel_kg_s/h0/w0/v15</property>
      <property value="0.704716">fsim/tables/fuel_kg_s/h0/w0/v2</property>
      <property value="0.755227">fsim/tables/fuel_kg_s/h0/w0/v3</property>
      <property value="0.808631">fsim/tables/fuel_kg_s/h0/w0/v4</property>
      <property value="0.864075">fsim/tables/fuel_kg_s/h0/w0/v5</property>
      <property value="0.921163">fsim/tables/fuel_kg_s/h0/w0/v6</property>
      <property value="0.99914">fsim/tables/fuel_kg_s/h0/w0/v7</property>
      <property value="1.14194">fsim/tables/fuel_kg_s/h0/w0/v8</property>
      <property value="1.38147">fsim/tables/fuel_kg_s/h0/w0/v9</property>
      <property value="0.625656">fsim/tables/fuel_kg_s/h0/w1/v0</property>
      <property value="0.665443">fsim/tables/fuel_kg_s/h0/w1/v1</property>
      <property value="1.74007">fsim/tables/fuel_kg_s/h0/w1/v10</property>
      <property value="2.34891">fsim/tables/fuel_kg_s/h0/w1/v11</property>
      <property value="8.52583">fsim/tables/fuel_kg_s/h0/w1/v12</property>
      <property value="10.0732">fsim/tables/fuel_kg_s/h0/w1/v13</property>
      <property value="11.194">fsim/tables/fuel_kg_s/h0/w1/v14</property>
      <property value="12.05">fsim/tables/fuel_kg_s/h0/w1/v15</property>
      <property value="0.707065">fsim/tables/fuel_kg_s/h0/w1/v2</property>
      <property value="0.75028">fsim/tables/fuel_kg_s/h0/w1/v3</property>
      <property value="0.796657">fsim/tables/fuel_kg_s/h0/w1/v4</property>
      <property value="0.852522">fsim/tables/fuel_kg_s/h0/w1/v5</property>
      <property value="0.910168">fsim/tables/fuel_kg_s/h0/w1/v6</property>
      <property value="0.980081">fsim/tables/fuel_kg_s/h0/w1/v7</property>
      <property value="1.08023">fsim/tables/fuel_kg_s/h0/w1/v8</property>
      <property value="1.2879">fsim/tables/fuel_kg_s/h0/w1/v9</property>
      <property value="0.617568">fsim/tables/fuel_kg_s/h0/w2/v0</property>
      <property value="0.615258">fsim/tables/fuel_kg_s/h0/w2/v1</property>
      <property value="1.21126">fsim/tables/fuel_kg_s/h0/w2/v10</property>
      <property value="1.6622">fsim/tables/fuel_kg_s/h0/w2/v11</property>
      <property value="2.42409">fsim/tables/fuel_kg_s/h0/w2/v12</property>
      <property value="9.08246">fsim/tables/fuel_kg_s/h0/w2/v13</property>
      <property value="10.9093">fsim/tables/fuel_kg_s/h0/w2/v14</property>
      <property value="12.0284">fsim/tables/fuel_kg_s/h0/w2/v15</property>
      <property value="0.630891">fsim/tables/fuel_kg_s/h0/w2/v2</property>
      <property value="0.662466">fsim/tables/fuel_kg_s/h0/w2/v3</property>
      <property value="0.699454">fsim/tables/fuel_kg_s/h0/w2/v4</property>
      <property value="0.750479">fsim/tables/fuel_kg_s/h0/w2/v5</property>
      <property value="0.804192">fsim/tables/fuel_kg_s/h0/w2/v6</property>
      <property value="0.86235">fsim/tables/fuel_kg_s/h0/w2/v7</property>
      <property value="0.929361">fsim/tables/fuel_kg_s/h0/w2/v8</property>
      <property value="1.02097">fsim/tables/fuel_kg_s/h0/w2/v9</property>
      <property value="0.459695">fsim/tables/fuel_kg_s/h1/w0/v0</property>
      <property value="0.489782">fsim/tables/fuel_kg_s/h1/w0/v1</property>
      <property value="6.44366">fsim/tables/fuel_kg_s/h1/w0/v10</property>
      <property value="7.37624">fsim/tables/fuel_kg_s/h1/w0/v11</property>
      <property value="8.07481">fsim/tables/fuel_kg_s/h1/w0/v12</property>
      <property value="8.86448">fsim/tables/fuel_kg_s/h1/w0/v13</property>
      <property value="9.82445">fsim/tables/fuel_kg_s/h1/w0/v14</property>
      <property value="10.2886">fsim/tables/fuel_kg_s/h1/w0/v15</property>
      <property value="0.521904">fsim/tables/fuel_kg_s/h1/w0/v2</property>
      <property value="0.556384">fsim/tables/fuel_kg_s/h1/w0/v3</property>
      <property value="0.592668">fsim/tables/fuel_kg_s/h1/w0/v4</property>
      <property value="0.642965">fsim/tables/fuel_kg_s/h1/w0/v5</property>
      <property value="0.726605">fsim/tables/fuel_kg_s/h1/w0/v6</property>
      <property value="0.898826">fsim/tables/fuel_kg_s/h1/w0/v7</property>
      <property value="1.29435">fsim/tables/fuel_kg_s/h1/w0/v8</property>
      <property value="1.80275">fsim/tables/fuel_kg_s/h1/w0/v9</property>
      <property value="0.501877">fsim/tables/fuel_kg_s/h1/w1/v0</property>
      <property value="0.521756">fsim/tables/fuel_kg_s/h1/w1/v1</property>
      <property value="5.84165">fsim/tables/fuel_kg_s/h1/w1/v10</property>
      <property value="7.02785">fsim/tables/fuel_kg_s/h1/w1/v11</property>
      <property value="7.73235">fsim/tables/fuel_kg_s/h1/w1/v12</property>
      <property value="8.42718">fsim/tables/fuel_kg_s/h1/w1/v13</property>
      <property value="9.29535">fsim/tables/fuel_kg_s/h1/w1/v14</property>
      <property value="10.1313">fsim/tables/fuel_kg_s/h1/w1/v15</property>
      <property value="0.545547">fsim/tables/fuel_kg_s/h1/w1/v2</property>
      <property value="0.576793">fsim/tables/fuel_kg_s/h1/w1/v3</property>
      <property value="0.609998">fsim/tables/fuel_kg_s/h1/w1/v4</property>
      <property value="0.646319">fsim/tables/fuel_kg_s/h1/w1/v5</property>
      <property value="0.697078">fsim/tables/fuel_kg_s/h1/w1/v6</property>
      <property value="0.830817">fsim/tables/fuel_kg_s/h1/w1/v7</property>
      <property value="1.12102">fsim/tables/fuel_kg_s/h1/w1/v8</property>
      <property value="1.54506">fsim/tables/fuel_kg_s/h1/w1/v9</property>
      <property value="0.598886">fsim/tables/fuel_kg_s/h1/w2/v0</property>
      <property value="0.558131">fsim/tables/fuel_kg_s/h1/w2/v1</property>
      <property value="1.19117">fsim/tables/fuel_kg_s/h1/w2/v10</property>
      <property value="1.74963">fsim/tables/fuel_kg_s/h1/w2/v11</property>
      <property value="6.59556">fsim/tables/fuel_kg_s/h1/w2/v12</property>
      <property value="7.69003">fsim/tables/fuel_kg_s/h1/w2/v13</property>
      <property value="8.59241">fsim/tables/fuel_kg_s/h1/w2/v14</property>
      <property value="9.70134">fsim/tables/fuel_kg_s/h1/w2/v15</property>
      <property value="0.542239">fsim/tables/fuel_kg_s/h1/w2/v2</property>
      <property value="0.547381">fsim/tables/fuel_kg_s/h1/w2/v3</property>
      <property value="0.562107">fsim/tables/fuel_kg_s/h1/w2/v4</property>
      <property value="0.58588">fsim/tables/fuel_kg_s/h1/w2/v5</property>
      <property value="0.614891">fsim/tables/fuel_kg_s/h1/w2/v6</property>
      <property value="0.654712">fsim/tables/fuel_kg_s/h1/w2/v7</property>
      <property value="0.708405">fsim/tables/fuel_kg_s/h1/w2/v8</property>
      <property value="0.838753">fsim/tables/fuel_kg_s/h1/w2/v9</property>
      <property value="0.366574">fsim/tables/fuel_kg_s/h2/w0/v0</property>
      <property value="0.382792">fsim/tables/fuel_kg_s/h2/w0/v1</property>
      <property value="6.27526">fsim/tables/fuel_kg_s/h2/w0/v10</property>
      <property value="6.74702">fsim/tables/fuel_kg_s/h2/w0/v11</property>
      <property value="7.08995">fsim/tables/fuel_kg_s/h2/w0/v12</property>
      <property value="7.44879">fsim/tables/fuel_kg_s/h2/w0/v13</property>
      <property value="7.81388">fsim/tables/fuel_kg_s/h2/w0/v14</property>
      <property value="8.40204">fsim/tables/fuel_kg_s/h2/w0/v15</property>
      <property value="0.40187">fsim/tables/fuel_kg_s/h2/w0/v2</property>
      <property value="0.432278">fsim/tables/fuel_kg_s/h2/w0/v3</property>
      <property value="0.497091">fsim/tables/fuel_kg_s/h2/w0/v4</property>
      <property value="0.683304">fsim/tables/fuel_kg_s/h2/w0/v5</property>
      <property value="1.01903">fsim/tables/fuel_kg_s/h2/w0/v6</property>
      <property value="4.10951">fsim/tables/fuel_kg_s/h2/w0/v7</property>
      <property value="4.85138">fsim/tables/fuel_kg_s/h2/w0/v8</property>
      <property value="5.51132">fsim/tables/fuel_kg_s/h2/w0/v9</property>
      <property value="0.486835">fsim/tables/fuel_kg_s/h2/w1/v0</property>
      <property value="0.440697">fsim/tables/fuel_kg_s/h2/w1/v1</property>
      <property value="5.34294">fsim/tables/fuel_kg_s/h2/w1/v10</property>
      <property value="6.25979">fsim/tables/fuel_kg_s/h2/w1/v11</property>
      <property value="6.93013">fsim/tables/fuel_kg_s/h2/w1/v12</property>
      <property value="7.33679">fsim/tables/fuel_kg_s/h2/w1/v13</property>
      <property value="7.76047">fsim/tables/fuel_kg_s/h2/w1/v14</property>
      <property value="8.32749">fsim/tables/fuel_kg_s/h2/w1/v15</property>
      <property value="0.419837">fsim/tables/fuel_kg_s/h2/w1/v2</property>
      <property value="0.41827">fsim/tables/fuel_kg_s/h2/w1/v3</property>
      <property value="0.428321">fsim/tables/fuel_kg_s/h2/w1/v4</property>
      <property value="0.448885">fsim/tables/fuel_kg_s/h2/w1/v5</property>
      <property value="0.490933">fsim/tables/fuel_kg_s/h2/w1/v6</property>
      <property value="0.677742">fsim/tables/fuel_kg_s/h2/w1/v7</property>
      <property value="1.08822">fsim/tables/fuel_kg_s/h2/w1/v8</property>
      <property value="4.51922">fsim/tables/fuel_kg_s/h2/w1/v9</property>
      <property value="0.588246">fsim/tables/fuel_kg_s/h2/w2/v0</property>
      <property value="0.52881">fsim/tables/fuel_kg_s/h2/w2/v1</property>
      <property value="5.34383">fsim/tables/fuel_kg_s/h2/w2/v10</property>
      <property value="6.23938">fsim/tables/fuel_kg_s/h2/w2/v11</property>
      <property value="7.03522">fsim/tables/fuel_kg_s/h2/w2/v12</property>
      <property value="7.40853">fsim/tables/fuel_kg_s/h2/w2/v13</property>
      <property value="7.79932">fsim/tables/fuel_kg_s/h2/w2/v14</property>
      <property value="8.22227">fsim/tables/fuel_kg_s/h2/w2/v15</property>
      <property value="0.491464">fsim/tables/fuel_kg_s/h2/w2/v2</property>
      <property value="0.475498">fsim/tables/fuel_kg_s/h2/w2/v3</property>
      <property value="0.477666">fsim/tables/fuel_kg_s/h2/w2/v4</property>
      <property value="0.489336">fsim/tables/fuel_kg_s/h2/w2/v5</property>
      <property value="0.524135">fsim/tables/fuel_kg_s/h2/w2/v6</property>
      <property value="0.686992">fsim/tables/fuel_kg_s/h2/w2/v7</property>
      <property value="1.07073">fsim/tables/fuel_kg_s/h2/w2/v8</property>
      <property value="4.46909">fsim/tables/fuel_kg_s/h2/w2/v9</property>
      <property value="0.306867">fsim/tables/fuel_kg_s/h3/w0/v0</property>
      <property value="0.312731">fsim/tables/fuel_kg_s/h3/w0/v1</property>
      <property value="4.75792">fsim/tables/fuel_kg_s/h3/w0/v10</property>
      <property value="4.97996">fsim/tables/fuel_kg_s/h3/w0/v11</property>
      <property value="5.37083">fsim/tables/fuel_kg_s/h3/w0/v12</property>
      <property value="5.80375">fsim/tables/fuel_kg_s/h3/w0/v13</property>
      <property value="6.26543">fsim/tables/fuel_kg_s/h3/w0/v14</property>
      <property value="6.7374">fsim/tables/fuel_kg_s/h3/w0/v15</property>
      <property value="0.34696">fsim/tables/fuel_kg_s/h3/w0/v2</property>
      <property value="0.473856">fsim/tables/fuel_kg_s/h3/w0/v3</property>
      <property value="0.700775">fsim/tables/fuel_kg_s/h3/w0/v4</property>
      <property value="2.87591">fsim/tables/fuel_kg_s/h3/w0/v5</property>
      <property value="3.37259">fsim/tables/fuel_kg_s/h3/w0/v6</property>
      <property value="3.90176">fsim/tables/fuel_kg_s/h3/w0/v7</property>
      <property value="4.34434">fsim/tables/fuel_kg_s/h3/w0/v8</property>
      <property value="4.54209">fsim/tables/fuel_kg_s/h3/w0/v9</property>
      <property value="0.466966">fsim/tables/fuel_kg_s/h3/w1/v0</property>
      <property value="0.413704">fsim/tables/fuel_kg_s/h3/w1/v1</property>
      <property value="4.6289">fsim/tables/fuel_kg_s/h3/w1/v10</property>
      <property value="4.8592">fsim/tables/fuel_kg_s/h3/w1/v11</property>
      <property value="5.10442">fsim/tables/fuel_kg_s/h3/w1/v12</property>
      <property value="5.52888">fsim/tables/fuel_kg_s/h3/w1/v13</property>
      <property value="6.05307">fsim/tables/fuel_kg_s/h3/w1/v14</property>
      <property value="6.62049">fsim/tables/fuel_kg_s/h3/w1/v15</property>
      <property value="0.380934">fsim/tables/fuel_kg_s/h3/w1/v2</property>
      <property value="0.364437">fsim/tables/fuel_kg_s/h3/w1/v3</property>
      <property value="0.363048">fsim/tables/fuel_kg_s/h3/w1/v4</property>
      <property value="0.405618">fsim/tables/fuel_kg_s/h3/w1/v5</property>
      <property value="0.624551">fsim/tables/fuel_kg_s/h3/w1/v6</property>
      <property value="2.83891">fsim/tables/fuel_kg_s/h3/w1/v7</property>
      <property value="3.52025">fsim/tables/fuel_kg_s/h3/w1/v8</property>
      <property value="4.22682">fsim/tables/fuel_kg_s/h3/w1/v9</property>
      <property value="0.580394">fsim/tables/fuel_kg_s/h3/w2/v0</property>
      <property value="0.509225">fsim/tables/fuel_kg_s/h3/w2/v1</property>
      <property value="4.88976">fsim/tables/fuel_kg_s/h3/w2/v10</property>
      <property value="5.00551">fsim/tables/fuel_kg_s/h3/w2/v11</property>
      <property value="5.20384">fsim/tables/fuel_kg_s/h3/w2/v12</property>
      <property value="5.48344">fsim/tables/fuel_kg_s/h3/w2/v13</property>
      <property value="5.96117">fsim/tables/fuel_kg_s/h3/w2/v14</property>
      <property value="6.47894">fsim/tables/fuel_kg_s/h3/w2/v15</property>
      <property value="0.463873">fsim/tables/fuel_kg_s/h3/w2/v2</property>
      <property value="0.433902">fsim/tables/fuel_kg_s/h3/w2/v3</property>
      <property value="0.41927">fsim/tables/fuel_kg_s/h3/w2/v4</property>
      <property value="0.451432">fsim/tables/fuel_kg_s/h3/w2/v5</property>
      <property value="0.649208">fsim/tables/fuel_kg_s/h3/w2/v6</property>
      <property value="2.88776">fsim/tables/fuel_kg_s/h3/w2/v7</property>
      <property value="3.59299">fsim/tables/fuel_kg_s/h3/w2/v8</property>
      <property value="4.31518">fsim/tables/fuel_kg_s/h3/w2/v9</property>
      <property value="0.288405">fsim/tables/fuel_kg_s/h4/w0/v0</property>
      <property value="0.302786">fsim/tables/fuel_kg_s/h4/w0/v1</property>
      <property value="3.89583">fsim/tables/fuel_kg_s/h4/w0/v10</property>
      <property value="4.04337">fsim/tables/fuel_kg_s/h4/w0/v11</property>
      <property value="4.33437">fsim/tables/fuel_kg_s/h4/w0/v12</property>
      <property value="4.64366">fsim/tables/fuel_kg_s/h4/w0/v13</property>
      <property value="4.97242">fsim/tables/fuel_kg_s/h4/w0/v14</property>
      <property value="5.31369">fsim/tables/fuel_kg_s/h4/w0/v15</property>
      <property value="0.372457">fsim/tables/fuel_kg_s/h4/w0/v2</property>
      <property value="0.519103">fsim/tables/fuel_kg_s/h4/w0/v3</property>
      <property value="2.1635">fsim/tables/fuel_kg_s/h4/w0/v4</property>
      <property value="2.57935">fsim/tables/fuel_kg_s/h4/w0/v5</property>
      <property value="3.01006">fsim/tables/fuel_kg_s/h4/w0/v6</property>
      <property value="3.46966">fsim/tables/fuel_kg_s/h4/w0/v7</property>
      <property value="3.64558">fsim/tables/fuel_kg_s/h4/w0/v8</property>
      <property value="3.75735">fsim/tables/fuel_kg_s/h4/w0/v9</property>
      <property value="0.480302">fsim/tables/fuel_kg_s/h4/w1/v0</property>
      <property value="0.42226">fsim/tables/fuel_kg_s/h4/w1/v1</property>
      <property value="3.94295">fsim/tables/fuel_kg_s/h4/w1/v10</property>
      <property value="4.02301">fsim/tables/fuel_kg_s/h4/w1/v11</property>
      <property value="4.14888">fsim/tables/fuel_kg_s/h4/w1/v12</property>
      <property value="4.39554">fsim/tables/fuel_kg_s/h4/w1/v13</property>
      <property value="4.76472">fsim/tables/fuel_kg_s/h4/w1/v14</property>
      <property value="5.16492">fsim/tables/fuel_kg_s/h4/w1/v15</property>
      <property value="0.383934">fsim/tables/fuel_kg_s/h4/w1/v2</property>
      <property value="0.359052">fsim/tables/fuel_kg_s/h4/w1/v3</property>
      <property value="0.348555">fsim/tables/fuel_kg_s/h4/w1/v4</property>
      <property value="0.402212">fsim/tables/fuel_kg_s/h4/w1/v5</property>
      <property value="0.578765">fsim/tables/fuel_kg_s/h4/w1/v6</property>
      <property value="2.48225">fsim/tables/fuel_kg_s/h4/w1/v7</property>
      <property value="3.04028">fsim/tables/fuel_kg_s/h4/w1/v8</property>
      <property value="3.62543">fsim/tables/fuel_kg_s/h4/w1/v9</property>
      <property value="1.92209">fsim/tables/fuel_kg_s/h4/w2/v0</property>
      <property value="0.532463">fsim/tables/fuel_kg_s/h4/w2/v1</property>
      <property value="4.28785">fsim/tables/fuel_kg_s/h4/w2/v10</property>
      <property value="4.29819">fsim/tables/fuel_kg_s/h4/w2/v11</property>
      <property value="4.35051">fsim/tables/fuel_kg_s/h4/w2/v12</property>
      <property value="4.42424">fsim/tables/fuel_kg_s/h4/w2/v13</property>
      <property value="4.71961">fsim/tables/fuel_kg_s/h4/w2/v14</property>
      <property value="5.06711">fsim/tables/fuel_kg_s/h4/w2/v15</property>
      <property value="0.479665">fsim/tables/fuel_kg_s/h4/w2/v2</property>
      <property value="0.443231">fsim/tables/fuel_kg_s/h4/w2/v3</property>
      <property value="0.424975">fsim/tables/fuel_kg_s/h4/w2/v4</property>
      <property value="0.466237">fsim/tables/fuel_kg_s/h4/w2/v5</property>
      <property value="1.96623">fsim/tables/fuel_kg_s/h4/w2/v6</property>
      <property value="2.59409">fsim/tables/fuel_kg_s/h4/w2/v7</property>
      <property value="3.17261">fsim/tables/fuel_kg_s/h4/w2/v8</property>
      <property value="3.76046">fsim/tables/fuel_kg_s/h4/w2/v9</property>
      <property value="0.3244">fsim/tables/fuel_kg_s/h5/w0/v0</property>
      <property value="0.300501">fsim/tables/fuel_kg_s/h5/w0/v1</property>
      <property value="3.38829">fsim/tables/fuel_kg_s/h5/w0/v10</property>
      <property value="3.50512">fsim/tables/fuel_kg_s/h5/w0/v11</property>
      <property value="3.68733">fsim/tables/fuel_kg_s/h5/w0/v12</property>
      <property value="3.98941">fsim/tables/fuel_kg_s/h5/w0/v13</property>
      <property value="4.31542">fsim/tables/fuel_kg_s/h5/w0/v14</property>
      <property value="4.66395">fsim/tables/fuel_kg_s/h5/w0/v15</property>
      <property value="0.28733">fsim/tables/fuel_kg_s/h5/w0/v2</property>
      <property value="0.288641">fsim/tables/fuel_kg_s/h5/w0/v3</property>
      <property value="0.348184">fsim/tables/fuel_kg_s/h5/w0/v4</property>
      <property value="0.500293">fsim/tables/fuel_kg_s/h5/w0/v5</property>
      <property value="2.10714">fsim/tables/fuel_kg_s/h5/w0/v6</property>
      <property value="2.56473">fsim/tables/fuel_kg_s/h5/w0/v7</property>
      <property value="3.02913">fsim/tables/fuel_kg_s/h5/w0/v8</property>
      <property value="3.31175">fsim/tables/fuel_kg_s/h5/w0/v9</property>
      <property value="0.496715">fsim/tables/fuel_kg_s/h5/w1/v0</property>
      <property value="0.433999">fsim/tables/fuel_kg_s/h5/w1/v1</property>
      <property value="3.64847">fsim/tables/fuel_kg_s/h5/w1/v10</property>
      <property value="3.68166">fsim/tables/fuel_kg_s/h5/w1/v11</property>
      <property value="3.74816">fsim/tables/fuel_kg_s/h5/w1/v12</property>
      <property value="3.89364">fsim/tables/fuel_kg_s/h5/w1/v13</property>
      <property value="4.19222">fsim/tables/fuel_kg_s/h5/w1/v14</property>
      <property value="4.51529">fsim/tables/fuel_kg_s/h5/w1/v15</property>
      <property value="0.39358">fsim/tables/fuel_kg_s/h5/w1/v2</property>
      <property value="0.365457">fsim/tables/fuel_kg_s/h5/w1/v3</property>
      <property value="0.357057">fsim/tables/fuel_kg_s/h5/w1/v4</property>
      <property value="0.417213">fsim/tables/fuel_kg_s/h5/w1/v5</property>
      <property value="1.81717">fsim/tables/fuel_kg_s/h5/w1/v6</property>
      <property value="2.35963">fsim/tables/fuel_kg_s/h5/w1/v7</property>
      <property value="2.86502">fsim/tables/fuel_kg_s/h5/w1/v8</property>
      <property value="3.39214">fsim/tables/fuel_kg_s/h5/w1/v9</property>
      <property value="1.99272">fsim/tables/fuel_kg_s/h5/w2/v0</property>
      <property value="1.74813">fsim/tables/fuel_kg_s/h5/w2/v1</property>
      <property value="4.11349">fsim/tables/fuel_kg_s/h5/w2/v10</property>
      <property value="4.20875">fsim/tables/fuel_kg_s/h5/w2/v11</property>
      <property value="4.00089">fsim/tables/fuel_kg_s/h5/w2/v12</property>
      <property value="4.03393">fsim/tables/fuel_kg_s/h5/w2/v13</property>
      <property value="4.14236">fsim/tables/fuel_kg_s/h5/w2/v14</property>
      <property value="4.39278">fsim/tables/fuel_kg_s/h5/w2/v15</property>
      <property value="0.501674">fsim/tables/fuel_kg_s/h5/w2/v2</property>
      <property value="0.461842">fsim/tables/fuel_kg_s/h5/w2/v3</property>
      <property value="0.444693">fsim/tables/fuel_kg_s/h5/w2/v4</property>
      <property value="0.486948">fsim/tables/fuel_kg_s/h5/w2/v5</property>
      <property value="1.94043">fsim/tables/fuel_kg_s/h5/w2/v6</property>
      <property value="2.44091">fsim/tables/fuel_kg_s/h5/w2/v7</property>
      <property value="2.94539">fsim/tables/fuel_kg_s/h5/w2/v8</property>
      <property value="3.46507">fsim/tables/fuel_kg_s/h5/w2/v9</property>
      <property value="0.336445">fsim/tables/fuel_kg_s/h6/w0/v0</property>
      <property value="0.310574">fsim/tables/fuel_kg_s/h6/w0/v1</property>
      <property value="2.88381">fsim/tables/fuel_kg_s/h6/w0/v10</property>
      <property value="2.89837">fsim/tables/fuel_kg_s/h6/w0/v11</property>
      <property value="2.92792">fsim/tables/fuel_kg_s/h6/w0/v12</property>
      <property value="2.97312">fsim/tables/fuel_kg_s/h6/w0/v13</property>
      <property value="3.14405">fsim/tables/fuel_kg_s/h6/w0/v14</property>
      <property value="3.33704">fsim/tables/fuel_kg_s/h6/w0/v15</property>
      <property value="0.293073">fsim/tables/fuel_kg_s/h6/w0/v2</property>
      <property value="0.290434">fsim/tables/fuel_kg_s/h6/w0/v3</property>
      <property value="0.33311">fsim/tables/fuel_kg_s/h6/w0/v4</property>
      <property value="1.36334">fsim/tables/fuel_kg_s/h6/w0/v5</property>
      <property value="1.72715">fsim/tables/fuel_kg_s/h6/w0/v6</property>
      <property value="2.07103">fsim/tables/fuel_kg_s/h6/w0/v7</property>
      <property value="2.42969">fsim/tables/fuel_kg_s/h6/w0/v8</property>
      <property value="2.80103">fsim/tables/fuel_kg_s/h6/w0/v9</property>
      <property value="1.48823">fsim/tables/fuel_kg_s/h6/w1/v1</property>
      <property value="3.05012">fsim/tables/fuel_kg_s/h6/w1/v10</property>
      <property value="3.20998">fsim/tables/fuel_kg_s/h6/w1/v13</property>
      <property value="3.28726">fsim/tables/fuel_kg_s/h6/w1/v14</property>
      <property value="3.35878">fsim/tables/fuel_kg_s/h6/w1/v15</property>
      <property value="1.3521">fsim/tables/fuel_kg_s/h6/w1/v2</property>
      <property value="1.25453">fsim/tables/fuel_kg_s/h6/w1/v3</property>
      <property value="0.386523">fsim/tables/fuel_kg_s/h6/w1/v4</property>
      <property value="1.31008">fsim/tables/fuel_kg_s/h6/w1/v5</property>
      <property value="1.5817">fsim/tables/fuel_kg_s/h6/w1/v6</property>
      <property value="1.92919">fsim/tables/fuel_kg_s/h6/w1/v7</property>
      <property value="2.27816">fsim/tables/fuel_kg_s/h6/w1/v8</property>
      <property value="2.68611">fsim/tables/fuel_kg_s/h6/w1/v9</property>
      <property value="1.98893">fsim/tables/fuel_kg_s/h6/w2/v1</property>
      <property value="1.76725">fsim/tables/fuel_kg_s/h6/w2/v10</property>
      <property value="1.90402">fsim/tables/fuel_kg_s/h6/w2/v11</property>
      <property value="2.07946">fsim/tables/fuel_kg_s/h6/w2/v12</property>
      <property value="2.2424">fsim/tables/fuel_kg_s/h6/w2/v13</property>
      <property value="2.42519">fsim/tables/fuel_kg_s/h6/w2/v14</property>
      <property value="2.62311">fsim/tables/fuel_kg_s/h6/w2/v15</property>
      <property value="1.89258">fsim/tables/fuel_kg_s/h6/w2/v2</property>
      <property value="1.80921">fsim/tables/fuel_kg_s/h6/w2/v3</property>
      <property value="1.7333">fsim/tables/fuel_kg_s/h6/w2/v4</property>
      <property value="1.66411">fsim/tables/fuel_kg_s/h6/w2/v5</property>
      <property value="1.61907">fsim/tables/fuel_kg_s/h6/w2/v6</property>
      <property value="1.59038">fsim/tables/fuel_kg_s/h6/w2/v7</property>
      <property value="1.59997">fsim/tables/fuel_kg_s/h6/w2/v8</property>
      <property value="1.6745">fsim/tables/fuel_kg_s/h6/w2/v9</property>
      <property value="0.999867">fsim/tables/fuel_kg_s/h7/w0/v0</property>
      <property value="1.08669">fsim/tables/fuel_kg_s/h7/w0/v1</property>
      <property value="2.5238">fsim/tables/fuel_kg_s/h7/w0/v15</property>
      <property value="1.22124">fsim/tables/fuel_kg_s/h7/w0/v2</property>
      <property value="1.39424">fsim/tables/fuel_kg_s/h7/w0/v3</property>
      <property value="1.55706">fsim/tables/fuel_kg_s/h7/w0/v4</property>
      <property value="1.74099">fsim/tables/fuel_kg_s/h7/w0/v5</property>
      <property value="1.95462">fsim/tables/fuel_kg_s/h7/w0/v6</property>
      <property value="1.51084">fsim/tables/fuel_kg_s/h7/w1/v10</property>
      <property value="1.58602">fsim/tables/fuel_kg_s/h7/w1/v11</property>
      <property value="1.68539">fsim/tables/fuel_kg_s/h7/w1/v12</property>
      <property value="1.79044">fsim/tables/fuel_kg_s/h7/w1/v13</property>
      <property value="1.89635">fsim/tables/fuel_kg_s/h7/w1/v14</property>
      <property value="2.01023">fsim/tables/fuel_kg_s/h7/w1/v15</property>
      <property value="1.58255">fsim/tables/fuel_kg_s/h7/w1/v2</property>
      <property value="1.53455">fsim/tables/fuel_kg_s/h7/w1/v3</property>
      <property value="1.48407">fsim/tables/fuel_kg_s/h7/w1/v4</property>
      <property value="1.44677">fsim/tables/fuel_kg_s/h7/w1/v5</property>
      <property value="1.41884">fsim/tables/fuel_kg_s/h7/w1/v6</property>
      <property value="1.40011">fsim/tables/fuel_kg_s/h7/w1/v7</property>
      <property value="1.42091">fsim/tables/fuel_kg_s/h7/w1/v8</property>
      <property value="1.46132">fsim/tables/fuel_kg_s/h7/w1/v9</property>
      <property value="1.83953">fsim/tables/fuel_kg_s/h7/w2/v0</property>
      <property value="1.84706">fsim/tables/fuel_kg_s/h7/w2/v1</property>
      <property value="1.99671">fsim/tables/fuel_kg_s/h7/w2/v10</property>
      <property value="2.08032">fsim/tables/fuel_kg_s/h7/w2/v11</property>
      <property value="2.17654">fsim/tables/fuel_kg_s/h7/w2/v12</property>
      <property value="2.20759">fsim/tables/fuel_kg_s/h7/w2/v13</property>
      <property value="2.20963">fsim/tables/fuel_kg_s/h7/w2/v14</property>
      <property value="2.21154">fsim/tables/fuel_kg_s/h7/w2/v15</property>
      <property value="1.85497">fsim/tables/fuel_kg_s/h7/w2/v2</property>
      <property value="1.86332">fsim/tables/fuel_kg_s/h7/w2/v3</property>
      <property value="1.87221">fsim/tables/fuel_kg_s/h7/w2/v4</property>
      <property value="1.88178">fsim/tables/fuel_kg_s/h7/w2/v5</property>
      <property value="1.894">fsim/tables/fuel_kg_s/h7/w2/v6</property>
      <property value="1.90952">fsim/tables/fuel_kg_s/h7/w2/v7</property>
      <property value="1.92723">fsim/tables/fuel_kg_s/h7/w2/v8</property>
      <property value="1.95276">fsim/tables/fuel_kg_s/h7/w2/v9</property>
      <property value="331.291">fsim/tables/max_climb_ms/h0/w0</property>
      <property value="267.423">fsim/tables/max_climb_ms/h0/w1</property>
      <property value="224.24">fsim/tables/max_climb_ms/h0/w2</property>
      <property value="263.439">fsim/tables/max_climb_ms/h1/w0</property>
      <property value="211.329">fsim/tables/max_climb_ms/h1/w1</property>
      <property value="176.364">fsim/tables/max_climb_ms/h1/w2</property>
      <property value="200.587">fsim/tables/max_climb_ms/h2/w0</property>
      <property value="159.722">fsim/tables/max_climb_ms/h2/w1</property>
      <property value="131.669">fsim/tables/max_climb_ms/h2/w2</property>
      <property value="144.722">fsim/tables/max_climb_ms/h3/w0</property>
      <property value="112.153">fsim/tables/max_climb_ms/h3/w1</property>
      <property value="90.6685">fsim/tables/max_climb_ms/h3/w2</property>
      <property value="111.249">fsim/tables/max_climb_ms/h4/w0</property>
      <property value="83.7603">fsim/tables/max_climb_ms/h4/w1</property>
      <property value="65.4775">fsim/tables/max_climb_ms/h4/w2</property>
      <property value="99.1492">fsim/tables/max_climb_ms/h5/w0</property>
      <property value="70.1831">fsim/tables/max_climb_ms/h5/w1</property>
      <property value="52.8865">fsim/tables/max_climb_ms/h5/w2</property>
      <property value="72.5593">fsim/tables/max_climb_ms/h6/w0</property>
      <property value="42.8763">fsim/tables/max_climb_ms/h6/w1</property>
      <property value="27.8631">fsim/tables/max_climb_ms/h6/w2</property>
      <property value="41.3424">fsim/tables/max_climb_ms/h7/w0</property>
      <property value="21.2139">fsim/tables/max_climb_ms/h7/w1</property>
      <property value="9.12692">fsim/tables/max_climb_ms/h7/w2</property>
      <property value="390.956">fsim/tables/max_tas_ms/h0/w0</property>
      <property value="389.067">fsim/tables/max_tas_ms/h0/w1</property>
      <property value="387.213">fsim/tables/max_tas_ms/h0/w2</property>
      <property value="418.036">fsim/tables/max_tas_ms/h1/w0</property>
      <property value="407.127">fsim/tables/max_tas_ms/h1/w1</property>
      <property value="396.774">fsim/tables/max_tas_ms/h1/w2</property>
      <property value="466.328">fsim/tables/max_tas_ms/h2/w0</property>
      <property value="459.644">fsim/tables/max_tas_ms/h2/w1</property>
      <property value="452.154">fsim/tables/max_tas_ms/h2/w2</property>
      <property value="498.253">fsim/tables/max_tas_ms/h3/w0</property>
      <property value="486.544">fsim/tables/max_tas_ms/h3/w1</property>
      <property value="474.267">fsim/tables/max_tas_ms/h3/w2</property>
      <property value="490.632">fsim/tables/max_tas_ms/h4/w0</property>
      <property value="473.918">fsim/tables/max_tas_ms/h4/w1</property>
      <property value="459.262">fsim/tables/max_tas_ms/h4/w2</property>
      <property value="488.188">fsim/tables/max_tas_ms/h5/w0</property>
      <property value="468.765">fsim/tables/max_tas_ms/h5/w1</property>
      <property value="447.096">fsim/tables/max_tas_ms/h5/w2</property>
      <property value="456.2">fsim/tables/max_tas_ms/h6/w0</property>
      <property value="429.157">fsim/tables/max_tas_ms/h6/w1</property>
      <property value="326.014">fsim/tables/max_tas_ms/h6/w2</property>
      <property value="417.18">fsim/tables/max_tas_ms/h7/w0</property>
      <property value="318.161">fsim/tables/max_tas_ms/h7/w1</property>
      <property value="302.554">fsim/tables/max_tas_ms/h7/w2</property>
      <property value="199.343">fsim/tables/min_tas_ms/h0/w0</property>
      <property value="191.664">fsim/tables/min_tas_ms/h0/w1</property>
      <property value="142.379">fsim/tables/min_tas_ms/h0/w2</property>
      <property value="198.139">fsim/tables/min_tas_ms/h1/w0</property>
      <property value="196.809">fsim/tables/min_tas_ms/h1/w1</property>
      <property value="143.56">fsim/tables/min_tas_ms/h1/w2</property>
      <property value="206.146">fsim/tables/min_tas_ms/h2/w0</property>
      <property value="147.203">fsim/tables/min_tas_ms/h2/w1</property>
      <property value="151.895">fsim/tables/min_tas_ms/h2/w2</property>
      <property value="226.023">fsim/tables/min_tas_ms/h3/w0</property>
      <property value="163.887">fsim/tables/min_tas_ms/h3/w1</property>
      <property value="169.488">fsim/tables/min_tas_ms/h3/w2</property>
      <property value="240.926">fsim/tables/min_tas_ms/h4/w0</property>
      <property value="175.172">fsim/tables/min_tas_ms/h4/w1</property>
      <property value="182.557">fsim/tables/min_tas_ms/h4/w2</property>
      <property value="198.8">fsim/tables/min_tas_ms/h5/w0</property>
      <property value="183.686">fsim/tables/min_tas_ms/h5/w1</property>
      <property value="192.482">fsim/tables/min_tas_ms/h5/w2</property>
      <property value="212.656">fsim/tables/min_tas_ms/h6/w0</property>
      <property value="202.149">fsim/tables/min_tas_ms/h6/w1</property>
      <property value="212.193">fsim/tables/min_tas_ms/h6/w2</property>
      <property value="266.19">fsim/tables/min_tas_ms/h7/w0</property>
      <property value="225.026">fsim/tables/min_tas_ms/h7/w1</property>
      <property value="271.336">fsim/tables/min_tas_ms/h7/w2</property>
      <property value="247.095">fsim/tables/ps_full_ms/h0/w0/v0</property>
      <property value="261.171">fsim/tables/ps_full_ms/h0/w0/v1</property>
      <property value="280.647">fsim/tables/ps_full_ms/h0/w0/v10</property>
      <property value="226.328">fsim/tables/ps_full_ms/h0/w0/v11</property>
      <property value="156.217">fsim/tables/ps_full_ms/h0/w0/v12</property>
      <property value="96.3617">fsim/tables/ps_full_ms/h0/w0/v13</property>
      <property value="62.1662">fsim/tables/ps_full_ms/h0/w0/v14</property>
      <property value="31.9417">fsim/tables/ps_full_ms/h0/w0/v15</property>
      <property value="274.999">fsim/tables/ps_full_ms/h0/w0/v2</property>
      <property value="288.55">fsim/tables/ps_full_ms/h0/w0/v3</property>
      <property value="301.732">fsim/tables/ps_full_ms/h0/w0/v4</property>
      <property value="314.243">fsim/tables/ps_full_ms/h0/w0/v5</property>
      <property value="324.853">fsim/tables/ps_full_ms/h0/w0/v6</property>
      <property value="330.956">fsim/tables/ps_full_ms/h0/w0/v7</property>
      <property value="328.517">fsim/tables/ps_full_ms/h0/w0/v8</property>
      <property value="313.66">fsim/tables/ps_full_ms/h0/w0/v9</property>
      <property value="189.018">fsim/tables/ps_full_ms/h0/w1/v0</property>
      <property value="200.771">fsim/tables/ps_full_ms/h0/w1/v1</property>
      <property value="237.269">fsim/tables/ps_full_ms/h0/w1/v10</property>
      <property value="194.17">fsim/tables/ps_full_ms/h0/w1/v11</property>
      <property value="135.462">fsim/tables/ps_full_ms/h0/w1/v12</property>
      <property value="84.408">fsim/tables/ps_full_ms/h0/w1/v13</property>
      <property value="51.9651">fsim/tables/ps_full_ms/h0/w1/v14</property>
      <property value="26.7673">fsim/tables/ps_full_ms/h0/w1/v15</property>
      <property value="212.396">fsim/tables/ps_full_ms/h0/w1/v2</property>
      <property value="223.865">fsim/tables/ps_full_ms/h0/w1/v3</property>
      <property value="235.061">fsim/tables/ps_full_ms/h0/w1/v4</property>
      <property value="245.86">fsim/tables/ps_full_ms/h0/w1/v5</property>
      <property value="255.998">fsim/tables/ps_full_ms/h0/w1/v6</property>
      <property value="264.21">fsim/tables/ps_full_ms/h0/w1/v7</property>
      <property value="267.235">fsim/tables/ps_full_ms/h0/w1/v8</property>
      <property value="260.047">fsim/tables/ps_full_ms/h0/w1/v9</property>
      <property value="115.617">fsim/tables/ps_full_ms/h0/w2/v0</property>
      <property value="128.609">fsim/tables/ps_full_ms/h0/w2/v1</property>
      <property value="222.664">fsim/tables/ps_full_ms/h0/w2/v10</property>
      <property value="203.546">fsim/tables/ps_full_ms/h0/w2/v11</property>
      <property value="156.642">fsim/tables/ps_full_ms/h0/w2/v12</property>
      <property value="94.6532">fsim/tables/ps_full_ms/h0/w2/v13</property>
      <property value="49.3749">fsim/tables/ps_full_ms/h0/w2/v14</property>
      <property value="22.0275">fsim/tables/ps_full_ms/h0/w2/v15</property>
      <property value="141.029">fsim/tables/ps_full_ms/h0/w2/v2</property>
      <property value="152.998">fsim/tables/ps_full_ms/h0/w2/v3</property>
      <property value="164.908">fsim/tables/ps_full_ms/h0/w2/v4</property>
      <property value="177.009">fsim/tables/ps_full_ms/h0/w2/v5</property>
      <property value="189.262">fsim/tables/ps_full_ms/h0/w2/v6</property>
      <property value="201.498">fsim/tables/ps_full_ms/h0/w2/v7</property>
      <property value="213.167">fsim/tables/ps_full_ms/h0/w2/v8</property>
      <property value="222.197">fsim/tables/ps_full_ms/h0/w2/v9</property>
      <property value="194.877">fsim/tables/ps_full_ms/h1/w0/v0</property>
      <property value="208.559">fsim/tables/ps_full_ms/h1/w0/v1</property>
      <property value="142.563">fsim/tables/ps_full_ms/h1/w0/v10</property>
      <property value="112.532">fsim/tables/ps_full_ms/h1/w0/v11</property>
      <property value="92.3196">fsim/tables/ps_full_ms/h1/w0/v12</property>
      <property value="65.0554">fsim/tables/ps_full_ms/h1/w0/v13</property>
      <property value="26.9982">fsim/tables/ps_full_ms/h1/w0/v14</property>
      <property value="13.1695">fsim/tables/ps_full_ms/h1/w0/v15</property>
      <property value="221.94">fsim/tables/ps_full_ms/h1/w0/v2</property>
      <property value="235.045">fsim/tables/ps_full_ms/h1/w0/v3</property>
      <property value="247.673">fsim/tables/ps_full_ms/h1/w0/v4</property>
      <property value="258.428">fsim/tables/ps_full_ms/h1/w0/v5</property>
      <property value="263.375">fsim/tables/ps_full_ms/h1/w0/v6</property>
      <property value="256.333">fsim/tables/ps_full_ms/h1/w0/v7</property>
      <property value="231.556">fsim/tables/ps_full_ms/h1/w0/v8</property>
      <property value="188.721">fsim/tables/ps_full_ms/h1/w0/v9</property>
      <property value="152.906">fsim/tables/ps_full_ms/h1/w1/v0</property>
      <property value="163.57">fsim/tables/ps_full_ms/h1/w1/v1</property>
      <property value="130.494">fsim/tables/ps_full_ms/h1/w1/v10</property>
      <property value="99.1213">fsim/tables/ps_full_ms/h1/w1/v11</property>
      <property value="81.1046">fsim/tables/ps_full_ms/h1/w1/v12</property>
      <property value="63.2482">fsim/tables/ps_full_ms/h1/w1/v13</property>
      <property value="37.2406">fsim/tables/ps_full_ms/h1/w1/v14</property>
      <property value="11.3229">fsim/tables/ps_full_ms/h1/w1/v15</property>
      <property value="173.865">fsim/tables/ps_full_ms/h1/w1/v2</property>
      <property value="183.856">fsim/tables/ps_full_ms/h1/w1/v3</property>
      <property value="193.654">fsim/tables/ps_full_ms/h1/w1/v4</property>
      <property value="203.009">fsim/tables/ps_full_ms/h1/w1/v5</property>
      <property value="210.044">fsim/tables/ps_full_ms/h1/w1/v6</property>
      <property value="210.088">fsim/tables/ps_full_ms/h1/w1/v7</property>
      <property value="197.356">fsim/tables/ps_full_ms/h1/w1/v8</property>
      <property value="168.316">fsim/tables/ps_full_ms/h1/w1/v9</property>
      <property value="88.8176">fsim/tables/ps_full_ms/h1/w2/v0</property>
      <property value="100.243">fsim/tables/ps_full_ms/h1/w2/v1</property>
      <property value="161.8">fsim/tables/ps_full_ms/h1/w2/v10</property>
      <property value="126.937">fsim/tables/ps_full_ms/h1/w2/v11</property>
      <property value="90.0404">fsim/tables/ps_full_ms/h1/w2/v12</property>
      <property value="67.5686">fsim/tables/ps_full_ms/h1/w2/v13</property>
      <property value="47.6903">fsim/tables/ps_full_ms/h1/w2/v14</property>
      <property value="19.2251">fsim/tables/ps_full_ms/h1/w2/v15</property>
      <property value="110.644">fsim/tables/ps_full_ms/h1/w2/v2</property>
      <property value="120.815">fsim/tables/ps_full_ms/h1/w2/v3</property>
      <property value="131.255">fsim/tables/ps_full_ms/h1/w2/v4</property>
      <property value="142.026">fsim/tables/ps_full_ms/h1/w2/v5</property>
      <property value="152.985">fsim/tables/ps_full_ms/h1/w2/v6</property>
      <property value="163.674">fsim/tables/ps_full_ms/h1/w2/v7</property>
      <property value="172.989">fsim/tables/ps_full_ms/h1/w2/v8</property>
      <property value="175.848">fsim/tables/ps_full_ms/h1/w2/v9</property>
      <property value="155.326">fsim/tables/ps_full_ms/h2/w0/v0</property>
      <property value="168.763">fsim/tables/ps_full_ms/h2/w0/v1</property>
      <property value="77.1507">fsim/tables/ps_full_ms/h2/w0/v10</property>
      <property value="66.1772">fsim/tables/ps_full_ms/h2/w0/v11</property>
      <property value="58.5935">fsim/tables/ps_full_ms/h2/w0/v12</property>
      <property value="51.3393">fsim/tables/ps_full_ms/h2/w0/v13</property>
      <property value="42.5171">fsim/tables/ps_full_ms/h2/w0/v14</property>
      <property value="21.5983">fsim/tables/ps_full_ms/h2/w0/v15</property>
      <property value="181.598">fsim/tables/ps_full_ms/h2/w0/v2</property>
      <property value="193.347">fsim/tables/ps_full_ms/h2/w0/v3</property>
      <property value="200.382">fsim/tables/ps_full_ms/h2/w0/v4</property>
      <property value="194.196">fsim/tables/ps_full_ms/h2/w0/v5</property>
      <property value="169.054">fsim/tables/ps_full_ms/h2/w0/v6</property>
      <property value="137.348">fsim/tables/ps_full_ms/h2/w0/v7</property>
      <property value="118.285">fsim/tables/ps_full_ms/h2/w0/v8</property>
      <property value="101.22">fsim/tables/ps_full_ms/h2/w0/v9</property>
      <property value="56.5165">fsim/tables/ps_full_ms/h2/w1/v0</property>
      <property value="101.93">fsim/tables/ps_full_ms/h2/w1/v1</property>
      <property value="82.6767">fsim/tables/ps_full_ms/h2/w1/v10</property>
      <property value="60.1314">fsim/tables/ps_full_ms/h2/w1/v11</property>
      <property value="46.1871">fsim/tables/ps_full_ms/h2/w1/v12</property>
      <property value="40.0821">fsim/tables/ps_full_ms/h2/w1/v13</property>
      <property value="32.7724">fsim/tables/ps_full_ms/h2/w1/v14</property>
      <property value="17.9329">fsim/tables/ps_full_ms/h2/w1/v15</property>
      <property value="113.065">fsim/tables/ps_full_ms/h2/w1/v2</property>
      <property value="123.605">fsim/tables/ps_full_ms/h2/w1/v3</property>
      <property value="135.645">fsim/tables/ps_full_ms/h2/w1/v4</property>
      <property value="148.183">fsim/tables/ps_full_ms/h2/w1/v5</property>
      <property value="158.329">fsim/tables/ps_full_ms/h2/w1/v6</property>
      <property value="155.548">fsim/tables/ps_full_ms/h2/w1/v7</property>
      <property value="129.251">fsim/tables/ps_full_ms/h2/w1/v8</property>
      <property value="100.303">fsim/tables/ps_full_ms/h2/w1/v9</property>
      <property value="66.7339">fsim/tables/ps_full_ms/h2/w2/v0</property>
      <property value="78.2173">fsim/tables/ps_full_ms/h2/w2/v1</property>
      <property value="68.0015">fsim/tables/ps_full_ms/h2/w2/v10</property>
      <property value="49.307">fsim/tables/ps_full_ms/h2/w2/v11</property>
      <property value="32.517">fsim/tables/ps_full_ms/h2/w2/v12</property>
      <property value="27.5895">fsim/tables/ps_full_ms/h2/w2/v13</property>
      <property value="22.0196">fsim/tables/ps_full_ms/h2/w2/v14</property>
      <property value="14.675">fsim/tables/ps_full_ms/h2/w2/v15</property>
      <property value="88.1079">fsim/tables/ps_full_ms/h2/w2/v2</property>
      <property value="98.3957">fsim/tables/ps_full_ms/h2/w2/v3</property>
      <property value="109.25">fsim/tables/ps_full_ms/h2/w2/v4</property>
      <property value="120.261">fsim/tables/ps_full_ms/h2/w2/v5</property>
      <property value="129.623">fsim/tables/ps_full_ms/h2/w2/v6</property>
      <property value="129.185">fsim/tables/ps_full_ms/h2/w2/v7</property>
      <property value="108.536">fsim/tables/ps_full_ms/h2/w2/v8</property>
      <property value="83.2312">fsim/tables/ps_full_ms/h2/w2/v9</property>
      <property value="125.467">fsim/tables/ps_full_ms/h3/w0/v0</property>
      <property value="136.519">fsim/tables/ps_full_ms/h3/w0/v1</property>
      <property value="74.3463">fsim/tables/ps_full_ms/h3/w0/v10</property>
      <property value="73.2432">fsim/tables/ps_full_ms/h3/w0/v11</property>
      <property value="63.3828">fsim/tables/ps_full_ms/h3/w0/v12</property>
      <property value="50.7846">fsim/tables/ps_full_ms/h3/w0/v13</property>
      <property value="34.8227">fsim/tables/ps_full_ms/h3/w0/v14</property>
      <property value="17.6007">fsim/tables/ps_full_ms/h3/w0/v15</property>
      <property value="144.137">fsim/tables/ps_full_ms/h3/w0/v2</property>
      <property value="141.118">fsim/tables/ps_full_ms/h3/w0/v3</property>
      <property value="124.391">fsim/tables/ps_full_ms/h3/w0/v4</property>
      <property value="108.496">fsim/tables/ps_full_ms/h3/w0/v5</property>
      <property value="97.6696">fsim/tables/ps_full_ms/h3/w0/v6</property>
      <property value="85.2493">fsim/tables/ps_full_ms/h3/w0/v7</property>
      <property value="74.4683">fsim/tables/ps_full_ms/h3/w0/v8</property>
      <property value="75.8298">fsim/tables/ps_full_ms/h3/w0/v9</property>
      <property value="34.8776">fsim/tables/ps_full_ms/h3/w1/v0</property>
      <property value="80.787">fsim/tables/ps_full_ms/h3/w1/v1</property>
      <property value="52.6105">fsim/tables/ps_full_ms/h3/w1/v10</property>
      <property value="52.2914">fsim/tables/ps_full_ms/h3/w1/v11</property>
      <property value="51.7529">fsim/tables/ps_full_ms/h3/w1/v12</property>
      <property value="43.6731">fsim/tables/ps_full_ms/h3/w1/v13</property>
      <property value="30.677">fsim/tables/ps_full_ms/h3/w1/v14</property>
      <property value="14.0936">fsim/tables/ps_full_ms/h3/w1/v15</property>
      <property value="88.1991">fsim/tables/ps_full_ms/h3/w1/v2</property>
      <property value="97.3213">fsim/tables/ps_full_ms/h3/w1/v3</property>
      <property value="106.153">fsim/tables/ps_full_ms/h3/w1/v4</property>
      <property value="112.138">fsim/tables/ps_full_ms/h3/w1/v5</property>
      <property value="102.647">fsim/tables/ps_full_ms/h3/w1/v6</property>
      <property value="85.0539">fsim/tables/ps_full_ms/h3/w1/v7</property>
      <property value="73.2228">fsim/tables/ps_full_ms/h3/w1/v8</property>
      <property value="57.8599">fsim/tables/ps_full_ms/h3/w1/v9</property>
      <property value="47.7687">fsim/tables/ps_full_ms/h3/w2/v0</property>
      <property value="57.6477">fsim/tables/ps_full_ms/h3/w2/v1</property>
      <property value="33.9401">fsim/tables/ps_full_ms/h3/w2/v10</property>
      <property value="36.2893">fsim/tables/ps_full_ms/h3/w2/v11</property>
      <property value="36.7211">fsim/tables/ps_full_ms/h3/w2/v12</property>
      <property value="34.1531">fsim/tables/ps_full_ms/h3/w2/v13</property>
      <property value="24.7795">fsim/tables/ps_full_ms/h3/w2/v14</property>
      <property value="12.7423">fsim/tables/ps_full_ms/h3/w2/v15</property>
      <property value="65.9169">fsim/tables/ps_full_ms/h3/w2/v2</property>
      <property value="75.0103">fsim/tables/ps_full_ms/h3/w2/v3</property>
      <property value="84.4339">fsim/tables/ps_full_ms/h3/w2/v4</property>
      <property value="90.6194">fsim/tables/ps_full_ms/h3/w2/v5</property>
      <property value="83.4011">fsim/tables/ps_full_ms/h3/w2/v6</property>
      <property value="68.8213">fsim/tables/ps_full_ms/h3/w2/v7</property>
      <property value="57.8923">fsim/tables/ps_full_ms/h3/w2/v8</property>
      <property value="44.3294">fsim/tables/ps_full_ms/h3/w2/v9</property>
      <property value="102.804">fsim/tables/ps_full_ms/h4/w0/v0</property>
      <property value="109.931">fsim/tables/ps_full_ms/h4/w0/v1</property>
      <property value="53.9538">fsim/tables/ps_full_ms/h4/w0/v10</property>
      <property value="53.5988">fsim/tables/ps_full_ms/h4/w0/v11</property>
      <property value="46.1127">fsim/tables/ps_full_ms/h4/w0/v12</property>
      <property value="37.0981">fsim/tables/ps_full_ms/h4/w0/v13</property>
      <property value="25.9808">fsim/tables/ps_full_ms/h4/w0/v14</property>
      <property value="13.531">fsim/tables/ps_full_ms/h4/w0/v15</property>
      <property value="109.863">fsim/tables/ps_full_ms/h4/w0/v2</property>
      <property value="99.081">fsim/tables/ps_full_ms/h4/w0/v3</property>
      <property value="85.8818">fsim/tables/ps_full_ms/h4/w0/v4</property>
      <property value="77.1204">fsim/tables/ps_full_ms/h4/w0/v5</property>
      <property value="66.9921">fsim/tables/ps_full_ms/h4/w0/v6</property>
      <property value="53.5962">fsim/tables/ps_full_ms/h4/w0/v7</property>
      <property value="52.9659">fsim/tables/ps_full_ms/h4/w0/v8</property>
      <property value="53.6395">fsim/tables/ps_full_ms/h4/w0/v9</property>
      <property value="27.2752">fsim/tables/ps_full_ms/h4/w1/v0</property>
      <property value="63.1207">fsim/tables/ps_full_ms/h4/w1/v1</property>
      <property value="30.9072">fsim/tables/ps_full_ms/h4/w1/v10</property>
      <property value="33.6344">fsim/tables/ps_full_ms/h4/w1/v11</property>
      <property value="35.0833">fsim/tables/ps_full_ms/h4/w1/v12</property>
      <property value="31.6265">fsim/tables/ps_full_ms/h4/w1/v13</property>
      <property value="22.977">fsim/tables/ps_full_ms/h4/w1/v14</property>
      <property value="11.8614">fsim/tables/ps_full_ms/h4/w1/v15</property>
      <property value="66.7935">fsim/tables/ps_full_ms/h4/w1/v2</property>
      <property value="71.8718">fsim/tables/ps_full_ms/h4/w1/v3</property>
      <property value="79.8523">fsim/tables/ps_full_ms/h4/w1/v4</property>
      <property value="83.3951">fsim/tables/ps_full_ms/h4/w1/v5</property>
      <property value="73.4882">fsim/tables/ps_full_ms/h4/w1/v6</property>
      <property value="60.9769">fsim/tables/ps_full_ms/h4/w1/v7</property>
      <property value="49.8906">fsim/tables/ps_full_ms/h4/w1/v8</property>
      <property value="36.0106">fsim/tables/ps_full_ms/h4/w1/v9</property>
      <property value="33.5227">fsim/tables/ps_full_ms/h4/w2/v0</property>
      <property value="41.4">fsim/tables/ps_full_ms/h4/w2/v1</property>
      <property value="13.5123">fsim/tables/ps_full_ms/h4/w2/v10</property>
      <property value="17.1666">fsim/tables/ps_full_ms/h4/w2/v11</property>
      <property value="19.9687">fsim/tables/ps_full_ms/h4/w2/v12</property>
      <property value="22.1372">fsim/tables/ps_full_ms/h4/w2/v13</property>
      <property value="16.9204">fsim/tables/ps_full_ms/h4/w2/v14</property>
      <property value="9.26024">fsim/tables/ps_full_ms/h4/w2/v15</property>
      <property value="47.4969">fsim/tables/ps_full_ms/h4/w2/v2</property>
      <property value="54.8623">fsim/tables/ps_full_ms/h4/w2/v3</property>
      <property value="62.1818">fsim/tables/ps_full_ms/h4/w2/v4</property>
      <property value="65.1486">fsim/tables/ps_full_ms/h4/w2/v5</property>
      <property value="57.6296">fsim/tables/ps_full_ms/h4/w2/v6</property>
      <property value="47.4016">fsim/tables/ps_full_ms/h4/w2/v7</property>
      <property value="37.0331">fsim/tables/ps_full_ms/h4/w2/v8</property>
      <property value="24.9684">fsim/tables/ps_full_ms/h4/w2/v9</property>
      <property value="43.8893">fsim/tables/ps_full_ms/h5/w0/v0</property>
      <property value="90.4763">fsim/tables/ps_full_ms/h5/w0/v1</property>
      <property value="39.2209">fsim/tables/ps_full_ms/h5/w0/v10</property>
      <property value="40.7712">fsim/tables/ps_full_ms/h5/w0/v11</property>
      <property value="38.8482">fsim/tables/ps_full_ms/h5/w0/v12</property>
      <property value="31.1806">fsim/tables/ps_full_ms/h5/w0/v13</property>
      <property value="21.6029">fsim/tables/ps_full_ms/h5/w0/v14</property>
      <property value="10.2011">fsim/tables/ps_full_ms/h5/w0/v15</property>
      <property value="95.1753">fsim/tables/ps_full_ms/h5/w0/v2</property>
      <property value="98.1708">fsim/tables/ps_full_ms/h5/w0/v3</property>
      <property value="97.2862">fsim/tables/ps_full_ms/h5/w0/v4</property>
      <property value="84.6938">fsim/tables/ps_full_ms/h5/w0/v5</property>
      <property value="73.1641">fsim/tables/ps_full_ms/h5/w0/v6</property>
      <property value="58.1174">fsim/tables/ps_full_ms/h5/w0/v7</property>
      <property value="44.0271">fsim/tables/ps_full_ms/h5/w0/v8</property>
      <property value="37.0567">fsim/tables/ps_full_ms/h5/w0/v9</property>
      <property value="22.4474">fsim/tables/ps_full_ms/h5/w1/v0</property>
      <property value="54.7655">fsim/tables/ps_full_ms/h5/w1/v1</property>
      <property value="20.2162">fsim/tables/ps_full_ms/h5/w1/v10</property>
      <property value="23.9396">fsim/tables/ps_full_ms/h5/w1/v11</property>
      <property value="26.5086">fsim/tables/ps_full_ms/h5/w1/v12</property>
      <property value="25.7977">fsim/tables/ps_full_ms/h5/w1/v13</property>
      <property value="19">fsim/tables/ps_full_ms/h5/w1/v14</property>
      <property value="10.274">fsim/tables/ps_full_ms/h5/w1/v15</property>
      <property value="54.6757">fsim/tables/ps_full_ms/h5/w1/v2</property>
      <property value="60.4333">fsim/tables/ps_full_ms/h5/w1/v3</property>
      <property value="67.8986">fsim/tables/ps_full_ms/h5/w1/v4</property>
      <property value="68.8861">fsim/tables/ps_full_ms/h5/w1/v5</property>
      <property value="58.9413">fsim/tables/ps_full_ms/h5/w1/v6</property>
      <property value="49.1939">fsim/tables/ps_full_ms/h5/w1/v7</property>
      <property value="38.0802">fsim/tables/ps_full_ms/h5/w1/v8</property>
      <property value="24.7929">fsim/tables/ps_full_ms/h5/w1/v9</property>
      <property value="26.6583">fsim/tables/ps_full_ms/h5/w2/v0</property>
      <property value="33.3244">fsim/tables/ps_full_ms/h5/w2/v1</property>
      <property value="2.32375">fsim/tables/ps_full_ms/h5/w2/v10</property>
      <property value="6.13249">fsim/tables/ps_full_ms/h5/w2/v11</property>
      <property value="9.885">fsim/tables/ps_full_ms/h5/w2/v12</property>
      <property value="12.6571">fsim/tables/ps_full_ms/h5/w2/v13</property>
      <property value="12.6182">fsim/tables/ps_full_ms/h5/w2/v14</property>
      <property value="7.37846">fsim/tables/ps_full_ms/h5/w2/v15</property>
      <property value="38.3856">fsim/tables/ps_full_ms/h5/w2/v2</property>
      <property value="44.9268">fsim/tables/ps_full_ms/h5/w2/v3</property>
      <property value="50.8363">fsim/tables/ps_full_ms/h5/w2/v4</property>
      <property value="52.1795">fsim/tables/ps_full_ms/h5/w2/v5</property>
      <property value="45.9188">fsim/tables/ps_full_ms/h5/w2/v6</property>
      <property value="37.6606">fsim/tables/ps_full_ms/h5/w2/v7</property>
      <property value="28.0443">fsim/tables/ps_full_ms/h5/w2/v8</property>
      <property value="16.7374">fsim/tables/ps_full_ms/h5/w2/v9</property>
      <property value="33.0174">fsim/tables/ps_full_ms/h6/w0/v0</property>
      <property value="68.743">fsim/tables/ps_full_ms/h6/w0/v1</property>
      <property value="8.61255">fsim/tables/ps_full_ms/h6/w0/v10</property>
      <property value="13.9287">fsim/tables/ps_full_ms/h6/w0/v11</property>
      <property value="16.509">fsim/tables/ps_full_ms/h6/w0/v12</property>
      <property value="19.8129">fsim/tables/ps_full_ms/h6/w0/v13</property>
      <property value="15.3103">fsim/tables/ps_full_ms/h6/w0/v14</property>
      <property value="8.90437">fsim/tables/ps_full_ms/h6/w0/v15</property>
      <property value="70.5767">fsim/tables/ps_full_ms/h6/w0/v2</property>
      <property value="69.1972">fsim/tables/ps_full_ms/h6/w0/v3</property>
      <property value="66.1252">fsim/tables/ps_full_ms/h6/w0/v4</property>
      <property value="56.7598">fsim/tables/ps_full_ms/h6/w0/v5</property>
      <property value="47.0925">fsim/tables/ps_full_ms/h6/w0/v6</property>
      <property value="34.4915">fsim/tables/ps_full_ms/h6/w0/v7</property>
      <property value="22.0082">fsim/tables/ps_full_ms/h6/w0/v8</property>
      <property value="7.40113">fsim/tables/ps_full_ms/h6/w0/v9</property>
      <property value="12.6289">fsim/tables/ps_full_ms/h6/w1/v0</property>
      <property value="28.3613">fsim/tables/ps_full_ms/h6/w1/v1</property>
      <property value="1.03546">fsim/tables/ps_full_ms/h6/w1/v10</property>
      <property value="2.24885">fsim/tables/ps_full_ms/h6/w1/v11</property>
      <property value="3.46225">fsim/tables/ps_full_ms/h6/w1/v12</property>
      <property value="4.67564">fsim/tables/ps_full_ms/h6/w1/v13</property>
      <property value="5.88903">fsim/tables/ps_full_ms/h6/w1/v14</property>
      <property value="4.41745">fsim/tables/ps_full_ms/h6/w1/v15</property>
      <property value="30.7009">fsim/tables/ps_full_ms/h6/w1/v2</property>
      <property value="36.6541">fsim/tables/ps_full_ms/h6/w1/v3</property>
      <property value="41.4179">fsim/tables/ps_full_ms/h6/w1/v4</property>
      <property value="41.5862">fsim/tables/ps_full_ms/h6/w1/v5</property>
      <property value="36.8897">fsim/tables/ps_full_ms/h6/w1/v6</property>
      <property value="30.5588">fsim/tables/ps_full_ms/h6/w1/v7</property>
      <property value="22.1697">fsim/tables/ps_full_ms/h6/w1/v8</property>
      <property value="11.1727">fsim/tables/ps_full_ms/h6/w1/v9</property>
      <property value="11.2848">fsim/tables/ps_full_ms/h6/w2/v0</property>
      <property value="14.0946">fsim/tables/ps_full_ms/h6/w2/v1</property>
      <property value="26.1104">fsim/tables/ps_full_ms/h6/w2/v10</property>
      <property value="23.6382">fsim/tables/ps_full_ms/h6/w2/v11</property>
      <property value="20.438">fsim/tables/ps_full_ms/h6/w2/v12</property>
      <property value="17.1961">fsim/tables/ps_full_ms/h6/w2/v13</property>
      <property value="13.3113">fsim/tables/ps_full_ms/h6/w2/v14</property>
      <property value="8.90657">fsim/tables/ps_full_ms/h6/w2/v15</property>
      <property value="14.8652">fsim/tables/ps_full_ms/h6/w2/v2</property>
      <property value="17.4657">fsim/tables/ps_full_ms/h6/w2/v3</property>
      <property value="20.3984">fsim/tables/ps_full_ms/h6/w2/v4</property>
      <property value="22.9809">fsim/tables/ps_full_ms/h6/w2/v5</property>
      <property value="25.0026">fsim/tables/ps_full_ms/h6/w2/v6</property>
      <property value="26.7524">fsim/tables/ps_full_ms/h6/w2/v7</property>
      <property value="27.8562">fsim/tables/ps_full_ms/h6/w2/v8</property>
      <property value="27.0672">fsim/tables/ps_full_ms/h6/w2/v9</property>
      <property value="41.3424">fsim/tables/ps_full_ms/h7/w0/v0</property>
      <property value="38.6942">fsim/tables/ps_full_ms/h7/w0/v1</property>
      <property value="1.57171">fsim/tables/ps_full_ms/h7/w0/v10</property>
      <property value="1.79926">fsim/tables/ps_full_ms/h7/w0/v11</property>
      <property value="2.0268">fsim/tables/ps_full_ms/h7/w0/v12</property>
      <property value="2.25434">fsim/tables/ps_full_ms/h7/w0/v13</property>
      <property value="2.48188">fsim/tables/ps_full_ms/h7/w0/v14</property>
      <property value="2.70943">fsim/tables/ps_full_ms/h7/w0/v15</property>
      <property value="36.0459">fsim/tables/ps_full_ms/h7/w0/v2</property>
      <property value="32.1503">fsim/tables/ps_full_ms/h7/w0/v3</property>
      <property value="26.8815">fsim/tables/ps_full_ms/h7/w0/v4</property>
      <property value="21.5206">fsim/tables/ps_full_ms/h7/w0/v5</property>
      <property value="13.1177">fsim/tables/ps_full_ms/h7/w0/v6</property>
      <property value="6.406">fsim/tables/ps_full_ms/h7/w0/v7</property>
      <property value="1.02074">fsim/tables/ps_full_ms/h7/w0/v8</property>
      <property value="1.34417">fsim/tables/ps_full_ms/h7/w0/v9</property>
      <property value="3.32405">fsim/tables/ps_full_ms/h7/w1/v0</property>
      <property value="8.37747">fsim/tables/ps_full_ms/h7/w1/v1</property>
      <property value="19.6231">fsim/tables/ps_full_ms/h7/w1/v10</property>
      <property value="18.0089">fsim/tables/ps_full_ms/h7/w1/v11</property>
      <property value="15.7729">fsim/tables/ps_full_ms/h7/w1/v12</property>
      <property value="13.2132">fsim/tables/ps_full_ms/h7/w1/v13</property>
      <property value="10.5009">fsim/tables/ps_full_ms/h7/w1/v14</property>
      <property value="7.33501">fsim/tables/ps_full_ms/h7/w1/v15</property>
      <property value="11.0494">fsim/tables/ps_full_ms/h7/w1/v2</property>
      <property value="13.4582">fsim/tables/ps_full_ms/h7/w1/v3</property>
      <property value="14.7159">fsim/tables/ps_full_ms/h7/w1/v4</property>
      <property value="16.0305">fsim/tables/ps_full_ms/h7/w1/v5</property>
      <property value="18.7904">fsim/tables/ps_full_ms/h7/w1/v6</property>
      <property value="20.7456">fsim/tables/ps_full_ms/h7/w1/v7</property>
      <property value="20.9728">fsim/tables/ps_full_ms/h7/w1/v8</property>
      <property value="20.2377">fsim/tables/ps_full_ms/h7/w1/v9</property>
      <property value="9.12692">fsim/tables/ps_full_ms/h7/w2/v0</property>
      <property value="8.88251">fsim/tables/ps_full_ms/h7/w2/v1</property>
      <property value="6.68287">fsim/tables/ps_full_ms/h7/w2/v10</property>
      <property value="6.43847">fsim/tables/ps_full_ms/h7/w2/v11</property>
      <property value="6.19406">fsim/tables/ps_full_ms/h7/w2/v12</property>
      <property value="5.94966">fsim/tables/ps_full_ms/h7/w2/v13</property>
      <property value="5.43457">fsim/tables/ps_full_ms/h7/w2/v14</property>
      <property value="4.81957">fsim/tables/ps_full_ms/h7/w2/v15</property>
      <property value="8.63811">fsim/tables/ps_full_ms/h7/w2/v2</property>
      <property value="8.3937">fsim/tables/ps_full_ms/h7/w2/v3</property>
      <property value="8.1493">fsim/tables/ps_full_ms/h7/w2/v4</property>
      <property value="7.90489">fsim/tables/ps_full_ms/h7/w2/v5</property>
      <property value="7.66049">fsim/tables/ps_full_ms/h7/w2/v6</property>
      <property value="7.41609">fsim/tables/ps_full_ms/h7/w2/v7</property>
      <property value="7.17168">fsim/tables/ps_full_ms/h7/w2/v8</property>
      <property value="6.92728">fsim/tables/ps_full_ms/h7/w2/v9</property>
      <property value="-29.4627">fsim/tables/ps_idle_ms/h0/w0/v0</property>
      <property value="-34.4373">fsim/tables/ps_idle_ms/h0/w0/v1</property>
      <property value="-218.432">fsim/tables/ps_idle_ms/h0/w0/v10</property>
      <property value="-310.591">fsim/tables/ps_idle_ms/h0/w0/v11</property>
      <property value="-394.044">fsim/tables/ps_idle_ms/h0/w0/v12</property>
      <property value="-439.141">fsim/tables/ps_idle_ms/h0/w0/v13</property>
      <property value="-472.213">fsim/tables/ps_idle_ms/h0/w0/v14</property>
      <property value="-502.055">fsim/tables/ps_idle_ms/h0/w0/v15</property>
      <property value="-40.186">fsim/tables/ps_idle_ms/h0/w0/v2</property>
      <property value="-46.7895">fsim/tables/ps_idle_ms/h0/w0/v3</property>
      <property value="-54.0499">fsim/tables/ps_idle_ms/h0/w0/v4</property>
      <property value="-61.8622">fsim/tables/ps_idle_ms/h0/w0/v5</property>
      <property value="-71.0532">fsim/tables/ps_idle_ms/h0/w0/v6</property>
      <property value="-83.7252">fsim/tables/ps_idle_ms/h0/w0/v7</property>
      <property value="-104.305">fsim/tables/ps_idle_ms/h0/w0/v8</property>
      <property value="-142.911">fsim/tables/ps_idle_ms/h0/w0/v9</property>
      <property value="-22.7644">fsim/tables/ps_idle_ms/h0/w1/v0</property>
      <property value="-26.6938">fsim/tables/ps_idle_ms/h0/w1/v1</property>
      <property value="-151.003">fsim/tables/ps_idle_ms/h0/w1/v10</property>
      <property value="-224.102">fsim/tables/ps_idle_ms/h0/w1/v11</property>
      <property value="-299.734">fsim/tables/ps_idle_ms/h0/w1/v12</property>
      <property value="-362.219">fsim/tables/ps_idle_ms/h0/w1/v13</property>
      <property value="-390.758">fsim/tables/ps_idle_ms/h0/w1/v14</property>
      <property value="-415.811">fsim/tables/ps_idle_ms/h0/w1/v15</property>
      <property value="-31.042">fsim/tables/ps_idle_ms/h0/w1/v2</property>
      <property value="-35.8291">fsim/tables/ps_idle_ms/h0/w1/v3</property>
      <property value="-41.2526">fsim/tables/ps_idle_ms/h0/w1/v4</property>
      <property value="-47.6628">fsim/tables/ps_idle_ms/h0/w1/v5</property>
      <property value="-54.4522">fsim/tables/ps_idle_ms/h0/w1/v6</property>
      <property value="-63.0279">fsim/tables/ps_idle_ms/h0/w1/v7</property>
      <property value="-76.6629">fsim/tables/ps_idle_ms/h0/w1/v8</property>
      <property value="-100.991">fsim/tables/ps_idle_ms/h0/w1/v9</property>
      <property value="-12.8822">fsim/tables/ps_idle_ms/h0/w2/v0</property>
      <property value="-14.5204">fsim/tables/ps_idle_ms/h0/w2/v1</property>
      <property value="-75.0468">fsim/tables/ps_idle_ms/h0/w2/v10</property>
      <property value="-117.539">fsim/tables/ps_idle_ms/h0/w2/v11</property>
      <property value="-191.591">fsim/tables/ps_idle_ms/h0/w2/v12</property>
      <property value="-270.802">fsim/tables/ps_idle_ms/h0/w2/v13</property>
      <property value="-326.06">fsim/tables/ps_idle_ms/h0/w2/v14</property>
      <property value="-353.406">fsim/tables/ps_idle_ms/h0/w2/v15</property>
      <property value="-16.9021">fsim/tables/ps_idle_ms/h0/w2/v2</property>
      <property value="-20.084">fsim/tables/ps_idle_ms/h0/w2/v3</property>
      <property value="-23.8049">fsim/tables/ps_idle_ms/h0/w2/v4</property>
      <property value="-28.5005">fsim/tables/ps_idle_ms/h0/w2/v5</property>
      <property value="-33.7961">fsim/tables/ps_idle_ms/h0/w2/v6</property>
      <property value="-39.8481">fsim/tables/ps_idle_ms/h0/w2/v7</property>
      <property value="-46.882">fsim/tables/ps_idle_ms/h0/w2/v8</property>
      <property value="-56.125">fsim/tables/ps_idle_ms/h0/w2/v9</property>
      <property value="-23.4357">fsim/tables/ps_idle_ms/h1/w0/v0</property>
      <property value="-27.5908">fsim/tables/ps_idle_ms/h1/w0/v1</property>
      <property value="-279.833">fsim/tables/ps_idle_ms/h1/w0/v10</property>
      <property value="-336.576">fsim/tables/ps_idle_ms/h1/w0/v11</property>
      <property value="-390.212">fsim/tables/ps_idle_ms/h1/w0/v12</property>
      <property value="-436.365">fsim/tables/ps_idle_ms/h1/w0/v13</property>
      <property value="-458.83">fsim/tables/ps_idle_ms/h1/w0/v14</property>
      <property value="-478.2">fsim/tables/ps_idle_ms/h1/w0/v15</property>
      <property value="-32.2725">fsim/tables/ps_idle_ms/h1/w0/v2</property>
      <property value="-37.5542">fsim/tables/ps_idle_ms/h1/w0/v3</property>
      <property value="-43.4321">fsim/tables/ps_idle_ms/h1/w0/v4</property>
      <property value="-50.9385">fsim/tables/ps_idle_ms/h1/w0/v5</property>
      <property value="-63.4743">fsim/tables/ps_idle_ms/h1/w0/v6</property>
      <property value="-90.4508">fsim/tables/ps_idle_ms/h1/w0/v7</property>
      <property value="-145.691">fsim/tables/ps_idle_ms/h1/w0/v8</property>
      <property value="-215.641">fsim/tables/ps_idle_ms/h1/w0/v9</property>
      <property value="-20.8264">fsim/tables/ps_idle_ms/h1/w1/v0</property>
      <property value="-23.662">fsim/tables/ps_idle_ms/h1/w1/v1</property>
      <property value="-198.219">fsim/tables/ps_idle_ms/h1/w1/v10</property>
      <property value="-244.531">fsim/tables/ps_idle_ms/h1/w1/v11</property>
      <property value="-287.032">fsim/tables/ps_idle_ms/h1/w1/v12</property>
      <property value="-329.888">fsim/tables/ps_idle_ms/h1/w1/v13</property>
      <property value="-356.186">fsim/tables/ps_idle_ms/h1/w1/v14</property>
      <property value="-373.576">fsim/tables/ps_idle_ms/h1/w1/v15</property>
      <property value="-26.9446">fsim/tables/ps_idle_ms/h1/w1/v2</property>
      <property value="-30.9486">fsim/tables/ps_idle_ms/h1/w1/v3</property>
      <property value="-35.3907">fsim/tables/ps_idle_ms/h1/w1/v4</property>
      <property value="-40.3403">fsim/tables/ps_idle_ms/h1/w1/v5</property>
      <property value="-46.9815">fsim/tables/ps_idle_ms/h1/w1/v6</property>
      <property value="-61.8975">fsim/tables/ps_idle_ms/h1/w1/v7</property>
      <property value="-95.1445">fsim/tables/ps_idle_ms/h1/w1/v8</property>
      <property value="-144.832">fsim/tables/ps_idle_ms/h1/w1/v9</property>
      <property value="-15.3869">fsim/tables/ps_idle_ms/h1/w2/v0</property>
      <property value="-15.7332">fsim/tables/ps_idle_ms/h1/w2/v1</property>
      <property value="-86.0813">fsim/tables/ps_idle_ms/h1/w2/v10</property>
      <property value="-138.957">fsim/tables/ps_idle_ms/h1/w2/v11</property>
      <property value="-190.62">fsim/tables/ps_idle_ms/h1/w2/v12</property>
      <property value="-232.897">fsim/tables/ps_idle_ms/h1/w2/v13</property>
      <property value="-276.222">fsim/tables/ps_idle_ms/h1/w2/v14</property>
      <property value="-297.251">fsim/tables/ps_idle_ms/h1/w2/v15</property>
      <property value="-16.834">fsim/tables/ps_idle_ms/h1/w2/v2</property>
      <property value="-18.8857">fsim/tables/ps_idle_ms/h1/w2/v3</property>
      <property value="-21.4824">fsim/tables/ps_idle_ms/h1/w2/v4</property>
      <property value="-24.7133">fsim/tables/ps_idle_ms/h1/w2/v5</property>
      <property value="-28.4968">fsim/tables/ps_idle_ms/h1/w2/v6</property>
      <property value="-33.2496">fsim/tables/ps_idle_ms/h1/w2/v7</property>
      <property value="-39.1841">fsim/tables/ps_idle_ms/h1/w2/v8</property>
      <property value="-51.5146">fsim/tables/ps_idle_ms/h1/w2/v9</property>
      <property value="-21.8535">fsim/tables/ps_idle_ms/h2/w0/v0</property>
      <property value="-25.2343">fsim/tables/ps_idle_ms/h2/w0/v1</property>
      <property value="-301.854">fsim/tables/ps_idle_ms/h2/w0/v10</property>
      <property value="-337.8">fsim/tables/ps_idle_ms/h2/w0/v11</property>
      <property value="-368.235">fsim/tables/ps_idle_ms/h2/w0/v12</property>
      <property value="-400.715">fsim/tables/ps_idle_ms/h2/w0/v13</property>
      <property value="-433.277">fsim/tables/ps_idle_ms/h2/w0/v14</property>
      <property value="-450.957">fsim/tables/ps_idle_ms/h2/w0/v15</property>
      <property value="-29.148">fsim/tables/ps_idle_ms/h2/w0/v2</property>
      <property value="-34.3996">fsim/tables/ps_idle_ms/h2/w0/v3</property>
      <property value="-43.8956">fsim/tables/ps_idle_ms/h2/w0/v4</property>
      <property value="-70.5775">fsim/tables/ps_idle_ms/h2/w0/v5</property>
      <property value="-119.012">fsim/tables/ps_idle_ms/h2/w0/v6</property>
      <property value="-170.348">fsim/tables/ps_idle_ms/h2/w0/v7</property>
      <property value="-212.523">fsim/tables/ps_idle_ms/h2/w0/v8</property>
      <property value="-257.449">fsim/tables/ps_idle_ms/h2/w0/v9</property>
      <property value="-17.6282">fsim/tables/ps_idle_ms/h2/w1/v0</property>
      <property value="-17.642">fsim/tables/ps_idle_ms/h2/w1/v1</property>
      <property value="-191.791">fsim/tables/ps_idle_ms/h2/w1/v10</property>
      <property value="-240.525">fsim/tables/ps_idle_ms/h2/w1/v11</property>
      <property value="-277.695">fsim/tables/ps_idle_ms/h2/w1/v12</property>
      <property value="-307.824">fsim/tables/ps_idle_ms/h2/w1/v13</property>
      <property value="-340.223">fsim/tables/ps_idle_ms/h2/w1/v14</property>
      <property value="-360.892">fsim/tables/ps_idle_ms/h2/w1/v15</property>
      <property value="-18.6731">fsim/tables/ps_idle_ms/h2/w1/v2</property>
      <property value="-20.8153">fsim/tables/ps_idle_ms/h2/w1/v3</property>
      <property value="-23.8154">fsim/tables/ps_idle_ms/h2/w1/v4</property>
      <property value="-27.8073">fsim/tables/ps_idle_ms/h2/w1/v5</property>
      <property value="-33.9532">fsim/tables/ps_idle_ms/h2/w1/v6</property>
      <property value="-55.3592">fsim/tables/ps_idle_ms/h2/w1/v7</property>
      <property value="-102.71">fsim/tables/ps_idle_ms/h2/w1/v8</property>
      <property value="-150.752">fsim/tables/ps_idle_ms/h2/w1/v9</property>
      <property value="-19.743">fsim/tables/ps_idle_ms/h2/w2/v0</property>
      <property value="-19.3276">fsim/tables/ps_idle_ms/h2/w2/v1</property>
      <property value="-156.958">fsim/tables/ps_idle_ms/h2/w2/v10</property>
      <property value="-198.122">fsim/tables/ps_idle_ms/h2/w2/v11</property>
      <property value="-231.649">fsim/tables/ps_idle_ms/h2/w2/v12</property>
      <property value="-256.459">fsim/tables/ps_idle_ms/h2/w2/v13</property>
      <property value="-280.746">fsim/tables/ps_idle_ms/h2/w2/v14</property>
      <property value="-297.889">fsim/tables/ps_idle_ms/h2/w2/v15</property>
      <property value="-19.6419">fsim/tables/ps_idle_ms/h2/w2/v2</property>
      <property value="-20.7921">fsim/tables/ps_idle_ms/h2/w2/v3</property>
      <property value="-23.0317">fsim/tables/ps_idle_ms/h2/w2/v4</property>
      <property value="-25.9728">fsim/tables/ps_idle_ms/h2/w2/v5</property>
      <property value="-30.7551">fsim/tables/ps_idle_ms/h2/w2/v6</property>
      <property value="-46.5823">fsim/tables/ps_idle_ms/h2/w2/v7</property>
      <property value="-83.9315">fsim/tables/ps_idle_ms/h2/w2/v8</property>
      <property value="-124.162">fsim/tables/ps_idle_ms/h2/w2/v9</property>
      <property value="-23.288">fsim/tables/ps_idle_ms/h3/w0/v0</property>
      <property value="-25.8413">fsim/tables/ps_idle_ms/h3/w0/v1</property>
      <property value="-243.041">fsim/tables/ps_idle_ms/h3/w0/v10</property>
      <property value="-266.805">fsim/tables/ps_idle_ms/h3/w0/v11</property>
      <property value="-298.77">fsim/tables/ps_idle_ms/h3/w0/v12</property>
      <property value="-335.962">fsim/tables/ps_idle_ms/h3/w0/v13</property>
      <property value="-376.168">fsim/tables/ps_idle_ms/h3/w0/v14</property>
      <property value="-396.473">fsim/tables/ps_idle_ms/h3/w0/v15</property>
      <property value="-31.6648">fsim/tables/ps_idle_ms/h3/w0/v2</property>
      <property value="-50.227">fsim/tables/ps_idle_ms/h3/w0/v3</property>
      <property value="-82.9453">fsim/tables/ps_idle_ms/h3/w0/v4</property>
      <property value="-114.464">fsim/tables/ps_idle_ms/h3/w0/v5</property>
      <property value="-142.594">fsim/tables/ps_idle_ms/h3/w0/v6</property>
      <property value="-176.688">fsim/tables/ps_idle_ms/h3/w0/v7</property>
      <property value="-203.661">fsim/tables/ps_idle_ms/h3/w0/v8</property>
      <property value="-223.26">fsim/tables/ps_idle_ms/h3/w0/v9</property>
      <property value="-23.1101">fsim/tables/ps_idle_ms/h3/w1/v0</property>
      <property value="-22.2453">fsim/tables/ps_idle_ms/h3/w1/v1</property>
      <property value="-177.187">fsim/tables/ps_idle_ms/h3/w1/v10</property>
      <property value="-195.374">fsim/tables/ps_idle_ms/h3/w1/v11</property>
      <property value="-215.399">fsim/tables/ps_idle_ms/h3/w1/v12</property>
      <property value="-245.501">fsim/tables/ps_idle_ms/h3/w1/v13</property>
      <property value="-281.959">fsim/tables/ps_idle_ms/h3/w1/v14</property>
      <property value="-309.887">fsim/tables/ps_idle_ms/h3/w1/v15</property>
      <property value="-22.2739">fsim/tables/ps_idle_ms/h3/w1/v2</property>
      <property value="-23.1665">fsim/tables/ps_idle_ms/h3/w1/v3</property>
      <property value="-25.2827">fsim/tables/ps_idle_ms/h3/w1/v4</property>
      <property value="-31.7912">fsim/tables/ps_idle_ms/h3/w1/v5</property>
      <property value="-57.4738">fsim/tables/ps_idle_ms/h3/w1/v6</property>
      <property value="-90.2898">fsim/tables/ps_idle_ms/h3/w1/v7</property>
      <property value="-118.38">fsim/tables/ps_idle_ms/h3/w1/v8</property>
      <property value="-154.971">fsim/tables/ps_idle_ms/h3/w1/v9</property>
      <property value="-26.0981">fsim/tables/ps_idle_ms/h3/w2/v0</property>
      <property value="-24.7741">fsim/tables/ps_idle_ms/h3/w2/v1</property>
      <property value="-153.25">fsim/tables/ps_idle_ms/h3/w2/v10</property>
      <property value="-164.938">fsim/tables/ps_idle_ms/h3/w2/v11</property>
      <property value="-178.899">fsim/tables/ps_idle_ms/h3/w2/v12</property>
      <property value="-198.441">fsim/tables/ps_idle_ms/h3/w2/v13</property>
      <property value="-225.941">fsim/tables/ps_idle_ms/h3/w2/v14</property>
      <property value="-249.687">fsim/tables/ps_idle_ms/h3/w2/v15</property>
      <property value="-24.3165">fsim/tables/ps_idle_ms/h3/w2/v2</property>
      <property value="-24.4847">fsim/tables/ps_idle_ms/h3/w2/v3</property>
      <property value="-25.4958">fsim/tables/ps_idle_ms/h3/w2/v4</property>
      <property value="-30.1872">fsim/tables/ps_idle_ms/h3/w2/v5</property>
      <property value="-49.7823">fsim/tables/ps_idle_ms/h3/w2/v6</property>
      <property value="-76.1448">fsim/tables/ps_idle_ms/h3/w2/v7</property>
      <property value="-99.7567">fsim/tables/ps_idle_ms/h3/w2/v8</property>
      <property value="-130.136">fsim/tables/ps_idle_ms/h3/w2/v9</property>
      <property value="-24.9498">fsim/tables/ps_idle_ms/h4/w0/v0</property>
      <property value="-28.3541">fsim/tables/ps_idle_ms/h4/w0/v1</property>
      <property value="-198.837">fsim/tables/ps_idle_ms/h4/w0/v10</property>
      <property value="-215.809">fsim/tables/ps_idle_ms/h4/w0/v11</property>
      <property value="-239.147">fsim/tables/ps_idle_ms/h4/w0/v12</property>
      <property value="-265.676">fsim/tables/ps_idle_ms/h4/w0/v13</property>
      <property value="-294.6">fsim/tables/ps_idle_ms/h4/w0/v14</property>
      <property value="-312.859">fsim/tables/ps_idle_ms/h4/w0/v15</property>
      <property value="-39.1231">fsim/tables/ps_idle_ms/h4/w0/v2</property>
      <property value="-60.6261">fsim/tables/ps_idle_ms/h4/w0/v3</property>
      <property value="-84.9089">fsim/tables/ps_idle_ms/h4/w0/v4</property>
      <property value="-106.207">fsim/tables/ps_idle_ms/h4/w0/v5</property>
      <property value="-130.895">fsim/tables/ps_idle_ms/h4/w0/v6</property>
      <property value="-157.892">fsim/tables/ps_idle_ms/h4/w0/v7</property>
      <property value="-172.368">fsim/tables/ps_idle_ms/h4/w0/v8</property>
      <property value="-185.001">fsim/tables/ps_idle_ms/h4/w0/v9</property>
      <property value="-27.2026">fsim/tables/ps_idle_ms/h4/w1/v0</property>
      <property value="-25.8361">fsim/tables/ps_idle_ms/h4/w1/v1</property>
      <property value="-148.764">fsim/tables/ps_idle_ms/h4/w1/v10</property>
      <property value="-159.026">fsim/tables/ps_idle_ms/h4/w1/v11</property>
      <property value="-171.241">fsim/tables/ps_idle_ms/h4/w1/v12</property>
      <property value="-190.705">fsim/tables/ps_idle_ms/h4/w1/v13</property>
      <property value="-216.214">fsim/tables/ps_idle_ms/h4/w1/v14</property>
      <property value="-238.644">fsim/tables/ps_idle_ms/h4/w1/v15</property>
      <property value="-25.2684">fsim/tables/ps_idle_ms/h4/w1/v2</property>
      <property value="-25.3857">fsim/tables/ps_idle_ms/h4/w1/v3</property>
      <property value="-26.5325">fsim/tables/ps_idle_ms/h4/w1/v4</property>
      <property value="-33.9969">fsim/tables/ps_idle_ms/h4/w1/v5</property>
      <property value="-54.5583">fsim/tables/ps_idle_ms/h4/w1/v6</property>
      <property value="-78.5932">fsim/tables/ps_idle_ms/h4/w1/v7</property>
      <property value="-101.9">fsim/tables/ps_idle_ms/h4/w1/v8</property>
      <property value="-132.304">fsim/tables/ps_idle_ms/h4/w1/v9</property>
      <property value="-30.7313">fsim/tables/ps_idle_ms/h4/w2/v0</property>
      <property value="-28.973">fsim/tables/ps_idle_ms/h4/w2/v1</property>
      <property value="-132.534">fsim/tables/ps_idle_ms/h4/w2/v10</property>
      <property value="-138.794">fsim/tables/ps_idle_ms/h4/w2/v11</property>
      <property value="-146.152">fsim/tables/ps_idle_ms/h4/w2/v12</property>
      <property value="-155.497">fsim/tables/ps_idle_ms/h4/w2/v13</property>
      <property value="-173.588">fsim/tables/ps_idle_ms/h4/w2/v14</property>
      <property value="-191.303">fsim/tables/ps_idle_ms/h4/w2/v15</property>
      <property value="-28.0257">fsim/tables/ps_idle_ms/h4/w2/v2</property>
      <property value="-27.6935">fsim/tables/ps_idle_ms/h4/w2/v3</property>
      <property value="-28.3899">fsim/tables/ps_idle_ms/h4/w2/v4</property>
      <property value="-33.8599">fsim/tables/ps_idle_ms/h4/w2/v5</property>
      <property value="-49.0842">fsim/tables/ps_idle_ms/h4/w2/v6</property>
      <property value="-68.2231">fsim/tables/ps_idle_ms/h4/w2/v7</property>
      <property value="-87.6003">fsim/tables/ps_idle_ms/h4/w2/v8</property>
      <property value="-112.413">fsim/tables/ps_idle_ms/h4/w2/v9</property>
      <property value="-24.6663">fsim/tables/ps_idle_ms/h5/w0/v0</property>
      <property value="-24.4855">fsim/tables/ps_idle_ms/h5/w0/v1</property>
      <property value="-166.798">fsim/tables/ps_idle_ms/h5/w0/v10</property>
      <property value="-179.952">fsim/tables/ps_idle_ms/h5/w0/v11</property>
      <property value="-198.62">fsim/tables/ps_idle_ms/h5/w0/v12</property>
      <property value="-224.029">fsim/tables/ps_idle_ms/h5/w0/v13</property>
      <property value="-252.694">fsim/tables/ps_idle_ms/h5/w0/v14</property>
      <property value="-275.069">fsim/tables/ps_idle_ms/h5/w0/v15</property>
      <property value="-25.0772">fsim/tables/ps_idle_ms/h5/w0/v2</property>
      <property value="-27.2566">fsim/tables/ps_idle_ms/h5/w0/v3</property>
      <property value="-36.9558">fsim/tables/ps_idle_ms/h5/w0/v4</property>
      <property value="-59.1147">fsim/tables/ps_idle_ms/h5/w0/v5</property>
      <property value="-83.4051">fsim/tables/ps_idle_ms/h5/w0/v6</property>
      <property value="-107.582">fsim/tables/ps_idle_ms/h5/w0/v7</property>
      <property value="-137.858">fsim/tables/ps_idle_ms/h5/w0/v8</property>
      <property value="-155.809">fsim/tables/ps_idle_ms/h5/w0/v9</property>
      <property value="-29.9616">fsim/tables/ps_idle_ms/h5/w1/v0</property>
      <property value="-28.343">fsim/tables/ps_idle_ms/h5/w1/v1</property>
      <property value="-137.849">fsim/tables/ps_idle_ms/h5/w1/v10</property>
      <property value="-145.251">fsim/tables/ps_idle_ms/h5/w1/v11</property>
      <property value="-153.528">fsim/tables/ps_idle_ms/h5/w1/v12</property>
      <property value="-167.572">fsim/tables/ps_idle_ms/h5/w1/v13</property>
      <property value="-188.42">fsim/tables/ps_idle_ms/h5/w1/v14</property>
      <property value="-207.647">fsim/tables/ps_idle_ms/h5/w1/v15</property>
      <property value="-27.5387">fsim/tables/ps_idle_ms/h5/w1/v2</property>
      <property value="-27.3437">fsim/tables/ps_idle_ms/h5/w1/v3</property>
      <property value="-28.671">fsim/tables/ps_idle_ms/h5/w1/v4</property>
      <property value="-36.7704">fsim/tables/ps_idle_ms/h5/w1/v5</property>
      <property value="-54.925">fsim/tables/ps_idle_ms/h5/w1/v6</property>
      <property value="-75.0313">fsim/tables/ps_idle_ms/h5/w1/v7</property>
      <property value="-96.6642">fsim/tables/ps_idle_ms/h5/w1/v8</property>
      <property value="-124.674">fsim/tables/ps_idle_ms/h5/w1/v9</property>
      <property value="-33.8112">fsim/tables/ps_idle_ms/h5/w2/v0</property>
      <property value="-31.9064">fsim/tables/ps_idle_ms/h5/w2/v1</property>
      <property value="-123.934">fsim/tables/ps_idle_ms/h5/w2/v10</property>
      <property value="-128.359">fsim/tables/ps_idle_ms/h5/w2/v11</property>
      <property value="-132.635">fsim/tables/ps_idle_ms/h5/w2/v12</property>
      <property value="-138.035">fsim/tables/ps_idle_ms/h5/w2/v13</property>
      <property value="-148.499">fsim/tables/ps_idle_ms/h5/w2/v14</property>
      <property value="-162.549">fsim/tables/ps_idle_ms/h5/w2/v15</property>
      <property value="-30.73">fsim/tables/ps_idle_ms/h5/w2/v2</property>
      <property value="-30.1544">fsim/tables/ps_idle_ms/h5/w2/v3</property>
      <property value="-30.8886">fsim/tables/ps_idle_ms/h5/w2/v4</property>
      <property value="-36.3204">fsim/tables/ps_idle_ms/h5/w2/v5</property>
      <property value="-48.4946">fsim/tables/ps_idle_ms/h5/w2/v6</property>
      <property value="-64.1613">fsim/tables/ps_idle_ms/h5/w2/v7</property>
      <property value="-81.2624">fsim/tables/ps_idle_ms/h5/w2/v8</property>
      <property value="-102.27">fsim/tables/ps_idle_ms/h5/w2/v9</property>
      <property value="-29.0344">fsim/tables/ps_idle_ms/h6/w0/v0</property>
      <property value="-28.4191">fsim/tables/ps_idle_ms/h6/w0/v1</property>
      <property value="-136.808">fsim/tables/ps_idle_ms/h6/w0/v10</property>
      <property value="-142.244">fsim/tables/ps_idle_ms/h6/w0/v11</property>
      <property value="-148.479">fsim/tables/ps_idle_ms/h6/w0/v12</property>
      <property value="-156.993">fsim/tables/ps_idle_ms/h6/w0/v13</property>
      <property value="-172.264">fsim/tables/ps_idle_ms/h6/w0/v14</property>
      <property value="-186.719">fsim/tables/ps_idle_ms/h6/w0/v15</property>
      <property value="-28.3659">fsim/tables/ps_idle_ms/h6/w0/v2</property>
      <property value="-29.8328">fsim/tables/ps_idle_ms/h6/w0/v3</property>
      <property value="-36.949">fsim/tables/ps_idle_ms/h6/w0/v4</property>
      <property value="-51.0442">fsim/tables/ps_idle_ms/h6/w0/v5</property>
      <property value="-67.7489">fsim/tables/ps_idle_ms/h6/w0/v6</property>
      <property value="-85.3839">fsim/tables/ps_idle_ms/h6/w0/v7</property>
      <property value="-106.22">fsim/tables/ps_idle_ms/h6/w0/v8</property>
      <property value="-128.858">fsim/tables/ps_idle_ms/h6/w0/v9</property>
      <property value="-35.6513">fsim/tables/ps_idle_ms/h6/w1/v0</property>
      <property value="-33.8481">fsim/tables/ps_idle_ms/h6/w1/v1</property>
      <property value="-113.562">fsim/tables/ps_idle_ms/h6/w1/v10</property>
      <property value="-124.646">fsim/tables/ps_idle_ms/h6/w1/v11</property>
      <property value="-126.016">fsim/tables/ps_idle_ms/h6/w1/v12</property>
      <property value="-129.123">fsim/tables/ps_idle_ms/h6/w1/v13</property>
      <property value="-133.565">fsim/tables/ps_idle_ms/h6/w1/v14</property>
      <property value="-140.038">fsim/tables/ps_idle_ms/h6/w1/v15</property>
      <property value="-32.665">fsim/tables/ps_idle_ms/h6/w1/v2</property>
      <property value="-32.098">fsim/tables/ps_idle_ms/h6/w1/v3</property>
      <property value="-32.7142">fsim/tables/ps_idle_ms/h6/w1/v4</property>
      <property value="-37.551">fsim/tables/ps_idle_ms/h6/w1/v5</property>
      <property value="-47.178">fsim/tables/ps_idle_ms/h6/w1/v6</property>
      <property value="-60.0867">fsim/tables/ps_idle_ms/h6/w1/v7</property>
      <property value="-74.613">fsim/tables/ps_idle_ms/h6/w1/v8</property>
      <property value="-92.2569">fsim/tables/ps_idle_ms/h6/w1/v9</property>
      <property value="-40.2554">fsim/tables/ps_idle_ms/h6/w2/v0</property>
      <property value="-39.0563">fsim/tables/ps_idle_ms/h6/w2/v1</property>
      <property value="-42.4038">fsim/tables/ps_idle_ms/h6/w2/v10</property>
      <property value="-46.1765">fsim/tables/ps_idle_ms/h6/w2/v11</property>
      <property value="-51.7055">fsim/tables/ps_idle_ms/h6/w2/v12</property>
      <property value="-58.2824">fsim/tables/ps_idle_ms/h6/w2/v13</property>
      <property value="-65.9659">fsim/tables/ps_idle_ms/h6/w2/v14</property>
      <property value="-73.223">fsim/tables/ps_idle_ms/h6/w2/v15</property>
      <property value="-38.0715">fsim/tables/ps_idle_ms/h6/w2/v2</property>
      <property value="-37.3198">fsim/tables/ps_idle_ms/h6/w2/v3</property>
      <property value="-36.6839">fsim/tables/ps_idle_ms/h6/w2/v4</property>
      <property value="-36.2929">fsim/tables/ps_idle_ms/h6/w2/v5</property>
      <property value="-36.2016">fsim/tables/ps_idle_ms/h6/w2/v6</property>
      <property value="-36.4335">fsim/tables/ps_idle_ms/h6/w2/v7</property>
      <property value="-37.7701">fsim/tables/ps_idle_ms/h6/w2/v8</property>
      <property value="-39.9551">fsim/tables/ps_idle_ms/h6/w2/v9</property>
      <property value="-35.0713">fsim/tables/ps_idle_ms/h7/w0/v0</property>
      <property value="-39.2674">fsim/tables/ps_idle_ms/h7/w0/v1</property>
      <property value="-126.328">fsim/tables/ps_idle_ms/h7/w0/v10</property>
      <property value="-125.963">fsim/tables/ps_idle_ms/h7/w0/v11</property>
      <property value="-126.483">fsim/tables/ps_idle_ms/h7/w0/v12</property>
      <property value="-128.294">fsim/tables/ps_idle_ms/h7/w0/v13</property>
      <property value="-130.764">fsim/tables/ps_idle_ms/h7/w0/v14</property>
      <property value="-132.036">fsim/tables/ps_idle_ms/h7/w0/v15</property>
      <property value="-45.2814">fsim/tables/ps_idle_ms/h7/w0/v2</property>
      <property value="-52.8314">fsim/tables/ps_idle_ms/h7/w0/v3</property>
      <property value="-60.9884">fsim/tables/ps_idle_ms/h7/w0/v4</property>
      <property value="-70.4048">fsim/tables/ps_idle_ms/h7/w0/v5</property>
      <property value="-81.5737">fsim/tables/ps_idle_ms/h7/w0/v6</property>
      <property value="-93.3552">fsim/tables/ps_idle_ms/h7/w0/v7</property>
      <property value="-106.779">fsim/tables/ps_idle_ms/h7/w0/v8</property>
      <property value="-120.955">fsim/tables/ps_idle_ms/h7/w0/v9</property>
      <property value="-40.8882">fsim/tables/ps_idle_ms/h7/w1/v0</property>
      <property value="-41.236">fsim/tables/ps_idle_ms/h7/w1/v1</property>
      <property value="-42.7897">fsim/tables/ps_idle_ms/h7/w1/v10</property>
      <property value="-45.8225">fsim/tables/ps_idle_ms/h7/w1/v11</property>
      <property value="-50.1311">fsim/tables/ps_idle_ms/h7/w1/v12</property>
      <property value="-55.3807">fsim/tables/ps_idle_ms/h7/w1/v13</property>
      <property value="-61.2223">fsim/tables/ps_idle_ms/h7/w1/v14</property>
      <property value="-66.3072">fsim/tables/ps_idle_ms/h7/w1/v15</property>
      <property value="-40.5322">fsim/tables/ps_idle_ms/h7/w1/v2</property>
      <property value="-39.9607">fsim/tables/ps_idle_ms/h7/w1/v3</property>
      <property value="-39.5379">fsim/tables/ps_idle_ms/h7/w1/v4</property>
      <property value="-39.1742">fsim/tables/ps_idle_ms/h7/w1/v5</property>
      <property value="-38.9558">fsim/tables/ps_idle_ms/h7/w1/v6</property>
      <property value="-38.9456">fsim/tables/ps_idle_ms/h7/w1/v7</property>
      <property value="-39.9353">fsim/tables/ps_idle_ms/h7/w1/v8</property>
      <property value="-40.9932">fsim/tables/ps_idle_ms/h7/w1/v9</property>
      <property value="390.956">fsim/tables/reach_tas_ms/h0/w0</property>
      <property value="389.067">fsim/tables/reach_tas_ms/h0/w1</property>
      <property value="387.213">fsim/tables/reach_tas_ms/h0/w2</property>
      <property value="418.036">fsim/tables/reach_tas_ms/h1/w0</property>
      <property value="407.127">fsim/tables/reach_tas_ms/h1/w1</property>
      <property value="396.774">fsim/tables/reach_tas_ms/h1/w2</property>
      <property value="466.328">fsim/tables/reach_tas_ms/h2/w0</property>
      <property value="459.644">fsim/tables/reach_tas_ms/h2/w1</property>
      <property value="452.154">fsim/tables/reach_tas_ms/h2/w2</property>
      <property value="498.253">fsim/tables/reach_tas_ms/h3/w0</property>
      <property value="486.544">fsim/tables/reach_tas_ms/h3/w1</property>
      <property value="474.267">fsim/tables/reach_tas_ms/h3/w2</property>
      <property value="490.632">fsim/tables/reach_tas_ms/h4/w0</property>
      <property value="473.918">fsim/tables/reach_tas_ms/h4/w1</property>
      <property value="459.262">fsim/tables/reach_tas_ms/h4/w2</property>
      <property value="488.188">fsim/tables/reach_tas_ms/h5/w0</property>
      <property value="468.765">fsim/tables/reach_tas_ms/h5/w1</property>
      <property value="447.096">fsim/tables/reach_tas_ms/h5/w2</property>
      <property value="456.2">fsim/tables/reach_tas_ms/h6/w0</property>
      <property value="344.855">fsim/tables/reach_tas_ms/h6/w1</property>
      <property value="326.014">fsim/tables/reach_tas_ms/h6/w2</property>
      <property value="339.128">fsim/tables/reach_tas_ms/h7/w0</property>
      <property value="318.161">fsim/tables/reach_tas_ms/h7/w1</property>
      <property value="0.0">fsim/tables/speed_fraction/v0</property>
      <property value="0.0666667">fsim/tables/speed_fraction/v1</property>
      <property value="0.666667">fsim/tables/speed_fraction/v10</property>
      <property value="0.733333">fsim/tables/speed_fraction/v11</property>
      <property value="0.8">fsim/tables/speed_fraction/v12</property>
      <property value="0.866667">fsim/tables/speed_fraction/v13</property>
      <property value="0.933333">fsim/tables/speed_fraction/v14</property>
      <property value="1">fsim/tables/speed_fraction/v15</property>
      <property value="0.133333">fsim/tables/speed_fraction/v2</property>
      <property value="0.2">fsim/tables/speed_fraction/v3</property>
      <property value="0.266667">fsim/tables/speed_fraction/v4</property>
      <property value="0.333333">fsim/tables/speed_fraction/v5</property>
      <property value="0.4">fsim/tables/speed_fraction/v6</property>
      <property value="0.466667">fsim/tables/speed_fraction/v7</property>
      <property value="0.533333">fsim/tables/speed_fraction/v8</property>
      <property value="0.6">fsim/tables/speed_fraction/v9</property>
      <property value="61.9768">fsim/tables/stall_cas_ms/h0/w0</property>
      <property value="69.2866">fsim/tables/stall_cas_ms/h0/w1</property>
      <property value="75.8956">fsim/tables/stall_cas_ms/h0/w2</property>
      <property value="62.1091">fsim/tables/stall_cas_ms/h1/w0</property>
      <property value="69.4345">fsim/tables/stall_cas_ms/h1/w1</property>
      <property value="76.0576">fsim/tables/stall_cas_ms/h1/w2</property>
      <property value="62.4809">fsim/tables/stall_cas_ms/h2/w0</property>
      <property value="69.8502">fsim/tables/stall_cas_ms/h2/w1</property>
      <property value="76.5129">fsim/tables/stall_cas_ms/h2/w2</property>
      <property value="63.22">fsim/tables/stall_cas_ms/h3/w0</property>
      <property value="70.6765">fsim/tables/stall_cas_ms/h3/w1</property>
      <property value="77.418">fsim/tables/stall_cas_ms/h3/w2</property>
      <property value="63.6117">fsim/tables/stall_cas_ms/h4/w0</property>
      <property value="71.1143">fsim/tables/stall_cas_ms/h4/w1</property>
      <property value="77.8977">fsim/tables/stall_cas_ms/h4/w2</property>
      <property value="63.8411">fsim/tables/stall_cas_ms/h5/w0</property>
      <property value="71.3708">fsim/tables/stall_cas_ms/h5/w1</property>
      <property value="78.1786">fsim/tables/stall_cas_ms/h5/w2</property>
      <property value="64.1873">fsim/tables/stall_cas_ms/h6/w0</property>
      <property value="71.7579">fsim/tables/stall_cas_ms/h6/w1</property>
      <property value="78.6026">fsim/tables/stall_cas_ms/h6/w2</property>
      <property value="71.1536">fsim/tables/stall_cas_ms/h7/w0</property>
      <property value="79.5457">fsim/tables/stall_cas_ms/h7/w1</property>
      <property value="87.1333">fsim/tables/stall_cas_ms/h7/w2</property>
      <property value="14916">fsim/tables/weight_kg/w0</property>
      <property value="18642">fsim/tables/weight_kg/w1</property>
      <property value="22368">fsim/tables/weight_kg/w2</property>
      <channel name="Pitch (fly-by-wire)">
        <!-- hangar: load factor command, alpha and pitch-rate inner loop (hangar/fcs.py) -->
        <summer name="fcs/pitch-trim-sum">
          <input>fcs/elevator-cmd-norm</input>
          <input>fcs/pitch-trim-cmd-norm</input>
          <clipto> <min>-1</min> <max>1</max> </clipto>
        </summer>
        <!-- the integrators are reset below 60 kt and while a wheel carries weight
             (on the ground, taking off and landing) -->
        <switch name="fcs/fbw/reset">
          <default value="0"/>
          <test logic="OR" value="-1">
            velocities/vc-kts lt 60
            gear/wow gt 0
          </test>
        </switch>
        <fcs_function name="fcs/fbw/k-alpha">
          <function>
            <table>
              <independentVar lookup="row">aero/qbar-psf</independentVar>
              <independentVar lookup="column">velocities/mach</independentVar>
              <tableData>
                       0.150     0.400     0.700     0.900     1.100     1.400     2.000
              10.0  -4.82731  -4.88166  -4.43520  -3.90606  -3.66538  -3.66773  -6.00000
              20.0  -2.48408  -2.60851  -2.38630  -2.14081  -1.63443  -1.50989  -2.73852
              40.0  -1.33282  -1.47474  -1.36271  -1.25868  -0.61911  -0.43107  -0.96546
              80.0  -0.84825  -0.99572  -0.96487  -0.94597  -0.11177   0.11023  -0.07900
             150.0  -0.83404  -1.02056  -1.00277  -0.99009  -0.01577   0.22268   0.36527
             300.0  -0.80400  -0.96207  -0.96458  -0.96103  -0.01005   0.22882   0.41258
             600.0  -0.87771  -0.85196  -0.88514  -0.90342   0.05994   0.30511   0.46510
            1200.0  -1.43228  -0.64608  -0.62804  -0.66295   0.23393   0.52117   0.54537
            2400.0  -3.52817  -0.67930  -0.47349  -0.50418   0.48851   0.80342   0.91678
              </tableData>
            </table>
          </function>
        </fcs_function>
        <fcs_function name="fcs/fbw/k-q">
          <function>
            <table>
              <independentVar lookup="row">aero/qbar-psf</independentVar>
              <independentVar lookup="column">velocities/mach</independentVar>
              <tableData>
                       0.150     0.400     0.700     0.900     1.100     1.400     2.000
              10.0  -3.00000  -3.00000  -3.00000  -3.00000  -3.00000  -3.00000  -3.00000
              20.0  -2.07429  -2.26262  -2.09897  -1.82317  -2.12111  -2.26331  -3.00000
              40.0  -0.86505  -1.06691  -1.01501  -0.88762  -1.04362  -1.11723  -1.86347
              80.0  -0.30152  -0.51880  -0.53562  -0.48386  -0.50487  -0.56541  -0.92056
             150.0  -0.16049  -0.37741  -0.40079  -0.36373  -0.39741  -0.44453  -0.59006
             300.0  -0.00849  -0.23020  -0.26363  -0.24292  -0.27762  -0.31182  -0.43492
             600.0   0.12585  -0.11415  -0.15872  -0.15188  -0.18111  -0.20630  -0.29803
            1200.0   0.26278  -0.00939  -0.05996  -0.06409  -0.09851  -0.11224  -0.20010
            2400.0   0.43452   0.06630   0.00598  -0.00719  -0.03275  -0.04244  -0.09536
              </tableData>
            </table>
          </function>
        </fcs_function>
        <fcs_function name="fcs/fbw/k-ff">
          <function>
            <table>
              <independentVar lookup="row">aero/qbar-psf</independentVar>
              <independentVar lookup="column">velocities/mach</independentVar>
              <tableData>
                       0.150     0.400     0.700     0.900     1.100     1.400     2.000
              10.0  -0.30000  -0.30000  -0.30000  -0.30000  -0.30000  -0.30000  -0.30000
              20.0  -0.30000  -0.30000  -0.30000  -0.30000  -0.30000  -0.30000  -0.30000
              40.0  -0.30000  -0.30000  -0.30000  -0.30000  -0.30000  -0.30000  -0.30000
              80.0  -0.20847  -0.20293  -0.18634  -0.15805  -0.23142  -0.27157  -0.30000
             150.0  -0.12022  -0.11680  -0.10675  -0.09008  -0.14258  -0.16957  -0.26471
             300.0  -0.06182  -0.05991  -0.05434  -0.04559  -0.07601  -0.09013  -0.15594
             600.0  -0.02960  -0.02869  -0.02605  -0.02187  -0.03640  -0.04289  -0.07842
            1200.0  -0.01033  -0.00987  -0.00863  -0.00707  -0.01394  -0.01552  -0.03786
            2400.0  -0.00259  -0.00247  -0.00217  -0.00177  -0.00348  -0.00389  -0.01048
              </tableData>
            </table>
          </function>
        </fcs_function>
        <fcs_function name="fcs/fbw/k-i">
          <function>
            <table>
              <independentVar lookup="row">aero/qbar-psf</independentVar>
              <independentVar lookup="column">velocities/mach</independentVar>
              <tableData>
                       0.150     0.400     0.700     0.900     1.100     1.400     2.000
              10.0  -0.60000  -0.60000  -0.60000  -0.60000  -0.60000  -0.60000  -0.60000
              20.0  -0.60000  -0.60000  -0.60000  -0.60000  -0.60000  -0.60000  -0.60000
              40.0  -0.60000  -0.60000  -0.60000  -0.52098  -0.60000  -0.60000  -0.60000
              80.0  -0.20847  -0.20293  -0.18634  -0.15805  -0.23142  -0.27157  -0.60000
             150.0  -0.12022  -0.11680  -0.10675  -0.09008  -0.14258  -0.16957  -0.26471
             300.0  -0.06182  -0.05991  -0.05434  -0.04559  -0.07601  -0.09013  -0.15594
             600.0  -0.02960  -0.02869  -0.02605  -0.02187  -0.03640  -0.04289  -0.07842
            1200.0  -0.01033  -0.00987  -0.00863  -0.00707  -0.01394  -0.01552  -0.03786
            2400.0  -0.00259  -0.00247  -0.00217  -0.00177  -0.00348  -0.00389  -0.01048
              </tableData>
            </table>
          </function>
        </fcs_function>
        <fcs_function name="fcs/fbw/n-alpha">
          <function>
            <table>
              <independentVar lookup="row">aero/qbar-psf</independentVar>
              <independentVar lookup="column">velocities/mach</independentVar>
              <tableData>
                       0.150     0.400     0.700     0.900     1.100     1.400     2.000
              10.0   1.00000   1.00000   1.00000   1.00000   1.00000   1.00000   1.00000
              20.0   1.00000   1.00000   1.00000   1.00000   1.00000   1.00000   1.00000
              40.0   1.22162   1.23888   1.28706   1.32187   1.10986   1.17166   1.00000
              80.0   2.64629   2.71084   2.88766   3.00752   2.21972   2.44856   1.55547
             150.0   5.63931   5.71524   5.92715   6.08026   5.13871   5.41578   3.45299
             300.0  11.12913  11.31298  11.82607  12.19680  10.01517  10.60270   7.04992
             600.0  24.35669  24.73117  25.77626  26.52882  21.93250  23.27296  14.71776
            1200.0  50.33766  51.07074  53.10617  54.56757  45.59214  48.21618  31.48862
            2400.0 101.64506 103.09459 107.13981 110.06261  92.26169  97.45023  64.37465
              </tableData>
            </table>
          </function>
        </fcs_function>
        <!-- the pitching moment's departures from a straight line through the
             angle-of-attack envelope (+0.388 per rad about the CG), cancelled by the
             elevator: the gains are designed on the line -->
        <fcs_function name="fcs/fbw/moment-comp">
          <function>
            <table>
              <independentVar lookup="row">aero/alpha-rad</independentVar>
              <independentVar lookup="column">velocities/mach</independentVar>
              <tableData>
                       0.150     0.400     0.700     0.900     1.100     1.400     2.000
          -0.17453   0.00419   0.00404   0.00364   0.00314   0.00361   0.00384   0.00630
          -0.15708   0.00451   0.00435   0.00392   0.00338   0.00388   0.00413   0.00678
          -0.13963   0.00467   0.00451   0.00406   0.00350   0.00403   0.00428   0.00703
          -0.12217   0.00601   0.00580   0.00522   0.00450   0.00518   0.00550   0.00904
          -0.10472   0.00672   0.00649   0.00585   0.00504   0.00579   0.00616   0.01012
          -0.08727   0.00960   0.00926   0.00834   0.00719   0.00827   0.00879   0.01444
          -0.06981   0.01045   0.01009   0.00909   0.00783   0.00901   0.00957   0.01572
          -0.05236   0.01081   0.01043   0.00940   0.00810   0.00931   0.00989   0.01626
          -0.03491   0.00640   0.00618   0.00556   0.00479   0.00551   0.00586   0.00963
          -0.01745  -0.00259  -0.00250  -0.00225  -0.00194  -0.00223  -0.00237  -0.00390
           0.00000  -0.01700  -0.01641  -0.01478  -0.01273  -0.01465  -0.01556  -0.02557
           0.01745  -0.02415  -0.02331  -0.02100  -0.01809  -0.02081  -0.02211  -0.03633
           0.03491  -0.02622  -0.02531  -0.02280  -0.01964  -0.02260  -0.02401  -0.03945
           0.05236  -0.02204  -0.02127  -0.01917  -0.01651  -0.01899  -0.02018  -0.03316
           0.06981  -0.01195  -0.01154  -0.01040  -0.00896  -0.01030  -0.01095  -0.01799
           0.08727  -0.00749  -0.00723  -0.00652  -0.00561  -0.00646  -0.00686  -0.01128
           0.10472  -0.00079  -0.00077  -0.00069  -0.00059  -0.00068  -0.00073  -0.00119
           0.12217   0.00177   0.00171   0.00154   0.00132   0.00152   0.00162   0.00266
           0.13963   0.00470   0.00454   0.00409   0.00352   0.00405   0.00431   0.00707
           0.15708   0.00581   0.00560   0.00505   0.00435   0.00500   0.00532   0.00874
           0.17453   0.00691   0.00667   0.00601   0.00517   0.00595   0.00632   0.01039
           0.19199   0.00711   0.00687   0.00619   0.00533   0.00613   0.00651   0.01070
           0.20944   0.00718   0.00693   0.00625   0.00538   0.00619   0.00658   0.01081
           0.22689   0.00655   0.00632   0.00570   0.00491   0.00565   0.00600   0.00986
           0.24435   0.00571   0.00551   0.00496   0.00428   0.00492   0.00523   0.00859
           0.26180   0.00460   0.00444   0.00400   0.00345   0.00397   0.00422   0.00693
           0.27925   0.00329   0.00318   0.00286   0.00247   0.00284   0.00302   0.00496
           0.29671   0.00189   0.00183   0.00165   0.00142   0.00163   0.00173   0.00285
           0.31416   0.00034   0.00033   0.00029   0.00025   0.00029   0.00031   0.00051
           0.33161  -0.00147  -0.00142  -0.00128  -0.00110  -0.00127  -0.00135  -0.00221
           0.34907  -0.00375  -0.00362  -0.00326  -0.00281  -0.00323  -0.00343  -0.00564
              </tableData>
            </table>
          </function>
        </fcs_function>
        <!-- the gravity reference: the load factor that holds the flight path -->
        <fcs_function name="fcs/fbw/g-ref">
          <function>
            <product>
              <cos><property>attitude/theta-rad</property></cos>
              <cos><property>attitude/phi-rad</property></cos>
            </product>
          </function>
        </fcs_function>
        <!-- stick to load factor beyond the gravity reference, aft (negative) to n_max,
             no more than the lift at the angle-of-attack limits gives - beyond the
             gravity reference of the moment, so that full aft stick still reaches
             the limit in a steep climb or inverted - through a 0.2 s prefilter and
             a 12 g/s onset limit (a full pull at once pitches an agile airframe
             faster than its nose-down control can stop at the angle-of-attack
             limit) -->
        <fcs_function name="fcs/fbw/dn-stick">
          <function>
            <max>
              <min>
                <table>
                  <independentVar lookup="row">fcs/pitch-trim-sum</independentVar>
                  <tableData>
                    -1.0  8.000
                     0.0  0.0
                     1.0  -4.000
                  </tableData>
                </table>
                <difference><product><property>fcs/fbw/n-alpha</property><value>0.34907</value></product><property>fcs/fbw/g-ref</property></difference>
              </min>
              <difference><product><property>fcs/fbw/n-alpha</property><value>-0.17453</value></product><property>fcs/fbw/g-ref</property></difference>
            </max>
          </function>
        </fcs_function>
        <lag_filter name="fcs/fbw/dn-lag">
          <input>fcs/fbw/dn-stick</input>
          <c1>5.0</c1>
        </lag_filter>
        <actuator name="fcs/fbw/dn-cmd">
          <input>fcs/fbw/dn-lag</input>
          <rate_limit>12.0</rate_limit>
        </actuator>
        <!-- the response the command should produce (the short period's rise): the
             integrator trims away what differs from it, not the rise itself -->
        <lag_filter name="fcs/fbw/dn-model">
          <input>fcs/fbw/dn-cmd</input>
          <c1>2.5</c1>
        </lag_filter>
        <fcs_function name="fcs/fbw/dn">
          <function>
            <difference><property>accelerations/Nz</property><property>fcs/fbw/g-ref</property></difference>
          </function>
        </fcs_function>
        <!-- the angle of attack with its rise over the next 0.35 s counted as spent
             (the rise, not the pitch rate: in a steady pull the nose turns with the
             flight path and the angle of attack holds), and the load factor the
             angle of attack left to each limit gives -->
        <fcs_function name="fcs/fbw/alpha-ahead">
          <function>
            <sum>
              <property>aero/alpha-rad</property>
              <product><value>0.35</value><property>aero/alphadot-rad_sec</property></product>
            </sum>
          </function>
        </fcs_function>
        <fcs_function name="fcs/fbw/dn-room-up">
          <function>
            <product><property>fcs/fbw/n-alpha</property>
              <difference><value>0.34907</value><property>fcs/fbw/alpha-ahead</property></difference></product>
          </function>
        </fcs_function>
        <fcs_function name="fcs/fbw/dn-room-down">
          <function>
            <product><property>fcs/fbw/n-alpha</property>
              <difference><value>-0.17453</value><property>fcs/fbw/alpha-ahead</property></difference></product>
          </function>
        </fcs_function>
        <!-- the command limited to the load factor the aircraft pulls now plus what
             the angle of attack left gives: at a limit the feedforward asks for the
             load factor the airframe gives there, whatever elevator holds it - a
             steady pull on a stable airframe, a push on an unstable one (a
             feedforward faded out past the limit instead took about 10 deg of
             elevator per deg of alpha, on one side of it only: the actuator's rate
             limit could not follow, and the MiG-29A cycled between 24 and 29 deg) -->
        <fcs_function name="fcs/fbw/dn-limited">
          <function>
            <max>
              <min>
                <property>fcs/fbw/dn-cmd</property>
                <sum><property>fcs/fbw/dn</property><property>fcs/fbw/dn-room-up</property></sum>
              </min>
              <sum><property>fcs/fbw/dn</property><property>fcs/fbw/dn-room-down</property></sum>
            </max>
          </function>
        </fcs_function>
        <!-- the integrator's error: the load factor's departure from the model
             response, and at a limit the angle of attack left, counted five times -
             it trims what the airframe needs there beyond the linear design (vortex
             lift, the tail's power at high alpha) in a fraction of a second, not
             over the pull -->
        <fcs_function name="fcs/fbw/pitch-error">
          <function>
            <max>
              <min>
                <difference><property>fcs/fbw/dn-model</property><property>fcs/fbw/dn</property></difference>
                <product><value>5.0</value><property>fcs/fbw/dn-room-up</property></product>
              </min>
              <product><value>5.0</value><property>fcs/fbw/dn-room-down</property></product>
            </max>
          </function>
        </fcs_function>
        <fcs_function name="fcs/fbw/pitch-error-rate">
          <function><product><property>fcs/fbw/k-i</property><property>fcs/fbw/pitch-error</property></product></function>
        </fcs_function>
        <!-- the integrator: reset below 60 kt and on the wheels, held while the
             elevator is at a stop it would push further into (anti-windup) -->
        <switch name="fcs/fbw/pitch-hold">
          <default value="0"/>
          <test logic="OR" value="-1">
            velocities/vc-kts lt 60
            gear/wow gt 0
          </test>
          <test logic="AND" value="1">
            fcs/fbw/elevator-raw gt 0.52360
            fcs/fbw/pitch-error-rate gt 0
          </test>
          <test logic="AND" value="1">
            fcs/fbw/elevator-raw lt -0.52360
            fcs/fbw/pitch-error-rate lt 0
          </test>
        </switch>
        <integrator name="fcs/fbw/pitch-integral">
          <input>fcs/fbw/pitch-error-rate</input>
          <c1>1.0</c1>
          <trigger>fcs/fbw/pitch-hold</trigger>
          <clipto> <min>-0.5</min> <max>0.5</max> </clipto>
        </integrator>
        <!-- past an angle-of-attack limit (the next 0.35 s counted) a push back
             in proportion, all the travel 4 deg beyond: an unstable airframe
             pitching up fast needs it at once, not when an integrator winds -->
        <fcs_function name="fcs/fbw/alpha-push">
          <function>
            <difference>
              <product><value>7.50000</value>
                <max><value>0</value><difference><property>fcs/fbw/alpha-ahead</property><value>0.34907</value></difference></max></product>
              <product><value>7.50000</value>
                <max><value>0</value><difference><value>-0.17453</value><property>fcs/fbw/alpha-ahead</property></difference></max></product>
            </difference>
          </function>
        </fcs_function>
        <lag_filter name="fcs/fbw/ground">
          <input>gear/wow</input>
          <c1>2.0</c1>
        </lag_filter>
        <fcs_function name="fcs/fbw/ground-direct">
          <function>
            <product>
              <property>fcs/fbw/ground</property>
              <table>
                <independentVar lookup="row">fcs/pitch-trim-sum</independentVar>
                <tableData>
                  -1.0  -0.52360
                   0.0  0.0
                   1.0  0.52360
                </tableData>
              </table>
            </product>
          </function>
        </fcs_function>
        <!-- the elevator: the push, the moment compensation, angle-of-attack and
             pitch-rate feedback, the feedforward of the limited command, the
             integrator, the ground mode's direct stick -->
        <fcs_function name="fcs/fbw/elevator-raw">
          <function>
            <sum>
              <property>fcs/fbw/alpha-push</property>
              <property>fcs/fbw/moment-comp</property>
              <product><value>-1</value><property>fcs/fbw/k-alpha</property><property>aero/alpha-rad</property></product>
              <product><value>-1</value><property>fcs/fbw/k-q</property><property>velocities/q-rad_sec</property></product>
              <product><property>fcs/fbw/k-ff</property><property>fcs/fbw/dn-limited</property></product>
              <property>fcs/fbw/pitch-integral</property>
              <property>fcs/fbw/ground-direct</property>
            </sum>
          </function>
        </fcs_function>
        <pure_gain name="fcs/fbw/elevator">
          <input>fcs/fbw/elevator-raw</input>
          <gain>1.0</gain>
          <clipto> <min>-0.52360</min> <max>0.52360</max> </clipto>
        </pure_gain>
        <!-- full travel in 0.83 s: 60 deg/s for a +-25 deg tail, faster for a
             canard's longer throw -->
        <actuator name="fcs/elevator-actuator">
          <input>fcs/fbw/elevator</input>
          <lag>40</lag>
          <rate_limit>1.262</rate_limit>
          <output>fcs/elevator-pos-rad</output>
        </actuator>
      </channel>
      <channel name="Roll (fly-by-wire)">
        <!-- hangar: roll-rate command about the flight path, limited to what the rudder can
             coordinate; bank hold at neutral stick -->
        <summer name="fcs/roll-trim-sum">
          <input>fcs/aileron-cmd-norm</input>
          <input>fcs/roll-trim-cmd-norm</input>
          <clipto> <min>-1</min> <max>1</max> </clipto>
        </summer>
        <fcs_function name="fcs/fbw/k-roll">
          <function>
            <table>
              <independentVar lookup="row">aero/qbar-psf</independentVar>
              <independentVar lookup="column">velocities/mach</independentVar>
              <tableData>
                       0.150     0.400     0.700     0.900     1.100     1.400     2.000
              10.0   1.50000   1.50000   1.50000   1.50000   1.50000   1.50000   1.50000
              20.0   1.50000   1.50000   1.50000   1.50000   1.50000   1.50000   1.50000
              40.0   1.33285   1.41049   1.34082   1.18868   1.50000   1.50000   1.50000
              80.0   0.55137   0.65490   0.63637   0.56771   1.18692   1.50000   1.50000
             150.0   0.18414   0.30930   0.31896   0.28924   0.59924   0.86337   1.42203
             300.0   0.00000   0.11370   0.13569   0.12706   0.27944   0.40746   0.69921
             600.0   0.00000   0.01435   0.04277   0.04528   0.11130   0.16794   0.32004
            1200.0   0.00000   0.00000   0.00000   0.00708   0.03331   0.05736   0.13572
            2400.0   0.00000   0.00000   0.00000   0.00000   0.00000   0.00440   0.04885
              </tableData>
            </table>
          </function>
        </fcs_function>
        <fcs_function name="fcs/fbw/k-roll-ff">
          <function>
            <table>
              <independentVar lookup="row">aero/qbar-psf</independentVar>
              <independentVar lookup="column">velocities/mach</independentVar>
              <tableData>
                       0.150     0.400     0.700     0.900     1.100     1.400     2.000
              10.0   0.17577   0.06539   0.03622   0.02551   0.03528   0.04161   0.03100
              20.0   0.17577   0.06539   0.03622   0.02551   0.03528   0.04161   0.03100
              40.0   0.17577   0.06539   0.03622   0.02551   0.03528   0.04161   0.03100
              80.0   0.19308   0.07291   0.04196   0.03000   0.03528   0.04357   0.03100
             150.0   0.21284   0.07922   0.04393   0.03096   0.04262   0.05033   0.03729
             300.0   0.21468   0.07980   0.04410   0.03101   0.04319   0.05095   0.03779
             600.0   0.20909   0.07777   0.04304   0.03030   0.04206   0.04954   0.03736
            1200.0   0.20723   0.07709   0.04269   0.03007   0.04164   0.04908   0.03673
            2400.0   0.20717   0.07708   0.04269   0.03007   0.04159   0.04905   0.03653
              </tableData>
            </table>
          </function>
        </fcs_function>
        <fcs_function name="fcs/fbw/k-roll-i">
          <function>
            <table>
              <independentVar lookup="row">aero/qbar-psf</independentVar>
              <independentVar lookup="column">velocities/mach</independentVar>
              <tableData>
                       0.150     0.400     0.700     0.900     1.100     1.400     2.000
              10.0   0.53640   0.52476   0.48961   0.43171   0.86912   1.00000   1.00000
              20.0   0.26820   0.26238   0.24481   0.21586   0.43456   0.61787   0.99052
              40.0   0.13410   0.13119   0.12240   0.10793   0.21728   0.30893   0.49526
              80.0   0.06617   0.06469   0.06030   0.05313   0.10864   0.15313   0.24763
             150.0   0.03529   0.03454   0.03226   0.02846   0.05705   0.08122   0.12972
             300.0   0.01761   0.01720   0.01598   0.01405   0.02868   0.04075   0.06551
             600.0   0.00838   0.00819   0.00763   0.00672   0.01363   0.01933   0.03177
            1200.0   0.00410   0.00401   0.00374   0.00330   0.00666   0.00946   0.01533
            2400.0   0.00206   0.00202   0.00188   0.00166   0.00334   0.00475   0.00759
              </tableData>
            </table>
          </function>
        </fcs_function>
        <fcs_function name="fcs/fbw/p-max">
          <function>
            <table>
              <independentVar lookup="row">aero/qbar-psf</independentVar>
              <independentVar lookup="column">velocities/mach</independentVar>
              <tableData>
                       0.150     0.400     0.700     0.900     1.100     1.400     2.000
              10.0   2.38314   4.18879   4.18879   4.18879   4.18879   4.18879   4.18879
              20.0   2.38314   4.18879   4.18879   4.18879   4.18879   4.18879   4.18879
              40.0   2.38314   4.18879   4.18879   4.18879   4.18879   4.18879   4.18879
              80.0   2.16950   4.18879   4.18879   4.18879   4.18879   4.18879   4.18879
             150.0   1.96806   4.18879   4.18879   4.18879   4.18879   4.18879   4.18879
             300.0   1.95120   4.18879   4.18879   4.18879   4.18879   4.18879   4.18879
             600.0   2.00335   4.18879   4.18879   4.18879   4.18879   4.18879   4.18879
            1200.0   2.02131   4.18879   4.18879   4.18879   4.18879   4.18879   4.18879
            2400.0   2.02189   4.18879   4.18879   4.18879   4.18879   4.18879   4.18879
              </tableData>
            </table>
          </function>
        </fcs_function>
        <!-- the stick's rate halves towards alpha_max -->
        <fcs_function name="fcs/fbw/p-stick">
          <function>
            <product>
              <property>fcs/roll-trim-sum</property>
              <property>fcs/fbw/p-max</property>
              <table>
                <independentVar lookup="row">aero/alpha-rad</independentVar>
                <tableData>
                  0.13963 1.0
                  0.34907 0.5
                </tableData>
              </table>
            </product>
          </function>
        </fcs_function>
        <!-- the rudder's yaw acceleration at full travel (1/s^2), and the yaw damping (1/s) -->
        <fcs_function name="fcs/fbw/yaw-accel">
          <function>
            <table>
              <independentVar lookup="row">aero/qbar-psf</independentVar>
              <independentVar lookup="column">velocities/mach</independentVar>
              <tableData>
                       0.150     0.400     0.700     0.900     1.100     1.400     2.000
              10.0   0.03875   0.03955   0.04205   0.04587   0.02534   0.02076   0.01307
              20.0   0.07751   0.07911   0.08409   0.09174   0.05067   0.04153   0.02613
              40.0   0.15501   0.15821   0.16818   0.18349   0.10135   0.08305   0.05227
              80.0   0.31470   0.32210   0.34514   0.37839   0.20270   0.16747   0.10453
             150.0   0.63351   0.64689   0.68854   0.75185   0.41253   0.33885   0.20550
             300.0   1.28626   1.31309   1.39672   1.52445   0.83958   0.68867   0.42981
             600.0   2.58099   2.63413   2.79995   3.05454   1.68780   1.38297   0.86997
            1200.0   5.15037   5.25638   5.58690   6.09437   3.36815   2.75977   1.73899
            2400.0  10.27191  10.48327  11.14287  12.15588   6.71776   5.50421   3.46917
              </tableData>
            </table>
          </function>
        </fcs_function>
        <fcs_function name="fcs/fbw/yaw-damping">
          <function>
            <table>
              <independentVar lookup="row">aero/qbar-psf</independentVar>
              <independentVar lookup="column">velocities/mach</independentVar>
              <tableData>
                       0.150     0.400     0.700     0.900     1.100     1.400     2.000
              10.0   0.02421   0.00921   0.00547   0.00437   0.00300   0.00249   0.00116
              20.0   0.04842   0.01841   0.01093   0.00873   0.00600   0.00498   0.00231
              40.0   0.09683   0.03682   0.02186   0.01746   0.01200   0.00995   0.00462
              80.0   0.19779   0.07543   0.04510   0.03617   0.02399   0.02012   0.00925
             150.0   0.37376   0.14197   0.08402   0.06697   0.04665   0.03853   0.01812
             300.0   0.70971   0.26967   0.15973   0.12740   0.08845   0.07312   0.03500
             600.0   1.38047   0.52481   0.31127   0.24850   0.17145   0.14201   0.06691
            1200.0   2.73797   1.04113   0.61799   0.49369   0.33947   0.28145   0.13131
            2400.0   5.47982   2.08400   1.23722   0.98833   0.67882   0.56309   0.26150
              </tableData>
            </table>
          </function>
        </fcs_function>
        <!-- the rudder's share of the yaw a roll about the flight path needs, per unit of
             its roll acceleration: sin(alpha), less the ailerons' own yaw and what a
             principal axis inclined to the body axis gives -->
        <fcs_function name="fcs/fbw/roll-yaw-share">
          <function>
            <table>
              <independentVar lookup="row">aero/alpha-rad</independentVar>
              <tableData>
                   -0.34907  -0.37318
                   -0.26180  -0.31220
                   -0.17453  -0.24199
                   -0.08727  -0.15368
                    0.00000  -0.05621
                    0.08727   0.03479
                    0.17453   0.12478
                    0.26180   0.19427
                    0.34907   0.24367
                    0.43633   0.29768
                    0.52360   0.36416
                    0.61087   0.45706
                    0.69813   0.54433
                    0.78540   0.61213
                    0.87266   0.64043
              </tableData>
            </table>
          </function>
        </fcs_function>
        <!-- the yaw acceleration each rad/s of roll rate needs while the aircraft pitches
             under it: the pitch rate's inertia coupling, the angle of attack rising, and
             the yaw damping the roll's yaw rate meets -->
        <fcs_function name="fcs/fbw/p-yaw-need">
          <function>
            <abs>
              <sum>
                <product>
                  <sum>
                    <property>aero/alphadot-rad_sec</property>
                    <product><value>0.62273</value><property>velocities/q-rad_sec</property></product>
                  </sum>
                  <cos><property>aero/alpha-rad</property></cos>
                </product>
                <product><property>fcs/fbw/yaw-damping</property><sin><property>aero/alpha-rad</property></sin></product>
              </sum>
            </abs>
          </function>
        </fcs_function>
        <!-- no more roll rate than 0.5 of the rudder's yaw holds: a roll the rudder cannot
             follow turns the angle of attack into sideslip -->
        <fcs_function name="fcs/fbw/p-yaw-max">
          <function>
            <quotient>
              <product><value>0.5</value><property>fcs/fbw/yaw-accel</property></product>
              <max><value>0.001</value><property>fcs/fbw/p-yaw-need</property></max>
            </quotient>
          </function>
        </fcs_function>
        <fcs_function name="fcs/fbw/p-limited">
          <function>
            <max>
              <min><property>fcs/fbw/p-stick</property><property>fcs/fbw/p-yaw-max</property></min>
              <product><value>-1</value><property>fcs/fbw/p-yaw-max</property></product>
            </max>
          </function>
        </fcs_function>
        <!-- and while the rate grows, no faster roll acceleration than all of it
             coordinates, unless the roll asked for could not leave 2.0 deg of sideslip
             even uncoordinated: at worst c^2 p^2 / (8 Y), c the rudder's share, Y its yaw
             acceleration, p the rate asked for -->
        <fcs_function name="fcs/fbw/p-accel">
          <function>
            <product>
              <quotient>
                <property>fcs/fbw/yaw-accel</property>
                <max><value>0.01</value><abs><property>fcs/fbw/roll-yaw-share</property></abs></max>
              </quotient>
              <max>
                <value>1</value>
                <quotient>
                  <product><value>0.27925</value><property>fcs/fbw/yaw-accel</property></product>
                  <sum>
                    <value>1e-9</value>
                    <product>
                      <property>fcs/fbw/roll-yaw-share</property><property>fcs/fbw/roll-yaw-share</property>
                      <property>fcs/fbw/p-limited</property><property>fcs/fbw/p-limited</property>
                    </product>
                  </sum>
                </quotient>
              </max>
            </product>
          </function>
        </fcs_function>
        <!-- a roll is stopped as fast as the ailerons can -->
        <fcs_function name="fcs/fbw/p-accel-up">
          <function>
            <sum><property>fcs/fbw/p-accel</property>
              <product><value>1000</value><lt><property>fcs/fbw/p-cmd</property><value>0</value></lt></product></sum>
          </function>
        </fcs_function>
        <fcs_function name="fcs/fbw/p-accel-down">
          <function>
            <sum><property>fcs/fbw/p-accel</property>
              <product><value>1000</value><gt><property>fcs/fbw/p-cmd</property><value>0</value></gt></product></sum>
          </function>
        </fcs_function>
        <actuator name="fcs/fbw/p-cmd">
          <input>fcs/fbw/p-limited</input>
          <rate_limit sense="incr">fcs/fbw/p-accel-up</rate_limit>
          <rate_limit sense="decr">fcs/fbw/p-accel-down</rate_limit>
        </actuator>
        <fcs_function name="fcs/fbw/p-stability">
          <function>
            <sum>
              <product><property>velocities/p-rad_sec</property><cos><property>aero/alpha-rad</property></cos></product>
              <product><property>velocities/r-rad_sec</property><sin><property>aero/alpha-rad</property></sin></product>
            </sum>
          </function>
        </fcs_function>
        <fcs_function name="fcs/fbw/roll-error-rate">
          <function>
            <product><property>fcs/fbw/k-roll-i</property>
              <difference><property>fcs/fbw/p-cmd</property><property>fcs/fbw/p-stability</property></difference></product>
          </function>
        </fcs_function>
        <integrator name="fcs/fbw/roll-integral">
          <input>fcs/fbw/roll-error-rate</input>
          <c1>1.0</c1>
          <trigger>fcs/fbw/reset</trigger>
          <clipto> <min>-0.26180</min> <max>0.26180</max> </clipto>
        </integrator>
        <fcs_function name="fcs/fbw/aileron">
          <function>
            <sum>
              <product><property>fcs/fbw/k-roll-ff</property><property>fcs/fbw/p-cmd</property></product>
              <product><property>fcs/fbw/k-roll</property>
                <difference><property>fcs/fbw/p-cmd</property><property>fcs/fbw/p-stability</property></difference></product>
              <property>fcs/fbw/roll-integral</property>
            </sum>
          </function>
          <clipto> <min>-0.52360</min> <max>0.52360</max> </clipto>
        </fcs_function>
        <actuator name="fcs/left-aileron-actuator">
          <input>fcs/fbw/aileron</input>
          <lag>40</lag>
          <rate_limit>1.4</rate_limit>
          <output>fcs/left-aileron-pos-rad</output>
        </actuator>
        <pure_gain name="fcs/right-aileron">
          <input>fcs/left-aileron-pos-rad</input>
          <gain>-1</gain>
          <output>fcs/right-aileron-pos-rad</output>
        </pure_gain>
      </channel>
      <channel name="Yaw (fly-by-wire)">
        <!-- hangar: yaw damper, sideslip feedback, pedals command sideslip -->
        <summer name="fcs/yaw-trim-sum">
          <input>fcs/rudder-cmd-norm</input>
          <input>fcs/yaw-trim-cmd-norm</input>
          <clipto> <min>-1</min> <max>1</max> </clipto>
        </summer>
        <fcs_function name="fcs/fbw/k-yaw-r">
          <function>
            <table>
              <independentVar lookup="row">aero/qbar-psf</independentVar>
              <independentVar lookup="column">velocities/mach</independentVar>
              <tableData>
                       0.150     0.400     0.700     0.900     1.100     1.400     2.000
              10.0  -3.00000  -3.00000  -3.00000  -3.00000  -3.00000  -3.00000  -3.00000
              20.0  -3.00000  -3.00000  -3.00000  -3.00000  -3.00000  -3.00000  -3.00000
              40.0  -3.00000  -3.00000  -3.00000  -3.00000  -3.00000  -3.00000  -3.00000
              80.0  -2.12251  -2.29854  -2.19647  -2.01716  -3.00000  -3.00000  -3.00000
             150.0  -0.83975  -1.06528  -1.05784  -0.98397  -1.82800  -2.23913  -3.00000
             300.0  -0.22172  -0.45349  -0.48193  -0.45636  -0.86146  -1.06358  -1.77032
             600.0   0.00000  -0.15636  -0.20159  -0.19931  -0.39304  -0.49261  -0.84751
            1200.0   0.00000  -0.01086  -0.06542  -0.07578  -0.16120  -0.22602  -0.39700
            2400.0   0.00000   0.00000  -0.01326  -0.02773  -0.07346  -0.11613  -0.20055
              </tableData>
            </table>
          </function>
        </fcs_function>
        <fcs_function name="fcs/fbw/k-yaw-beta">
          <function>
            <table>
              <independentVar lookup="row">aero/qbar-psf</independentVar>
              <independentVar lookup="column">velocities/mach</independentVar>
              <tableData>
                       0.150     0.400     0.700     0.900     1.100     1.400     2.000
              10.0   3.00000   3.00000   3.00000   3.00000   3.00000   3.00000   3.00000
              20.0   3.00000   3.00000   3.00000   3.00000   3.00000   3.00000   3.00000
              40.0   3.00000   3.00000   3.00000   3.00000   3.00000   3.00000   3.00000
              80.0   0.34931   0.32693   0.27905   0.24562   1.00394   0.21491   3.00000
             150.0   0.52172   0.52297   0.51985   0.48049   0.72732   0.65448   0.29527
             300.0   0.32874   0.32507   0.31256   0.28471   0.50233   0.48827   0.79874
             600.0   0.12373   0.12084   0.11231   0.09861   0.20754   0.17275   0.43276
            1200.0   0.00000   0.00000   0.00000   0.00000   0.00937   0.00000   0.10174
            2400.0   0.00000   0.00000   0.00000   0.00000   0.00000   0.00000   0.00000
              </tableData>
            </table>
          </function>
        </fcs_function>
        <fcs_function name="fcs/fbw/k-pedal">
          <function>
            <table>
              <independentVar lookup="row">aero/qbar-psf</independentVar>
              <independentVar lookup="column">velocities/mach</independentVar>
              <tableData>
                       0.150     0.400     0.700     0.900     1.100     1.400     2.000
              10.0   0.00000   0.00000   0.00000   0.00000   0.00000   0.00000   0.00000
              20.0   0.00000   0.00000   0.00000   0.00000   0.00000   0.00000   0.00000
              40.0   0.00000   0.00000   0.00000   0.00000   0.00000   0.00000   0.00000
              80.0   0.00000   0.00000   0.00000   0.00000   0.00000   0.00000   0.00000
             150.0   0.00000   0.00000   0.00000   0.00000   0.00000   0.00000   0.00000
             300.0   0.02510   0.02530   0.02565   0.02500   0.03004   0.04705   0.00793
             600.0   0.03831   0.03803   0.03709   0.03525   0.05182   0.07539   0.06342
            1200.0   0.04068   0.04026   0.03892   0.03675   0.05619   0.08076   0.07871
            2400.0   0.04009   0.03965   0.03828   0.03617   0.05575   0.07982   0.08056
              </tableData>
            </table>
          </function>
        </fcs_function>
        <!-- the yaw damper damps the sideslip's rate, the stability-axis yaw rate less
             the one that coordinates the bank and the side force: in the dutch roll the
             yaw rate itself, and zero in a steady coordinated turn, in a roll about the
             flight path and in a steady sideslip - it coordinates those as long as they
             last (a damper on the washed-out yaw rate stopped coordinating a sustained
             roll, and at low speed the roll turned the angle of attack into sideslip) -->
        <!-- on the wheels (the pitch's ground mode, fcs/fbw/ground) the pedals move the rudder
             directly over its travel, a ground law: the sideslip feedback, there the
             crosswind's, turned the nose into it, and as the C-17A's nose wheel unloaded
             towards its rotation it ran 8.6 m off its line across 10 m/s -->
        <fcs_function name="fcs/fbw/rudder">
          <function>
            <sum>
              <product>
                <difference><value>1</value><property>fcs/fbw/ground</property></difference>
                <sum>
                  <product><property>fcs/fbw/k-pedal</property><property>fcs/yaw-trim-sum</property></product>
                  <product><value>-1</value><property>fcs/fbw/k-yaw-beta</property>
                    <difference><property>aero/beta-rad</property>
                      <product><value>0.17453</value><property>fcs/yaw-trim-sum</property></product></difference></product>
                  <product><property>fcs/fbw/k-yaw-r</property><property>aero/betadot-rad_sec</property></product>
                </sum>
              </product>
              <product><property>fcs/fbw/ground</property><value>0.52360</value><property>fcs/yaw-trim-sum</property></product>
            </sum>
          </function>
          <clipto> <min>-0.52360</min> <max>0.52360</max> </clipto>
        </fcs_function>
        <actuator name="fcs/rudder-actuator">
          <input>fcs/fbw/rudder</input>
          <lag>40</lag>
          <rate_limit>1.4</rate_limit>
          <output>fcs/rudder-pos-rad</output>
        </actuator>
        <!-- the nose wheel steers with the pedals (JSBSim steers from fcs/steer-cmd-norm,
             positive right; the rudder command is positive left) -->
        <pure_gain name="fcs/steer-from-rudder">
          <input>fcs/yaw-trim-sum</input>
          <gain>-1</gain>
          <output>fcs/steer-cmd-norm</output>
        </pure_gain>
      </channel>
      <channel name="Flaps">
        <kinematic name="fcs/flaps-control">
          <input>fcs/flap-cmd-norm</input>
          <traverse>
            <setting> <position>0.0</position> <time>0.0</time> </setting>
            <setting> <position>7.5</position> <time>2.0</time> </setting>
            <setting> <position>15.0</position> <time>2.0</time> </setting>
            <setting> <position>22.5</position> <time>2.0</time> </setting>
            <setting> <position>30.0</position> <time>2.0</time> </setting>
          </traverse>
          <output>fcs/flap-pos-deg</output>
        </kinematic>
        <pure_gain name="fcs/flaps-normalized">
          <input>fcs/flap-pos-deg</input>
          <gain>0.0333333</gain>
          <output>fcs/flap-pos-norm</output>
        </pure_gain>
      </channel>
      <channel name="Speedbrake">
        <kinematic name="fcs/speedbrake-control">
          <input>fcs/speedbrake-cmd-norm</input>
          <traverse>
            <setting> <position>0</position> <time>0</time> </setting>
            <setting> <position>1</position> <time>2.00</time> </setting>
          </traverse>
          <output>fcs/speedbrake-pos-norm</output>
        </kinematic>
        <pure_gain name="fcs/speedbrake-rudder">
          <input>fcs/speedbrake-pos-norm</input>
          <gain>25</gain>
          <output>fcs/speedbrake-rudder-deg</output>
        </pure_gain>
      </channel>
      <channel name="Leading-Edge Flaps">
        <fcs_function name="fcs/lef-schedule">
          <function>
            <sum>
              <product> <value>1.38</value> <property>aero/alpha-deg</property> </product>
              <product> <value>-9.05</value>
                <quotient> <property>aero/qbar-psf</property> <property>atmosphere/P-psf</property> </quotient>
              </product>
              <value>1.45</value>
            </sum>
          </function>
          <clipto> <min>-3</min> <max>30</max> </clipto>
        </fcs_function>
        <actuator name="fcs/lef-actuator">
          <input>fcs/lef-schedule</input>
          <lag>7.35</lag>
          <rate_limit>25</rate_limit>
          <output>fcs/lef-pos-deg</output>
        </actuator>
      </channel>
      <channel name="Throttle 0">
        <fcs_function name="fcs/throttle-lever-0">
          <function>
            <table>
              <independentVar lookup="row">fcs/throttle-cmd-norm[0]</independentVar>
              <tableData>
                0.0  0.0
                0.8  1.0
                1.0  2.0
              </tableData>
            </table>
          </function>
          <output>fcs/throttle-pos-norm[0]</output>
        </fcs_function>
      </channel>
      <channel name="Landing Gear">
        <kinematic name="fcs/gear-control">
          <input>gear/gear-cmd-norm</input>
          <traverse>
            <setting> <position>0</position> <time>0</time> </setting>
            <setting> <position>1</position> <time>5</time> </setting>
          </traverse>
          <output>gear/gear-pos-norm</output>
        </kinematic>
      </channel>
    </flight_control>
    <aerodynamics>
        <function name="aero/function/mach-lift">
          <description>lift, and damping, over its low-speed value (hangar: aero/mach.py)</description>
          <table>
            <independentVar lookup="row">velocities/mach</independentVar>
            <tableData>
                 0.000     1.000000
                 0.300     1.009799
                 0.500     1.028402
                 0.600     1.042040
                 0.700     1.058731
                 0.800     1.077038
                 0.850     1.084598
                 0.900     1.087366
                 0.950     1.065007
                 1.000     1.021205
                 1.050     0.966885
                 1.100     0.912971
                 1.200     0.850061
                 1.400     0.963803
                 1.600     0.818064
                 1.800     0.716243
                 2.000     0.639762
                 2.300     0.552352
                 2.600     0.487485
            </tableData>
          </table>
        </function>
        <function name="aero/function/mach-side">
          <description>side force, rolling and yawing moment over their low-speed values</description>
          <table>
            <independentVar lookup="row">velocities/mach</independentVar>
            <tableData>
                 0.000     1.000000
                 0.300     1.006683
                 0.500     1.019331
                 0.600     1.028674
                 0.700     1.040493
                 0.800     1.055256
                 0.850     1.063816
                 0.900     1.072840
                 0.950     1.048208
                 1.000     1.005956
                 1.050     0.956589
                 1.100     0.910610
                 1.200     0.870831
                 1.400     1.069563
                 1.600     0.885862
                 1.800     0.762808
                 2.000     0.673080
                 2.300     0.574995
                 2.600     0.503555
            </tableData>
          </table>
        </function>
        <function name="aero/function/mach-dCm-dCL">
          <description>pitching moment per unit low-speed lift: the neutral point's move</description>
          <table>
            <independentVar lookup="row">velocities/mach</independentVar>
            <tableData>
                 0.000     0.000000
                 0.300    -0.001774
                 0.500    -0.004798
                 0.600    -0.006520
                 0.700    -0.007482
                 0.800    -0.004694
                 0.850     0.001301
                 0.900     0.015509
                 0.950    -0.025466
                 1.000    -0.088733
                 1.050    -0.157505
                 1.100    -0.218996
                 1.200    -0.293707
                 1.400    -0.278977
                 1.600    -0.266881
                 1.800    -0.254859
                 2.000    -0.244212
                 2.300    -0.231682
                 2.600    -0.221278
            </tableData>
          </table>
        </function>
        <function name="aero/function/mach-dCD0">
          <description>zero-lift drag's change: friction and wave drag</description>
          <table>
            <independentVar lookup="row">velocities/mach</independentVar>
            <tableData>
                 0.000     0.000000
                 0.300    -0.000111
                 0.500    -0.000303
                 0.600    -0.000431
                 0.700    -0.000578
                 0.800    -0.000520
                 0.850     0.000240
                 0.900     0.004843
                 0.950     0.018155
                 1.000     0.032579
                 1.050     0.039282
                 1.100     0.039178
                 1.200     0.038963
                 1.400     0.036808
                 1.600     0.035513
                 1.800     0.034378
                 2.000     0.033336
                 2.300     0.031896
                 2.600     0.030577
            </tableData>
          </table>
        </function>
        <function name="aero/function/mach-dK">
          <description>induced-drag factor's change (per CL^2)</description>
          <table>
            <independentVar lookup="row">velocities/mach</independentVar>
            <tableData>
                 0.000     0.000000
                 0.300     0.002978
                 0.500     0.008400
                 0.600     0.012192
                 0.700     0.016634
                 0.800     0.021271
                 0.850     0.023118
                 0.900     0.023784
                 0.950     0.018251
                 1.000     0.006338
                 1.050     0.001060
                 1.100     0.013887
                 1.200     0.051863
                 1.400     0.068149
                 1.600     0.045447
                 1.800     0.014494
                 2.000    -0.024004
                 2.300    -0.096860
                 2.600    -0.185953
            </tableData>
          </table>
        </function>
        <function name="aero/function/mach-aileron">
          <description>aileron power over its low-speed value</description>
          <table>
            <independentVar lookup="row">velocities/mach</independentVar>
            <tableData>
                 0.000     1.000000
                 0.300     1.014733
                 0.500     1.044683
                 0.600     1.069030
                 0.700     1.103617
                 0.800     1.156240
                 0.850     1.195302
                 0.900     1.251633
                 0.950     1.161482
                 1.000     1.005214
                 1.050     0.814676
                 1.100     0.621715
                 1.200     0.355911
                 1.400     0.437269
                 1.600     0.360505
                 1.800     0.309637
                 2.000     0.272761
                 2.300     0.232625
                 2.600     0.203494
            </tableData>
          </table>
        </function>
        <function name="aero/function/mach-elevator">
          <description>elevator power over its low-speed value</description>
          <table>
            <independentVar lookup="row">velocities/mach</independentVar>
            <tableData>
                 0.000     1.000000
                 0.300     1.024250
                 0.500     1.072795
                 0.600     1.111260
                 0.700     1.163908
                 0.800     1.238376
                 0.850     1.288353
                 0.900     1.351063
                 0.950     1.340511
                 1.000     1.297287
                 1.050     1.236801
                 1.100     1.174460
                 1.200     1.105856
                 1.400     1.105426
                 1.600     0.899744
                 1.800     0.767231
                 2.000     0.672660
                 2.300     0.570949
                 2.600     0.497834
            </tableData>
          </table>
        </function>
        <function name="aero/function/mach-flap">
          <description>flap power over its low-speed value</description>
          <table>
            <independentVar lookup="row">velocities/mach</independentVar>
            <tableData>
                 0.000     1.000000
                 0.300     1.027158
                 0.500     1.083700
                 0.600     1.130825
                 0.700     1.199234
                 0.800     1.305775
                 0.850     1.386348
                 0.900     1.505035
                 0.950     1.414323
                 1.000     1.231371
                 1.050     0.998719
                 1.100     0.758908
                 1.200     0.427968
                 1.400     0.525796
                 1.600     0.433491
                 1.800     0.372325
                 2.000     0.327983
                 2.300     0.279722
                 2.600     0.244693
            </tableData>
          </table>
        </function>
        <function name="aero/function/mach-rudder">
          <description>rudder power over its low-speed value</description>
          <table>
            <independentVar lookup="row">velocities/mach</independentVar>
            <tableData>
                 0.000     1.000000
                 0.300     1.013901
                 0.500     1.041523
                 0.600     1.063196
                 0.700     1.092492
                 0.800     1.132987
                 0.850     1.159427
                 0.900     1.191900
                 0.950     1.110840
                 1.000     0.977760
                 1.050     0.818361
                 1.100     0.658345
                 1.200     0.439264
                 1.400     0.539508
                 1.600     0.446845
                 1.800     0.384775
                 2.000     0.339514
                 2.300     0.290038
                 2.600     0.254003
            </tableData>
          </table>
        </function>
        <function name="aero/function/CL-base">
          <description>CL over alpha and beta at low speed</description>
          <table>
            <independentVar lookup="row">aero/alpha-deg</independentVar>
            <independentVar lookup="column">aero/beta-deg</independentVar>
            <tableData>
                        -90.00    -70.00    -50.00    -40.00    -30.00    -25.00    -20.00    -15.00    -10.00     -6.00     -3.00      0.00      3.00      6.00     10.00     15.00     20.00     25.00     30.00     40.00     50.00     70.00     90.00
             -180.00  -0.00000   0.00000   0.00000   0.00000   0.00000   0.00000   0.00000   0.00000   0.00000   0.00000   0.00000   0.00000   0.00000   0.00000   0.00000   0.00000   0.00000   0.00000   0.00000   0.00000   0.00000   0.00000  -0.00000
             -120.00   0.00000   0.10434   0.31386   0.43127   0.53962   0.58652   0.62624   0.66114   0.68313   0.69556   0.70084   0.70261   0.70084   0.69556   0.68313   0.66114   0.62624   0.58652   0.53962   0.43127   0.31386   0.10434   0.00000
              -70.00  -0.00000  -0.09468  -0.29453  -0.40783  -0.51280  -0.55826  -0.59697  -0.62932  -0.65242  -0.66450  -0.66963  -0.67135  -0.66963  -0.66450  -0.65242  -0.62932  -0.59697  -0.55826  -0.51280  -0.40783  -0.29453  -0.09468  -0.00000
              -46.00  -0.00000  -0.29920  -0.80411  -1.08660  -1.36559  -1.48114  -1.57673  -1.65621  -1.72070  -1.75577  -1.76613  -1.77066  -1.76613  -1.75577  -1.72070  -1.65621  -1.57673  -1.48114  -1.36559  -1.08660  -0.80411  -0.29920  -0.00000
              -32.00  -0.00000  -0.41350  -0.81886  -1.09986  -1.38572  -1.50860  -1.61531  -1.69751  -1.75479  -1.78460  -1.79342  -1.79579  -1.79342  -1.78460  -1.75479  -1.69751  -1.61531  -1.50860  -1.38572  -1.09986  -0.81886  -0.41350  -0.00000
              -22.00  -0.00000  -0.34095  -0.66074  -0.87604  -1.09843  -1.19107  -1.27760  -1.34963  -1.40968  -1.44031  -1.45360  -1.45810  -1.45360  -1.44031  -1.40968  -1.34963  -1.27760  -1.19107  -1.09843  -0.87604  -0.66074  -0.34095  -0.00000
              -17.00  -0.00000  -0.27894  -0.54262  -0.71542  -0.89061  -0.96104  -1.03025  -1.08749  -1.13034  -1.15239  -1.16188  -1.16518  -1.16188  -1.15239  -1.13034  -1.08749  -1.03025  -0.96104  -0.89061  -0.71542  -0.54262  -0.27894  -0.00000
              -13.00  -0.00000  -0.21994  -0.43329  -0.56674  -0.70052  -0.74898  -0.79951  -0.84007  -0.86929  -0.88440  -0.89077  -0.89289  -0.89077  -0.88440  -0.86929  -0.84007  -0.79951  -0.74898  -0.70052  -0.56674  -0.43329  -0.21994  -0.00000
               -9.00  -0.00000  -0.15381  -0.30580  -0.39741  -0.48772  -0.51406  -0.54688  -0.57147  -0.59016  -0.59974  -0.60377  -0.60510  -0.60377  -0.59974  -0.59016  -0.57147  -0.54688  -0.51406  -0.48772  -0.39741  -0.30580  -0.15381  -0.00000
               -5.00  -0.00000  -0.07676  -0.17043  -0.21943  -0.26453  -0.27114  -0.28717  -0.29954  -0.30855  -0.31304  -0.31485  -0.31543  -0.31485  -0.31304  -0.30855  -0.29954  -0.28717  -0.27114  -0.26453  -0.21943  -0.17043  -0.07676  -0.00000
               -1.00  -0.00000   0.00255  -0.00990  -0.01350  -0.01451  -0.01331  -0.00720  -0.00579  -0.00467  -0.00400  -0.00365  -0.00348  -0.00365  -0.00400  -0.00467  -0.00579  -0.00720  -0.01331  -0.01451  -0.01350  -0.00990   0.00255  -0.00000
                3.00   0.00000   0.08081   0.15853   0.20438   0.24828   0.26437   0.27088   0.28618   0.29727   0.30288   0.30515   0.30587   0.30515   0.30288   0.29727   0.28618   0.27088   0.26437   0.24828   0.20438   0.15853   0.08081   0.00000
                7.00   0.00000   0.15715   0.29035   0.37402   0.45519   0.48793   0.50867   0.53605   0.55598   0.56619   0.57045   0.57186   0.57045   0.56619   0.55598   0.53605   0.50867   0.48793   0.45519   0.37402   0.29035   0.15715   0.00000
               11.00   0.00000   0.22397   0.41471   0.53749   0.66192   0.71045   0.75799   0.79855   0.82819   0.84351   0.84998   0.85214   0.84998   0.84351   0.82819   0.79855   0.75799   0.71045   0.66192   0.53749   0.41471   0.22397   0.00000
               15.00   0.00000   0.28410   0.52285   0.68857   0.85838   0.92962   0.99708   1.05475   1.09540   1.11658   1.12553   1.12845   1.12553   1.11658   1.09540   1.05475   0.99708   0.92962   0.85838   0.68857   0.52285   0.28410   0.00000
               19.00   0.00000   0.33590   0.62019   0.82526   1.03473   1.12555   1.20954   1.28439   1.33784   1.36693   1.37993   1.38430   1.37993   1.36693   1.33784   1.28439   1.20954   1.12555   1.03473   0.82526   0.62019   0.33590   0.00000
               23.00   0.00000   0.38040   0.71137   0.95009   1.19451   1.30148   1.39873   1.48055   1.54656   1.58068   1.59580   1.60096   1.59580   1.58068   1.54656   1.48055   1.39873   1.30148   1.19451   0.95009   0.71137   0.38040   0.00000
               27.00   0.00000   0.41414   0.78893   1.05745   1.33125   1.45069   1.55811   1.64833   1.71706   1.74820   1.76163   1.76615   1.76163   1.74820   1.71706   1.64833   1.55811   1.45069   1.33125   1.05745   0.78893   0.41414   0.00000
               32.00   0.00000   0.43986   0.85699   1.15218   1.45260   1.58424   1.69683   1.78763   1.84859   1.88126   1.89045   1.89281   1.89045   1.88126   1.84859   1.78763   1.69683   1.58424   1.45260   1.15218   0.85699   0.43986   0.00000
               46.00   0.00000   0.31678   0.86069   1.16412   1.46329   1.58664   1.68848   1.77354   1.84271   1.88105   1.89607   1.90214   1.89607   1.88105   1.84271   1.77354   1.68848   1.58664   1.46329   1.16412   0.86069   0.31678   0.00000
               70.00   0.00000   0.09475   0.29479   0.40821   0.51330   0.55881   0.59758   0.63003   0.65315   0.66523   0.67037   0.67209   0.67037   0.66523   0.65315   0.63003   0.59758   0.55881   0.51330   0.40821   0.29479   0.09475   0.00000
              120.00  -0.00000  -0.10434  -0.31386  -0.43127  -0.53962  -0.58652  -0.62624  -0.66114  -0.68313  -0.69556  -0.70084  -0.70261  -0.70084  -0.69556  -0.68313  -0.66114  -0.62624  -0.58652  -0.53962  -0.43127  -0.31386  -0.10434  -0.00000
              180.00   0.00000   0.00000   0.00000   0.00000   0.00000   0.00000   0.00000   0.00000   0.00000   0.00000   0.00000   0.00000   0.00000   0.00000   0.00000   0.00000   0.00000   0.00000   0.00000   0.00000   0.00000   0.00000   0.00000
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            </tableData>
          </table>
        </function>
      <axis name="DRAG">
        <function name="aero/coefficient/CD_base">
          <description>CD over alpha and beta (hangar)</description>
          <product>
            <property>aero/qbar-psf</property>
            <property>metrics/Sw-sqft</property>
          <table>
            <independentVar lookup="row">aero/alpha-deg</independentVar>
            <independentVar lookup="column">aero/beta-deg</independentVar>
            <tableData>
                        -90.00    -70.00    -50.00    -40.00    -30.00    -25.00    -20.00    -15.00    -10.00     -6.00     -3.00      0.00      3.00      6.00     10.00     15.00     20.00     25.00     30.00     40.00     50.00     70.00     90.00
             -180.00   0.34754   0.25621   0.13414   0.08436   0.04919   0.03738   0.02910   0.02374   0.01797   0.01901   0.01985   0.02015   0.01985   0.01901   0.01797   0.02374   0.02910   0.03738   0.04919   0.08436   0.13414   0.25621   0.34754
             -120.00   0.34754   0.34819   0.52843   0.69599   0.88503   0.97620   1.05864   1.12794   1.18040   1.20818   1.22009   1.22408   1.22009   1.20818   1.18040   1.12794   1.05864   0.97620   0.88503   0.69599   0.52843   0.34819   0.34754
              -70.00   0.34754   0.41232   0.73950   1.00933   1.30453   1.44493   1.57113   1.67669   1.75619   1.79823   1.81624   1.82228   1.81624   1.79823   1.75619   1.67669   1.57113   1.44493   1.30453   1.00933   0.73950   0.41232   0.34754
              -46.00   0.34754   0.43519   0.74549   0.97982   1.24390   1.36505   1.47109   1.55936   1.62965   1.66723   1.68437   1.68989   1.68437   1.66723   1.62965   1.55936   1.47109   1.36505   1.24390   0.97982   0.74549   0.43519   0.34754
              -32.00   0.34754   0.42359   0.53915   0.63759   0.76620   0.83272   0.88909   0.93414   0.96564   0.98057   0.98543   0.98666   0.98543   0.98057   0.96564   0.93414   0.88909   0.83272   0.76620   0.63759   0.53915   0.42359   0.34754
              -22.00   0.34754   0.38481   0.37842   0.38009   0.40467   0.42258   0.43731   0.45109   0.46481   0.47165   0.47466   0.47567   0.47466   0.47165   0.46481   0.45109   0.43731   0.42258   0.40467   0.38009   0.37842   0.38481   0.34754
              -17.00   0.34754   0.36758   0.31473   0.28242   0.26899   0.26934   0.26791   0.26802   0.26967   0.26956   0.26959   0.26966   0.26959   0.26956   0.26967   0.26802   0.26791   0.26934   0.26899   0.28242   0.31473   0.36758   0.34754
              -13.00   0.34754   0.35651   0.27674   0.22497   0.19071   0.18150   0.17020   0.16351   0.15601   0.15210   0.15045   0.14989   0.15045   0.15210   0.15601   0.16351   0.17020   0.18150   0.19071   0.22497   0.27674   0.35651   0.34754
               -9.00   0.34754   0.34908   0.24977   0.18472   0.13691   0.12214   0.10514   0.09314   0.08201   0.07629   0.07389   0.07309   0.07389   0.07629   0.08201   0.09314   0.10514   0.12214   0.13691   0.18472   0.24977   0.34908   0.34754
               -5.00   0.34754   0.34561   0.23391   0.16119   0.10584   0.08858   0.07176   0.05409   0.04111   0.03450   0.03174   0.03083   0.03174   0.03450   0.04111   0.05409   0.07176   0.08858   0.10584   0.16119   0.23391   0.34561   0.34754
               -1.00   0.34754   0.34440   0.22842   0.15315   0.09538   0.07263   0.05945   0.04070   0.02714   0.02029   0.01748   0.01656   0.01748   0.02029   0.02714   0.04070   0.05945   0.07263   0.09538   0.15315   0.22842   0.34440   0.34754
                3.00   0.34754   0.34471   0.23183   0.15883   0.10386   0.08247   0.07030   0.05236   0.03939   0.03283   0.03011   0.02922   0.03011   0.03283   0.03939   0.05236   0.07030   0.08247   0.10386   0.15883   0.23183   0.34471   0.34754
                7.00   0.34754   0.34688   0.24496   0.17864   0.13033   0.11206   0.10192   0.08642   0.07517   0.06944   0.06704   0.06625   0.06704   0.06944   0.07517   0.08642   0.10192   0.11206   0.13033   0.17864   0.24496   0.34688   0.34754
               11.00   0.34754   0.35236   0.26689   0.21179   0.17496   0.16544   0.15712   0.14597   0.13781   0.13365   0.13190   0.13132   0.13190   0.13365   0.13781   0.14597   0.15712   0.16544   0.17496   0.21179   0.26689   0.35236   0.34754
               15.00   0.34754   0.36200   0.29693   0.25817   0.23908   0.23779   0.23410   0.23412   0.23120   0.22976   0.22916   0.22894   0.22916   0.22976   0.23120   0.23412   0.23410   0.23779   0.23908   0.25817   0.29693   0.36200   0.34754
               19.00   0.34754   0.37469   0.33631   0.31944   0.32349   0.33275   0.33996   0.35119   0.35706   0.36079   0.36270   0.36336   0.36270   0.36079   0.35706   0.35119   0.33996   0.33275   0.32349   0.31944   0.33631   0.37469   0.34754
               23.00   0.34754   0.38950   0.38872   0.40013   0.43560   0.45969   0.48032   0.49924   0.51671   0.52556   0.52962   0.53105   0.52962   0.52556   0.51671   0.49924   0.48032   0.45969   0.43560   0.40013   0.38872   0.38950   0.34754
               27.00   0.34754   0.40540   0.45176   0.49886   0.57334   0.61553   0.65217   0.68495   0.70879   0.71923   0.72359   0.72505   0.72359   0.71923   0.70879   0.68495   0.65217   0.61553   0.57334   0.49886   0.45176   0.40540   0.34754
               32.00   0.34754   0.42562   0.53829   0.63586   0.76502   0.83085   0.89090   0.93794   0.96914   0.98382   0.98818   0.98916   0.98818   0.98382   0.96914   0.93794   0.89090   0.83085   0.76502   0.63586   0.53829   0.42562   0.34754
               46.00   0.34754   0.43882   0.76444   1.00985   1.28516   1.41052   1.52105   1.61450   1.68965   1.72998   1.74788   1.75503   1.74788   1.72998   1.68965   1.61450   1.52105   1.41052   1.28516   1.00985   0.76444   0.43882   0.34754
               70.00   0.34754   0.41232   0.73950   1.00934   1.30453   1.44494   1.57113   1.67670   1.75619   1.79823   1.81624   1.82228   1.81624   1.79823   1.75619   1.67670   1.57113   1.44494   1.30453   1.00934   0.73950   0.41232   0.34754
              120.00   0.34754   0.34819   0.52843   0.69599   0.88503   0.97620   1.05864   1.12794   1.18040   1.20818   1.22009   1.22408   1.22009   1.20818   1.18040   1.12794   1.05864   0.97620   0.88503   0.69599   0.52843   0.34819   0.34754
              180.00   0.34754   0.25621   0.13414   0.08436   0.04919   0.03738   0.02910   0.02374   0.01797   0.01901   0.01985   0.02015   0.01985   0.01901   0.01797   0.02374   0.02910   0.03738   0.04919   0.08436   0.13414   0.25621   0.34754
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            </tableData>
          </table>
          </product>
        </function>
        <function name="aero/coefficient/CD_mach">
          <description>zero-lift drag's change with Mach: friction, wave drag</description>
          <product>
            <property>aero/qbar-psf</property>
            <property>metrics/Sw-sqft</property>
            <property>aero/function/mach-dCD0</property>
          </product>
        </function>
        <function name="aero/coefficient/CD_induced_mach">
          <description>induced drag's change with Mach (leading-edge suction lost)</description>
          <product>
            <property>aero/qbar-psf</property>
            <property>metrics/Sw-sqft</property>
            <property>aero/cl-squared</property>
            <property>aero/function/mach-dK</property>
          </product>
        </function>
        <function name="aero/coefficient/CD_aileron">
          <description>CD increment from aileron (deg), over alpha</description>
          <product>
            <property>aero/qbar-psf</property>
            <property>metrics/Sw-sqft</property>
            <property>aero/function/mach-aileron</property>
          <table>
            <independentVar lookup="row">aero/alpha-deg</independentVar>
            <independentVar lookup="column">fcs/left-aileron-pos-deg</independentVar>
            <tableData>
                        -30.00    -25.00    -20.00    -15.00    -10.00     -5.00      0.00      5.00     10.00     15.00     20.00     25.00     30.00
             -180.00   0.01774   0.01207   0.00796   0.00460   0.00208   0.00052   0.00000   0.00052   0.00208   0.00460   0.00796   0.01207   0.01774
             -120.00   0.01093   0.00788   0.00520   0.00300   0.00135   0.00034   0.00000   0.00034   0.00135   0.00300   0.00520   0.00788   0.01093
              -70.00   0.00869   0.00633   0.00420   0.00243   0.00110   0.00028   0.00000   0.00028   0.00110   0.00243   0.00420   0.00633   0.00869
              -46.00   0.00369   0.00204   0.00080   0.00007  -0.00015  -0.00007   0.00000  -0.00007  -0.00015   0.00007   0.00080   0.00204   0.00369
              -32.00   0.01460   0.00942   0.00516   0.00214   0.00058   0.00007   0.00000   0.00007   0.00058   0.00214   0.00516   0.00942   0.01460
              -22.00   0.03010   0.02278   0.01618   0.01014   0.00486   0.00123   0.00000   0.00123   0.00486   0.01014   0.01618   0.02278   0.03010
              -17.00   0.04091   0.03228   0.02433   0.01657   0.00885   0.00250   0.00000   0.00250   0.00885   0.01657   0.02433   0.03228   0.04091
              -13.00   0.04082   0.03220   0.02426   0.01652   0.00884   0.00250   0.00000   0.00250   0.00884   0.01652   0.02426   0.03220   0.04082
               -9.00   0.03796   0.02911   0.02117   0.01384   0.00712   0.00196   0.00000   0.00196   0.00712   0.01384   0.02117   0.02911   0.03796
               -5.00   0.03742   0.02869   0.02078   0.01344   0.00678   0.00183   0.00000   0.00183   0.00678   0.01344   0.02078   0.02869   0.03742
               -1.00   0.03804   0.02925   0.02126   0.01381   0.00700   0.00190   0.00000   0.00190   0.00700   0.01381   0.02126   0.02925   0.03804
                3.00   0.03679   0.02825   0.02050   0.01329   0.00674   0.00183   0.00000   0.00183   0.00674   0.01329   0.02050   0.02825   0.03679
                7.00   0.03829   0.02974   0.02183   0.01427   0.00722   0.00194   0.00000   0.00194   0.00722   0.01427   0.02183   0.02974   0.03829
               11.00   0.04931   0.04001   0.03093   0.02131   0.01113   0.00298   0.00000   0.00298   0.01113   0.02131   0.03093   0.04001   0.04931
               15.00   0.05913   0.04969   0.04033   0.02990   0.01735   0.00513   0.00000   0.00513   0.01735   0.02990   0.04033   0.04969   0.05913
               19.00   0.06217   0.05271   0.04332   0.03283   0.01999   0.00640   0.00000   0.00640   0.01999   0.03283   0.04332   0.05271   0.06217
               23.00   0.05598   0.04654   0.03723   0.02719   0.01579   0.00487   0.00000   0.00487   0.01579   0.02719   0.03723   0.04654   0.05598
               27.00   0.03843   0.03031   0.02274   0.01515   0.00762   0.00195   0.00000   0.00195   0.00762   0.01515   0.02274   0.03031   0.03843
               32.00   0.02122   0.01492   0.00913   0.00407   0.00063  -0.00027   0.00000  -0.00027   0.00063   0.00407   0.00913   0.01492   0.02122
               46.00  -0.00645  -0.00708  -0.00711  -0.00610  -0.00382  -0.00118   0.00000  -0.00118  -0.00382  -0.00610  -0.00711  -0.00708  -0.00645
               70.00   0.00869   0.00633   0.00420   0.00243   0.00110   0.00028   0.00000   0.00028   0.00110   0.00243   0.00420   0.00633   0.00869
              120.00   0.01093   0.00788   0.00520   0.00300   0.00135   0.00034   0.00000   0.00034   0.00135   0.00300   0.00520   0.00788   0.01093
              180.00   0.01774   0.01207   0.00796   0.00460   0.00208   0.00052   0.00000   0.00052   0.00208   0.00460   0.00796   0.01207   0.01774
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            </tableData>
          </table>
          </product>
        </function>
        <function name="aero/coefficient/CD_elevator">
          <description>CD increment from elevator (deg), over alpha</description>
          <product>
            <property>aero/qbar-psf</property>
            <property>metrics/Sw-sqft</property>
            <property>aero/function/mach-elevator</property>
          <table>
            <independentVar lookup="row">aero/alpha-deg</independentVar>
            <independentVar lookup="column">fcs/elevator-pos-deg</independentVar>
            <tableData>
                        -30.00    -25.00    -20.00    -15.00    -10.00     -5.00      0.00      5.00     10.00     15.00     20.00     25.00     30.00
             -180.00   0.08527   0.06069   0.03948   0.02227   0.00451   0.00067   0.00000   0.00067   0.00451   0.02227   0.03948   0.06069   0.08527
             -120.00  -0.17163  -0.14453  -0.11564  -0.08584  -0.05603  -0.02713   0.00000   0.02453   0.04570   0.06289   0.07556   0.08334   0.08598
              -70.00   0.02993   0.03764   0.04022   0.03759   0.02983   0.01717   0.00000  -0.02116  -0.04567  -0.07278   0.00573   0.15837   0.18978
              -46.00   0.25646   0.22510   0.18879   0.14760   0.10182   0.05231   0.00000  -0.05464  -0.10881  -0.16179  -0.20961  -0.25270  -0.28579
              -32.00   0.35755   0.30169   0.24296   0.18217   0.12040   0.05904   0.00000  -0.05024  -0.09543  -0.13423  -0.16456  -0.19270  -0.21414
              -22.00   0.34716   0.28194   0.21723   0.15429   0.09475   0.04278   0.00000  -0.03695  -0.06540  -0.08735  -0.10359  -0.10995  -0.10207
              -17.00   0.32094   0.25445   0.19069   0.13092   0.07802   0.03575   0.00000  -0.02561  -0.04405  -0.05635  -0.06078  -0.05276  -0.03051
              -13.00   0.29713   0.22941   0.16659   0.11010   0.06333   0.02613   0.00000  -0.01691  -0.02732  -0.03127  -0.02550  -0.00645   0.02667
               -9.00   0.26843   0.20044   0.13955   0.08751   0.04622   0.01713   0.00000  -0.00955  -0.01297  -0.00936   0.00548   0.03418   0.07663
               -5.00   0.23897   0.17195   0.11385   0.06617   0.03110   0.01027   0.00000  -0.00365  -0.00128   0.00883   0.03114   0.06756   0.11751
               -1.00   0.20420   0.13951   0.08547   0.04380   0.01700   0.00427   0.00000   0.00177   0.00984   0.02753   0.05954   0.10597   0.16478
                3.00   0.15437   0.09697   0.05181   0.02070   0.00426  -0.00120   0.00000   0.00709   0.02118   0.04691   0.08692   0.13949   0.20269
                7.00   0.11666   0.06576   0.02760   0.00353  -0.00649  -0.00641   0.00000   0.01219   0.03161   0.06248   0.10570   0.15973   0.22308
               11.00   0.07224   0.02921  -0.00058  -0.01624  -0.01858  -0.01223   0.00000   0.01811   0.04457   0.08218   0.12915   0.18546   0.24899
               15.00   0.02161  -0.01205  -0.03222  -0.03818  -0.03203  -0.01877   0.00000   0.02510   0.05979   0.10190   0.15252   0.21081   0.27359
               19.00  -0.03315  -0.05654  -0.06608  -0.06117  -0.04643  -0.02597   0.00000   0.03344   0.07508   0.12086   0.17624   0.23601   0.29843
               23.00  -0.08971  -0.10228  -0.09957  -0.08382  -0.06055  -0.03382   0.00000   0.04218   0.08705   0.14067   0.19987   0.26146   0.32384
               27.00  -0.14642  -0.14643  -0.13086  -0.10515  -0.07808  -0.04270   0.00000   0.04537   0.09697   0.15609   0.21716   0.27845   0.33887
               32.00  -0.20324  -0.18627  -0.15776  -0.12871  -0.09007  -0.04572   0.00000   0.05258   0.11183   0.17222   0.23203   0.29012   0.34564
               46.00  -0.29042  -0.25716  -0.21329  -0.16575  -0.11363  -0.05687   0.00000   0.05442   0.10584   0.15327   0.19582   0.23317   0.26527
               70.00   0.18843   0.15744   0.00543  -0.07278  -0.04567  -0.02116   0.00000   0.01717   0.02983   0.03759   0.04022   0.03764   0.02993
              120.00   0.08598   0.08334   0.07556   0.06289   0.04570   0.02453   0.00000  -0.02713  -0.05603  -0.08584  -0.11564  -0.14453  -0.17163
              180.00   0.08527   0.06069   0.03948   0.02227   0.00451   0.00067   0.00000   0.00067   0.00451   0.02227   0.03948   0.06069   0.08527
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            </tableData>
          </table>
          </product>
        </function>
        <function name="aero/coefficient/CD_flap">
          <description>CD increment from flap (deg), over alpha</description>
          <product>
            <property>aero/qbar-psf</property>
            <property>metrics/Sw-sqft</property>
            <property>aero/function/mach-flap</property>
          <table>
            <independentVar lookup="row">aero/alpha-deg</independentVar>
            <independentVar lookup="column">fcs/flap-pos-deg</independentVar>
            <tableData>
                        -30.00    -25.00    -20.00    -15.00    -10.00     -5.00      0.00      5.00     10.00     15.00     20.00     25.00     30.00
             -180.00   0.01512   0.01080   0.00707   0.00405   0.00182   0.00046   0.00000   0.00046   0.00182   0.00405   0.00707   0.01080   0.01512
             -120.00   0.01512   0.01080   0.00707   0.00405   0.00182   0.00046   0.00000   0.00046   0.00182   0.00405   0.00707   0.01080   0.01512
              -70.00   0.01512   0.01080   0.00707   0.00405   0.00182   0.00046   0.00000   0.00046   0.00182   0.00405   0.00707   0.01080   0.01512
              -46.00   0.05908   0.05350   0.04751   0.03998   0.02951   0.01569   0.00000  -0.01558  -0.02883  -0.03762  -0.04201  -0.04354  -0.04368
              -32.00   0.06139   0.05400   0.04651   0.03808   0.02753   0.01446   0.00000  -0.01424  -0.02635  -0.03428  -0.03800  -0.03892  -0.03845
              -22.00   0.07392   0.06329   0.05250   0.04032   0.02630   0.01215   0.00000  -0.01006  -0.01810  -0.02326  -0.02541  -0.02543  -0.02429
              -17.00   0.08329   0.07198   0.06026   0.04659   0.03024   0.01340   0.00000  -0.00882  -0.01390  -0.01612  -0.01612  -0.01460  -0.01220
              -13.00   0.07959   0.06903   0.05811   0.04544   0.03011   0.01372   0.00000  -0.00918  -0.01402  -0.01546  -0.01460  -0.01230  -0.00913
               -9.00   0.06521   0.05600   0.04668   0.03619   0.02385   0.01086   0.00000  -0.00714  -0.01037  -0.01024  -0.00778  -0.00379   0.00129
               -5.00   0.04729   0.03952   0.03189   0.02375   0.01481   0.00619   0.00000  -0.00258  -0.00154   0.00204   0.00690   0.01250   0.01881
               -1.00   0.03020   0.02354   0.01727   0.01114   0.00534   0.00108   0.00000   0.00268   0.00836   0.01524   0.02215   0.02905   0.03631
                3.00   0.01206   0.00659   0.00183  -0.00206  -0.00445  -0.00409   0.00000   0.00774   0.01770   0.02760   0.03636   0.04443   0.05258
                7.00  -0.00131  -0.00570  -0.00934  -0.01175  -0.01188  -0.00820   0.00000   0.01195   0.02557   0.03808   0.04852   0.05772   0.06677
               11.00   0.00247  -0.00233  -0.00690  -0.01107  -0.01348  -0.01047   0.00000   0.01599   0.03382   0.04961   0.06228   0.07305   0.08339
               15.00   0.00981   0.00572   0.00179  -0.00226  -0.00661  -0.00801   0.00000   0.01742   0.03856   0.05743   0.07230   0.08463   0.09628
               19.00   0.01348   0.01011   0.00705   0.00422   0.00084  -0.00275   0.00000   0.01458   0.03646   0.05725   0.07372   0.08722   0.09987
               23.00   0.01255   0.00986   0.00764   0.00603   0.00441   0.00151   0.00000   0.00741   0.02474   0.04420   0.06071   0.07462   0.08781
               27.00   0.00537   0.00319   0.00168   0.00130   0.00183   0.00162   0.00000   0.00176   0.01151   0.02558   0.03899   0.05104   0.06294
               32.00  -0.00354  -0.00531  -0.00619  -0.00552  -0.00319  -0.00068   0.00000  -0.00013   0.00321   0.01067   0.01941   0.02817   0.03719
               46.00  -0.01319  -0.01481  -0.01546  -0.01417  -0.01036  -0.00490   0.00000   0.00285   0.00380   0.00419   0.00527   0.00697   0.00922
               70.00   0.01512   0.01080   0.00707   0.00405   0.00182   0.00046   0.00000   0.00046   0.00182   0.00405   0.00707   0.01080   0.01512
              120.00   0.01512   0.01080   0.00707   0.00405   0.00182   0.00046   0.00000   0.00046   0.00182   0.00405   0.00707   0.01080   0.01512
              180.00   0.01512   0.01080   0.00707   0.00405   0.00182   0.00046   0.00000   0.00046   0.00182   0.00405   0.00707   0.01080   0.01512
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            </tableData>
          </table>
          </product>
        </function>
        <function name="aero/coefficient/CD_rudder">
          <description>CD increment from rudder (deg), over alpha</description>
          <product>
            <property>aero/qbar-psf</property>
            <property>metrics/Sw-sqft</property>
            <property>aero/function/mach-rudder</property>
          <table>
            <independentVar lookup="row">aero/alpha-deg</independentVar>
            <independentVar lookup="column">fcs/rudder-pos-deg</independentVar>
            <tableData>
                        -30.00    -25.00    -20.00    -15.00    -10.00     -5.00      0.00      5.00     10.00     15.00     20.00     25.00     30.00
             -180.00   0.00490   0.00350   0.00229   0.00131   0.00059   0.00015   0.00000   0.00015   0.00059   0.00131   0.00229   0.00350   0.00490
             -120.00   0.00097   0.00069   0.00045   0.00026   0.00012   0.00003   0.00000   0.00003   0.00012   0.00026   0.00045   0.00069   0.00097
              -70.00   0.00052   0.00037   0.00024   0.00014   0.00006   0.00002   0.00000   0.00002   0.00006   0.00014   0.00024   0.00037   0.00052
              -46.00   0.00453   0.00354   0.00262   0.00174   0.00091   0.00025   0.00000   0.00025   0.00091   0.00174   0.00262   0.00354   0.00453
              -32.00   0.00717   0.00565   0.00422   0.00281   0.00145   0.00040   0.00000   0.00040   0.00145   0.00281   0.00422   0.00565   0.00717
              -22.00   0.00885   0.00696   0.00518   0.00345   0.00178   0.00049   0.00000   0.00049   0.00178   0.00345   0.00518   0.00696   0.00885
              -17.00   0.00971   0.00763   0.00568   0.00378   0.00195   0.00053   0.00000   0.00053   0.00195   0.00378   0.00568   0.00763   0.00971
              -13.00   0.01001   0.00787   0.00585   0.00389   0.00200   0.00055   0.00000   0.00055   0.00200   0.00389   0.00585   0.00787   0.01001
               -9.00   0.01022   0.00803   0.00597   0.00396   0.00204   0.00056   0.00000   0.00056   0.00204   0.00396   0.00597   0.00803   0.01022
               -5.00   0.01048   0.00823   0.00612   0.00406   0.00209   0.00057   0.00000   0.00057   0.00209   0.00406   0.00612   0.00823   0.01048
               -1.00   0.01062   0.00834   0.00620   0.00411   0.00212   0.00058   0.00000   0.00058   0.00212   0.00411   0.00620   0.00834   0.01062
                3.00   0.01058   0.00831   0.00617   0.00410   0.00211   0.00058   0.00000   0.00058   0.00211   0.00410   0.00617   0.00831   0.01058
                7.00   0.01038   0.00814   0.00605   0.00401   0.00207   0.00056   0.00000   0.00056   0.00207   0.00401   0.00605   0.00814   0.01038
               11.00   0.01002   0.00786   0.00584   0.00387   0.00199   0.00054   0.00000   0.00054   0.00199   0.00387   0.00584   0.00786   0.01002
               15.00   0.00955   0.00748   0.00555   0.00368   0.00189   0.00052   0.00000   0.00052   0.00189   0.00368   0.00555   0.00748   0.00955
               19.00   0.00898   0.00702   0.00520   0.00344   0.00177   0.00048   0.00000   0.00048   0.00177   0.00344   0.00520   0.00702   0.00898
               23.00   0.00845   0.00648   0.00477   0.00315   0.00161   0.00044   0.00000   0.00044   0.00161   0.00315   0.00477   0.00648   0.00845
               27.00   0.00946   0.00740   0.00458   0.00280   0.00143   0.00039   0.00000   0.00039   0.00143   0.00280   0.00458   0.00740   0.00946
               32.00   0.00834   0.00671   0.00511   0.00337   0.00137   0.00034   0.00000   0.00034   0.00137   0.00337   0.00511   0.00671   0.00834
               46.00   0.00779   0.00664   0.00577   0.00525   0.00462   0.00057   0.00000   0.00057   0.00462   0.00525   0.00577   0.00664   0.00779
               70.00   0.00052   0.00037   0.00024   0.00014   0.00006   0.00002   0.00000   0.00002   0.00006   0.00014   0.00024   0.00037   0.00052
              120.00   0.00097   0.00069   0.00045   0.00026   0.00012   0.00003   0.00000   0.00003   0.00012   0.00026   0.00045   0.00069   0.00097
              180.00   0.00490   0.00350   0.00229   0.00131   0.00059   0.00015   0.00000   0.00015   0.00059   0.00131   0.00229   0.00350   0.00490
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            </tableData>
          </table>
          </product>
        </function>
        <function name="aero/coefficient/CD_ground">
          <description>Induced drag change in ground effect</description>
          <product>
            <property>aero/qbar-psf</property>
            <property>metrics/Sw-sqft</property>
            <property>aero/cl-squared</property>
            <value>0.14034</value>
          <table>
            <independentVar lookup="row">aero/h_b-mac-ft</independentVar>
            <tableData>
                    0.00   -1.00000
                    0.10   -0.28090
                    0.20   -0.08897
                    0.40   -0.02383
                    0.60   -0.01073
                    0.80   -0.00607
                    1.00   -0.00389
                    1.10   -0.00322
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            </tableData>
          </table>
          </product>
        </function>
        <function name="aero/coefficient/CD_surfaces_rudder">
          <description>surfaces: the drag of its rudder deflected 25 deg at the full speedbrake, its forces cancelling (hangar)</description>
          <product>
            <property>aero/qbar-psf</property>
            <property>metrics/Sw-sqft</property>
            <table>
              <independentVar lookup="row">aero/alpha-deg</independentVar>
              <independentVar lookup="column">fcs/speedbrake-rudder-deg</independentVar>
              <tableData>
                          -30.00    -25.00    -20.00    -15.00    -10.00     -5.00      0.00      5.00     10.00     15.00     20.00     25.00     30.00
               -180.00   0.00490   0.00350   0.00229   0.00131   0.00059   0.00015   0.00000   0.00015   0.00059   0.00131   0.00229   0.00350   0.00490
                -35.00   0.00640   0.00506   0.00378   0.00252   0.00130   0.00036   0.00000   0.00036   0.00130   0.00252   0.00378   0.00506   0.00640
                -11.00   0.01012   0.00795   0.00591   0.00392   0.00202   0.00055   0.00000   0.00055   0.00202   0.00392   0.00591   0.00795   0.01012
                  4.00   0.01054   0.00828   0.00615   0.00408   0.00210   0.00057   0.00000   0.00057   0.00210   0.00408   0.00615   0.00828   0.01054
                 19.00   0.00898   0.00702   0.00520   0.00344   0.00177   0.00048   0.00000   0.00048   0.00177   0.00344   0.00520   0.00702   0.00898
                 42.00   0.00534   0.00443   0.00388   0.00334   0.00274   0.00203   0.00000   0.00203   0.00274   0.00334   0.00388   0.00443   0.00534
                180.00   0.00490   0.00350   0.00229   0.00131   0.00059   0.00015   0.00000   0.00015   0.00059   0.00131   0.00229   0.00350   0.00490
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              </tableData>
            </table>
          </product>
        </function>
        <function name="aero/coefficient/CD_gear">
          <description>the gear extended: its wheels' and struts' drag by Raymer's components, 0.343 m2 (hangar)</description>
          <product>
            <property>aero/qbar-psf</property>
            <property>metrics/Sw-sqft</property>
            <value>0.0079971</value>
            <property>gear/gear-pos-norm</property>
          </product>
        </function>
      </axis>
      <axis name="SIDE">
        <function name="aero/coefficient/CY_base">
          <description>CY over alpha and beta (hangar)</description>
          <product>
            <property>aero/qbar-psf</property>
            <property>metrics/Sw-sqft</property>
            <property>aero/function/mach-side</property>
          <table>
            <independentVar lookup="row">aero/alpha-deg</independentVar>
            <independentVar lookup="column">aero/beta-deg</independentVar>
            <tableData>
                        -90.00    -70.00    -50.00    -40.00    -30.00    -25.00    -20.00    -15.00    -10.00     -6.00     -3.00      0.00      3.00      6.00     10.00     15.00     20.00     25.00     30.00     40.00     50.00     70.00     90.00
             -180.00   0.00000   0.09314   0.10451   0.08474   0.05740   0.04339   0.03037   0.01958   0.05392   0.06079   0.03183  -0.00000  -0.03183  -0.06079  -0.05392  -0.01958  -0.03037  -0.04339  -0.05740  -0.08474  -0.10451  -0.09314  -0.00000
              -35.00   0.00000  -0.13374  -0.20149  -0.25244  -0.26682  -0.23795  -0.21544  -0.17582  -0.12648  -0.08007  -0.03215  -0.00000   0.03215   0.08007   0.12648   0.17582   0.21544   0.23795   0.26682   0.25244   0.20149   0.13374  -0.00000
              -11.00   0.00000   0.10336   0.15604   0.14257   0.12265   0.12721   0.10729   0.09884   0.06685   0.04030   0.02018  -0.00000  -0.02018  -0.04030  -0.06685  -0.09884  -0.10729  -0.12721  -0.12265  -0.14257  -0.15604  -0.10336  -0.00000
                4.00   0.00000   0.12386   0.18293   0.17050   0.14886   0.13595   0.14574   0.11164   0.07489   0.04479   0.02229  -0.00000  -0.02229  -0.04479  -0.07489  -0.11164  -0.14574  -0.13595  -0.14886  -0.17050  -0.18293  -0.12386  -0.00000
               19.00   0.00000   0.03829   0.07612   0.05323   0.03565   0.04248   0.03474   0.03937   0.02557   0.01502   0.00739  -0.00000  -0.00739  -0.01502  -0.02557  -0.03937  -0.03474  -0.04248  -0.03565  -0.05323  -0.07612  -0.03829  -0.00000
               42.00   0.00000  -0.19469  -0.34012  -0.40513  -0.41750  -0.38682  -0.32034  -0.25899  -0.18601  -0.11947  -0.05467  -0.00000   0.05467   0.11947   0.18601   0.25899   0.32034   0.38682   0.41750   0.40513   0.34012   0.19469  -0.00000
              180.00   0.00000   0.09314   0.10451   0.08474   0.05740   0.04339   0.03037   0.01958   0.05392   0.06079   0.03183  -0.00000  -0.03183  -0.06079  -0.05392  -0.01958  -0.03037  -0.04339  -0.05740  -0.08474  -0.10451  -0.09314  -0.00000
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            </tableData>
          </table>
          </product>
        </function>
        <function name="aero/coefficient/CY_aileron">
          <description>CY increment from aileron (deg), over alpha</description>
          <product>
            <property>aero/qbar-psf</property>
            <property>metrics/Sw-sqft</property>
            <property>aero/function/mach-aileron</property>
          <table>
            <independentVar lookup="row">aero/alpha-deg</independentVar>
            <independentVar lookup="column">fcs/left-aileron-pos-deg</independentVar>
            <tableData>
                        -30.00    -25.00    -20.00    -15.00    -10.00     -5.00      0.00      5.00     10.00     15.00     20.00     25.00     30.00
             -180.00   0.00688   0.00755   0.00690   0.00544   0.00369   0.00185   0.00000  -0.00185  -0.00369  -0.00544  -0.00690  -0.00755  -0.00688
              -35.00   0.00787   0.00710   0.00626   0.00522   0.00383   0.00203   0.00000  -0.00203  -0.00383  -0.00522  -0.00626  -0.00710  -0.00787
              -11.00   0.02039   0.01831   0.01603   0.01324   0.00960   0.00505   0.00000  -0.00505  -0.00960  -0.01324  -0.01603  -0.01831  -0.02039
                4.00   0.03046   0.02709   0.02347   0.01919   0.01380   0.00722   0.00000  -0.00722  -0.01380  -0.01919  -0.02347  -0.02709  -0.03046
               19.00   0.03440   0.03021   0.02584   0.02087   0.01486   0.00773   0.00000  -0.00773  -0.01486  -0.02087  -0.02584  -0.03021  -0.03440
               42.00   0.00236   0.00243   0.00265   0.00229   0.00172   0.00091   0.00000  -0.00091  -0.00172  -0.00229  -0.00265  -0.00243  -0.00236
              180.00   0.00688   0.00755   0.00690   0.00544   0.00369   0.00185   0.00000  -0.00185  -0.00369  -0.00544  -0.00690  -0.00755  -0.00688
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            </tableData>
          </table>
          </product>
        </function>
        <function name="aero/coefficient/CY_rudder">
          <description>CY increment from rudder (deg), over alpha</description>
          <product>
            <property>aero/qbar-psf</property>
            <property>metrics/Sw-sqft</property>
            <property>aero/function/mach-rudder</property>
          <table>
            <independentVar lookup="row">aero/alpha-deg</independentVar>
            <independentVar lookup="column">fcs/rudder-pos-deg</independentVar>
            <tableData>
                        -30.00    -25.00    -20.00    -15.00    -10.00     -5.00      0.00      5.00     10.00     15.00     20.00     25.00     30.00
             -180.00  -0.00000  -0.00000  -0.00000  -0.00000  -0.00000  -0.00000   0.00000  -0.00000  -0.00000  -0.00000  -0.00000  -0.00000  -0.00000
              -35.00  -0.03666  -0.03333  -0.02957  -0.02476  -0.01813  -0.00958   0.00000   0.00958   0.01813   0.02476   0.02957   0.03333   0.03666
              -11.00  -0.04932  -0.04508  -0.04022  -0.03383  -0.02487  -0.01317   0.00000   0.01317   0.02487   0.03383   0.04022   0.04508   0.04932
                4.00  -0.04991  -0.04566  -0.04078  -0.03434  -0.02526  -0.01339   0.00000   0.01339   0.02526   0.03434   0.04078   0.04566   0.04991
               19.00  -0.04344  -0.03955  -0.03522  -0.02967  -0.02189  -0.01161   0.00000   0.01161   0.02189   0.02967   0.03522   0.03955   0.04344
               42.00  -0.03112  -0.02926  -0.02847  -0.02505  -0.02217  -0.01749   0.00000   0.01749   0.02217   0.02505   0.02847   0.02926   0.03112
              180.00  -0.00000  -0.00000  -0.00000  -0.00000  -0.00000  -0.00000   0.00000  -0.00000  -0.00000  -0.00000  -0.00000  -0.00000  -0.00000
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            </tableData>
          </table>
          </product>
        </function>
        <function name="aero/coefficient/CYp">
          <description>CY per p (non-dimensional), over alpha</description>
          <product>
            <property>aero/qbar-psf</property>
            <property>metrics/Sw-sqft</property>
            <property>aero/bi2vel</property>
            <property>velocities/p-aero-rad_sec</property>
            <property>aero/function/mach-lift</property>
          <table>
            <independentVar lookup="row">aero/alpha-deg</independentVar>
            <tableData>
                 -180.00   -0.30479
                 -165.00   -0.22126
                  -32.00   -0.05421
                  -10.00   -0.03572
                    5.00   -0.00857
                   20.00   -0.00259
                   46.00    0.07904
                  180.00   -0.30479
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            </tableData>
          </table>
          </product>
        </function>
        <function name="aero/coefficient/CYr">
          <description>CY per r (non-dimensional), over alpha</description>
          <product>
            <property>aero/qbar-psf</property>
            <property>metrics/Sw-sqft</property>
            <property>aero/bi2vel</property>
            <property>velocities/r-aero-rad_sec</property>
            <property>aero/function/mach-lift</property>
          <table>
            <independentVar lookup="row">aero/alpha-deg</independentVar>
            <tableData>
                 -180.00    0.63602
                 -165.00    0.46986
                  -32.00   -0.01330
                  -10.00    0.11689
                    5.00    0.14794
                   20.00    0.07328
                   46.00   -0.37118
                  180.00    0.63602
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            </tableData>
          </table>
          </product>
        </function>
      </axis>
      <axis name="LIFT">
        <function name="aero/coefficient/CL_base">
          <description>CL over alpha and beta, ground effect, compressibility (hangar)</description>
          <product>
            <property>aero/qbar-psf</property>
            <property>metrics/Sw-sqft</property>
            <property>aero/function/CL-base</property>
            <property>aero/function/mach-lift</property>
          <table>
            <independentVar lookup="row">aero/h_b-mac-ft</independentVar>
            <tableData>
                    0.00    1.20000
                    0.10    1.08692
                    0.20    1.03778
                    0.40    1.00713
                    0.60    1.00135
                    0.80    1.00025
                    1.00    1.00005
                    1.10    1.00000
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            </tableData>
          </table>
          </product>
        </function>
        <function name="aero/coefficient/CL_elevator">
          <description>CL increment from elevator (deg), over alpha</description>
          <product>
            <property>aero/qbar-psf</property>
            <property>metrics/Sw-sqft</property>
            <property>aero/function/mach-elevator</property>
          <table>
            <independentVar lookup="row">aero/alpha-deg</independentVar>
            <independentVar lookup="column">fcs/elevator-pos-deg</independentVar>
            <tableData>
                        -30.00    -25.00    -20.00    -15.00    -10.00     -5.00      0.00      5.00     10.00     15.00     20.00     25.00     30.00
             -180.00  -0.14956  -0.13229  -0.11101  -0.08635  -0.12118  -0.11865   0.00000   0.11865   0.12118   0.08635   0.11101   0.13229   0.14956
              -35.00  -0.08815  -0.09820  -0.09917  -0.09035  -0.07112  -0.04104   0.00000   0.04875   0.10123   0.17616   0.25952   0.33973   0.44868
              -11.00  -0.43174  -0.38276  -0.32324  -0.25543  -0.18201  -0.09512   0.00000   0.09847   0.19908   0.30181   0.40594   0.50408   0.59694
                4.00  -0.56431  -0.48019  -0.38920  -0.29302  -0.19447  -0.09684   0.00000   0.09583   0.19026   0.28268   0.36954   0.44853   0.51859
               19.00  -0.58012  -0.48842  -0.39573  -0.29185  -0.19046  -0.09338   0.00000   0.08767   0.16132   0.21420   0.26352   0.30289   0.33214
               42.00  -0.36179  -0.24916  -0.19523  -0.12700  -0.07620  -0.03533   0.00000   0.02489   0.03940   0.04415   0.03995   0.02763   0.00805
              180.00  -0.14956  -0.13229  -0.11101  -0.08635  -0.12118  -0.11865   0.00000   0.11865   0.12118   0.08635   0.11101   0.13229   0.14956
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            </tableData>
          </table>
          </product>
        </function>
        <function name="aero/coefficient/CL_flap">
          <description>CL increment from flap (deg), over alpha</description>
          <product>
            <property>aero/qbar-psf</property>
            <property>metrics/Sw-sqft</property>
            <property>aero/function/mach-flap</property>
          <table>
            <independentVar lookup="row">aero/alpha-deg</independentVar>
            <independentVar lookup="column">fcs/flap-pos-deg</independentVar>
            <tableData>
                        -30.00    -25.00    -20.00    -15.00    -10.00     -5.00      0.00      5.00     10.00     15.00     20.00     25.00     30.00
             -180.00   0.00000   0.00000   0.00000   0.00000   0.00000   0.00000   0.00000   0.00000   0.00000   0.00000   0.00000   0.00000   0.00000
              -35.00  -0.13456  -0.12583  -0.11507  -0.09917  -0.07413  -0.03949   0.00000   0.03919   0.07314   0.09776   0.11384   0.12491   0.13402
              -11.00  -0.17457  -0.16395  -0.15051  -0.13011  -0.09788  -0.05268   0.00000   0.05336   0.10020   0.13418   0.15605   0.17072   0.18257
                4.00  -0.17575  -0.16628  -0.15371  -0.13347  -0.10041  -0.05376   0.00000   0.05351   0.09950   0.13172   0.15111   0.16286   0.17148
               19.00  -0.17371  -0.16303  -0.14956  -0.12901  -0.09626  -0.05057   0.00000   0.04671   0.08422   0.10953   0.12456   0.13367   0.14041
               42.00  -0.12181  -0.11468  -0.10577  -0.09199  -0.07002  -0.03842   0.00000   0.04067   0.07747   0.10410   0.12062   0.13099   0.13862
              180.00  -0.00000   0.00000   0.00000  -0.00000  -0.00000   0.00000   0.00000   0.00000  -0.00000  -0.00000   0.00000   0.00000  -0.00000
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            </tableData>
          </table>
          <table>
            <independentVar lookup="row">aero/h_b-mac-ft</independentVar>
            <tableData>
                    0.00    1.20000
                    0.10    1.08692
                    0.20    1.03778
                    0.40    1.00713
                    0.60    1.00135
                    0.80    1.00025
                    1.00    1.00005
                    1.10    1.00000
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            </tableData>
          </table>
          </product>
        </function>
        <function name="aero/coefficient/CLq">
          <description>CL per q (non-dimensional), over alpha</description>
          <product>
            <property>aero/qbar-psf</property>
            <property>metrics/Sw-sqft</property>
            <property>aero/ci2vel</property>
            <property>velocities/q-aero-rad_sec</property>
            <property>aero/function/mach-lift</property>
          <table>
            <independentVar lookup="row">aero/alpha-deg</independentVar>
            <tableData>
                 -180.00   -3.73957
                 -165.00   -0.73630
                  -32.00    3.03225
                  -10.00    4.71579
                    5.00    4.89513
                   20.00    4.35091
                   46.00    2.06003
                  180.00   -3.73957
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            </tableData>
          </table>
          </product>
        </function>
        <function name="aero/coefficient/CLadot">
          <description>CL per alpha-dot (downwash lag at the tail)</description>
          <product>
            <property>aero/qbar-psf</property>
            <property>metrics/Sw-sqft</property>
            <property>aero/ci2vel</property>
            <property>aero/alphadot-rad_sec</property>
            <value>0.09404</value>
            <property>aero/function/mach-lift</property>
          </product>
        </function>
      </axis>
      <axis name="ROLL">
        <function name="aero/coefficient/Cl_base">
          <description>Cl over alpha and beta (hangar)</description>
          <product>
            <property>aero/qbar-psf</property>
            <property>metrics/Sw-sqft</property>
            <property>metrics/bw-ft</property>
            <property>aero/function/mach-side</property>
          <table>
            <independentVar lookup="row">aero/alpha-deg</independentVar>
            <independentVar lookup="column">aero/beta-deg</independentVar>
            <tableData>
                        -90.00    -70.00    -50.00    -40.00    -30.00    -25.00    -20.00    -15.00    -10.00     -6.00     -3.00      0.00      3.00      6.00     10.00     15.00     20.00     25.00     30.00     40.00     50.00     70.00     90.00
             -180.00   0.03082   0.03271   0.03142   0.02785   0.02263   0.01946   0.01599   0.01232   0.01606   0.01514   0.00796  -0.00000  -0.00796  -0.01514  -0.01606  -0.01232  -0.01599  -0.01946  -0.02263  -0.02785  -0.03142  -0.03271  -0.03082
              -35.00   0.03082   0.03823   0.03047   0.02712   0.01943   0.01742   0.01347   0.01015   0.00527   0.00194   0.00116  -0.00000  -0.00116  -0.00194  -0.00527  -0.01015  -0.01347  -0.01742  -0.01943  -0.02712  -0.03047  -0.03823  -0.03082
              -11.00   0.03082   0.03382   0.02297   0.01381  -0.00074  -0.00372  -0.00368  -0.00226  -0.00159  -0.00098  -0.00050  -0.00000   0.00050   0.00098   0.00159   0.00226   0.00368   0.00372   0.00074  -0.01381  -0.02297  -0.03382  -0.03082
                4.00   0.03082   0.03230   0.02493   0.02845   0.03363   0.03225   0.02872   0.02222   0.01514   0.00919   0.00462  -0.00000  -0.00462  -0.00919  -0.01514  -0.02222  -0.02872  -0.03225  -0.03363  -0.02845  -0.02493  -0.03230  -0.03082
               19.00   0.03082   0.02753   0.02129   0.02935   0.05250   0.05545   0.04705   0.03670   0.02512   0.01534   0.00763  -0.00000  -0.00763  -0.01534  -0.02512  -0.03670  -0.04705  -0.05545  -0.05250  -0.02935  -0.02129  -0.02753  -0.03082
               42.00   0.03082   0.02047   0.01645   0.00860   0.00231   0.00248   0.00615   0.00702   0.00547   0.00205   0.00210  -0.00000  -0.00210  -0.00205  -0.00547  -0.00702  -0.00615  -0.00248  -0.00231  -0.00860  -0.01645  -0.02047  -0.03082
              180.00   0.03082   0.03271   0.03142   0.02785   0.02263   0.01946   0.01599   0.01232   0.01606   0.01514   0.00796  -0.00000  -0.00796  -0.01514  -0.01606  -0.01232  -0.01599  -0.01946  -0.02263  -0.02785  -0.03142  -0.03271  -0.03082
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            </tableData>
          </table>
          </product>
        </function>
        <function name="aero/coefficient/Cl_aileron">
          <description>Cl increment from aileron (deg), over alpha</description>
          <product>
            <property>aero/qbar-psf</property>
            <property>metrics/Sw-sqft</property>
            <property>metrics/bw-ft</property>
            <property>aero/function/mach-aileron</property>
          <table>
            <independentVar lookup="row">aero/alpha-deg</independentVar>
            <independentVar lookup="column">fcs/left-aileron-pos-deg</independentVar>
            <tableData>
                        -30.00    -25.00    -20.00    -15.00    -10.00     -5.00      0.00      5.00     10.00     15.00     20.00     25.00     30.00
             -180.00   0.02451   0.02686   0.02452   0.01934   0.01312   0.00659   0.00000  -0.00659  -0.01312  -0.01934  -0.02452  -0.02686  -0.02451
              -35.00  -0.03835  -0.03434  -0.02990  -0.02455  -0.01770  -0.00928   0.00000   0.00928   0.01770   0.02455   0.02990   0.03434   0.03835
              -11.00  -0.05290  -0.04699  -0.04061  -0.03311  -0.02376  -0.01241   0.00000   0.01241   0.02376   0.03311   0.04061   0.04699   0.05290
                4.00  -0.04824  -0.04298  -0.03729  -0.03052  -0.02197  -0.01150   0.00000   0.01150   0.02197   0.03052   0.03729   0.04298   0.04824
               19.00  -0.04867  -0.04329  -0.03747  -0.03059  -0.02196  -0.01147   0.00000   0.01147   0.02196   0.03059   0.03747   0.04329   0.04867
               42.00  -0.03179  -0.02851  -0.02484  -0.02039  -0.01469  -0.00770   0.00000   0.00770   0.01469   0.02039   0.02484   0.02851   0.03179
              180.00   0.02451   0.02686   0.02452   0.01934   0.01312   0.00659   0.00000  -0.00659  -0.01312  -0.01934  -0.02452  -0.02686  -0.02451
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            </tableData>
          </table>
          </product>
        </function>
        <function name="aero/coefficient/Cl_rudder">
          <description>Cl increment from rudder (deg), over alpha</description>
          <product>
            <property>aero/qbar-psf</property>
            <property>metrics/Sw-sqft</property>
            <property>metrics/bw-ft</property>
            <property>aero/function/mach-rudder</property>
          <table>
            <independentVar lookup="row">aero/alpha-deg</independentVar>
            <independentVar lookup="column">fcs/rudder-pos-deg</independentVar>
            <tableData>
                        -30.00    -25.00    -20.00    -15.00    -10.00     -5.00      0.00      5.00     10.00     15.00     20.00     25.00     30.00
             -180.00   0.00000   0.00000   0.00000   0.00000   0.00000   0.00000   0.00000   0.00000   0.00000   0.00000   0.00000   0.00000   0.00000
              -35.00  -0.00389  -0.00346  -0.00301  -0.00247  -0.00178  -0.00093   0.00000   0.00093   0.00178   0.00247   0.00301   0.00346   0.00389
              -11.00  -0.00391  -0.00351  -0.00308  -0.00254  -0.00184  -0.00097   0.00000   0.00097   0.00184   0.00254   0.00308   0.00351   0.00391
                4.00  -0.00542  -0.00490  -0.00432  -0.00359  -0.00262  -0.00138   0.00000   0.00138   0.00262   0.00359   0.00432   0.00490   0.00542
               19.00  -0.00566  -0.00506  -0.00442  -0.00366  -0.00267  -0.00141   0.00000   0.00141   0.00267   0.00366   0.00442   0.00506   0.00566
               42.00  -0.00394  -0.00377  -0.00383  -0.00340  -0.00317  -0.00280   0.00000   0.00280   0.00317   0.00340   0.00383   0.00377   0.00394
              180.00   0.00000   0.00000   0.00000   0.00000   0.00000   0.00000   0.00000   0.00000   0.00000   0.00000   0.00000   0.00000   0.00000
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            </tableData>
          </table>
          </product>
        </function>
        <function name="aero/coefficient/Clp">
          <description>Cl per p (non-dimensional), over alpha</description>
          <product>
            <property>aero/qbar-psf</property>
            <property>metrics/Sw-sqft</property>
            <property>metrics/bw-ft</property>
            <property>aero/bi2vel</property>
            <property>velocities/p-aero-rad_sec</property>
            <property>aero/function/mach-lift</property>
          <table>
            <independentVar lookup="row">aero/alpha-deg</independentVar>
            <tableData>
                 -180.00   -0.72893
                 -165.00   -0.19829
                  -32.00   -0.19854
                  -10.00   -0.25479
                    5.00   -0.25423
                   20.00   -0.20602
                   46.00   -0.15755
                  180.00   -0.72893
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            </tableData>
          </table>
          </product>
        </function>
        <function name="aero/coefficient/Clr">
          <description>Cl per r (non-dimensional), over alpha</description>
          <product>
            <property>aero/qbar-psf</property>
            <property>metrics/Sw-sqft</property>
            <property>metrics/bw-ft</property>
            <property>aero/bi2vel</property>
            <property>velocities/r-aero-rad_sec</property>
            <property>aero/function/mach-lift</property>
          <table>
            <independentVar lookup="row">aero/alpha-deg</independentVar>
            <tableData>
                 -180.00    0.11250
                 -165.00    0.12378
                  -32.00   -0.20740
                  -10.00   -0.03287
                    5.00    0.09760
                   20.00    0.23039
                   46.00    0.36427
                  180.00    0.11250
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            </tableData>
          </table>
          </product>
        </function>
      </axis>
      <axis name="PITCH">
        <function name="aero/coefficient/Cm_base">
          <description>Cm over alpha and beta (hangar)</description>
          <product>
            <property>aero/qbar-psf</property>
            <property>metrics/Sw-sqft</property>
            <property>metrics/cbarw-ft</property>
          <table>
            <independentVar lookup="row">aero/alpha-deg</independentVar>
            <independentVar lookup="column">aero/beta-deg</independentVar>
            <tableData>
                        -90.00    -70.00    -50.00    -40.00    -30.00    -25.00    -20.00    -15.00    -10.00     -6.00     -3.00      0.00      3.00      6.00     10.00     15.00     20.00     25.00     30.00     40.00     50.00     70.00     90.00
             -180.00  -0.00000   0.00003   0.00001  -0.00002  -0.00005  -0.00006  -0.00008  -0.00002   0.00288   0.00181   0.00029  -0.00025   0.00029   0.00181   0.00288  -0.00002  -0.00008  -0.00006  -0.00005  -0.00002   0.00001   0.00003  -0.00000
              -35.00  -0.00000   0.02382  -0.09657  -0.14507  -0.17777  -0.19205  -0.20227  -0.21090  -0.21539  -0.21764  -0.21973  -0.21995  -0.21973  -0.21764  -0.21539  -0.21090  -0.20227  -0.19205  -0.17777  -0.14507  -0.09657   0.02382  -0.00000
              -11.00  -0.00000   0.00746  -0.02292  -0.04786  -0.06746  -0.08076  -0.08584  -0.09460  -0.09548  -0.09567  -0.09568  -0.09567  -0.09568  -0.09567  -0.09548  -0.09460  -0.08584  -0.08076  -0.06746  -0.04786  -0.02292   0.00746  -0.00000
                4.00   0.00000  -0.00729  -0.01498  -0.01709  -0.01475  -0.01022   0.00051   0.00056   0.00022  -0.00022  -0.00055  -0.00070  -0.00055  -0.00022   0.00022   0.00056   0.00051  -0.01022  -0.01475  -0.01709  -0.01498  -0.00729   0.00000
               19.00   0.00000  -0.02040   0.05021   0.07572   0.09085   0.09656   0.10267   0.10926   0.11251   0.11387   0.11432   0.11445   0.11432   0.11387   0.11251   0.10926   0.10267   0.09656   0.09085   0.07572   0.05021  -0.02040   0.00000
               42.00   0.00000  -0.02342   0.08593   0.12648   0.15433   0.16442   0.17191   0.17454   0.17517   0.17112   0.17156   0.17089   0.17156   0.17112   0.17517   0.17454   0.17191   0.16442   0.15433   0.12648   0.08593  -0.02342   0.00000
              180.00  -0.00000   0.00003   0.00001  -0.00002  -0.00005  -0.00006  -0.00008  -0.00002   0.00288   0.00181   0.00029  -0.00025   0.00029   0.00181   0.00288  -0.00002  -0.00008  -0.00006  -0.00005  -0.00002   0.00001   0.00003  -0.00000
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            </tableData>
          </table>
          </product>
        </function>
        <function name="aero/coefficient/Cm_mach">
          <description>Cm from the neutral point's move with Mach</description>
          <product>
            <property>aero/qbar-psf</property>
            <property>metrics/Sw-sqft</property>
            <property>metrics/cbarw-ft</property>
            <property>aero/function/CL-base</property>
            <property>aero/function/mach-dCm-dCL</property>
          </product>
        </function>
        <function name="aero/coefficient/Cm_elevator">
          <description>Cm increment from elevator (deg), over alpha</description>
          <product>
            <property>aero/qbar-psf</property>
            <property>metrics/Sw-sqft</property>
            <property>metrics/cbarw-ft</property>
            <property>aero/function/mach-elevator</property>
          <table>
            <independentVar lookup="row">aero/alpha-deg</independentVar>
            <independentVar lookup="column">fcs/elevator-pos-deg</independentVar>
            <tableData>
                        -30.00    -25.00    -20.00    -15.00    -10.00     -5.00      0.00      5.00     10.00     15.00     20.00     25.00     30.00
             -180.00  -0.18988  -0.16769  -0.14056  -0.10926  -0.15274  -0.14974   0.00000   0.14973   0.15268   0.10897   0.14006   0.16692   0.18880
              -35.00   0.16251   0.15435   0.13873   0.11537   0.08422   0.04553   0.00000  -0.04844  -0.09340  -0.15263  -0.21291  -0.26700  -0.34242
              -11.00   0.31031   0.27401   0.22992   0.18013   0.12768   0.06612   0.00000  -0.06714  -0.13481  -0.20305  -0.27049  -0.32959  -0.38208
                4.00   0.35986   0.31027   0.25385   0.19220   0.12769   0.06364   0.00000  -0.06320  -0.12585  -0.18778  -0.24581  -0.29797  -0.34296
               19.00   0.37645   0.32614   0.27243   0.20410   0.13461   0.06664   0.00000  -0.06454  -0.11912  -0.15957  -0.20004  -0.23417  -0.26101
               42.00   0.30781   0.22583   0.18954   0.13427   0.08886   0.04403   0.00000  -0.03764  -0.06800  -0.09087  -0.10633  -0.11473  -0.11657
              180.00  -0.18988  -0.16769  -0.14056  -0.10926  -0.15274  -0.14974   0.00000   0.14973   0.15268   0.10897   0.14006   0.16692   0.18880
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            </tableData>
          </table>
          </product>
        </function>
        <function name="aero/coefficient/Cm_flap">
          <description>Cm increment from flap (deg), over alpha</description>
          <product>
            <property>aero/qbar-psf</property>
            <property>metrics/Sw-sqft</property>
            <property>metrics/cbarw-ft</property>
            <property>aero/function/mach-flap</property>
          <table>
            <independentVar lookup="row">aero/alpha-deg</independentVar>
            <independentVar lookup="column">fcs/flap-pos-deg</independentVar>
            <tableData>
                        -30.00    -25.00    -20.00    -15.00    -10.00     -5.00      0.00      5.00     10.00     15.00     20.00     25.00     30.00
             -180.00   0.00000   0.00000   0.00000   0.00000   0.00000   0.00000   0.00000   0.00000   0.00000   0.00000   0.00000   0.00000   0.00000
              -35.00   0.03532   0.03291   0.02997   0.02567   0.01925   0.01038   0.00000  -0.01087  -0.02088  -0.02856  -0.03380  -0.03752  -0.04065
              -11.00   0.01235   0.01223   0.01184   0.01073   0.00836   0.00461   0.00000  -0.00479  -0.00894  -0.01162  -0.01284  -0.01319  -0.01323
                4.00   0.00256   0.00450   0.00600   0.00656   0.00563   0.00320   0.00000  -0.00321  -0.00569  -0.00665  -0.00611  -0.00463  -0.00271
               19.00   0.01436   0.01409   0.01352   0.01208   0.00921   0.00491   0.00000  -0.00475  -0.00868  -0.01126  -0.01256  -0.01312  -0.01346
               42.00   0.04126   0.03772   0.03365   0.02825   0.02056   0.01064   0.00000  -0.01000  -0.01830  -0.02413  -0.02787  -0.03044  -0.03259
              180.00   0.00000   0.00000   0.00000   0.00000   0.00000   0.00000   0.00000   0.00000   0.00000   0.00000   0.00000   0.00000   0.00000
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            </tableData>
          </table>
          </product>
        </function>
        <function name="aero/coefficient/Cmq">
          <description>Cm per q (non-dimensional), over alpha</description>
          <product>
            <property>aero/qbar-psf</property>
            <property>metrics/Sw-sqft</property>
            <property>metrics/cbarw-ft</property>
            <property>aero/ci2vel</property>
            <property>velocities/q-aero-rad_sec</property>
            <property>aero/function/mach-lift</property>
          <table>
            <independentVar lookup="row">aero/alpha-deg</independentVar>
            <tableData>
                 -180.00   -3.37694
                 -165.00   -0.06285
                  -32.00   -2.99566
                  -10.00   -2.67129
                    5.00   -2.53314
                   20.00   -2.94430
                   46.00   -3.08067
                  180.00   -3.37694
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            </tableData>
          </table>
          </product>
        </function>
        <function name="aero/coefficient/Cmadot">
          <description>Cm per alpha-dot (downwash lag at the tail)</description>
          <product>
            <property>aero/qbar-psf</property>
            <property>metrics/Sw-sqft</property>
            <property>metrics/cbarw-ft</property>
            <property>aero/ci2vel</property>
            <property>aero/alphadot-rad_sec</property>
            <value>-0.08975</value>
            <property>aero/function/mach-lift</property>
          </product>
        </function>
        <function name="aero/coefficient/Cm_gear">
          <description>the gear's drag's pitching moment, -1.37 m from the reference point's height</description>
          <product>
            <property>aero/qbar-psf</property>
            <property>metrics/Sw-sqft</property>
            <property>metrics/cbarw-ft</property>
            <value>-0.00243057</value>
            <property>gear/gear-pos-norm</property>
          </product>
        </function>
      </axis>
      <axis name="YAW">
        <function name="aero/coefficient/Cn_base">
          <description>Cn over alpha and beta (hangar)</description>
          <product>
            <property>aero/qbar-psf</property>
            <property>metrics/Sw-sqft</property>
            <property>metrics/bw-ft</property>
            <property>aero/function/mach-side</property>
          <table>
            <independentVar lookup="row">aero/alpha-deg</independentVar>
            <independentVar lookup="column">aero/beta-deg</independentVar>
            <tableData>
                        -90.00    -70.00    -50.00    -40.00    -30.00    -25.00    -20.00    -15.00    -10.00     -6.00     -3.00      0.00      3.00      6.00     10.00     15.00     20.00     25.00     30.00     40.00     50.00     70.00     90.00
             -180.00   0.01882  -0.01647  -0.04820  -0.05571  -0.05497  -0.05119  -0.04510  -0.03697  -0.04522  -0.04121  -0.02180  -0.00000   0.02180   0.04121   0.04522   0.03697   0.04510   0.05119   0.05497   0.05571   0.04820   0.01647  -0.01882
              -35.00   0.01882   0.03850   0.04873   0.05006   0.04405   0.03420   0.02980   0.02361   0.01727   0.01128   0.00260  -0.00000  -0.00260  -0.01128  -0.01727  -0.02361  -0.02980  -0.03420  -0.04405  -0.05006  -0.04873  -0.03850  -0.01882
              -11.00   0.01882   0.03940   0.04777   0.04741   0.03643   0.02341   0.01630   0.00492   0.00243   0.00116   0.00051  -0.00000  -0.00051  -0.00116  -0.00243  -0.00492  -0.01630  -0.02341  -0.03643  -0.04741  -0.04777  -0.03940  -0.01882
                4.00   0.01882   0.03985   0.04714   0.04509   0.03164   0.02243   0.00456   0.00149  -0.00023  -0.00066  -0.00048  -0.00000   0.00048   0.00066   0.00023  -0.00149  -0.00456  -0.02243  -0.03164  -0.04509  -0.04714  -0.03985  -0.01882
               19.00   0.01882   0.03965   0.04762   0.04913   0.04113   0.02930   0.02256   0.01144   0.00715   0.00415   0.00205  -0.00000  -0.00205  -0.00415  -0.00715  -0.01144  -0.02256  -0.02930  -0.04113  -0.04913  -0.04762  -0.03965  -0.01882
               42.00   0.01882   0.03866   0.05002   0.05024   0.04561   0.03990   0.02828   0.02338   0.01778   0.01268   0.00486  -0.00000  -0.00486  -0.01268  -0.01778  -0.02338  -0.02828  -0.03990  -0.04561  -0.05024  -0.05002  -0.03866  -0.01882
              180.00   0.01882  -0.01647  -0.04820  -0.05571  -0.05497  -0.05119  -0.04510  -0.03697  -0.04522  -0.04121  -0.02180  -0.00000   0.02180   0.04121   0.04522   0.03697   0.04510   0.05119   0.05497   0.05571   0.04820   0.01647  -0.01882
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            </tableData>
          </table>
          </product>
        </function>
        <function name="aero/coefficient/Cn_aileron">
          <description>Cn increment from aileron (deg), over alpha</description>
          <product>
            <property>aero/qbar-psf</property>
            <property>metrics/Sw-sqft</property>
            <property>metrics/bw-ft</property>
            <property>aero/function/mach-aileron</property>
          <table>
            <independentVar lookup="row">aero/alpha-deg</independentVar>
            <independentVar lookup="column">fcs/left-aileron-pos-deg</independentVar>
            <tableData>
                        -30.00    -25.00    -20.00    -15.00    -10.00     -5.00      0.00      5.00     10.00     15.00     20.00     25.00     30.00
             -180.00  -0.00368  -0.00404  -0.00369  -0.00291  -0.00198  -0.00099   0.00000   0.00099   0.00198   0.00291   0.00369   0.00404   0.00368
              -35.00  -0.00143  -0.00060   0.00014   0.00066   0.00079   0.00050   0.00000  -0.00050  -0.00079  -0.00066  -0.00014   0.00060   0.00143
              -11.00  -0.01041  -0.00932  -0.00813  -0.00665  -0.00474  -0.00245   0.00000   0.00245   0.00474   0.00665   0.00813   0.00932   0.01041
                4.00  -0.00688  -0.00599  -0.00507  -0.00405  -0.00286  -0.00148   0.00000   0.00148   0.00286   0.00405   0.00507   0.00599   0.00688
               19.00  -0.01238  -0.01155  -0.01060  -0.00937  -0.00743  -0.00422   0.00000   0.00422   0.00743   0.00937   0.01060   0.01155   0.01238
               42.00  -0.01196  -0.01222  -0.01217  -0.01123  -0.00885  -0.00486   0.00000   0.00486   0.00885   0.01123   0.01217   0.01222   0.01196
              180.00  -0.00368  -0.00404  -0.00369  -0.00291  -0.00198  -0.00099   0.00000   0.00099   0.00198   0.00291   0.00369   0.00404   0.00368
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            </tableData>
          </table>
          </product>
        </function>
        <function name="aero/coefficient/Cn_rudder">
          <description>Cn increment from rudder (deg), over alpha</description>
          <product>
            <property>aero/qbar-psf</property>
            <property>metrics/Sw-sqft</property>
            <property>metrics/bw-ft</property>
            <property>aero/function/mach-rudder</property>
          <table>
            <independentVar lookup="row">aero/alpha-deg</independentVar>
            <independentVar lookup="column">fcs/rudder-pos-deg</independentVar>
            <tableData>
                        -30.00    -25.00    -20.00    -15.00    -10.00     -5.00      0.00      5.00     10.00     15.00     20.00     25.00     30.00
             -180.00   0.00000   0.00000   0.00000   0.00000   0.00000   0.00000   0.00000   0.00000   0.00000   0.00000   0.00000   0.00000   0.00000
              -35.00   0.01479   0.01345   0.01195   0.01001   0.00733   0.00388   0.00000  -0.00388  -0.00733  -0.01001  -0.01195  -0.01345  -0.01479
              -11.00   0.02031   0.01857   0.01658   0.01395   0.01026   0.00544   0.00000  -0.00544  -0.01026  -0.01395  -0.01658  -0.01857  -0.02031
                4.00   0.02169   0.01989   0.01780   0.01502   0.01107   0.00587   0.00000  -0.00587  -0.01107  -0.01502  -0.01780  -0.01989  -0.02169
               19.00   0.01974   0.01805   0.01615   0.01365   0.01008   0.00535   0.00000  -0.00535  -0.01008  -0.01365  -0.01615  -0.01805  -0.01974
               42.00   0.01450   0.01355   0.01265   0.01095   0.00916   0.00656   0.00000  -0.00656  -0.00916  -0.01095  -0.01265  -0.01355  -0.01450
              180.00   0.00000   0.00000   0.00000   0.00000   0.00000   0.00000   0.00000   0.00000   0.00000   0.00000   0.00000   0.00000   0.00000
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            </tableData>
          </table>
          </product>
        </function>
        <function name="aero/coefficient/Cnp">
          <description>Cn per p (non-dimensional), over alpha</description>
          <product>
            <property>aero/qbar-psf</property>
            <property>metrics/Sw-sqft</property>
            <property>metrics/bw-ft</property>
            <property>aero/bi2vel</property>
            <property>velocities/p-aero-rad_sec</property>
            <property>aero/function/mach-lift</property>
          <table>
            <independentVar lookup="row">aero/alpha-deg</independentVar>
            <tableData>
                 -180.00    0.13741
                 -165.00    0.09710
                  -32.00    0.03320
                  -10.00    0.05281
                    5.00   -0.01259
                   20.00   -0.01838
                   46.00   -0.02382
                  180.00    0.13741
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            </tableData>
          </table>
          </product>
        </function>
        <function name="aero/coefficient/Cnr">
          <description>Cn per r (non-dimensional), over alpha</description>
          <product>
            <property>aero/qbar-psf</property>
            <property>metrics/Sw-sqft</property>
            <property>metrics/bw-ft</property>
            <property>aero/bi2vel</property>
            <property>velocities/r-aero-rad_sec</property>
            <property>aero/function/mach-lift</property>
          <table>
            <independentVar lookup="row">aero/alpha-deg</independentVar>
            <tableData>
                 -180.00   -0.18147
                 -165.00   -0.14712
                  -32.00   -0.18397
                  -10.00   -0.18083
                    5.00   -0.17720
                   20.00   -0.17888
                   46.00   -0.07946
                  180.00   -0.18147
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            </tableData>
          </table>
          </product>
        </function>
      </axis>
    </aerodynamics>
</fdm_config>
