<?xml version="1.0"?>
<?xml-stylesheet type="text/xsl" href="http://jsbsim.sourceforge.net/JSBSim.xsl"?>
<!-- Generated by hangar 0.1.0 from fa18c.toml on 2026-10-01. Edit the design and rebuild; changes
     made here are overwritten.  -->
<fdm_config name="fa18c" version="2.0" release="ALPHA"
            xmlns:xsi="http://www.w3.org/2001/XMLSchema-instance"
            xsi:noNamespaceSchemaLocation="http://jsbsim.sourceforge.net/JSBSim.xsd">
    <fileheader>
      <author>hangar</author>
      <filecreationdate>2026-10-01</filecreationdate>
      <version>0.1.0</version>
      <description>McDonnell Douglas F/A-18C Hornet (hangar build)</description>
      <note>Aerodynamics: vortex lattice with viscous section polars, full-envelope
        strip model, slender-body fuselage (hangar). Mass: Raymer component
        weights on the geometry. Propeller: blade-element momentum theory.</note>
      <reference refID="fsim/applicability/aerobatic" author="the design" title="US Navy F/A-18 fact sheet: +7.5 g (fsim/envelope/clean/n_max)" date="n/a"/>
      <reference refID="fsim/applicability/carrier" author="the design" title="US Navy F/A-18 fact sheet: carrier-based, with a nose-gear launch bar for the catapult and an arresting hook" date="n/a"/>
      <reference refID="fsim/applicability/drag_devices" author="the design" title="Jane's All the World's Aircraft: a dorsal speed brake" date="n/a"/>
      <reference refID="fsim/applicability/flaps" author="the design" title="NASA TM-4433: trailing-edge flaps" date="n/a"/>
      <reference refID="fsim/applicability/ground_contact" author="the design" title="US Navy F/A-18 fact sheet: tricycle wheeled gear" date="n/a"/>
      <reference refID="fsim/applicability/releasable_stores" author="the design" title="US Navy F/A-18 fact sheet: nine stations for air-to-air and air-to-ground weapons" date="n/a"/>
      <reference refID="fsim/applicability/retractable_gear" author="the design" title="Jane's All the World's Aircraft: retractable gear" date="n/a"/>
      <reference refID="fsim/applicability/vertical_flight" author="the design" title="US Navy F/A-18 fact sheet: a conventional take-off and landing fighter. Conventional take-off and landing: no rotors, lift fans or vectored lift to hover" date="n/a"/>
    </fileheader>
    <metrics>
      <wingarea unit="M2"> 36.2958 </wingarea>
      <wingspan unit="M"> 11.4300 </wingspan>
      <chord unit="M"> 3.3942 </chord>
      <htailarea unit="M2"> 15.7850 </htailarea>
      <htailarm unit="M"> 4.3733 </htailarm>
      <vtailarea unit="M2"> 8.1535 </vtailarea>
      <vtailarm unit="M"> 2.9361 </vtailarm>
      <location name="AERORP" unit="M">
        <x> 10.2000 </x>
        <y> 0.0000 </y>
        <z> 0.0000 </z>
      </location>
      <location name="EYEPOINT" unit="M">
        <x> 5.2000 </x>
        <y> 0.0000 </y>
        <z> 1.3000 </z>
      </location>
      <location name="VRP" unit="M">
        <x> 9.8100 </x>
        <y> 0.0000 </y>
        <z> -0.2500 </z>
      </location>
    </metrics>
    <mass_balance negated_crossproduct_inertia="false">
      <ixx unit="KG*M2"> 22066.74 </ixx>
      <iyy unit="KG*M2"> 162088.60 </iyy>
      <izz unit="KG*M2"> 173791.20 </izz>
      <ixy unit="KG*M2"> 0.169 </ixy>
      <ixz unit="KG*M2"> 4504.795 </ixz>
      <iyz unit="KG*M2"> 0.220 </iyz>
      <emptywt unit="KG"> 10810.00 </emptywt>
      <location name="CG" unit="M">
        <x> 9.8100 </x>
        <y> 0.0000 </y>
        <z> -0.2500 </z>
      </location>
      <pointmass name="pilot">
        <weight unit="KG"> 100.00 </weight>
        <location unit="M">
          <x> 5.2000 </x>
          <y> 0.0000 </y>
          <z> 0.6000 </z>
        </location>
      </pointmass>
      <pointmass name="gun ammunition">
        <weight unit="KG"> 180.00 </weight>
        <location unit="M">
          <x> 2.8000 </x>
          <y> 0.0000 </y>
          <z> 0.0000 </z>
        </location>
      </pointmass>
    </mass_balance>
    <ground_reactions>
      <contact type="BOGEY" name="Nose Gear">
        <location unit="M">
          <x> 5.5600 </x>
          <y> 0.0000 </y>
          <z> -2.2700 </z>
        </location>
        <static_friction> 0.8 </static_friction>
        <dynamic_friction> 0.5 </dynamic_friction>
        <rolling_friction> 0.02 </rolling_friction>
        <spring_coeff unit="N/M"> 260869 </spring_coeff>
        <damping_coeff unit="N/M/SEC"> 31169 </damping_coeff>
        <damping_coeff_rebound unit="N/M/SEC"> 62338 </damping_coeff_rebound>
        <max_steer unit="DEG"> 75.0 </max_steer>
        <brake_group> NONE </brake_group>
        <retractable> 1 </retractable>
      </contact>
      <contact type="BOGEY" name="Left Main Gear">
        <location unit="M">
          <x> 11.0700 </x>
          <y> -1.5550 </y>
          <z> -2.2700 </z>
        </location>
        <static_friction> 0.8 </static_friction>
        <dynamic_friction> 0.5 </dynamic_friction>
        <rolling_friction> 0.02 </rolling_friction>
        <spring_coeff unit="N/M"> 334130 </spring_coeff>
        <damping_coeff unit="N/M/SEC"> 45268 </damping_coeff>
        <damping_coeff_rebound unit="N/M/SEC"> 90536 </damping_coeff_rebound>
        <max_steer unit="DEG"> 0.0 </max_steer>
        <brake_group> LEFT </brake_group>
        <retractable> 1 </retractable>
      </contact>
      <contact type="BOGEY" name="Right Main Gear">
        <location unit="M">
          <x> 11.0700 </x>
          <y> 1.5550 </y>
          <z> -2.2700 </z>
        </location>
        <static_friction> 0.8 </static_friction>
        <dynamic_friction> 0.5 </dynamic_friction>
        <rolling_friction> 0.02 </rolling_friction>
        <spring_coeff unit="N/M"> 334130 </spring_coeff>
        <damping_coeff unit="N/M/SEC"> 45268 </damping_coeff>
        <damping_coeff_rebound unit="N/M/SEC"> 90536 </damping_coeff_rebound>
        <max_steer unit="DEG"> 0.0 </max_steer>
        <brake_group> RIGHT </brake_group>
        <retractable> 1 </retractable>
      </contact>
      <contact type="STRUCTURE" name="canopy front">
        <location unit="M">
          <x> 4.6000 </x>
          <y> 0.0000 </y>
          <z> 1.1238 </z>
        </location>
        <static_friction> 0.8 </static_friction>
        <dynamic_friction> 0.6 </dynamic_friction>
        <spring_coeff unit="N/M"> 2553770 </spring_coeff>
        <damping_coeff unit="N/M/SEC"> 85126 </damping_coeff>
        <damping_coeff_rebound unit="N/M/SEC"> 85126 </damping_coeff_rebound>
      </contact>
      <contact type="STRUCTURE" name="fin left rear">
        <location unit="M">
          <x> 14.9600 </x>
          <y> -1.8199 </y>
          <z> 2.5800 </z>
        </location>
        <static_friction> 0.8 </static_friction>
        <dynamic_friction> 0.6 </dynamic_friction>
        <spring_coeff unit="N/M"> 1230980 </spring_coeff>
        <damping_coeff unit="N/M/SEC"> 41033 </damping_coeff>
        <damping_coeff_rebound unit="N/M/SEC"> 41033 </damping_coeff_rebound>
      </contact>
      <contact type="STRUCTURE" name="fin right rear">
        <location unit="M">
          <x> 14.9600 </x>
          <y> 1.8199 </y>
          <z> 2.5800 </z>
        </location>
        <static_friction> 0.8 </static_friction>
        <dynamic_friction> 0.6 </dynamic_friction>
        <spring_coeff unit="N/M"> 1230982 </spring_coeff>
        <damping_coeff unit="N/M/SEC"> 41033 </damping_coeff>
        <damping_coeff_rebound unit="N/M/SEC"> 41033 </damping_coeff_rebound>
      </contact>
      <contact type="STRUCTURE" name="fuselage front">
        <location unit="M">
          <x> 0.0000 </x>
          <y> 0.0000 </y>
          <z> -0.5200 </z>
        </location>
        <static_friction> 0.8 </static_friction>
        <dynamic_friction> 0.6 </dynamic_friction>
        <spring_coeff unit="N/M"> 1310650 </spring_coeff>
        <damping_coeff unit="N/M/SEC"> 43688 </damping_coeff>
        <damping_coeff_rebound unit="N/M/SEC"> 43688 </damping_coeff_rebound>
      </contact>
      <contact type="STRUCTURE" name="fuselage rear">
        <location unit="M">
          <x> 14.8046 </x>
          <y> -0.0000 </y>
          <z> -0.7626 </z>
        </location>
        <static_friction> 0.8 </static_friction>
        <dynamic_friction> 0.6 </dynamic_friction>
        <spring_coeff unit="N/M"> 3531771 </spring_coeff>
        <damping_coeff unit="N/M/SEC"> 117726 </damping_coeff>
        <damping_coeff_rebound unit="N/M/SEC"> 117726 </damping_coeff_rebound>
      </contact>
      <contact type="STRUCTURE" name="htail left rear">
        <location unit="M">
          <x> 17.2100 </x>
          <y> -2.8500 </y>
          <z> -0.2101 </z>
        </location>
        <static_friction> 0.8 </static_friction>
        <dynamic_friction> 0.6 </dynamic_friction>
        <spring_coeff unit="N/M"> 1122369 </spring_coeff>
        <damping_coeff unit="N/M/SEC"> 37412 </damping_coeff>
        <damping_coeff_rebound unit="N/M/SEC"> 37412 </damping_coeff_rebound>
      </contact>
      <contact type="STRUCTURE" name="htail right rear">
        <location unit="M">
          <x> 17.2100 </x>
          <y> 2.8500 </y>
          <z> -0.2101 </z>
        </location>
        <static_friction> 0.8 </static_friction>
        <dynamic_friction> 0.6 </dynamic_friction>
        <spring_coeff unit="N/M"> 1122375 </spring_coeff>
        <damping_coeff unit="N/M/SEC"> 37412 </damping_coeff>
        <damping_coeff_rebound unit="N/M/SEC"> 37412 </damping_coeff_rebound>
      </contact>
      <contact type="STRUCTURE" name="wing left rear">
        <location unit="M">
          <x> 11.0800 </x>
          <y> -5.7150 </y>
          <z> -0.1000 </z>
        </location>
        <static_friction> 0.8 </static_friction>
        <dynamic_friction> 0.6 </dynamic_friction>
        <spring_coeff unit="N/M"> 565248 </spring_coeff>
        <damping_coeff unit="N/M/SEC"> 18842 </damping_coeff>
        <damping_coeff_rebound unit="N/M/SEC"> 18842 </damping_coeff_rebound>
      </contact>
      <contact type="STRUCTURE" name="wing left rear 2">
        <location unit="M">
          <x> 12.8100 </x>
          <y> -5.7150 </y>
          <z> -0.1001 </z>
        </location>
        <static_friction> 0.8 </static_friction>
        <dynamic_friction> 0.6 </dynamic_friction>
        <spring_coeff unit="N/M"> 549637 </spring_coeff>
        <damping_coeff unit="N/M/SEC"> 18321 </damping_coeff>
        <damping_coeff_rebound unit="N/M/SEC"> 18321 </damping_coeff_rebound>
      </contact>
      <contact type="STRUCTURE" name="wing right rear">
        <location unit="M">
          <x> 12.8100 </x>
          <y> 5.7150 </y>
          <z> -0.1001 </z>
        </location>
        <static_friction> 0.8 </static_friction>
        <dynamic_friction> 0.6 </dynamic_friction>
        <spring_coeff unit="N/M"> 549638 </spring_coeff>
        <damping_coeff unit="N/M/SEC"> 18321 </damping_coeff>
        <damping_coeff_rebound unit="N/M/SEC"> 18321 </damping_coeff_rebound>
      </contact>
      <contact type="STRUCTURE" name="wing right rear 2">
        <location unit="M">
          <x> 11.0800 </x>
          <y> 5.7150 </y>
          <z> -0.1000 </z>
        </location>
        <static_friction> 0.8 </static_friction>
        <dynamic_friction> 0.6 </dynamic_friction>
        <spring_coeff unit="N/M"> 565248 </spring_coeff>
        <damping_coeff unit="N/M/SEC"> 18842 </damping_coeff>
        <damping_coeff_rebound unit="N/M/SEC"> 18842 </damping_coeff_rebound>
      </contact>
    </ground_reactions>
    <propulsion>
      <engine file="fa18c_engine0">
        <location unit="M">
          <x> 13.5000 </x>
          <y> -0.5000 </y>
          <z> -0.3000 </z>
        </location>
        <feed>0</feed>
        <feed>1</feed>
        <feed>2</feed>
        <feed>3</feed>
        <feed>4</feed>
        <thruster file="fa18c_nozzle0">
          <location unit="M">
            <x> 16.6000 </x>
            <y> -0.5000 </y>
            <z> -0.3000 </z>
          </location>
          <orient unit="DEG"> <roll>0.00</roll> <pitch>0.00</pitch> <yaw>0.00</yaw> </orient>

        </thruster>
      </engine>
      <engine file="fa18c_engine0">
        <location unit="M">
          <x> 13.5000 </x>
          <y> 0.5000 </y>
          <z> -0.3000 </z>
        </location>
        <feed>0</feed>
        <feed>1</feed>
        <feed>2</feed>
        <feed>3</feed>
        <feed>4</feed>
        <thruster file="fa18c_nozzle0">
          <location unit="M">
            <x> 16.6000 </x>
            <y> 0.5000 </y>
            <z> -0.3000 </z>
          </location>
          <orient unit="DEG"> <roll>0.00</roll> <pitch>0.00</pitch> <yaw>0.00</yaw> </orient>

        </thruster>
      </engine>
      <tank type="FUEL">
        <location unit="M">
          <x> 8.6100 </x>
          <y> 0.0000 </y>
          <z> -0.2000 </z>
        </location>
        <capacity unit="KG"> 1400.00 </capacity>
        <contents unit="KG"> 1400.00 </contents>
      </tank>
      <tank type="FUEL">
        <location unit="M">
          <x> 10.1100 </x>
          <y> 0.0000 </y>
          <z> -0.2000 </z>
        </location>
        <capacity unit="KG"> 1300.00 </capacity>
        <contents unit="KG"> 1300.00 </contents>
      </tank>
      <tank type="FUEL">
        <location unit="M">
          <x> 11.6100 </x>
          <y> 0.0000 </y>
          <z> -0.2500 </z>
        </location>
        <capacity unit="KG"> 1100.00 </capacity>
        <contents unit="KG"> 1100.00 </contents>
      </tank>
      <tank type="FUEL">
        <location unit="M">
          <x> 10.4100 </x>
          <y> -2.3000 </y>
          <z> 0.0000 </z>
        </location>
        <capacity unit="KG"> 550.00 </capacity>
        <contents unit="KG"> 550.00 </contents>
      </tank>
      <tank type="FUEL">
        <location unit="M">
          <x> 10.4100 </x>
          <y> 2.3000 </y>
          <z> 0.0000 </z>
        </location>
        <capacity unit="KG"> 550.00 </capacity>
        <contents unit="KG"> 550.00 </contents>
      </tank>
    </propulsion>
    <flight_control name="fa18c">
      <!-- the aircraft's profile for the platform (docs/control-architecture.md, section 7): what
           hangar knows of it - its design, its flight tests, its identified responses -->
      <property value="1">fsim/identity/version</property>
      <property value="1">fsim/identity/provenance</property>
      <property value="2">fsim/identity/class</property>
      <property value="2">fsim/identity/family</property>
      <property value="1">fsim/effectors/version</property>
      <property value="1">fsim/effectors/provenance</property>
      <property value="1">fsim/effectors/flaps</property>
      <property value="8">fsim/effectors/flaps_transit_s</property>
      <property value="1">fsim/effectors/neutral</property>
      <property value="1">fsim/effectors/pitch</property>
      <property value="0.0">fsim/effectors/pitch_trim</property>
      <property value="1">fsim/effectors/retractable_gear</property>
      <property value="1">fsim/effectors/roll</property>
      <property value="1">fsim/effectors/speedbrake</property>
      <property value="1">fsim/effectors/speedbrake_approach</property>
      <property value="1">fsim/effectors/wheel_brakes</property>
      <property value="0.0">fsim/effectors/yaw</property>
      <property value="1">fsim/envelope/version</property>
      <property value="1">fsim/envelope/provenance</property>
      <property value="35">fsim/envelope/clean/alpha_max_deg</property>
      <property value="61.3814">fsim/envelope/clean/cas_min_ms</property>
      <property value="7.5">fsim/envelope/clean/n_max</property>
      <property value="-3">fsim/envelope/clean/n_min</property>
      <property value="220">fsim/envelope/clean/roll_rate_max_deg_s</property>
      <property value="15.43">fsim/envelope/crosswind_max_ms</property>
      <property value="128.61">fsim/envelope/flaps/cas_max_ms</property>
      <property value="0.05">fsim/envelope/flaps_threshold</property>
      <property value="128.61">fsim/envelope/gear_cas_max_ms</property>
      <property value="17.02">fsim/envelope/ground_pitch_max_deg</property>
      <property value="3.46">fsim/envelope/ground_turn_radius_m</property>
      <property value="0.1067">fsim/envelope/ground_yaw_accel_rad_s2</property>
      <property value="1">fsim/envelope/law_alpha</property>
      <property value="1">fsim/envelope/law_load_factor</property>
      <property value="1">fsim/envelope/law_roll_rate</property>
      <property value="1">fsim/propulsion/version</property>
      <property value="1">fsim/propulsion/provenance</property>
      <property value="1">fsim/propulsion/afterburner</property>
      <property value="2">fsim/propulsion/engines</property>
      <property value="0.168615">fsim/propulsion/spool_s</property>
      <property value="2">fsim/propulsion/type</property>
      <property value="1">fsim/plant/version</property>
      <property value="1">fsim/plant/provenance</property>
      <property value="-0.523892">fsim/plant/alpha_zero_lift_deg</property>
      <property value="3000">fsim/plant/altitude_m</property>
      <property value="144.172">fsim/plant/eas_ms</property>
      <property value="0.0">fsim/plant/elevator_trim</property>
      <property value="0.0">fsim/plant/elevator_trim_lift</property>
      <property value="7.35694">fsim/plant/pitch/gain</property>
      <property value="0.711822">fsim/plant/pitch/tau_s</property>
      <property value="3.66331">fsim/plant/roll/gain</property>
      <property value="0.181037">fsim/plant/roll/tau_s</property>
      <property value="5.96576">fsim/plant/speed/gain</property>
      <property value="0.168615">fsim/plant/speed/tau_s</property>
      <property value="164.776">fsim/plant/tas_ms</property>
      <property value="0.322846">fsim/plant/throttle_trim</property>
      <property value="0.0966993">fsim/plant/yaw/gain</property>
      <property value="1">fsim/performance/version</property>
      <property value="1">fsim/performance/provenance</property>
      <property value="18292.3">fsim/performance/ceiling_m</property>
      <property value="257.993">fsim/performance/climb_ms</property>
      <property value="380.571">fsim/performance/max_tas_ms</property>
      <property value="1">fsim/applicability/version</property>
      <property value="1">fsim/applicability/provenance</property>
      <property value="1">fsim/applicability/aerobatic</property>
      <property value="2">fsim/applicability/carrier</property>
      <property value="2">fsim/applicability/drag_devices</property>
      <property value="1">fsim/applicability/flaps</property>
      <property value="1">fsim/applicability/ground_contact</property>
      <property value="2">fsim/applicability/releasable_stores</property>
      <property value="1">fsim/applicability/retractable_gear</property>
      <property value="0.0">fsim/applicability/vertical_flight</property>
      <property value="1">fsim/tables/version</property>
      <property value="1">fsim/tables/provenance</property>
      <property value="100">fsim/tables/altitude_m/h0</property>
      <property value="3660">fsim/tables/altitude_m/h1</property>
      <property value="7320">fsim/tables/altitude_m/h2</property>
      <property value="10980">fsim/tables/altitude_m/h3</property>
      <property value="12192">fsim/tables/altitude_m/h4</property>
      <property value="13720">fsim/tables/altitude_m/h5</property>
      <property value="15550">fsim/tables/altitude_m/h6</property>
      <property value="17380">fsim/tables/altitude_m/h7</property>
      <property value="0.544967">fsim/tables/best_endurance_fuel_kg_s/h0/w0</property>
      <property value="0.459506">fsim/tables/best_endurance_fuel_kg_s/h0/w1</property>
      <property value="0.500191">fsim/tables/best_endurance_fuel_kg_s/h0/w2</property>
      <property value="0.393242">fsim/tables/best_endurance_fuel_kg_s/h1/w0</property>
      <property value="0.395951">fsim/tables/best_endurance_fuel_kg_s/h1/w1</property>
      <property value="0.441959">fsim/tables/best_endurance_fuel_kg_s/h1/w2</property>
      <property value="0.307523">fsim/tables/best_endurance_fuel_kg_s/h2/w0</property>
      <property value="0.340773">fsim/tables/best_endurance_fuel_kg_s/h2/w1</property>
      <property value="0.381139">fsim/tables/best_endurance_fuel_kg_s/h2/w2</property>
      <property value="0.255273">fsim/tables/best_endurance_fuel_kg_s/h3/w0</property>
      <property value="0.291545">fsim/tables/best_endurance_fuel_kg_s/h3/w1</property>
      <property value="0.33148">fsim/tables/best_endurance_fuel_kg_s/h3/w2</property>
      <property value="0.241921">fsim/tables/best_endurance_fuel_kg_s/h4/w0</property>
      <property value="0.285379">fsim/tables/best_endurance_fuel_kg_s/h4/w1</property>
      <property value="0.328696">fsim/tables/best_endurance_fuel_kg_s/h4/w2</property>
      <property value="0.234447">fsim/tables/best_endurance_fuel_kg_s/h5/w0</property>
      <property value="0.286672">fsim/tables/best_endurance_fuel_kg_s/h5/w1</property>
      <property value="0.338992">fsim/tables/best_endurance_fuel_kg_s/h5/w2</property>
      <property value="0.243132">fsim/tables/best_endurance_fuel_kg_s/h6/w0</property>
      <property value="0.308152">fsim/tables/best_endurance_fuel_kg_s/h6/w1</property>
      <property value="0.967734">fsim/tables/best_endurance_fuel_kg_s/h6/w2</property>
      <property value="0.702385">fsim/tables/best_endurance_fuel_kg_s/h7/w0</property>
      <property value="0.91263">fsim/tables/best_endurance_fuel_kg_s/h7/w1</property>
      <property value="1.16025">fsim/tables/best_endurance_fuel_kg_s/h7/w2</property>
      <property value="198.562">fsim/tables/best_endurance_tas_ms/h0/w0</property>
      <property value="150.189">fsim/tables/best_endurance_tas_ms/h0/w1</property>
      <property value="142.115">fsim/tables/best_endurance_tas_ms/h0/w2</property>
      <property value="194.041">fsim/tables/best_endurance_tas_ms/h1/w0</property>
      <property value="159.629">fsim/tables/best_endurance_tas_ms/h1/w1</property>
      <property value="171.691">fsim/tables/best_endurance_tas_ms/h1/w2</property>
      <property value="199.319">fsim/tables/best_endurance_tas_ms/h2/w0</property>
      <property value="195.151">fsim/tables/best_endurance_tas_ms/h2/w1</property>
      <property value="207.624">fsim/tables/best_endurance_tas_ms/h2/w2</property>
      <property value="218.646">fsim/tables/best_endurance_tas_ms/h3/w0</property>
      <property value="226.512">fsim/tables/best_endurance_tas_ms/h3/w1</property>
      <property value="232.905">fsim/tables/best_endurance_tas_ms/h3/w2</property>
      <property value="227.868">fsim/tables/best_endurance_tas_ms/h4/w0</property>
      <property value="234.261">fsim/tables/best_endurance_tas_ms/h4/w1</property>
      <property value="240.756">fsim/tables/best_endurance_tas_ms/h4/w2</property>
      <property value="239.654">fsim/tables/best_endurance_tas_ms/h5/w0</property>
      <property value="243.857">fsim/tables/best_endurance_tas_ms/h5/w1</property>
      <property value="250.69">fsim/tables/best_endurance_tas_ms/h5/w2</property>
      <property value="249.633">fsim/tables/best_endurance_tas_ms/h6/w0</property>
      <property value="264.736">fsim/tables/best_endurance_tas_ms/h6/w1</property>
      <property value="260.776">fsim/tables/best_endurance_tas_ms/h6/w2</property>
      <property value="260.258">fsim/tables/best_endurance_tas_ms/h7/w0</property>
      <property value="267.074">fsim/tables/best_endurance_tas_ms/h7/w1</property>
      <property value="276.684">fsim/tables/best_endurance_tas_ms/h7/w2</property>
      <property value="0.544967">fsim/tables/best_range_fuel_kg_s/h0/w0</property>
      <property value="0.560733">fsim/tables/best_range_fuel_kg_s/h0/w1</property>
      <property value="0.629317">fsim/tables/best_range_fuel_kg_s/h0/w2</property>
      <property value="0.436554">fsim/tables/best_range_fuel_kg_s/h1/w0</property>
      <property value="0.482201">fsim/tables/best_range_fuel_kg_s/h1/w1</property>
      <property value="0.527576">fsim/tables/best_range_fuel_kg_s/h1/w2</property>
      <property value="0.345621">fsim/tables/best_range_fuel_kg_s/h2/w0</property>
      <property value="0.375233">fsim/tables/best_range_fuel_kg_s/h2/w1</property>
      <property value="0.403239">fsim/tables/best_range_fuel_kg_s/h2/w2</property>
      <property value="0.263719">fsim/tables/best_range_fuel_kg_s/h3/w0</property>
      <property value="0.301467">fsim/tables/best_range_fuel_kg_s/h3/w1</property>
      <property value="0.340619">fsim/tables/best_range_fuel_kg_s/h3/w2</property>
      <property value="0.252553">fsim/tables/best_range_fuel_kg_s/h4/w0</property>
      <property value="0.294164">fsim/tables/best_range_fuel_kg_s/h4/w1</property>
      <property value="0.337002">fsim/tables/best_range_fuel_kg_s/h4/w2</property>
      <property value="0.241176">fsim/tables/best_range_fuel_kg_s/h5/w0</property>
      <property value="0.296766">fsim/tables/best_range_fuel_kg_s/h5/w1</property>
      <property value="0.346799">fsim/tables/best_range_fuel_kg_s/h5/w2</property>
      <property value="0.248894">fsim/tables/best_range_fuel_kg_s/h6/w0</property>
      <property value="0.317833">fsim/tables/best_range_fuel_kg_s/h6/w1</property>
      <property value="0.999241">fsim/tables/best_range_fuel_kg_s/h6/w2</property>
      <property value="0.727172">fsim/tables/best_range_fuel_kg_s/h7/w0</property>
      <property value="0.938622">fsim/tables/best_range_fuel_kg_s/h7/w1</property>
      <property value="1.19076">fsim/tables/best_range_fuel_kg_s/h7/w2</property>
      <property value="198.562">fsim/tables/best_range_tas_ms/h0/w0</property>
      <property value="197.436">fsim/tables/best_range_tas_ms/h0/w1</property>
      <property value="213.805">fsim/tables/best_range_tas_ms/h0/w2</property>
      <property value="217.86">fsim/tables/best_range_tas_ms/h1/w0</property>
      <property value="230.607">fsim/tables/best_range_tas_ms/h1/w1</property>
      <property value="241.687">fsim/tables/best_range_tas_ms/h1/w2</property>
      <property value="238.055">fsim/tables/best_range_tas_ms/h2/w0</property>
      <property value="242.733">fsim/tables/best_range_tas_ms/h2/w1</property>
      <property value="246.301">fsim/tables/best_range_tas_ms/h2/w2</property>
      <property value="237.23">fsim/tables/best_range_tas_ms/h3/w0</property>
      <property value="244.679">fsim/tables/best_range_tas_ms/h3/w1</property>
      <property value="247.866">fsim/tables/best_range_tas_ms/h3/w2</property>
      <property value="242.649">fsim/tables/best_range_tas_ms/h4/w0</property>
      <property value="248.824">fsim/tables/best_range_tas_ms/h4/w1</property>
      <property value="252.821">fsim/tables/best_range_tas_ms/h4/w2</property>
      <property value="249.381">fsim/tables/best_range_tas_ms/h5/w0</property>
      <property value="255.866">fsim/tables/best_range_tas_ms/h5/w1</property>
      <property value="255.957">fsim/tables/best_range_tas_ms/h5/w2</property>
      <property value="258.845">fsim/tables/best_range_tas_ms/h6/w0</property>
      <property value="266.467">fsim/tables/best_range_tas_ms/h6/w1</property>
      <property value="268.897">fsim/tables/best_range_tas_ms/h6/w2</property>
      <property value="269.162">fsim/tables/best_range_tas_ms/h7/w0</property>
      <property value="275.699">fsim/tables/best_range_tas_ms/h7/w1</property>
      <property value="286.359">fsim/tables/best_range_tas_ms/h7/w2</property>
      <property value="277.08">fsim/tables/climb_tas_ms/h0/w0</property>
      <property value="278.03">fsim/tables/climb_tas_ms/h0/w1</property>
      <property value="279.938">fsim/tables/climb_tas_ms/h0/w2</property>
      <property value="281.899">fsim/tables/climb_tas_ms/h1/w0</property>
      <property value="282.074">fsim/tables/climb_tas_ms/h1/w1</property>
      <property value="283.296">fsim/tables/climb_tas_ms/h1/w2</property>
      <property value="274.03">fsim/tables/climb_tas_ms/h2/w0</property>
      <property value="276.096">fsim/tables/climb_tas_ms/h2/w1</property>
      <property value="275.047">fsim/tables/climb_tas_ms/h2/w2</property>
      <property value="263.508">fsim/tables/climb_tas_ms/h3/w0</property>
      <property value="267.522">fsim/tables/climb_tas_ms/h3/w1</property>
      <property value="267.084">fsim/tables/climb_tas_ms/h3/w2</property>
      <property value="265.82">fsim/tables/climb_tas_ms/h4/w0</property>
      <property value="267.392">fsim/tables/climb_tas_ms/h4/w1</property>
      <property value="268.56">fsim/tables/climb_tas_ms/h4/w2</property>
      <property value="267.03">fsim/tables/climb_tas_ms/h5/w0</property>
      <property value="268.463">fsim/tables/climb_tas_ms/h5/w1</property>
      <property value="268.603">fsim/tables/climb_tas_ms/h5/w2</property>
      <property value="269.169">fsim/tables/climb_tas_ms/h6/w0</property>
      <property value="268.846">fsim/tables/climb_tas_ms/h6/w1</property>
      <property value="259.447">fsim/tables/climb_tas_ms/h6/w2</property>
      <property value="282.848">fsim/tables/climb_tas_ms/h7/w0</property>
      <property value="272.029">fsim/tables/climb_tas_ms/h7/w1</property>
      <property value="285.188">fsim/tables/climb_tas_ms/h7/w2</property>
      <property value="4900">fsim/tables/fuel_capacity_kg</property>
      <property value="0.544961">fsim/tables/fuel_kg_s/h0/w0/v0</property>
      <property value="0.583193">fsim/tables/fuel_kg_s/h0/w0/v1</property>
      <property value="1.45921">fsim/tables/fuel_kg_s/h0/w0/v10</property>
      <property value="1.84058">fsim/tables/fuel_kg_s/h0/w0/v11</property>
      <property value="5.08668">fsim/tables/fuel_kg_s/h0/w0/v12</property>
      <property value="5.97448">fsim/tables/fuel_kg_s/h0/w0/v13</property>
      <property value="6.71437">fsim/tables/fuel_kg_s/h0/w0/v14</property>
      <property value="7.13979">fsim/tables/fuel_kg_s/h0/w0/v15</property>
      <property value="0.622409">fsim/tables/fuel_kg_s/h0/w0/v2</property>
      <property value="0.662573">fsim/tables/fuel_kg_s/h0/w0/v3</property>
      <property value="0.705903">fsim/tables/fuel_kg_s/h0/w0/v4</property>
      <property value="0.755391">fsim/tables/fuel_kg_s/h0/w0/v5</property>
      <property value="0.809021">fsim/tables/fuel_kg_s/h0/w0/v6</property>
      <property value="0.877639">fsim/tables/fuel_kg_s/h0/w0/v7</property>
      <property value="0.968342">fsim/tables/fuel_kg_s/h0/w0/v8</property>
      <property value="1.17145">fsim/tables/fuel_kg_s/h0/w0/v9</property>
      <property value="0.459488">fsim/tables/fuel_kg_s/h0/w1/v0</property>
      <property value="0.480538">fsim/tables/fuel_kg_s/h0/w1/v1</property>
      <property value="1.08536">fsim/tables/fuel_kg_s/h0/w1/v10</property>
      <property value="1.40831">fsim/tables/fuel_kg_s/h0/w1/v11</property>
      <property value="1.89497">fsim/tables/fuel_kg_s/h0/w1/v12</property>
      <property value="5.54992">fsim/tables/fuel_kg_s/h0/w1/v13</property>
      <property value="6.51427">fsim/tables/fuel_kg_s/h0/w1/v14</property>
      <property value="7.14222">fsim/tables/fuel_kg_s/h0/w1/v15</property>
      <property value="0.513727">fsim/tables/fuel_kg_s/h0/w1/v2</property>
      <property value="0.550449">fsim/tables/fuel_kg_s/h0/w1/v3</property>
      <property value="0.593816">fsim/tables/fuel_kg_s/h0/w1/v4</property>
      <property value="0.643729">fsim/tables/fuel_kg_s/h0/w1/v5</property>
      <property value="0.695164">fsim/tables/fuel_kg_s/h0/w1/v6</property>
      <property value="0.753506">fsim/tables/fuel_kg_s/h0/w1/v7</property>
      <property value="0.814503">fsim/tables/fuel_kg_s/h0/w1/v8</property>
      <property value="0.905468">fsim/tables/fuel_kg_s/h0/w1/v9</property>
      <property value="0.500184">fsim/tables/fuel_kg_s/h0/w2/v0</property>
      <property value="0.507179">fsim/tables/fuel_kg_s/h0/w2/v1</property>
      <property value="1.03874">fsim/tables/fuel_kg_s/h0/w2/v10</property>
      <property value="1.34096">fsim/tables/fuel_kg_s/h0/w2/v11</property>
      <property value="1.83195">fsim/tables/fuel_kg_s/h0/w2/v12</property>
      <property value="5.42608">fsim/tables/fuel_kg_s/h0/w2/v13</property>
      <property value="6.46958">fsim/tables/fuel_kg_s/h0/w2/v14</property>
      <property value="7.14782">fsim/tables/fuel_kg_s/h0/w2/v15</property>
      <property value="0.528918">fsim/tables/fuel_kg_s/h0/w2/v2</property>
      <property value="0.559566">fsim/tables/fuel_kg_s/h0/w2/v3</property>
      <property value="0.597865">fsim/tables/fuel_kg_s/h0/w2/v4</property>
      <property value="0.640101">fsim/tables/fuel_kg_s/h0/w2/v5</property>
      <property value="0.692429">fsim/tables/fuel_kg_s/h0/w2/v6</property>
      <property value="0.749964">fsim/tables/fuel_kg_s/h0/w2/v7</property>
      <property value="0.811908">fsim/tables/fuel_kg_s/h0/w2/v8</property>
      <property value="0.889189">fsim/tables/fuel_kg_s/h0/w2/v9</property>
      <property value="0.393238">fsim/tables/fuel_kg_s/h1/w0/v0</property>
      <property value="0.418852">fsim/tables/fuel_kg_s/h1/w0/v1</property>
      <property value="4.26988">fsim/tables/fuel_kg_s/h1/w0/v10</property>
      <property value="4.67087">fsim/tables/fuel_kg_s/h1/w0/v11</property>
      <property value="5.05212">fsim/tables/fuel_kg_s/h1/w0/v12</property>
      <property value="5.44611">fsim/tables/fuel_kg_s/h1/w0/v13</property>
      <property value="5.82701">fsim/tables/fuel_kg_s/h1/w0/v14</property>
      <property value="6.19753">fsim/tables/fuel_kg_s/h1/w0/v15</property>
      <property value="0.447391">fsim/tables/fuel_kg_s/h1/w0/v2</property>
      <property value="0.484426">fsim/tables/fuel_kg_s/h1/w0/v3</property>
      <property value="0.524108">fsim/tables/fuel_kg_s/h1/w0/v4</property>
      <property value="0.576673">fsim/tables/fuel_kg_s/h1/w0/v5</property>
      <property value="0.681003">fsim/tables/fuel_kg_s/h1/w0/v6</property>
      <property value="0.888614">fsim/tables/fuel_kg_s/h1/w0/v7</property>
      <property value="1.20137">fsim/tables/fuel_kg_s/h1/w0/v8</property>
      <property value="1.56433">fsim/tables/fuel_kg_s/h1/w0/v9</property>
      <property value="0.402614">fsim/tables/fuel_kg_s/h1/w1/v0</property>
      <property value="0.395986">fsim/tables/fuel_kg_s/h1/w1/v1</property>
      <property value="1.49795">fsim/tables/fuel_kg_s/h1/w1/v10</property>
      <property value="4.31504">fsim/tables/fuel_kg_s/h1/w1/v11</property>
      <property value="4.79395">fsim/tables/fuel_kg_s/h1/w1/v12</property>
      <property value="5.26825">fsim/tables/fuel_kg_s/h1/w1/v13</property>
      <property value="5.74985">fsim/tables/fuel_kg_s/h1/w1/v14</property>
      <property value="6.20436">fsim/tables/fuel_kg_s/h1/w1/v15</property>
      <property value="0.404704">fsim/tables/fuel_kg_s/h1/w1/v2</property>
      <property value="0.422343">fsim/tables/fuel_kg_s/h1/w1/v3</property>
      <property value="0.453531">fsim/tables/fuel_kg_s/h1/w1/v4</property>
      <property value="0.486937">fsim/tables/fuel_kg_s/h1/w1/v5</property>
      <property value="0.533849">fsim/tables/fuel_kg_s/h1/w1/v6</property>
      <property value="0.598465">fsim/tables/fuel_kg_s/h1/w1/v7</property>
      <property value="0.754633">fsim/tables/fuel_kg_s/h1/w1/v8</property>
      <property value="1.07059">fsim/tables/fuel_kg_s/h1/w1/v9</property>
      <property value="0.475156">fsim/tables/fuel_kg_s/h1/w2/v0</property>
      <property value="0.446694">fsim/tables/fuel_kg_s/h1/w2/v1</property>
      <property value="1.46151">fsim/tables/fuel_kg_s/h1/w2/v10</property>
      <property value="4.26083">fsim/tables/fuel_kg_s/h1/w2/v11</property>
      <property value="4.78418">fsim/tables/fuel_kg_s/h1/w2/v12</property>
      <property value="5.2638">fsim/tables/fuel_kg_s/h1/w2/v13</property>
      <property value="5.75384">fsim/tables/fuel_kg_s/h1/w2/v14</property>
      <property value="6.21408">fsim/tables/fuel_kg_s/h1/w2/v15</property>
      <property value="0.442248">fsim/tables/fuel_kg_s/h1/w2/v2</property>
      <property value="0.452535">fsim/tables/fuel_kg_s/h1/w2/v3</property>
      <property value="0.471507">fsim/tables/fuel_kg_s/h1/w2/v4</property>
      <property value="0.50415">fsim/tables/fuel_kg_s/h1/w2/v5</property>
      <property value="0.541698">fsim/tables/fuel_kg_s/h1/w2/v6</property>
      <property value="0.601512">fsim/tables/fuel_kg_s/h1/w2/v7</property>
      <property value="0.741683">fsim/tables/fuel_kg_s/h1/w2/v8</property>
      <property value="1.04166">fsim/tables/fuel_kg_s/h1/w2/v9</property>
      <property value="0.307522">fsim/tables/fuel_kg_s/h2/w0/v0</property>
      <property value="0.318899">fsim/tables/fuel_kg_s/h2/w0/v1</property>
      <property value="3.54909">fsim/tables/fuel_kg_s/h2/w0/v10</property>
      <property value="3.83617">fsim/tables/fuel_kg_s/h2/w0/v11</property>
      <property value="4.13082">fsim/tables/fuel_kg_s/h2/w0/v12</property>
      <property value="4.43294">fsim/tables/fuel_kg_s/h2/w0/v13</property>
      <property value="4.75712">fsim/tables/fuel_kg_s/h2/w0/v14</property>
      <property value="5.09445">fsim/tables/fuel_kg_s/h2/w0/v15</property>
      <property value="0.34089">fsim/tables/fuel_kg_s/h2/w0/v2</property>
      <property value="0.369062">fsim/tables/fuel_kg_s/h2/w0/v3</property>
      <property value="0.445286">fsim/tables/fuel_kg_s/h2/w0/v4</property>
      <property value="0.619193">fsim/tables/fuel_kg_s/h2/w0/v5</property>
      <property value="0.864424">fsim/tables/fuel_kg_s/h2/w0/v6</property>
      <property value="1.0857">fsim/tables/fuel_kg_s/h2/w0/v7</property>
      <property value="2.95616">fsim/tables/fuel_kg_s/h2/w0/v8</property>
      <property value="3.25016">fsim/tables/fuel_kg_s/h2/w0/v9</property>
      <property value="0.402351">fsim/tables/fuel_kg_s/h2/w1/v0</property>
      <property value="0.357415">fsim/tables/fuel_kg_s/h2/w1/v1</property>
      <property value="3.26863">fsim/tables/fuel_kg_s/h2/w1/v10</property>
      <property value="3.62815">fsim/tables/fuel_kg_s/h2/w1/v11</property>
      <property value="3.97459">fsim/tables/fuel_kg_s/h2/w1/v12</property>
      <property value="4.33355">fsim/tables/fuel_kg_s/h2/w1/v13</property>
      <property value="4.71104">fsim/tables/fuel_kg_s/h2/w1/v14</property>
      <property value="5.10982">fsim/tables/fuel_kg_s/h2/w1/v15</property>
      <property value="0.342225">fsim/tables/fuel_kg_s/h2/w1/v2</property>
      <property value="0.343559">fsim/tables/fuel_kg_s/h2/w1/v3</property>
      <property value="0.358087">fsim/tables/fuel_kg_s/h2/w1/v4</property>
      <property value="0.385478">fsim/tables/fuel_kg_s/h2/w1/v5</property>
      <property value="0.471119">fsim/tables/fuel_kg_s/h2/w1/v6</property>
      <property value="0.699953">fsim/tables/fuel_kg_s/h2/w1/v7</property>
      <property value="0.996716">fsim/tables/fuel_kg_s/h2/w1/v8</property>
      <property value="2.9112">fsim/tables/fuel_kg_s/h2/w1/v9</property>
      <property value="0.486217">fsim/tables/fuel_kg_s/h2/w2/v0</property>
      <property value="0.416865">fsim/tables/fuel_kg_s/h2/w2/v1</property>
      <property value="3.29883">fsim/tables/fuel_kg_s/h2/w2/v10</property>
      <property value="3.657">fsim/tables/fuel_kg_s/h2/w2/v11</property>
      <property value="4.0013">fsim/tables/fuel_kg_s/h2/w2/v12</property>
      <property value="4.35861">fsim/tables/fuel_kg_s/h2/w2/v13</property>
      <property value="4.73348">fsim/tables/fuel_kg_s/h2/w2/v14</property>
      <property value="5.1299">fsim/tables/fuel_kg_s/h2/w2/v15</property>
      <property value="0.387916">fsim/tables/fuel_kg_s/h2/w2/v2</property>
      <property value="0.381141">fsim/tables/fuel_kg_s/h2/w2/v3</property>
      <property value="0.388276">fsim/tables/fuel_kg_s/h2/w2/v4</property>
      <property value="0.407116">fsim/tables/fuel_kg_s/h2/w2/v5</property>
      <property value="0.490077">fsim/tables/fuel_kg_s/h2/w2/v6</property>
      <property value="0.707843">fsim/tables/fuel_kg_s/h2/w2/v7</property>
      <property value="1.00479">fsim/tables/fuel_kg_s/h2/w2/v8</property>
      <property value="2.94205">fsim/tables/fuel_kg_s/h2/w2/v9</property>
      <property value="0.442531">fsim/tables/fuel_kg_s/h3/w0/v0</property>
      <property value="0.322866">fsim/tables/fuel_kg_s/h3/w0/v1</property>
      <property value="2.50594">fsim/tables/fuel_kg_s/h3/w0/v10</property>
      <property value="2.78812">fsim/tables/fuel_kg_s/h3/w0/v11</property>
      <property value="3.09003">fsim/tables/fuel_kg_s/h3/w0/v12</property>
      <property value="3.40605">fsim/tables/fuel_kg_s/h3/w0/v13</property>
      <property value="3.73207">fsim/tables/fuel_kg_s/h3/w0/v14</property>
      <property value="4.07023">fsim/tables/fuel_kg_s/h3/w0/v15</property>
      <property value="0.271726">fsim/tables/fuel_kg_s/h3/w0/v2</property>
      <property value="0.256651">fsim/tables/fuel_kg_s/h3/w0/v3</property>
      <property value="0.25819">fsim/tables/fuel_kg_s/h3/w0/v4</property>
      <property value="0.308618">fsim/tables/fuel_kg_s/h3/w0/v5</property>
      <property value="0.485007">fsim/tables/fuel_kg_s/h3/w0/v6</property>
      <property value="0.667497">fsim/tables/fuel_kg_s/h3/w0/v7</property>
      <property value="1.97184">fsim/tables/fuel_kg_s/h3/w0/v8</property>
      <property value="2.23937">fsim/tables/fuel_kg_s/h3/w0/v9</property>
      <property value="0.423945">fsim/tables/fuel_kg_s/h3/w1/v0</property>
      <property value="0.340169">fsim/tables/fuel_kg_s/h3/w1/v1</property>
      <property value="2.63079">fsim/tables/fuel_kg_s/h3/w1/v10</property>
      <property value="2.8948">fsim/tables/fuel_kg_s/h3/w1/v11</property>
      <property value="3.17762">fsim/tables/fuel_kg_s/h3/w1/v12</property>
      <property value="3.47479">fsim/tables/fuel_kg_s/h3/w1/v13</property>
      <property value="3.78044">fsim/tables/fuel_kg_s/h3/w1/v14</property>
      <property value="4.09712">fsim/tables/fuel_kg_s/h3/w1/v15</property>
      <property value="0.304009">fsim/tables/fuel_kg_s/h3/w1/v2</property>
      <property value="0.291557">fsim/tables/fuel_kg_s/h3/w1/v3</property>
      <property value="0.305574">fsim/tables/fuel_kg_s/h3/w1/v4</property>
      <property value="0.424199">fsim/tables/fuel_kg_s/h3/w1/v5</property>
      <property value="0.614316">fsim/tables/fuel_kg_s/h3/w1/v6</property>
      <property value="1.90208">fsim/tables/fuel_kg_s/h3/w1/v7</property>
      <property value="2.14153">fsim/tables/fuel_kg_s/h3/w1/v8</property>
      <property value="2.38036">fsim/tables/fuel_kg_s/h3/w1/v9</property>
      <property value="0.522829">fsim/tables/fuel_kg_s/h3/w2/v0</property>
      <property value="0.406252">fsim/tables/fuel_kg_s/h3/w2/v1</property>
      <property value="2.70166">fsim/tables/fuel_kg_s/h3/w2/v10</property>
      <property value="2.96469">fsim/tables/fuel_kg_s/h3/w2/v11</property>
      <property value="3.23809">fsim/tables/fuel_kg_s/h3/w2/v12</property>
      <property value="3.52549">fsim/tables/fuel_kg_s/h3/w2/v13</property>
      <property value="3.81474">fsim/tables/fuel_kg_s/h3/w2/v14</property>
      <property value="4.12498">fsim/tables/fuel_kg_s/h3/w2/v15</property>
      <property value="0.352648">fsim/tables/fuel_kg_s/h3/w2/v2</property>
      <property value="0.331805">fsim/tables/fuel_kg_s/h3/w2/v3</property>
      <property value="0.343454">fsim/tables/fuel_kg_s/h3/w2/v4</property>
      <property value="0.46222">fsim/tables/fuel_kg_s/h3/w2/v5</property>
      <property value="0.647141">fsim/tables/fuel_kg_s/h3/w2/v6</property>
      <property value="1.98164">fsim/tables/fuel_kg_s/h3/w2/v7</property>
      <property value="2.21657">fsim/tables/fuel_kg_s/h3/w2/v8</property>
      <property value="2.45237">fsim/tables/fuel_kg_s/h3/w2/v9</property>
      <property value="0.458865">fsim/tables/fuel_kg_s/h4/w0/v0</property>
      <property value="0.330062">fsim/tables/fuel_kg_s/h4/w0/v1</property>
      <property value="2.13851">fsim/tables/fuel_kg_s/h4/w0/v10</property>
      <property value="2.36552">fsim/tables/fuel_kg_s/h4/w0/v11</property>
      <property value="2.60225">fsim/tables/fuel_kg_s/h4/w0/v12</property>
      <property value="2.85824">fsim/tables/fuel_kg_s/h4/w0/v13</property>
      <property value="3.12217">fsim/tables/fuel_kg_s/h4/w0/v14</property>
      <property value="3.39594">fsim/tables/fuel_kg_s/h4/w0/v15</property>
      <property value="0.272147">fsim/tables/fuel_kg_s/h4/w0/v2</property>
      <property value="0.249046">fsim/tables/fuel_kg_s/h4/w0/v3</property>
      <property value="0.247306">fsim/tables/fuel_kg_s/h4/w0/v4</property>
      <property value="0.295376">fsim/tables/fuel_kg_s/h4/w0/v5</property>
      <property value="0.449322">fsim/tables/fuel_kg_s/h4/w0/v6</property>
      <property value="1.50284">fsim/tables/fuel_kg_s/h4/w0/v7</property>
      <property value="1.71625">fsim/tables/fuel_kg_s/h4/w0/v8</property>
      <property value="1.92468">fsim/tables/fuel_kg_s/h4/w0/v9</property>
      <property value="0.463195">fsim/tables/fuel_kg_s/h4/w1/v0</property>
      <property value="0.356359">fsim/tables/fuel_kg_s/h4/w1/v1</property>
      <property value="2.26054">fsim/tables/fuel_kg_s/h4/w1/v10</property>
      <property value="2.47797">fsim/tables/fuel_kg_s/h4/w1/v11</property>
      <property value="2.70388">fsim/tables/fuel_kg_s/h4/w1/v12</property>
      <property value="2.94151">fsim/tables/fuel_kg_s/h4/w1/v13</property>
      <property value="3.18054">fsim/tables/fuel_kg_s/h4/w1/v14</property>
      <property value="3.42866">fsim/tables/fuel_kg_s/h4/w1/v15</property>
      <property value="0.306013">fsim/tables/fuel_kg_s/h4/w1/v2</property>
      <property value="0.285693">fsim/tables/fuel_kg_s/h4/w1/v3</property>
      <property value="0.297082">fsim/tables/fuel_kg_s/h4/w1/v4</property>
      <property value="0.397543">fsim/tables/fuel_kg_s/h4/w1/v5</property>
      <property value="0.550695">fsim/tables/fuel_kg_s/h4/w1/v6</property>
      <property value="1.66668">fsim/tables/fuel_kg_s/h4/w1/v7</property>
      <property value="1.86012">fsim/tables/fuel_kg_s/h4/w1/v8</property>
      <property value="2.05434">fsim/tables/fuel_kg_s/h4/w1/v9</property>
      <property value="1.47711">fsim/tables/fuel_kg_s/h4/w2/v0</property>
      <property value="0.432715">fsim/tables/fuel_kg_s/h4/w2/v1</property>
      <property value="2.32543">fsim/tables/fuel_kg_s/h4/w2/v10</property>
      <property value="2.53925">fsim/tables/fuel_kg_s/h4/w2/v11</property>
      <property value="2.76065">fsim/tables/fuel_kg_s/h4/w2/v12</property>
      <property value="2.99423">fsim/tables/fuel_kg_s/h4/w2/v13</property>
      <property value="3.23007">fsim/tables/fuel_kg_s/h4/w2/v14</property>
      <property value="3.47415">fsim/tables/fuel_kg_s/h4/w2/v15</property>
      <property value="0.361076">fsim/tables/fuel_kg_s/h4/w2/v2</property>
      <property value="0.330291">fsim/tables/fuel_kg_s/h4/w2/v3</property>
      <property value="0.338711">fsim/tables/fuel_kg_s/h4/w2/v4</property>
      <property value="0.441065">fsim/tables/fuel_kg_s/h4/w2/v5</property>
      <property value="1.51431">fsim/tables/fuel_kg_s/h4/w2/v6</property>
      <property value="1.76801">fsim/tables/fuel_kg_s/h4/w2/v7</property>
      <property value="1.94066">fsim/tables/fuel_kg_s/h4/w2/v8</property>
      <property value="2.12329">fsim/tables/fuel_kg_s/h4/w2/v9</property>
      <property value="1.24017">fsim/tables/fuel_kg_s/h5/w0/v0</property>
      <property value="0.340024">fsim/tables/fuel_kg_s/h5/w0/v1</property>
      <property value="1.80055">fsim/tables/fuel_kg_s/h5/w0/v10</property>
      <property value="1.97768">fsim/tables/fuel_kg_s/h5/w0/v11</property>
      <property value="2.16184">fsim/tables/fuel_kg_s/h5/w0/v12</property>
      <property value="2.35573">fsim/tables/fuel_kg_s/h5/w0/v13</property>
      <property value="2.55106">fsim/tables/fuel_kg_s/h5/w0/v14</property>
      <property value="2.75422">fsim/tables/fuel_kg_s/h5/w0/v15</property>
      <property value="0.275973">fsim/tables/fuel_kg_s/h5/w0/v2</property>
      <property value="0.245912">fsim/tables/fuel_kg_s/h5/w0/v3</property>
      <property value="0.240988">fsim/tables/fuel_kg_s/h5/w0/v4</property>
      <property value="0.306732">fsim/tables/fuel_kg_s/h5/w0/v5</property>
      <property value="0.42992">fsim/tables/fuel_kg_s/h5/w0/v6</property>
      <property value="1.32985">fsim/tables/fuel_kg_s/h5/w0/v7</property>
      <property value="1.47535">fsim/tables/fuel_kg_s/h5/w0/v8</property>
      <property value="1.63314">fsim/tables/fuel_kg_s/h5/w0/v9</property>
      <property value="1.3301">fsim/tables/fuel_kg_s/h5/w1/v0</property>
      <property value="0.387931">fsim/tables/fuel_kg_s/h5/w1/v1</property>
      <property value="1.90787">fsim/tables/fuel_kg_s/h5/w1/v10</property>
      <property value="2.07278">fsim/tables/fuel_kg_s/h5/w1/v11</property>
      <property value="2.23953">fsim/tables/fuel_kg_s/h5/w1/v12</property>
      <property value="2.42048">fsim/tables/fuel_kg_s/h5/w1/v13</property>
      <property value="2.60622">fsim/tables/fuel_kg_s/h5/w1/v14</property>
      <property value="2.79927">fsim/tables/fuel_kg_s/h5/w1/v15</property>
      <property value="0.319551">fsim/tables/fuel_kg_s/h5/w1/v2</property>
      <property value="0.287763">fsim/tables/fuel_kg_s/h5/w1/v3</property>
      <property value="0.299966">fsim/tables/fuel_kg_s/h5/w1/v4</property>
      <property value="0.389566">fsim/tables/fuel_kg_s/h5/w1/v5</property>
      <property value="1.29405">fsim/tables/fuel_kg_s/h5/w1/v6</property>
      <property value="1.46874">fsim/tables/fuel_kg_s/h5/w1/v7</property>
      <property value="1.60348">fsim/tables/fuel_kg_s/h5/w1/v8</property>
      <property value="1.74866">fsim/tables/fuel_kg_s/h5/w1/v9</property>
      <property value="1.21807">fsim/tables/fuel_kg_s/h5/w2/v1</property>
      <property value="1.99222">fsim/tables/fuel_kg_s/h5/w2/v10</property>
      <property value="2.15059">fsim/tables/fuel_kg_s/h5/w2/v11</property>
      <property value="2.31181">fsim/tables/fuel_kg_s/h5/w2/v12</property>
      <property value="2.48377">fsim/tables/fuel_kg_s/h5/w2/v13</property>
      <property value="2.65474">fsim/tables/fuel_kg_s/h5/w2/v14</property>
      <property value="2.82899">fsim/tables/fuel_kg_s/h5/w2/v15</property>
      <property value="0.386818">fsim/tables/fuel_kg_s/h5/w2/v2</property>
      <property value="0.342233">fsim/tables/fuel_kg_s/h5/w2/v3</property>
      <property value="0.350007">fsim/tables/fuel_kg_s/h5/w2/v4</property>
      <property value="1.13067">fsim/tables/fuel_kg_s/h5/w2/v5</property>
      <property value="1.4211">fsim/tables/fuel_kg_s/h5/w2/v6</property>
      <property value="1.58143">fsim/tables/fuel_kg_s/h5/w2/v7</property>
      <property value="1.7068">fsim/tables/fuel_kg_s/h5/w2/v8</property>
      <property value="1.84077">fsim/tables/fuel_kg_s/h5/w2/v9</property>
      <property value="0.949913">fsim/tables/fuel_kg_s/h6/w0/v1</property>
      <property value="1.46722">fsim/tables/fuel_kg_s/h6/w0/v10</property>
      <property value="1.58993">fsim/tables/fuel_kg_s/h6/w0/v11</property>
      <property value="1.703">fsim/tables/fuel_kg_s/h6/w0/v12</property>
      <property value="1.83152">fsim/tables/fuel_kg_s/h6/w0/v13</property>
      <property value="1.96278">fsim/tables/fuel_kg_s/h6/w0/v14</property>
      <property value="2.0949">fsim/tables/fuel_kg_s/h6/w0/v15</property>
      <property value="0.293907">fsim/tables/fuel_kg_s/h6/w0/v2</property>
      <property value="0.252742">fsim/tables/fuel_kg_s/h6/w0/v3</property>
      <property value="0.248789">fsim/tables/fuel_kg_s/h6/w0/v4</property>
      <property value="0.304878">fsim/tables/fuel_kg_s/h6/w0/v5</property>
      <property value="0.998193">fsim/tables/fuel_kg_s/h6/w0/v6</property>
      <property value="1.15362">fsim/tables/fuel_kg_s/h6/w0/v7</property>
      <property value="1.25107">fsim/tables/fuel_kg_s/h6/w0/v8</property>
      <property value="1.35416">fsim/tables/fuel_kg_s/h6/w0/v9</property>
      <property value="1.15501">fsim/tables/fuel_kg_s/h6/w1/v1</property>
      <property value="1.59257">fsim/tables/fuel_kg_s/h6/w1/v10</property>
      <property value="1.71403">fsim/tables/fuel_kg_s/h6/w1/v11</property>
      <property value="1.81448">fsim/tables/fuel_kg_s/h6/w1/v12</property>
      <property value="1.92394">fsim/tables/fuel_kg_s/h6/w1/v13</property>
      <property value="2.03884">fsim/tables/fuel_kg_s/h6/w1/v14</property>
      <property value="2.1538">fsim/tables/fuel_kg_s/h6/w1/v15</property>
      <property value="0.931641">fsim/tables/fuel_kg_s/h6/w1/v2</property>
      <property value="0.753022">fsim/tables/fuel_kg_s/h6/w1/v3</property>
      <property value="0.312898">fsim/tables/fuel_kg_s/h6/w1/v4</property>
      <property value="0.957646">fsim/tables/fuel_kg_s/h6/w1/v5</property>
      <property value="1.16345">fsim/tables/fuel_kg_s/h6/w1/v6</property>
      <property value="1.30387">fsim/tables/fuel_kg_s/h6/w1/v7</property>
      <property value="1.39274">fsim/tables/fuel_kg_s/h6/w1/v8</property>
      <property value="1.48664">fsim/tables/fuel_kg_s/h6/w1/v9</property>
      <property value="1.19076">fsim/tables/fuel_kg_s/h6/w2/v0</property>
      <property value="1.0302">fsim/tables/fuel_kg_s/h6/w2/v1</property>
      <property value="1.77189">fsim/tables/fuel_kg_s/h6/w2/v10</property>
      <property value="1.87375">fsim/tables/fuel_kg_s/h6/w2/v11</property>
      <property value="1.95255">fsim/tables/fuel_kg_s/h6/w2/v12</property>
      <property value="2.04405">fsim/tables/fuel_kg_s/h6/w2/v13</property>
      <property value="2.14277">fsim/tables/fuel_kg_s/h6/w2/v14</property>
      <property value="2.23563">fsim/tables/fuel_kg_s/h6/w2/v15</property>
      <property value="0.967807">fsim/tables/fuel_kg_s/h6/w2/v2</property>
      <property value="1.03894">fsim/tables/fuel_kg_s/h6/w2/v3</property>
      <property value="1.17724">fsim/tables/fuel_kg_s/h6/w2/v4</property>
      <property value="1.35186">fsim/tables/fuel_kg_s/h6/w2/v5</property>
      <property value="1.46717">fsim/tables/fuel_kg_s/h6/w2/v6</property>
      <property value="1.53001">fsim/tables/fuel_kg_s/h6/w2/v7</property>
      <property value="1.60029">fsim/tables/fuel_kg_s/h6/w2/v8</property>
      <property value="1.67972">fsim/tables/fuel_kg_s/h6/w2/v9</property>
      <property value="0.881445">fsim/tables/fuel_kg_s/h7/w0/v0</property>
      <property value="0.757645">fsim/tables/fuel_kg_s/h7/w0/v1</property>
      <property value="1.32451">fsim/tables/fuel_kg_s/h7/w0/v10</property>
      <property value="1.40094">fsim/tables/fuel_kg_s/h7/w0/v11</property>
      <property value="1.4661">fsim/tables/fuel_kg_s/h7/w0/v12</property>
      <property value="1.53845">fsim/tables/fuel_kg_s/h7/w0/v13</property>
      <property value="1.61639">fsim/tables/fuel_kg_s/h7/w0/v14</property>
      <property value="1.68646">fsim/tables/fuel_kg_s/h7/w0/v15</property>
      <property value="0.702541">fsim/tables/fuel_kg_s/h7/w0/v2</property>
      <property value="0.746258">fsim/tables/fuel_kg_s/h7/w0/v3</property>
      <property value="0.858925">fsim/tables/fuel_kg_s/h7/w0/v4</property>
      <property value="0.993137">fsim/tables/fuel_kg_s/h7/w0/v5</property>
      <property value="1.08296">fsim/tables/fuel_kg_s/h7/w0/v6</property>
      <property value="1.13326">fsim/tables/fuel_kg_s/h7/w0/v7</property>
      <property value="1.18903">fsim/tables/fuel_kg_s/h7/w0/v8</property>
      <property value="1.25182">fsim/tables/fuel_kg_s/h7/w0/v9</property>
      <property value="0.948752">fsim/tables/fuel_kg_s/h7/w1/v1</property>
      <property value="1.45195">fsim/tables/fuel_kg_s/h7/w1/v10</property>
      <property value="1.52258">fsim/tables/fuel_kg_s/h7/w1/v11</property>
      <property value="1.58754">fsim/tables/fuel_kg_s/h7/w1/v12</property>
      <property value="1.64357">fsim/tables/fuel_kg_s/h7/w1/v13</property>
      <property value="1.70185">fsim/tables/fuel_kg_s/h7/w1/v14</property>
      <property value="1.75753">fsim/tables/fuel_kg_s/h7/w1/v15</property>
      <property value="0.913192">fsim/tables/fuel_kg_s/h7/w1/v2</property>
      <property value="0.968923">fsim/tables/fuel_kg_s/h7/w1/v3</property>
      <property value="1.0675">fsim/tables/fuel_kg_s/h7/w1/v4</property>
      <property value="1.18669">fsim/tables/fuel_kg_s/h7/w1/v5</property>
      <property value="1.26527">fsim/tables/fuel_kg_s/h7/w1/v6</property>
      <property value="1.29939">fsim/tables/fuel_kg_s/h7/w1/v7</property>
      <property value="1.34121">fsim/tables/fuel_kg_s/h7/w1/v8</property>
      <property value="1.39199">fsim/tables/fuel_kg_s/h7/w1/v9</property>
      <property value="1.65062">fsim/tables/fuel_kg_s/h7/w2/v10</property>
      <property value="1.6749">fsim/tables/fuel_kg_s/h7/w2/v11</property>
      <property value="1.69834">fsim/tables/fuel_kg_s/h7/w2/v12</property>
      <property value="1.72087">fsim/tables/fuel_kg_s/h7/w2/v13</property>
      <property value="1.74429">fsim/tables/fuel_kg_s/h7/w2/v14</property>
      <property value="1.77391">fsim/tables/fuel_kg_s/h7/w2/v15</property>
      <property value="1.16025">fsim/tables/fuel_kg_s/h7/w2/v2</property>
      <property value="1.1981">fsim/tables/fuel_kg_s/h7/w2/v3</property>
      <property value="1.27765">fsim/tables/fuel_kg_s/h7/w2/v4</property>
      <property value="1.36544">fsim/tables/fuel_kg_s/h7/w2/v5</property>
      <property value="1.55541">fsim/tables/fuel_kg_s/h7/w2/v6</property>
      <property value="1.57786">fsim/tables/fuel_kg_s/h7/w2/v7</property>
      <property value="1.6009">fsim/tables/fuel_kg_s/h7/w2/v8</property>
      <property value="1.62546">fsim/tables/fuel_kg_s/h7/w2/v9</property>
      <property value="343.193">fsim/tables/max_climb_ms/h0/w0</property>
      <property value="290.649">fsim/tables/max_climb_ms/h0/w1</property>
      <property value="251.558">fsim/tables/max_climb_ms/h0/w2</property>
      <property value="278.304">fsim/tables/max_climb_ms/h1/w0</property>
      <property value="234.472">fsim/tables/max_climb_ms/h1/w1</property>
      <property value="201.976">fsim/tables/max_climb_ms/h1/w2</property>
      <property value="209.205">fsim/tables/max_climb_ms/h2/w0</property>
      <property value="174.915">fsim/tables/max_climb_ms/h2/w1</property>
      <property value="149.65">fsim/tables/max_climb_ms/h2/w2</property>
      <property value="148.344">fsim/tables/max_climb_ms/h3/w0</property>
      <property value="121.607">fsim/tables/max_climb_ms/h3/w1</property>
      <property value="102.239">fsim/tables/max_climb_ms/h3/w2</property>
      <property value="119.739">fsim/tables/max_climb_ms/h4/w0</property>
      <property value="97.1774">fsim/tables/max_climb_ms/h4/w1</property>
      <property value="80.5822">fsim/tables/max_climb_ms/h4/w2</property>
      <property value="92.4649">fsim/tables/max_climb_ms/h5/w0</property>
      <property value="73.9393">fsim/tables/max_climb_ms/h5/w1</property>
      <property value="59.5016">fsim/tables/max_climb_ms/h5/w2</property>
      <property value="60.1199">fsim/tables/max_climb_ms/h6/w0</property>
      <property value="45.2302">fsim/tables/max_climb_ms/h6/w1</property>
      <property value="33.8045">fsim/tables/max_climb_ms/h6/w2</property>
      <property value="37.4795">fsim/tables/max_climb_ms/h7/w0</property>
      <property value="24.8145">fsim/tables/max_climb_ms/h7/w1</property>
      <property value="13.4263">fsim/tables/max_climb_ms/h7/w2</property>
      <property value="380.993">fsim/tables/max_tas_ms/h0/w0</property>
      <property value="380.545">fsim/tables/max_tas_ms/h0/w1</property>
      <property value="380.162">fsim/tables/max_tas_ms/h0/w2</property>
      <property value="427.352">fsim/tables/max_tas_ms/h1/w0</property>
      <property value="426.7">fsim/tables/max_tas_ms/h1/w1</property>
      <property value="426.136">fsim/tables/max_tas_ms/h1/w2</property>
      <property value="481.747">fsim/tables/max_tas_ms/h2/w0</property>
      <property value="480.781">fsim/tables/max_tas_ms/h2/w1</property>
      <property value="479.025">fsim/tables/max_tas_ms/h2/w2</property>
      <property value="541.539">fsim/tables/max_tas_ms/h3/w0</property>
      <property value="539.259">fsim/tables/max_tas_ms/h3/w1</property>
      <property value="537.264">fsim/tables/max_tas_ms/h3/w2</property>
      <property value="539">fsim/tables/max_tas_ms/h4/w0</property>
      <property value="536.605">fsim/tables/max_tas_ms/h4/w1</property>
      <property value="532.678">fsim/tables/max_tas_ms/h4/w2</property>
      <property value="539.112">fsim/tables/max_tas_ms/h5/w0</property>
      <property value="534.226">fsim/tables/max_tas_ms/h5/w1</property>
      <property value="526.605">fsim/tables/max_tas_ms/h5/w2</property>
      <property value="523.565">fsim/tables/max_tas_ms/h6/w0</property>
      <property value="513.114">fsim/tables/max_tas_ms/h6/w1</property>
      <property value="498.719">fsim/tables/max_tas_ms/h6/w2</property>
      <property value="502.988">fsim/tables/max_tas_ms/h7/w0</property>
      <property value="481.192">fsim/tables/max_tas_ms/h7/w1</property>
      <property value="446.416">fsim/tables/max_tas_ms/h7/w2</property>
      <property value="198.562">fsim/tables/min_tas_ms/h0/w0</property>
      <property value="150.189">fsim/tables/min_tas_ms/h0/w1</property>
      <property value="142.115">fsim/tables/min_tas_ms/h0/w2</property>
      <property value="194.041">fsim/tables/min_tas_ms/h1/w0</property>
      <property value="142.798">fsim/tables/min_tas_ms/h1/w1</property>
      <property value="138.711">fsim/tables/min_tas_ms/h1/w2</property>
      <property value="199.319">fsim/tables/min_tas_ms/h2/w0</property>
      <property value="143.005">fsim/tables/min_tas_ms/h2/w1</property>
      <property value="143.718">fsim/tables/min_tas_ms/h2/w2</property>
      <property value="128.518">fsim/tables/min_tas_ms/h3/w0</property>
      <property value="153.286">fsim/tables/min_tas_ms/h3/w1</property>
      <property value="156.553">fsim/tables/min_tas_ms/h3/w2</property>
      <property value="136.929">fsim/tables/min_tas_ms/h4/w0</property>
      <property value="158.46">fsim/tables/min_tas_ms/h4/w1</property>
      <property value="163.384">fsim/tables/min_tas_ms/h4/w2</property>
      <property value="151.195">fsim/tables/min_tas_ms/h5/w0</property>
      <property value="168.807">fsim/tables/min_tas_ms/h5/w1</property>
      <property value="175.867">fsim/tables/min_tas_ms/h5/w2</property>
      <property value="169.128">fsim/tables/min_tas_ms/h6/w0</property>
      <property value="182.697">fsim/tables/min_tas_ms/h6/w1</property>
      <property value="227.086">fsim/tables/min_tas_ms/h6/w2</property>
      <property value="224.025">fsim/tables/min_tas_ms/h7/w0</property>
      <property value="238.273">fsim/tables/min_tas_ms/h7/w1</property>
      <property value="252.585">fsim/tables/min_tas_ms/h7/w2</property>
      <property value="265.009">fsim/tables/ps_full_ms/h0/w0/v0</property>
      <property value="279.48">fsim/tables/ps_full_ms/h0/w0/v1</property>
      <property value="292.875">fsim/tables/ps_full_ms/h0/w0/v10</property>
      <property value="249.695">fsim/tables/ps_full_ms/h0/w0/v11</property>
      <property value="193.392">fsim/tables/ps_full_ms/h0/w0/v12</property>
      <property value="133.102">fsim/tables/ps_full_ms/h0/w0/v13</property>
      <property value="79.0511">fsim/tables/ps_full_ms/h0/w0/v14</property>
      <property value="40.331">fsim/tables/ps_full_ms/h0/w0/v15</property>
      <property value="293.787">fsim/tables/ps_full_ms/h0/w0/v2</property>
      <property value="307.852">fsim/tables/ps_full_ms/h0/w0/v3</property>
      <property value="321.23">fsim/tables/ps_full_ms/h0/w0/v4</property>
      <property value="332.654">fsim/tables/ps_full_ms/h0/w0/v5</property>
      <property value="340.497">fsim/tables/ps_full_ms/h0/w0/v6</property>
      <property value="342.912">fsim/tables/ps_full_ms/h0/w0/v7</property>
      <property value="337.524">fsim/tables/ps_full_ms/h0/w0/v8</property>
      <property value="321.62">fsim/tables/ps_full_ms/h0/w0/v9</property>
      <property value="168.112">fsim/tables/ps_full_ms/h0/w1/v0</property>
      <property value="184.107">fsim/tables/ps_full_ms/h0/w1/v1</property>
      <property value="280.188">fsim/tables/ps_full_ms/h0/w1/v10</property>
      <property value="252.494">fsim/tables/ps_full_ms/h0/w1/v11</property>
      <property value="204">fsim/tables/ps_full_ms/h0/w1/v12</property>
      <property value="139.941">fsim/tables/ps_full_ms/h0/w1/v13</property>
      <property value="78.3603">fsim/tables/ps_full_ms/h0/w1/v14</property>
      <property value="33.7585">fsim/tables/ps_full_ms/h0/w1/v15</property>
      <property value="199.955">fsim/tables/ps_full_ms/h0/w1/v2</property>
      <property value="215.58">fsim/tables/ps_full_ms/h0/w1/v3</property>
      <property value="231.094">fsim/tables/ps_full_ms/h0/w1/v4</property>
      <property value="246.582">fsim/tables/ps_full_ms/h0/w1/v5</property>
      <property value="261.976">fsim/tables/ps_full_ms/h0/w1/v6</property>
      <property value="276.48">fsim/tables/ps_full_ms/h0/w1/v7</property>
      <property value="287.381">fsim/tables/ps_full_ms/h0/w1/v8</property>
      <property value="290.229">fsim/tables/ps_full_ms/h0/w1/v9</property>
      <property value="135.377">fsim/tables/ps_full_ms/h0/w2/v0</property>
      <property value="149.909">fsim/tables/ps_full_ms/h0/w2/v1</property>
      <property value="245.884">fsim/tables/ps_full_ms/h0/w2/v10</property>
      <property value="223.509">fsim/tables/ps_full_ms/h0/w2/v11</property>
      <property value="181.665">fsim/tables/ps_full_ms/h0/w2/v12</property>
      <property value="124.66">fsim/tables/ps_full_ms/h0/w2/v13</property>
      <property value="69.5968">fsim/tables/ps_full_ms/h0/w2/v14</property>
      <property value="29.0492">fsim/tables/ps_full_ms/h0/w2/v15</property>
      <property value="164.357">fsim/tables/ps_full_ms/h0/w2/v2</property>
      <property value="178.465">fsim/tables/ps_full_ms/h0/w2/v3</property>
      <property value="192.457">fsim/tables/ps_full_ms/h0/w2/v4</property>
      <property value="206.522">fsim/tables/ps_full_ms/h0/w2/v5</property>
      <property value="220.528">fsim/tables/ps_full_ms/h0/w2/v6</property>
      <property value="234.18">fsim/tables/ps_full_ms/h0/w2/v7</property>
      <property value="245.803">fsim/tables/ps_full_ms/h0/w2/v8</property>
      <property value="251.407">fsim/tables/ps_full_ms/h0/w2/v9</property>
      <property value="203.845">fsim/tables/ps_full_ms/h1/w0/v0</property>
      <property value="219.295">fsim/tables/ps_full_ms/h1/w0/v1</property>
      <property value="182.412">fsim/tables/ps_full_ms/h1/w0/v10</property>
      <property value="157.34">fsim/tables/ps_full_ms/h1/w0/v11</property>
      <property value="134.764">fsim/tables/ps_full_ms/h1/w0/v12</property>
      <property value="108.906">fsim/tables/ps_full_ms/h1/w0/v13</property>
      <property value="76.1744">fsim/tables/ps_full_ms/h1/w0/v14</property>
      <property value="36.9694">fsim/tables/ps_full_ms/h1/w0/v15</property>
      <property value="234.478">fsim/tables/ps_full_ms/h1/w0/v2</property>
      <property value="249.302">fsim/tables/ps_full_ms/h1/w0/v3</property>
      <property value="263.334">fsim/tables/ps_full_ms/h1/w0/v4</property>
      <property value="274.387">fsim/tables/ps_full_ms/h1/w0/v5</property>
      <property value="278.231">fsim/tables/ps_full_ms/h1/w0/v6</property>
      <property value="270.392">fsim/tables/ps_full_ms/h1/w0/v7</property>
      <property value="248.455">fsim/tables/ps_full_ms/h1/w0/v8</property>
      <property value="215.907">fsim/tables/ps_full_ms/h1/w0/v9</property>
      <property value="123.407">fsim/tables/ps_full_ms/h1/w1/v0</property>
      <property value="139.392">fsim/tables/ps_full_ms/h1/w1/v1</property>
      <property value="186.32">fsim/tables/ps_full_ms/h1/w1/v10</property>
      <property value="150.848">fsim/tables/ps_full_ms/h1/w1/v11</property>
      <property value="126.074">fsim/tables/ps_full_ms/h1/w1/v12</property>
      <property value="101.312">fsim/tables/ps_full_ms/h1/w1/v13</property>
      <property value="70.7518">fsim/tables/ps_full_ms/h1/w1/v14</property>
      <property value="30.828">fsim/tables/ps_full_ms/h1/w1/v15</property>
      <property value="155.338">fsim/tables/ps_full_ms/h1/w1/v2</property>
      <property value="171.255">fsim/tables/ps_full_ms/h1/w1/v3</property>
      <property value="187.183">fsim/tables/ps_full_ms/h1/w1/v4</property>
      <property value="203.067">fsim/tables/ps_full_ms/h1/w1/v5</property>
      <property value="218.481">fsim/tables/ps_full_ms/h1/w1/v6</property>
      <property value="231.044">fsim/tables/ps_full_ms/h1/w1/v7</property>
      <property value="233.549">fsim/tables/ps_full_ms/h1/w1/v8</property>
      <property value="218.462">fsim/tables/ps_full_ms/h1/w1/v9</property>
      <property value="100.99">fsim/tables/ps_full_ms/h1/w2/v0</property>
      <property value="115.297">fsim/tables/ps_full_ms/h1/w2/v1</property>
      <property value="162.635">fsim/tables/ps_full_ms/h1/w2/v10</property>
      <property value="131.061">fsim/tables/ps_full_ms/h1/w2/v11</property>
      <property value="109.038">fsim/tables/ps_full_ms/h1/w2/v12</property>
      <property value="87.5421">fsim/tables/ps_full_ms/h1/w2/v13</property>
      <property value="61.1899">fsim/tables/ps_full_ms/h1/w2/v14</property>
      <property value="26.4659">fsim/tables/ps_full_ms/h1/w2/v15</property>
      <property value="129.341">fsim/tables/ps_full_ms/h1/w2/v2</property>
      <property value="143.369">fsim/tables/ps_full_ms/h1/w2/v3</property>
      <property value="157.407">fsim/tables/ps_full_ms/h1/w2/v4</property>
      <property value="171.4">fsim/tables/ps_full_ms/h1/w2/v5</property>
      <property value="185.279">fsim/tables/ps_full_ms/h1/w2/v6</property>
      <property value="197.419">fsim/tables/ps_full_ms/h1/w2/v7</property>
      <property value="201.712">fsim/tables/ps_full_ms/h1/w2/v8</property>
      <property value="190.092">fsim/tables/ps_full_ms/h1/w2/v9</property>
      <property value="158.315">fsim/tables/ps_full_ms/h2/w0/v0</property>
      <property value="173.541">fsim/tables/ps_full_ms/h2/w0/v1</property>
      <property value="158.39">fsim/tables/ps_full_ms/h2/w0/v10</property>
      <property value="145.011">fsim/tables/ps_full_ms/h2/w0/v11</property>
      <property value="128.738">fsim/tables/ps_full_ms/h2/w0/v12</property>
      <property value="109.784">fsim/tables/ps_full_ms/h2/w0/v13</property>
      <property value="76.6478">fsim/tables/ps_full_ms/h2/w0/v14</property>
      <property value="35.9434">fsim/tables/ps_full_ms/h2/w0/v15</property>
      <property value="188.258">fsim/tables/ps_full_ms/h2/w0/v2</property>
      <property value="201.629">fsim/tables/ps_full_ms/h2/w0/v3</property>
      <property value="209.015">fsim/tables/ps_full_ms/h2/w0/v4</property>
      <property value="204.191">fsim/tables/ps_full_ms/h2/w0/v5</property>
      <property value="187.674">fsim/tables/ps_full_ms/h2/w0/v6</property>
      <property value="172.529">fsim/tables/ps_full_ms/h2/w0/v7</property>
      <property value="167.806">fsim/tables/ps_full_ms/h2/w0/v8</property>
      <property value="165.156">fsim/tables/ps_full_ms/h2/w0/v9</property>
      <property value="89.4796">fsim/tables/ps_full_ms/h2/w1/v0</property>
      <property value="104.858">fsim/tables/ps_full_ms/h2/w1/v1</property>
      <property value="136.679">fsim/tables/ps_full_ms/h2/w1/v10</property>
      <property value="129.545">fsim/tables/ps_full_ms/h2/w1/v11</property>
      <property value="115.077">fsim/tables/ps_full_ms/h2/w1/v12</property>
      <property value="97.26">fsim/tables/ps_full_ms/h2/w1/v13</property>
      <property value="69.938">fsim/tables/ps_full_ms/h2/w1/v14</property>
      <property value="29.649">fsim/tables/ps_full_ms/h2/w1/v15</property>
      <property value="120.101">fsim/tables/ps_full_ms/h2/w1/v2</property>
      <property value="135.547">fsim/tables/ps_full_ms/h2/w1/v3</property>
      <property value="150.953">fsim/tables/ps_full_ms/h2/w1/v4</property>
      <property value="165.871">fsim/tables/ps_full_ms/h2/w1/v5</property>
      <property value="174.828">fsim/tables/ps_full_ms/h2/w1/v6</property>
      <property value="167.328">fsim/tables/ps_full_ms/h2/w1/v7</property>
      <property value="148.502">fsim/tables/ps_full_ms/h2/w1/v8</property>
      <property value="139.428">fsim/tables/ps_full_ms/h2/w1/v9</property>
      <property value="74.2797">fsim/tables/ps_full_ms/h2/w2/v0</property>
      <property value="87.9136">fsim/tables/ps_full_ms/h2/w2/v1</property>
      <property value="115.878">fsim/tables/ps_full_ms/h2/w2/v10</property>
      <property value="109.985">fsim/tables/ps_full_ms/h2/w2/v11</property>
      <property value="97.543">fsim/tables/ps_full_ms/h2/w2/v12</property>
      <property value="82.2961">fsim/tables/ps_full_ms/h2/w2/v13</property>
      <property value="59.7398">fsim/tables/ps_full_ms/h2/w2/v14</property>
      <property value="25.3912">fsim/tables/ps_full_ms/h2/w2/v15</property>
      <property value="101.22">fsim/tables/ps_full_ms/h2/w2/v2</property>
      <property value="114.594">fsim/tables/ps_full_ms/h2/w2/v3</property>
      <property value="127.954">fsim/tables/ps_full_ms/h2/w2/v4</property>
      <property value="141.236">fsim/tables/ps_full_ms/h2/w2/v5</property>
      <property value="149.484">fsim/tables/ps_full_ms/h2/w2/v6</property>
      <property value="143.294">fsim/tables/ps_full_ms/h2/w2/v7</property>
      <property value="126.614">fsim/tables/ps_full_ms/h2/w2/v8</property>
      <property value="118.315">fsim/tables/ps_full_ms/h2/w2/v9</property>
      <property value="37.7045">fsim/tables/ps_full_ms/h3/w0/v0</property>
      <property value="89.7328">fsim/tables/ps_full_ms/h3/w0/v1</property>
      <property value="141.521">fsim/tables/ps_full_ms/h3/w0/v10</property>
      <property value="142.084">fsim/tables/ps_full_ms/h3/w0/v11</property>
      <property value="141.461">fsim/tables/ps_full_ms/h3/w0/v12</property>
      <property value="135.797">fsim/tables/ps_full_ms/h3/w0/v13</property>
      <property value="91.9263">fsim/tables/ps_full_ms/h3/w0/v14</property>
      <property value="38.6433">fsim/tables/ps_full_ms/h3/w0/v15</property>
      <property value="99.4947">fsim/tables/ps_full_ms/h3/w0/v2</property>
      <property value="115.354">fsim/tables/ps_full_ms/h3/w0/v3</property>
      <property value="136.304">fsim/tables/ps_full_ms/h3/w0/v4</property>
      <property value="148.179">fsim/tables/ps_full_ms/h3/w0/v5</property>
      <property value="141.661">fsim/tables/ps_full_ms/h3/w0/v6</property>
      <property value="133.928">fsim/tables/ps_full_ms/h3/w0/v7</property>
      <property value="136.547">fsim/tables/ps_full_ms/h3/w0/v8</property>
      <property value="139.192">fsim/tables/ps_full_ms/h3/w0/v9</property>
      <property value="61.7409">fsim/tables/ps_full_ms/h3/w1/v0</property>
      <property value="76.7821">fsim/tables/ps_full_ms/h3/w1/v1</property>
      <property value="117.021">fsim/tables/ps_full_ms/h3/w1/v10</property>
      <property value="117.124">fsim/tables/ps_full_ms/h3/w1/v11</property>
      <property value="115.752">fsim/tables/ps_full_ms/h3/w1/v12</property>
      <property value="109.895">fsim/tables/ps_full_ms/h3/w1/v13</property>
      <property value="73.8575">fsim/tables/ps_full_ms/h3/w1/v14</property>
      <property value="31.638">fsim/tables/ps_full_ms/h3/w1/v15</property>
      <property value="91.6968">fsim/tables/ps_full_ms/h3/w1/v2</property>
      <property value="105.689">fsim/tables/ps_full_ms/h3/w1/v3</property>
      <property value="118.336">fsim/tables/ps_full_ms/h3/w1/v4</property>
      <property value="120.629">fsim/tables/ps_full_ms/h3/w1/v5</property>
      <property value="112.161">fsim/tables/ps_full_ms/h3/w1/v6</property>
      <property value="110.95">fsim/tables/ps_full_ms/h3/w1/v7</property>
      <property value="113.254">fsim/tables/ps_full_ms/h3/w1/v8</property>
      <property value="115.828">fsim/tables/ps_full_ms/h3/w1/v9</property>
      <property value="50.306">fsim/tables/ps_full_ms/h3/w2/v0</property>
      <property value="63.5975">fsim/tables/ps_full_ms/h3/w2/v1</property>
      <property value="97.0884">fsim/tables/ps_full_ms/h3/w2/v10</property>
      <property value="96.8945">fsim/tables/ps_full_ms/h3/w2/v11</property>
      <property value="95.9398">fsim/tables/ps_full_ms/h3/w2/v12</property>
      <property value="92.1006">fsim/tables/ps_full_ms/h3/w2/v13</property>
      <property value="62.5371">fsim/tables/ps_full_ms/h3/w2/v14</property>
      <property value="26.7832">fsim/tables/ps_full_ms/h3/w2/v15</property>
      <property value="76.6298">fsim/tables/ps_full_ms/h3/w2/v2</property>
      <property value="88.7211">fsim/tables/ps_full_ms/h3/w2/v3</property>
      <property value="99.7608">fsim/tables/ps_full_ms/h3/w2/v4</property>
      <property value="101.033">fsim/tables/ps_full_ms/h3/w2/v5</property>
      <property value="93.8636">fsim/tables/ps_full_ms/h3/w2/v6</property>
      <property value="92.6754">fsim/tables/ps_full_ms/h3/w2/v7</property>
      <property value="94.4548">fsim/tables/ps_full_ms/h3/w2/v8</property>
      <property value="96.3935">fsim/tables/ps_full_ms/h3/w2/v9</property>
      <property value="35.2911">fsim/tables/ps_full_ms/h4/w0/v0</property>
      <property value="74.0734">fsim/tables/ps_full_ms/h4/w0/v1</property>
      <property value="114.042">fsim/tables/ps_full_ms/h4/w0/v10</property>
      <property value="114.34">fsim/tables/ps_full_ms/h4/w0/v11</property>
      <property value="113.999">fsim/tables/ps_full_ms/h4/w0/v12</property>
      <property value="109.933">fsim/tables/ps_full_ms/h4/w0/v13</property>
      <property value="74.4974">fsim/tables/ps_full_ms/h4/w0/v14</property>
      <property value="31.2583">fsim/tables/ps_full_ms/h4/w0/v15</property>
      <property value="80.249">fsim/tables/ps_full_ms/h4/w0/v2</property>
      <property value="94.7696">fsim/tables/ps_full_ms/h4/w0/v3</property>
      <property value="111.597">fsim/tables/ps_full_ms/h4/w0/v4</property>
      <property value="119.731">fsim/tables/ps_full_ms/h4/w0/v5</property>
      <property value="112.86">fsim/tables/ps_full_ms/h4/w0/v6</property>
      <property value="107.508">fsim/tables/ps_full_ms/h4/w0/v7</property>
      <property value="110.022">fsim/tables/ps_full_ms/h4/w0/v8</property>
      <property value="112.451">fsim/tables/ps_full_ms/h4/w0/v9</property>
      <property value="46.2518">fsim/tables/ps_full_ms/h4/w1/v0</property>
      <property value="59.8231">fsim/tables/ps_full_ms/h4/w1/v1</property>
      <property value="92.024">fsim/tables/ps_full_ms/h4/w1/v10</property>
      <property value="91.7779">fsim/tables/ps_full_ms/h4/w1/v11</property>
      <property value="90.9613">fsim/tables/ps_full_ms/h4/w1/v12</property>
      <property value="87.3998">fsim/tables/ps_full_ms/h4/w1/v13</property>
      <property value="59.021">fsim/tables/ps_full_ms/h4/w1/v14</property>
      <property value="25.4882">fsim/tables/ps_full_ms/h4/w1/v15</property>
      <property value="72.8691">fsim/tables/ps_full_ms/h4/w1/v2</property>
      <property value="84.6218">fsim/tables/ps_full_ms/h4/w1/v3</property>
      <property value="95.1334">fsim/tables/ps_full_ms/h4/w1/v4</property>
      <property value="95.6816">fsim/tables/ps_full_ms/h4/w1/v5</property>
      <property value="88.8177">fsim/tables/ps_full_ms/h4/w1/v6</property>
      <property value="88.0937">fsim/tables/ps_full_ms/h4/w1/v7</property>
      <property value="89.7171">fsim/tables/ps_full_ms/h4/w1/v8</property>
      <property value="91.4695">fsim/tables/ps_full_ms/h4/w1/v9</property>
      <property value="36.3423">fsim/tables/ps_full_ms/h4/w2/v0</property>
      <property value="48.1636">fsim/tables/ps_full_ms/h4/w2/v1</property>
      <property value="75.535">fsim/tables/ps_full_ms/h4/w2/v10</property>
      <property value="74.9735">fsim/tables/ps_full_ms/h4/w2/v11</property>
      <property value="74.0361">fsim/tables/ps_full_ms/h4/w2/v12</property>
      <property value="71.6633">fsim/tables/ps_full_ms/h4/w2/v13</property>
      <property value="49.1936">fsim/tables/ps_full_ms/h4/w2/v14</property>
      <property value="21.0478">fsim/tables/ps_full_ms/h4/w2/v15</property>
      <property value="59.7758">fsim/tables/ps_full_ms/h4/w2/v2</property>
      <property value="70.1842">fsim/tables/ps_full_ms/h4/w2/v3</property>
      <property value="79.2678">fsim/tables/ps_full_ms/h4/w2/v4</property>
      <property value="78.9757">fsim/tables/ps_full_ms/h4/w2/v5</property>
      <property value="72.9069">fsim/tables/ps_full_ms/h4/w2/v6</property>
      <property value="72.1468">fsim/tables/ps_full_ms/h4/w2/v7</property>
      <property value="73.8738">fsim/tables/ps_full_ms/h4/w2/v8</property>
      <property value="75.3022">fsim/tables/ps_full_ms/h4/w2/v9</property>
      <property value="43.5791">fsim/tables/ps_full_ms/h5/w0/v0</property>
      <property value="57.5036">fsim/tables/ps_full_ms/h5/w0/v1</property>
      <property value="89.9107">fsim/tables/ps_full_ms/h5/w0/v10</property>
      <property value="90.0262">fsim/tables/ps_full_ms/h5/w0/v11</property>
      <property value="89.6089">fsim/tables/ps_full_ms/h5/w0/v12</property>
      <property value="85.8829">fsim/tables/ps_full_ms/h5/w0/v13</property>
      <property value="57.5932">fsim/tables/ps_full_ms/h5/w0/v14</property>
      <property value="24.6348">fsim/tables/ps_full_ms/h5/w0/v15</property>
      <property value="61.7832">fsim/tables/ps_full_ms/h5/w0/v2</property>
      <property value="77.1211">fsim/tables/ps_full_ms/h5/w0/v3</property>
      <property value="89.2934">fsim/tables/ps_full_ms/h5/w0/v4</property>
      <property value="91.7595">fsim/tables/ps_full_ms/h5/w0/v5</property>
      <property value="85.4861">fsim/tables/ps_full_ms/h5/w0/v6</property>
      <property value="84.5914">fsim/tables/ps_full_ms/h5/w0/v7</property>
      <property value="86.9458">fsim/tables/ps_full_ms/h5/w0/v8</property>
      <property value="88.9552">fsim/tables/ps_full_ms/h5/w0/v9</property>
      <property value="31.3786">fsim/tables/ps_full_ms/h5/w1/v0</property>
      <property value="43.6674">fsim/tables/ps_full_ms/h5/w1/v1</property>
      <property value="70.5698">fsim/tables/ps_full_ms/h5/w1/v10</property>
      <property value="70.49">fsim/tables/ps_full_ms/h5/w1/v11</property>
      <property value="70.2416">fsim/tables/ps_full_ms/h5/w1/v12</property>
      <property value="67.8258">fsim/tables/ps_full_ms/h5/w1/v13</property>
      <property value="45.8264">fsim/tables/ps_full_ms/h5/w1/v14</property>
      <property value="19.808">fsim/tables/ps_full_ms/h5/w1/v15</property>
      <property value="55.2075">fsim/tables/ps_full_ms/h5/w1/v2</property>
      <property value="65.4394">fsim/tables/ps_full_ms/h5/w1/v3</property>
      <property value="73.3018">fsim/tables/ps_full_ms/h5/w1/v4</property>
      <property value="71.6916">fsim/tables/ps_full_ms/h5/w1/v5</property>
      <property value="66.8881">fsim/tables/ps_full_ms/h5/w1/v6</property>
      <property value="67.0802">fsim/tables/ps_full_ms/h5/w1/v7</property>
      <property value="68.773">fsim/tables/ps_full_ms/h5/w1/v8</property>
      <property value="70.2516">fsim/tables/ps_full_ms/h5/w1/v9</property>
      <property value="22.4068">fsim/tables/ps_full_ms/h5/w2/v0</property>
      <property value="33.0236">fsim/tables/ps_full_ms/h5/w2/v1</property>
      <property value="55.6901">fsim/tables/ps_full_ms/h5/w2/v10</property>
      <property value="55.0426">fsim/tables/ps_full_ms/h5/w2/v11</property>
      <property value="54.5416">fsim/tables/ps_full_ms/h5/w2/v12</property>
      <property value="53.052">fsim/tables/ps_full_ms/h5/w2/v13</property>
      <property value="39.0042">fsim/tables/ps_full_ms/h5/w2/v14</property>
      <property value="18.5211">fsim/tables/ps_full_ms/h5/w2/v15</property>
      <property value="43.3761">fsim/tables/ps_full_ms/h5/w2/v2</property>
      <property value="53.1237">fsim/tables/ps_full_ms/h5/w2/v3</property>
      <property value="59.3409">fsim/tables/ps_full_ms/h5/w2/v4</property>
      <property value="57.3401">fsim/tables/ps_full_ms/h5/w2/v5</property>
      <property value="53.1191">fsim/tables/ps_full_ms/h5/w2/v6</property>
      <property value="53.1668">fsim/tables/ps_full_ms/h5/w2/v7</property>
      <property value="54.5372">fsim/tables/ps_full_ms/h5/w2/v8</property>
      <property value="55.6781">fsim/tables/ps_full_ms/h5/w2/v9</property>
      <property value="3.28527">fsim/tables/ps_full_ms/h6/w0/v0</property>
      <property value="28.7899">fsim/tables/ps_full_ms/h6/w0/v1</property>
      <property value="54.9405">fsim/tables/ps_full_ms/h6/w0/v10</property>
      <property value="53.9177">fsim/tables/ps_full_ms/h6/w0/v11</property>
      <property value="53.7464">fsim/tables/ps_full_ms/h6/w0/v12</property>
      <property value="52.0098">fsim/tables/ps_full_ms/h6/w0/v13</property>
      <property value="39.8387">fsim/tables/ps_full_ms/h6/w0/v14</property>
      <property value="18.7139">fsim/tables/ps_full_ms/h6/w0/v15</property>
      <property value="44.279">fsim/tables/ps_full_ms/h6/w0/v2</property>
      <property value="49.3116">fsim/tables/ps_full_ms/h6/w0/v3</property>
      <property value="59.0493">fsim/tables/ps_full_ms/h6/w0/v4</property>
      <property value="58.9301">fsim/tables/ps_full_ms/h6/w0/v5</property>
      <property value="54.5248">fsim/tables/ps_full_ms/h6/w0/v6</property>
      <property value="53.1793">fsim/tables/ps_full_ms/h6/w0/v7</property>
      <property value="54.1328">fsim/tables/ps_full_ms/h6/w0/v8</property>
      <property value="54.9404">fsim/tables/ps_full_ms/h6/w0/v9</property>
      <property value="9.88468">fsim/tables/ps_full_ms/h6/w1/v0</property>
      <property value="20.0799">fsim/tables/ps_full_ms/h6/w1/v1</property>
      <property value="38.2374">fsim/tables/ps_full_ms/h6/w1/v10</property>
      <property value="36.5464">fsim/tables/ps_full_ms/h6/w1/v11</property>
      <property value="36.4305">fsim/tables/ps_full_ms/h6/w1/v12</property>
      <property value="35.5215">fsim/tables/ps_full_ms/h6/w1/v13</property>
      <property value="30.9354">fsim/tables/ps_full_ms/h6/w1/v14</property>
      <property value="15.2634">fsim/tables/ps_full_ms/h6/w1/v15</property>
      <property value="31.3691">fsim/tables/ps_full_ms/h6/w1/v2</property>
      <property value="40.3777">fsim/tables/ps_full_ms/h6/w1/v3</property>
      <property value="45.1786">fsim/tables/ps_full_ms/h6/w1/v4</property>
      <property value="43.4695">fsim/tables/ps_full_ms/h6/w1/v5</property>
      <property value="39.6191">fsim/tables/ps_full_ms/h6/w1/v6</property>
      <property value="37.9852">fsim/tables/ps_full_ms/h6/w1/v7</property>
      <property value="38.3317">fsim/tables/ps_full_ms/h6/w1/v8</property>
      <property value="38.6752">fsim/tables/ps_full_ms/h6/w1/v9</property>
      <property value="22.6296">fsim/tables/ps_full_ms/h6/w2/v0</property>
      <property value="28.5387">fsim/tables/ps_full_ms/h6/w2/v1</property>
      <property value="24.9103">fsim/tables/ps_full_ms/h6/w2/v10</property>
      <property value="23.2118">fsim/tables/ps_full_ms/h6/w2/v11</property>
      <property value="22.8207">fsim/tables/ps_full_ms/h6/w2/v12</property>
      <property value="21.7657">fsim/tables/ps_full_ms/h6/w2/v13</property>
      <property value="20.1074">fsim/tables/ps_full_ms/h6/w2/v14</property>
      <property value="12.2877">fsim/tables/ps_full_ms/h6/w2/v15</property>
      <property value="33.791">fsim/tables/ps_full_ms/h6/w2/v2</property>
      <property value="33.6668">fsim/tables/ps_full_ms/h6/w2/v3</property>
      <property value="31.4166">fsim/tables/ps_full_ms/h6/w2/v4</property>
      <property value="27.924">fsim/tables/ps_full_ms/h6/w2/v5</property>
      <property value="25.4183">fsim/tables/ps_full_ms/h6/w2/v6</property>
      <property value="25.9318">fsim/tables/ps_full_ms/h6/w2/v7</property>
      <property value="26.1166">fsim/tables/ps_full_ms/h6/w2/v8</property>
      <property value="25.9271">fsim/tables/ps_full_ms/h6/w2/v9</property>
      <property value="24.3581">fsim/tables/ps_full_ms/h7/w0/v0</property>
      <property value="31.0242">fsim/tables/ps_full_ms/h7/w0/v1</property>
      <property value="28.4005">fsim/tables/ps_full_ms/h7/w0/v10</property>
      <property value="26.9207">fsim/tables/ps_full_ms/h7/w0/v11</property>
      <property value="26.3575">fsim/tables/ps_full_ms/h7/w0/v12</property>
      <property value="25.2463">fsim/tables/ps_full_ms/h7/w0/v13</property>
      <property value="23.4728">fsim/tables/ps_full_ms/h7/w0/v14</property>
      <property value="13.0479">fsim/tables/ps_full_ms/h7/w0/v15</property>
      <property value="36.7509">fsim/tables/ps_full_ms/h7/w0/v2</property>
      <property value="37.2931">fsim/tables/ps_full_ms/h7/w0/v3</property>
      <property value="34.8752">fsim/tables/ps_full_ms/h7/w0/v4</property>
      <property value="30.9851">fsim/tables/ps_full_ms/h7/w0/v5</property>
      <property value="28.7274">fsim/tables/ps_full_ms/h7/w0/v6</property>
      <property value="29.3311">fsim/tables/ps_full_ms/h7/w0/v7</property>
      <property value="29.5935">fsim/tables/ps_full_ms/h7/w0/v8</property>
      <property value="29.447">fsim/tables/ps_full_ms/h7/w0/v9</property>
      <property value="15.6876">fsim/tables/ps_full_ms/h7/w1/v0</property>
      <property value="19.806">fsim/tables/ps_full_ms/h7/w1/v1</property>
      <property value="14.4656">fsim/tables/ps_full_ms/h7/w1/v10</property>
      <property value="12.7133">fsim/tables/ps_full_ms/h7/w1/v11</property>
      <property value="11.3413">fsim/tables/ps_full_ms/h7/w1/v12</property>
      <property value="10.6135">fsim/tables/ps_full_ms/h7/w1/v13</property>
      <property value="9.45509">fsim/tables/ps_full_ms/h7/w1/v14</property>
      <property value="7.80678">fsim/tables/ps_full_ms/h7/w1/v15</property>
      <property value="23.9244">fsim/tables/ps_full_ms/h7/w1/v2</property>
      <property value="23.693">fsim/tables/ps_full_ms/h7/w1/v3</property>
      <property value="21.967">fsim/tables/ps_full_ms/h7/w1/v4</property>
      <property value="17.9686">fsim/tables/ps_full_ms/h7/w1/v5</property>
      <property value="14.8805">fsim/tables/ps_full_ms/h7/w1/v6</property>
      <property value="15.5987">fsim/tables/ps_full_ms/h7/w1/v7</property>
      <property value="15.7278">fsim/tables/ps_full_ms/h7/w1/v8</property>
      <property value="15.4668">fsim/tables/ps_full_ms/h7/w1/v9</property>
      <property value="8.90091">fsim/tables/ps_full_ms/h7/w2/v0</property>
      <property value="10.5706">fsim/tables/ps_full_ms/h7/w2/v1</property>
      <property value="4.04074">fsim/tables/ps_full_ms/h7/w2/v10</property>
      <property value="3.08718">fsim/tables/ps_full_ms/h7/w2/v11</property>
      <property value="1.68316">fsim/tables/ps_full_ms/h7/w2/v12</property>
      <property value="2.89553">fsim/tables/ps_full_ms/h7/w2/v13</property>
      <property value="1.96549">fsim/tables/ps_full_ms/h7/w2/v14</property>
      <property value="1.03544">fsim/tables/ps_full_ms/h7/w2/v15</property>
      <property value="12.2403">fsim/tables/ps_full_ms/h7/w2/v2</property>
      <property value="12.8374">fsim/tables/ps_full_ms/h7/w2/v3</property>
      <property value="10.8049">fsim/tables/ps_full_ms/h7/w2/v4</property>
      <property value="8.82557">fsim/tables/ps_full_ms/h7/w2/v5</property>
      <property value="7.21217">fsim/tables/ps_full_ms/h7/w2/v6</property>
      <property value="5.59877">fsim/tables/ps_full_ms/h7/w2/v7</property>
      <property value="4.4521">fsim/tables/ps_full_ms/h7/w2/v8</property>
      <property value="4.52439">fsim/tables/ps_full_ms/h7/w2/v9</property>
      <property value="-29.6862">fsim/tables/ps_idle_ms/h0/w0/v0</property>
      <property value="-34.7686">fsim/tables/ps_idle_ms/h0/w0/v1</property>
      <property value="-185.067">fsim/tables/ps_idle_ms/h0/w0/v10</property>
      <property value="-250.883">fsim/tables/ps_idle_ms/h0/w0/v11</property>
      <property value="-318.365">fsim/tables/ps_idle_ms/h0/w0/v12</property>
      <property value="-369.254">fsim/tables/ps_idle_ms/h0/w0/v13</property>
      <property value="-395.854">fsim/tables/ps_idle_ms/h0/w0/v14</property>
      <property value="-419.747">fsim/tables/ps_idle_ms/h0/w0/v15</property>
      <property value="-40.3516">fsim/tables/ps_idle_ms/h0/w0/v2</property>
      <property value="-46.4609">fsim/tables/ps_idle_ms/h0/w0/v3</property>
      <property value="-53.3263">fsim/tables/ps_idle_ms/h0/w0/v4</property>
      <property value="-61.27">fsim/tables/ps_idle_ms/h0/w0/v5</property>
      <property value="-70.3034">fsim/tables/ps_idle_ms/h0/w0/v6</property>
      <property value="-82.0693">fsim/tables/ps_idle_ms/h0/w0/v7</property>
      <property value="-100.29">fsim/tables/ps_idle_ms/h0/w0/v8</property>
      <property value="-133.311">fsim/tables/ps_idle_ms/h0/w0/v9</property>
      <property value="-13.8031">fsim/tables/ps_idle_ms/h0/w1/v0</property>
      <property value="-16.5885">fsim/tables/ps_idle_ms/h0/w1/v1</property>
      <property value="-98.0732">fsim/tables/ps_idle_ms/h0/w1/v10</property>
      <property value="-146.311">fsim/tables/ps_idle_ms/h0/w1/v11</property>
      <property value="-216.271">fsim/tables/ps_idle_ms/h0/w1/v12</property>
      <property value="-289">fsim/tables/ps_idle_ms/h0/w1/v13</property>
      <property value="-337.206">fsim/tables/ps_idle_ms/h0/w1/v14</property>
      <property value="-363.235">fsim/tables/ps_idle_ms/h0/w1/v15</property>
      <property value="-20.2468">fsim/tables/ps_idle_ms/h0/w1/v2</property>
      <property value="-24.5244">fsim/tables/ps_idle_ms/h0/w1/v3</property>
      <property value="-29.6273">fsim/tables/ps_idle_ms/h0/w1/v4</property>
      <property value="-35.717">fsim/tables/ps_idle_ms/h0/w1/v5</property>
      <property value="-42.5583">fsim/tables/ps_idle_ms/h0/w1/v6</property>
      <property value="-50.5561">fsim/tables/ps_idle_ms/h0/w1/v7</property>
      <property value="-59.5867">fsim/tables/ps_idle_ms/h0/w1/v8</property>
      <property value="-72.7025">fsim/tables/ps_idle_ms/h0/w1/v9</property>
      <property value="-12.5033">fsim/tables/ps_idle_ms/h0/w2/v0</property>
      <property value="-14.4984">fsim/tables/ps_idle_ms/h0/w2/v1</property>
      <property value="-78.9142">fsim/tables/ps_idle_ms/h0/w2/v10</property>
      <property value="-117.217">fsim/tables/ps_idle_ms/h0/w2/v11</property>
      <property value="-177.33">fsim/tables/ps_idle_ms/h0/w2/v12</property>
      <property value="-243.652">fsim/tables/ps_idle_ms/h0/w2/v13</property>
      <property value="-296.614">fsim/tables/ps_idle_ms/h0/w2/v14</property>
      <property value="-319.775">fsim/tables/ps_idle_ms/h0/w2/v15</property>
      <property value="-17.2411">fsim/tables/ps_idle_ms/h0/w2/v2</property>
      <property value="-20.6626">fsim/tables/ps_idle_ms/h0/w2/v3</property>
      <property value="-24.8492">fsim/tables/ps_idle_ms/h0/w2/v4</property>
      <property value="-29.6367">fsim/tables/ps_idle_ms/h0/w2/v5</property>
      <property value="-35.541">fsim/tables/ps_idle_ms/h0/w2/v6</property>
      <property value="-42.3942">fsim/tables/ps_idle_ms/h0/w2/v7</property>
      <property value="-50.2222">fsim/tables/ps_idle_ms/h0/w2/v8</property>
      <property value="-60.2598">fsim/tables/ps_idle_ms/h0/w2/v9</property>
      <property value="-22.407">fsim/tables/ps_idle_ms/h1/w0/v0</property>
      <property value="-26.5774">fsim/tables/ps_idle_ms/h1/w0/v1</property>
      <property value="-263.924">fsim/tables/ps_idle_ms/h1/w0/v10</property>
      <property value="-305.497">fsim/tables/ps_idle_ms/h1/w0/v11</property>
      <property value="-345.379">fsim/tables/ps_idle_ms/h1/w0/v12</property>
      <property value="-386.572">fsim/tables/ps_idle_ms/h1/w0/v13</property>
      <property value="-416.221">fsim/tables/ps_idle_ms/h1/w0/v14</property>
      <property value="-433.766">fsim/tables/ps_idle_ms/h1/w0/v15</property>
      <property value="-31.3568">fsim/tables/ps_idle_ms/h1/w0/v2</property>
      <property value="-37.4073">fsim/tables/ps_idle_ms/h1/w0/v3</property>
      <property value="-44.3015">fsim/tables/ps_idle_ms/h1/w0/v4</property>
      <property value="-53.2868">fsim/tables/ps_idle_ms/h1/w0/v5</property>
      <property value="-69.8818">fsim/tables/ps_idle_ms/h1/w0/v6</property>
      <property value="-104.182">fsim/tables/ps_idle_ms/h1/w0/v7</property>
      <property value="-157.352">fsim/tables/ps_idle_ms/h1/w0/v8</property>
      <property value="-214.705">fsim/tables/ps_idle_ms/h1/w0/v9</property>
      <property value="-13.4321">fsim/tables/ps_idle_ms/h1/w1/v0</property>
      <property value="-15.0953">fsim/tables/ps_idle_ms/h1/w1/v1</property>
      <property value="-172.052">fsim/tables/ps_idle_ms/h1/w1/v10</property>
      <property value="-224.328">fsim/tables/ps_idle_ms/h1/w1/v11</property>
      <property value="-266.387">fsim/tables/ps_idle_ms/h1/w1/v12</property>
      <property value="-307.943">fsim/tables/ps_idle_ms/h1/w1/v13</property>
      <property value="-350.163">fsim/tables/ps_idle_ms/h1/w1/v14</property>
      <property value="-370.439">fsim/tables/ps_idle_ms/h1/w1/v15</property>
      <property value="-17.6852">fsim/tables/ps_idle_ms/h1/w1/v2</property>
      <property value="-21.0561">fsim/tables/ps_idle_ms/h1/w1/v3</property>
      <property value="-25.6048">fsim/tables/ps_idle_ms/h1/w1/v4</property>
      <property value="-30.8593">fsim/tables/ps_idle_ms/h1/w1/v5</property>
      <property value="-37.7827">fsim/tables/ps_idle_ms/h1/w1/v6</property>
      <property value="-47.2133">fsim/tables/ps_idle_ms/h1/w1/v7</property>
      <property value="-67.9665">fsim/tables/ps_idle_ms/h1/w1/v8</property>
      <property value="-112.382">fsim/tables/ps_idle_ms/h1/w1/v9</property>
      <property value="-14.113">fsim/tables/ps_idle_ms/h1/w2/v0</property>
      <property value="-14.8942">fsim/tables/ps_idle_ms/h1/w2/v1</property>
      <property value="-144.419">fsim/tables/ps_idle_ms/h1/w2/v10</property>
      <property value="-191.247">fsim/tables/ps_idle_ms/h1/w2/v11</property>
      <property value="-227.992">fsim/tables/ps_idle_ms/h1/w2/v12</property>
      <property value="-264.229">fsim/tables/ps_idle_ms/h1/w2/v13</property>
      <property value="-302.377">fsim/tables/ps_idle_ms/h1/w2/v14</property>
      <property value="-323.319">fsim/tables/ps_idle_ms/h1/w2/v15</property>
      <property value="-16.732">fsim/tables/ps_idle_ms/h1/w2/v2</property>
      <property value="-19.4154">fsim/tables/ps_idle_ms/h1/w2/v3</property>
      <property value="-22.786">fsim/tables/ps_idle_ms/h1/w2/v4</property>
      <property value="-27.3712">fsim/tables/ps_idle_ms/h1/w2/v5</property>
      <property value="-32.7859">fsim/tables/ps_idle_ms/h1/w2/v6</property>
      <property value="-40.5334">fsim/tables/ps_idle_ms/h1/w2/v7</property>
      <property value="-56.7649">fsim/tables/ps_idle_ms/h1/w2/v8</property>
      <property value="-92.7782">fsim/tables/ps_idle_ms/h1/w2/v9</property>
      <property value="-20.2834">fsim/tables/ps_idle_ms/h2/w0/v0</property>
      <property value="-23.4995">fsim/tables/ps_idle_ms/h2/w0/v1</property>
      <property value="-246.669">fsim/tables/ps_idle_ms/h2/w0/v10</property>
      <property value="-279.399">fsim/tables/ps_idle_ms/h2/w0/v11</property>
      <property value="-314.471">fsim/tables/ps_idle_ms/h2/w0/v12</property>
      <property value="-352.345">fsim/tables/ps_idle_ms/h2/w0/v13</property>
      <property value="-393.182">fsim/tables/ps_idle_ms/h2/w0/v14</property>
      <property value="-413.545">fsim/tables/ps_idle_ms/h2/w0/v15</property>
      <property value="-27.9817">fsim/tables/ps_idle_ms/h2/w0/v2</property>
      <property value="-33.6245">fsim/tables/ps_idle_ms/h2/w0/v3</property>
      <property value="-45.8882">fsim/tables/ps_idle_ms/h2/w0/v4</property>
      <property value="-74.3605">fsim/tables/ps_idle_ms/h2/w0/v5</property>
      <property value="-116.704">fsim/tables/ps_idle_ms/h2/w0/v6</property>
      <property value="-155.797">fsim/tables/ps_idle_ms/h2/w0/v7</property>
      <property value="-185.896">fsim/tables/ps_idle_ms/h2/w0/v8</property>
      <property value="-215.377">fsim/tables/ps_idle_ms/h2/w0/v9</property>
      <property value="-17.1056">fsim/tables/ps_idle_ms/h2/w1/v0</property>
      <property value="-16.7355">fsim/tables/ps_idle_ms/h2/w1/v1</property>
      <property value="-180.973">fsim/tables/ps_idle_ms/h2/w1/v10</property>
      <property value="-212.912">fsim/tables/ps_idle_ms/h2/w1/v11</property>
      <property value="-246.745">fsim/tables/ps_idle_ms/h2/w1/v12</property>
      <property value="-283.547">fsim/tables/ps_idle_ms/h2/w1/v13</property>
      <property value="-323.939">fsim/tables/ps_idle_ms/h2/w1/v14</property>
      <property value="-352.413">fsim/tables/ps_idle_ms/h2/w1/v15</property>
      <property value="-18.138">fsim/tables/ps_idle_ms/h2/w1/v2</property>
      <property value="-20.6306">fsim/tables/ps_idle_ms/h2/w1/v3</property>
      <property value="-24.3205">fsim/tables/ps_idle_ms/h2/w1/v4</property>
      <property value="-29.5433">fsim/tables/ps_idle_ms/h2/w1/v5</property>
      <property value="-41.6318">fsim/tables/ps_idle_ms/h2/w1/v6</property>
      <property value="-73.6625">fsim/tables/ps_idle_ms/h2/w1/v7</property>
      <property value="-117.357">fsim/tables/ps_idle_ms/h2/w1/v8</property>
      <property value="-151.342">fsim/tables/ps_idle_ms/h2/w1/v9</property>
      <property value="-19.2975">fsim/tables/ps_idle_ms/h2/w2/v0</property>
      <property value="-17.8523">fsim/tables/ps_idle_ms/h2/w2/v1</property>
      <property value="-156.946">fsim/tables/ps_idle_ms/h2/w2/v10</property>
      <property value="-184.364">fsim/tables/ps_idle_ms/h2/w2/v11</property>
      <property value="-213.326">fsim/tables/ps_idle_ms/h2/w2/v12</property>
      <property value="-244.891">fsim/tables/ps_idle_ms/h2/w2/v13</property>
      <property value="-279.413">fsim/tables/ps_idle_ms/h2/w2/v14</property>
      <property value="-306.614">fsim/tables/ps_idle_ms/h2/w2/v15</property>
      <property value="-18.4793">fsim/tables/ps_idle_ms/h2/w2/v2</property>
      <property value="-20.3364">fsim/tables/ps_idle_ms/h2/w2/v3</property>
      <property value="-23.2342">fsim/tables/ps_idle_ms/h2/w2/v4</property>
      <property value="-27.2624">fsim/tables/ps_idle_ms/h2/w2/v5</property>
      <property value="-37.6497">fsim/tables/ps_idle_ms/h2/w2/v6</property>
      <property value="-64.2273">fsim/tables/ps_idle_ms/h2/w2/v7</property>
      <property value="-101.804">fsim/tables/ps_idle_ms/h2/w2/v8</property>
      <property value="-131.564">fsim/tables/ps_idle_ms/h2/w2/v9</property>
      <property value="-27.0375">fsim/tables/ps_idle_ms/h3/w0/v0</property>
      <property value="-20.9682">fsim/tables/ps_idle_ms/h3/w0/v1</property>
      <property value="-180.869">fsim/tables/ps_idle_ms/h3/w0/v10</property>
      <property value="-214.854">fsim/tables/ps_idle_ms/h3/w0/v11</property>
      <property value="-253.212">fsim/tables/ps_idle_ms/h3/w0/v12</property>
      <property value="-295.657">fsim/tables/ps_idle_ms/h3/w0/v13</property>
      <property value="-341.954">fsim/tables/ps_idle_ms/h3/w0/v14</property>
      <property value="-380.446">fsim/tables/ps_idle_ms/h3/w0/v15</property>
      <property value="-19.4094">fsim/tables/ps_idle_ms/h3/w0/v2</property>
      <property value="-20.7124">fsim/tables/ps_idle_ms/h3/w0/v3</property>
      <property value="-23.7471">fsim/tables/ps_idle_ms/h3/w0/v4</property>
      <property value="-33.3456">fsim/tables/ps_idle_ms/h3/w0/v5</property>
      <property value="-63.9078">fsim/tables/ps_idle_ms/h3/w0/v6</property>
      <property value="-98.0004">fsim/tables/ps_idle_ms/h3/w0/v7</property>
      <property value="-123.138">fsim/tables/ps_idle_ms/h3/w0/v8</property>
      <property value="-150.65">fsim/tables/ps_idle_ms/h3/w0/v9</property>
      <property value="-24.9918">fsim/tables/ps_idle_ms/h3/w1/v0</property>
      <property value="-21.5319">fsim/tables/ps_idle_ms/h3/w1/v1</property>
      <property value="-162.365">fsim/tables/ps_idle_ms/h3/w1/v10</property>
      <property value="-189.665">fsim/tables/ps_idle_ms/h3/w1/v11</property>
      <property value="-220.061">fsim/tables/ps_idle_ms/h3/w1/v12</property>
      <property value="-253.83">fsim/tables/ps_idle_ms/h3/w1/v13</property>
      <property value="-290.443">fsim/tables/ps_idle_ms/h3/w1/v14</property>
      <property value="-323.098">fsim/tables/ps_idle_ms/h3/w1/v15</property>
      <property value="-21.0988">fsim/tables/ps_idle_ms/h3/w1/v2</property>
      <property value="-22.5583">fsim/tables/ps_idle_ms/h3/w1/v3</property>
      <property value="-26.7225">fsim/tables/ps_idle_ms/h3/w1/v4</property>
      <property value="-44.1209">fsim/tables/ps_idle_ms/h3/w1/v5</property>
      <property value="-72.7794">fsim/tables/ps_idle_ms/h3/w1/v6</property>
      <property value="-95.4527">fsim/tables/ps_idle_ms/h3/w1/v7</property>
      <property value="-115.729">fsim/tables/ps_idle_ms/h3/w1/v8</property>
      <property value="-137.692">fsim/tables/ps_idle_ms/h3/w1/v9</property>
      <property value="-28.4757">fsim/tables/ps_idle_ms/h3/w2/v0</property>
      <property value="-23.7914">fsim/tables/ps_idle_ms/h3/w2/v1</property>
      <property value="-143.588">fsim/tables/ps_idle_ms/h3/w2/v10</property>
      <property value="-167.124">fsim/tables/ps_idle_ms/h3/w2/v11</property>
      <property value="-193.081">fsim/tables/ps_idle_ms/h3/w2/v12</property>
      <property value="-221.596">fsim/tables/ps_idle_ms/h3/w2/v13</property>
      <property value="-252.118">fsim/tables/ps_idle_ms/h3/w2/v14</property>
      <property value="-281.198">fsim/tables/ps_idle_ms/h3/w2/v15</property>
      <property value="-22.412">fsim/tables/ps_idle_ms/h3/w2/v2</property>
      <property value="-23.1922">fsim/tables/ps_idle_ms/h3/w2/v3</property>
      <property value="-26.8977">fsim/tables/ps_idle_ms/h3/w2/v4</property>
      <property value="-42.3439">fsim/tables/ps_idle_ms/h3/w2/v5</property>
      <property value="-66.5392">fsim/tables/ps_idle_ms/h3/w2/v6</property>
      <property value="-85.9681">fsim/tables/ps_idle_ms/h3/w2/v7</property>
      <property value="-103.359">fsim/tables/ps_idle_ms/h3/w2/v8</property>
      <property value="-122.267">fsim/tables/ps_idle_ms/h3/w2/v9</property>
      <property value="-30.8989">fsim/tables/ps_idle_ms/h4/w0/v0</property>
      <property value="-24.0541">fsim/tables/ps_idle_ms/h4/w0/v1</property>
      <property value="-154.843">fsim/tables/ps_idle_ms/h4/w0/v10</property>
      <property value="-182.511">fsim/tables/ps_idle_ms/h4/w0/v11</property>
      <property value="-213.168">fsim/tables/ps_idle_ms/h4/w0/v12</property>
      <property value="-247.287">fsim/tables/ps_idle_ms/h4/w0/v13</property>
      <property value="-284.765">fsim/tables/ps_idle_ms/h4/w0/v14</property>
      <property value="-318.739">fsim/tables/ps_idle_ms/h4/w0/v15</property>
      <property value="-21.5331">fsim/tables/ps_idle_ms/h4/w0/v2</property>
      <property value="-21.785">fsim/tables/ps_idle_ms/h4/w0/v3</property>
      <property value="-24.2938">fsim/tables/ps_idle_ms/h4/w0/v4</property>
      <property value="-34.0075">fsim/tables/ps_idle_ms/h4/w0/v5</property>
      <property value="-60.8386">fsim/tables/ps_idle_ms/h4/w0/v6</property>
      <property value="-87.4439">fsim/tables/ps_idle_ms/h4/w0/v7</property>
      <property value="-107.956">fsim/tables/ps_idle_ms/h4/w0/v8</property>
      <property value="-130.16">fsim/tables/ps_idle_ms/h4/w0/v9</property>
      <property value="-29.7048">fsim/tables/ps_idle_ms/h4/w1/v0</property>
      <property value="-24.8209">fsim/tables/ps_idle_ms/h4/w1/v1</property>
      <property value="-139.329">fsim/tables/ps_idle_ms/h4/w1/v10</property>
      <property value="-161.95">fsim/tables/ps_idle_ms/h4/w1/v11</property>
      <property value="-186.83">fsim/tables/ps_idle_ms/h4/w1/v12</property>
      <property value="-214.161">fsim/tables/ps_idle_ms/h4/w1/v13</property>
      <property value="-243.412">fsim/tables/ps_idle_ms/h4/w1/v14</property>
      <property value="-271.35">fsim/tables/ps_idle_ms/h4/w1/v15</property>
      <property value="-22.9886">fsim/tables/ps_idle_ms/h4/w1/v2</property>
      <property value="-23.5521">fsim/tables/ps_idle_ms/h4/w1/v3</property>
      <property value="-27.4194">fsim/tables/ps_idle_ms/h4/w1/v4</property>
      <property value="-42.676">fsim/tables/ps_idle_ms/h4/w1/v5</property>
      <property value="-65.8814">fsim/tables/ps_idle_ms/h4/w1/v6</property>
      <property value="-84.0614">fsim/tables/ps_idle_ms/h4/w1/v7</property>
      <property value="-100.672">fsim/tables/ps_idle_ms/h4/w1/v8</property>
      <property value="-118.86">fsim/tables/ps_idle_ms/h4/w1/v9</property>
      <property value="-33.6641">fsim/tables/ps_idle_ms/h4/w2/v0</property>
      <property value="-27.6186">fsim/tables/ps_idle_ms/h4/w2/v1</property>
      <property value="-123.253">fsim/tables/ps_idle_ms/h4/w2/v10</property>
      <property value="-142.459">fsim/tables/ps_idle_ms/h4/w2/v11</property>
      <property value="-163.527">fsim/tables/ps_idle_ms/h4/w2/v12</property>
      <property value="-186.715">fsim/tables/ps_idle_ms/h4/w2/v13</property>
      <property value="-211.52">fsim/tables/ps_idle_ms/h4/w2/v14</property>
      <property value="-236.456">fsim/tables/ps_idle_ms/h4/w2/v15</property>
      <property value="-24.8949">fsim/tables/ps_idle_ms/h4/w2/v2</property>
      <property value="-24.7546">fsim/tables/ps_idle_ms/h4/w2/v3</property>
      <property value="-28.131">fsim/tables/ps_idle_ms/h4/w2/v4</property>
      <property value="-41.7276">fsim/tables/ps_idle_ms/h4/w2/v5</property>
      <property value="-61.351">fsim/tables/ps_idle_ms/h4/w2/v6</property>
      <property value="-77.0724">fsim/tables/ps_idle_ms/h4/w2/v7</property>
      <property value="-90.7097">fsim/tables/ps_idle_ms/h4/w2/v8</property>
      <property value="-105.915">fsim/tables/ps_idle_ms/h4/w2/v9</property>
      <property value="-35.2736">fsim/tables/ps_idle_ms/h5/w0/v0</property>
      <property value="-28.2152">fsim/tables/ps_idle_ms/h5/w0/v1</property>
      <property value="-131.885">fsim/tables/ps_idle_ms/h5/w0/v10</property>
      <property value="-153.837">fsim/tables/ps_idle_ms/h5/w0/v11</property>
      <property value="-178.031">fsim/tables/ps_idle_ms/h5/w0/v12</property>
      <property value="-204.666">fsim/tables/ps_idle_ms/h5/w0/v13</property>
      <property value="-233.262">fsim/tables/ps_idle_ms/h5/w0/v14</property>
      <property value="-261.202">fsim/tables/ps_idle_ms/h5/w0/v15</property>
      <property value="-24.7816">fsim/tables/ps_idle_ms/h5/w0/v2</property>
      <property value="-23.9778">fsim/tables/ps_idle_ms/h5/w0/v3</property>
      <property value="-26.114">fsim/tables/ps_idle_ms/h5/w0/v4</property>
      <property value="-38.3936">fsim/tables/ps_idle_ms/h5/w0/v5</property>
      <property value="-60.4968">fsim/tables/ps_idle_ms/h5/w0/v6</property>
      <property value="-79.1613">fsim/tables/ps_idle_ms/h5/w0/v7</property>
      <property value="-94.5983">fsim/tables/ps_idle_ms/h5/w0/v8</property>
      <property value="-112.075">fsim/tables/ps_idle_ms/h5/w0/v9</property>
      <property value="-36.5396">fsim/tables/ps_idle_ms/h5/w1/v0</property>
      <property value="-29.8224">fsim/tables/ps_idle_ms/h5/w1/v1</property>
      <property value="-118.272">fsim/tables/ps_idle_ms/h5/w1/v10</property>
      <property value="-135.9">fsim/tables/ps_idle_ms/h5/w1/v11</property>
      <property value="-154.879">fsim/tables/ps_idle_ms/h5/w1/v12</property>
      <property value="-175.747">fsim/tables/ps_idle_ms/h5/w1/v13</property>
      <property value="-198.53">fsim/tables/ps_idle_ms/h5/w1/v14</property>
      <property value="-222.292">fsim/tables/ps_idle_ms/h5/w1/v15</property>
      <property value="-26.5957">fsim/tables/ps_idle_ms/h5/w1/v2</property>
      <property value="-25.9057">fsim/tables/ps_idle_ms/h5/w1/v3</property>
      <property value="-29.8395">fsim/tables/ps_idle_ms/h5/w1/v4</property>
      <property value="-43.6423">fsim/tables/ps_idle_ms/h5/w1/v5</property>
      <property value="-61.4498">fsim/tables/ps_idle_ms/h5/w1/v6</property>
      <property value="-75.0249">fsim/tables/ps_idle_ms/h5/w1/v7</property>
      <property value="-87.6845">fsim/tables/ps_idle_ms/h5/w1/v8</property>
      <property value="-101.929">fsim/tables/ps_idle_ms/h5/w1/v9</property>
      <property value="-40.3245">fsim/tables/ps_idle_ms/h5/w2/v0</property>
      <property value="-33.2164">fsim/tables/ps_idle_ms/h5/w2/v1</property>
      <property value="-106.085">fsim/tables/ps_idle_ms/h5/w2/v10</property>
      <property value="-120.888">fsim/tables/ps_idle_ms/h5/w2/v11</property>
      <property value="-136.278">fsim/tables/ps_idle_ms/h5/w2/v12</property>
      <property value="-153.68">fsim/tables/ps_idle_ms/h5/w2/v13</property>
      <property value="-172.105">fsim/tables/ps_idle_ms/h5/w2/v14</property>
      <property value="-192.341">fsim/tables/ps_idle_ms/h5/w2/v15</property>
      <property value="-29.1821">fsim/tables/ps_idle_ms/h5/w2/v2</property>
      <property value="-27.9029">fsim/tables/ps_idle_ms/h5/w2/v3</property>
      <property value="-31.2869">fsim/tables/ps_idle_ms/h5/w2/v4</property>
      <property value="-43.2932">fsim/tables/ps_idle_ms/h5/w2/v5</property>
      <property value="-58.2602">fsim/tables/ps_idle_ms/h5/w2/v6</property>
      <property value="-69.8173">fsim/tables/ps_idle_ms/h5/w2/v7</property>
      <property value="-80.6254">fsim/tables/ps_idle_ms/h5/w2/v8</property>
      <property value="-92.33">fsim/tables/ps_idle_ms/h5/w2/v9</property>
      <property value="-40.1773">fsim/tables/ps_idle_ms/h6/w0/v0</property>
      <property value="-34.6711">fsim/tables/ps_idle_ms/h6/w0/v1</property>
      <property value="-106.543">fsim/tables/ps_idle_ms/h6/w0/v10</property>
      <property value="-122.07">fsim/tables/ps_idle_ms/h6/w0/v11</property>
      <property value="-137.758">fsim/tables/ps_idle_ms/h6/w0/v12</property>
      <property value="-155.229">fsim/tables/ps_idle_ms/h6/w0/v13</property>
      <property value="-174.378">fsim/tables/ps_idle_ms/h6/w0/v14</property>
      <property value="-195.205">fsim/tables/ps_idle_ms/h6/w0/v15</property>
      <property value="-29.9452">fsim/tables/ps_idle_ms/h6/w0/v2</property>
      <property value="-27.8781">fsim/tables/ps_idle_ms/h6/w0/v3</property>
      <property value="-29.7739">fsim/tables/ps_idle_ms/h6/w0/v4</property>
      <property value="-40.3279">fsim/tables/ps_idle_ms/h6/w0/v5</property>
      <property value="-55.7101">fsim/tables/ps_idle_ms/h6/w0/v6</property>
      <property value="-69.3011">fsim/tables/ps_idle_ms/h6/w0/v7</property>
      <property value="-80.4174">fsim/tables/ps_idle_ms/h6/w0/v8</property>
      <property value="-92.5465">fsim/tables/ps_idle_ms/h6/w0/v9</property>
      <property value="-45.9866">fsim/tables/ps_idle_ms/h6/w1/v0</property>
      <property value="-37.9169">fsim/tables/ps_idle_ms/h6/w1/v1</property>
      <property value="-96.5746">fsim/tables/ps_idle_ms/h6/w1/v10</property>
      <property value="-109.511">fsim/tables/ps_idle_ms/h6/w1/v11</property>
      <property value="-121.687">fsim/tables/ps_idle_ms/h6/w1/v12</property>
      <property value="-134.919">fsim/tables/ps_idle_ms/h6/w1/v13</property>
      <property value="-149.542">fsim/tables/ps_idle_ms/h6/w1/v14</property>
      <property value="-165.993">fsim/tables/ps_idle_ms/h6/w1/v15</property>
      <property value="-32.9801">fsim/tables/ps_idle_ms/h6/w1/v2</property>
      <property value="-30.6949">fsim/tables/ps_idle_ms/h6/w1/v3</property>
      <property value="-32.9542">fsim/tables/ps_idle_ms/h6/w1/v4</property>
      <property value="-42.5457">fsim/tables/ps_idle_ms/h6/w1/v5</property>
      <property value="-55.3294">fsim/tables/ps_idle_ms/h6/w1/v6</property>
      <property value="-66.362">fsim/tables/ps_idle_ms/h6/w1/v7</property>
      <property value="-75.2441">fsim/tables/ps_idle_ms/h6/w1/v8</property>
      <property value="-85.1518">fsim/tables/ps_idle_ms/h6/w1/v9</property>
      <property value="-37.5271">fsim/tables/ps_idle_ms/h6/w2/v0</property>
      <property value="-34.4376">fsim/tables/ps_idle_ms/h6/w2/v1</property>
      <property value="-94.3564">fsim/tables/ps_idle_ms/h6/w2/v10</property>
      <property value="-103.849">fsim/tables/ps_idle_ms/h6/w2/v11</property>
      <property value="-112.056">fsim/tables/ps_idle_ms/h6/w2/v12</property>
      <property value="-121.466">fsim/tables/ps_idle_ms/h6/w2/v13</property>
      <property value="-132.668">fsim/tables/ps_idle_ms/h6/w2/v14</property>
      <property value="-145.079">fsim/tables/ps_idle_ms/h6/w2/v15</property>
      <property value="-33.9875">fsim/tables/ps_idle_ms/h6/w2/v2</property>
      <property value="-38.688">fsim/tables/ps_idle_ms/h6/w2/v3</property>
      <property value="-46.4096">fsim/tables/ps_idle_ms/h6/w2/v4</property>
      <property value="-56.3838">fsim/tables/ps_idle_ms/h6/w2/v5</property>
      <property value="-64.4278">fsim/tables/ps_idle_ms/h6/w2/v6</property>
      <property value="-70.589">fsim/tables/ps_idle_ms/h6/w2/v7</property>
      <property value="-77.5249">fsim/tables/ps_idle_ms/h6/w2/v8</property>
      <property value="-85.3053">fsim/tables/ps_idle_ms/h6/w2/v9</property>
      <property value="-37.9182">fsim/tables/ps_idle_ms/h7/w0/v0</property>
      <property value="-34.6023">fsim/tables/ps_idle_ms/h7/w0/v1</property>
      <property value="-97.8007">fsim/tables/ps_idle_ms/h7/w0/v10</property>
      <property value="-107.755">fsim/tables/ps_idle_ms/h7/w0/v11</property>
      <property value="-116.805">fsim/tables/ps_idle_ms/h7/w0/v12</property>
      <property value="-127.153">fsim/tables/ps_idle_ms/h7/w0/v13</property>
      <property value="-139.141">fsim/tables/ps_idle_ms/h7/w0/v14</property>
      <property value="-152.208">fsim/tables/ps_idle_ms/h7/w0/v15</property>
      <property value="-33.8319">fsim/tables/ps_idle_ms/h7/w0/v2</property>
      <property value="-38.2261">fsim/tables/ps_idle_ms/h7/w0/v3</property>
      <property value="-46.5545">fsim/tables/ps_idle_ms/h7/w0/v4</property>
      <property value="-57.0107">fsim/tables/ps_idle_ms/h7/w0/v5</property>
      <property value="-65.5825">fsim/tables/ps_idle_ms/h7/w0/v6</property>
      <property value="-72.2223">fsim/tables/ps_idle_ms/h7/w0/v7</property>
      <property value="-79.6655">fsim/tables/ps_idle_ms/h7/w0/v8</property>
      <property value="-88.0416">fsim/tables/ps_idle_ms/h7/w0/v9</property>
      <property value="-41.3254">fsim/tables/ps_idle_ms/h7/w1/v0</property>
      <property value="-38.3611">fsim/tables/ps_idle_ms/h7/w1/v1</property>
      <property value="-88.0531">fsim/tables/ps_idle_ms/h7/w1/v10</property>
      <property value="-95.877">fsim/tables/ps_idle_ms/h7/w1/v11</property>
      <property value="-102.616">fsim/tables/ps_idle_ms/h7/w1/v12</property>
      <property value="-109.627">fsim/tables/ps_idle_ms/h7/w1/v13</property>
      <property value="-118.529">fsim/tables/ps_idle_ms/h7/w1/v14</property>
      <property value="-129.796">fsim/tables/ps_idle_ms/h7/w1/v15</property>
      <property value="-38.669">fsim/tables/ps_idle_ms/h7/w1/v2</property>
      <property value="-42.9783">fsim/tables/ps_idle_ms/h7/w1/v3</property>
      <property value="-49.5979">fsim/tables/ps_idle_ms/h7/w1/v4</property>
      <property value="-57.9402">fsim/tables/ps_idle_ms/h7/w1/v5</property>
      <property value="-64.5469">fsim/tables/ps_idle_ms/h7/w1/v6</property>
      <property value="-69.2274">fsim/tables/ps_idle_ms/h7/w1/v7</property>
      <property value="-74.7248">fsim/tables/ps_idle_ms/h7/w1/v8</property>
      <property value="-80.9822">fsim/tables/ps_idle_ms/h7/w1/v9</property>
      <property value="-44.2116">fsim/tables/ps_idle_ms/h7/w2/v0</property>
      <property value="-42.5633">fsim/tables/ps_idle_ms/h7/w2/v1</property>
      <property value="-78.4197">fsim/tables/ps_idle_ms/h7/w2/v10</property>
      <property value="-82.3555">fsim/tables/ps_idle_ms/h7/w2/v11</property>
      <property value="-87.3398">fsim/tables/ps_idle_ms/h7/w2/v12</property>
      <property value="-93.7069">fsim/tables/ps_idle_ms/h7/w2/v13</property>
      <property value="-100.578">fsim/tables/ps_idle_ms/h7/w2/v14</property>
      <property value="-108.275">fsim/tables/ps_idle_ms/h7/w2/v15</property>
      <property value="-44.0306">fsim/tables/ps_idle_ms/h7/w2/v2</property>
      <property value="-47.1282">fsim/tables/ps_idle_ms/h7/w2/v3</property>
      <property value="-51.957">fsim/tables/ps_idle_ms/h7/w2/v4</property>
      <property value="-58.2495">fsim/tables/ps_idle_ms/h7/w2/v5</property>
      <property value="-63.9804">fsim/tables/ps_idle_ms/h7/w2/v6</property>
      <property value="-67.195">fsim/tables/ps_idle_ms/h7/w2/v7</property>
      <property value="-70.7896">fsim/tables/ps_idle_ms/h7/w2/v8</property>
      <property value="-74.692">fsim/tables/ps_idle_ms/h7/w2/v9</property>
      <property value="380.993">fsim/tables/reach_tas_ms/h0/w0</property>
      <property value="380.545">fsim/tables/reach_tas_ms/h0/w1</property>
      <property value="380.162">fsim/tables/reach_tas_ms/h0/w2</property>
      <property value="427.352">fsim/tables/reach_tas_ms/h1/w0</property>
      <property value="426.7">fsim/tables/reach_tas_ms/h1/w1</property>
      <property value="426.136">fsim/tables/reach_tas_ms/h1/w2</property>
      <property value="481.747">fsim/tables/reach_tas_ms/h2/w0</property>
      <property value="480.781">fsim/tables/reach_tas_ms/h2/w1</property>
      <property value="479.025">fsim/tables/reach_tas_ms/h2/w2</property>
      <property value="541.539">fsim/tables/reach_tas_ms/h3/w0</property>
      <property value="539.259">fsim/tables/reach_tas_ms/h3/w1</property>
      <property value="537.264">fsim/tables/reach_tas_ms/h3/w2</property>
      <property value="539">fsim/tables/reach_tas_ms/h4/w0</property>
      <property value="536.605">fsim/tables/reach_tas_ms/h4/w1</property>
      <property value="532.678">fsim/tables/reach_tas_ms/h4/w2</property>
      <property value="539.112">fsim/tables/reach_tas_ms/h5/w0</property>
      <property value="534.226">fsim/tables/reach_tas_ms/h5/w1</property>
      <property value="526.605">fsim/tables/reach_tas_ms/h5/w2</property>
      <property value="523.565">fsim/tables/reach_tas_ms/h6/w0</property>
      <property value="513.114">fsim/tables/reach_tas_ms/h6/w1</property>
      <property value="498.719">fsim/tables/reach_tas_ms/h6/w2</property>
      <property value="502.988">fsim/tables/reach_tas_ms/h7/w0</property>
      <property value="481.192">fsim/tables/reach_tas_ms/h7/w1</property>
      <property value="397.672">fsim/tables/reach_tas_ms/h7/w2</property>
      <property value="0.0">fsim/tables/speed_fraction/v0</property>
      <property value="0.0666667">fsim/tables/speed_fraction/v1</property>
      <property value="0.666667">fsim/tables/speed_fraction/v10</property>
      <property value="0.733333">fsim/tables/speed_fraction/v11</property>
      <property value="0.8">fsim/tables/speed_fraction/v12</property>
      <property value="0.866667">fsim/tables/speed_fraction/v13</property>
      <property value="0.933333">fsim/tables/speed_fraction/v14</property>
      <property value="1">fsim/tables/speed_fraction/v15</property>
      <property value="0.133333">fsim/tables/speed_fraction/v2</property>
      <property value="0.2">fsim/tables/speed_fraction/v3</property>
      <property value="0.266667">fsim/tables/speed_fraction/v4</property>
      <property value="0.333333">fsim/tables/speed_fraction/v5</property>
      <property value="0.4">fsim/tables/speed_fraction/v6</property>
      <property value="0.466667">fsim/tables/speed_fraction/v7</property>
      <property value="0.533333">fsim/tables/speed_fraction/v8</property>
      <property value="0.6">fsim/tables/speed_fraction/v9</property>
      <property value="52.2356">fsim/tables/stall_cas_ms/h0/w0</property>
      <property value="56.9922">fsim/tables/stall_cas_ms/h0/w1</property>
      <property value="61.3814">fsim/tables/stall_cas_ms/h0/w2</property>
      <property value="53.3777">fsim/tables/stall_cas_ms/h1/w0</property>
      <property value="58.2384">fsim/tables/stall_cas_ms/h1/w1</property>
      <property value="62.7235">fsim/tables/stall_cas_ms/h1/w2</property>
      <property value="54.7681">fsim/tables/stall_cas_ms/h2/w0</property>
      <property value="59.7553">fsim/tables/stall_cas_ms/h2/w1</property>
      <property value="64.3572">fsim/tables/stall_cas_ms/h2/w2</property>
      <property value="55.8442">fsim/tables/stall_cas_ms/h3/w0</property>
      <property value="60.9295">fsim/tables/stall_cas_ms/h3/w1</property>
      <property value="65.6218">fsim/tables/stall_cas_ms/h3/w2</property>
      <property value="56.2376">fsim/tables/stall_cas_ms/h4/w0</property>
      <property value="61.3586">fsim/tables/stall_cas_ms/h4/w1</property>
      <property value="66.084">fsim/tables/stall_cas_ms/h4/w2</property>
      <property value="56.4281">fsim/tables/stall_cas_ms/h5/w0</property>
      <property value="61.5665">fsim/tables/stall_cas_ms/h5/w1</property>
      <property value="66.3079">fsim/tables/stall_cas_ms/h5/w2</property>
      <property value="57.0041">fsim/tables/stall_cas_ms/h6/w0</property>
      <property value="62.1949">fsim/tables/stall_cas_ms/h6/w1</property>
      <property value="66.9847">fsim/tables/stall_cas_ms/h6/w2</property>
      <property value="57.117">fsim/tables/stall_cas_ms/h7/w0</property>
      <property value="62.3181">fsim/tables/stall_cas_ms/h7/w1</property>
      <property value="67.1174">fsim/tables/stall_cas_ms/h7/w2</property>
      <property value="11580">fsim/tables/weight_kg/w0</property>
      <property value="13785">fsim/tables/weight_kg/w1</property>
      <property value="15990">fsim/tables/weight_kg/w2</property>
      <channel name="Pitch (fly-by-wire)">
        <!-- hangar: load factor command, alpha and pitch-rate inner loop (hangar/fcs.py) -->
        <summer name="fcs/pitch-trim-sum">
          <input>fcs/elevator-cmd-norm</input>
          <input>fcs/pitch-trim-cmd-norm</input>
          <clipto> <min>-1</min> <max>1</max> </clipto>
        </summer>
        <!-- the integrators are reset below 60 kt and while a wheel carries weight
             (on the ground, taking off and landing) -->
        <switch name="fcs/fbw/reset">
          <default value="0"/>
          <test logic="OR" value="-1">
            velocities/vc-kts lt 60
            gear/wow gt 0
          </test>
        </switch>
        <fcs_function name="fcs/fbw/k-alpha">
          <function>
            <table>
              <independentVar lookup="row">aero/qbar-psf</independentVar>
              <independentVar lookup="column">velocities/mach</independentVar>
              <tableData>
                       0.150     0.400     0.700     0.900     1.100     1.400     2.000
              10.0  -6.00000  -6.00000  -6.00000  -6.00000  -6.00000  -6.00000  -6.00000
              20.0  -3.88139  -4.05233  -3.75439  -3.31835  -3.08362  -3.52385  -5.26184
              40.0  -1.30499  -1.53671  -1.37052  -1.00374  -0.48486  -1.22610  -1.97407
              80.0  -0.21451  -0.56779  -0.67537  -0.72599  -0.18206   0.22039   0.22668
             150.0  -0.11710  -0.52205  -0.64542  -0.68628  -0.15177   0.22149   0.23396
             300.0  -0.00043  -0.38957  -0.55576  -0.61533  -0.09872   0.25393   0.24392
             600.0  -0.08939  -0.25698  -0.46906  -0.49266   0.04397   0.29492   0.26416
            1200.0  -0.93025   0.22228   0.16280   0.15794   0.71351   0.85966   0.44665
            2400.0  -3.95879   0.19451   0.40203   0.40360   1.00389   1.23725   1.01545
              </tableData>
            </table>
          </function>
        </fcs_function>
        <fcs_function name="fcs/fbw/k-q">
          <function>
            <table>
              <independentVar lookup="row">aero/qbar-psf</independentVar>
              <independentVar lookup="column">velocities/mach</independentVar>
              <tableData>
                       0.150     0.400     0.700     0.900     1.100     1.400     2.000
              10.0  -3.00000  -3.00000  -3.00000  -3.00000  -3.00000  -3.00000  -3.00000
              20.0  -3.00000  -3.00000  -3.00000  -3.00000  -3.00000  -3.00000  -3.00000
              40.0  -2.12790  -2.44511  -2.23807  -1.75034  -1.70076  -2.39018  -3.00000
              80.0  -0.57784  -0.92536  -0.96962  -0.93038  -0.94316  -0.98252  -1.30573
             150.0  -0.28930  -0.62661  -0.67818  -0.65266  -0.66713  -0.71218  -0.86380
             300.0  -0.04728  -0.37971  -0.44217  -0.43311  -0.44960  -0.48538  -0.59820
             600.0   0.14169  -0.20957  -0.28130  -0.27561  -0.29077  -0.33307  -0.41345
            1200.0   0.39617  -0.01931  -0.09169  -0.09507  -0.11284  -0.16173  -0.26672
            2400.0   0.68883   0.09741   0.01138  -0.00376  -0.02318  -0.05843  -0.11852
              </tableData>
            </table>
          </function>
        </fcs_function>
        <fcs_function name="fcs/fbw/k-ff">
          <function>
            <table>
              <independentVar lookup="row">aero/qbar-psf</independentVar>
              <independentVar lookup="column">velocities/mach</independentVar>
              <tableData>
                       0.150     0.400     0.700     0.900     1.100     1.400     2.000
              10.0  -0.30000  -0.30000  -0.30000  -0.30000  -0.30000  -0.30000  -0.30000
              20.0  -0.30000  -0.30000  -0.30000  -0.30000  -0.30000  -0.30000  -0.30000
              40.0  -0.30000  -0.30000  -0.30000  -0.30000  -0.30000  -0.30000  -0.30000
              80.0  -0.30000  -0.30000  -0.30000  -0.30000  -0.30000  -0.30000  -0.30000
             150.0  -0.21831  -0.21219  -0.19480  -0.17204  -0.19318  -0.24742  -0.30000
             300.0  -0.10987  -0.10670  -0.09772  -0.08605  -0.09668  -0.12516  -0.17964
             600.0  -0.05458  -0.05303  -0.04866  -0.04109  -0.04539  -0.06213  -0.09011
            1200.0  -0.01604  -0.01520  -0.01295  -0.01024  -0.01133  -0.01838  -0.03929
            2400.0  -0.00403  -0.00382  -0.00325  -0.00257  -0.00285  -0.00463  -0.00984
              </tableData>
            </table>
          </function>
        </fcs_function>
        <fcs_function name="fcs/fbw/k-i">
          <function>
            <table>
              <independentVar lookup="row">aero/qbar-psf</independentVar>
              <independentVar lookup="column">velocities/mach</independentVar>
              <tableData>
                       0.150     0.400     0.700     0.900     1.100     1.400     2.000
              10.0  -0.60000  -0.60000  -0.60000  -0.60000  -0.60000  -0.60000  -0.60000
              20.0  -0.60000  -0.60000  -0.60000  -0.60000  -0.60000  -0.60000  -0.60000
              40.0  -0.60000  -0.60000  -0.60000  -0.60000  -0.60000  -0.60000  -0.60000
              80.0  -0.40094  -0.39047  -0.36015  -0.31961  -0.35734  -0.44597  -0.60000
             150.0  -0.21831  -0.21219  -0.19480  -0.17204  -0.19318  -0.24742  -0.34574
             300.0  -0.10987  -0.10670  -0.09772  -0.08605  -0.09668  -0.12516  -0.17964
             600.0  -0.05458  -0.05303  -0.04866  -0.04109  -0.04539  -0.06213  -0.09011
            1200.0  -0.01604  -0.01520  -0.01295  -0.01024  -0.01133  -0.01838  -0.03929
            2400.0  -0.00403  -0.00382  -0.00325  -0.00257  -0.00285  -0.00463  -0.00984
              </tableData>
            </table>
          </function>
        </fcs_function>
        <fcs_function name="fcs/fbw/n-alpha">
          <function>
            <table>
              <independentVar lookup="row">aero/qbar-psf</independentVar>
              <independentVar lookup="column">velocities/mach</independentVar>
              <tableData>
                       0.150     0.400     0.700     0.900     1.100     1.400     2.000
              10.0   1.00000   1.00000   1.00000   1.00000   1.00000   1.00000   1.00000
              20.0   1.00000   1.00000   1.00000   1.00000   1.00000   1.00000   1.00000
              40.0   1.00000   1.00000   1.00000   1.48854   1.57819   1.00000   1.00000
              80.0   3.69143   3.80921   4.17229   4.73678   4.82784   3.67456   1.93850
             150.0   7.33497   7.51732   8.09089   9.01304   9.16705   7.30885   4.86910
             300.0  14.57355  14.95830  16.16850  18.12356  18.45031  14.51844   9.84015
             600.0  30.32853  31.11984  33.60882  37.62974  38.30176  30.21519  19.92119
            1200.0  61.60309  63.14979  68.01478  75.87412  77.18764  61.38156  41.24969
            2400.0 122.92548 126.01887 135.74886 151.46753 154.09458 122.48240  82.94970
              </tableData>
            </table>
          </function>
        </fcs_function>
        <!-- the pitching moment's departures from a straight line through the
             angle-of-attack envelope (-0.539 per rad about the CG), cancelled by the
             elevator: the gains are designed on the line -->
        <fcs_function name="fcs/fbw/moment-comp">
          <function>
            <table>
              <independentVar lookup="row">aero/alpha-rad</independentVar>
              <independentVar lookup="column">velocities/mach</independentVar>
              <tableData>
                       0.150     0.400     0.700     0.900     1.100     1.400     2.000
          -0.17453   0.00069   0.00067   0.00061   0.00054   0.00053   0.00061   0.00088
          -0.15708  -0.00033  -0.00032  -0.00030  -0.00026  -0.00026  -0.00030  -0.00042
          -0.13963  -0.00116  -0.00113  -0.00103  -0.00091  -0.00090  -0.00103  -0.00147
          -0.12217  -0.00119  -0.00116  -0.00106  -0.00094  -0.00092  -0.00106  -0.00151
          -0.10472  -0.00113  -0.00110  -0.00100  -0.00088  -0.00087  -0.00100  -0.00143
          -0.08727  -0.00007  -0.00007  -0.00007  -0.00006  -0.00006  -0.00007  -0.00009
          -0.06981   0.00085   0.00082   0.00075   0.00066   0.00065   0.00075   0.00107
          -0.05236   0.01371   0.01330   0.01215   0.01073   0.01054   0.01213   0.01736
          -0.03491   0.01865   0.01809   0.01653   0.01460   0.01434   0.01651   0.02362
          -0.01745   0.00665   0.00645   0.00590   0.00521   0.00511   0.00589   0.00843
           0.00000   0.00431   0.00418   0.00382   0.00337   0.00331   0.00381   0.00545
           0.01745   0.00641   0.00622   0.00568   0.00502   0.00493   0.00568   0.00812
           0.03491   0.00735   0.00713   0.00652   0.00576   0.00565   0.00651   0.00931
           0.05236   0.00712   0.00690   0.00631   0.00557   0.00547   0.00630   0.00901
           0.06981   0.00579   0.00562   0.00513   0.00453   0.00445   0.00513   0.00733
           0.08727   0.00445   0.00432   0.00395   0.00349   0.00342   0.00394   0.00564
           0.10472   0.00248   0.00241   0.00220   0.00195   0.00191   0.00220   0.00315
           0.12217   0.00045   0.00044   0.00040   0.00036   0.00035   0.00040   0.00058
           0.13963  -0.00199  -0.00193  -0.00176  -0.00156  -0.00153  -0.00176  -0.00252
           0.15708  -0.00427  -0.00414  -0.00378  -0.00334  -0.00328  -0.00378  -0.00540
           0.17453  -0.00675  -0.00655  -0.00598  -0.00529  -0.00519  -0.00598  -0.00855
           0.19199  -0.00876  -0.00849  -0.00776  -0.00685  -0.00673  -0.00775  -0.01109
           0.20944  -0.01076  -0.01043  -0.00953  -0.00842  -0.00827  -0.00952  -0.01362
           0.22689  -0.01210  -0.01174  -0.01072  -0.00947  -0.00930  -0.01071  -0.01532
           0.24435  -0.01325  -0.01285  -0.01174  -0.01037  -0.01018  -0.01173  -0.01678
           0.26180  -0.01377  -0.01336  -0.01220  -0.01078  -0.01058  -0.01219  -0.01744
           0.27925  -0.01400  -0.01358  -0.01241  -0.01096  -0.01076  -0.01239  -0.01773
           0.29671  -0.01366  -0.01325  -0.01211  -0.01070  -0.01050  -0.01209  -0.01730
           0.31416  -0.01300  -0.01261  -0.01152  -0.01018  -0.01000  -0.01151  -0.01647
           0.33161  -0.01185  -0.01149  -0.01050  -0.00927  -0.00911  -0.01048  -0.01500
           0.34907  -0.01035  -0.01004  -0.00917  -0.00810  -0.00795  -0.00916  -0.01310
           0.36652  -0.00931  -0.00903  -0.00825  -0.00729  -0.00715  -0.00824  -0.01178
           0.38397  -0.00794  -0.00771  -0.00704  -0.00622  -0.00611  -0.00703  -0.01006
           0.40143  -0.00587  -0.00569  -0.00520  -0.00460  -0.00451  -0.00520  -0.00743
           0.41888  -0.00269  -0.00261  -0.00238  -0.00211  -0.00207  -0.00238  -0.00341
           0.43633  -0.00036  -0.00035  -0.00032  -0.00028  -0.00028  -0.00032  -0.00046
           0.45379   0.00310   0.00301   0.00275   0.00243   0.00239   0.00275   0.00393
           0.47124   0.00755   0.00732   0.00669   0.00591   0.00580   0.00668   0.00956
           0.48869   0.01258   0.01220   0.01115   0.00985   0.00967   0.01113   0.01593
           0.50615   0.01722   0.01671   0.01526   0.01348   0.01324   0.01524   0.02181
           0.52360   0.02106   0.02043   0.01866   0.01649   0.01619   0.01864   0.02667
           0.55851   0.02441   0.02368   0.02164   0.01911   0.01877   0.02161   0.03092
           0.61087   0.02935   0.02847   0.02601   0.02298   0.02256   0.02598   0.03717
              </tableData>
            </table>
          </function>
        </fcs_function>
        <!-- the gravity reference: the load factor that holds the flight path -->
        <fcs_function name="fcs/fbw/g-ref">
          <function>
            <product>
              <cos><property>attitude/theta-rad</property></cos>
              <cos><property>attitude/phi-rad</property></cos>
            </product>
          </function>
        </fcs_function>
        <!-- stick to load factor beyond the gravity reference, aft (negative) to n_max,
             no more than the lift at the angle-of-attack limits gives - beyond the
             gravity reference of the moment, so that full aft stick still reaches
             the limit in a steep climb or inverted - through a 0.2 s prefilter and
             a 12 g/s onset limit (a full pull at once pitches an agile airframe
             faster than its nose-down control can stop at the angle-of-attack
             limit) -->
        <fcs_function name="fcs/fbw/dn-stick">
          <function>
            <max>
              <min>
                <table>
                  <independentVar lookup="row">fcs/pitch-trim-sum</independentVar>
                  <tableData>
                    -1.0  6.500
                     0.0  0.0
                     1.0  -4.000
                  </tableData>
                </table>
                <difference><product><property>fcs/fbw/n-alpha</property><value>0.61087</value></product><property>fcs/fbw/g-ref</property></difference>
              </min>
              <difference><product><property>fcs/fbw/n-alpha</property><value>-0.17453</value></product><property>fcs/fbw/g-ref</property></difference>
            </max>
          </function>
        </fcs_function>
        <lag_filter name="fcs/fbw/dn-lag">
          <input>fcs/fbw/dn-stick</input>
          <c1>5.0</c1>
        </lag_filter>
        <actuator name="fcs/fbw/dn-cmd">
          <input>fcs/fbw/dn-lag</input>
          <rate_limit>12.0</rate_limit>
        </actuator>
        <!-- the response the command should produce (the short period's rise): the
             integrator trims away what differs from it, not the rise itself -->
        <lag_filter name="fcs/fbw/dn-model">
          <input>fcs/fbw/dn-cmd</input>
          <c1>2.5</c1>
        </lag_filter>
        <fcs_function name="fcs/fbw/dn">
          <function>
            <difference><property>accelerations/Nz</property><property>fcs/fbw/g-ref</property></difference>
          </function>
        </fcs_function>
        <!-- the angle of attack with its rise over the next 0.35 s counted as spent
             (the rise, not the pitch rate: in a steady pull the nose turns with the
             flight path and the angle of attack holds), and the load factor the
             angle of attack left to each limit gives -->
        <fcs_function name="fcs/fbw/alpha-ahead">
          <function>
            <sum>
              <property>aero/alpha-rad</property>
              <product><value>0.35</value><property>aero/alphadot-rad_sec</property></product>
            </sum>
          </function>
        </fcs_function>
        <fcs_function name="fcs/fbw/dn-room-up">
          <function>
            <product><property>fcs/fbw/n-alpha</property>
              <difference><value>0.61087</value><property>fcs/fbw/alpha-ahead</property></difference></product>
          </function>
        </fcs_function>
        <fcs_function name="fcs/fbw/dn-room-down">
          <function>
            <product><property>fcs/fbw/n-alpha</property>
              <difference><value>-0.17453</value><property>fcs/fbw/alpha-ahead</property></difference></product>
          </function>
        </fcs_function>
        <!-- the command limited to the load factor the aircraft pulls now plus what
             the angle of attack left gives: at a limit the feedforward asks for the
             load factor the airframe gives there, whatever elevator holds it - a
             steady pull on a stable airframe, a push on an unstable one (a
             feedforward faded out past the limit instead took about 10 deg of
             elevator per deg of alpha, on one side of it only: the actuator's rate
             limit could not follow, and the MiG-29A cycled between 24 and 29 deg) -->
        <fcs_function name="fcs/fbw/dn-limited">
          <function>
            <max>
              <min>
                <property>fcs/fbw/dn-cmd</property>
                <sum><property>fcs/fbw/dn</property><property>fcs/fbw/dn-room-up</property></sum>
              </min>
              <sum><property>fcs/fbw/dn</property><property>fcs/fbw/dn-room-down</property></sum>
            </max>
          </function>
        </fcs_function>
        <!-- the integrator's error: the load factor's departure from the model
             response, and at a limit the angle of attack left, counted five times -
             it trims what the airframe needs there beyond the linear design (vortex
             lift, the tail's power at high alpha) in a fraction of a second, not
             over the pull -->
        <fcs_function name="fcs/fbw/pitch-error">
          <function>
            <max>
              <min>
                <difference><property>fcs/fbw/dn-model</property><property>fcs/fbw/dn</property></difference>
                <product><value>5.0</value><property>fcs/fbw/dn-room-up</property></product>
              </min>
              <product><value>5.0</value><property>fcs/fbw/dn-room-down</property></product>
            </max>
          </function>
        </fcs_function>
        <fcs_function name="fcs/fbw/pitch-error-rate">
          <function><product><property>fcs/fbw/k-i</property><property>fcs/fbw/pitch-error</property></product></function>
        </fcs_function>
        <!-- the integrator: reset below 60 kt and on the wheels, held while the
             elevator is at a stop it would push further into (anti-windup) -->
        <switch name="fcs/fbw/pitch-hold">
          <default value="0"/>
          <test logic="OR" value="-1">
            velocities/vc-kts lt 60
            gear/wow gt 0
          </test>
          <test logic="AND" value="1">
            fcs/fbw/elevator-raw gt 0.18326
            fcs/fbw/pitch-error-rate gt 0
          </test>
          <test logic="AND" value="1">
            fcs/fbw/elevator-raw lt -0.41888
            fcs/fbw/pitch-error-rate lt 0
          </test>
        </switch>
        <integrator name="fcs/fbw/pitch-integral">
          <input>fcs/fbw/pitch-error-rate</input>
          <c1>1.0</c1>
          <trigger>fcs/fbw/pitch-hold</trigger>
          <clipto> <min>-0.5</min> <max>0.5</max> </clipto>
        </integrator>
        <!-- past an angle-of-attack limit (the next 0.35 s counted) a push back
             in proportion, all the travel 4 deg beyond: an unstable airframe
             pitching up fast needs it at once, not when an integrator winds -->
        <fcs_function name="fcs/fbw/alpha-push">
          <function>
            <difference>
              <product><value>2.62500</value>
                <max><value>0</value><difference><property>fcs/fbw/alpha-ahead</property><value>0.61087</value></difference></max></product>
              <product><value>6.00000</value>
                <max><value>0</value><difference><value>-0.17453</value><property>fcs/fbw/alpha-ahead</property></difference></max></product>
            </difference>
          </function>
        </fcs_function>
        <lag_filter name="fcs/fbw/ground">
          <input>gear/wow</input>
          <c1>2.0</c1>
        </lag_filter>
        <fcs_function name="fcs/fbw/ground-direct">
          <function>
            <product>
              <property>fcs/fbw/ground</property>
              <table>
                <independentVar lookup="row">fcs/pitch-trim-sum</independentVar>
                <tableData>
                  -1.0  -0.41888
                   0.0  0.0
                   1.0  0.18326
                </tableData>
              </table>
            </product>
          </function>
        </fcs_function>
        <!-- the elevator: the push, the moment compensation, angle-of-attack and
             pitch-rate feedback, the feedforward of the limited command, the
             integrator, the ground mode's direct stick -->
        <fcs_function name="fcs/fbw/elevator-raw">
          <function>
            <sum>
              <property>fcs/fbw/alpha-push</property>
              <property>fcs/fbw/moment-comp</property>
              <product><value>-1</value><property>fcs/fbw/k-alpha</property><property>aero/alpha-rad</property></product>
              <product><value>-1</value><property>fcs/fbw/k-q</property><property>velocities/q-rad_sec</property></product>
              <product><property>fcs/fbw/k-ff</property><property>fcs/fbw/dn-limited</property></product>
              <property>fcs/fbw/pitch-integral</property>
              <property>fcs/fbw/ground-direct</property>
            </sum>
          </function>
        </fcs_function>
        <pure_gain name="fcs/fbw/elevator">
          <input>fcs/fbw/elevator-raw</input>
          <gain>1.0</gain>
          <clipto> <min>-0.41888</min> <max>0.18326</max> </clipto>
        </pure_gain>
        <!-- full travel in 0.83 s: 60 deg/s for a +-25 deg tail, faster for a
             canard's longer throw -->
        <actuator name="fcs/elevator-actuator">
          <input>fcs/fbw/elevator</input>
          <lag>40</lag>
          <rate_limit>1.050</rate_limit>
          <output>fcs/elevator-pos-rad</output>
        </actuator>
      </channel>
      <channel name="Roll (fly-by-wire)">
        <!-- hangar: roll-rate command about the flight path, limited to what the rudder can
             coordinate; bank hold at neutral stick -->
        <summer name="fcs/roll-trim-sum">
          <input>fcs/aileron-cmd-norm</input>
          <input>fcs/roll-trim-cmd-norm</input>
          <clipto> <min>-1</min> <max>1</max> </clipto>
        </summer>
        <fcs_function name="fcs/fbw/k-roll">
          <function>
            <table>
              <independentVar lookup="row">aero/qbar-psf</independentVar>
              <independentVar lookup="column">velocities/mach</independentVar>
              <tableData>
                       0.150     0.400     0.700     0.900     1.100     1.400     2.000
              10.0   1.50000   1.50000   1.50000   1.50000   1.50000   1.50000   1.50000
              20.0   1.50000   1.50000   1.50000   1.50000   1.50000   1.50000   1.50000
              40.0   1.00010   1.16329   1.06267   0.87255   1.40662   1.50000   1.50000
              80.0   0.25857   0.39317   0.39020   0.34072   0.56237   1.18682   1.50000
             150.0   0.04305   0.16469   0.17822   0.15915   0.26713   0.57006   1.02201
             300.0   0.00000   0.04472   0.06690   0.06271   0.11032   0.25224   0.46646
             600.0   0.00000   0.00000   0.01267   0.01566   0.03382   0.09882   0.20907
            1200.0   0.00000   0.00000   0.00000   0.00000   0.00000   0.02320   0.08343
            2400.0   0.00000   0.00000   0.00000   0.00000   0.00000   0.00000   0.02133
              </tableData>
            </table>
          </function>
        </fcs_function>
        <fcs_function name="fcs/fbw/k-roll-ff">
          <function>
            <table>
              <independentVar lookup="row">aero/qbar-psf</independentVar>
              <independentVar lookup="column">velocities/mach</independentVar>
              <tableData>
                       0.150     0.400     0.700     0.900     1.100     1.400     2.000
              10.0   0.31563   0.11819   0.06701   0.05053   0.06834   0.08494   0.06635
              20.0   0.31563   0.11819   0.06701   0.05053   0.06834   0.08494   0.06635
              40.0   0.31563   0.11819   0.06412   0.04546   0.06065   0.08494   0.06635
              80.0   0.23736   0.08834   0.04918   0.03606   0.04854   0.06393   0.05600
             150.0   0.20491   0.07646   0.04291   0.03200   0.04321   0.05518   0.04702
             300.0   0.19486   0.07292   0.04127   0.03105   0.04197   0.05245   0.04171
             600.0   0.19262   0.07212   0.04087   0.03080   0.04165   0.05184   0.04069
            1200.0   0.19201   0.07189   0.04076   0.03073   0.04155   0.05167   0.04042
            2400.0   0.19176   0.07180   0.04071   0.03069   0.04151   0.05161   0.04033
              </tableData>
            </table>
          </function>
        </fcs_function>
        <fcs_function name="fcs/fbw/k-roll-i">
          <function>
            <table>
              <independentVar lookup="row">aero/qbar-psf</independentVar>
              <independentVar lookup="column">velocities/mach</independentVar>
              <tableData>
                       0.150     0.400     0.700     0.900     1.100     1.400     2.000
              10.0   0.46782   0.45564   0.41964   0.36456   0.59231   1.00000   1.00000
              20.0   0.23391   0.22782   0.20982   0.18228   0.29616   0.58965   0.97261
              40.0   0.11695   0.11391   0.10016   0.08160   0.13042   0.29483   0.48630
              80.0   0.04408   0.04280   0.03906   0.03349   0.05430   0.11118   0.20147
             150.0   0.02204   0.02143   0.01966   0.01699   0.02759   0.05558   0.09502
             300.0   0.01074   0.01046   0.00961   0.00833   0.01354   0.02708   0.04517
             600.0   0.00531   0.00517   0.00476   0.00413   0.00671   0.01339   0.02220
            1200.0   0.00264   0.00257   0.00237   0.00206   0.00334   0.00666   0.01101
            2400.0   0.00132   0.00128   0.00118   0.00103   0.00167   0.00332   0.00548
              </tableData>
            </table>
          </function>
        </fcs_function>
        <fcs_function name="fcs/fbw/p-max">
          <function>
            <table>
              <independentVar lookup="row">aero/qbar-psf</independentVar>
              <independentVar lookup="column">velocities/mach</independentVar>
              <tableData>
                       0.150     0.400     0.700     0.900     1.100     1.400     2.000
              10.0   1.10594   2.95350   3.83972   3.83972   3.83972   3.83972   3.83972
              20.0   1.10594   2.95350   3.83972   3.83972   3.83972   3.83972   3.83972
              40.0   1.10594   2.95350   3.83972   3.83972   3.83972   3.83972   3.83972
              80.0   1.47064   3.83972   3.83972   3.83972   3.83972   3.83972   3.83972
             150.0   1.70347   3.83972   3.83972   3.83972   3.83972   3.83972   3.83972
             300.0   1.79134   3.83972   3.83972   3.83972   3.83972   3.83972   3.83972
             600.0   1.81218   3.83972   3.83972   3.83972   3.83972   3.83972   3.83972
            1200.0   1.81799   3.83972   3.83972   3.83972   3.83972   3.83972   3.83972
            2400.0   1.82030   3.83972   3.83972   3.83972   3.83972   3.83972   3.83972
              </tableData>
            </table>
          </function>
        </fcs_function>
        <!-- the stick's rate halves towards alpha_max -->
        <fcs_function name="fcs/fbw/p-stick">
          <function>
            <product>
              <property>fcs/roll-trim-sum</property>
              <property>fcs/fbw/p-max</property>
              <table>
                <independentVar lookup="row">aero/alpha-rad</independentVar>
                <tableData>
                  0.24435 1.0
                  0.61087 0.5
                </tableData>
              </table>
            </product>
          </function>
        </fcs_function>
        <!-- the rudder's yaw acceleration at full travel (1/s^2), and the yaw damping (1/s) -->
        <fcs_function name="fcs/fbw/yaw-accel">
          <function>
            <table>
              <independentVar lookup="row">aero/qbar-psf</independentVar>
              <independentVar lookup="column">velocities/mach</independentVar>
              <tableData>
                       0.150     0.400     0.700     0.900     1.100     1.400     2.000
              10.0   0.02343   0.02383   0.02506   0.02711   0.01529   0.01299   0.00832
              20.0   0.04687   0.04765   0.05013   0.05421   0.03058   0.02598   0.01665
              40.0   0.09374   0.09531   0.10106   0.11301   0.06411   0.05195   0.03330
              80.0   0.23332   0.23835   0.25318   0.27622   0.15589   0.12922   0.07192
             150.0   0.44652   0.45379   0.47679   0.51442   0.29011   0.24749   0.15914
             300.0   0.88549   0.90018   0.94655   1.02302   0.57708   0.49078   0.31551
             600.0   1.76441   1.79375   1.88641   2.03918   1.15032   0.97791   0.62802
            1200.0   3.52135   3.58004   3.76536   4.07087   2.29647   1.95167   1.25209
            2400.0   7.03330   7.15076   7.52162   8.13292   4.58804   3.89811   2.49983
              </tableData>
            </table>
          </function>
        </fcs_function>
        <fcs_function name="fcs/fbw/yaw-damping">
          <function>
            <table>
              <independentVar lookup="row">aero/qbar-psf</independentVar>
              <independentVar lookup="column">velocities/mach</independentVar>
              <tableData>
                       0.150     0.400     0.700     0.900     1.100     1.400     2.000
              10.0   0.01116   0.00429   0.00264   0.00229   0.00191   0.00119   0.00056
              20.0   0.02232   0.00858   0.00528   0.00459   0.00382   0.00238   0.00113
              40.0   0.04464   0.01716   0.01214   0.01014   0.00846   0.00477   0.00226
              80.0   0.11142   0.04313   0.02706   0.02414   0.02018   0.01188   0.00506
             150.0   0.23567   0.09072   0.05606   0.04879   0.04063   0.02515   0.01121
             300.0   0.47458   0.18242   0.11223   0.09733   0.08101   0.05067   0.02404
             600.0   0.94476   0.36319   0.22355   0.19399   0.16147   0.10086   0.04787
            1200.0   1.88677   0.72538   0.44658   0.38764   0.32267   0.20142   0.09545
            2400.0   3.77332   1.45068   0.89311   0.77523   0.64530   0.40282   0.19076
              </tableData>
            </table>
          </function>
        </fcs_function>
        <!-- the rudder's share of the yaw a roll about the flight path needs, per unit of
             its roll acceleration: sin(alpha), less the ailerons' own yaw and what a
             principal axis inclined to the body axis gives -->
        <fcs_function name="fcs/fbw/roll-yaw-share">
          <function>
            <table>
              <independentVar lookup="row">aero/alpha-rad</independentVar>
              <tableData>
                   -0.34907  -0.35886
                   -0.26180  -0.27700
                   -0.17453  -0.20034
                   -0.08727  -0.11818
                    0.00000  -0.02882
                    0.08727   0.06094
                    0.17453   0.14078
                    0.26180   0.21341
                    0.34907   0.29397
                    0.43633   0.37706
                    0.52360   0.45906
                    0.61087   0.54081
                    0.69813   0.61597
                    0.78540   0.68225
                    0.87266   0.73716
              </tableData>
            </table>
          </function>
        </fcs_function>
        <!-- the yaw acceleration each rad/s of roll rate needs while the aircraft pitches
             under it: the pitch rate's inertia coupling, the angle of attack rising, and
             the yaw damping the roll's yaw rate meets -->
        <fcs_function name="fcs/fbw/p-yaw-need">
          <function>
            <abs>
              <sum>
                <product>
                  <sum>
                    <property>aero/alphadot-rad_sec</property>
                    <product><value>0.76911</value><property>velocities/q-rad_sec</property></product>
                  </sum>
                  <cos><property>aero/alpha-rad</property></cos>
                </product>
                <product><property>fcs/fbw/yaw-damping</property><sin><property>aero/alpha-rad</property></sin></product>
              </sum>
            </abs>
          </function>
        </fcs_function>
        <!-- no more roll rate than 0.5 of the rudder's yaw holds: a roll the rudder cannot
             follow turns the angle of attack into sideslip -->
        <fcs_function name="fcs/fbw/p-yaw-max">
          <function>
            <quotient>
              <product><value>0.5</value><property>fcs/fbw/yaw-accel</property></product>
              <max><value>0.001</value><property>fcs/fbw/p-yaw-need</property></max>
            </quotient>
          </function>
        </fcs_function>
        <fcs_function name="fcs/fbw/p-limited">
          <function>
            <max>
              <min><property>fcs/fbw/p-stick</property><property>fcs/fbw/p-yaw-max</property></min>
              <product><value>-1</value><property>fcs/fbw/p-yaw-max</property></product>
            </max>
          </function>
        </fcs_function>
        <!-- and while the rate grows, no faster roll acceleration than all of it
             coordinates, unless the roll asked for could not leave 2.0 deg of sideslip
             even uncoordinated: at worst c^2 p^2 / (8 Y), c the rudder's share, Y its yaw
             acceleration, p the rate asked for -->
        <fcs_function name="fcs/fbw/p-accel">
          <function>
            <product>
              <quotient>
                <property>fcs/fbw/yaw-accel</property>
                <max><value>0.01</value><abs><property>fcs/fbw/roll-yaw-share</property></abs></max>
              </quotient>
              <max>
                <value>1</value>
                <quotient>
                  <product><value>0.27925</value><property>fcs/fbw/yaw-accel</property></product>
                  <sum>
                    <value>1e-9</value>
                    <product>
                      <property>fcs/fbw/roll-yaw-share</property><property>fcs/fbw/roll-yaw-share</property>
                      <property>fcs/fbw/p-limited</property><property>fcs/fbw/p-limited</property>
                    </product>
                  </sum>
                </quotient>
              </max>
            </product>
          </function>
        </fcs_function>
        <!-- a roll is stopped as fast as the ailerons can -->
        <fcs_function name="fcs/fbw/p-accel-up">
          <function>
            <sum><property>fcs/fbw/p-accel</property>
              <product><value>1000</value><lt><property>fcs/fbw/p-cmd</property><value>0</value></lt></product></sum>
          </function>
        </fcs_function>
        <fcs_function name="fcs/fbw/p-accel-down">
          <function>
            <sum><property>fcs/fbw/p-accel</property>
              <product><value>1000</value><gt><property>fcs/fbw/p-cmd</property><value>0</value></gt></product></sum>
          </function>
        </fcs_function>
        <actuator name="fcs/fbw/p-cmd">
          <input>fcs/fbw/p-limited</input>
          <rate_limit sense="incr">fcs/fbw/p-accel-up</rate_limit>
          <rate_limit sense="decr">fcs/fbw/p-accel-down</rate_limit>
        </actuator>
        <fcs_function name="fcs/fbw/p-stability">
          <function>
            <sum>
              <product><property>velocities/p-rad_sec</property><cos><property>aero/alpha-rad</property></cos></product>
              <product><property>velocities/r-rad_sec</property><sin><property>aero/alpha-rad</property></sin></product>
            </sum>
          </function>
        </fcs_function>
        <fcs_function name="fcs/fbw/roll-error-rate">
          <function>
            <product><property>fcs/fbw/k-roll-i</property>
              <difference><property>fcs/fbw/p-cmd</property><property>fcs/fbw/p-stability</property></difference></product>
          </function>
        </fcs_function>
        <integrator name="fcs/fbw/roll-integral">
          <input>fcs/fbw/roll-error-rate</input>
          <c1>1.0</c1>
          <trigger>fcs/fbw/reset</trigger>
          <clipto> <min>-0.21817</min> <max>0.21817</max> </clipto>
        </integrator>
        <fcs_function name="fcs/fbw/aileron">
          <function>
            <sum>
              <product><property>fcs/fbw/k-roll-ff</property><property>fcs/fbw/p-cmd</property></product>
              <product><property>fcs/fbw/k-roll</property>
                <difference><property>fcs/fbw/p-cmd</property><property>fcs/fbw/p-stability</property></difference></product>
              <property>fcs/fbw/roll-integral</property>
            </sum>
          </function>
          <clipto> <min>-0.43633</min> <max>0.43633</max> </clipto>
        </fcs_function>
        <actuator name="fcs/left-aileron-actuator">
          <input>fcs/fbw/aileron</input>
          <lag>40</lag>
          <rate_limit>1.4</rate_limit>
          <output>fcs/left-aileron-pos-rad</output>
        </actuator>
        <pure_gain name="fcs/right-aileron">
          <input>fcs/left-aileron-pos-rad</input>
          <gain>-1</gain>
          <output>fcs/right-aileron-pos-rad</output>
        </pure_gain>
      </channel>
      <channel name="Yaw (fly-by-wire)">
        <!-- hangar: yaw damper, sideslip feedback, pedals command sideslip -->
        <summer name="fcs/yaw-trim-sum">
          <input>fcs/rudder-cmd-norm</input>
          <input>fcs/yaw-trim-cmd-norm</input>
          <clipto> <min>-1</min> <max>1</max> </clipto>
        </summer>
        <fcs_function name="fcs/fbw/k-yaw-r">
          <function>
            <table>
              <independentVar lookup="row">aero/qbar-psf</independentVar>
              <independentVar lookup="column">velocities/mach</independentVar>
              <tableData>
                       0.150     0.400     0.700     0.900     1.100     1.400     2.000
              10.0  -3.00000  -3.00000  -3.00000  -3.00000  -3.00000  -3.00000  -3.00000
              20.0  -3.00000  -3.00000  -3.00000  -3.00000  -3.00000  -3.00000  -3.00000
              40.0  -3.00000  -3.00000  -3.00000  -3.00000  -3.00000  -3.00000  -3.00000
              80.0  -3.00000  -3.00000  -3.00000  -2.78236  -3.00000  -3.00000  -3.00000
             150.0  -1.34819  -1.57555  -1.55680  -1.45502  -2.60581  -3.00000  -3.00000
             300.0  -0.45303  -0.70917  -0.73555  -0.69390  -1.25697  -1.51276  -2.42712
             600.0  -0.05009  -0.31603  -0.36238  -0.34766  -0.59348  -0.85037  -1.21845
            1200.0   0.00000  -0.14449  -0.20178  -0.20229  -0.35375  -0.51486  -0.72445
            2400.0   0.00000  -0.04409  -0.10645  -0.11435  -0.20832  -0.31951  -0.45676
              </tableData>
            </table>
          </function>
        </fcs_function>
        <fcs_function name="fcs/fbw/k-yaw-beta">
          <function>
            <table>
              <independentVar lookup="row">aero/qbar-psf</independentVar>
              <independentVar lookup="column">velocities/mach</independentVar>
              <tableData>
                       0.150     0.400     0.700     0.900     1.100     1.400     2.000
              10.0   3.00000   3.00000   3.00000   3.00000   3.00000   3.00000   3.00000
              20.0   3.00000   3.00000   3.00000   3.00000   3.00000   3.00000   3.00000
              40.0   3.00000   3.00000   0.00000   0.00000   0.00000   3.00000   3.00000
              80.0   0.00000   0.00000   0.08594   0.64475   2.08561   0.00000   0.00000
             150.0   0.40777   0.44278   0.53442   0.64252   1.54742   0.19107   0.00000
             300.0   0.15964   0.16655   0.18491   0.20855   0.59287   0.00594   0.41067
             600.0   0.00000   0.00000   0.00000   0.00000   0.00000   0.00000   0.00000
            1200.0   0.00000   0.00000   0.00000   0.00000   0.00000   0.00000   0.00000
            2400.0   0.00000   0.00000   0.00000   0.00000   0.00000   0.00000   0.00000
              </tableData>
            </table>
          </function>
        </fcs_function>
        <fcs_function name="fcs/fbw/k-pedal">
          <function>
            <table>
              <independentVar lookup="row">aero/qbar-psf</independentVar>
              <independentVar lookup="column">velocities/mach</independentVar>
              <tableData>
                       0.150     0.400     0.700     0.900     1.100     1.400     2.000
              10.0   0.03879   0.03853   0.03764   0.03592   0.05575   0.07911   0.07911
              20.0   0.03879   0.03853   0.03764   0.03592   0.05575   0.07911   0.07911
              40.0   0.03879   0.03853   0.04846   0.05496   0.08730   0.07911   0.07911
              80.0   0.05655   0.05682   0.05796   0.05949   0.09362   0.11515   0.12536
             150.0   0.08360   0.08390   0.08436   0.08331   0.12993   0.17026   0.13366
             300.0   0.09707   0.09658   0.09480   0.09102   0.14139   0.19796   0.18763
             600.0   0.09939   0.09873   0.09645   0.09201   0.14280   0.20274   0.20119
            1200.0   0.09921   0.09853   0.09618   0.09168   0.14227   0.20238   0.20263
            2400.0   0.09864   0.09797   0.09568   0.09125   0.14161   0.20120   0.20176
              </tableData>
            </table>
          </function>
        </fcs_function>
        <!-- the yaw damper damps the sideslip's rate, the stability-axis yaw rate less
             the one that coordinates the bank and the side force: in the dutch roll the
             yaw rate itself, and zero in a steady coordinated turn, in a roll about the
             flight path and in a steady sideslip - it coordinates those as long as they
             last (a damper on the washed-out yaw rate stopped coordinating a sustained
             roll, and at low speed the roll turned the angle of attack into sideslip) -->
        <!-- on the wheels (the pitch's ground mode, fcs/fbw/ground) the pedals move the rudder
             directly over its travel, a ground law: the sideslip feedback, there the
             crosswind's, turned the nose into it, and as the C-17A's nose wheel unloaded
             towards its rotation it ran 8.6 m off its line across 10 m/s -->
        <fcs_function name="fcs/fbw/rudder">
          <function>
            <sum>
              <product>
                <difference><value>1</value><property>fcs/fbw/ground</property></difference>
                <sum>
                  <product><property>fcs/fbw/k-pedal</property><property>fcs/yaw-trim-sum</property></product>
                  <product><value>-1</value><property>fcs/fbw/k-yaw-beta</property>
                    <difference><property>aero/beta-rad</property>
                      <product><value>0.17453</value><property>fcs/yaw-trim-sum</property></product></difference></product>
                  <product><property>fcs/fbw/k-yaw-r</property><property>aero/betadot-rad_sec</property></product>
                </sum>
              </product>
              <product><property>fcs/fbw/ground</property><value>0.52360</value><property>fcs/yaw-trim-sum</property></product>
            </sum>
          </function>
          <clipto> <min>-0.52360</min> <max>0.52360</max> </clipto>
        </fcs_function>
        <actuator name="fcs/rudder-actuator">
          <input>fcs/fbw/rudder</input>
          <lag>40</lag>
          <rate_limit>1.4</rate_limit>
          <output>fcs/rudder-pos-rad</output>
        </actuator>
        <!-- the nose wheel steers with the pedals (JSBSim steers from fcs/steer-cmd-norm,
             positive right; the rudder command is positive left) -->
        <pure_gain name="fcs/steer-from-rudder">
          <input>fcs/yaw-trim-sum</input>
          <gain>-1</gain>
          <output>fcs/steer-cmd-norm</output>
        </pure_gain>
      </channel>
      <channel name="Flaps">
        <kinematic name="fcs/flaps-control">
          <input>fcs/flap-cmd-norm</input>
          <traverse>
            <setting> <position>0.0</position> <time>0.0</time> </setting>
            <setting> <position>11.2</position> <time>2.0</time> </setting>
            <setting> <position>22.5</position> <time>2.0</time> </setting>
            <setting> <position>33.8</position> <time>2.0</time> </setting>
            <setting> <position>45.0</position> <time>2.0</time> </setting>
          </traverse>
          <output>fcs/flap-pos-deg</output>
        </kinematic>
        <pure_gain name="fcs/flaps-normalized">
          <input>fcs/flap-pos-deg</input>
          <gain>0.0222222</gain>
          <output>fcs/flap-pos-norm</output>
        </pure_gain>
      </channel>
      <channel name="Speedbrake">
        <kinematic name="fcs/speedbrake-control">
          <input>fcs/speedbrake-cmd-norm</input>
          <traverse>
            <setting> <position>0</position> <time>0</time> </setting>
            <setting> <position>1</position> <time>2.00</time> </setting>
          </traverse>
          <output>fcs/speedbrake-pos-norm</output>
        </kinematic>
      </channel>
      <channel name="Leading-Edge Flaps">
        <fcs_function name="fcs/lef-schedule">
          <function>
            <sum>
              <product> <value>1.38</value> <property>aero/alpha-deg</property> </product>
              <product> <value>-9.05</value>
                <quotient> <property>aero/qbar-psf</property> <property>atmosphere/P-psf</property> </quotient>
              </product>
              <value>1.45</value>
            </sum>
          </function>
          <clipto> <min>-3</min> <max>34</max> </clipto>
        </fcs_function>
        <actuator name="fcs/lef-actuator">
          <input>fcs/lef-schedule</input>
          <lag>7.35</lag>
          <rate_limit>25</rate_limit>
          <output>fcs/lef-pos-deg</output>
        </actuator>
      </channel>
      <channel name="Throttle 0">
        <fcs_function name="fcs/throttle-lever-0">
          <function>
            <table>
              <independentVar lookup="row">fcs/throttle-cmd-norm[0]</independentVar>
              <tableData>
                0.0  0.0
                0.8  1.0
                1.0  2.0
              </tableData>
            </table>
          </function>
          <output>fcs/throttle-pos-norm[0]</output>
        </fcs_function>
      </channel>
      <channel name="Throttle 1">
        <fcs_function name="fcs/throttle-lever-1">
          <function>
            <table>
              <independentVar lookup="row">fcs/throttle-cmd-norm[1]</independentVar>
              <tableData>
                0.0  0.0
                0.8  1.0
                1.0  2.0
              </tableData>
            </table>
          </function>
          <output>fcs/throttle-pos-norm[1]</output>
        </fcs_function>
      </channel>
      <channel name="Landing Gear">
        <kinematic name="fcs/gear-control">
          <input>gear/gear-cmd-norm</input>
          <traverse>
            <setting> <position>0</position> <time>0</time> </setting>
            <setting> <position>1</position> <time>5</time> </setting>
          </traverse>
          <output>gear/gear-pos-norm</output>
        </kinematic>
      </channel>
    </flight_control>
    <aerodynamics>
        <function name="aero/function/mach-lift">
          <description>lift, and damping, over its low-speed value (hangar: aero/mach.py)</description>
          <table>
            <independentVar lookup="row">velocities/mach</independentVar>
            <tableData>
                 0.000     1.000000
                 0.300     1.016993
                 0.500     1.050873
                 0.600     1.077584
                 0.700     1.113942
                 0.800     1.165068
                 0.850     1.199390
                 0.900     1.243195
                 0.950     1.249178
                 1.000     1.255605
                 1.050     1.261228
                 1.100     1.264797
                 1.200     1.260776
                 1.400     1.004853
                 1.600     0.866678
                 1.800     0.759168
                 2.000     0.679780
                 2.300     0.591662
                 2.600     0.526351
            </tableData>
          </table>
        </function>
        <function name="aero/function/mach-side">
          <description>side force, rolling and yawing moment over their low-speed values</description>
          <table>
            <independentVar lookup="row">velocities/mach</independentVar>
            <tableData>
                 0.000     1.000000
                 0.300     1.006960
                 0.500     1.020031
                 0.600     1.029609
                 0.700     1.041657
                 0.800     1.056683
                 0.850     1.065467
                 0.900     1.074910
                 0.950     1.055307
                 1.000     1.019986
                 1.050     0.978685
                 1.100     0.941142
                 1.200     0.916282
                 1.400     1.134437
                 1.600     0.948633
                 1.800     0.821163
                 2.000     0.727040
                 2.300     0.623197
                 2.600     0.547013
            </tableData>
          </table>
        </function>
        <function name="aero/function/mach-dCm-dCL">
          <description>pitching moment per unit low-speed lift: the neutral point's move</description>
          <table>
            <independentVar lookup="row">velocities/mach</independentVar>
            <tableData>
                 0.000     0.000000
                 0.300    -0.001089
                 0.500    -0.003000
                 0.600    -0.004273
                 0.700    -0.005657
                 0.800    -0.006633
                 0.850    -0.006154
                 0.900    -0.002745
                 0.950    -0.025887
                 1.000    -0.068678
                 1.050    -0.122999
                 1.100    -0.180351
                 1.200    -0.268595
                 1.400    -0.250356
                 1.600    -0.236367
                 1.800    -0.203158
                 2.000    -0.177005
                 2.300    -0.146935
                 2.600    -0.124360
            </tableData>
          </table>
        </function>
        <function name="aero/function/mach-dCD0">
          <description>zero-lift drag's change: friction and wave drag</description>
          <table>
            <independentVar lookup="row">velocities/mach</independentVar>
            <tableData>
                 0.000     0.000000
                 0.300    -0.000121
                 0.500    -0.000331
                 0.600    -0.000471
                 0.700    -0.000631
                 0.800    -0.000374
                 0.850     0.000921
                 0.900     0.006643
                 0.950     0.016530
                 1.000     0.025876
                 1.050     0.029965
                 1.100     0.029852
                 1.200     0.029617
                 1.400     0.027604
                 1.600     0.026354
                 1.800     0.025246
                 2.000     0.024221
                 2.300     0.022798
                 2.600     0.021490
            </tableData>
          </table>
        </function>
        <function name="aero/function/mach-dK">
          <description>induced-drag factor's change (per CL^2)</description>
          <table>
            <independentVar lookup="row">velocities/mach</independentVar>
            <tableData>
                 0.000     0.000000
                 0.300     0.004348
                 0.500     0.012395
                 0.600     0.018211
                 0.700     0.025466
                 0.800     0.034542
                 0.850     0.039994
                 0.900     0.046308
                 0.950     0.047119
                 1.000     0.047978
                 1.050     0.065274
                 1.100     0.088934
                 1.200     0.091673
                 1.400     0.088646
                 1.600     0.078762
                 1.800     0.061678
                 2.000     0.039192
                 2.300    -0.003551
                 2.600    -0.056265
            </tableData>
          </table>
        </function>
        <function name="aero/function/mach-aileron">
          <description>aileron power over its low-speed value</description>
          <table>
            <independentVar lookup="row">velocities/mach</independentVar>
            <tableData>
                 0.000     1.000000
                 0.300     1.017775
                 0.500     1.053928
                 0.600     1.083263
                 0.700     1.124704
                 0.800     1.186801
                 0.850     1.231813
                 0.900     1.294653
                 0.950     1.228693
                 1.000     1.108359
                 1.050     0.956716
                 1.100     0.796830
                 1.200     0.544581
                 1.400     0.400214
                 1.600     0.325128
                 1.800     0.276943
                 2.000     0.242633
                 2.300     0.205796
                 2.600     0.179353
            </tableData>
          </table>
        </function>
        <function name="aero/function/mach-elevator">
          <description>elevator power over its low-speed value</description>
          <table>
            <independentVar lookup="row">velocities/mach</independentVar>
            <tableData>
                 0.000     1.000000
                 0.300     1.020816
                 0.500     1.062438
                 0.600     1.095317
                 0.700     1.140004
                 0.800     1.201983
                 0.850     1.242259
                 0.900     1.290565
                 0.950     1.298448
                 1.000     1.305562
                 1.050     1.311121
                 1.100     1.314340
                 1.200     1.310616
                 1.400     1.141516
                 1.600     1.054698
                 1.800     0.905756
                 2.000     0.797816
                 2.300     0.680361
                 2.600     0.595125
            </tableData>
          </table>
        </function>
        <function name="aero/function/mach-flap">
          <description>flap power over its low-speed value</description>
          <table>
            <independentVar lookup="row">velocities/mach</independentVar>
            <tableData>
                 0.000     1.000000
                 0.300     1.028042
                 0.500     1.086656
                 0.600     1.135797
                 0.700     1.207746
                 0.800     1.321781
                 0.850     1.410079
                 0.900     1.543883
                 0.950     1.489052
                 1.000     1.356318
                 1.050     1.177191
                 1.100     0.983176
                 1.200     0.676518
                 1.400     0.497175
                 1.600     0.403898
                 1.800     0.344039
                 2.000     0.301416
                 2.300     0.255655
                 2.600     0.222805
            </tableData>
          </table>
        </function>
        <function name="aero/function/mach-rudder">
          <description>rudder power over its low-speed value</description>
          <table>
            <independentVar lookup="row">velocities/mach</independentVar>
            <tableData>
                 0.000     1.000000
                 0.300     1.011241
                 0.500     1.033656
                 0.600     1.051366
                 0.700     1.075577
                 0.800     1.109891
                 0.850     1.133141
                 0.900     1.163138
                 0.950     1.085873
                 1.000     0.959266
                 1.050     0.807854
                 1.100     0.656176
                 1.200     0.450168
                 1.400     0.557348
                 1.600     0.466063
                 1.800     0.403437
                 2.000     0.357194
                 2.300     0.306176
                 2.600     0.268747
            </tableData>
          </table>
        </function>
        <function name="aero/function/CL-base">
          <description>CL over alpha and beta at low speed</description>
          <table>
            <independentVar lookup="row">aero/alpha-deg</independentVar>
            <independentVar lookup="column">aero/beta-deg</independentVar>
            <tableData>
                        -90.00    -70.00    -50.00    -40.00    -30.00    -25.00    -20.00    -15.00    -10.00     -6.00     -3.00      0.00      3.00      6.00     10.00     15.00     20.00     25.00     30.00     40.00     50.00     70.00     90.00
             -180.00  -0.00000   0.00000   0.00000   0.00000   0.00000   0.00000   0.00000   0.00000   0.00000   0.00000   0.00000   0.00000   0.00000   0.00000   0.00000   0.00000   0.00000   0.00000   0.00000   0.00000   0.00000   0.00000  -0.00000
             -120.00   0.00000   0.12293   0.39725   0.55385   0.69924   0.76235   0.81599   0.86253   0.89269   0.90947   0.91661   0.91898   0.91661   0.90947   0.89269   0.86253   0.81599   0.76235   0.69924   0.55385   0.39725   0.12293   0.00000
              -70.00  -0.00000  -0.09535  -0.30970  -0.43224  -0.54597  -0.59525  -0.63715  -0.67235  -0.69736  -0.71044  -0.71600  -0.71785  -0.71600  -0.71044  -0.69736  -0.67235  -0.63715  -0.59525  -0.54597  -0.43224  -0.30970  -0.09535  -0.00000
              -46.00  -0.00000  -0.44435  -0.86128  -1.14588  -1.44267  -1.57059  -1.68295  -1.78754  -1.89007  -1.95801  -1.98792  -2.00010  -1.98792  -1.95801  -1.89007  -1.78754  -1.68295  -1.57059  -1.44267  -1.14588  -0.86128  -0.44435  -0.00000
              -32.00  -0.00000  -0.56987  -0.87336  -1.16405  -1.47824  -1.62791  -1.76092  -1.87461  -1.96161  -2.00193  -2.01921  -2.02498  -2.01921  -2.00193  -1.96161  -1.87461  -1.76092  -1.62791  -1.47824  -1.16405  -0.87336  -0.56987  -0.00000
              -22.00  -0.00000  -0.44268  -0.70447  -0.96457  -1.22343  -1.32181  -1.40162  -1.48386  -1.53621  -1.56333  -1.57482  -1.57865  -1.57482  -1.56333  -1.53621  -1.48386  -1.40162  -1.32181  -1.22343  -0.96457  -0.70447  -0.44268  -0.00000
              -17.00  -0.00000  -0.35388  -0.57494  -0.78263  -0.98856  -1.06676  -1.12849  -1.18967  -1.22765  -1.24737  -1.25571  -1.25849  -1.25571  -1.24737  -1.22765  -1.18967  -1.12849  -1.06676  -0.98856  -0.78263  -0.57494  -0.35388  -0.00000
              -13.00  -0.00000  -0.28059  -0.44943  -0.60763  -0.76773  -0.82628  -0.88351  -0.92281  -0.95125  -0.96598  -0.97221  -0.97427  -0.97221  -0.96598  -0.95125  -0.92281  -0.88351  -0.82628  -0.76773  -0.60763  -0.44943  -0.28059  -0.00000
               -9.00  -0.00000  -0.20448  -0.31192  -0.42394  -0.53756  -0.57477  -0.61801  -0.64375  -0.66245  -0.67210  -0.67616  -0.67750  -0.67616  -0.67210  -0.66245  -0.64375  -0.61801  -0.57477  -0.53756  -0.42394  -0.31192  -0.20448  -0.00000
               -5.00  -0.00000  -0.12113  -0.17950  -0.24700  -0.31501  -0.33004  -0.35836  -0.37098  -0.38012  -0.38480  -0.38674  -0.38736  -0.38674  -0.38480  -0.38012  -0.37098  -0.35836  -0.33004  -0.31501  -0.24700  -0.17950  -0.12113  -0.00000
               -1.00  -0.00000  -0.02488  -0.04200  -0.06269  -0.08238  -0.09072  -0.09122  -0.08993  -0.08892  -0.08837  -0.08811  -0.08801  -0.08811  -0.08837  -0.08892  -0.08993  -0.09122  -0.09072  -0.08238  -0.06269  -0.04200  -0.02488  -0.00000
                3.00   0.00000   0.07640   0.10602   0.13022   0.16174   0.17120   0.19172   0.20815   0.22019   0.22641   0.22901   0.22985   0.22901   0.22641   0.22019   0.20815   0.19172   0.17120   0.16174   0.13022   0.10602   0.07640   0.00000
                7.00   0.00000   0.17706   0.24240   0.31247   0.38881   0.41525   0.46038   0.49147   0.51419   0.52593   0.53087   0.53250   0.53087   0.52593   0.51419   0.49147   0.46038   0.41525   0.38881   0.31247   0.24240   0.17706   0.00000
               11.00   0.00000   0.27359   0.37953   0.48912   0.61237   0.66394   0.73118   0.77782   0.81150   0.82895   0.83633   0.83878   0.83633   0.82895   0.81150   0.77782   0.73118   0.66394   0.61237   0.48912   0.37953   0.27359   0.00000
               15.00   0.00000   0.36237   0.50881   0.66056   0.83266   0.90785   0.99194   1.05577   1.10008   1.12307   1.13282   1.13607   1.13282   1.12307   1.10008   1.05577   0.99194   0.90785   0.83266   0.66056   0.50881   0.36237   0.00000
               19.00   0.00000   0.44178   0.62743   0.82195   1.03856   1.14248   1.23999   1.31396   1.36798   1.39605   1.40797   1.41195   1.40797   1.39605   1.36798   1.31396   1.23999   1.14248   1.03856   0.82195   0.62743   0.44178   0.00000
               23.00   0.00000   0.51114   0.72568   0.96895   1.23994   1.36809   1.47244   1.55203   1.61050   1.64086   1.65376   1.65807   1.65376   1.64086   1.61050   1.55203   1.47244   1.36809   1.23994   0.96895   0.72568   0.51114   0.00000
               27.00   0.00000   0.56989   0.80293   1.08261   1.40896   1.55393   1.67270   1.75238   1.81185   1.84279   1.85595   1.86032   1.85595   1.84279   1.81185   1.75238   1.67270   1.55393   1.40896   1.08261   0.80293   0.56989   0.00000
               32.00   0.00000   0.62773   0.87555   1.17267   1.52740   1.69328   1.83104   1.92481   1.98578   2.01820   2.03221   2.03747   2.03221   2.01820   1.98578   1.92481   1.83104   1.69328   1.52740   1.17267   0.87555   0.62773   0.00000
               46.00   0.00000   0.40120   0.88181   1.17357   1.47764   1.60996   1.72277   1.82513   1.92278   1.99602   2.03155   2.05215   2.03155   1.99602   1.92278   1.82513   1.72277   1.60996   1.47764   1.17357   0.88181   0.40120   0.00000
               70.00   0.00000   0.09546   0.31012   0.43282   0.54672   0.59608   0.63807   0.67340   0.69843   0.71153   0.71710   0.71895   0.71710   0.71153   0.69843   0.67340   0.63807   0.59608   0.54672   0.43282   0.31012   0.09546   0.00000
              120.00  -0.00000  -0.12293  -0.39725  -0.55385  -0.69924  -0.76235  -0.81599  -0.86253  -0.89269  -0.90947  -0.91661  -0.91898  -0.91661  -0.90947  -0.89269  -0.86253  -0.81599  -0.76235  -0.69924  -0.55385  -0.39725  -0.12293  -0.00000
              180.00   0.00000   0.00000   0.00000   0.00000   0.00000   0.00000   0.00000   0.00000   0.00000   0.00000   0.00000   0.00000   0.00000   0.00000   0.00000   0.00000   0.00000   0.00000   0.00000   0.00000   0.00000   0.00000   0.00000
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            </tableData>
          </table>
        </function>
      <axis name="DRAG">
        <function name="aero/coefficient/CD_base">
          <description>CD over alpha and beta (hangar)</description>
          <product>
            <property>aero/qbar-psf</property>
            <property>metrics/Sw-sqft</property>
          <table>
            <independentVar lookup="row">aero/alpha-deg</independentVar>
            <independentVar lookup="column">aero/beta-deg</independentVar>
            <tableData>
                        -90.00    -70.00    -50.00    -40.00    -30.00    -25.00    -20.00    -15.00    -10.00     -6.00     -3.00      0.00      3.00      6.00     10.00     15.00     20.00     25.00     30.00     40.00     50.00     70.00     90.00
             -180.00   0.29862   0.23623   0.14168   0.09818   0.06338   0.04997   0.03936   0.03135   0.02242   0.02241   0.02280   0.02292   0.02280   0.02241   0.02242   0.03135   0.03936   0.04997   0.06338   0.09818   0.14168   0.23623   0.29862
             -120.00   0.29862   0.31990   0.59274   0.83725   1.11087   1.24240   1.36118   1.46099   1.53644   1.57639   1.59352   1.59924   1.59352   1.57639   1.53644   1.46099   1.36118   1.24240   1.11087   0.83725   0.59274   0.31990   0.29862
              -70.00   0.29862   0.35663   0.71433   1.01850   1.35436   1.51480   1.65927   1.78028   1.87146   1.91971   1.94038   1.94728   1.94038   1.91971   1.87146   1.78028   1.65927   1.51480   1.35436   1.01850   0.71433   0.35663   0.29862
              -46.00   0.29862   0.42467   0.72889   0.98903   1.29744   1.44597   1.58422   1.71082   1.83056   1.90877   1.94862   1.96331   1.94862   1.90877   1.83056   1.71082   1.58422   1.44597   1.29744   0.98903   0.72889   0.42467   0.29862
              -32.00   0.29862   0.39945   0.51460   0.63517   0.80858   0.90597   0.99044   1.06456   1.12215   1.14999   1.16198   1.16599   1.16198   1.14999   1.12215   1.06456   0.99044   0.90597   0.80858   0.63517   0.51460   0.39945   0.29862
              -22.00   0.29862   0.34267   0.34583   0.37912   0.44721   0.48006   0.50154   0.52770   0.54193   0.54934   0.55250   0.55356   0.55250   0.54934   0.54193   0.52770   0.50154   0.48006   0.44721   0.37912   0.34583   0.34267   0.29862
              -17.00   0.29862   0.31986   0.27781   0.26839   0.28757   0.30019   0.30406   0.31240   0.31396   0.31479   0.31516   0.31529   0.31516   0.31479   0.31396   0.31240   0.30406   0.30019   0.28757   0.26839   0.27781   0.31986   0.29862
              -13.00   0.29862   0.30602   0.23505   0.19934   0.18966   0.19004   0.18940   0.18296   0.17790   0.17527   0.17417   0.17380   0.17417   0.17527   0.17790   0.18296   0.18940   0.19004   0.18966   0.19934   0.23505   0.30602   0.29862
               -9.00   0.29862   0.29630   0.20586   0.15379   0.12545   0.11827   0.11093   0.09870   0.08953   0.08477   0.08276   0.08210   0.08276   0.08477   0.08953   0.09870   0.11093   0.11827   0.12545   0.15379   0.20586   0.29630   0.29862
               -5.00   0.29862   0.29059   0.19033   0.12972   0.09197   0.08162   0.07053   0.05573   0.04473   0.03903   0.03663   0.03583   0.03663   0.03903   0.04473   0.05573   0.07053   0.08162   0.09197   0.12972   0.19033   0.29059   0.29862
               -1.00   0.29862   0.28842   0.18439   0.12022   0.07858   0.07246   0.05475   0.03924   0.02775   0.02181   0.01931   0.01849   0.01931   0.02181   0.02775   0.03924   0.05475   0.07246   0.07858   0.12022   0.18439   0.28842   0.29862
                3.00   0.29862   0.28914   0.18581   0.12186   0.08062   0.07514   0.05818   0.04355   0.03273   0.02713   0.02478   0.02401   0.02478   0.02713   0.03273   0.04355   0.05818   0.07514   0.08062   0.12186   0.18581   0.28914   0.29862
                7.00   0.29862   0.29378   0.19522   0.13519   0.09846   0.08972   0.08193   0.07004   0.06123   0.05667   0.05476   0.05413   0.05476   0.05667   0.06123   0.07004   0.08193   0.08972   0.09846   0.13519   0.19522   0.29378   0.29862
               11.00   0.29862   0.30338   0.21554   0.16438   0.13859   0.13583   0.13449   0.12863   0.12390   0.12148   0.12047   0.12013   0.12047   0.12148   0.12390   0.12863   0.13449   0.13583   0.13859   0.16438   0.21554   0.30338   0.29862
               15.00   0.29862   0.31809   0.25012   0.21573   0.21026   0.21978   0.22705   0.23182   0.23404   0.23527   0.23583   0.23601   0.23583   0.23527   0.23404   0.23182   0.22705   0.21978   0.21026   0.21573   0.25012   0.31809   0.29862
               19.00   0.29862   0.33689   0.29842   0.28953   0.31339   0.33820   0.36317   0.37896   0.39081   0.39715   0.39988   0.40080   0.39988   0.39715   0.39081   0.37896   0.36317   0.33820   0.31339   0.28953   0.29842   0.33689   0.29862
               23.00   0.29862   0.35907   0.35667   0.38358   0.44998   0.49756   0.53731   0.56673   0.58893   0.60071   0.60577   0.60746   0.60577   0.60071   0.58893   0.56673   0.53731   0.49756   0.44998   0.38358   0.35667   0.35907   0.29862
               27.00   0.29862   0.38406   0.42185   0.49009   0.61108   0.67887   0.74332   0.78542   0.81760   0.83464   0.84197   0.84441   0.84197   0.83464   0.81760   0.78542   0.74332   0.67887   0.61108   0.49009   0.42185   0.38406   0.29862
               32.00   0.29862   0.41837   0.51110   0.63052   0.81573   0.91709   1.01221   1.08008   1.12527   1.14968   1.16029   1.16416   1.16029   1.14968   1.12527   1.08008   1.01221   0.91709   0.81573   0.63052   0.51110   0.41837   0.29862
               46.00   0.29862   0.41469   0.73893   1.00409   1.31867   1.47089   1.61028   1.73566   1.85195   1.93051   1.97394   1.99324   1.97394   1.93051   1.85195   1.73566   1.61028   1.47089   1.31867   1.00409   0.73893   0.41469   0.29862
               70.00   0.29862   0.35663   0.71434   1.01851   1.35437   1.51480   1.65927   1.78028   1.87147   1.91971   1.94038   1.94728   1.94038   1.91971   1.87147   1.78028   1.65927   1.51480   1.35437   1.01851   0.71434   0.35663   0.29862
              120.00   0.29862   0.31990   0.59274   0.83725   1.11087   1.24240   1.36118   1.46099   1.53644   1.57639   1.59352   1.59924   1.59352   1.57639   1.53644   1.46099   1.36118   1.24240   1.11087   0.83725   0.59274   0.31990   0.29862
              180.00   0.29862   0.23623   0.14168   0.09818   0.06338   0.04997   0.03936   0.03135   0.02242   0.02241   0.02280   0.02292   0.02280   0.02241   0.02242   0.03135   0.03936   0.04997   0.06338   0.09818   0.14168   0.23623   0.29862
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            </tableData>
          </table>
          </product>
        </function>
        <function name="aero/coefficient/CD_mach">
          <description>zero-lift drag's change with Mach: friction, wave drag</description>
          <product>
            <property>aero/qbar-psf</property>
            <property>metrics/Sw-sqft</property>
            <property>aero/function/mach-dCD0</property>
          </product>
        </function>
        <function name="aero/coefficient/CD_induced_mach">
          <description>induced drag's change with Mach (leading-edge suction lost)</description>
          <product>
            <property>aero/qbar-psf</property>
            <property>metrics/Sw-sqft</property>
            <property>aero/cl-squared</property>
            <property>aero/function/mach-dK</property>
          </product>
        </function>
        <function name="aero/coefficient/CD_aileron">
          <description>CD increment from aileron (deg), over alpha</description>
          <product>
            <property>aero/qbar-psf</property>
            <property>metrics/Sw-sqft</property>
            <property>aero/function/mach-aileron</property>
          <table>
            <independentVar lookup="row">aero/alpha-deg</independentVar>
            <independentVar lookup="column">fcs/left-aileron-pos-deg</independentVar>
            <tableData>
                        -25.00    -20.00    -15.00    -10.00     -5.00      0.00      5.00     10.00     15.00     20.00     25.00
             -180.00   0.01005   0.00553   0.00318   0.00146   0.00037   0.00000   0.00037   0.00146   0.00318   0.00553   0.01005
             -120.00   0.00258   0.00174   0.00102   0.00047   0.00012   0.00000   0.00012   0.00047   0.00102   0.00174   0.00258
              -70.00   0.00046   0.00038   0.00025   0.00012   0.00003   0.00000   0.00003   0.00012   0.00025   0.00038   0.00046
              -46.00   0.00094   0.00036   0.00005  -0.00005  -0.00002   0.00000  -0.00002  -0.00005   0.00005   0.00036   0.00094
              -32.00   0.01046   0.00688   0.00389   0.00167   0.00039   0.00000   0.00039   0.00167   0.00389   0.00688   0.01046
              -22.00   0.01454   0.00924   0.00510   0.00219   0.00054   0.00000   0.00054   0.00219   0.00510   0.00924   0.01454
              -17.00   0.02092   0.01378   0.00782   0.00333   0.00077   0.00000   0.00077   0.00333   0.00782   0.01378   0.02092
              -13.00   0.02632   0.01824   0.01122   0.00535   0.00137   0.00000   0.00137   0.00535   0.01122   0.01824   0.02632
               -9.00   0.02822   0.02003   0.01289   0.00659   0.00182   0.00000   0.00182   0.00659   0.01289   0.02003   0.02822
               -5.00   0.02812   0.01959   0.01227   0.00608   0.00164   0.00000   0.00164   0.00608   0.01227   0.01959   0.02812
               -1.00   0.02764   0.01931   0.01217   0.00606   0.00163   0.00000   0.00163   0.00606   0.01217   0.01931   0.02764
                3.00   0.02726   0.01914   0.01209   0.00601   0.00161   0.00000   0.00161   0.00601   0.01209   0.01914   0.02726
                7.00   0.02820   0.02040   0.01350   0.00712   0.00200   0.00000   0.00200   0.00712   0.01350   0.02040   0.02820
               11.00   0.03142   0.02333   0.01602   0.00902   0.00279   0.00000   0.00279   0.00902   0.01602   0.02333   0.03142
               15.00   0.02769   0.01969   0.01250   0.00619   0.00162   0.00000   0.00162   0.00619   0.01250   0.01969   0.02769
               19.00   0.01989   0.01302   0.00713   0.00265   0.00042   0.00000   0.00042   0.00265   0.00713   0.01302   0.01989
               23.00   0.01057   0.00531   0.00167  -0.00014  -0.00026   0.00000  -0.00026  -0.00014   0.00167   0.00531   0.01057
               27.00   0.00538   0.00159  -0.00062  -0.00112  -0.00045   0.00000  -0.00045  -0.00112  -0.00062   0.00159   0.00538
               32.00   0.00366   0.00112  -0.00047  -0.00084  -0.00033   0.00000  -0.00033  -0.00084  -0.00047   0.00112   0.00366
               46.00  -0.00447  -0.00396  -0.00304  -0.00172  -0.00050   0.00000  -0.00050  -0.00172  -0.00304  -0.00396  -0.00447
               70.00   0.00046   0.00038   0.00025   0.00012   0.00003   0.00000   0.00003   0.00012   0.00025   0.00038   0.00046
              120.00   0.00258   0.00174   0.00102   0.00047   0.00012   0.00000   0.00012   0.00047   0.00102   0.00174   0.00258
              180.00   0.01005   0.00553   0.00318   0.00146   0.00037   0.00000   0.00037   0.00146   0.00318   0.00553   0.01005
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            </tableData>
          </table>
          </product>
        </function>
        <function name="aero/coefficient/CD_elevator">
          <description>CD increment from elevator (deg), over alpha</description>
          <product>
            <property>aero/qbar-psf</property>
            <property>metrics/Sw-sqft</property>
            <property>aero/function/mach-elevator</property>
          <table>
            <independentVar lookup="row">aero/alpha-deg</independentVar>
            <independentVar lookup="column">fcs/elevator-pos-deg</independentVar>
            <tableData>
                        -24.00    -20.00    -15.00    -10.00     -5.00      0.00      5.00     10.00     10.50
             -180.00   0.04325   0.03040   0.01714   0.00348   0.00053   0.00000   0.00053   0.00348   0.00447
             -120.00  -0.10715  -0.08922  -0.06623  -0.04323  -0.02093   0.00000   0.01892   0.03525   0.03672
              -70.00   0.02973   0.03101   0.02899   0.02301   0.01325   0.00000  -0.01633  -0.03524  -0.03725
              -46.00   0.16868   0.14482   0.11222   0.07679   0.03918   0.00000  -0.04050  -0.08138  -0.08542
              -32.00   0.20943   0.17355   0.12830   0.08349   0.04014   0.00000  -0.03455  -0.06778  -0.07101
              -22.00   0.19385   0.15480   0.10881   0.06731   0.03164   0.00000  -0.02569  -0.04612  -0.04793
              -17.00   0.18219   0.14169   0.09613   0.05714   0.02476   0.00000  -0.01846  -0.03258  -0.03376
              -13.00   0.16513   0.12478   0.08088   0.04509   0.01833   0.00000  -0.01308  -0.02180  -0.02243
               -9.00   0.14032   0.10214   0.06237   0.03228   0.01245   0.00000  -0.00769  -0.01088  -0.01094
               -5.00   0.11572   0.08079   0.04598   0.02181   0.00766   0.00000  -0.00301  -0.00139  -0.00094
               -1.00   0.08921   0.05848   0.02967   0.01205   0.00332   0.00000   0.00125   0.00742   0.00838
                3.00   0.06219   0.03638   0.01433   0.00315  -0.00084   0.00000   0.00542   0.01639   0.01792
                7.00   0.03451   0.01419  -0.00066  -0.00587  -0.00524   0.00000   0.00991   0.02647   0.02865
               11.00   0.00237  -0.01085  -0.01742  -0.01639  -0.01045   0.00000   0.01559   0.03943   0.04238
               15.00  -0.03165  -0.03675  -0.03511  -0.02791  -0.01621   0.00000   0.02255   0.05377   0.05733
               19.00  -0.06319  -0.06095  -0.05257  -0.03964  -0.02239   0.00000   0.02974   0.06497   0.06882
               23.00  -0.09188  -0.08408  -0.07016  -0.05194  -0.02919   0.00000   0.03351   0.07194   0.07613
               27.00  -0.11690  -0.10482  -0.08583  -0.06257  -0.03353   0.00000   0.03688   0.07937   0.08385
               32.00  -0.14371  -0.12676  -0.10174  -0.07107  -0.03686   0.00000   0.04201   0.08656   0.09110
               46.00  -0.19124  -0.16499  -0.12684  -0.08476  -0.04199   0.00000   0.04035   0.07891   0.08265
               70.00   0.13397   0.01950  -0.05616  -0.03524  -0.01633   0.00000   0.01325   0.02301   0.02378
              120.00   0.06337   0.05827   0.04850   0.03525   0.01892   0.00000  -0.02093  -0.04323  -0.04551
              180.00   0.04325   0.03040   0.01714   0.00348   0.00053   0.00000   0.00053   0.00348   0.00447
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            </tableData>
          </table>
          </product>
        </function>
        <function name="aero/coefficient/CD_flap">
          <description>CD increment from flap (deg), over alpha</description>
          <product>
            <property>aero/qbar-psf</property>
            <property>metrics/Sw-sqft</property>
            <property>aero/function/mach-flap</property>
          <table>
            <independentVar lookup="row">aero/alpha-deg</independentVar>
            <independentVar lookup="column">fcs/flap-pos-deg</independentVar>
            <tableData>
                          0.00      5.00     10.00     15.00     20.00     25.00     30.00     35.00     40.00     45.00
             -180.00   0.00000   0.00059   0.00232   0.00516   0.00902   0.01376   0.01927   0.02535   0.03184   0.03853
             -120.00   0.00000   0.00059   0.00232   0.00516   0.00901   0.01376   0.01926   0.02535   0.03183   0.03852
              -70.00   0.00000   0.00059   0.00232   0.00516   0.00901   0.01376   0.01926   0.02534   0.03183   0.03852
              -46.00   0.00000  -0.02351  -0.04333  -0.05639  -0.06293  -0.06532  -0.06573  -0.06546  -0.06513  -0.06503
              -32.00   0.00000  -0.02425  -0.04477  -0.05841  -0.06537  -0.06805  -0.06867  -0.06856  -0.06838  -0.06845
              -22.00   0.00000  -0.01651  -0.03017  -0.03892  -0.04281  -0.04348  -0.04249  -0.04082  -0.03902  -0.03737
              -17.00   0.00000  -0.01252  -0.02169  -0.02684  -0.02826  -0.02717  -0.02470  -0.02158  -0.01822  -0.01490
              -13.00   0.00000  -0.01050  -0.01689  -0.01958  -0.01930  -0.01700  -0.01351  -0.00934  -0.00485  -0.00027
               -9.00   0.00000  -0.00829  -0.01218  -0.01257  -0.01035  -0.00626  -0.00076   0.00598   0.01384   0.02261
               -5.00   0.00000  -0.00414  -0.00407  -0.00067   0.00465   0.01111   0.01852   0.02686   0.03606   0.04604
               -1.00   0.00000   0.00083   0.00534   0.01185   0.01904   0.02667   0.03494   0.04404   0.05398   0.06469
                3.00   0.00000   0.00574   0.01456   0.02421   0.03345   0.04247   0.05185   0.06197   0.07290   0.08460
                7.00   0.00000   0.01094   0.02494   0.03866   0.05065   0.06158   0.07254   0.08417   0.09669   0.11005
               11.00   0.00000   0.01460   0.03393   0.05218   0.06727   0.08032   0.09299   0.10626   0.12052   0.13575
               15.00   0.00000   0.01308   0.03370   0.05445   0.07160   0.08614   0.10006   0.11461   0.13031   0.14721
               19.00   0.00000   0.00985   0.02727   0.04698   0.06412   0.07887   0.09308   0.10808   0.12436   0.14197
               23.00   0.00000   0.00872   0.02158   0.03729   0.05197   0.06518   0.07824   0.09229   0.10786   0.12504
               27.00   0.00000   0.01091   0.02176   0.03362   0.04501   0.05567   0.06655   0.07857   0.09217   0.10748
               32.00   0.00000   0.01362   0.02437   0.03360   0.04187   0.04968   0.05787   0.06710   0.07775   0.09000
               46.00   0.00000   0.01690   0.03032   0.03946   0.04547   0.05001   0.05423   0.05863   0.06340   0.06855
               70.00   0.00000   0.00059   0.00232   0.00516   0.00901   0.01376   0.01926   0.02534   0.03183   0.03852
              120.00   0.00000   0.00059   0.00232   0.00516   0.00901   0.01376   0.01926   0.02535   0.03183   0.03852
              180.00   0.00000   0.00059   0.00232   0.00516   0.00902   0.01376   0.01927   0.02535   0.03184   0.03853
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            </tableData>
          </table>
          </product>
        </function>
        <function name="aero/coefficient/CD_rudder">
          <description>CD increment from rudder (deg), over alpha</description>
          <product>
            <property>aero/qbar-psf</property>
            <property>metrics/Sw-sqft</property>
            <property>aero/function/mach-rudder</property>
          <table>
            <independentVar lookup="row">aero/alpha-deg</independentVar>
            <independentVar lookup="column">fcs/rudder-pos-deg</independentVar>
            <tableData>
                        -30.00    -25.00    -20.00    -15.00    -10.00     -5.00      0.00      5.00     10.00     15.00     20.00     25.00     30.00
             -180.00   0.00557   0.00398   0.00261   0.00149   0.00067   0.00017   0.00000   0.00017   0.00067   0.00149   0.00261   0.00398   0.00557
             -120.00   0.00109   0.00078   0.00051   0.00029   0.00013   0.00003   0.00000   0.00003   0.00013   0.00029   0.00051   0.00078   0.00109
              -70.00   0.00058   0.00041   0.00027   0.00015   0.00007   0.00002   0.00000   0.00002   0.00007   0.00015   0.00027   0.00041   0.00058
              -46.00   0.00485   0.00383   0.00286   0.00190   0.00100   0.00028   0.00000   0.00028   0.00100   0.00190   0.00286   0.00383   0.00485
              -32.00   0.00763   0.00595   0.00439   0.00289   0.00148   0.00040   0.00000   0.00040   0.00148   0.00289   0.00439   0.00595   0.00763
              -22.00   0.00967   0.00755   0.00557   0.00367   0.00188   0.00051   0.00000   0.00051   0.00188   0.00367   0.00557   0.00755   0.00967
              -17.00   0.01036   0.00808   0.00596   0.00392   0.00200   0.00054   0.00000   0.00054   0.00200   0.00392   0.00596   0.00808   0.01036
              -13.00   0.01082   0.00844   0.00622   0.00409   0.00209   0.00057   0.00000   0.00057   0.00209   0.00409   0.00622   0.00844   0.01082
               -9.00   0.01123   0.00876   0.00645   0.00424   0.00217   0.00059   0.00000   0.00059   0.00217   0.00424   0.00645   0.00876   0.01123
               -5.00   0.01151   0.00898   0.00661   0.00435   0.00222   0.00060   0.00000   0.00060   0.00222   0.00435   0.00661   0.00898   0.01151
               -1.00   0.01162   0.00906   0.00668   0.00439   0.00224   0.00061   0.00000   0.00061   0.00224   0.00439   0.00668   0.00906   0.01162
                3.00   0.01157   0.00902   0.00664   0.00436   0.00223   0.00061   0.00000   0.00061   0.00223   0.00436   0.00664   0.00902   0.01157
                7.00   0.01135   0.00884   0.00651   0.00427   0.00218   0.00059   0.00000   0.00059   0.00218   0.00427   0.00651   0.00884   0.01135
               11.00   0.01096   0.00854   0.00628   0.00413   0.00211   0.00057   0.00000   0.00057   0.00211   0.00413   0.00628   0.00854   0.01096
               15.00   0.01043   0.00812   0.00598   0.00392   0.00200   0.00054   0.00000   0.00054   0.00200   0.00392   0.00598   0.00812   0.01043
               19.00   0.00978   0.00761   0.00560   0.00367   0.00187   0.00051   0.00000   0.00051   0.00187   0.00367   0.00560   0.00761   0.00978
               23.00   0.00897   0.00698   0.00513   0.00336   0.00172   0.00047   0.00000   0.00047   0.00172   0.00336   0.00513   0.00698   0.00897
               27.00   0.00813   0.00632   0.00465   0.00305   0.00156   0.00048   0.00000   0.00048   0.00156   0.00305   0.00465   0.00632   0.00813
               32.00   0.00677   0.00520   0.00374   0.00234   0.00104   0.00009   0.00000   0.00009   0.00104   0.00234   0.00374   0.00520   0.00677
               46.00   0.00091   0.00084   0.00188   0.00169   0.00096   0.00028   0.00000   0.00028   0.00096   0.00169   0.00188   0.00084   0.00091
               70.00   0.00058   0.00041   0.00027   0.00015   0.00007   0.00002   0.00000   0.00002   0.00007   0.00015   0.00027   0.00041   0.00058
              120.00   0.00109   0.00078   0.00051   0.00029   0.00013   0.00003   0.00000   0.00003   0.00013   0.00029   0.00051   0.00078   0.00109
              180.00   0.00557   0.00398   0.00261   0.00149   0.00067   0.00017   0.00000   0.00017   0.00067   0.00149   0.00261   0.00398   0.00557
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            </tableData>
          </table>
          </product>
        </function>
        <function name="aero/coefficient/CD_ground">
          <description>Induced drag change in ground effect</description>
          <product>
            <property>aero/qbar-psf</property>
            <property>metrics/Sw-sqft</property>
            <property>aero/cl-squared</property>
            <value>0.10404</value>
          <table>
            <independentVar lookup="row">aero/h_b-mac-ft</independentVar>
            <tableData>
                    0.00   -1.00000
                    0.10   -0.28090
                    0.15   -0.14793
                    0.20   -0.08897
                    0.30   -0.04160
                    0.40   -0.02383
                    0.50   -0.01538
                    0.60   -0.01073
                    0.70   -0.00791
                    0.80   -0.00607
                    0.90   -0.00480
                    1.00   -0.00389
                    1.10   -0.00322
            </tableData>
          </table>
          </product>
        </function>
        <function name="aero/coefficient/CD_speed_brake">
          <description>speed brake: drag of its airbrake plates, 1.88 m2 opened to 60 deg (hangar)</description>
          <product>
            <property>aero/qbar-psf</property>
            <property>metrics/Sw-sqft</property>
            <value>0.0621559</value>
            <pow>
              <sin>
                <product>
                  <property>fcs/speedbrake-pos-norm</property>
                  <value>1.0472</value>
                </product>
              </sin>
              <value>2</value>
            </pow>
          </product>
        </function>
        <function name="aero/coefficient/CD_gear">
          <description>the gear extended: its wheels' and struts' drag by Raymer's components, 0.348 m2 (hangar)</description>
          <product>
            <property>aero/qbar-psf</property>
            <property>metrics/Sw-sqft</property>
            <value>0.00958576</value>
            <property>gear/gear-pos-norm</property>
          </product>
        </function>
      </axis>
      <axis name="SIDE">
        <function name="aero/coefficient/CY_base">
          <description>CY over alpha and beta (hangar)</description>
          <product>
            <property>aero/qbar-psf</property>
            <property>metrics/Sw-sqft</property>
            <property>aero/function/mach-side</property>
          <table>
            <independentVar lookup="row">aero/alpha-deg</independentVar>
            <independentVar lookup="column">aero/beta-deg</independentVar>
            <tableData>
                        -90.00    -70.00    -50.00    -40.00    -30.00    -25.00    -20.00    -15.00    -10.00     -6.00     -3.00      0.00      3.00      6.00     10.00     15.00     20.00     25.00     30.00     40.00     50.00     70.00     90.00
             -180.00  -0.00000   0.08640   0.10970   0.09904   0.07819   0.06540   0.05184   0.03862   0.07887   0.08414   0.04428  -0.00000  -0.04428  -0.08414  -0.07887  -0.03862  -0.05184  -0.06540  -0.07819  -0.09904  -0.10970  -0.08640   0.00000
             -120.00   0.00000  -0.11151  -0.40534  -0.50186  -0.50974  -0.47500  -0.40732  -0.34075  -0.23267  -0.14296  -0.07220  -0.00000   0.07220   0.14296   0.23267   0.34075   0.40732   0.47500   0.50974   0.50186   0.40534   0.11151  -0.00000
              -70.00   0.00000  -0.14628  -0.49829  -0.61117  -0.61690  -0.57272  -0.49741  -0.40339  -0.28069  -0.17223  -0.08693  -0.00000   0.08693   0.17223   0.28069   0.40339   0.49741   0.57272   0.61690   0.61117   0.49829   0.14628  -0.00000
              -46.00   0.00000  -0.32125  -0.49448  -0.56904  -0.57711  -0.53518  -0.46438  -0.38657  -0.28977  -0.19270  -0.09268  -0.00000   0.09268   0.19270   0.28977   0.38657   0.46438   0.53518   0.57711   0.56904   0.49448   0.32125  -0.00000
              -32.00   0.00000  -0.21844  -0.22543  -0.28079  -0.29256  -0.26387  -0.23876  -0.19708  -0.12353  -0.07638  -0.03870  -0.00000   0.03870   0.07638   0.12353   0.19708   0.23876   0.26387   0.29256   0.28079   0.22543   0.21844  -0.00000
              -22.00   0.00000  -0.05195  -0.02870  -0.06755  -0.07276  -0.05326  -0.04595  -0.01963  -0.01433  -0.00913  -0.00467  -0.00000   0.00467   0.00913   0.01433   0.01963   0.04595   0.05326   0.07276   0.06755   0.02870   0.05195  -0.00000
              -17.00   0.00000   0.01447   0.04946   0.02286   0.01639   0.03058   0.02745   0.03704   0.02480   0.01479   0.00738  -0.00000  -0.00738  -0.01479  -0.02480  -0.03704  -0.02745  -0.03058  -0.01639  -0.02286  -0.04946  -0.01447  -0.00000
              -13.00   0.00000   0.05515   0.09774   0.07812   0.06994   0.08195   0.08971   0.07007   0.04752   0.02865   0.01432  -0.00000  -0.01432  -0.02865  -0.04752  -0.07007  -0.08971  -0.08195  -0.06994  -0.07812  -0.09774  -0.05515  -0.00000
               -9.00   0.00000   0.08382   0.13002   0.11394   0.10423   0.11541   0.11693   0.09089   0.06177   0.03729   0.01865  -0.00000  -0.01865  -0.03729  -0.06177  -0.09089  -0.11693  -0.11541  -0.10423  -0.11394  -0.13002  -0.08382  -0.00000
               -5.00   0.00000   0.10045   0.14652   0.13202   0.12097   0.13241   0.12963   0.10064   0.06838   0.04125   0.02062  -0.00000  -0.02062  -0.04125  -0.06838  -0.10064  -0.12963  -0.13241  -0.12097  -0.13202  -0.14652  -0.10045  -0.00000
               -1.00   0.00000   0.10664   0.15181   0.13769   0.12551   0.15536   0.13266   0.10292   0.06987   0.04208   0.02098  -0.00000  -0.02098  -0.04208  -0.06987  -0.10292  -0.13266  -0.15536  -0.12551  -0.13769  -0.15181  -0.10664  -0.00000
                3.00   0.00000   0.10491   0.14942   0.13428   0.12056   0.15088   0.12819   0.09935   0.06739   0.04058   0.02024  -0.00000  -0.02024  -0.04058  -0.06739  -0.09935  -0.12819  -0.15088  -0.12056  -0.13428  -0.14942  -0.10491  -0.00000
                7.00   0.00000   0.09271   0.13850   0.12147   0.10647   0.11512   0.11577   0.08958   0.06068   0.03654   0.01825  -0.00000  -0.01825  -0.03654  -0.06068  -0.08958  -0.11577  -0.11512  -0.10647  -0.12147  -0.13850  -0.09271  -0.00000
               11.00   0.00000   0.06687   0.11534   0.09606   0.07937   0.08793   0.09032   0.07060   0.04756   0.02856   0.01426  -0.00000  -0.01426  -0.02856  -0.04756  -0.07060  -0.09032  -0.08793  -0.07937  -0.09606  -0.11534  -0.06687  -0.00000
               15.00   0.00000   0.02680   0.07625   0.05271   0.03319   0.05026   0.04532   0.03898   0.02560   0.01513   0.00749  -0.00000  -0.00749  -0.01513  -0.02560  -0.03898  -0.04532  -0.05026  -0.03319  -0.05271  -0.07625  -0.02680  -0.00000
               19.00   0.00000  -0.02446   0.02136  -0.00903  -0.03170  -0.01672  -0.00328  -0.00515  -0.00513  -0.00367  -0.00198  -0.00000   0.00198   0.00367   0.00513   0.00515   0.00328   0.01672   0.03170   0.00903  -0.02136   0.02446  -0.00000
               23.00   0.00000  -0.08494  -0.04476  -0.08632  -0.11499  -0.09491  -0.07305  -0.06032  -0.04324  -0.02691  -0.01360  -0.00000   0.01360   0.02691   0.04324   0.06032   0.07305   0.09491   0.11499   0.08632   0.04476   0.08494  -0.00000
               27.00   0.00000  -0.15339  -0.11872  -0.17098  -0.20745  -0.19503  -0.14973  -0.12148  -0.08529  -0.05253  -0.02647  -0.00000   0.02647   0.05253   0.08529   0.12148   0.14973   0.19503   0.20745   0.17098   0.11872   0.15339  -0.00000
               32.00   0.00000  -0.24841  -0.22153  -0.28052  -0.31727  -0.30557  -0.24872  -0.19489  -0.13719  -0.08422  -0.04194  -0.00000   0.04194   0.08422   0.13719   0.19489   0.24872   0.30557   0.31727   0.28052   0.22153   0.24841  -0.00000
               46.00   0.00000  -0.27584  -0.50409  -0.57958  -0.58754  -0.54567  -0.46149  -0.37974  -0.27810  -0.19677  -0.10487  -0.00000   0.10487   0.19677   0.27810   0.37974   0.46149   0.54567   0.58754   0.57958   0.50409   0.27584  -0.00000
               70.00   0.00000  -0.14628  -0.49831  -0.61120  -0.61696  -0.57284  -0.49738  -0.40362  -0.28077  -0.17227  -0.08695  -0.00000   0.08695   0.17227   0.28077   0.40362   0.49738   0.57284   0.61696   0.61120   0.49831   0.14628  -0.00000
              120.00   0.00000  -0.11151  -0.40534  -0.50186  -0.50974  -0.47500  -0.40732  -0.34075  -0.23267  -0.14296  -0.07220  -0.00000   0.07220   0.14296   0.23267   0.34075   0.40732   0.47500   0.50974   0.50186   0.40534   0.11151  -0.00000
              180.00  -0.00000   0.08640   0.10970   0.09904   0.07819   0.06540   0.05184   0.03862   0.07887   0.08414   0.04428  -0.00000  -0.04428  -0.08414  -0.07887  -0.03862  -0.05184  -0.06540  -0.07819  -0.09904  -0.10970  -0.08640   0.00000
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            </tableData>
          </table>
          </product>
        </function>
        <function name="aero/coefficient/CY_aileron">
          <description>CY increment from aileron (deg), over alpha</description>
          <product>
            <property>aero/qbar-psf</property>
            <property>metrics/Sw-sqft</property>
            <property>aero/function/mach-aileron</property>
          <table>
            <independentVar lookup="row">aero/alpha-deg</independentVar>
            <independentVar lookup="column">fcs/left-aileron-pos-deg</independentVar>
            <tableData>
                        -25.00    -20.00    -15.00    -10.00     -5.00      0.00      5.00     10.00     15.00     20.00     25.00
             -180.00  -0.00337  -0.00411  -0.00380  -0.00269  -0.00136   0.00000   0.00136   0.00269   0.00380   0.00411   0.00337
              -35.00   0.00778   0.00675   0.00552   0.00397   0.00208   0.00000  -0.00208  -0.00397  -0.00552  -0.00675  -0.00778
              -11.00   0.01382   0.01191   0.00969   0.00694   0.00362   0.00000  -0.00362  -0.00694  -0.00969  -0.01191  -0.01382
                4.00   0.01539   0.01330   0.01085   0.00780   0.00408   0.00000  -0.00408  -0.00780  -0.01085  -0.01330  -0.01539
               19.00   0.01372   0.01192   0.00976   0.00703   0.00367   0.00000  -0.00367  -0.00703  -0.00976  -0.01192  -0.01372
               42.00  -0.00035  -0.00056  -0.00068  -0.00062  -0.00038   0.00000   0.00038   0.00062   0.00068   0.00056   0.00035
              180.00  -0.00337  -0.00411  -0.00380  -0.00269  -0.00136   0.00000   0.00136   0.00269   0.00380   0.00411   0.00337
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            </tableData>
          </table>
          </product>
        </function>
        <function name="aero/coefficient/CY_rudder">
          <description>CY increment from rudder (deg), over alpha</description>
          <product>
            <property>aero/qbar-psf</property>
            <property>metrics/Sw-sqft</property>
            <property>aero/function/mach-rudder</property>
          <table>
            <independentVar lookup="row">aero/alpha-deg</independentVar>
            <independentVar lookup="column">fcs/rudder-pos-deg</independentVar>
            <tableData>
                        -30.00    -25.00    -20.00    -15.00    -10.00     -5.00      0.00      5.00     10.00     15.00     20.00     25.00     30.00
             -180.00   0.00000   0.00000   0.00000   0.00000   0.00000   0.00000   0.00000   0.00000   0.00000   0.00000   0.00000   0.00000   0.00000
              -35.00  -0.03732  -0.03340  -0.02926  -0.02423  -0.01761  -0.00927   0.00000   0.00927   0.01761   0.02423   0.02926   0.03340   0.03732
              -11.00  -0.04937  -0.04486  -0.03976  -0.03323  -0.02431  -0.01285   0.00000   0.01285   0.02431   0.03323   0.03976   0.04486   0.04937
                4.00  -0.05072  -0.04609  -0.04086  -0.03416  -0.02500  -0.01321   0.00000   0.01321   0.02500   0.03416   0.04086   0.04609   0.05072
               19.00  -0.04455  -0.04053  -0.03598  -0.03012  -0.02206  -0.01167   0.00000   0.01167   0.02206   0.03012   0.03598   0.04053   0.04455
               42.00  -0.04130  -0.03756  -0.03138  -0.02380  -0.01818  -0.01053   0.00000   0.01053   0.01818   0.02380   0.03138   0.03756   0.04130
              180.00   0.00000   0.00000  -0.00000   0.00000   0.00000   0.00000   0.00000   0.00000   0.00000   0.00000  -0.00000   0.00000   0.00000
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            </tableData>
          </table>
          </product>
        </function>
        <function name="aero/coefficient/CYp">
          <description>CY per p (non-dimensional), over alpha</description>
          <product>
            <property>aero/qbar-psf</property>
            <property>metrics/Sw-sqft</property>
            <property>aero/bi2vel</property>
            <property>velocities/p-aero-rad_sec</property>
            <property>aero/function/mach-lift</property>
          <table>
            <independentVar lookup="row">aero/alpha-deg</independentVar>
            <tableData>
                 -180.00   -0.27767
                 -165.00   -0.24490
                  -32.00   -0.03206
                  -10.00   -0.02691
                    5.00   -0.01183
                   20.00    0.01180
                   46.00   -0.06732
                  180.00   -0.27767
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            </tableData>
          </table>
          </product>
        </function>
        <function name="aero/coefficient/CYr">
          <description>CY per r (non-dimensional), over alpha</description>
          <product>
            <property>aero/qbar-psf</property>
            <property>metrics/Sw-sqft</property>
            <property>aero/bi2vel</property>
            <property>velocities/r-aero-rad_sec</property>
            <property>aero/function/mach-lift</property>
          <table>
            <independentVar lookup="row">aero/alpha-deg</independentVar>
            <tableData>
                 -180.00    0.57424
                 -165.00    0.46582
                  -32.00    0.07222
                  -10.00    0.12378
                    5.00    0.14099
                   20.00    0.11419
                   46.00    0.02476
                  180.00    0.57424
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            </tableData>
          </table>
          </product>
        </function>
      </axis>
      <axis name="LIFT">
        <function name="aero/coefficient/CL_base">
          <description>CL over alpha and beta, ground effect, compressibility (hangar)</description>
          <product>
            <property>aero/qbar-psf</property>
            <property>metrics/Sw-sqft</property>
            <property>aero/function/CL-base</property>
            <property>aero/function/mach-lift</property>
          <table>
            <independentVar lookup="row">aero/h_b-mac-ft</independentVar>
            <tableData>
                    0.00    1.20000
                    0.10    1.08692
                    0.20    1.03778
                    0.40    1.00713
                    0.60    1.00135
                    0.80    1.00025
                    1.00    1.00005
                    1.10    1.00000
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            </tableData>
          </table>
          </product>
        </function>
        <function name="aero/coefficient/CL_elevator">
          <description>CL increment from elevator (deg), over alpha</description>
          <product>
            <property>aero/qbar-psf</property>
            <property>metrics/Sw-sqft</property>
            <property>aero/function/mach-elevator</property>
          <table>
            <independentVar lookup="row">aero/alpha-deg</independentVar>
            <independentVar lookup="column">fcs/elevator-pos-deg</independentVar>
            <tableData>
                        -24.00    -20.00    -15.00    -10.00     -5.00      0.00      5.00     10.00     10.50
             -180.00  -0.09897  -0.08560  -0.06659  -0.09451  -0.09243   0.00000   0.09243   0.09451   0.08822
              -35.00  -0.07294  -0.07178  -0.06419  -0.04954  -0.02787   0.00000   0.03133   0.06364   0.06754
              -11.00  -0.30729  -0.26292  -0.20201  -0.13627  -0.06817   0.00000   0.06960   0.14080   0.14801
                4.00  -0.35895  -0.29739  -0.21958  -0.14419  -0.07176   0.00000   0.07109   0.14259   0.14986
               19.00  -0.33682  -0.27540  -0.20241  -0.13247  -0.06484   0.00000   0.06107   0.11313   0.11801
               42.00  -0.14113  -0.10569  -0.07739  -0.04886  -0.02128   0.00000   0.01453   0.02231   0.02273
              180.00  -0.09897  -0.08560  -0.06659  -0.09451  -0.09243   0.00000   0.09243   0.09451   0.08822
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            </tableData>
          </table>
          </product>
        </function>
        <function name="aero/coefficient/CL_flap">
          <description>CL increment from flap (deg), over alpha</description>
          <product>
            <property>aero/qbar-psf</property>
            <property>metrics/Sw-sqft</property>
            <property>aero/function/mach-flap</property>
          <table>
            <independentVar lookup="row">aero/alpha-deg</independentVar>
            <independentVar lookup="column">fcs/flap-pos-deg</independentVar>
            <tableData>
                          0.00      5.00     10.00     15.00     20.00     25.00     30.00     35.00     40.00     45.00
             -180.00   0.00000   0.00000  -0.00000  -0.00000  -0.00000  -0.00000  -0.00000  -0.00000  -0.00000  -0.00000
              -35.00   0.00000   0.04917   0.09181   0.12268   0.14272   0.15645   0.16773   0.17865   0.19004   0.20211
              -11.00   0.00000   0.06224   0.11692   0.15663   0.18230   0.19964   0.21363   0.22698   0.24082   0.25551
                4.00   0.00000   0.06189   0.11557   0.15431   0.17917   0.19575   0.20898   0.22157   0.23454   0.24818
               19.00   0.00000   0.06199   0.11285   0.14725   0.16797   0.18095   0.19073   0.19975   0.20899   0.21867
               42.00   0.00000   0.04661   0.08877   0.11970   0.13905   0.15136   0.16072   0.16934   0.17803   0.18707
              180.00   0.00000   0.00000   0.00000   0.00000   0.00000   0.00000   0.00000   0.00000   0.00000   0.00000
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            </tableData>
          </table>
          <table>
            <independentVar lookup="row">aero/h_b-mac-ft</independentVar>
            <tableData>
                    0.00    1.20000
                    0.10    1.08692
                    0.20    1.03778
                    0.40    1.00713
                    0.60    1.00135
                    0.80    1.00025
                    1.00    1.00005
                    1.10    1.00000
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            </tableData>
          </table>
          </product>
        </function>
        <function name="aero/coefficient/CLq">
          <description>CL per q (non-dimensional), over alpha</description>
          <product>
            <property>aero/qbar-psf</property>
            <property>metrics/Sw-sqft</property>
            <property>aero/ci2vel</property>
            <property>velocities/q-aero-rad_sec</property>
            <property>aero/function/mach-lift</property>
          <table>
            <independentVar lookup="row">aero/alpha-deg</independentVar>
            <tableData>
                 -180.00   -0.88807
                 -165.00   -0.68978
                  -32.00    5.49967
                  -10.00    7.74860
                    5.00    7.81069
                   20.00    7.24231
                   46.00    4.21058
                  180.00   -0.88807
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            </tableData>
          </table>
          </product>
        </function>
        <function name="aero/coefficient/CLadot">
          <description>CL per alpha-dot (downwash lag at the tail)</description>
          <product>
            <property>aero/qbar-psf</property>
            <property>metrics/Sw-sqft</property>
            <property>aero/ci2vel</property>
            <property>aero/alphadot-rad_sec</property>
            <value>0.50683</value>
            <property>aero/function/mach-lift</property>
          </product>
        </function>
      </axis>
      <axis name="ROLL">
        <function name="aero/coefficient/Cl_base">
          <description>Cl over alpha and beta (hangar)</description>
          <product>
            <property>aero/qbar-psf</property>
            <property>metrics/Sw-sqft</property>
            <property>metrics/bw-ft</property>
            <property>aero/function/mach-side</property>
          <table>
            <independentVar lookup="row">aero/alpha-deg</independentVar>
            <independentVar lookup="column">aero/beta-deg</independentVar>
            <tableData>
                        -90.00    -70.00    -50.00    -40.00    -30.00    -25.00    -20.00    -15.00    -10.00     -6.00     -3.00      0.00      3.00      6.00     10.00     15.00     20.00     25.00     30.00     40.00     50.00     70.00     90.00
             -180.00   0.03886   0.02912   0.01800   0.01324   0.00911   0.00729   0.00561   0.00416   0.01183   0.01360   0.00725  -0.00000  -0.00725  -0.01360  -0.01183  -0.00416  -0.00561  -0.00729  -0.00911  -0.01324  -0.01800  -0.02912  -0.03886
              -35.00   0.03886   0.03769   0.03630   0.03197   0.01622   0.00637  -0.00385  -0.00788  -0.00711  -0.00306  -0.00153  -0.00000   0.00153   0.00306   0.00711   0.00788   0.00385  -0.00637  -0.01622  -0.03197  -0.03630  -0.03769  -0.03886
              -11.00   0.03886   0.02673   0.01524  -0.00053  -0.02208  -0.02451  -0.01856  -0.01442  -0.00992  -0.00605  -0.00305  -0.00000   0.00305   0.00605   0.00992   0.01442   0.01856   0.02451   0.02208   0.00053  -0.01524  -0.02673  -0.03886
                4.00   0.03886   0.02430   0.01657   0.01759   0.02362   0.02596   0.02363   0.01826   0.01242   0.00752   0.00377  -0.00000  -0.00377  -0.00752  -0.01242  -0.01826  -0.02363  -0.02596  -0.02362  -0.01759  -0.01657  -0.02430  -0.03886
               19.00   0.03886   0.01620   0.01643   0.02949   0.06653   0.07378   0.06695   0.05214   0.03560   0.02161   0.01086  -0.00000  -0.01086  -0.02161  -0.03560  -0.05214  -0.06695  -0.07378  -0.06653  -0.02949  -0.01643  -0.01620  -0.03886
               42.00   0.03886   0.01695   0.00040  -0.00983  -0.01905  -0.02208  -0.02066  -0.01672  -0.00930  -0.00302  -0.00155  -0.00000   0.00155   0.00302   0.00930   0.01672   0.02066   0.02208   0.01905   0.00983  -0.00040  -0.01695  -0.03886
              180.00   0.03886   0.02912   0.01800   0.01324   0.00911   0.00729   0.00561   0.00416   0.01183   0.01360   0.00725  -0.00000  -0.00725  -0.01360  -0.01183  -0.00416  -0.00561  -0.00729  -0.00911  -0.01324  -0.01800  -0.02912  -0.03886
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            </tableData>
          </table>
          </product>
        </function>
        <function name="aero/coefficient/Cl_aileron">
          <description>Cl increment from aileron (deg), over alpha</description>
          <product>
            <property>aero/qbar-psf</property>
            <property>metrics/Sw-sqft</property>
            <property>metrics/bw-ft</property>
            <property>aero/function/mach-aileron</property>
          <table>
            <independentVar lookup="row">aero/alpha-deg</independentVar>
            <independentVar lookup="column">fcs/left-aileron-pos-deg</independentVar>
            <tableData>
                        -25.00    -20.00    -15.00    -10.00     -5.00      0.00      5.00     10.00     15.00     20.00     25.00
             -180.00   0.01641   0.02000   0.01850   0.01307   0.00662   0.00000  -0.00662  -0.01307  -0.01850  -0.02000  -0.01641
              -35.00  -0.04258  -0.03743  -0.03098  -0.02245  -0.01180   0.00000   0.01180   0.02245   0.03098   0.03743   0.04258
              -11.00  -0.06154  -0.05338  -0.04370  -0.03146  -0.01647   0.00000   0.01647   0.03146   0.04370   0.05338   0.06154
                4.00  -0.06266  -0.05433  -0.04453  -0.03210  -0.01682   0.00000   0.01682   0.03210   0.04453   0.05433   0.06266
               19.00  -0.05499  -0.04789  -0.03934  -0.02837  -0.01485   0.00000   0.01485   0.02837   0.03934   0.04789   0.05499
               42.00  -0.03502  -0.03052  -0.02508  -0.01811  -0.00949   0.00000   0.00949   0.01811   0.02508   0.03052   0.03502
              180.00   0.01641   0.02000   0.01850   0.01307   0.00662   0.00000  -0.00662  -0.01307  -0.01850  -0.02000  -0.01641
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            </tableData>
          </table>
          </product>
        </function>
        <function name="aero/coefficient/Cl_rudder">
          <description>Cl increment from rudder (deg), over alpha</description>
          <product>
            <property>aero/qbar-psf</property>
            <property>metrics/Sw-sqft</property>
            <property>metrics/bw-ft</property>
            <property>aero/function/mach-rudder</property>
          <table>
            <independentVar lookup="row">aero/alpha-deg</independentVar>
            <independentVar lookup="column">fcs/rudder-pos-deg</independentVar>
            <tableData>
                        -30.00    -25.00    -20.00    -15.00    -10.00     -5.00      0.00      5.00     10.00     15.00     20.00     25.00     30.00
             -180.00   0.00000   0.00000   0.00000   0.00000   0.00000   0.00000   0.00000   0.00000   0.00000   0.00000   0.00000   0.00000   0.00000
              -35.00  -0.00479  -0.00420  -0.00359  -0.00290  -0.00207  -0.00108   0.00000   0.00108   0.00207   0.00290   0.00359   0.00420   0.00479
              -11.00  -0.00506  -0.00451  -0.00391  -0.00320  -0.00230  -0.00121   0.00000   0.00121   0.00230   0.00320   0.00391   0.00451   0.00506
                4.00  -0.00633  -0.00567  -0.00494  -0.00406  -0.00293  -0.00154   0.00000   0.00154   0.00293   0.00406   0.00494   0.00567   0.00633
               19.00  -0.00620  -0.00553  -0.00480  -0.00393  -0.00283  -0.00148   0.00000   0.00148   0.00283   0.00393   0.00480   0.00553   0.00620
               42.00  -0.00416  -0.00357  -0.00275  -0.00191  -0.00158  -0.00101   0.00000   0.00101   0.00158   0.00191   0.00275   0.00357   0.00416
              180.00   0.00000  -0.00000  -0.00000   0.00000   0.00000   0.00000   0.00000   0.00000   0.00000   0.00000  -0.00000  -0.00000   0.00000
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            </tableData>
          </table>
          </product>
        </function>
        <function name="aero/coefficient/Clp">
          <description>Cl per p (non-dimensional), over alpha</description>
          <product>
            <property>aero/qbar-psf</property>
            <property>metrics/Sw-sqft</property>
            <property>metrics/bw-ft</property>
            <property>aero/bi2vel</property>
            <property>velocities/p-aero-rad_sec</property>
            <property>aero/function/mach-lift</property>
          <table>
            <independentVar lookup="row">aero/alpha-deg</independentVar>
            <tableData>
                 -180.00   -0.76664
                 -165.00   -0.21214
                  -32.00   -0.36518
                  -10.00   -0.33462
                    5.00   -0.31669
                   20.00   -0.36015
                   46.00   -0.16167
                  180.00   -0.76664
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            </tableData>
          </table>
          </product>
        </function>
        <function name="aero/coefficient/Clr">
          <description>Cl per r (non-dimensional), over alpha</description>
          <product>
            <property>aero/qbar-psf</property>
            <property>metrics/Sw-sqft</property>
            <property>metrics/bw-ft</property>
            <property>aero/bi2vel</property>
            <property>velocities/r-aero-rad_sec</property>
            <property>aero/function/mach-lift</property>
          <table>
            <independentVar lookup="row">aero/alpha-deg</independentVar>
            <tableData>
                 -180.00    0.08010
                 -165.00    0.11103
                  -32.00   -0.22922
                  -10.00   -0.05689
                    5.00    0.06805
                   20.00    0.17671
                   46.00    0.55063
                  180.00    0.08010
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            </tableData>
          </table>
          </product>
        </function>
      </axis>
      <axis name="PITCH">
        <function name="aero/coefficient/Cm_base">
          <description>Cm over alpha and beta (hangar)</description>
          <product>
            <property>aero/qbar-psf</property>
            <property>metrics/Sw-sqft</property>
            <property>metrics/cbarw-ft</property>
          <table>
            <independentVar lookup="row">aero/alpha-deg</independentVar>
            <independentVar lookup="column">aero/beta-deg</independentVar>
            <tableData>
                        -90.00    -70.00    -50.00    -40.00    -30.00    -25.00    -20.00    -15.00    -10.00     -6.00     -3.00      0.00      3.00      6.00     10.00     15.00     20.00     25.00     30.00     40.00     50.00     70.00     90.00
             -180.00  -0.00000  -0.00003  -0.00001  -0.00002  -0.00004  -0.00005  -0.00007   0.00004   0.00561   0.00359   0.00067  -0.00037   0.00067   0.00359   0.00561   0.00004  -0.00007  -0.00005  -0.00004  -0.00002  -0.00001  -0.00003  -0.00000
              -35.00  -0.00000  -0.12994   0.04697   0.04872   0.06223   0.05373   0.03840   0.02213   0.01401   0.00887   0.00799   0.00775   0.00799   0.00887   0.01401   0.02213   0.03840   0.05373   0.06223   0.04872   0.04697  -0.12994  -0.00000
              -11.00  -0.00000  -0.01510   0.00872   0.00209   0.00054  -0.00445  -0.00004  -0.00046  -0.00042  -0.00017   0.00003   0.00012   0.00003  -0.00017  -0.00042  -0.00046  -0.00004  -0.00445   0.00054   0.00209   0.00872  -0.01510  -0.00000
                4.00   0.00000   0.01095  -0.00227  -0.00455  -0.00707   0.00645   0.00403   0.00318   0.00239   0.00182   0.00146   0.00129   0.00146   0.00182   0.00239   0.00318   0.00403   0.00645  -0.00707  -0.00455  -0.00227   0.01095   0.00000
               19.00   0.00000   0.07771  -0.01622  -0.01737  -0.01908  -0.01810  -0.01175  -0.01344  -0.01464  -0.01535  -0.01571  -0.01586  -0.01571  -0.01535  -0.01464  -0.01344  -0.01175  -0.01810  -0.01908  -0.01737  -0.01622   0.07771   0.00000
               42.00   0.00000   0.17345  -0.04690  -0.05640  -0.05719  -0.05315  -0.04257  -0.03111  -0.01865  -0.02053  -0.01963  -0.01690  -0.01963  -0.02053  -0.01865  -0.03111  -0.04257  -0.05315  -0.05719  -0.05640  -0.04690   0.17345   0.00000
              180.00  -0.00000  -0.00003  -0.00001  -0.00002  -0.00004  -0.00005  -0.00007   0.00004   0.00561   0.00359   0.00067  -0.00037   0.00067   0.00359   0.00561   0.00004  -0.00007  -0.00005  -0.00004  -0.00002  -0.00001  -0.00003  -0.00000
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            </tableData>
          </table>
          </product>
        </function>
        <function name="aero/coefficient/Cm_mach">
          <description>Cm from the neutral point's move with Mach</description>
          <product>
            <property>aero/qbar-psf</property>
            <property>metrics/Sw-sqft</property>
            <property>metrics/cbarw-ft</property>
            <property>aero/function/CL-base</property>
            <property>aero/function/mach-dCm-dCL</property>
          </product>
        </function>
        <function name="aero/coefficient/Cm_elevator">
          <description>Cm increment from elevator (deg), over alpha</description>
          <product>
            <property>aero/qbar-psf</property>
            <property>metrics/Sw-sqft</property>
            <property>metrics/cbarw-ft</property>
            <property>aero/function/mach-elevator</property>
          <table>
            <independentVar lookup="row">aero/alpha-deg</independentVar>
            <independentVar lookup="column">fcs/elevator-pos-deg</independentVar>
            <tableData>
                        -24.00    -20.00    -15.00    -10.00     -5.00      0.00      5.00     10.00     10.50
             -180.00  -0.17555  -0.15217  -0.11869  -0.16922  -0.16578   0.00000   0.16584   0.16959   0.15838
              -35.00   0.17788   0.16033   0.13123   0.09428   0.05001   0.00000  -0.05101  -0.09667  -0.10185
              -11.00   0.36349   0.30844   0.23422   0.15588   0.07679   0.00000  -0.07730  -0.15569  -0.16360
                4.00   0.39270   0.32689   0.24191   0.15888   0.07930   0.00000  -0.07920  -0.16030  -0.16867
               19.00   0.37084   0.30655   0.22831   0.15169   0.07562   0.00000  -0.07490  -0.14095  -0.14744
               42.00   0.24157   0.19512   0.15240   0.10237   0.04884   0.00000  -0.04267  -0.07842  -0.08160
              180.00  -0.17555  -0.15217  -0.11869  -0.16922  -0.16578   0.00000   0.16584   0.16959   0.15838
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            </tableData>
          </table>
          </product>
        </function>
        <function name="aero/coefficient/Cm_flap">
          <description>Cm increment from flap (deg), over alpha</description>
          <product>
            <property>aero/qbar-psf</property>
            <property>metrics/Sw-sqft</property>
            <property>metrics/cbarw-ft</property>
            <property>aero/function/mach-flap</property>
          <table>
            <independentVar lookup="row">aero/alpha-deg</independentVar>
            <independentVar lookup="column">fcs/flap-pos-deg</independentVar>
            <tableData>
                          0.00      5.00     10.00     15.00     20.00     25.00     30.00     35.00     40.00     45.00
             -180.00   0.00000   0.00001   0.00002   0.00005   0.00009   0.00014   0.00020   0.00026   0.00033   0.00039
              -35.00   0.00000  -0.00441  -0.00900  -0.01340  -0.01740  -0.02113  -0.02479  -0.02851  -0.03237  -0.03639
              -11.00   0.00000   0.00910   0.01717   0.02342   0.02791   0.03136   0.03445   0.03762   0.04101   0.04468
                4.00   0.00000   0.01203   0.02263   0.03057   0.03606   0.04013   0.04371   0.04732   0.05119   0.05542
               19.00   0.00000   0.00504   0.00911   0.01149   0.01232   0.01224   0.01177   0.01117   0.01053   0.00994
               42.00   0.00000  -0.00581  -0.01105  -0.01563  -0.01961  -0.02332  -0.02698  -0.03068  -0.03443  -0.03830
              180.00   0.00000   0.00001   0.00002   0.00005   0.00009   0.00014   0.00020   0.00026   0.00033   0.00039
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            </tableData>
          </table>
          </product>
        </function>
        <function name="aero/coefficient/Cmq">
          <description>Cm per q (non-dimensional), over alpha</description>
          <product>
            <property>aero/qbar-psf</property>
            <property>metrics/Sw-sqft</property>
            <property>metrics/cbarw-ft</property>
            <property>aero/ci2vel</property>
            <property>velocities/q-aero-rad_sec</property>
            <property>aero/function/mach-lift</property>
          <table>
            <independentVar lookup="row">aero/alpha-deg</independentVar>
            <tableData>
                 -180.00  -13.49204
                 -165.00   -0.49510
                  -32.00   -5.72519
                  -10.00   -5.86844
                    5.00   -5.89156
                   20.00   -6.21857
                   46.00   -4.19866
                  180.00  -13.49204
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            </tableData>
          </table>
          </product>
        </function>
        <function name="aero/coefficient/Cmadot">
          <description>Cm per alpha-dot (downwash lag at the tail)</description>
          <product>
            <property>aero/qbar-psf</property>
            <property>metrics/Sw-sqft</property>
            <property>metrics/cbarw-ft</property>
            <property>aero/ci2vel</property>
            <property>aero/alphadot-rad_sec</property>
            <value>-0.65302</value>
            <property>aero/function/mach-lift</property>
          </product>
        </function>
        <function name="aero/coefficient/Cm_speed_brake">
          <description>speed brake: its drag's pitching moment, 0.90 m from the reference point's height</description>
          <product>
            <property>aero/qbar-psf</property>
            <property>metrics/Sw-sqft</property>
            <property>metrics/cbarw-ft</property>
            <value>0.0164811</value>
            <pow>
              <sin>
                <product>
                  <property>fcs/speedbrake-pos-norm</property>
                  <value>1.0472</value>
                </product>
              </sin>
              <value>2</value>
            </pow>
          </product>
        </function>
        <function name="aero/coefficient/Cm_gear">
          <description>the gear's drag's pitching moment, -1.57 m from the reference point's height</description>
          <product>
            <property>aero/qbar-psf</property>
            <property>metrics/Sw-sqft</property>
            <property>metrics/cbarw-ft</property>
            <value>-0.00443146</value>
            <property>gear/gear-pos-norm</property>
          </product>
        </function>
      </axis>
      <axis name="YAW">
        <function name="aero/coefficient/Cn_base">
          <description>Cn over alpha and beta (hangar)</description>
          <product>
            <property>aero/qbar-psf</property>
            <property>metrics/Sw-sqft</property>
            <property>metrics/bw-ft</property>
            <property>aero/function/mach-side</property>
          <table>
            <independentVar lookup="row">aero/alpha-deg</independentVar>
            <independentVar lookup="column">aero/beta-deg</independentVar>
            <tableData>
                        -90.00    -70.00    -50.00    -40.00    -30.00    -25.00    -20.00    -15.00    -10.00     -6.00     -3.00      0.00      3.00      6.00     10.00     15.00     20.00     25.00     30.00     40.00     50.00     70.00     90.00
             -180.00  -0.02955  -0.04841  -0.05968  -0.05866  -0.05194  -0.04638  -0.03940  -0.03128  -0.03993  -0.03733  -0.01969  -0.00000   0.01969   0.03733   0.03993   0.03128   0.03940   0.04638   0.05194   0.05866   0.05968   0.04841   0.02955
              -35.00  -0.02955  -0.01444  -0.00075   0.00706   0.01037   0.00661   0.00703   0.00594   0.00435  -0.00075  -0.00038  -0.00000   0.00038   0.00075  -0.00435  -0.00594  -0.00703  -0.00661  -0.01037  -0.00706   0.00075   0.01444   0.02955
              -11.00  -0.02955  -0.01224   0.00564   0.01411   0.01268   0.00564  -0.00231  -0.00271  -0.00228  -0.00154  -0.00080  -0.00000   0.00080   0.00154   0.00228   0.00271   0.00231  -0.00564  -0.01268  -0.01411  -0.00564   0.01224   0.02955
                4.00  -0.02955  -0.01317   0.00492   0.01158   0.00756  -0.00153  -0.00674  -0.00609  -0.00469  -0.00308  -0.00162  -0.00000   0.00162   0.00308   0.00469   0.00609   0.00674   0.00153  -0.00756  -0.01158  -0.00492   0.01317   0.02955
               19.00  -0.02955  -0.01222   0.00303   0.01094   0.00920   0.00238  -0.00322  -0.00333  -0.00259  -0.00167  -0.00086  -0.00000   0.00086   0.00167   0.00259   0.00333   0.00322  -0.00238  -0.00920  -0.01094  -0.00303   0.01222   0.02955
               42.00  -0.02955  -0.01386  -0.00274   0.00257   0.00662   0.00639   0.00241   0.00292   0.00236   0.00065   0.00186  -0.00000  -0.00186  -0.00065  -0.00236  -0.00292  -0.00241  -0.00639  -0.00662  -0.00257   0.00274   0.01386   0.02955
              180.00  -0.02955  -0.04841  -0.05968  -0.05866  -0.05194  -0.04638  -0.03940  -0.03128  -0.03993  -0.03733  -0.01969  -0.00000   0.01969   0.03733   0.03993   0.03128   0.03940   0.04638   0.05194   0.05866   0.05968   0.04841   0.02955
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            </tableData>
          </table>
          </product>
        </function>
        <function name="aero/coefficient/Cn_aileron">
          <description>Cn increment from aileron (deg), over alpha</description>
          <product>
            <property>aero/qbar-psf</property>
            <property>metrics/Sw-sqft</property>
            <property>metrics/bw-ft</property>
            <property>aero/function/mach-aileron</property>
          <table>
            <independentVar lookup="row">aero/alpha-deg</independentVar>
            <independentVar lookup="column">fcs/left-aileron-pos-deg</independentVar>
            <tableData>
                        -25.00    -20.00    -15.00    -10.00     -5.00      0.00      5.00     10.00     15.00     20.00     25.00
             -180.00   0.00180   0.00219   0.00203   0.00143   0.00073   0.00000  -0.00073  -0.00143  -0.00203  -0.00219  -0.00180
              -35.00  -0.00392  -0.00283  -0.00186  -0.00107  -0.00049   0.00000   0.00049   0.00107   0.00186   0.00283   0.00392
              -11.00  -0.00505  -0.00392  -0.00275  -0.00156  -0.00060   0.00000   0.00060   0.00156   0.00275   0.00392   0.00505
                4.00  -0.00331  -0.00280  -0.00221  -0.00155  -0.00081   0.00000   0.00081   0.00155   0.00221   0.00280   0.00331
               19.00  -0.00667  -0.00677  -0.00660  -0.00568  -0.00341   0.00000   0.00341   0.00568   0.00660   0.00677   0.00667
               42.00  -0.00163  -0.00211  -0.00231  -0.00200  -0.00115   0.00000   0.00115   0.00200   0.00231   0.00211   0.00163
              180.00   0.00180   0.00219   0.00203   0.00143   0.00073   0.00000  -0.00073  -0.00143  -0.00203  -0.00219  -0.00180
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            </tableData>
          </table>
          </product>
        </function>
        <function name="aero/coefficient/Cn_rudder">
          <description>Cn increment from rudder (deg), over alpha</description>
          <product>
            <property>aero/qbar-psf</property>
            <property>metrics/Sw-sqft</property>
            <property>metrics/bw-ft</property>
            <property>aero/function/mach-rudder</property>
          <table>
            <independentVar lookup="row">aero/alpha-deg</independentVar>
            <independentVar lookup="column">fcs/rudder-pos-deg</independentVar>
            <tableData>
                        -30.00    -25.00    -20.00    -15.00    -10.00     -5.00      0.00      5.00     10.00     15.00     20.00     25.00     30.00
             -180.00  -0.00000  -0.00000  -0.00000  -0.00000  -0.00000  -0.00000   0.00000  -0.00000  -0.00000  -0.00000  -0.00000  -0.00000  -0.00000
              -35.00   0.01204   0.01084   0.00956   0.00795   0.00580   0.00306   0.00000  -0.00306  -0.00580  -0.00795  -0.00956  -0.01084  -0.01204
              -11.00   0.01687   0.01537   0.01368   0.01147   0.00841   0.00445   0.00000  -0.00445  -0.00841  -0.01147  -0.01368  -0.01537  -0.01687
                4.00   0.01820   0.01662   0.01482   0.01246   0.00915   0.00484   0.00000  -0.00484  -0.00915  -0.01246  -0.01482  -0.01662  -0.01820
               19.00   0.01668   0.01525   0.01360   0.01144   0.00841   0.00445   0.00000  -0.00445  -0.00841  -0.01144  -0.01360  -0.01525  -0.01668
               42.00   0.01341   0.01229   0.01069   0.00870   0.00667   0.00375   0.00000  -0.00375  -0.00667  -0.00870  -0.01069  -0.01229  -0.01341
              180.00  -0.00000  -0.00000  -0.00000  -0.00000  -0.00000  -0.00000   0.00000  -0.00000  -0.00000  -0.00000  -0.00000  -0.00000  -0.00000
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            </tableData>
          </table>
          </product>
        </function>
        <function name="aero/coefficient/Cnp">
          <description>Cn per p (non-dimensional), over alpha</description>
          <product>
            <property>aero/qbar-psf</property>
            <property>metrics/Sw-sqft</property>
            <property>metrics/bw-ft</property>
            <property>aero/bi2vel</property>
            <property>velocities/p-aero-rad_sec</property>
            <property>aero/function/mach-lift</property>
          <table>
            <independentVar lookup="row">aero/alpha-deg</independentVar>
            <tableData>
                 -180.00    0.10196
                 -165.00    0.08728
                  -32.00    0.02170
                  -10.00    0.04141
                    5.00   -0.01830
                   20.00   -0.00217
                   46.00    0.01915
                  180.00    0.10196
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            </tableData>
          </table>
          </product>
        </function>
        <function name="aero/coefficient/Cnr">
          <description>Cn per r (non-dimensional), over alpha</description>
          <product>
            <property>aero/qbar-psf</property>
            <property>metrics/Sw-sqft</property>
            <property>metrics/bw-ft</property>
            <property>aero/bi2vel</property>
            <property>velocities/r-aero-rad_sec</property>
            <property>aero/function/mach-lift</property>
          <table>
            <independentVar lookup="row">aero/alpha-deg</independentVar>
            <tableData>
                 -180.00   -0.11108
                 -165.00   -0.08591
                  -32.00   -0.12649
                  -10.00   -0.13180
                    5.00   -0.13067
                   20.00   -0.10603
                   46.00   -0.10606
                  180.00   -0.11108
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            </tableData>
          </table>
          </product>
        </function>
      </axis>
    </aerodynamics>
</fdm_config>
