<?xml version="1.0"?>
<?xml-stylesheet type="text/xsl" href="http://jsbsim.sourceforge.net/JSBSim.xsl"?>
<!-- Generated by hangar 0.1.0 from gripen.toml on 2026-10-01. Edit the design and rebuild; changes
     made here are overwritten.  -->
<fdm_config name="gripen" version="2.0" release="ALPHA"
            xmlns:xsi="http://www.w3.org/2001/XMLSchema-instance"
            xsi:noNamespaceSchemaLocation="http://jsbsim.sourceforge.net/JSBSim.xsd">
    <fileheader>
      <author>hangar</author>
      <filecreationdate>2026-10-01</filecreationdate>
      <version>0.1.0</version>
      <description>Saab JAS 39C Gripen (hangar build)</description>
      <note>Aerodynamics: vortex lattice with viscous section polars, full-envelope
        strip model, slender-body fuselage (hangar). Mass: Raymer component
        weights on the geometry. Propeller: blade-element momentum theory.</note>
      <reference refID="fsim/applicability/aerobatic" author="the design" title="Saab JAS 39C data: +9 g (fsim/envelope/clean/n_max)" date="n/a"/>
      <reference refID="fsim/applicability/carrier" author="the design" title="Saab JAS 39C data: a land-based fighter (road bases); runway arresting hook only; the Sea Gripen was not built" date="n/a"/>
      <reference refID="fsim/applicability/drag_devices" author="the design" title="Saab JAS 39C data: two airbrakes on the rear fuselage" date="n/a"/>
      <reference refID="fsim/applicability/ground_contact" author="the design" title="Saab JAS 39C data: tricycle wheeled gear" date="n/a"/>
      <reference refID="fsim/applicability/releasable_stores" author="the design" title="Saab JAS 39C data: eight hardpoints" date="n/a"/>
      <reference refID="fsim/applicability/retractable_gear" author="the design" title="Saab JAS 39C data: retractable gear" date="n/a"/>
      <reference refID="fsim/applicability/vertical_flight" author="the design" title="Saab JAS 39C data: a conventional take-off and landing fighter. Conventional take-off and landing: no rotors, lift fans or vectored lift to hover" date="n/a"/>
    </fileheader>
    <metrics>
      <wingarea unit="M2"> 29.4247 </wingarea>
      <wingspan unit="M"> 8.2400 </wingspan>
      <chord unit="M"> 4.1824 </chord>
      <htailarea unit="M2"> 0.0000 </htailarea>
      <htailarm unit="M"> 0.0000 </htailarm>
      <vtailarea unit="M2"> 3.5705 </vtailarea>
      <vtailarm unit="M"> 3.2809 </vtailarm>
      <location name="AERORP" unit="M">
        <x> 7.6640 </x>
        <y> 0.0000 </y>
        <z> 0.0000 </z>
      </location>
      <location name="EYEPOINT" unit="M">
        <x> 3.6000 </x>
        <y> 0.0000 </y>
        <z> 1.2000 </z>
      </location>
      <location name="VRP" unit="M">
        <x> 7.8440 </x>
        <y> 0.0000 </y>
        <z> -0.2000 </z>
      </location>
    </metrics>
    <mass_balance negated_crossproduct_inertia="false">
      <ixx unit="KG*M2"> 7214.12 </ixx>
      <iyy unit="KG*M2"> 50161.26 </iyy>
      <izz unit="KG*M2"> 52630.65 </izz>
      <ixy unit="KG*M2"> 0.017 </ixy>
      <ixz unit="KG*M2"> 2699.337 </ixz>
      <iyz unit="KG*M2"> 0.059 </iyz>
      <emptywt unit="KG"> 6800.00 </emptywt>
      <location name="CG" unit="M">
        <x> 7.8440 </x>
        <y> 0.0000 </y>
        <z> -0.2000 </z>
      </location>
      <pointmass name="pilot">
        <weight unit="KG"> 100.00 </weight>
        <location unit="M">
          <x> 3.6000 </x>
          <y> 0.0000 </y>
          <z> 0.5000 </z>
        </location>
      </pointmass>
      <pointmass name="gun ammunition">
        <weight unit="KG"> 60.00 </weight>
        <location unit="M">
          <x> 6.3280 </x>
          <y> -0.8000 </y>
          <z> 0.0000 </z>
        </location>
      </pointmass>
    </mass_balance>
    <ground_reactions>
      <contact type="BOGEY" name="Nose Gear">
        <location unit="M">
          <x> 3.3900 </x>
          <y> 0.0000 </y>
          <z> -1.9100 </z>
        </location>
        <static_friction> 0.8 </static_friction>
        <dynamic_friction> 0.5 </dynamic_friction>
        <rolling_friction> 0.02 </rolling_friction>
        <spring_coeff unit="N/M"> 108507 </spring_coeff>
        <damping_coeff unit="N/M/SEC"> 12493 </damping_coeff>
        <damping_coeff_rebound unit="N/M/SEC"> 24986 </damping_coeff_rebound>
        <max_steer unit="DEG"> 55.0 </max_steer>
        <brake_group> NONE </brake_group>
        <retractable> 1 </retractable>
      </contact>
      <contact type="BOGEY" name="Left Main Gear">
        <location unit="M">
          <x> 8.4400 </x>
          <y> -1.2000 </y>
          <z> -1.9400 </z>
        </location>
        <static_friction> 0.8 </static_friction>
        <dynamic_friction> 0.5 </dynamic_friction>
        <rolling_friction> 0.02 </rolling_friction>
        <spring_coeff unit="N/M"> 242764 </spring_coeff>
        <damping_coeff unit="N/M/SEC"> 31009 </damping_coeff>
        <damping_coeff_rebound unit="N/M/SEC"> 62017 </damping_coeff_rebound>
        <max_steer unit="DEG"> 0.0 </max_steer>
        <brake_group> LEFT </brake_group>
        <retractable> 1 </retractable>
      </contact>
      <contact type="BOGEY" name="Right Main Gear">
        <location unit="M">
          <x> 8.4400 </x>
          <y> 1.2000 </y>
          <z> -1.9400 </z>
        </location>
        <static_friction> 0.8 </static_friction>
        <dynamic_friction> 0.5 </dynamic_friction>
        <rolling_friction> 0.02 </rolling_friction>
        <spring_coeff unit="N/M"> 242764 </spring_coeff>
        <damping_coeff unit="N/M/SEC"> 31009 </damping_coeff>
        <damping_coeff_rebound unit="N/M/SEC"> 62017 </damping_coeff_rebound>
        <max_steer unit="DEG"> 0.0 </max_steer>
        <brake_group> RIGHT </brake_group>
        <retractable> 1 </retractable>
      </contact>
      <contact type="STRUCTURE" name="canopy front">
        <location unit="M">
          <x> 3.3043 </x>
          <y> 0.0000 </y>
          <z> 0.9576 </z>
        </location>
        <static_friction> 0.8 </static_friction>
        <dynamic_friction> 0.6 </dynamic_friction>
        <spring_coeff unit="N/M"> 1108563 </spring_coeff>
        <damping_coeff unit="N/M/SEC"> 36952 </damping_coeff>
        <damping_coeff_rebound unit="N/M/SEC"> 36952 </damping_coeff_rebound>
      </contact>
      <contact type="STRUCTURE" name="fin rear">
        <location unit="M">
          <x> 12.4700 </x>
          <y> 0.0000 </y>
          <z> 2.7300 </z>
        </location>
        <static_friction> 0.8 </static_friction>
        <dynamic_friction> 0.6 </dynamic_friction>
        <spring_coeff unit="N/M"> 570190 </spring_coeff>
        <damping_coeff unit="N/M/SEC"> 19006 </damping_coeff>
        <damping_coeff_rebound unit="N/M/SEC"> 19006 </damping_coeff_rebound>
      </contact>
      <contact type="STRUCTURE" name="fuselage rear">
        <location unit="M">
          <x> 8.5000 </x>
          <y> -0.0000 </y>
          <z> -0.7800 </z>
        </location>
        <static_friction> 0.8 </static_friction>
        <dynamic_friction> 0.6 </dynamic_friction>
        <spring_coeff unit="N/M"> 4317492 </spring_coeff>
        <damping_coeff unit="N/M/SEC"> 143916 </damping_coeff>
        <damping_coeff_rebound unit="N/M/SEC"> 143916 </damping_coeff_rebound>
      </contact>
      <contact type="STRUCTURE" name="fuselage rear 2">
        <location unit="M">
          <x> 13.0000 </x>
          <y> 0.0000 </y>
          <z> -0.2528 </z>
        </location>
        <static_friction> 0.8 </static_friction>
        <dynamic_friction> 0.6 </dynamic_friction>
        <spring_coeff unit="N/M"> 1329214 </spring_coeff>
        <damping_coeff unit="N/M/SEC"> 44307 </damping_coeff>
        <damping_coeff_rebound unit="N/M/SEC"> 44307 </damping_coeff_rebound>
      </contact>
      <contact type="STRUCTURE" name="probe front">
        <location unit="M">
          <x> -0.5800 </x>
          <y> 0.0000 </y>
          <z> -0.3100 </z>
        </location>
        <static_friction> 0.8 </static_friction>
        <dynamic_friction> 0.6 </dynamic_friction>
        <spring_coeff unit="N/M"> 576180 </spring_coeff>
        <damping_coeff unit="N/M/SEC"> 19206 </damping_coeff>
        <damping_coeff_rebound unit="N/M/SEC"> 19206 </damping_coeff_rebound>
      </contact>
      <contact type="STRUCTURE" name="tip rail left rear">
        <location unit="M">
          <x> 8.4000 </x>
          <y> -4.1400 </y>
          <z> 0.0000 </z>
        </location>
        <static_friction> 0.8 </static_friction>
        <dynamic_friction> 0.6 </dynamic_friction>
        <spring_coeff unit="N/M"> 347881 </spring_coeff>
        <damping_coeff unit="N/M/SEC"> 11596 </damping_coeff>
        <damping_coeff_rebound unit="N/M/SEC"> 11596 </damping_coeff_rebound>
      </contact>
      <contact type="STRUCTURE" name="tip rail left rear 2">
        <location unit="M">
          <x> 11.5500 </x>
          <y> -4.1400 </y>
          <z> -0.0800 </z>
        </location>
        <static_friction> 0.8 </static_friction>
        <dynamic_friction> 0.6 </dynamic_friction>
        <spring_coeff unit="N/M"> 315564 </spring_coeff>
        <damping_coeff unit="N/M/SEC"> 10519 </damping_coeff>
        <damping_coeff_rebound unit="N/M/SEC"> 10519 </damping_coeff_rebound>
      </contact>
      <contact type="STRUCTURE" name="tip rail right rear">
        <location unit="M">
          <x> 8.4000 </x>
          <y> 4.1400 </y>
          <z> 0.0000 </z>
        </location>
        <static_friction> 0.8 </static_friction>
        <dynamic_friction> 0.6 </dynamic_friction>
        <spring_coeff unit="N/M"> 347881 </spring_coeff>
        <damping_coeff unit="N/M/SEC"> 11596 </damping_coeff>
        <damping_coeff_rebound unit="N/M/SEC"> 11596 </damping_coeff_rebound>
      </contact>
      <contact type="STRUCTURE" name="tip rail right rear 2">
        <location unit="M">
          <x> 11.5500 </x>
          <y> 4.1400 </y>
          <z> -0.0800 </z>
        </location>
        <static_friction> 0.8 </static_friction>
        <dynamic_friction> 0.6 </dynamic_friction>
        <spring_coeff unit="N/M"> 315565 </spring_coeff>
        <damping_coeff unit="N/M/SEC"> 10519 </damping_coeff>
        <damping_coeff_rebound unit="N/M/SEC"> 10519 </damping_coeff_rebound>
      </contact>
    </ground_reactions>
    <propulsion>
      <engine file="gripen_engine0">
        <location unit="M">
          <x> 10.8000 </x>
          <y> 0.0000 </y>
          <z> 0.1000 </z>
        </location>
        <feed>0</feed>
        <feed>1</feed>
        <feed>2</feed>
        <feed>3</feed>
        <thruster file="gripen_nozzle0">
          <location unit="M">
            <x> 13.5000 </x>
            <y> 0.0000 </y>
            <z> 0.1200 </z>
          </location>
          <orient unit="DEG"> <roll>0.00</roll> <pitch>0.00</pitch> <yaw>0.00</yaw> </orient>

        </thruster>
      </engine>
      <tank type="FUEL">
        <location unit="M">
          <x> 6.2940 </x>
          <y> 0.0000 </y>
          <z> -0.1500 </z>
        </location>
        <capacity unit="KG"> 1000.00 </capacity>
        <contents unit="KG"> 1000.00 </contents>
      </tank>
      <tank type="FUEL">
        <location unit="M">
          <x> 8.0940 </x>
          <y> 0.0000 </y>
          <z> -0.1500 </z>
        </location>
        <capacity unit="KG"> 900.00 </capacity>
        <contents unit="KG"> 900.00 </contents>
      </tank>
      <tank type="FUEL">
        <location unit="M">
          <x> 8.1540 </x>
          <y> -1.8000 </y>
          <z> 0.0000 </z>
        </location>
        <capacity unit="KG"> 250.00 </capacity>
        <contents unit="KG"> 250.00 </contents>
      </tank>
      <tank type="FUEL">
        <location unit="M">
          <x> 8.1540 </x>
          <y> 1.8000 </y>
          <z> 0.0000 </z>
        </location>
        <capacity unit="KG"> 250.00 </capacity>
        <contents unit="KG"> 250.00 </contents>
      </tank>
    </propulsion>
    <flight_control name="gripen">
      <!-- the aircraft's profile for the platform (docs/control-architecture.md, section 7): what
           hangar knows of it - its design, its flight tests, its identified responses -->
      <property value="1">fsim/identity/version</property>
      <property value="1">fsim/identity/provenance</property>
      <property value="2">fsim/identity/class</property>
      <property value="2">fsim/identity/family</property>
      <property value="1">fsim/effectors/version</property>
      <property value="1">fsim/effectors/provenance</property>
      <property value="0.0">fsim/effectors/flaps</property>
      <property value="1">fsim/effectors/neutral</property>
      <property value="1">fsim/effectors/pitch</property>
      <property value="0.0">fsim/effectors/pitch_trim</property>
      <property value="1">fsim/effectors/retractable_gear</property>
      <property value="1">fsim/effectors/roll</property>
      <property value="1">fsim/effectors/speedbrake</property>
      <property value="1">fsim/effectors/speedbrake_approach</property>
      <property value="1">fsim/effectors/wheel_brakes</property>
      <property value="0.0">fsim/effectors/yaw</property>
      <property value="1">fsim/envelope/version</property>
      <property value="1">fsim/envelope/provenance</property>
      <property value="28">fsim/envelope/clean/alpha_max_deg</property>
      <property value="60.162">fsim/envelope/clean/cas_min_ms</property>
      <property value="9">fsim/envelope/clean/n_max</property>
      <property value="-3">fsim/envelope/clean/n_min</property>
      <property value="280">fsim/envelope/clean/roll_rate_max_deg_s</property>
      <property value="15.43">fsim/envelope/crosswind_max_ms</property>
      <property value="18.52">fsim/envelope/ground_pitch_max_deg</property>
      <property value="4.02">fsim/envelope/ground_turn_radius_m</property>
      <property value="0.4696">fsim/envelope/ground_yaw_accel_rad_s2</property>
      <property value="1">fsim/envelope/law_alpha</property>
      <property value="1">fsim/envelope/law_load_factor</property>
      <property value="1">fsim/envelope/law_roll_rate</property>
      <property value="1">fsim/propulsion/version</property>
      <property value="1">fsim/propulsion/provenance</property>
      <property value="1">fsim/propulsion/afterburner</property>
      <property value="1">fsim/propulsion/engines</property>
      <property value="0.15887">fsim/propulsion/spool_s</property>
      <property value="2">fsim/propulsion/type</property>
      <property value="1">fsim/plant/version</property>
      <property value="1">fsim/plant/provenance</property>
      <property value="-0.464433">fsim/plant/alpha_zero_lift_deg</property>
      <property value="3000">fsim/plant/altitude_m</property>
      <property value="122.237">fsim/plant/eas_ms</property>
      <property value="0.0">fsim/plant/elevator_trim</property>
      <property value="0.0">fsim/plant/elevator_trim_lift</property>
      <property value="10.2822">fsim/plant/pitch/gain</property>
      <property value="1.00372">fsim/plant/pitch/tau_s</property>
      <property value="4.34675">fsim/plant/roll/gain</property>
      <property value="0.157969">fsim/plant/roll/tau_s</property>
      <property value="5.62236">fsim/plant/speed/gain</property>
      <property value="0.15887">fsim/plant/speed/tau_s</property>
      <property value="140.016">fsim/plant/tas_ms</property>
      <property value="0.330104">fsim/plant/throttle_trim</property>
      <property value="0.00520127">fsim/plant/yaw/gain</property>
      <property value="1">fsim/performance/version</property>
      <property value="1">fsim/performance/provenance</property>
      <property value="18268.8">fsim/performance/ceiling_m</property>
      <property value="252.894">fsim/performance/climb_ms</property>
      <property value="402.033">fsim/performance/max_tas_ms</property>
      <property value="1">fsim/applicability/version</property>
      <property value="1">fsim/applicability/provenance</property>
      <property value="1">fsim/applicability/aerobatic</property>
      <property value="1">fsim/applicability/carrier</property>
      <property value="2">fsim/applicability/drag_devices</property>
      <property value="1">fsim/applicability/ground_contact</property>
      <property value="2">fsim/applicability/releasable_stores</property>
      <property value="1">fsim/applicability/retractable_gear</property>
      <property value="0.0">fsim/applicability/vertical_flight</property>
      <property value="1">fsim/tables/version</property>
      <property value="1">fsim/tables/provenance</property>
      <property value="100">fsim/tables/altitude_m/h0</property>
      <property value="3650">fsim/tables/altitude_m/h1</property>
      <property value="7310">fsim/tables/altitude_m/h2</property>
      <property value="10960">fsim/tables/altitude_m/h3</property>
      <property value="13700">fsim/tables/altitude_m/h4</property>
      <property value="15530">fsim/tables/altitude_m/h5</property>
      <property value="17360">fsim/tables/altitude_m/h6</property>
      <property value="0.327869">fsim/tables/best_endurance_fuel_kg_s/h0/w0</property>
      <property value="0.295415">fsim/tables/best_endurance_fuel_kg_s/h0/w1</property>
      <property value="0.325468">fsim/tables/best_endurance_fuel_kg_s/h0/w2</property>
      <property value="0.23584">fsim/tables/best_endurance_fuel_kg_s/h1/w0</property>
      <property value="0.260932">fsim/tables/best_endurance_fuel_kg_s/h1/w1</property>
      <property value="0.285737">fsim/tables/best_endurance_fuel_kg_s/h1/w2</property>
      <property value="0.203214">fsim/tables/best_endurance_fuel_kg_s/h2/w0</property>
      <property value="0.225908">fsim/tables/best_endurance_fuel_kg_s/h2/w1</property>
      <property value="0.247469">fsim/tables/best_endurance_fuel_kg_s/h2/w2</property>
      <property value="0.173586">fsim/tables/best_endurance_fuel_kg_s/h3/w0</property>
      <property value="0.192815">fsim/tables/best_endurance_fuel_kg_s/h3/w1</property>
      <property value="0.211448">fsim/tables/best_endurance_fuel_kg_s/h3/w2</property>
      <property value="0.158923">fsim/tables/best_endurance_fuel_kg_s/h4/w0</property>
      <property value="0.174621">fsim/tables/best_endurance_fuel_kg_s/h4/w1</property>
      <property value="0.201884">fsim/tables/best_endurance_fuel_kg_s/h4/w2</property>
      <property value="0.0930646">fsim/tables/best_endurance_fuel_kg_s/h5/w0</property>
      <property value="0.170583">fsim/tables/best_endurance_fuel_kg_s/h5/w1</property>
      <property value="0.51465">fsim/tables/best_endurance_fuel_kg_s/h5/w2</property>
      <property value="0.416991">fsim/tables/best_endurance_fuel_kg_s/h6/w0</property>
      <property value="0.505843">fsim/tables/best_endurance_fuel_kg_s/h6/w1</property>
      <property value="0.83211">fsim/tables/best_endurance_fuel_kg_s/h6/w2</property>
      <property value="182.539">fsim/tables/best_endurance_tas_ms/h0/w0</property>
      <property value="136.581">fsim/tables/best_endurance_tas_ms/h0/w1</property>
      <property value="132.196">fsim/tables/best_endurance_tas_ms/h0/w2</property>
      <property value="135.588">fsim/tables/best_endurance_tas_ms/h1/w0</property>
      <property value="157.997">fsim/tables/best_endurance_tas_ms/h1/w1</property>
      <property value="168.889">fsim/tables/best_endurance_tas_ms/h1/w2</property>
      <property value="180.201">fsim/tables/best_endurance_tas_ms/h2/w0</property>
      <property value="192.622">fsim/tables/best_endurance_tas_ms/h2/w1</property>
      <property value="206.053">fsim/tables/best_endurance_tas_ms/h2/w2</property>
      <property value="223.139">fsim/tables/best_endurance_tas_ms/h3/w0</property>
      <property value="242.106">fsim/tables/best_endurance_tas_ms/h3/w1</property>
      <property value="256.724">fsim/tables/best_endurance_tas_ms/h3/w2</property>
      <property value="268.652">fsim/tables/best_endurance_tas_ms/h4/w0</property>
      <property value="266.09">fsim/tables/best_endurance_tas_ms/h4/w1</property>
      <property value="269.874">fsim/tables/best_endurance_tas_ms/h4/w2</property>
      <property value="277.165">fsim/tables/best_endurance_tas_ms/h5/w0</property>
      <property value="291.232">fsim/tables/best_endurance_tas_ms/h5/w1</property>
      <property value="283.509">fsim/tables/best_endurance_tas_ms/h5/w2</property>
      <property value="281.047">fsim/tables/best_endurance_tas_ms/h6/w0</property>
      <property value="286.997">fsim/tables/best_endurance_tas_ms/h6/w1</property>
      <property value="346.156">fsim/tables/best_endurance_tas_ms/h6/w2</property>
      <property value="0.327869">fsim/tables/best_range_fuel_kg_s/h0/w0</property>
      <property value="0.37216">fsim/tables/best_range_fuel_kg_s/h0/w1</property>
      <property value="0.406795">fsim/tables/best_range_fuel_kg_s/h0/w2</property>
      <property value="0.293425">fsim/tables/best_range_fuel_kg_s/h1/w0</property>
      <property value="0.327686">fsim/tables/best_range_fuel_kg_s/h1/w1</property>
      <property value="0.3601">fsim/tables/best_range_fuel_kg_s/h1/w2</property>
      <property value="0.254175">fsim/tables/best_range_fuel_kg_s/h2/w0</property>
      <property value="0.273716">fsim/tables/best_range_fuel_kg_s/h2/w1</property>
      <property value="0.289521">fsim/tables/best_range_fuel_kg_s/h2/w2</property>
      <property value="0.186608">fsim/tables/best_range_fuel_kg_s/h3/w0</property>
      <property value="0.200067">fsim/tables/best_range_fuel_kg_s/h3/w1</property>
      <property value="0.215512">fsim/tables/best_range_fuel_kg_s/h3/w2</property>
      <property value="0.161308">fsim/tables/best_range_fuel_kg_s/h4/w0</property>
      <property value="0.17941">fsim/tables/best_range_fuel_kg_s/h4/w1</property>
      <property value="0.208187">fsim/tables/best_range_fuel_kg_s/h4/w2</property>
      <property value="0.156127">fsim/tables/best_range_fuel_kg_s/h5/w0</property>
      <property value="0.189013">fsim/tables/best_range_fuel_kg_s/h5/w1</property>
      <property value="0.539754">fsim/tables/best_range_fuel_kg_s/h5/w2</property>
      <property value="0.428074">fsim/tables/best_range_fuel_kg_s/h6/w0</property>
      <property value="0.514071">fsim/tables/best_range_fuel_kg_s/h6/w1</property>
      <property value="0.846135">fsim/tables/best_range_fuel_kg_s/h6/w2</property>
      <property value="182.539">fsim/tables/best_range_tas_ms/h0/w0</property>
      <property value="199.89">fsim/tables/best_range_tas_ms/h0/w1</property>
      <property value="212.289">fsim/tables/best_range_tas_ms/h0/w2</property>
      <property value="221.586">fsim/tables/best_range_tas_ms/h1/w0</property>
      <property value="239.708">fsim/tables/best_range_tas_ms/h1/w1</property>
      <property value="256.251">fsim/tables/best_range_tas_ms/h1/w2</property>
      <property value="271.939">fsim/tables/best_range_tas_ms/h2/w0</property>
      <property value="283.408">fsim/tables/best_range_tas_ms/h2/w1</property>
      <property value="289.312">fsim/tables/best_range_tas_ms/h2/w2</property>
      <property value="277.931">fsim/tables/best_range_tas_ms/h3/w0</property>
      <property value="278.592">fsim/tables/best_range_tas_ms/h3/w1</property>
      <property value="279.501">fsim/tables/best_range_tas_ms/h3/w2</property>
      <property value="283.832">fsim/tables/best_range_tas_ms/h4/w0</property>
      <property value="274.407">fsim/tables/best_range_tas_ms/h4/w1</property>
      <property value="278.847">fsim/tables/best_range_tas_ms/h4/w2</property>
      <property value="280.129">fsim/tables/best_range_tas_ms/h5/w0</property>
      <property value="293.654">fsim/tables/best_range_tas_ms/h5/w1</property>
      <property value="286.868">fsim/tables/best_range_tas_ms/h5/w2</property>
      <property value="287.434">fsim/tables/best_range_tas_ms/h6/w0</property>
      <property value="292.402">fsim/tables/best_range_tas_ms/h6/w1</property>
      <property value="359.522">fsim/tables/best_range_tas_ms/h6/w2</property>
      <property value="315.536">fsim/tables/climb_tas_ms/h0/w0</property>
      <property value="321.815">fsim/tables/climb_tas_ms/h0/w1</property>
      <property value="322.077">fsim/tables/climb_tas_ms/h0/w2</property>
      <property value="309.569">fsim/tables/climb_tas_ms/h1/w0</property>
      <property value="311.468">fsim/tables/climb_tas_ms/h1/w1</property>
      <property value="314.142">fsim/tables/climb_tas_ms/h1/w2</property>
      <property value="298.623">fsim/tables/climb_tas_ms/h2/w0</property>
      <property value="302.047">fsim/tables/climb_tas_ms/h2/w1</property>
      <property value="303.158">fsim/tables/climb_tas_ms/h2/w2</property>
      <property value="288.679">fsim/tables/climb_tas_ms/h3/w0</property>
      <property value="289.633">fsim/tables/climb_tas_ms/h3/w1</property>
      <property value="290.11">fsim/tables/climb_tas_ms/h3/w2</property>
      <property value="290.61">fsim/tables/climb_tas_ms/h4/w0</property>
      <property value="291.905">fsim/tables/climb_tas_ms/h4/w1</property>
      <property value="292.304">fsim/tables/climb_tas_ms/h4/w2</property>
      <property value="292.837">fsim/tables/climb_tas_ms/h5/w0</property>
      <property value="293.163">fsim/tables/climb_tas_ms/h5/w1</property>
      <property value="293.983">fsim/tables/climb_tas_ms/h5/w2</property>
      <property value="294.102">fsim/tables/climb_tas_ms/h6/w0</property>
      <property value="278.881">fsim/tables/climb_tas_ms/h6/w1</property>
      <property value="296.004">fsim/tables/climb_tas_ms/h6/w2</property>
      <property value="2400">fsim/tables/fuel_capacity_kg</property>
      <property value="0.327866">fsim/tables/fuel_kg_s/h0/w0/v0</property>
      <property value="0.354622">fsim/tables/fuel_kg_s/h0/w0/v1</property>
      <property value="0.667529">fsim/tables/fuel_kg_s/h0/w0/v10</property>
      <property value="0.72534">fsim/tables/fuel_kg_s/h0/w0/v11</property>
      <property value="1.30631">fsim/tables/fuel_kg_s/h0/w0/v12</property>
      <property value="4.22564">fsim/tables/fuel_kg_s/h0/w0/v13</property>
      <property value="4.54374">fsim/tables/fuel_kg_s/h0/w0/v14</property>
      <property value="4.87347">fsim/tables/fuel_kg_s/h0/w0/v15</property>
      <property value="0.382841">fsim/tables/fuel_kg_s/h0/w0/v2</property>
      <property value="0.412441">fsim/tables/fuel_kg_s/h0/w0/v3</property>
      <property value="0.443316">fsim/tables/fuel_kg_s/h0/w0/v4</property>
      <property value="0.475646">fsim/tables/fuel_kg_s/h0/w0/v5</property>
      <property value="0.511707">fsim/tables/fuel_kg_s/h0/w0/v6</property>
      <property value="0.5489">fsim/tables/fuel_kg_s/h0/w0/v7</property>
      <property value="0.587152">fsim/tables/fuel_kg_s/h0/w0/v8</property>
      <property value="0.626436">fsim/tables/fuel_kg_s/h0/w0/v9</property>
      <property value="0.295408">fsim/tables/fuel_kg_s/h0/w1/v0</property>
      <property value="0.305651">fsim/tables/fuel_kg_s/h0/w1/v1</property>
      <property value="0.62431">fsim/tables/fuel_kg_s/h0/w1/v10</property>
      <property value="0.67394">fsim/tables/fuel_kg_s/h0/w1/v11</property>
      <property value="0.746647">fsim/tables/fuel_kg_s/h0/w1/v12</property>
      <property value="4.01547">fsim/tables/fuel_kg_s/h0/w1/v13</property>
      <property value="4.47026">fsim/tables/fuel_kg_s/h0/w1/v14</property>
      <property value="4.87049">fsim/tables/fuel_kg_s/h0/w1/v15</property>
      <property value="0.325166">fsim/tables/fuel_kg_s/h0/w1/v2</property>
      <property value="0.349476">fsim/tables/fuel_kg_s/h0/w1/v3</property>
      <property value="0.380045">fsim/tables/fuel_kg_s/h0/w1/v4</property>
      <property value="0.414928">fsim/tables/fuel_kg_s/h0/w1/v5</property>
      <property value="0.451857">fsim/tables/fuel_kg_s/h0/w1/v6</property>
      <property value="0.490271">fsim/tables/fuel_kg_s/h0/w1/v7</property>
      <property value="0.531045">fsim/tables/fuel_kg_s/h0/w1/v8</property>
      <property value="0.576961">fsim/tables/fuel_kg_s/h0/w1/v9</property>
      <property value="0.325468">fsim/tables/fuel_kg_s/h0/w2/v0</property>
      <property value="0.325892">fsim/tables/fuel_kg_s/h0/w2/v1</property>
      <property value="0.622098">fsim/tables/fuel_kg_s/h0/w2/v10</property>
      <property value="0.671916">fsim/tables/fuel_kg_s/h0/w2/v11</property>
      <property value="0.743124">fsim/tables/fuel_kg_s/h0/w2/v12</property>
      <property value="3.86148">fsim/tables/fuel_kg_s/h0/w2/v13</property>
      <property value="4.46256">fsim/tables/fuel_kg_s/h0/w2/v14</property>
      <property value="4.86896">fsim/tables/fuel_kg_s/h0/w2/v15</property>
      <property value="0.337899">fsim/tables/fuel_kg_s/h0/w2/v2</property>
      <property value="0.359752">fsim/tables/fuel_kg_s/h0/w2/v3</property>
      <property value="0.385408">fsim/tables/fuel_kg_s/h0/w2/v4</property>
      <property value="0.417702">fsim/tables/fuel_kg_s/h0/w2/v5</property>
      <property value="0.454334">fsim/tables/fuel_kg_s/h0/w2/v6</property>
      <property value="0.49263">fsim/tables/fuel_kg_s/h0/w2/v7</property>
      <property value="0.532661">fsim/tables/fuel_kg_s/h0/w2/v8</property>
      <property value="0.574538">fsim/tables/fuel_kg_s/h0/w2/v9</property>
      <property value="0.23584">fsim/tables/fuel_kg_s/h1/w0/v0</property>
      <property value="0.23586">fsim/tables/fuel_kg_s/h1/w0/v1</property>
      <property value="0.75969">fsim/tables/fuel_kg_s/h1/w0/v10</property>
      <property value="2.81562">fsim/tables/fuel_kg_s/h1/w0/v11</property>
      <property value="3.12577">fsim/tables/fuel_kg_s/h1/w0/v12</property>
      <property value="3.4523">fsim/tables/fuel_kg_s/h1/w0/v13</property>
      <property value="3.7724">fsim/tables/fuel_kg_s/h1/w0/v14</property>
      <property value="4.10306">fsim/tables/fuel_kg_s/h1/w0/v15</property>
      <property value="0.245014">fsim/tables/fuel_kg_s/h1/w0/v2</property>
      <property value="0.263">fsim/tables/fuel_kg_s/h1/w0/v3</property>
      <property value="0.283967">fsim/tables/fuel_kg_s/h1/w0/v4</property>
      <property value="0.31125">fsim/tables/fuel_kg_s/h1/w0/v5</property>
      <property value="0.340169">fsim/tables/fuel_kg_s/h1/w0/v6</property>
      <property value="0.370851">fsim/tables/fuel_kg_s/h1/w0/v7</property>
      <property value="0.402985">fsim/tables/fuel_kg_s/h1/w0/v8</property>
      <property value="0.443116">fsim/tables/fuel_kg_s/h1/w0/v9</property>
      <property value="0.269671">fsim/tables/fuel_kg_s/h1/w1/v0</property>
      <property value="0.261156">fsim/tables/fuel_kg_s/h1/w1/v1</property>
      <property value="0.722007">fsim/tables/fuel_kg_s/h1/w1/v10</property>
      <property value="2.80721">fsim/tables/fuel_kg_s/h1/w1/v11</property>
      <property value="3.12036">fsim/tables/fuel_kg_s/h1/w1/v12</property>
      <property value="3.44797">fsim/tables/fuel_kg_s/h1/w1/v13</property>
      <property value="3.7683">fsim/tables/fuel_kg_s/h1/w1/v14</property>
      <property value="4.09924">fsim/tables/fuel_kg_s/h1/w1/v15</property>
      <property value="0.264972">fsim/tables/fuel_kg_s/h1/w1/v2</property>
      <property value="0.276907">fsim/tables/fuel_kg_s/h1/w1/v3</property>
      <property value="0.296214">fsim/tables/fuel_kg_s/h1/w1/v4</property>
      <property value="0.31875">fsim/tables/fuel_kg_s/h1/w1/v5</property>
      <property value="0.346973">fsim/tables/fuel_kg_s/h1/w1/v6</property>
      <property value="0.377049">fsim/tables/fuel_kg_s/h1/w1/v7</property>
      <property value="0.408627">fsim/tables/fuel_kg_s/h1/w1/v8</property>
      <property value="0.444702">fsim/tables/fuel_kg_s/h1/w1/v9</property>
      <property value="0.308881">fsim/tables/fuel_kg_s/h1/w2/v0</property>
      <property value="0.289775">fsim/tables/fuel_kg_s/h1/w2/v1</property>
      <property value="0.677922">fsim/tables/fuel_kg_s/h1/w2/v10</property>
      <property value="2.80077">fsim/tables/fuel_kg_s/h1/w2/v11</property>
      <property value="3.11266">fsim/tables/fuel_kg_s/h1/w2/v12</property>
      <property value="3.44174">fsim/tables/fuel_kg_s/h1/w2/v13</property>
      <property value="3.7639">fsim/tables/fuel_kg_s/h1/w2/v14</property>
      <property value="4.09616">fsim/tables/fuel_kg_s/h1/w2/v15</property>
      <property value="0.285892">fsim/tables/fuel_kg_s/h1/w2/v2</property>
      <property value="0.293569">fsim/tables/fuel_kg_s/h1/w2/v3</property>
      <property value="0.308676">fsim/tables/fuel_kg_s/h1/w2/v4</property>
      <property value="0.329092">fsim/tables/fuel_kg_s/h1/w2/v5</property>
      <property value="0.353294">fsim/tables/fuel_kg_s/h1/w2/v6</property>
      <property value="0.382782">fsim/tables/fuel_kg_s/h1/w2/v7</property>
      <property value="0.413888">fsim/tables/fuel_kg_s/h1/w2/v8</property>
      <property value="0.448321">fsim/tables/fuel_kg_s/h1/w2/v9</property>
      <property value="0.227562">fsim/tables/fuel_kg_s/h2/w0/v0</property>
      <property value="0.208073">fsim/tables/fuel_kg_s/h2/w0/v1</property>
      <property value="2.08124">fsim/tables/fuel_kg_s/h2/w0/v10</property>
      <property value="2.32361">fsim/tables/fuel_kg_s/h2/w0/v11</property>
      <property value="2.57802">fsim/tables/fuel_kg_s/h2/w0/v12</property>
      <property value="2.84459">fsim/tables/fuel_kg_s/h2/w0/v13</property>
      <property value="3.12947">fsim/tables/fuel_kg_s/h2/w0/v14</property>
      <property value="3.42535">fsim/tables/fuel_kg_s/h2/w0/v15</property>
      <property value="0.203218">fsim/tables/fuel_kg_s/h2/w0/v2</property>
      <property value="0.208653">fsim/tables/fuel_kg_s/h2/w0/v3</property>
      <property value="0.220867">fsim/tables/fuel_kg_s/h2/w0/v4</property>
      <property value="0.236447">fsim/tables/fuel_kg_s/h2/w0/v5</property>
      <property value="0.257234">fsim/tables/fuel_kg_s/h2/w0/v6</property>
      <property value="0.282127">fsim/tables/fuel_kg_s/h2/w0/v7</property>
      <property value="0.580514">fsim/tables/fuel_kg_s/h2/w0/v8</property>
      <property value="1.84098">fsim/tables/fuel_kg_s/h2/w0/v9</property>
      <property value="0.260407">fsim/tables/fuel_kg_s/h2/w1/v0</property>
      <property value="0.234846">fsim/tables/fuel_kg_s/h2/w1/v1</property>
      <property value="2.10775">fsim/tables/fuel_kg_s/h2/w1/v10</property>
      <property value="2.34621">fsim/tables/fuel_kg_s/h2/w1/v11</property>
      <property value="2.59233">fsim/tables/fuel_kg_s/h2/w1/v12</property>
      <property value="2.84871">fsim/tables/fuel_kg_s/h2/w1/v13</property>
      <property value="3.12294">fsim/tables/fuel_kg_s/h2/w1/v14</property>
      <property value="3.41229">fsim/tables/fuel_kg_s/h2/w1/v15</property>
      <property value="0.226448">fsim/tables/fuel_kg_s/h2/w1/v2</property>
      <property value="0.228218">fsim/tables/fuel_kg_s/h2/w1/v3</property>
      <property value="0.23636">fsim/tables/fuel_kg_s/h2/w1/v4</property>
      <property value="0.251036">fsim/tables/fuel_kg_s/h2/w1/v5</property>
      <property value="0.267633">fsim/tables/fuel_kg_s/h2/w1/v6</property>
      <property value="0.292186">fsim/tables/fuel_kg_s/h2/w1/v7</property>
      <property value="0.623586">fsim/tables/fuel_kg_s/h2/w1/v8</property>
      <property value="1.86891">fsim/tables/fuel_kg_s/h2/w1/v9</property>
      <property value="0.302185">fsim/tables/fuel_kg_s/h2/w2/v0</property>
      <property value="0.266672">fsim/tables/fuel_kg_s/h2/w2/v1</property>
      <property value="2.11939">fsim/tables/fuel_kg_s/h2/w2/v10</property>
      <property value="2.35718">fsim/tables/fuel_kg_s/h2/w2/v11</property>
      <property value="2.60188">fsim/tables/fuel_kg_s/h2/w2/v12</property>
      <property value="2.85617">fsim/tables/fuel_kg_s/h2/w2/v13</property>
      <property value="3.1248">fsim/tables/fuel_kg_s/h2/w2/v14</property>
      <property value="3.40366">fsim/tables/fuel_kg_s/h2/w2/v15</property>
      <property value="0.251014">fsim/tables/fuel_kg_s/h2/w2/v2</property>
      <property value="0.247519">fsim/tables/fuel_kg_s/h2/w2/v3</property>
      <property value="0.252898">fsim/tables/fuel_kg_s/h2/w2/v4</property>
      <property value="0.263802">fsim/tables/fuel_kg_s/h2/w2/v5</property>
      <property value="0.279135">fsim/tables/fuel_kg_s/h2/w2/v6</property>
      <property value="0.299034">fsim/tables/fuel_kg_s/h2/w2/v7</property>
      <property value="0.609924">fsim/tables/fuel_kg_s/h2/w2/v8</property>
      <property value="1.8823">fsim/tables/fuel_kg_s/h2/w2/v9</property>
      <property value="0.212983">fsim/tables/fuel_kg_s/h3/w0/v0</property>
      <property value="0.185255">fsim/tables/fuel_kg_s/h3/w0/v1</property>
      <property value="1.81157">fsim/tables/fuel_kg_s/h3/w0/v10</property>
      <property value="2.02167">fsim/tables/fuel_kg_s/h3/w0/v11</property>
      <property value="2.24136">fsim/tables/fuel_kg_s/h3/w0/v12</property>
      <property value="2.47185">fsim/tables/fuel_kg_s/h3/w0/v13</property>
      <property value="2.71204">fsim/tables/fuel_kg_s/h3/w0/v14</property>
      <property value="2.96132">fsim/tables/fuel_kg_s/h3/w0/v15</property>
      <property value="0.174641">fsim/tables/fuel_kg_s/h3/w0/v2</property>
      <property value="0.174063">fsim/tables/fuel_kg_s/h3/w0/v3</property>
      <property value="0.179383">fsim/tables/fuel_kg_s/h3/w0/v4</property>
      <property value="0.192884">fsim/tables/fuel_kg_s/h3/w0/v5</property>
      <property value="1.07672">fsim/tables/fuel_kg_s/h3/w0/v6</property>
      <property value="1.24177">fsim/tables/fuel_kg_s/h3/w0/v7</property>
      <property value="1.42358">fsim/tables/fuel_kg_s/h3/w0/v8</property>
      <property value="1.61223">fsim/tables/fuel_kg_s/h3/w0/v9</property>
      <property value="0.254994">fsim/tables/fuel_kg_s/h3/w1/v0</property>
      <property value="0.215923">fsim/tables/fuel_kg_s/h3/w1/v1</property>
      <property value="1.81409">fsim/tables/fuel_kg_s/h3/w1/v10</property>
      <property value="2.01829">fsim/tables/fuel_kg_s/h3/w1/v11</property>
      <property value="2.23143">fsim/tables/fuel_kg_s/h3/w1/v12</property>
      <property value="2.45457">fsim/tables/fuel_kg_s/h3/w1/v13</property>
      <property value="2.68779">fsim/tables/fuel_kg_s/h3/w1/v14</property>
      <property value="2.9291">fsim/tables/fuel_kg_s/h3/w1/v15</property>
      <property value="0.198795">fsim/tables/fuel_kg_s/h3/w1/v2</property>
      <property value="0.193042">fsim/tables/fuel_kg_s/h3/w1/v3</property>
      <property value="0.195043">fsim/tables/fuel_kg_s/h3/w1/v4</property>
      <property value="0.203965">fsim/tables/fuel_kg_s/h3/w1/v5</property>
      <property value="1.10088">fsim/tables/fuel_kg_s/h3/w1/v6</property>
      <property value="1.264">fsim/tables/fuel_kg_s/h3/w1/v7</property>
      <property value="1.4363">fsim/tables/fuel_kg_s/h3/w1/v8</property>
      <property value="1.61992">fsim/tables/fuel_kg_s/h3/w1/v9</property>
      <property value="0.300088">fsim/tables/fuel_kg_s/h3/w2/v0</property>
      <property value="0.248684">fsim/tables/fuel_kg_s/h3/w2/v1</property>
      <property value="1.8206">fsim/tables/fuel_kg_s/h3/w2/v10</property>
      <property value="2.01817">fsim/tables/fuel_kg_s/h3/w2/v11</property>
      <property value="2.22464">fsim/tables/fuel_kg_s/h3/w2/v12</property>
      <property value="2.43972">fsim/tables/fuel_kg_s/h3/w2/v13</property>
      <property value="2.66552">fsim/tables/fuel_kg_s/h3/w2/v14</property>
      <property value="2.89809">fsim/tables/fuel_kg_s/h3/w2/v15</property>
      <property value="0.224461">fsim/tables/fuel_kg_s/h3/w2/v2</property>
      <property value="0.213688">fsim/tables/fuel_kg_s/h3/w2/v3</property>
      <property value="0.21176">fsim/tables/fuel_kg_s/h3/w2/v4</property>
      <property value="0.218278">fsim/tables/fuel_kg_s/h3/w2/v5</property>
      <property value="1.13095">fsim/tables/fuel_kg_s/h3/w2/v6</property>
      <property value="1.29386">fsim/tables/fuel_kg_s/h3/w2/v7</property>
      <property value="1.46362">fsim/tables/fuel_kg_s/h3/w2/v8</property>
      <property value="1.63919">fsim/tables/fuel_kg_s/h3/w2/v9</property>
      <property value="0.199547">fsim/tables/fuel_kg_s/h4/w0/v1</property>
      <property value="1.25427">fsim/tables/fuel_kg_s/h4/w0/v10</property>
      <property value="1.38101">fsim/tables/fuel_kg_s/h4/w0/v11</property>
      <property value="1.51863">fsim/tables/fuel_kg_s/h4/w0/v12</property>
      <property value="1.66381">fsim/tables/fuel_kg_s/h4/w0/v13</property>
      <property value="1.81545">fsim/tables/fuel_kg_s/h4/w0/v14</property>
      <property value="1.9726">fsim/tables/fuel_kg_s/h4/w0/v15</property>
      <property value="0.174822">fsim/tables/fuel_kg_s/h4/w0/v2</property>
      <property value="0.163555">fsim/tables/fuel_kg_s/h4/w0/v3</property>
      <property value="0.158927">fsim/tables/fuel_kg_s/h4/w0/v4</property>
      <property value="0.163013">fsim/tables/fuel_kg_s/h4/w0/v5</property>
      <property value="0.796197">fsim/tables/fuel_kg_s/h4/w0/v6</property>
      <property value="0.896218">fsim/tables/fuel_kg_s/h4/w0/v7</property>
      <property value="1.01157">fsim/tables/fuel_kg_s/h4/w0/v8</property>
      <property value="1.13191">fsim/tables/fuel_kg_s/h4/w0/v9</property>
      <property value="0.69639">fsim/tables/fuel_kg_s/h4/w1/v0</property>
      <property value="0.229849">fsim/tables/fuel_kg_s/h4/w1/v1</property>
      <property value="1.28939">fsim/tables/fuel_kg_s/h4/w1/v10</property>
      <property value="1.40805">fsim/tables/fuel_kg_s/h4/w1/v11</property>
      <property value="1.53173">fsim/tables/fuel_kg_s/h4/w1/v12</property>
      <property value="1.66227">fsim/tables/fuel_kg_s/h4/w1/v13</property>
      <property value="1.80013">fsim/tables/fuel_kg_s/h4/w1/v14</property>
      <property value="1.94008">fsim/tables/fuel_kg_s/h4/w1/v15</property>
      <property value="0.20181">fsim/tables/fuel_kg_s/h4/w1/v2</property>
      <property value="0.186795">fsim/tables/fuel_kg_s/h4/w1/v3</property>
      <property value="0.179003">fsim/tables/fuel_kg_s/h4/w1/v4</property>
      <property value="0.233599">fsim/tables/fuel_kg_s/h4/w1/v5</property>
      <property value="0.855864">fsim/tables/fuel_kg_s/h4/w1/v6</property>
      <property value="0.955925">fsim/tables/fuel_kg_s/h4/w1/v7</property>
      <property value="1.06058">fsim/tables/fuel_kg_s/h4/w1/v8</property>
      <property value="1.17362">fsim/tables/fuel_kg_s/h4/w1/v9</property>
      <property value="0.685534">fsim/tables/fuel_kg_s/h4/w2/v1</property>
      <property value="1.29953">fsim/tables/fuel_kg_s/h4/w2/v10</property>
      <property value="1.40478">fsim/tables/fuel_kg_s/h4/w2/v11</property>
      <property value="1.51948">fsim/tables/fuel_kg_s/h4/w2/v12</property>
      <property value="1.6383">fsim/tables/fuel_kg_s/h4/w2/v13</property>
      <property value="1.76414">fsim/tables/fuel_kg_s/h4/w2/v14</property>
      <property value="1.89286">fsim/tables/fuel_kg_s/h4/w2/v15</property>
      <property value="0.321444">fsim/tables/fuel_kg_s/h4/w2/v2</property>
      <property value="0.2164">fsim/tables/fuel_kg_s/h4/w2/v3</property>
      <property value="0.203524">fsim/tables/fuel_kg_s/h4/w2/v4</property>
      <property value="0.242514">fsim/tables/fuel_kg_s/h4/w2/v5</property>
      <property value="0.90085">fsim/tables/fuel_kg_s/h4/w2/v6</property>
      <property value="0.989579">fsim/tables/fuel_kg_s/h4/w2/v7</property>
      <property value="1.09017">fsim/tables/fuel_kg_s/h4/w2/v8</property>
      <property value="1.19477">fsim/tables/fuel_kg_s/h4/w2/v9</property>
      <property value="0.552944">fsim/tables/fuel_kg_s/h5/w0/v1</property>
      <property value="0.932525">fsim/tables/fuel_kg_s/h5/w0/v10</property>
      <property value="1.00676">fsim/tables/fuel_kg_s/h5/w0/v11</property>
      <property value="1.08906">fsim/tables/fuel_kg_s/h5/w0/v12</property>
      <property value="1.17434">fsim/tables/fuel_kg_s/h5/w0/v13</property>
      <property value="1.2633">fsim/tables/fuel_kg_s/h5/w0/v14</property>
      <property value="1.35686">fsim/tables/fuel_kg_s/h5/w0/v15</property>
      <property value="0.484409">fsim/tables/fuel_kg_s/h5/w0/v2</property>
      <property value="0.172147">fsim/tables/fuel_kg_s/h5/w0/v3</property>
      <property value="0.160186">fsim/tables/fuel_kg_s/h5/w0/v4</property>
      <property value="0.153815">fsim/tables/fuel_kg_s/h5/w0/v5</property>
      <property value="0.658731">fsim/tables/fuel_kg_s/h5/w0/v6</property>
      <property value="0.70987">fsim/tables/fuel_kg_s/h5/w0/v7</property>
      <property value="0.777895">fsim/tables/fuel_kg_s/h5/w0/v8</property>
      <property value="0.853792">fsim/tables/fuel_kg_s/h5/w0/v9</property>
      <property value="0.959644">fsim/tables/fuel_kg_s/h5/w1/v10</property>
      <property value="1.02975">fsim/tables/fuel_kg_s/h5/w1/v11</property>
      <property value="1.09415">fsim/tables/fuel_kg_s/h5/w1/v12</property>
      <property value="1.16073">fsim/tables/fuel_kg_s/h5/w1/v13</property>
      <property value="1.23004">fsim/tables/fuel_kg_s/h5/w1/v14</property>
      <property value="1.30267">fsim/tables/fuel_kg_s/h5/w1/v15</property>
      <property value="0.552884">fsim/tables/fuel_kg_s/h5/w1/v2</property>
      <property value="0.511081">fsim/tables/fuel_kg_s/h5/w1/v3</property>
      <property value="0.474498">fsim/tables/fuel_kg_s/h5/w1/v4</property>
      <property value="0.179815">fsim/tables/fuel_kg_s/h5/w1/v5</property>
      <property value="0.72335">fsim/tables/fuel_kg_s/h5/w1/v6</property>
      <property value="0.768845">fsim/tables/fuel_kg_s/h5/w1/v7</property>
      <property value="0.82787">fsim/tables/fuel_kg_s/h5/w1/v8</property>
      <property value="0.891543">fsim/tables/fuel_kg_s/h5/w1/v9</property>
      <property value="0.966747">fsim/tables/fuel_kg_s/h5/w2/v10</property>
      <property value="1.02638">fsim/tables/fuel_kg_s/h5/w2/v11</property>
      <property value="1.08627">fsim/tables/fuel_kg_s/h5/w2/v12</property>
      <property value="1.13394">fsim/tables/fuel_kg_s/h5/w2/v13</property>
      <property value="1.1871">fsim/tables/fuel_kg_s/h5/w2/v14</property>
      <property value="1.27287">fsim/tables/fuel_kg_s/h5/w2/v15</property>
      <property value="0.599863">fsim/tables/fuel_kg_s/h5/w2/v3</property>
      <property value="0.557894">fsim/tables/fuel_kg_s/h5/w2/v4</property>
      <property value="0.534773">fsim/tables/fuel_kg_s/h5/w2/v5</property>
      <property value="0.754725">fsim/tables/fuel_kg_s/h5/w2/v6</property>
      <property value="0.814727">fsim/tables/fuel_kg_s/h5/w2/v7</property>
      <property value="0.859022">fsim/tables/fuel_kg_s/h5/w2/v8</property>
      <property value="0.908533">fsim/tables/fuel_kg_s/h5/w2/v9</property>
      <property value="0.771998">fsim/tables/fuel_kg_s/h6/w0/v10</property>
      <property value="0.814037">fsim/tables/fuel_kg_s/h6/w0/v11</property>
      <property value="0.847117">fsim/tables/fuel_kg_s/h6/w0/v12</property>
      <property value="0.886155">fsim/tables/fuel_kg_s/h6/w0/v13</property>
      <property value="0.923361">fsim/tables/fuel_kg_s/h6/w0/v14</property>
      <property value="0.986752">fsim/tables/fuel_kg_s/h6/w0/v15</property>
      <property value="0.441846">fsim/tables/fuel_kg_s/h6/w0/v2</property>
      <property value="0.417355">fsim/tables/fuel_kg_s/h6/w0/v3</property>
      <property value="0.455118">fsim/tables/fuel_kg_s/h6/w0/v4</property>
      <property value="0.605427">fsim/tables/fuel_kg_s/h6/w0/v5</property>
      <property value="0.627414">fsim/tables/fuel_kg_s/h6/w0/v6</property>
      <property value="0.654116">fsim/tables/fuel_kg_s/h6/w0/v7</property>
      <property value="0.690528">fsim/tables/fuel_kg_s/h6/w0/v8</property>
      <property value="0.730847">fsim/tables/fuel_kg_s/h6/w0/v9</property>
      <property value="0.734199">fsim/tables/fuel_kg_s/h6/w1/v10</property>
      <property value="0.756854">fsim/tables/fuel_kg_s/h6/w1/v11</property>
      <property value="0.779345">fsim/tables/fuel_kg_s/h6/w1/v12</property>
      <property value="0.800478">fsim/tables/fuel_kg_s/h6/w1/v13</property>
      <property value="0.841374">fsim/tables/fuel_kg_s/h6/w1/v14</property>
      <property value="0.893661">fsim/tables/fuel_kg_s/h6/w1/v15</property>
      <property value="0.505843">fsim/tables/fuel_kg_s/h6/w1/v4</property>
      <property value="0.521467">fsim/tables/fuel_kg_s/h6/w1/v5</property>
      <property value="0.651432">fsim/tables/fuel_kg_s/h6/w1/v6</property>
      <property value="0.68698">fsim/tables/fuel_kg_s/h6/w1/v7</property>
      <property value="0.699483">fsim/tables/fuel_kg_s/h6/w1/v8</property>
      <property value="0.716397">fsim/tables/fuel_kg_s/h6/w1/v9</property>
      <property value="0.83211">fsim/tables/fuel_kg_s/h6/w2/v13</property>
      <property value="0.838741">fsim/tables/fuel_kg_s/h6/w2/v14</property>
      <property value="0.846135">fsim/tables/fuel_kg_s/h6/w2/v15</property>
      <property value="309.833">fsim/tables/max_climb_ms/h0/w0</property>
      <property value="272.088">fsim/tables/max_climb_ms/h0/w1</property>
      <property value="241.622">fsim/tables/max_climb_ms/h0/w2</property>
      <property value="248.838">fsim/tables/max_climb_ms/h1/w0</property>
      <property value="216.61">fsim/tables/max_climb_ms/h1/w1</property>
      <property value="191.673">fsim/tables/max_climb_ms/h1/w2</property>
      <property value="188.007">fsim/tables/max_climb_ms/h2/w0</property>
      <property value="163.277">fsim/tables/max_climb_ms/h2/w1</property>
      <property value="143.817">fsim/tables/max_climb_ms/h2/w2</property>
      <property value="133.125">fsim/tables/max_climb_ms/h3/w0</property>
      <property value="114.132">fsim/tables/max_climb_ms/h3/w1</property>
      <property value="98.8184">fsim/tables/max_climb_ms/h3/w2</property>
      <property value="82.5612">fsim/tables/max_climb_ms/h4/w0</property>
      <property value="68.4575">fsim/tables/max_climb_ms/h4/w1</property>
      <property value="57.2128">fsim/tables/max_climb_ms/h4/w2</property>
      <property value="54.0722">fsim/tables/max_climb_ms/h5/w0</property>
      <property value="41.3261">fsim/tables/max_climb_ms/h5/w1</property>
      <property value="31.6647">fsim/tables/max_climb_ms/h5/w2</property>
      <property value="31.9596">fsim/tables/max_climb_ms/h6/w0</property>
      <property value="18.2784">fsim/tables/max_climb_ms/h6/w1</property>
      <property value="12.3852">fsim/tables/max_climb_ms/h6/w2</property>
      <property value="402.967">fsim/tables/max_tas_ms/h0/w0</property>
      <property value="402.413">fsim/tables/max_tas_ms/h0/w1</property>
      <property value="401.916">fsim/tables/max_tas_ms/h0/w2</property>
      <property value="445.713">fsim/tables/max_tas_ms/h1/w0</property>
      <property value="444.753">fsim/tables/max_tas_ms/h1/w1</property>
      <property value="443.823">fsim/tables/max_tas_ms/h1/w2</property>
      <property value="503.179">fsim/tables/max_tas_ms/h2/w0</property>
      <property value="500.972">fsim/tables/max_tas_ms/h2/w1</property>
      <property value="498.764">fsim/tables/max_tas_ms/h2/w2</property>
      <property value="591.582">fsim/tables/max_tas_ms/h3/w0</property>
      <property value="584.241">fsim/tables/max_tas_ms/h3/w1</property>
      <property value="576.893">fsim/tables/max_tas_ms/h3/w2</property>
      <property value="588.063">fsim/tables/max_tas_ms/h4/w0</property>
      <property value="576.369">fsim/tables/max_tas_ms/h4/w1</property>
      <property value="558.49">fsim/tables/max_tas_ms/h4/w2</property>
      <property value="542.609">fsim/tables/max_tas_ms/h5/w0</property>
      <property value="516.611">fsim/tables/max_tas_ms/h5/w1</property>
      <property value="481.802">fsim/tables/max_tas_ms/h5/w2</property>
      <property value="493.603">fsim/tables/max_tas_ms/h6/w0</property>
      <property value="412.913">fsim/tables/max_tas_ms/h6/w1</property>
      <property value="375.495">fsim/tables/max_tas_ms/h6/w2</property>
      <property value="182.539">fsim/tables/min_tas_ms/h0/w0</property>
      <property value="136.581">fsim/tables/min_tas_ms/h0/w1</property>
      <property value="132.196">fsim/tables/min_tas_ms/h0/w2</property>
      <property value="135.588">fsim/tables/min_tas_ms/h1/w0</property>
      <property value="134.44">fsim/tables/min_tas_ms/h1/w1</property>
      <property value="132.413">fsim/tables/min_tas_ms/h1/w2</property>
      <property value="133.616">fsim/tables/min_tas_ms/h2/w0</property>
      <property value="138.804">fsim/tables/min_tas_ms/h2/w1</property>
      <property value="139.668">fsim/tables/min_tas_ms/h2/w2</property>
      <property value="149.687">fsim/tables/min_tas_ms/h3/w0</property>
      <property value="152.613">fsim/tables/min_tas_ms/h3/w1</property>
      <property value="156.557">fsim/tables/min_tas_ms/h3/w2</property>
      <property value="157.767">fsim/tables/min_tas_ms/h4/w0</property>
      <property value="172.746">fsim/tables/min_tas_ms/h4/w1</property>
      <property value="179.338">fsim/tables/min_tas_ms/h4/w2</property>
      <property value="169.989">fsim/tables/min_tas_ms/h5/w0</property>
      <property value="190.915">fsim/tables/min_tas_ms/h5/w1</property>
      <property value="202.257">fsim/tables/min_tas_ms/h5/w2</property>
      <property value="233.67">fsim/tables/min_tas_ms/h6/w0</property>
      <property value="245.52">fsim/tables/min_tas_ms/h6/w1</property>
      <property value="257.251">fsim/tables/min_tas_ms/h6/w2</property>
      <property value="194.147">fsim/tables/ps_full_ms/h0/w0/v0</property>
      <property value="207.966">fsim/tables/ps_full_ms/h0/w0/v1</property>
      <property value="308.711">fsim/tables/ps_full_ms/h0/w0/v10</property>
      <property value="282.799">fsim/tables/ps_full_ms/h0/w0/v11</property>
      <property value="207.816">fsim/tables/ps_full_ms/h0/w0/v12</property>
      <property value="74.3108">fsim/tables/ps_full_ms/h0/w0/v13</property>
      <property value="51.6344">fsim/tables/ps_full_ms/h0/w0/v14</property>
      <property value="25.4056">fsim/tables/ps_full_ms/h0/w0/v15</property>
      <property value="221.428">fsim/tables/ps_full_ms/h0/w0/v2</property>
      <property value="234.601">fsim/tables/ps_full_ms/h0/w0/v3</property>
      <property value="247.378">fsim/tables/ps_full_ms/h0/w0/v4</property>
      <property value="259.638">fsim/tables/ps_full_ms/h0/w0/v5</property>
      <property value="271.503">fsim/tables/ps_full_ms/h0/w0/v6</property>
      <property value="283.107">fsim/tables/ps_full_ms/h0/w0/v7</property>
      <property value="294.501">fsim/tables/ps_full_ms/h0/w0/v8</property>
      <property value="305.229">fsim/tables/ps_full_ms/h0/w0/v9</property>
      <property value="126.821">fsim/tables/ps_full_ms/h0/w1/v0</property>
      <property value="142.535">fsim/tables/ps_full_ms/h0/w1/v1</property>
      <property value="264.271">fsim/tables/ps_full_ms/h0/w1/v10</property>
      <property value="271.67">fsim/tables/ps_full_ms/h0/w1/v11</property>
      <property value="238.427">fsim/tables/ps_full_ms/h0/w1/v12</property>
      <property value="100.187">fsim/tables/ps_full_ms/h0/w1/v13</property>
      <property value="49.2845">fsim/tables/ps_full_ms/h0/w1/v14</property>
      <property value="22.01">fsim/tables/ps_full_ms/h0/w1/v15</property>
      <property value="157.684">fsim/tables/ps_full_ms/h0/w1/v2</property>
      <property value="172.102">fsim/tables/ps_full_ms/h0/w1/v3</property>
      <property value="185.987">fsim/tables/ps_full_ms/h0/w1/v4</property>
      <property value="199.599">fsim/tables/ps_full_ms/h0/w1/v5</property>
      <property value="212.793">fsim/tables/ps_full_ms/h0/w1/v6</property>
      <property value="225.562">fsim/tables/ps_full_ms/h0/w1/v7</property>
      <property value="238.51">fsim/tables/ps_full_ms/h0/w1/v8</property>
      <property value="251.71">fsim/tables/ps_full_ms/h0/w1/v9</property>
      <property value="107.337">fsim/tables/ps_full_ms/h0/w2/v0</property>
      <property value="121.757">fsim/tables/ps_full_ms/h0/w2/v1</property>
      <property value="232.261">fsim/tables/ps_full_ms/h0/w2/v10</property>
      <property value="241.339">fsim/tables/ps_full_ms/h0/w2/v11</property>
      <property value="218.353">fsim/tables/ps_full_ms/h0/w2/v12</property>
      <property value="94.9597">fsim/tables/ps_full_ms/h0/w2/v13</property>
      <property value="44.0346">fsim/tables/ps_full_ms/h0/w2/v14</property>
      <property value="19.4596">fsim/tables/ps_full_ms/h0/w2/v15</property>
      <property value="135.483">fsim/tables/ps_full_ms/h0/w2/v2</property>
      <property value="148.518">fsim/tables/ps_full_ms/h0/w2/v3</property>
      <property value="161.042">fsim/tables/ps_full_ms/h0/w2/v4</property>
      <property value="173.286">fsim/tables/ps_full_ms/h0/w2/v5</property>
      <property value="185.086">fsim/tables/ps_full_ms/h0/w2/v6</property>
      <property value="196.618">fsim/tables/ps_full_ms/h0/w2/v7</property>
      <property value="208.478">fsim/tables/ps_full_ms/h0/w2/v8</property>
      <property value="220.625">fsim/tables/ps_full_ms/h0/w2/v9</property>
      <property value="111.462">fsim/tables/ps_full_ms/h1/w0/v0</property>
      <property value="128.771">fsim/tables/ps_full_ms/h1/w0/v1</property>
      <property value="196.435">fsim/tables/ps_full_ms/h1/w0/v10</property>
      <property value="106.906">fsim/tables/ps_full_ms/h1/w0/v11</property>
      <property value="89.1342">fsim/tables/ps_full_ms/h1/w0/v12</property>
      <property value="67.4197">fsim/tables/ps_full_ms/h1/w0/v13</property>
      <property value="45.357">fsim/tables/ps_full_ms/h1/w0/v14</property>
      <property value="19.577">fsim/tables/ps_full_ms/h1/w0/v15</property>
      <property value="145.088">fsim/tables/ps_full_ms/h1/w0/v2</property>
      <property value="160.839">fsim/tables/ps_full_ms/h1/w0/v3</property>
      <property value="176.365">fsim/tables/ps_full_ms/h1/w0/v4</property>
      <property value="191.843">fsim/tables/ps_full_ms/h1/w0/v5</property>
      <property value="207.585">fsim/tables/ps_full_ms/h1/w0/v6</property>
      <property value="223.668">fsim/tables/ps_full_ms/h1/w0/v7</property>
      <property value="239.626">fsim/tables/ps_full_ms/h1/w0/v8</property>
      <property value="247.688">fsim/tables/ps_full_ms/h1/w0/v9</property>
      <property value="94.8007">fsim/tables/ps_full_ms/h1/w1/v0</property>
      <property value="110.148">fsim/tables/ps_full_ms/h1/w1/v1</property>
      <property value="175.688">fsim/tables/ps_full_ms/h1/w1/v10</property>
      <property value="93.0586">fsim/tables/ps_full_ms/h1/w1/v11</property>
      <property value="77.3962">fsim/tables/ps_full_ms/h1/w1/v12</property>
      <property value="58.5195">fsim/tables/ps_full_ms/h1/w1/v13</property>
      <property value="39.295">fsim/tables/ps_full_ms/h1/w1/v14</property>
      <property value="16.9113">fsim/tables/ps_full_ms/h1/w1/v15</property>
      <property value="124.372">fsim/tables/ps_full_ms/h1/w1/v2</property>
      <property value="138.204">fsim/tables/ps_full_ms/h1/w1/v3</property>
      <property value="151.799">fsim/tables/ps_full_ms/h1/w1/v4</property>
      <property value="164.99">fsim/tables/ps_full_ms/h1/w1/v5</property>
      <property value="178.188">fsim/tables/ps_full_ms/h1/w1/v6</property>
      <property value="192.051">fsim/tables/ps_full_ms/h1/w1/v7</property>
      <property value="206.17">fsim/tables/ps_full_ms/h1/w1/v8</property>
      <property value="216.386">fsim/tables/ps_full_ms/h1/w1/v9</property>
      <property value="80.4587">fsim/tables/ps_full_ms/h1/w2/v0</property>
      <property value="94.6853">fsim/tables/ps_full_ms/h1/w2/v1</property>
      <property value="160.974">fsim/tables/ps_full_ms/h1/w2/v10</property>
      <property value="82.0776">fsim/tables/ps_full_ms/h1/w2/v11</property>
      <property value="68.5124">fsim/tables/ps_full_ms/h1/w2/v12</property>
      <property value="51.8428">fsim/tables/ps_full_ms/h1/w2/v13</property>
      <property value="34.688">fsim/tables/ps_full_ms/h1/w2/v14</property>
      <property value="14.8906">fsim/tables/ps_full_ms/h1/w2/v15</property>
      <property value="107.334">fsim/tables/ps_full_ms/h1/w2/v2</property>
      <property value="119.586">fsim/tables/ps_full_ms/h1/w2/v3</property>
      <property value="131.629">fsim/tables/ps_full_ms/h1/w2/v4</property>
      <property value="143.199">fsim/tables/ps_full_ms/h1/w2/v5</property>
      <property value="155.289">fsim/tables/ps_full_ms/h1/w2/v6</property>
      <property value="168.026">fsim/tables/ps_full_ms/h1/w2/v7</property>
      <property value="180.675">fsim/tables/ps_full_ms/h1/w2/v8</property>
      <property value="191.461">fsim/tables/ps_full_ms/h1/w2/v9</property>
      <property value="80.3241">fsim/tables/ps_full_ms/h2/w0/v0</property>
      <property value="97.0417">fsim/tables/ps_full_ms/h2/w0/v1</property>
      <property value="101.144">fsim/tables/ps_full_ms/h2/w0/v10</property>
      <property value="90.9539">fsim/tables/ps_full_ms/h2/w0/v11</property>
      <property value="78.1675">fsim/tables/ps_full_ms/h2/w0/v12</property>
      <property value="61.7183">fsim/tables/ps_full_ms/h2/w0/v13</property>
      <property value="42.1976">fsim/tables/ps_full_ms/h2/w0/v14</property>
      <property value="18.7858">fsim/tables/ps_full_ms/h2/w0/v15</property>
      <property value="111.951">fsim/tables/ps_full_ms/h2/w0/v2</property>
      <property value="126.67">fsim/tables/ps_full_ms/h2/w0/v3</property>
      <property value="141.325">fsim/tables/ps_full_ms/h2/w0/v4</property>
      <property value="156.64">fsim/tables/ps_full_ms/h2/w0/v5</property>
      <property value="173.761">fsim/tables/ps_full_ms/h2/w0/v6</property>
      <property value="187.991">fsim/tables/ps_full_ms/h2/w0/v7</property>
      <property value="144.025">fsim/tables/ps_full_ms/h2/w0/v8</property>
      <property value="110.732">fsim/tables/ps_full_ms/h2/w0/v9</property>
      <property value="69.3492">fsim/tables/ps_full_ms/h2/w1/v0</property>
      <property value="84.0453">fsim/tables/ps_full_ms/h2/w1/v1</property>
      <property value="85.7511">fsim/tables/ps_full_ms/h2/w1/v10</property>
      <property value="77.1497">fsim/tables/ps_full_ms/h2/w1/v11</property>
      <property value="65.9362">fsim/tables/ps_full_ms/h2/w1/v12</property>
      <property value="52.4881">fsim/tables/ps_full_ms/h2/w1/v13</property>
      <property value="36.4433">fsim/tables/ps_full_ms/h2/w1/v14</property>
      <property value="16.645">fsim/tables/ps_full_ms/h2/w1/v15</property>
      <property value="97.0698">fsim/tables/ps_full_ms/h2/w1/v2</property>
      <property value="110.016">fsim/tables/ps_full_ms/h2/w1/v3</property>
      <property value="122.915">fsim/tables/ps_full_ms/h2/w1/v4</property>
      <property value="136.619">fsim/tables/ps_full_ms/h2/w1/v5</property>
      <property value="151.229">fsim/tables/ps_full_ms/h2/w1/v6</property>
      <property value="163.226">fsim/tables/ps_full_ms/h2/w1/v7</property>
      <property value="117.786">fsim/tables/ps_full_ms/h2/w1/v8</property>
      <property value="93.9961">fsim/tables/ps_full_ms/h2/w1/v9</property>
      <property value="58.6007">fsim/tables/ps_full_ms/h2/w2/v0</property>
      <property value="72.3003">fsim/tables/ps_full_ms/h2/w2/v1</property>
      <property value="74.6225">fsim/tables/ps_full_ms/h2/w2/v10</property>
      <property value="66.7117">fsim/tables/ps_full_ms/h2/w2/v11</property>
      <property value="56.8516">fsim/tables/ps_full_ms/h2/w2/v12</property>
      <property value="44.8843">fsim/tables/ps_full_ms/h2/w2/v13</property>
      <property value="31.0617">fsim/tables/ps_full_ms/h2/w2/v14</property>
      <property value="14.5883">fsim/tables/ps_full_ms/h2/w2/v15</property>
      <property value="83.7371">fsim/tables/ps_full_ms/h2/w2/v2</property>
      <property value="95.0973">fsim/tables/ps_full_ms/h2/w2/v3</property>
      <property value="106.555">fsim/tables/ps_full_ms/h2/w2/v4</property>
      <property value="119.22">fsim/tables/ps_full_ms/h2/w2/v5</property>
      <property value="132.236">fsim/tables/ps_full_ms/h2/w2/v6</property>
      <property value="143.671">fsim/tables/ps_full_ms/h2/w2/v7</property>
      <property value="104.058">fsim/tables/ps_full_ms/h2/w2/v8</property>
      <property value="81.6927">fsim/tables/ps_full_ms/h2/w2/v9</property>
      <property value="60.0382">fsim/tables/ps_full_ms/h3/w0/v0</property>
      <property value="74.7634">fsim/tables/ps_full_ms/h3/w0/v1</property>
      <property value="82.5049">fsim/tables/ps_full_ms/h3/w0/v10</property>
      <property value="73.7326">fsim/tables/ps_full_ms/h3/w0/v11</property>
      <property value="62.9953">fsim/tables/ps_full_ms/h3/w0/v12</property>
      <property value="49.7228">fsim/tables/ps_full_ms/h3/w0/v13</property>
      <property value="34.1324">fsim/tables/ps_full_ms/h3/w0/v14</property>
      <property value="16.2927">fsim/tables/ps_full_ms/h3/w0/v15</property>
      <property value="88.9614">fsim/tables/ps_full_ms/h3/w0/v2</property>
      <property value="103.6">fsim/tables/ps_full_ms/h3/w0/v3</property>
      <property value="120.163">fsim/tables/ps_full_ms/h3/w0/v4</property>
      <property value="132.685">fsim/tables/ps_full_ms/h3/w0/v5</property>
      <property value="97.0027">fsim/tables/ps_full_ms/h3/w0/v6</property>
      <property value="95.771">fsim/tables/ps_full_ms/h3/w0/v7</property>
      <property value="93.3072">fsim/tables/ps_full_ms/h3/w0/v8</property>
      <property value="88.7969">fsim/tables/ps_full_ms/h3/w0/v9</property>
      <property value="48.552">fsim/tables/ps_full_ms/h3/w1/v0</property>
      <property value="62.4769">fsim/tables/ps_full_ms/h3/w1/v1</property>
      <property value="69.6429">fsim/tables/ps_full_ms/h3/w1/v10</property>
      <property value="62.2475">fsim/tables/ps_full_ms/h3/w1/v11</property>
      <property value="53.0865">fsim/tables/ps_full_ms/h3/w1/v12</property>
      <property value="42.1381">fsim/tables/ps_full_ms/h3/w1/v13</property>
      <property value="28.8294">fsim/tables/ps_full_ms/h3/w1/v14</property>
      <property value="14.1322">fsim/tables/ps_full_ms/h3/w1/v15</property>
      <property value="74.8315">fsim/tables/ps_full_ms/h3/w1/v2</property>
      <property value="87.6182">fsim/tables/ps_full_ms/h3/w1/v3</property>
      <property value="102.11">fsim/tables/ps_full_ms/h3/w1/v4</property>
      <property value="113.97">fsim/tables/ps_full_ms/h3/w1/v5</property>
      <property value="81.5998">fsim/tables/ps_full_ms/h3/w1/v6</property>
      <property value="80.701">fsim/tables/ps_full_ms/h3/w1/v7</property>
      <property value="78.898">fsim/tables/ps_full_ms/h3/w1/v8</property>
      <property value="75.04">fsim/tables/ps_full_ms/h3/w1/v9</property>
      <property value="39.8348">fsim/tables/ps_full_ms/h3/w2/v0</property>
      <property value="52.8732">fsim/tables/ps_full_ms/h3/w2/v1</property>
      <property value="59.5059">fsim/tables/ps_full_ms/h3/w2/v10</property>
      <property value="53.3123">fsim/tables/ps_full_ms/h3/w2/v11</property>
      <property value="45.3257">fsim/tables/ps_full_ms/h3/w2/v12</property>
      <property value="36.1887">fsim/tables/ps_full_ms/h3/w2/v13</property>
      <property value="24.6457">fsim/tables/ps_full_ms/h3/w2/v14</property>
      <property value="12.4171">fsim/tables/ps_full_ms/h3/w2/v15</property>
      <property value="63.6696">fsim/tables/ps_full_ms/h3/w2/v2</property>
      <property value="75.3585">fsim/tables/ps_full_ms/h3/w2/v3</property>
      <property value="88.4401">fsim/tables/ps_full_ms/h3/w2/v4</property>
      <property value="98.7339">fsim/tables/ps_full_ms/h3/w2/v5</property>
      <property value="69.7628">fsim/tables/ps_full_ms/h3/w2/v6</property>
      <property value="68.919">fsim/tables/ps_full_ms/h3/w2/v7</property>
      <property value="66.9132">fsim/tables/ps_full_ms/h3/w2/v8</property>
      <property value="63.6526">fsim/tables/ps_full_ms/h3/w2/v9</property>
      <property value="29.9154">fsim/tables/ps_full_ms/h4/w0/v0</property>
      <property value="39.1843">fsim/tables/ps_full_ms/h4/w0/v1</property>
      <property value="50.8795">fsim/tables/ps_full_ms/h4/w0/v10</property>
      <property value="46.2182">fsim/tables/ps_full_ms/h4/w0/v11</property>
      <property value="39.8106">fsim/tables/ps_full_ms/h4/w0/v12</property>
      <property value="31.7946">fsim/tables/ps_full_ms/h4/w0/v13</property>
      <property value="22.2495">fsim/tables/ps_full_ms/h4/w0/v14</property>
      <property value="11.4807">fsim/tables/ps_full_ms/h4/w0/v15</property>
      <property value="50.5375">fsim/tables/ps_full_ms/h4/w0/v2</property>
      <property value="63.6959">fsim/tables/ps_full_ms/h4/w0/v3</property>
      <property value="75.0018">fsim/tables/ps_full_ms/h4/w0/v4</property>
      <property value="81.2233">fsim/tables/ps_full_ms/h4/w0/v5</property>
      <property value="59.6666">fsim/tables/ps_full_ms/h4/w0/v6</property>
      <property value="59.0126">fsim/tables/ps_full_ms/h4/w0/v7</property>
      <property value="57.4066">fsim/tables/ps_full_ms/h4/w0/v8</property>
      <property value="54.3405">fsim/tables/ps_full_ms/h4/w0/v9</property>
      <property value="24.6216">fsim/tables/ps_full_ms/h4/w1/v0</property>
      <property value="34.8198">fsim/tables/ps_full_ms/h4/w1/v1</property>
      <property value="39.84">fsim/tables/ps_full_ms/h4/w1/v10</property>
      <property value="35.862">fsim/tables/ps_full_ms/h4/w1/v11</property>
      <property value="30.9322">fsim/tables/ps_full_ms/h4/w1/v12</property>
      <property value="25.0221">fsim/tables/ps_full_ms/h4/w1/v13</property>
      <property value="17.4931">fsim/tables/ps_full_ms/h4/w1/v14</property>
      <property value="9.78278">fsim/tables/ps_full_ms/h4/w1/v15</property>
      <property value="43.7281">fsim/tables/ps_full_ms/h4/w1/v2</property>
      <property value="54.3087">fsim/tables/ps_full_ms/h4/w1/v3</property>
      <property value="63.8467">fsim/tables/ps_full_ms/h4/w1/v4</property>
      <property value="61.1882">fsim/tables/ps_full_ms/h4/w1/v5</property>
      <property value="48.04">fsim/tables/ps_full_ms/h4/w1/v6</property>
      <property value="47.1381">fsim/tables/ps_full_ms/h4/w1/v7</property>
      <property value="45.8349">fsim/tables/ps_full_ms/h4/w1/v8</property>
      <property value="43.0759">fsim/tables/ps_full_ms/h4/w1/v9</property>
      <property value="17.6596">fsim/tables/ps_full_ms/h4/w2/v0</property>
      <property value="26.5171">fsim/tables/ps_full_ms/h4/w2/v1</property>
      <property value="31.7405">fsim/tables/ps_full_ms/h4/w2/v10</property>
      <property value="28.9138">fsim/tables/ps_full_ms/h4/w2/v11</property>
      <property value="24.7355">fsim/tables/ps_full_ms/h4/w2/v12</property>
      <property value="20.2122">fsim/tables/ps_full_ms/h4/w2/v13</property>
      <property value="14.4085">fsim/tables/ps_full_ms/h4/w2/v14</property>
      <property value="7.83869">fsim/tables/ps_full_ms/h4/w2/v15</property>
      <property value="35.2107">fsim/tables/ps_full_ms/h4/w2/v2</property>
      <property value="44.2533">fsim/tables/ps_full_ms/h4/w2/v3</property>
      <property value="52.3116">fsim/tables/ps_full_ms/h4/w2/v4</property>
      <property value="52.4052">fsim/tables/ps_full_ms/h4/w2/v5</property>
      <property value="38.6243">fsim/tables/ps_full_ms/h4/w2/v6</property>
      <property value="38.171">fsim/tables/ps_full_ms/h4/w2/v7</property>
      <property value="36.6262">fsim/tables/ps_full_ms/h4/w2/v8</property>
      <property value="34.3673">fsim/tables/ps_full_ms/h4/w2/v9</property>
      <property value="8.96246">fsim/tables/ps_full_ms/h5/w0/v0</property>
      <property value="20.4119">fsim/tables/ps_full_ms/h5/w0/v1</property>
      <property value="29.1085">fsim/tables/ps_full_ms/h5/w0/v10</property>
      <property value="26.7074">fsim/tables/ps_full_ms/h5/w0/v11</property>
      <property value="23.0482">fsim/tables/ps_full_ms/h5/w0/v12</property>
      <property value="18.6353">fsim/tables/ps_full_ms/h5/w0/v13</property>
      <property value="13.6658">fsim/tables/ps_full_ms/h5/w0/v14</property>
      <property value="7.33295">fsim/tables/ps_full_ms/h5/w0/v15</property>
      <property value="31.1337">fsim/tables/ps_full_ms/h5/w0/v2</property>
      <property value="38.9017">fsim/tables/ps_full_ms/h5/w0/v3</property>
      <property value="46.5488">fsim/tables/ps_full_ms/h5/w0/v4</property>
      <property value="53.3042">fsim/tables/ps_full_ms/h5/w0/v5</property>
      <property value="34.3264">fsim/tables/ps_full_ms/h5/w0/v6</property>
      <property value="35.4752">fsim/tables/ps_full_ms/h5/w0/v7</property>
      <property value="33.8423">fsim/tables/ps_full_ms/h5/w0/v8</property>
      <property value="31.8985">fsim/tables/ps_full_ms/h5/w0/v9</property>
      <property value="9.2165">fsim/tables/ps_full_ms/h5/w1/v0</property>
      <property value="15.2426">fsim/tables/ps_full_ms/h5/w1/v1</property>
      <property value="20.7199">fsim/tables/ps_full_ms/h5/w1/v10</property>
      <property value="18.0514">fsim/tables/ps_full_ms/h5/w1/v11</property>
      <property value="15.9826">fsim/tables/ps_full_ms/h5/w1/v12</property>
      <property value="13.3898">fsim/tables/ps_full_ms/h5/w1/v13</property>
      <property value="10.2443">fsim/tables/ps_full_ms/h5/w1/v14</property>
      <property value="6.25494">fsim/tables/ps_full_ms/h5/w1/v15</property>
      <property value="23.0672">fsim/tables/ps_full_ms/h5/w1/v2</property>
      <property value="29.5123">fsim/tables/ps_full_ms/h5/w1/v3</property>
      <property value="35.9951">fsim/tables/ps_full_ms/h5/w1/v4</property>
      <property value="41.2223">fsim/tables/ps_full_ms/h5/w1/v5</property>
      <property value="25.5999">fsim/tables/ps_full_ms/h5/w1/v6</property>
      <property value="25.5879">fsim/tables/ps_full_ms/h5/w1/v7</property>
      <property value="24.4745">fsim/tables/ps_full_ms/h5/w1/v8</property>
      <property value="23.0286">fsim/tables/ps_full_ms/h5/w1/v9</property>
      <property value="2.98495">fsim/tables/ps_full_ms/h5/w2/v0</property>
      <property value="9.52307">fsim/tables/ps_full_ms/h5/w2/v1</property>
      <property value="14.4386">fsim/tables/ps_full_ms/h5/w2/v10</property>
      <property value="12.4077">fsim/tables/ps_full_ms/h5/w2/v11</property>
      <property value="10.0893">fsim/tables/ps_full_ms/h5/w2/v12</property>
      <property value="8.89724">fsim/tables/ps_full_ms/h5/w2/v13</property>
      <property value="6.82631">fsim/tables/ps_full_ms/h5/w2/v14</property>
      <property value="4.39523">fsim/tables/ps_full_ms/h5/w2/v15</property>
      <property value="15.2949">fsim/tables/ps_full_ms/h5/w2/v2</property>
      <property value="20.904">fsim/tables/ps_full_ms/h5/w2/v3</property>
      <property value="26.1003">fsim/tables/ps_full_ms/h5/w2/v4</property>
      <property value="31.0563">fsim/tables/ps_full_ms/h5/w2/v5</property>
      <property value="19.3955">fsim/tables/ps_full_ms/h5/w2/v6</property>
      <property value="17.6683">fsim/tables/ps_full_ms/h5/w2/v7</property>
      <property value="17.1766">fsim/tables/ps_full_ms/h5/w2/v8</property>
      <property value="16.1308">fsim/tables/ps_full_ms/h5/w2/v9</property>
      <property value="15.6659">fsim/tables/ps_full_ms/h6/w0/v0</property>
      <property value="20.5245">fsim/tables/ps_full_ms/h6/w0/v1</property>
      <property value="13.2026">fsim/tables/ps_full_ms/h6/w0/v10</property>
      <property value="11.1659">fsim/tables/ps_full_ms/h6/w0/v11</property>
      <property value="10.2904">fsim/tables/ps_full_ms/h6/w0/v12</property>
      <property value="8.62342">fsim/tables/ps_full_ms/h6/w0/v13</property>
      <property value="6.65686">fsim/tables/ps_full_ms/h6/w0/v14</property>
      <property value="4.54038">fsim/tables/ps_full_ms/h6/w0/v15</property>
      <property value="25.2938">fsim/tables/ps_full_ms/h6/w0/v2</property>
      <property value="29.2194">fsim/tables/ps_full_ms/h6/w0/v3</property>
      <property value="27.5699">fsim/tables/ps_full_ms/h6/w0/v4</property>
      <property value="18.3298">fsim/tables/ps_full_ms/h6/w0/v5</property>
      <property value="17.6272">fsim/tables/ps_full_ms/h6/w0/v6</property>
      <property value="17.3454">fsim/tables/ps_full_ms/h6/w0/v7</property>
      <property value="16.3519">fsim/tables/ps_full_ms/h6/w0/v8</property>
      <property value="14.9318">fsim/tables/ps_full_ms/h6/w0/v9</property>
      <property value="8.73593">fsim/tables/ps_full_ms/h6/w1/v0</property>
      <property value="11.6917">fsim/tables/ps_full_ms/h6/w1/v1</property>
      <property value="8.10394">fsim/tables/ps_full_ms/h6/w1/v10</property>
      <property value="7.43548">fsim/tables/ps_full_ms/h6/w1/v11</property>
      <property value="6.58469">fsim/tables/ps_full_ms/h6/w1/v12</property>
      <property value="5.63613">fsim/tables/ps_full_ms/h6/w1/v13</property>
      <property value="4.58776">fsim/tables/ps_full_ms/h6/w1/v14</property>
      <property value="3.42995">fsim/tables/ps_full_ms/h6/w1/v15</property>
      <property value="14.6475">fsim/tables/ps_full_ms/h6/w1/v2</property>
      <property value="17.6033">fsim/tables/ps_full_ms/h6/w1/v3</property>
      <property value="17.0197">fsim/tables/ps_full_ms/h6/w1/v4</property>
      <property value="15.3885">fsim/tables/ps_full_ms/h6/w1/v5</property>
      <property value="13.6487">fsim/tables/ps_full_ms/h6/w1/v6</property>
      <property value="11.435">fsim/tables/ps_full_ms/h6/w1/v7</property>
      <property value="9.22121">fsim/tables/ps_full_ms/h6/w1/v8</property>
      <property value="8.0624">fsim/tables/ps_full_ms/h6/w1/v9</property>
      <property value="2.70441">fsim/tables/ps_full_ms/h6/w2/v0</property>
      <property value="4.63906">fsim/tables/ps_full_ms/h6/w2/v1</property>
      <property value="2.57106">fsim/tables/ps_full_ms/h6/w2/v10</property>
      <property value="2.46593">fsim/tables/ps_full_ms/h6/w2/v11</property>
      <property value="2.36081">fsim/tables/ps_full_ms/h6/w2/v12</property>
      <property value="2.11671">fsim/tables/ps_full_ms/h6/w2/v13</property>
      <property value="1.52536">fsim/tables/ps_full_ms/h6/w2/v14</property>
      <property value="0.934021">fsim/tables/ps_full_ms/h6/w2/v15</property>
      <property value="6.57371">fsim/tables/ps_full_ms/h6/w2/v2</property>
      <property value="8.50836">fsim/tables/ps_full_ms/h6/w2/v3</property>
      <property value="10.443">fsim/tables/ps_full_ms/h6/w2/v4</property>
      <property value="12.3002">fsim/tables/ps_full_ms/h6/w2/v5</property>
      <property value="10.5026">fsim/tables/ps_full_ms/h6/w2/v6</property>
      <property value="7.17825">fsim/tables/ps_full_ms/h6/w2/v7</property>
      <property value="3.85394">fsim/tables/ps_full_ms/h6/w2/v8</property>
      <property value="2.67619">fsim/tables/ps_full_ms/h6/w2/v9</property>
      <property value="-25.28">fsim/tables/ps_idle_ms/h0/w0/v0</property>
      <property value="-30.7309">fsim/tables/ps_idle_ms/h0/w0/v1</property>
      <property value="-122.232">fsim/tables/ps_idle_ms/h0/w0/v10</property>
      <property value="-153.617">fsim/tables/ps_idle_ms/h0/w0/v11</property>
      <property value="-302.677">fsim/tables/ps_idle_ms/h0/w0/v12</property>
      <property value="-402.255">fsim/tables/ps_idle_ms/h0/w0/v13</property>
      <property value="-448.868">fsim/tables/ps_idle_ms/h0/w0/v14</property>
      <property value="-483.466">fsim/tables/ps_idle_ms/h0/w0/v15</property>
      <property value="-36.9221">fsim/tables/ps_idle_ms/h0/w0/v2</property>
      <property value="-43.8985">fsim/tables/ps_idle_ms/h0/w0/v3</property>
      <property value="-51.7021">fsim/tables/ps_idle_ms/h0/w0/v4</property>
      <property value="-60.4462">fsim/tables/ps_idle_ms/h0/w0/v5</property>
      <property value="-70.4594">fsim/tables/ps_idle_ms/h0/w0/v6</property>
      <property value="-81.5653">fsim/tables/ps_idle_ms/h0/w0/v7</property>
      <property value="-93.836">fsim/tables/ps_idle_ms/h0/w0/v8</property>
      <property value="-107.304">fsim/tables/ps_idle_ms/h0/w0/v9</property>
      <property value="-13.138">fsim/tables/ps_idle_ms/h0/w1/v0</property>
      <property value="-15.9938">fsim/tables/ps_idle_ms/h0/w1/v1</property>
      <property value="-92.1209">fsim/tables/ps_idle_ms/h0/w1/v10</property>
      <property value="-108.089">fsim/tables/ps_idle_ms/h0/w1/v11</property>
      <property value="-162.029">fsim/tables/ps_idle_ms/h0/w1/v12</property>
      <property value="-317.906">fsim/tables/ps_idle_ms/h0/w1/v13</property>
      <property value="-394.14">fsim/tables/ps_idle_ms/h0/w1/v14</property>
      <property value="-428.318">fsim/tables/ps_idle_ms/h0/w1/v15</property>
      <property value="-19.8903">fsim/tables/ps_idle_ms/h0/w1/v2</property>
      <property value="-24.6688">fsim/tables/ps_idle_ms/h0/w1/v3</property>
      <property value="-30.6716">fsim/tables/ps_idle_ms/h0/w1/v4</property>
      <property value="-37.8231">fsim/tables/ps_idle_ms/h0/w1/v5</property>
      <property value="-46.0509">fsim/tables/ps_idle_ms/h0/w1/v6</property>
      <property value="-55.2947">fsim/tables/ps_idle_ms/h0/w1/v7</property>
      <property value="-65.8428">fsim/tables/ps_idle_ms/h0/w1/v8</property>
      <property value="-78.17">fsim/tables/ps_idle_ms/h0/w1/v9</property>
      <property value="-12.7844">fsim/tables/ps_idle_ms/h0/w2/v0</property>
      <property value="-14.9198">fsim/tables/ps_idle_ms/h0/w2/v1</property>
      <property value="-80.4377">fsim/tables/ps_idle_ms/h0/w2/v10</property>
      <property value="-94.6748">fsim/tables/ps_idle_ms/h0/w2/v11</property>
      <property value="-128.169">fsim/tables/ps_idle_ms/h0/w2/v12</property>
      <property value="-277.491">fsim/tables/ps_idle_ms/h0/w2/v13</property>
      <property value="-355.624">fsim/tables/ps_idle_ms/h0/w2/v14</property>
      <property value="-383.371">fsim/tables/ps_idle_ms/h0/w2/v15</property>
      <property value="-17.9764">fsim/tables/ps_idle_ms/h0/w2/v2</property>
      <property value="-22.1149">fsim/tables/ps_idle_ms/h0/w2/v3</property>
      <property value="-27.039">fsim/tables/ps_idle_ms/h0/w2/v4</property>
      <property value="-33.1804">fsim/tables/ps_idle_ms/h0/w2/v5</property>
      <property value="-40.4343">fsim/tables/ps_idle_ms/h0/w2/v6</property>
      <property value="-48.6585">fsim/tables/ps_idle_ms/h0/w2/v7</property>
      <property value="-57.8307">fsim/tables/ps_idle_ms/h0/w2/v8</property>
      <property value="-68.194">fsim/tables/ps_idle_ms/h0/w2/v9</property>
      <property value="-13.5636">fsim/tables/ps_idle_ms/h1/w0/v0</property>
      <property value="-15.9904">fsim/tables/ps_idle_ms/h1/w0/v1</property>
      <property value="-175.934">fsim/tables/ps_idle_ms/h1/w0/v10</property>
      <property value="-281.825">fsim/tables/ps_idle_ms/h1/w0/v11</property>
      <property value="-338.159">fsim/tables/ps_idle_ms/h1/w0/v12</property>
      <property value="-392.08">fsim/tables/ps_idle_ms/h1/w0/v13</property>
      <property value="-443.341">fsim/tables/ps_idle_ms/h1/w0/v14</property>
      <property value="-468.121">fsim/tables/ps_idle_ms/h1/w0/v15</property>
      <property value="-19.5091">fsim/tables/ps_idle_ms/h1/w0/v2</property>
      <property value="-24.3905">fsim/tables/ps_idle_ms/h1/w0/v3</property>
      <property value="-30.2553">fsim/tables/ps_idle_ms/h1/w0/v4</property>
      <property value="-37.7163">fsim/tables/ps_idle_ms/h1/w0/v5</property>
      <property value="-46.3902">fsim/tables/ps_idle_ms/h1/w0/v6</property>
      <property value="-56.2797">fsim/tables/ps_idle_ms/h1/w0/v7</property>
      <property value="-67.2602">fsim/tables/ps_idle_ms/h1/w0/v8</property>
      <property value="-81.7145">fsim/tables/ps_idle_ms/h1/w0/v9</property>
      <property value="-14.0364">fsim/tables/ps_idle_ms/h1/w1/v0</property>
      <property value="-15.7932">fsim/tables/ps_idle_ms/h1/w1/v1</property>
      <property value="-144.634">fsim/tables/ps_idle_ms/h1/w1/v10</property>
      <property value="-244.408">fsim/tables/ps_idle_ms/h1/w1/v11</property>
      <property value="-291.925">fsim/tables/ps_idle_ms/h1/w1/v12</property>
      <property value="-338.424">fsim/tables/ps_idle_ms/h1/w1/v13</property>
      <property value="-387.212">fsim/tables/ps_idle_ms/h1/w1/v14</property>
      <property value="-410.791">fsim/tables/ps_idle_ms/h1/w1/v15</property>
      <property value="-18.628">fsim/tables/ps_idle_ms/h1/w1/v2</property>
      <property value="-22.4988">fsim/tables/ps_idle_ms/h1/w1/v3</property>
      <property value="-27.5552">fsim/tables/ps_idle_ms/h1/w1/v4</property>
      <property value="-33.6127">fsim/tables/ps_idle_ms/h1/w1/v5</property>
      <property value="-41.1002">fsim/tables/ps_idle_ms/h1/w1/v6</property>
      <property value="-49.8058">fsim/tables/ps_idle_ms/h1/w1/v7</property>
      <property value="-59.1015">fsim/tables/ps_idle_ms/h1/w1/v8</property>
      <property value="-70.8236">fsim/tables/ps_idle_ms/h1/w1/v9</property>
      <property value="-14.7462">fsim/tables/ps_idle_ms/h1/w2/v0</property>
      <property value="-15.8339">fsim/tables/ps_idle_ms/h1/w2/v1</property>
      <property value="-118.335">fsim/tables/ps_idle_ms/h1/w2/v10</property>
      <property value="-214.935">fsim/tables/ps_idle_ms/h1/w2/v11</property>
      <property value="-256.301">fsim/tables/ps_idle_ms/h1/w2/v12</property>
      <property value="-297.228">fsim/tables/ps_idle_ms/h1/w2/v13</property>
      <property value="-341.836">fsim/tables/ps_idle_ms/h1/w2/v14</property>
      <property value="-365.748">fsim/tables/ps_idle_ms/h1/w2/v15</property>
      <property value="-17.967">fsim/tables/ps_idle_ms/h1/w2/v2</property>
      <property value="-21.2054">fsim/tables/ps_idle_ms/h1/w2/v3</property>
      <property value="-25.4364">fsim/tables/ps_idle_ms/h1/w2/v4</property>
      <property value="-30.6716">fsim/tables/ps_idle_ms/h1/w2/v5</property>
      <property value="-36.9091">fsim/tables/ps_idle_ms/h1/w2/v6</property>
      <property value="-44.5619">fsim/tables/ps_idle_ms/h1/w2/v7</property>
      <property value="-52.9431">fsim/tables/ps_idle_ms/h1/w2/v8</property>
      <property value="-62.816">fsim/tables/ps_idle_ms/h1/w2/v9</property>
      <property value="-15.9625">fsim/tables/ps_idle_ms/h2/w0/v0</property>
      <property value="-16.9122">fsim/tables/ps_idle_ms/h2/w0/v1</property>
      <property value="-223.15">fsim/tables/ps_idle_ms/h2/w0/v10</property>
      <property value="-265.228">fsim/tables/ps_idle_ms/h2/w0/v11</property>
      <property value="-311.285">fsim/tables/ps_idle_ms/h2/w0/v12</property>
      <property value="-362.086">fsim/tables/ps_idle_ms/h2/w0/v13</property>
      <property value="-418.482">fsim/tables/ps_idle_ms/h2/w0/v14</property>
      <property value="-452.68">fsim/tables/ps_idle_ms/h2/w0/v15</property>
      <property value="-19.2288">fsim/tables/ps_idle_ms/h2/w0/v2</property>
      <property value="-22.9161">fsim/tables/ps_idle_ms/h2/w0/v3</property>
      <property value="-27.9734">fsim/tables/ps_idle_ms/h2/w0/v4</property>
      <property value="-34.0849">fsim/tables/ps_idle_ms/h2/w0/v5</property>
      <property value="-41.9432">fsim/tables/ps_idle_ms/h2/w0/v6</property>
      <property value="-51.3336">fsim/tables/ps_idle_ms/h2/w0/v7</property>
      <property value="-127.91">fsim/tables/ps_idle_ms/h2/w0/v8</property>
      <property value="-184.777">fsim/tables/ps_idle_ms/h2/w0/v9</property>
      <property value="-17.3884">fsim/tables/ps_idle_ms/h2/w1/v0</property>
      <property value="-17.8709">fsim/tables/ps_idle_ms/h2/w1/v1</property>
      <property value="-195.753">fsim/tables/ps_idle_ms/h2/w1/v10</property>
      <property value="-231.925">fsim/tables/ps_idle_ms/h2/w1/v11</property>
      <property value="-270.864">fsim/tables/ps_idle_ms/h2/w1/v12</property>
      <property value="-313.127">fsim/tables/ps_idle_ms/h2/w1/v13</property>
      <property value="-360.49">fsim/tables/ps_idle_ms/h2/w1/v14</property>
      <property value="-393.851">fsim/tables/ps_idle_ms/h2/w1/v15</property>
      <property value="-19.7664">fsim/tables/ps_idle_ms/h2/w1/v2</property>
      <property value="-22.8044">fsim/tables/ps_idle_ms/h2/w1/v3</property>
      <property value="-26.9098">fsim/tables/ps_idle_ms/h2/w1/v4</property>
      <property value="-32.3207">fsim/tables/ps_idle_ms/h2/w1/v5</property>
      <property value="-38.5883">fsim/tables/ps_idle_ms/h2/w1/v6</property>
      <property value="-46.9417">fsim/tables/ps_idle_ms/h2/w1/v7</property>
      <property value="-118.165">fsim/tables/ps_idle_ms/h2/w1/v8</property>
      <property value="-162.817">fsim/tables/ps_idle_ms/h2/w1/v9</property>
      <property value="-18.9334">fsim/tables/ps_idle_ms/h2/w2/v0</property>
      <property value="-18.7988">fsim/tables/ps_idle_ms/h2/w2/v1</property>
      <property value="-172.793">fsim/tables/ps_idle_ms/h2/w2/v10</property>
      <property value="-204.663">fsim/tables/ps_idle_ms/h2/w2/v11</property>
      <property value="-239.204">fsim/tables/ps_idle_ms/h2/w2/v12</property>
      <property value="-275.614">fsim/tables/ps_idle_ms/h2/w2/v13</property>
      <property value="-315.712">fsim/tables/ps_idle_ms/h2/w2/v14</property>
      <property value="-348.188">fsim/tables/ps_idle_ms/h2/w2/v15</property>
      <property value="-20.0528">fsim/tables/ps_idle_ms/h2/w2/v2</property>
      <property value="-22.3957">fsim/tables/ps_idle_ms/h2/w2/v3</property>
      <property value="-25.9078">fsim/tables/ps_idle_ms/h2/w2/v4</property>
      <property value="-30.3797">fsim/tables/ps_idle_ms/h2/w2/v5</property>
      <property value="-35.8379">fsim/tables/ps_idle_ms/h2/w2/v6</property>
      <property value="-42.6396">fsim/tables/ps_idle_ms/h2/w2/v7</property>
      <property value="-103.636">fsim/tables/ps_idle_ms/h2/w2/v8</property>
      <property value="-144.02">fsim/tables/ps_idle_ms/h2/w2/v9</property>
      <property value="-20.8519">fsim/tables/ps_idle_ms/h3/w0/v0</property>
      <property value="-20.8204">fsim/tables/ps_idle_ms/h3/w0/v1</property>
      <property value="-225.077">fsim/tables/ps_idle_ms/h3/w0/v10</property>
      <property value="-267.134">fsim/tables/ps_idle_ms/h3/w0/v11</property>
      <property value="-314.255">fsim/tables/ps_idle_ms/h3/w0/v12</property>
      <property value="-365.56">fsim/tables/ps_idle_ms/h3/w0/v13</property>
      <property value="-421.444">fsim/tables/ps_idle_ms/h3/w0/v14</property>
      <property value="-468.584">fsim/tables/ps_idle_ms/h3/w0/v15</property>
      <property value="-22.5032">fsim/tables/ps_idle_ms/h3/w0/v2</property>
      <property value="-25.704">fsim/tables/ps_idle_ms/h3/w0/v3</property>
      <property value="-30.1542">fsim/tables/ps_idle_ms/h3/w0/v4</property>
      <property value="-36.8212">fsim/tables/ps_idle_ms/h3/w0/v5</property>
      <property value="-99.1547">fsim/tables/ps_idle_ms/h3/w0/v6</property>
      <property value="-124.644">fsim/tables/ps_idle_ms/h3/w0/v7</property>
      <property value="-154.244">fsim/tables/ps_idle_ms/h3/w0/v8</property>
      <property value="-187.716">fsim/tables/ps_idle_ms/h3/w0/v9</property>
      <property value="-23.1125">fsim/tables/ps_idle_ms/h3/w1/v0</property>
      <property value="-22.2878">fsim/tables/ps_idle_ms/h3/w1/v1</property>
      <property value="-193.383">fsim/tables/ps_idle_ms/h3/w1/v10</property>
      <property value="-229.192">fsim/tables/ps_idle_ms/h3/w1/v11</property>
      <property value="-269.148">fsim/tables/ps_idle_ms/h3/w1/v12</property>
      <property value="-312.383">fsim/tables/ps_idle_ms/h3/w1/v13</property>
      <property value="-358.207">fsim/tables/ps_idle_ms/h3/w1/v14</property>
      <property value="-399.798">fsim/tables/ps_idle_ms/h3/w1/v15</property>
      <property value="-23.2346">fsim/tables/ps_idle_ms/h3/w1/v2</property>
      <property value="-25.5318">fsim/tables/ps_idle_ms/h3/w1/v3</property>
      <property value="-29.0857">fsim/tables/ps_idle_ms/h3/w1/v4</property>
      <property value="-34.2329">fsim/tables/ps_idle_ms/h3/w1/v5</property>
      <property value="-87.789">fsim/tables/ps_idle_ms/h3/w1/v6</property>
      <property value="-109.035">fsim/tables/ps_idle_ms/h3/w1/v7</property>
      <property value="-133.651">fsim/tables/ps_idle_ms/h3/w1/v8</property>
      <property value="-162.007">fsim/tables/ps_idle_ms/h3/w1/v9</property>
      <property value="-25.3549">fsim/tables/ps_idle_ms/h3/w2/v0</property>
      <property value="-23.8771">fsim/tables/ps_idle_ms/h3/w2/v1</property>
      <property value="-169.978">fsim/tables/ps_idle_ms/h3/w2/v10</property>
      <property value="-200.563">fsim/tables/ps_idle_ms/h3/w2/v11</property>
      <property value="-234.763">fsim/tables/ps_idle_ms/h3/w2/v12</property>
      <property value="-271.772">fsim/tables/ps_idle_ms/h3/w2/v13</property>
      <property value="-310.513">fsim/tables/ps_idle_ms/h3/w2/v14</property>
      <property value="-347.552">fsim/tables/ps_idle_ms/h3/w2/v15</property>
      <property value="-24.197">fsim/tables/ps_idle_ms/h3/w2/v2</property>
      <property value="-25.8271">fsim/tables/ps_idle_ms/h3/w2/v3</property>
      <property value="-28.5567">fsim/tables/ps_idle_ms/h3/w2/v4</property>
      <property value="-32.8673">fsim/tables/ps_idle_ms/h3/w2/v5</property>
      <property value="-79.4818">fsim/tables/ps_idle_ms/h3/w2/v6</property>
      <property value="-97.8844">fsim/tables/ps_idle_ms/h3/w2/v7</property>
      <property value="-119.322">fsim/tables/ps_idle_ms/h3/w2/v8</property>
      <property value="-143.321">fsim/tables/ps_idle_ms/h3/w2/v9</property>
      <property value="-28.7564">fsim/tables/ps_idle_ms/h4/w0/v0</property>
      <property value="-26.2423">fsim/tables/ps_idle_ms/h4/w0/v1</property>
      <property value="-155.223">fsim/tables/ps_idle_ms/h4/w0/v10</property>
      <property value="-181.455">fsim/tables/ps_idle_ms/h4/w0/v11</property>
      <property value="-211.867">fsim/tables/ps_idle_ms/h4/w0/v12</property>
      <property value="-245.254">fsim/tables/ps_idle_ms/h4/w0/v13</property>
      <property value="-280.856">fsim/tables/ps_idle_ms/h4/w0/v14</property>
      <property value="-316.103">fsim/tables/ps_idle_ms/h4/w0/v15</property>
      <property value="-25.9285">fsim/tables/ps_idle_ms/h4/w0/v2</property>
      <property value="-27.0237">fsim/tables/ps_idle_ms/h4/w0/v3</property>
      <property value="-29.1808">fsim/tables/ps_idle_ms/h4/w0/v4</property>
      <property value="-34.5185">fsim/tables/ps_idle_ms/h4/w0/v5</property>
      <property value="-74.0021">fsim/tables/ps_idle_ms/h4/w0/v6</property>
      <property value="-90.4065">fsim/tables/ps_idle_ms/h4/w0/v7</property>
      <property value="-109.937">fsim/tables/ps_idle_ms/h4/w0/v8</property>
      <property value="-131.984">fsim/tables/ps_idle_ms/h4/w0/v9</property>
      <property value="-30.6041">fsim/tables/ps_idle_ms/h4/w1/v0</property>
      <property value="-28.4331">fsim/tables/ps_idle_ms/h4/w1/v1</property>
      <property value="-137.487">fsim/tables/ps_idle_ms/h4/w1/v10</property>
      <property value="-158.973">fsim/tables/ps_idle_ms/h4/w1/v11</property>
      <property value="-182.951">fsim/tables/ps_idle_ms/h4/w1/v12</property>
      <property value="-209.332">fsim/tables/ps_idle_ms/h4/w1/v13</property>
      <property value="-237.412">fsim/tables/ps_idle_ms/h4/w1/v14</property>
      <property value="-266.512">fsim/tables/ps_idle_ms/h4/w1/v15</property>
      <property value="-27.9182">fsim/tables/ps_idle_ms/h4/w1/v2</property>
      <property value="-28.5718">fsim/tables/ps_idle_ms/h4/w1/v3</property>
      <property value="-30.0619">fsim/tables/ps_idle_ms/h4/w1/v4</property>
      <property value="-44.5812">fsim/tables/ps_idle_ms/h4/w1/v5</property>
      <property value="-69.9586">fsim/tables/ps_idle_ms/h4/w1/v6</property>
      <property value="-83.6474">fsim/tables/ps_idle_ms/h4/w1/v7</property>
      <property value="-99.5815">fsim/tables/ps_idle_ms/h4/w1/v8</property>
      <property value="-118.003">fsim/tables/ps_idle_ms/h4/w1/v9</property>
      <property value="-33.4305">fsim/tables/ps_idle_ms/h4/w2/v0</property>
      <property value="-30.964">fsim/tables/ps_idle_ms/h4/w2/v1</property>
      <property value="-119.728">fsim/tables/ps_idle_ms/h4/w2/v10</property>
      <property value="-136.889">fsim/tables/ps_idle_ms/h4/w2/v11</property>
      <property value="-156.125">fsim/tables/ps_idle_ms/h4/w2/v12</property>
      <property value="-177.175">fsim/tables/ps_idle_ms/h4/w2/v13</property>
      <property value="-199.792">fsim/tables/ps_idle_ms/h4/w2/v14</property>
      <property value="-223.004">fsim/tables/ps_idle_ms/h4/w2/v15</property>
      <property value="-29.8512">fsim/tables/ps_idle_ms/h4/w2/v2</property>
      <property value="-29.9896">fsim/tables/ps_idle_ms/h4/w2/v3</property>
      <property value="-30.7596">fsim/tables/ps_idle_ms/h4/w2/v4</property>
      <property value="-40.7867">fsim/tables/ps_idle_ms/h4/w2/v5</property>
      <property value="-64.1633">fsim/tables/ps_idle_ms/h4/w2/v6</property>
      <property value="-75.5099">fsim/tables/ps_idle_ms/h4/w2/v7</property>
      <property value="-88.878">fsim/tables/ps_idle_ms/h4/w2/v8</property>
      <property value="-103.819">fsim/tables/ps_idle_ms/h4/w2/v9</property>
      <property value="-34.487">fsim/tables/ps_idle_ms/h5/w0/v0</property>
      <property value="-31.8984">fsim/tables/ps_idle_ms/h5/w0/v1</property>
      <property value="-109.055">fsim/tables/ps_idle_ms/h5/w0/v10</property>
      <property value="-124.009">fsim/tables/ps_idle_ms/h5/w0/v11</property>
      <property value="-141.076">fsim/tables/ps_idle_ms/h5/w0/v12</property>
      <property value="-160.077">fsim/tables/ps_idle_ms/h5/w0/v13</property>
      <property value="-180.554">fsim/tables/ps_idle_ms/h5/w0/v14</property>
      <property value="-202.272">fsim/tables/ps_idle_ms/h5/w0/v15</property>
      <property value="-30.4184">fsim/tables/ps_idle_ms/h5/w0/v2</property>
      <property value="-30.0679">fsim/tables/ps_idle_ms/h5/w0/v3</property>
      <property value="-30.5804">fsim/tables/ps_idle_ms/h5/w0/v4</property>
      <property value="-31.9033">fsim/tables/ps_idle_ms/h5/w0/v5</property>
      <property value="-58.9507">fsim/tables/ps_idle_ms/h5/w0/v6</property>
      <property value="-68.7269">fsim/tables/ps_idle_ms/h5/w0/v7</property>
      <property value="-80.4645">fsim/tables/ps_idle_ms/h5/w0/v8</property>
      <property value="-94.0306">fsim/tables/ps_idle_ms/h5/w0/v9</property>
      <property value="-36.7697">fsim/tables/ps_idle_ms/h5/w1/v0</property>
      <property value="-34.2587">fsim/tables/ps_idle_ms/h5/w1/v1</property>
      <property value="-94.5655">fsim/tables/ps_idle_ms/h5/w1/v10</property>
      <property value="-106.654">fsim/tables/ps_idle_ms/h5/w1/v11</property>
      <property value="-118.661">fsim/tables/ps_idle_ms/h5/w1/v12</property>
      <property value="-131.541">fsim/tables/ps_idle_ms/h5/w1/v13</property>
      <property value="-146.061">fsim/tables/ps_idle_ms/h5/w1/v14</property>
      <property value="-161.443">fsim/tables/ps_idle_ms/h5/w1/v15</property>
      <property value="-32.8786">fsim/tables/ps_idle_ms/h5/w1/v2</property>
      <property value="-32.4813">fsim/tables/ps_idle_ms/h5/w1/v3</property>
      <property value="-32.4916">fsim/tables/ps_idle_ms/h5/w1/v4</property>
      <property value="-33.9208">fsim/tables/ps_idle_ms/h5/w1/v5</property>
      <property value="-57.0526">fsim/tables/ps_idle_ms/h5/w1/v6</property>
      <property value="-64.3275">fsim/tables/ps_idle_ms/h5/w1/v7</property>
      <property value="-73.0509">fsim/tables/ps_idle_ms/h5/w1/v8</property>
      <property value="-83.1168">fsim/tables/ps_idle_ms/h5/w1/v9</property>
      <property value="-39.6081">fsim/tables/ps_idle_ms/h5/w2/v0</property>
      <property value="-37.2743">fsim/tables/ps_idle_ms/h5/w2/v1</property>
      <property value="-80.3975">fsim/tables/ps_idle_ms/h5/w2/v10</property>
      <property value="-89.2629">fsim/tables/ps_idle_ms/h5/w2/v11</property>
      <property value="-98.3376">fsim/tables/ps_idle_ms/h5/w2/v12</property>
      <property value="-106.971">fsim/tables/ps_idle_ms/h5/w2/v13</property>
      <property value="-116.885">fsim/tables/ps_idle_ms/h5/w2/v14</property>
      <property value="-127.25">fsim/tables/ps_idle_ms/h5/w2/v15</property>
      <property value="-35.7662">fsim/tables/ps_idle_ms/h5/w2/v2</property>
      <property value="-34.9547">fsim/tables/ps_idle_ms/h5/w2/v3</property>
      <property value="-34.4602">fsim/tables/ps_idle_ms/h5/w2/v4</property>
      <property value="-34.708">fsim/tables/ps_idle_ms/h5/w2/v5</property>
      <property value="-51.3919">fsim/tables/ps_idle_ms/h5/w2/v6</property>
      <property value="-58.5893">fsim/tables/ps_idle_ms/h5/w2/v7</property>
      <property value="-64.8161">fsim/tables/ps_idle_ms/h5/w2/v8</property>
      <property value="-72.1147">fsim/tables/ps_idle_ms/h5/w2/v9</property>
      <property value="-36.2567">fsim/tables/ps_idle_ms/h6/w0/v0</property>
      <property value="-35.4813">fsim/tables/ps_idle_ms/h6/w0/v1</property>
      <property value="-88.3547">fsim/tables/ps_idle_ms/h6/w0/v10</property>
      <property value="-96.6672">fsim/tables/ps_idle_ms/h6/w0/v11</property>
      <property value="-103.794">fsim/tables/ps_idle_ms/h6/w0/v12</property>
      <property value="-112.119">fsim/tables/ps_idle_ms/h6/w0/v13</property>
      <property value="-121.591">fsim/tables/ps_idle_ms/h6/w0/v14</property>
      <property value="-131.6">fsim/tables/ps_idle_ms/h6/w0/v15</property>
      <property value="-34.9672">fsim/tables/ps_idle_ms/h6/w0/v2</property>
      <property value="-34.8403">fsim/tables/ps_idle_ms/h6/w0/v3</property>
      <property value="-40.0092">fsim/tables/ps_idle_ms/h6/w0/v4</property>
      <property value="-55.5293">fsim/tables/ps_idle_ms/h6/w0/v5</property>
      <property value="-60.3626">fsim/tables/ps_idle_ms/h6/w0/v6</property>
      <property value="-65.8757">fsim/tables/ps_idle_ms/h6/w0/v7</property>
      <property value="-72.5952">fsim/tables/ps_idle_ms/h6/w0/v8</property>
      <property value="-80.1875">fsim/tables/ps_idle_ms/h6/w0/v9</property>
      <property value="-39.8091">fsim/tables/ps_idle_ms/h6/w1/v0</property>
      <property value="-38.9993">fsim/tables/ps_idle_ms/h6/w1/v1</property>
      <property value="-64.0958">fsim/tables/ps_idle_ms/h6/w1/v10</property>
      <property value="-67.4337">fsim/tables/ps_idle_ms/h6/w1/v11</property>
      <property value="-71.1628">fsim/tables/ps_idle_ms/h6/w1/v12</property>
      <property value="-75.5237">fsim/tables/ps_idle_ms/h6/w1/v13</property>
      <property value="-80.6166">fsim/tables/ps_idle_ms/h6/w1/v14</property>
      <property value="-86.0782">fsim/tables/ps_idle_ms/h6/w1/v15</property>
      <property value="-38.249">fsim/tables/ps_idle_ms/h6/w1/v2</property>
      <property value="-37.8633">fsim/tables/ps_idle_ms/h6/w1/v3</property>
      <property value="-37.652">fsim/tables/ps_idle_ms/h6/w1/v4</property>
      <property value="-39.9674">fsim/tables/ps_idle_ms/h6/w1/v5</property>
      <property value="-50.7703">fsim/tables/ps_idle_ms/h6/w1/v6</property>
      <property value="-55.5872">fsim/tables/ps_idle_ms/h6/w1/v7</property>
      <property value="-58.2003">fsim/tables/ps_idle_ms/h6/w1/v8</property>
      <property value="-61.0799">fsim/tables/ps_idle_ms/h6/w1/v9</property>
      <property value="-42.8976">fsim/tables/ps_idle_ms/h6/w2/v0</property>
      <property value="-42.0572">fsim/tables/ps_idle_ms/h6/w2/v1</property>
      <property value="-57.1051">fsim/tables/ps_idle_ms/h6/w2/v10</property>
      <property value="-58.7633">fsim/tables/ps_idle_ms/h6/w2/v11</property>
      <property value="-61.1083">fsim/tables/ps_idle_ms/h6/w2/v12</property>
      <property value="-64.0084">fsim/tables/ps_idle_ms/h6/w2/v13</property>
      <property value="-67.2879">fsim/tables/ps_idle_ms/h6/w2/v14</property>
      <property value="-70.3724">fsim/tables/ps_idle_ms/h6/w2/v15</property>
      <property value="-41.6686">fsim/tables/ps_idle_ms/h6/w2/v2</property>
      <property value="-41.2604">fsim/tables/ps_idle_ms/h6/w2/v3</property>
      <property value="-41.0495">fsim/tables/ps_idle_ms/h6/w2/v4</property>
      <property value="-41.2227">fsim/tables/ps_idle_ms/h6/w2/v5</property>
      <property value="-45.4164">fsim/tables/ps_idle_ms/h6/w2/v6</property>
      <property value="-51.8848">fsim/tables/ps_idle_ms/h6/w2/v7</property>
      <property value="-55.2097">fsim/tables/ps_idle_ms/h6/w2/v8</property>
      <property value="-56.1269">fsim/tables/ps_idle_ms/h6/w2/v9</property>
      <property value="402.967">fsim/tables/reach_tas_ms/h0/w0</property>
      <property value="402.413">fsim/tables/reach_tas_ms/h0/w1</property>
      <property value="401.916">fsim/tables/reach_tas_ms/h0/w2</property>
      <property value="445.713">fsim/tables/reach_tas_ms/h1/w0</property>
      <property value="444.753">fsim/tables/reach_tas_ms/h1/w1</property>
      <property value="443.823">fsim/tables/reach_tas_ms/h1/w2</property>
      <property value="503.179">fsim/tables/reach_tas_ms/h2/w0</property>
      <property value="500.972">fsim/tables/reach_tas_ms/h2/w1</property>
      <property value="498.764">fsim/tables/reach_tas_ms/h2/w2</property>
      <property value="591.582">fsim/tables/reach_tas_ms/h3/w0</property>
      <property value="584.241">fsim/tables/reach_tas_ms/h3/w1</property>
      <property value="576.893">fsim/tables/reach_tas_ms/h3/w2</property>
      <property value="588.063">fsim/tables/reach_tas_ms/h4/w0</property>
      <property value="576.369">fsim/tables/reach_tas_ms/h4/w1</property>
      <property value="558.49">fsim/tables/reach_tas_ms/h4/w2</property>
      <property value="542.609">fsim/tables/reach_tas_ms/h5/w0</property>
      <property value="516.611">fsim/tables/reach_tas_ms/h5/w1</property>
      <property value="481.802">fsim/tables/reach_tas_ms/h5/w2</property>
      <property value="493.603">fsim/tables/reach_tas_ms/h6/w0</property>
      <property value="412.913">fsim/tables/reach_tas_ms/h6/w1</property>
      <property value="0.0">fsim/tables/speed_fraction/v0</property>
      <property value="0.0666667">fsim/tables/speed_fraction/v1</property>
      <property value="0.666667">fsim/tables/speed_fraction/v10</property>
      <property value="0.733333">fsim/tables/speed_fraction/v11</property>
      <property value="0.8">fsim/tables/speed_fraction/v12</property>
      <property value="0.866667">fsim/tables/speed_fraction/v13</property>
      <property value="0.933333">fsim/tables/speed_fraction/v14</property>
      <property value="1">fsim/tables/speed_fraction/v15</property>
      <property value="0.133333">fsim/tables/speed_fraction/v2</property>
      <property value="0.2">fsim/tables/speed_fraction/v3</property>
      <property value="0.266667">fsim/tables/speed_fraction/v4</property>
      <property value="0.333333">fsim/tables/speed_fraction/v5</property>
      <property value="0.4">fsim/tables/speed_fraction/v6</property>
      <property value="0.466667">fsim/tables/speed_fraction/v7</property>
      <property value="0.533333">fsim/tables/speed_fraction/v8</property>
      <property value="0.6">fsim/tables/speed_fraction/v9</property>
      <property value="52.7656">fsim/tables/stall_cas_ms/h0/w0</property>
      <property value="56.5848">fsim/tables/stall_cas_ms/h0/w1</property>
      <property value="60.162">fsim/tables/stall_cas_ms/h0/w2</property>
      <property value="53.034">fsim/tables/stall_cas_ms/h1/w0</property>
      <property value="56.8726">fsim/tables/stall_cas_ms/h1/w1</property>
      <property value="60.468">fsim/tables/stall_cas_ms/h1/w2</property>
      <property value="53.7952">fsim/tables/stall_cas_ms/h2/w0</property>
      <property value="57.6889">fsim/tables/stall_cas_ms/h2/w1</property>
      <property value="61.3359">fsim/tables/stall_cas_ms/h2/w2</property>
      <property value="54.2707">fsim/tables/stall_cas_ms/h3/w0</property>
      <property value="58.1988">fsim/tables/stall_cas_ms/h3/w1</property>
      <property value="61.8781">fsim/tables/stall_cas_ms/h3/w2</property>
      <property value="55.1714">fsim/tables/stall_cas_ms/h4/w0</property>
      <property value="59.1648">fsim/tables/stall_cas_ms/h4/w1</property>
      <property value="62.9051">fsim/tables/stall_cas_ms/h4/w2</property>
      <property value="55.7828">fsim/tables/stall_cas_ms/h5/w0</property>
      <property value="59.8204">fsim/tables/stall_cas_ms/h5/w1</property>
      <property value="63.6022">fsim/tables/stall_cas_ms/h5/w2</property>
      <property value="56.3578">fsim/tables/stall_cas_ms/h6/w0</property>
      <property value="60.437">fsim/tables/stall_cas_ms/h6/w1</property>
      <property value="64.2578">fsim/tables/stall_cas_ms/h6/w2</property>
      <property value="7200">fsim/tables/weight_kg/w0</property>
      <property value="8280">fsim/tables/weight_kg/w1</property>
      <property value="9360">fsim/tables/weight_kg/w2</property>
      <channel name="Pitch (fly-by-wire)">
        <!-- hangar: load factor command, alpha and pitch-rate inner loop (hangar/fcs.py) -->
        <summer name="fcs/pitch-trim-sum">
          <input>fcs/elevator-cmd-norm</input>
          <input>fcs/pitch-trim-cmd-norm</input>
          <clipto> <min>-1</min> <max>1</max> </clipto>
        </summer>
        <!-- the integrators are reset below 60 kt and while a wheel carries weight
             (on the ground, taking off and landing) -->
        <switch name="fcs/fbw/reset">
          <default value="0"/>
          <test logic="OR" value="-1">
            velocities/vc-kts lt 60
            gear/wow gt 0
          </test>
        </switch>
        <fcs_function name="fcs/fbw/k-alpha">
          <function>
            <table>
              <independentVar lookup="row">aero/qbar-psf</independentVar>
              <independentVar lookup="column">velocities/mach</independentVar>
              <tableData>
                       0.150     0.400     0.700     0.900     1.100     1.400     2.000
              10.0  -3.13829  -3.17950  -2.96702  -2.58598  -4.65987  -6.00000  -6.00000
              20.0  -1.70898  -1.77789  -1.66417  -1.44210  -2.53924  -4.40504  -5.39551
              40.0  -1.00243  -1.07821  -1.01310  -0.87036  -1.47915  -2.54972  -3.08474
              80.0  -0.65118  -0.77807  -0.75511  -0.63695  -0.81380  -1.08252  -0.90768
             150.0  -0.63529  -0.76921  -0.75889  -0.64092  -0.82550  -1.09319  -0.69698
             300.0  -0.63541  -0.72033  -0.72320  -0.61336  -0.79470  -1.08582  -0.74970
             600.0  -0.76126  -0.66220  -0.67600  -0.57644  -0.74099  -1.03036  -0.74014
            1200.0  -1.44007  -0.53433  -0.48598  -0.37856  -0.37024  -0.60008  -0.58824
            2400.0  -4.49167  -0.60569  -0.40074  -0.27928  -0.15071  -0.17061  -0.02275
              </tableData>
            </table>
          </function>
        </fcs_function>
        <fcs_function name="fcs/fbw/k-q">
          <function>
            <table>
              <independentVar lookup="row">aero/qbar-psf</independentVar>
              <independentVar lookup="column">velocities/mach</independentVar>
              <tableData>
                       0.150     0.400     0.700     0.900     1.100     1.400     2.000
              10.0  -2.80558  -2.89597  -2.72769  -2.40392  -3.00000  -3.00000  -3.00000
              20.0  -1.32229  -1.41742  -1.34692  -1.18992  -2.21705  -3.00000  -3.00000
              40.0  -0.58037  -0.67813  -0.65654  -0.58292  -1.09072  -1.93021  -2.42926
              80.0  -0.21372  -0.34562  -0.36298  -0.33850  -0.63641  -1.03809  -1.01999
             150.0  -0.10990  -0.24211  -0.26428  -0.24804  -0.47034  -0.77260  -0.84991
             300.0  -0.01961  -0.14960  -0.17445  -0.16622  -0.31934  -0.53424  -0.60522
             600.0   0.05173  -0.08340  -0.11063  -0.10842  -0.21253  -0.36176  -0.41635
            1200.0   0.14911  -0.01500  -0.04302  -0.04490  -0.09584  -0.19364  -0.27072
            2400.0   0.31790   0.03238  -0.00073  -0.00780  -0.02703  -0.07304  -0.12011
              </tableData>
            </table>
          </function>
        </fcs_function>
        <fcs_function name="fcs/fbw/k-ff">
          <function>
            <table>
              <independentVar lookup="row">aero/qbar-psf</independentVar>
              <independentVar lookup="column">velocities/mach</independentVar>
              <tableData>
                       0.150     0.400     0.700     0.900     1.100     1.400     2.000
              10.0  -0.30000  -0.30000  -0.30000  -0.30000  -0.30000  -0.30000  -0.30000
              20.0  -0.30000  -0.30000  -0.30000  -0.30000  -0.30000  -0.30000  -0.30000
              40.0  -0.30000  -0.30000  -0.30000  -0.30000  -0.30000  -0.30000  -0.30000
              80.0  -0.11869  -0.11669  -0.11035  -0.09980  -0.19508  -0.30000  -0.30000
             150.0  -0.06694  -0.06587  -0.06246  -0.05655  -0.11226  -0.19667  -0.24362
             300.0  -0.03400  -0.03344  -0.03169  -0.02867  -0.05730  -0.10199  -0.13211
             600.0  -0.01701  -0.01673  -0.01585  -0.01435  -0.02871  -0.05121  -0.06690
            1200.0  -0.00557  -0.00538  -0.00485  -0.00414  -0.00838  -0.01780  -0.03056
            2400.0  -0.00139  -0.00134  -0.00121  -0.00103  -0.00209  -0.00445  -0.00764
              </tableData>
            </table>
          </function>
        </fcs_function>
        <fcs_function name="fcs/fbw/k-i">
          <function>
            <table>
              <independentVar lookup="row">aero/qbar-psf</independentVar>
              <independentVar lookup="column">velocities/mach</independentVar>
              <tableData>
                       0.150     0.400     0.700     0.900     1.100     1.400     2.000
              10.0  -0.60000  -0.60000  -0.60000  -0.60000  -0.60000  -0.60000  -0.60000
              20.0  -0.60000  -0.60000  -0.60000  -0.60000  -0.60000  -0.60000  -0.60000
              40.0  -0.56325  -0.54650  -0.49775  -0.42870  -0.60000  -0.60000  -0.60000
              80.0  -0.11869  -0.11669  -0.11035  -0.09980  -0.19508  -0.33944  -0.38562
             150.0  -0.06694  -0.06587  -0.06246  -0.05655  -0.11226  -0.19667  -0.24362
             300.0  -0.03400  -0.03344  -0.03169  -0.02867  -0.05730  -0.10199  -0.13211
             600.0  -0.01701  -0.01673  -0.01585  -0.01435  -0.02871  -0.05121  -0.06690
            1200.0  -0.00557  -0.00538  -0.00485  -0.00414  -0.00838  -0.01780  -0.03056
            2400.0  -0.00139  -0.00134  -0.00121  -0.00103  -0.00209  -0.00445  -0.00764
              </tableData>
            </table>
          </function>
        </fcs_function>
        <fcs_function name="fcs/fbw/n-alpha">
          <function>
            <table>
              <independentVar lookup="row">aero/qbar-psf</independentVar>
              <independentVar lookup="column">velocities/mach</independentVar>
              <tableData>
                       0.150     0.400     0.700     0.900     1.100     1.400     2.000
              10.0   1.00000   1.00000   1.00000   1.00000   1.00000   1.00000   1.00000
              20.0   1.00000   1.00000   1.00000   1.00000   1.00000   1.00000   1.00000
              40.0   1.00000   1.00000   1.00000   1.00000   1.00000   1.00000   1.00000
              80.0   3.95814   4.04062   4.28060   4.55013   4.49687   3.67647   2.11863
             150.0   7.28907   7.40805   7.75262   8.16889   8.08663   6.91647   5.39148
             300.0  13.85202  14.09159  14.79320  15.65304  15.48312  13.10178  10.14573
             600.0  27.45742  27.95411  29.40305  31.16614  30.81771  25.90200  19.73822
            1200.0  55.05139  56.05024  58.96176  62.49188  61.79425  51.92340  39.52787
            2400.0 110.31578 112.31572 118.14358 125.20382 123.80856 104.05280  79.23403
              </tableData>
            </table>
          </function>
        </fcs_function>
        <!-- the pitching moment's departures from a straight line through the
             angle-of-attack envelope (+0.336 per rad about the CG), cancelled by the
             elevator: the gains are designed on the line -->
        <fcs_function name="fcs/fbw/moment-comp">
          <function>
            <table>
              <independentVar lookup="row">aero/alpha-rad</independentVar>
              <independentVar lookup="column">velocities/mach</independentVar>
              <tableData>
                       0.150     0.400     0.700     0.900     1.100     1.400     2.000
          -0.17453   0.00140   0.00137   0.00128   0.00112   0.00208   0.00363   0.00453
          -0.15708   0.00101   0.00098   0.00091   0.00080   0.00149   0.00260   0.00324
          -0.13963   0.00058   0.00057   0.00053   0.00046   0.00086   0.00150   0.00187
          -0.12217   0.00076   0.00074   0.00069   0.00061   0.00112   0.00197   0.00245
          -0.10472   0.00090   0.00088   0.00081   0.00071   0.00132   0.00232   0.00289
          -0.08727   0.00237   0.00232   0.00215   0.00189   0.00350   0.00613   0.00763
          -0.06981   0.00342   0.00334   0.00310   0.00273   0.00505   0.00884   0.01101
          -0.05236   0.00410   0.00401   0.00373   0.00327   0.00607   0.01061   0.01322
          -0.03491   0.00400   0.00391   0.00364   0.00319   0.00592   0.01035   0.01289
          -0.01745   0.00235   0.00230   0.00213   0.00187   0.00347   0.00608   0.00757
           0.00000   0.00111   0.00108   0.00101   0.00088   0.00164   0.00287   0.00357
           0.01745   0.00016   0.00015   0.00014   0.00013   0.00023   0.00041   0.00051
           0.03491  -0.00061  -0.00059  -0.00055  -0.00049  -0.00090  -0.00157  -0.00196
           0.05236  -0.00138  -0.00135  -0.00125  -0.00110  -0.00204  -0.00357  -0.00444
           0.06981  -0.00211  -0.00206  -0.00191  -0.00168  -0.00311  -0.00545  -0.00678
           0.08727  -0.00277  -0.00271  -0.00252  -0.00221  -0.00410  -0.00717  -0.00893
           0.10472  -0.00338  -0.00330  -0.00307  -0.00269  -0.00499  -0.00874  -0.01089
           0.12217  -0.00384  -0.00376  -0.00349  -0.00306  -0.00568  -0.00994  -0.01238
           0.13963  -0.00414  -0.00405  -0.00376  -0.00330  -0.00612  -0.01071  -0.01334
           0.15708  -0.00420  -0.00410  -0.00381  -0.00335  -0.00620  -0.01085  -0.01351
           0.17453  -0.00399  -0.00390  -0.00363  -0.00319  -0.00590  -0.01033  -0.01287
           0.19199  -0.00355  -0.00347  -0.00322  -0.00283  -0.00525  -0.00918  -0.01143
           0.20944  -0.00289  -0.00282  -0.00262  -0.00230  -0.00427  -0.00747  -0.00931
           0.22689  -0.00209  -0.00204  -0.00190  -0.00167  -0.00309  -0.00541  -0.00674
           0.24435  -0.00121  -0.00119  -0.00110  -0.00097  -0.00179  -0.00314  -0.00391
           0.26180  -0.00071  -0.00069  -0.00064  -0.00056  -0.00104  -0.00183  -0.00227
           0.27925  -0.00180  -0.00176  -0.00164  -0.00144  -0.00266  -0.00466  -0.00580
           0.29671  -0.00397  -0.00388  -0.00361  -0.00317  -0.00587  -0.01028  -0.01280
           0.31416  -0.00282  -0.00276  -0.00256  -0.00225  -0.00417  -0.00730  -0.00910
           0.33161  -0.00084  -0.00082  -0.00076  -0.00067  -0.00124  -0.00217  -0.00270
           0.34907   0.00119   0.00116   0.00108   0.00095   0.00176   0.00308   0.00384
           0.36652   0.00311   0.00304   0.00283   0.00248   0.00460   0.00805   0.01002
           0.38397   0.00468   0.00457   0.00425   0.00373   0.00691   0.01210   0.01507
           0.40143   0.00562   0.00550   0.00511   0.00448   0.00831   0.01454   0.01811
           0.41888   0.00571   0.00558   0.00518   0.00455   0.00844   0.01476   0.01839
           0.43633   0.00473   0.00463   0.00430   0.00377   0.00700   0.01224   0.01525
           0.45379   0.00276   0.00269   0.00250   0.00220   0.00407   0.00713   0.00888
           0.47124   0.00010   0.00010   0.00009   0.00008   0.00014   0.00025   0.00031
           0.48869  -0.00318  -0.00311  -0.00289  -0.00254  -0.00470  -0.00823  -0.01025
              </tableData>
            </table>
          </function>
        </fcs_function>
        <!-- the gravity reference: the load factor that holds the flight path -->
        <fcs_function name="fcs/fbw/g-ref">
          <function>
            <product>
              <cos><property>attitude/theta-rad</property></cos>
              <cos><property>attitude/phi-rad</property></cos>
            </product>
          </function>
        </fcs_function>
        <!-- stick to load factor beyond the gravity reference, aft (negative) to n_max,
             no more than the lift at the angle-of-attack limits gives - beyond the
             gravity reference of the moment, so that full aft stick still reaches
             the limit in a steep climb or inverted - through a 0.2 s prefilter and
             a 12 g/s onset limit (a full pull at once pitches an agile airframe
             faster than its nose-down control can stop at the angle-of-attack
             limit) -->
        <fcs_function name="fcs/fbw/dn-stick">
          <function>
            <max>
              <min>
                <table>
                  <independentVar lookup="row">fcs/pitch-trim-sum</independentVar>
                  <tableData>
                    -1.0  8.000
                     0.0  0.0
                     1.0  -4.000
                  </tableData>
                </table>
                <difference><product><property>fcs/fbw/n-alpha</property><value>0.48869</value></product><property>fcs/fbw/g-ref</property></difference>
              </min>
              <difference><product><property>fcs/fbw/n-alpha</property><value>-0.17453</value></product><property>fcs/fbw/g-ref</property></difference>
            </max>
          </function>
        </fcs_function>
        <lag_filter name="fcs/fbw/dn-lag">
          <input>fcs/fbw/dn-stick</input>
          <c1>5.0</c1>
        </lag_filter>
        <actuator name="fcs/fbw/dn-cmd">
          <input>fcs/fbw/dn-lag</input>
          <rate_limit>12.0</rate_limit>
        </actuator>
        <!-- the response the command should produce (the short period's rise): the
             integrator trims away what differs from it, not the rise itself -->
        <lag_filter name="fcs/fbw/dn-model">
          <input>fcs/fbw/dn-cmd</input>
          <c1>2.5</c1>
        </lag_filter>
        <fcs_function name="fcs/fbw/dn">
          <function>
            <difference><property>accelerations/Nz</property><property>fcs/fbw/g-ref</property></difference>
          </function>
        </fcs_function>
        <!-- the angle of attack with its rise over the next 0.35 s counted as spent
             (the rise, not the pitch rate: in a steady pull the nose turns with the
             flight path and the angle of attack holds), and the load factor the
             angle of attack left to each limit gives -->
        <fcs_function name="fcs/fbw/alpha-ahead">
          <function>
            <sum>
              <property>aero/alpha-rad</property>
              <product><value>0.35</value><property>aero/alphadot-rad_sec</property></product>
            </sum>
          </function>
        </fcs_function>
        <fcs_function name="fcs/fbw/dn-room-up">
          <function>
            <product><property>fcs/fbw/n-alpha</property>
              <difference><value>0.48869</value><property>fcs/fbw/alpha-ahead</property></difference></product>
          </function>
        </fcs_function>
        <fcs_function name="fcs/fbw/dn-room-down">
          <function>
            <product><property>fcs/fbw/n-alpha</property>
              <difference><value>-0.17453</value><property>fcs/fbw/alpha-ahead</property></difference></product>
          </function>
        </fcs_function>
        <!-- the command limited to the load factor the aircraft pulls now plus what
             the angle of attack left gives: at a limit the feedforward asks for the
             load factor the airframe gives there, whatever elevator holds it - a
             steady pull on a stable airframe, a push on an unstable one (a
             feedforward faded out past the limit instead took about 10 deg of
             elevator per deg of alpha, on one side of it only: the actuator's rate
             limit could not follow, and the MiG-29A cycled between 24 and 29 deg) -->
        <fcs_function name="fcs/fbw/dn-limited">
          <function>
            <max>
              <min>
                <property>fcs/fbw/dn-cmd</property>
                <sum><property>fcs/fbw/dn</property><property>fcs/fbw/dn-room-up</property></sum>
              </min>
              <sum><property>fcs/fbw/dn</property><property>fcs/fbw/dn-room-down</property></sum>
            </max>
          </function>
        </fcs_function>
        <!-- the integrator's error: the load factor's departure from the model
             response, and at a limit the angle of attack left, counted five times -
             it trims what the airframe needs there beyond the linear design (vortex
             lift, the tail's power at high alpha) in a fraction of a second, not
             over the pull -->
        <fcs_function name="fcs/fbw/pitch-error">
          <function>
            <max>
              <min>
                <difference><property>fcs/fbw/dn-model</property><property>fcs/fbw/dn</property></difference>
                <product><value>5.0</value><property>fcs/fbw/dn-room-up</property></product>
              </min>
              <product><value>5.0</value><property>fcs/fbw/dn-room-down</property></product>
            </max>
          </function>
        </fcs_function>
        <fcs_function name="fcs/fbw/pitch-error-rate">
          <function><product><property>fcs/fbw/k-i</property><property>fcs/fbw/pitch-error</property></product></function>
        </fcs_function>
        <!-- the integrator: reset below 60 kt and on the wheels, held while the
             elevator is at a stop it would push further into (anti-windup) -->
        <switch name="fcs/fbw/pitch-hold">
          <default value="0"/>
          <test logic="OR" value="-1">
            velocities/vc-kts lt 60
            gear/wow gt 0
          </test>
          <test logic="AND" value="1">
            fcs/fbw/elevator-raw gt 0.87266
            fcs/fbw/pitch-error-rate gt 0
          </test>
          <test logic="AND" value="1">
            fcs/fbw/elevator-raw lt -0.43633
            fcs/fbw/pitch-error-rate lt 0
          </test>
        </switch>
        <integrator name="fcs/fbw/pitch-integral">
          <input>fcs/fbw/pitch-error-rate</input>
          <c1>1.0</c1>
          <trigger>fcs/fbw/pitch-hold</trigger>
          <clipto> <min>-0.5</min> <max>0.5</max> </clipto>
        </integrator>
        <!-- past an angle-of-attack limit (the next 0.35 s counted) a push back
             in proportion, all the travel 4 deg beyond: an unstable airframe
             pitching up fast needs it at once, not when an integrator winds -->
        <fcs_function name="fcs/fbw/alpha-push">
          <function>
            <difference>
              <product><value>12.50000</value>
                <max><value>0</value><difference><property>fcs/fbw/alpha-ahead</property><value>0.48869</value></difference></max></product>
              <product><value>6.25000</value>
                <max><value>0</value><difference><value>-0.17453</value><property>fcs/fbw/alpha-ahead</property></difference></max></product>
            </difference>
          </function>
        </fcs_function>
        <lag_filter name="fcs/fbw/ground">
          <input>gear/wow</input>
          <c1>2.0</c1>
        </lag_filter>
        <fcs_function name="fcs/fbw/ground-direct">
          <function>
            <product>
              <property>fcs/fbw/ground</property>
              <table>
                <independentVar lookup="row">fcs/pitch-trim-sum</independentVar>
                <tableData>
                  -1.0  -0.43633
                   0.0  0.0
                   1.0  0.87266
                </tableData>
              </table>
            </product>
          </function>
        </fcs_function>
        <!-- the elevator: the push, the moment compensation, angle-of-attack and
             pitch-rate feedback, the feedforward of the limited command, the
             integrator, the ground mode's direct stick -->
        <fcs_function name="fcs/fbw/elevator-raw">
          <function>
            <sum>
              <property>fcs/fbw/alpha-push</property>
              <property>fcs/fbw/moment-comp</property>
              <product><value>-1</value><property>fcs/fbw/k-alpha</property><property>aero/alpha-rad</property></product>
              <product><value>-1</value><property>fcs/fbw/k-q</property><property>velocities/q-rad_sec</property></product>
              <product><property>fcs/fbw/k-ff</property><property>fcs/fbw/dn-limited</property></product>
              <property>fcs/fbw/pitch-integral</property>
              <property>fcs/fbw/ground-direct</property>
            </sum>
          </function>
        </fcs_function>
        <pure_gain name="fcs/fbw/elevator">
          <input>fcs/fbw/elevator-raw</input>
          <gain>1.0</gain>
          <clipto> <min>-0.43633</min> <max>0.87266</max> </clipto>
        </pure_gain>
        <!-- full travel in 0.83 s: 60 deg/s for a +-25 deg tail, faster for a
             canard's longer throw -->
        <actuator name="fcs/elevator-actuator">
          <input>fcs/fbw/elevator</input>
          <lag>40</lag>
          <rate_limit>1.577</rate_limit>
          <output>fcs/elevator-pos-rad</output>
        </actuator>
      </channel>
      <channel name="Roll (fly-by-wire)">
        <!-- hangar: roll-rate command about the flight path, limited to what the rudder can
             coordinate; bank hold at neutral stick -->
        <summer name="fcs/roll-trim-sum">
          <input>fcs/aileron-cmd-norm</input>
          <input>fcs/roll-trim-cmd-norm</input>
          <clipto> <min>-1</min> <max>1</max> </clipto>
        </summer>
        <fcs_function name="fcs/fbw/k-roll">
          <function>
            <table>
              <independentVar lookup="row">aero/qbar-psf</independentVar>
              <independentVar lookup="column">velocities/mach</independentVar>
              <tableData>
                       0.150     0.400     0.700     0.900     1.100     1.400     2.000
              10.0   1.50000   1.50000   1.50000   1.50000   1.50000   1.50000   1.50000
              20.0   1.19783   1.21459   1.12471   0.97141   1.50000   1.50000   1.50000
              40.0   0.55782   0.59204   0.55395   0.47973   0.89135   1.50000   1.50000
              80.0   0.11618   0.19443   0.19622   0.17265   0.32632   0.59158   0.77759
             150.0   0.02083   0.08578   0.09353   0.08402   0.16065   0.29531   0.38775
             300.0   0.00000   0.02772   0.03815   0.03576   0.07089   0.13624   0.18317
             600.0   0.00000   0.00000   0.00977   0.01126   0.02551   0.05661   0.08396
            1200.0   0.00000   0.00000   0.00000   0.00000   0.00282   0.01677   0.03428
            2400.0   0.00000   0.00000   0.00000   0.00000   0.00000   0.00000   0.00949
              </tableData>
            </table>
          </function>
        </fcs_function>
        <fcs_function name="fcs/fbw/k-roll-ff">
          <function>
            <table>
              <independentVar lookup="row">aero/qbar-psf</independentVar>
              <independentVar lookup="column">velocities/mach</independentVar>
              <tableData>
                       0.150     0.400     0.700     0.900     1.100     1.400     2.000
              10.0   0.08219   0.03052   0.01682   0.01194   0.01787   0.02070   0.01375
              20.0   0.08219   0.03052   0.01682   0.01194   0.01787   0.02070   0.01375
              40.0   0.08219   0.03052   0.01682   0.01194   0.01787   0.02070   0.01375
              80.0   0.13569   0.05037   0.02772   0.01936   0.02906   0.03338   0.01593
             150.0   0.10862   0.04006   0.02166   0.01507   0.02264   0.02802   0.02087
             300.0   0.09350   0.03467   0.01904   0.01348   0.02018   0.02367   0.01630
             600.0   0.09165   0.03403   0.01874   0.01330   0.01990   0.02310   0.01541
            1200.0   0.09139   0.03394   0.01870   0.01327   0.01986   0.02302   0.01531
            2400.0   0.09131   0.03391   0.01868   0.01326   0.01985   0.02300   0.01528
              </tableData>
            </table>
          </function>
        </fcs_function>
        <fcs_function name="fcs/fbw/k-roll-i">
          <function>
            <table>
              <independentVar lookup="row">aero/qbar-psf</independentVar>
              <independentVar lookup="column">velocities/mach</independentVar>
              <tableData>
                       0.150     0.400     0.700     0.900     1.100     1.400     2.000
              10.0   0.22756   0.22135   0.20294   0.17482   0.32328   0.56711   0.70626
              20.0   0.11378   0.11068   0.10147   0.08741   0.16164   0.28355   0.35313
              40.0   0.05689   0.05534   0.05073   0.04370   0.08082   0.14178   0.17656
              80.0   0.02239   0.02176   0.01991   0.01707   0.03159   0.05555   0.07054
             150.0   0.01151   0.01119   0.01024   0.00881   0.01629   0.02874   0.03632
             300.0   0.00570   0.00555   0.00508   0.00438   0.00810   0.01421   0.01773
             600.0   0.00284   0.00276   0.00253   0.00218   0.00404   0.00709   0.00883
            1200.0   0.00142   0.00138   0.00127   0.00109   0.00202   0.00354   0.00441
            2400.0   0.00071   0.00069   0.00063   0.00054   0.00101   0.00177   0.00220
              </tableData>
            </table>
          </function>
        </fcs_function>
        <fcs_function name="fcs/fbw/p-max">
          <function>
            <table>
              <independentVar lookup="row">aero/qbar-psf</independentVar>
              <independentVar lookup="column">velocities/mach</independentVar>
              <tableData>
                       0.150     0.400     0.700     0.900     1.100     1.400     2.000
              10.0   4.24722   4.88692   4.88692   4.88692   4.88692   4.88692   4.88692
              20.0   4.24722   4.88692   4.88692   4.88692   4.88692   4.88692   4.88692
              40.0   4.24722   4.88692   4.88692   4.88692   4.88692   4.88692   4.88692
              80.0   2.57261   4.88692   4.88692   4.88692   4.88692   4.88692   4.88692
             150.0   3.21356   4.88692   4.88692   4.88692   4.88692   4.88692   4.88692
             300.0   3.73347   4.88692   4.88692   4.88692   4.88692   4.88692   4.88692
             600.0   3.80866   4.88692   4.88692   4.88692   4.88692   4.88692   4.88692
            1200.0   3.81969   4.88692   4.88692   4.88692   4.88692   4.88692   4.88692
            2400.0   3.82283   4.88692   4.88692   4.88692   4.88692   4.88692   4.88692
              </tableData>
            </table>
          </function>
        </fcs_function>
        <!-- the stick's rate halves towards alpha_max -->
        <fcs_function name="fcs/fbw/p-stick">
          <function>
            <product>
              <property>fcs/roll-trim-sum</property>
              <property>fcs/fbw/p-max</property>
              <table>
                <independentVar lookup="row">aero/alpha-rad</independentVar>
                <tableData>
                  0.19548 1.0
                  0.48869 0.5
                </tableData>
              </table>
            </product>
          </function>
        </fcs_function>
        <!-- the rudder's yaw acceleration at full travel (1/s^2), and the yaw damping (1/s) -->
        <fcs_function name="fcs/fbw/yaw-accel">
          <function>
            <table>
              <independentVar lookup="row">aero/qbar-psf</independentVar>
              <independentVar lookup="column">velocities/mach</independentVar>
              <tableData>
                       0.150     0.400     0.700     0.900     1.100     1.400     2.000
              10.0   0.05197   0.05293   0.05605   0.06166   0.03460   0.02074   0.02191
              20.0   0.10395   0.10587   0.11210   0.12332   0.06919   0.04148   0.04381
              40.0   0.20789   0.21173   0.22419   0.24664   0.13839   0.08297   0.08763
              80.0   0.48614   0.49596   0.52758   0.58308   0.32687   0.19280   0.19343
             150.0   0.94337   0.96125   1.01906   1.12252   0.62967   0.37586   0.39260
             300.0   1.90124   1.93639   2.05043   2.25554   1.26556   0.75867   0.80032
             600.0   3.79723   3.86715   4.09423   4.50339   2.52684   1.51564   1.60197
            1200.0   7.58074   7.72040   8.17397   8.99147   5.04503   3.02572   3.19759
            2400.0  15.14330  15.42247  16.32916  17.96344  10.07900   6.04394   6.38587
              </tableData>
            </table>
          </function>
        </fcs_function>
        <fcs_function name="fcs/fbw/yaw-damping">
          <function>
            <table>
              <independentVar lookup="row">aero/qbar-psf</independentVar>
              <independentVar lookup="column">velocities/mach</independentVar>
              <tableData>
                       0.150     0.400     0.700     0.900     1.100     1.400     2.000
              10.0   0.03137   0.01198   0.00720   0.00593   0.00480   0.00317   0.00169
              20.0   0.06274   0.02395   0.01440   0.01187   0.00960   0.00634   0.00338
              40.0   0.12548   0.04791   0.02879   0.02373   0.01920   0.01268   0.00676
              80.0   0.24525   0.09348   0.05594   0.04604   0.03726   0.02443   0.01355
             150.0   0.45142   0.17226   0.10333   0.08496   0.06877   0.04571   0.02453
             300.0   0.87665   0.33446   0.20064   0.16501   0.13356   0.08881   0.04794
             600.0   1.71878   0.65597   0.39389   0.32435   0.26247   0.17393   0.09337
            1200.0   3.40871   1.30120   0.78177   0.64418   0.52121   0.34470   0.18436
            2400.0   6.80181   2.59673   1.56053   1.28601   1.04050   0.68756   0.36699
              </tableData>
            </table>
          </function>
        </fcs_function>
        <!-- the rudder's share of the yaw a roll about the flight path needs, per unit of
             its roll acceleration: sin(alpha), less the ailerons' own yaw and what a
             principal axis inclined to the body axis gives -->
        <fcs_function name="fcs/fbw/roll-yaw-share">
          <function>
            <table>
              <independentVar lookup="row">aero/alpha-rad</independentVar>
              <tableData>
                   -0.34907  -0.38746
                   -0.26180  -0.31270
                   -0.17453  -0.23335
                   -0.08727  -0.14888
                    0.00000  -0.05802
                    0.08727   0.03285
                    0.17453   0.11808
                    0.26180   0.19427
                    0.34907   0.26877
                    0.43633   0.33993
                    0.52360   0.41355
                    0.61087   0.49138
                    0.69813   0.56850
                    0.78540   0.64159
                    0.87266   0.70103
              </tableData>
            </table>
          </function>
        </fcs_function>
        <!-- the yaw acceleration each rad/s of roll rate needs while the aircraft pitches
             under it: the pitch rate's inertia coupling, the angle of attack rising, and
             the yaw damping the roll's yaw rate meets -->
        <fcs_function name="fcs/fbw/p-yaw-need">
          <function>
            <abs>
              <sum>
                <product>
                  <sum>
                    <property>aero/alphadot-rad_sec</property>
                    <product><value>0.77752</value><property>velocities/q-rad_sec</property></product>
                  </sum>
                  <cos><property>aero/alpha-rad</property></cos>
                </product>
                <product><property>fcs/fbw/yaw-damping</property><sin><property>aero/alpha-rad</property></sin></product>
              </sum>
            </abs>
          </function>
        </fcs_function>
        <!-- no more roll rate than 0.5 of the rudder's yaw holds: a roll the rudder cannot
             follow turns the angle of attack into sideslip -->
        <fcs_function name="fcs/fbw/p-yaw-max">
          <function>
            <quotient>
              <product><value>0.5</value><property>fcs/fbw/yaw-accel</property></product>
              <max><value>0.001</value><property>fcs/fbw/p-yaw-need</property></max>
            </quotient>
          </function>
        </fcs_function>
        <fcs_function name="fcs/fbw/p-limited">
          <function>
            <max>
              <min><property>fcs/fbw/p-stick</property><property>fcs/fbw/p-yaw-max</property></min>
              <product><value>-1</value><property>fcs/fbw/p-yaw-max</property></product>
            </max>
          </function>
        </fcs_function>
        <!-- and while the rate grows, no faster roll acceleration than all of it
             coordinates, unless the roll asked for could not leave 2.0 deg of sideslip
             even uncoordinated: at worst c^2 p^2 / (8 Y), c the rudder's share, Y its yaw
             acceleration, p the rate asked for -->
        <fcs_function name="fcs/fbw/p-accel">
          <function>
            <product>
              <quotient>
                <property>fcs/fbw/yaw-accel</property>
                <max><value>0.01</value><abs><property>fcs/fbw/roll-yaw-share</property></abs></max>
              </quotient>
              <max>
                <value>1</value>
                <quotient>
                  <product><value>0.27925</value><property>fcs/fbw/yaw-accel</property></product>
                  <sum>
                    <value>1e-9</value>
                    <product>
                      <property>fcs/fbw/roll-yaw-share</property><property>fcs/fbw/roll-yaw-share</property>
                      <property>fcs/fbw/p-limited</property><property>fcs/fbw/p-limited</property>
                    </product>
                  </sum>
                </quotient>
              </max>
            </product>
          </function>
        </fcs_function>
        <!-- a roll is stopped as fast as the ailerons can -->
        <fcs_function name="fcs/fbw/p-accel-up">
          <function>
            <sum><property>fcs/fbw/p-accel</property>
              <product><value>1000</value><lt><property>fcs/fbw/p-cmd</property><value>0</value></lt></product></sum>
          </function>
        </fcs_function>
        <fcs_function name="fcs/fbw/p-accel-down">
          <function>
            <sum><property>fcs/fbw/p-accel</property>
              <product><value>1000</value><gt><property>fcs/fbw/p-cmd</property><value>0</value></gt></product></sum>
          </function>
        </fcs_function>
        <actuator name="fcs/fbw/p-cmd">
          <input>fcs/fbw/p-limited</input>
          <rate_limit sense="incr">fcs/fbw/p-accel-up</rate_limit>
          <rate_limit sense="decr">fcs/fbw/p-accel-down</rate_limit>
        </actuator>
        <fcs_function name="fcs/fbw/p-stability">
          <function>
            <sum>
              <product><property>velocities/p-rad_sec</property><cos><property>aero/alpha-rad</property></cos></product>
              <product><property>velocities/r-rad_sec</property><sin><property>aero/alpha-rad</property></sin></product>
            </sum>
          </function>
        </fcs_function>
        <fcs_function name="fcs/fbw/roll-error-rate">
          <function>
            <product><property>fcs/fbw/k-roll-i</property>
              <difference><property>fcs/fbw/p-cmd</property><property>fcs/fbw/p-stability</property></difference></product>
          </function>
        </fcs_function>
        <integrator name="fcs/fbw/roll-integral">
          <input>fcs/fbw/roll-error-rate</input>
          <c1>1.0</c1>
          <trigger>fcs/fbw/reset</trigger>
          <clipto> <min>-0.21817</min> <max>0.21817</max> </clipto>
        </integrator>
        <fcs_function name="fcs/fbw/aileron">
          <function>
            <sum>
              <product><property>fcs/fbw/k-roll-ff</property><property>fcs/fbw/p-cmd</property></product>
              <product><property>fcs/fbw/k-roll</property>
                <difference><property>fcs/fbw/p-cmd</property><property>fcs/fbw/p-stability</property></difference></product>
              <property>fcs/fbw/roll-integral</property>
            </sum>
          </function>
          <clipto> <min>-0.43633</min> <max>0.43633</max> </clipto>
        </fcs_function>
        <actuator name="fcs/left-aileron-actuator">
          <input>fcs/fbw/aileron</input>
          <lag>40</lag>
          <rate_limit>1.4</rate_limit>
          <output>fcs/left-aileron-pos-rad</output>
        </actuator>
        <pure_gain name="fcs/right-aileron">
          <input>fcs/left-aileron-pos-rad</input>
          <gain>-1</gain>
          <output>fcs/right-aileron-pos-rad</output>
        </pure_gain>
      </channel>
      <channel name="Yaw (fly-by-wire)">
        <!-- hangar: yaw damper, sideslip feedback, pedals command sideslip -->
        <summer name="fcs/yaw-trim-sum">
          <input>fcs/rudder-cmd-norm</input>
          <input>fcs/yaw-trim-cmd-norm</input>
          <clipto> <min>-1</min> <max>1</max> </clipto>
        </summer>
        <fcs_function name="fcs/fbw/k-yaw-r">
          <function>
            <table>
              <independentVar lookup="row">aero/qbar-psf</independentVar>
              <independentVar lookup="column">velocities/mach</independentVar>
              <tableData>
                       0.150     0.400     0.700     0.900     1.100     1.400     2.000
              10.0  -3.00000  -3.00000  -3.00000  -3.00000  -3.00000  -3.00000  -3.00000
              20.0  -3.00000  -3.00000  -3.00000  -3.00000  -3.00000  -3.00000  -3.00000
              40.0  -3.00000  -3.00000  -3.00000  -3.00000  -3.00000  -3.00000  -3.00000
              80.0  -1.94142  -2.06717  -1.93077  -1.69766  -2.96521  -3.00000  -3.00000
             150.0  -0.61871  -0.79266  -0.77152  -0.69131  -1.21447  -2.15828  -2.71408
             300.0  -0.10199  -0.29005  -0.31648  -0.29869  -0.55012  -0.95757  -1.08274
             600.0   0.00000  -0.10246  -0.14110  -0.13920  -0.25491  -0.44144  -0.51085
            1200.0   0.00000  -0.01842  -0.06249  -0.06859  -0.13278  -0.23771  -0.27812
            2400.0   0.00000   0.00000  -0.01918  -0.02921  -0.06486  -0.12983  -0.16344
              </tableData>
            </table>
          </function>
        </fcs_function>
        <fcs_function name="fcs/fbw/k-yaw-beta">
          <function>
            <table>
              <independentVar lookup="row">aero/qbar-psf</independentVar>
              <independentVar lookup="column">velocities/mach</independentVar>
              <tableData>
                       0.150     0.400     0.700     0.900     1.100     1.400     2.000
              10.0   3.00000   3.00000   3.00000   3.00000   3.00000   3.00000   3.00000
              20.0   3.00000   3.00000   3.00000   3.00000   3.00000   3.00000   3.00000
              40.0   2.18692   2.11539   1.91114   1.63685   3.00000   3.00000   3.00000
              80.0   0.00000   0.00000   0.00000   0.00000   0.00000   0.00000   0.00000
             150.0   0.00000   0.00000   0.00000   0.00000   0.00000   0.00000   0.00000
             300.0   0.00000   0.00000   0.00756   0.01974   0.08786   0.16012   0.00000
             600.0   0.00000   0.00000   0.00000   0.00000   0.00000   0.00395   0.00000
            1200.0   0.00000   0.00000   0.00000   0.00000   0.00000   0.00000   0.00000
            2400.0   0.00000   0.00000   0.00000   0.00000   0.00000   0.00000   0.00000
              </tableData>
            </table>
          </function>
        </fcs_function>
        <fcs_function name="fcs/fbw/k-pedal">
          <function>
            <table>
              <independentVar lookup="row">aero/qbar-psf</independentVar>
              <independentVar lookup="column">velocities/mach</independentVar>
              <tableData>
                       0.150     0.400     0.700     0.900     1.100     1.400     2.000
              10.0   0.00000   0.00000   0.00000   0.00000   0.00000   0.00000   0.00000
              20.0   0.00000   0.00000   0.00000   0.00000   0.00000   0.00000   0.00000
              40.0   0.00000   0.00000   0.00000   0.00000   0.00000   0.00000   0.00000
              80.0   0.00000   0.00000   0.00000   0.00000   0.00000   0.00000   0.00000
             150.0   0.00000   0.00000   0.00174   0.00398   0.00587   0.00000   0.00000
             300.0   0.02240   0.02259   0.02292   0.02249   0.03701   0.04350   0.02763
             600.0   0.03206   0.03193   0.03133   0.02970   0.04920   0.06513   0.05924
            1200.0   0.03521   0.03495   0.03401   0.03198   0.05305   0.07234   0.07028
            2400.0   0.03587   0.03556   0.03451   0.03243   0.05379   0.07400   0.07362
              </tableData>
            </table>
          </function>
        </fcs_function>
        <!-- the yaw damper damps the sideslip's rate, the stability-axis yaw rate less
             the one that coordinates the bank and the side force: in the dutch roll the
             yaw rate itself, and zero in a steady coordinated turn, in a roll about the
             flight path and in a steady sideslip - it coordinates those as long as they
             last (a damper on the washed-out yaw rate stopped coordinating a sustained
             roll, and at low speed the roll turned the angle of attack into sideslip) -->
        <!-- on the wheels (the pitch's ground mode, fcs/fbw/ground) the pedals move the rudder
             directly over its travel, a ground law: the sideslip feedback, there the
             crosswind's, turned the nose into it, and as the C-17A's nose wheel unloaded
             towards its rotation it ran 8.6 m off its line across 10 m/s -->
        <fcs_function name="fcs/fbw/rudder">
          <function>
            <sum>
              <product>
                <difference><value>1</value><property>fcs/fbw/ground</property></difference>
                <sum>
                  <product><property>fcs/fbw/k-pedal</property><property>fcs/yaw-trim-sum</property></product>
                  <product><value>-1</value><property>fcs/fbw/k-yaw-beta</property>
                    <difference><property>aero/beta-rad</property>
                      <product><value>0.17453</value><property>fcs/yaw-trim-sum</property></product></difference></product>
                  <product><property>fcs/fbw/k-yaw-r</property><property>aero/betadot-rad_sec</property></product>
                </sum>
              </product>
              <product><property>fcs/fbw/ground</property><value>0.52360</value><property>fcs/yaw-trim-sum</property></product>
            </sum>
          </function>
          <clipto> <min>-0.52360</min> <max>0.52360</max> </clipto>
        </fcs_function>
        <actuator name="fcs/rudder-actuator">
          <input>fcs/fbw/rudder</input>
          <lag>40</lag>
          <rate_limit>1.4</rate_limit>
          <output>fcs/rudder-pos-rad</output>
        </actuator>
        <!-- the nose wheel steers with the pedals (JSBSim steers from fcs/steer-cmd-norm,
             positive right; the rudder command is positive left) -->
        <pure_gain name="fcs/steer-from-rudder">
          <input>fcs/yaw-trim-sum</input>
          <gain>-1</gain>
          <output>fcs/steer-cmd-norm</output>
        </pure_gain>
      </channel>
      <channel name="Speedbrake">
        <kinematic name="fcs/speedbrake-control">
          <input>fcs/speedbrake-cmd-norm</input>
          <traverse>
            <setting> <position>0</position> <time>0</time> </setting>
            <setting> <position>1</position> <time>2.00</time> </setting>
          </traverse>
          <output>fcs/speedbrake-pos-norm</output>
        </kinematic>
      </channel>
      <channel name="Leading-Edge Flaps">
        <fcs_function name="fcs/lef-schedule">
          <function>
            <sum>
              <product> <value>1.38</value> <property>aero/alpha-deg</property> </product>
              <product> <value>-9.05</value>
                <quotient> <property>aero/qbar-psf</property> <property>atmosphere/P-psf</property> </quotient>
              </product>
              <value>1.45</value>
            </sum>
          </function>
          <clipto> <min>-3</min> <max>25</max> </clipto>
        </fcs_function>
        <actuator name="fcs/lef-actuator">
          <input>fcs/lef-schedule</input>
          <lag>7.35</lag>
          <rate_limit>25</rate_limit>
          <output>fcs/lef-pos-deg</output>
        </actuator>
      </channel>
      <channel name="Throttle 0">
        <fcs_function name="fcs/throttle-lever-0">
          <function>
            <table>
              <independentVar lookup="row">fcs/throttle-cmd-norm[0]</independentVar>
              <tableData>
                0.0  0.0
                0.8  1.0
                1.0  2.0
              </tableData>
            </table>
          </function>
          <output>fcs/throttle-pos-norm[0]</output>
        </fcs_function>
      </channel>
      <channel name="Landing Gear">
        <kinematic name="fcs/gear-control">
          <input>gear/gear-cmd-norm</input>
          <traverse>
            <setting> <position>0</position> <time>0</time> </setting>
            <setting> <position>1</position> <time>5</time> </setting>
          </traverse>
          <output>gear/gear-pos-norm</output>
        </kinematic>
      </channel>
    </flight_control>
    <aerodynamics>
        <function name="aero/function/mach-lift">
          <description>lift, and damping, over its low-speed value (hangar: aero/mach.py)</description>
          <table>
            <independentVar lookup="row">velocities/mach</independentVar>
            <tableData>
                 0.000     1.000000
                 0.300     1.012456
                 0.500     1.036412
                 0.600     1.054408
                 0.700     1.077486
                 0.800     1.106674
                 0.850     1.123709
                 0.900     1.141756
                 0.950     1.144924
                 1.000     1.144019
                 1.050     1.138808
                 1.100     1.129055
                 1.200     1.094991
                 1.400     0.949215
                 1.600     0.950685
                 1.800     0.819281
                 2.000     0.723285
                 2.300     0.618203
                 2.600     0.541584
            </tableData>
          </table>
        </function>
        <function name="aero/function/mach-side">
          <description>side force, rolling and yawing moment over their low-speed values</description>
          <table>
            <independentVar lookup="row">velocities/mach</independentVar>
            <tableData>
                 0.000     1.000000
                 0.300     1.006458
                 0.500     1.018731
                 0.600     1.027862
                 0.700     1.039539
                 0.800     1.054489
                 0.850     1.063532
                 0.900     1.073847
                 0.950     1.064158
                 1.000     1.047301
                 1.050     1.025183
                 1.100     0.999712
                 1.200     0.946351
                 1.400     0.826714
                 1.600     1.109046
                 1.800     0.975915
                 2.000     0.873129
                 2.300     0.756132
                 2.600     0.668238
            </tableData>
          </table>
        </function>
        <function name="aero/function/mach-dCm-dCL">
          <description>pitching moment per unit low-speed lift: the neutral point's move</description>
          <table>
            <independentVar lookup="row">velocities/mach</independentVar>
            <tableData>
                 0.000     0.000000
                 0.300    -0.002067
                 0.500    -0.006516
                 0.600    -0.010319
                 0.700    -0.015885
                 0.800    -0.024351
                 0.850    -0.030339
                 0.900    -0.038158
                 0.950    -0.052187
                 1.000    -0.069919
                 1.050    -0.088532
                 1.100    -0.105203
                 1.200    -0.122020
                 1.400    -0.120732
                 1.600    -0.155895
                 1.800    -0.149866
                 2.000    -0.145117
                 2.300    -0.139639
                 2.600    -0.135483
            </tableData>
          </table>
        </function>
        <function name="aero/function/mach-dCD0">
          <description>zero-lift drag's change: friction and wave drag</description>
          <table>
            <independentVar lookup="row">velocities/mach</independentVar>
            <tableData>
                 0.000     0.000000
                 0.300    -0.000097
                 0.500    -0.000265
                 0.600    -0.000377
                 0.700    -0.000505
                 0.800    -0.000649
                 0.850    -0.000726
                 0.900    -0.000807
                 0.950    -0.000855
                 1.000    -0.000378
                 1.050     0.021419
                 1.100     0.021328
                 1.200     0.021140
                 1.400     0.020090
                 1.600     0.019361
                 1.800     0.018691
                 2.000     0.018058
                 2.300     0.017165
                 2.600     0.016336
            </tableData>
          </table>
        </function>
        <function name="aero/function/mach-dK">
          <description>induced-drag factor's change (per CL^2)</description>
          <table>
            <independentVar lookup="row">velocities/mach</independentVar>
            <tableData>
                 0.000     0.000000
                 0.300     0.005132
                 0.500     0.014486
                 0.600     0.021098
                 0.700     0.029098
                 0.800     0.038507
                 0.850     0.043663
                 0.900     0.048875
                 0.950     0.049765
                 1.000     0.049511
                 1.050     0.050133
                 1.100     0.053288
                 1.200     0.065420
                 1.400     0.099052
                 1.600     0.125425
                 1.800     0.102327
                 2.000     0.068905
                 2.300     0.000841
                 2.600    -0.087714
            </tableData>
          </table>
        </function>
        <function name="aero/function/mach-aileron">
          <description>aileron power over its low-speed value</description>
          <table>
            <independentVar lookup="row">velocities/mach</independentVar>
            <tableData>
                 0.000     1.000000
                 0.300     1.018574
                 0.500     1.056578
                 0.600     1.087618
                 0.700     1.131731
                 0.800     1.198245
                 0.850     1.246573
                 0.900     1.313777
                 0.950     1.231680
                 1.000     1.081591
                 1.050     0.896762
                 1.100     0.710446
                 1.200     0.466364
                 1.400     0.404987
                 1.600     0.426036
                 1.800     0.367880
                 2.000     0.325195
                 2.300     0.278307
                 2.600     0.244025
            </tableData>
          </table>
        </function>
        <function name="aero/function/mach-elevator">
          <description>elevator power over its low-speed value</description>
          <table>
            <independentVar lookup="row">velocities/mach</independentVar>
            <tableData>
                 0.000     1.000000
                 0.300     1.015151
                 0.500     1.046477
                 0.600     1.072326
                 0.700     1.109352
                 0.800     1.165569
                 0.850     1.206569
                 0.900     1.263607
                 0.950     1.182007
                 1.000     1.036910
                 1.050     0.859667
                 1.100     0.681627
                 1.200     0.448555
                 1.400     0.389521
                 1.600     0.409766
                 1.800     0.353832
                 2.000     0.312776
                 2.300     0.267679
                 2.600     0.234706
            </tableData>
          </table>
        </function>
        <function name="aero/function/mach-rudder">
          <description>rudder power over its low-speed value</description>
          <table>
            <independentVar lookup="row">velocities/mach</independentVar>
            <tableData>
                 0.000     1.000000
                 0.300     1.012293
                 0.500     1.037141
                 0.600     1.057124
                 0.700     1.085025
                 0.800     1.125948
                 0.850     1.154798
                 0.900     1.193696
                 0.950     1.116340
                 1.000     0.985472
                 1.050     0.827731
                 1.100     0.669755
                 1.200     0.459648
                 1.400     0.401540
                 1.600     0.538670
                 1.800     0.474008
                 2.000     0.424084
                 2.300     0.367258
                 2.600     0.324567
            </tableData>
          </table>
        </function>
        <function name="aero/function/CL-base">
          <description>CL over alpha and beta at low speed</description>
          <table>
            <independentVar lookup="row">aero/alpha-deg</independentVar>
            <independentVar lookup="column">aero/beta-deg</independentVar>
            <tableData>
                        -90.00    -70.00    -50.00    -40.00    -30.00    -25.00    -20.00    -15.00    -10.00     -6.00     -3.00      0.00      3.00      6.00     10.00     15.00     20.00     25.00     30.00     40.00     50.00     70.00     90.00
             -180.00  -0.00000   0.00000   0.00000   0.00000   0.00000   0.00000   0.00000   0.00000   0.00000   0.00000   0.00000   0.00000   0.00000   0.00000   0.00000   0.00000   0.00000   0.00000   0.00000   0.00000   0.00000   0.00000  -0.00000
             -120.00   0.00000   0.09424   0.29218   0.40460   0.50913   0.55461   0.59377   0.62546   0.64877   0.66169   0.66721   0.66773   0.66721   0.66169   0.64877   0.62546   0.59377   0.55461   0.50913   0.40460   0.29218   0.09424   0.00000
              -70.00  -0.00000  -0.07404  -0.23200  -0.32210  -0.40605  -0.44263  -0.47413  -0.49964  -0.51841  -0.52820  -0.53304  -0.53314  -0.53304  -0.52820  -0.51841  -0.49964  -0.47413  -0.44263  -0.40605  -0.32210  -0.23200  -0.07404  -0.00000
              -46.00  -0.00000  -0.28174  -0.71801  -0.95549  -1.15015  -1.20971  -1.25547  -1.30403  -1.35010  -1.37215  -1.38152  -1.38457  -1.38152  -1.37215  -1.35010  -1.30403  -1.25547  -1.20971  -1.15015  -0.95549  -0.71801  -0.28174  -0.00000
              -32.00  -0.00000  -0.38529  -0.68345  -0.90816  -1.13163  -1.22857  -1.30674  -1.35286  -1.37216  -1.37334  -1.36941  -1.36650  -1.36941  -1.37334  -1.37216  -1.35286  -1.30674  -1.22857  -1.13163  -0.90816  -0.68345  -0.38529  -0.00000
              -22.00  -0.00000  -0.30410  -0.51444  -0.67803  -0.84085  -0.91447  -0.98383  -1.04346  -1.09700  -1.12860  -1.14244  -1.14710  -1.14244  -1.12860  -1.09700  -1.04346  -0.98383  -0.91447  -0.84085  -0.67803  -0.51444  -0.30410  -0.00000
              -17.00  -0.00000  -0.24495  -0.40960  -0.54065  -0.67875  -0.73891  -0.79385  -0.84144  -0.87865  -0.89902  -0.90863  -0.91212  -0.90863  -0.89902  -0.87865  -0.84144  -0.79385  -0.73891  -0.67875  -0.54065  -0.40960  -0.24495  -0.00000
              -13.00  -0.00000  -0.19387  -0.31574  -0.41652  -0.52507  -0.57088  -0.61064  -0.64505  -0.67049  -0.68329  -0.68837  -0.68992  -0.68837  -0.68329  -0.67049  -0.64505  -0.61064  -0.57088  -0.52507  -0.41652  -0.31574  -0.19387  -0.00000
               -9.00  -0.00000  -0.14286  -0.21903  -0.29018  -0.36529  -0.39668  -0.42163  -0.44186  -0.45612  -0.46313  -0.46599  -0.46692  -0.46599  -0.46313  -0.45612  -0.44186  -0.42163  -0.39668  -0.36529  -0.29018  -0.21903  -0.14286  -0.00000
               -5.00  -0.00000  -0.08495  -0.12313  -0.16472  -0.20961  -0.22689  -0.23947  -0.24922  -0.25612  -0.25953  -0.26088  -0.26129  -0.26088  -0.25953  -0.25612  -0.24922  -0.23947  -0.22689  -0.20961  -0.16472  -0.12313  -0.08495  -0.00000
               -1.00  -0.00000  -0.01776  -0.02657  -0.03803  -0.04905  -0.05182  -0.05230  -0.05243  -0.05246  -0.05242  -0.05235  -0.05228  -0.05235  -0.05242  -0.05246  -0.05243  -0.05230  -0.05182  -0.04905  -0.03803  -0.02657  -0.01776  -0.00000
                3.00   0.00000   0.04913   0.07407   0.08932   0.10970   0.12086   0.13224   0.14144   0.14806   0.15136   0.15267   0.15306   0.15267   0.15136   0.14806   0.14144   0.13224   0.12086   0.10970   0.08932   0.07407   0.04913   0.00000
                7.00   0.00000   0.11552   0.17001   0.21821   0.27148   0.29696   0.32060   0.33921   0.35252   0.35925   0.36202   0.36291   0.36202   0.35925   0.35252   0.33921   0.32060   0.29696   0.27148   0.21821   0.17001   0.11552   0.00000
               11.00   0.00000   0.17238   0.26874   0.35196   0.43811   0.47828   0.51652   0.54719   0.56883   0.57945   0.58381   0.58523   0.58381   0.57945   0.56883   0.54719   0.51652   0.47828   0.43811   0.35196   0.26874   0.17238   0.00000
               15.00   0.00000   0.22459   0.36710   0.48233   0.60325   0.65777   0.70971   0.75318   0.78620   0.80371   0.81087   0.81325   0.81087   0.80371   0.78620   0.75318   0.70971   0.65777   0.60325   0.48233   0.36710   0.22459   0.00000
               19.00   0.00000   0.27147   0.46221   0.60775   0.74994   0.81639   0.87853   0.93678   0.98489   1.01264   1.02531   1.02997   1.02531   1.01264   0.98489   0.93678   0.87853   0.81639   0.74994   0.60775   0.46221   0.27147   0.00000
               23.00   0.00000   0.31360   0.54340   0.71751   0.87830   0.95339   1.02290   1.08605   1.14254   1.17785   1.19390   1.19935   1.19390   1.17785   1.14254   1.08605   1.02290   0.95339   0.87830   0.71751   0.54340   0.31360   0.00000
               27.00   0.00000   0.35037   0.61602   0.81449   0.99690   1.08064   1.15850   1.22477   1.26947   1.29198   1.30169   1.30498   1.30169   1.29198   1.26947   1.22477   1.15850   1.08064   0.99690   0.81449   0.61602   0.35037   0.00000
               32.00   0.00000   0.38403   0.68828   0.91501   1.12765   1.22009   1.29847   1.35759   1.38381   1.38632   1.38284   1.38165   1.38284   1.38632   1.38381   1.35759   1.29847   1.22009   1.12765   0.91501   0.68828   0.38403   0.00000
               46.00   0.00000   0.27636   0.73488   0.98263   1.20085   1.26718   1.31070   1.34696   1.38467   1.40702   1.41646   1.41954   1.41646   1.40702   1.38467   1.34696   1.31070   1.26718   1.20085   0.98263   0.73488   0.27636   0.00000
               70.00   0.00000   0.07412   0.23228   0.32250   0.40656   0.44318   0.47473   0.50028   0.51907   0.52887   0.53372   0.53382   0.53372   0.52887   0.51907   0.50028   0.47473   0.44318   0.40656   0.32250   0.23228   0.07412   0.00000
              120.00  -0.00000  -0.09424  -0.29218  -0.40460  -0.50913  -0.55461  -0.59377  -0.62546  -0.64877  -0.66169  -0.66721  -0.66773  -0.66721  -0.66169  -0.64877  -0.62546  -0.59377  -0.55461  -0.50913  -0.40460  -0.29218  -0.09424  -0.00000
              180.00   0.00000   0.00000   0.00000   0.00000   0.00000   0.00000   0.00000   0.00000   0.00000   0.00000   0.00000   0.00000   0.00000   0.00000   0.00000   0.00000   0.00000   0.00000   0.00000   0.00000   0.00000   0.00000   0.00000
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            </tableData>
          </table>
        </function>
      <axis name="DRAG">
        <function name="aero/coefficient/CD_base">
          <description>CD over alpha and beta (hangar)</description>
          <product>
            <property>aero/qbar-psf</property>
            <property>metrics/Sw-sqft</property>
          <table>
            <independentVar lookup="row">aero/alpha-deg</independentVar>
            <independentVar lookup="column">aero/beta-deg</independentVar>
            <tableData>
                        -90.00    -70.00    -50.00    -40.00    -30.00    -25.00    -20.00    -15.00    -10.00     -6.00     -3.00      0.00      3.00      6.00     10.00     15.00     20.00     25.00     30.00     40.00     50.00     70.00     90.00
             -180.00   0.30256   0.22956   0.12279   0.07767   0.04518   0.03410   0.02625   0.02121   0.01646   0.01663   0.01718   0.01738   0.01718   0.01663   0.01646   0.02121   0.02625   0.03410   0.04518   0.07767   0.12279   0.22956   0.30256
             -120.00   0.30256   0.30522   0.47664   0.63880   0.82403   0.91425   0.99643   1.06596   1.11881   1.14676   1.15891   1.16310   1.15891   1.14676   1.11881   1.06596   0.99643   0.91425   0.82403   0.63880   0.47664   0.30522   0.30256
              -70.00   0.30256   0.34404   0.58782   0.79708   1.03037   1.14282   1.24481   1.33088   1.39622   1.43097   1.44583   1.45090   1.44583   1.43097   1.39622   1.33088   1.24481   1.14282   1.03037   0.79708   0.58782   0.34404   0.30256
              -46.00   0.30256   0.37780   0.65300   0.86036   1.06067   1.13302   1.19290   1.25490   1.31248   1.34204   1.35467   1.35889   1.35467   1.34204   1.31248   1.25490   1.19290   1.13302   1.06067   0.86036   0.65300   0.37780   0.30256
              -32.00   0.30256   0.36736   0.45103   0.53185   0.63944   0.69418   0.74490   0.77356   0.78614   0.78734   0.78509   0.78334   0.78509   0.78734   0.78614   0.77356   0.74490   0.69418   0.63944   0.53185   0.45103   0.36736   0.30256
              -22.00   0.30256   0.32847   0.30752   0.30509   0.32280   0.33719   0.35741   0.37182   0.38716   0.39707   0.40155   0.40308   0.40155   0.39707   0.38716   0.37182   0.35741   0.33719   0.32280   0.30509   0.30752   0.32847   0.30256
              -17.00   0.30256   0.31254   0.25571   0.22653   0.21691   0.21987   0.22414   0.22650   0.22964   0.23227   0.23391   0.23454   0.23391   0.23227   0.22964   0.22650   0.22414   0.21987   0.21691   0.22653   0.25571   0.31254   0.30256
              -13.00   0.30256   0.30267   0.22479   0.17924   0.15325   0.14777   0.14286   0.13716   0.13348   0.13172   0.13095   0.13068   0.13095   0.13172   0.13348   0.13716   0.14286   0.14777   0.15325   0.17924   0.22479   0.30267   0.30256
               -9.00   0.30256   0.29554   0.20223   0.14731   0.10962   0.09836   0.08767   0.07657   0.06872   0.06482   0.06324   0.06272   0.06324   0.06482   0.06872   0.07657   0.08767   0.09836   0.10962   0.14731   0.20223   0.29554   0.30256
               -5.00   0.30256   0.29154   0.19024   0.12932   0.08519   0.07086   0.05741   0.04398   0.03447   0.02979   0.02789   0.02728   0.02789   0.02979   0.03447   0.04398   0.05741   0.07086   0.08519   0.12932   0.19024   0.29154   0.30256
               -1.00   0.30256   0.28994   0.18569   0.12242   0.07581   0.06037   0.04601   0.03191   0.02193   0.01703   0.01506   0.01444   0.01506   0.01703   0.02193   0.03191   0.04601   0.06037   0.07581   0.12242   0.18569   0.28994   0.30256
                3.00   0.30256   0.29021   0.18625   0.12368   0.07801   0.06303   0.04918   0.03553   0.02587   0.02113   0.01922   0.01860   0.01922   0.02113   0.02587   0.03553   0.04918   0.06303   0.07801   0.12368   0.18625   0.29021   0.30256
                7.00   0.30256   0.29279   0.19241   0.13380   0.09284   0.08000   0.06824   0.05622   0.04769   0.04349   0.04178   0.04123   0.04178   0.04349   0.04769   0.05622   0.06824   0.08000   0.09284   0.13380   0.19241   0.29279   0.30256
               11.00   0.30256   0.29859   0.20756   0.15644   0.12508   0.11464   0.10957   0.10141   0.09553   0.09257   0.09135   0.09095   0.09135   0.09257   0.09553   0.10141   0.10957   0.11464   0.12508   0.15644   0.20756   0.29859   0.30256
               15.00   0.30256   0.30735   0.23315   0.19653   0.17904   0.17748   0.17669   0.17476   0.17450   0.17469   0.17472   0.17473   0.17472   0.17469   0.17450   0.17476   0.17669   0.17748   0.17904   0.19653   0.23315   0.30735   0.30256
               19.00   0.30256   0.31843   0.26924   0.25136   0.25267   0.25871   0.26966   0.27833   0.28742   0.29348   0.29647   0.29766   0.29647   0.29348   0.28742   0.27833   0.26966   0.25871   0.25267   0.25136   0.26924   0.31843   0.30256
               23.00   0.30256   0.33159   0.31379   0.32027   0.34444   0.36177   0.38359   0.40141   0.41975   0.43231   0.43822   0.44026   0.43822   0.43231   0.41975   0.40141   0.38359   0.36177   0.34444   0.32027   0.31379   0.33159   0.30256
               27.00   0.30256   0.34655   0.36737   0.40363   0.45809   0.48963   0.52510   0.55335   0.57305   0.58331   0.58785   0.58940   0.58785   0.58331   0.57305   0.55335   0.52510   0.48963   0.45809   0.40363   0.36737   0.34655   0.30256
               32.00   0.30256   0.36665   0.44287   0.52444   0.62693   0.67910   0.72681   0.76637   0.78405   0.78661   0.78490   0.78432   0.78490   0.78661   0.78405   0.76637   0.72681   0.67910   0.62693   0.52444   0.44287   0.36665   0.30256
               46.00   0.30256   0.37620   0.65228   0.86921   1.09440   1.17631   1.23703   1.28877   1.33845   1.36890   1.38189   1.38623   1.38189   1.36890   1.33845   1.28877   1.23703   1.17631   1.09440   0.86921   0.65228   0.37620   0.30256
               70.00   0.30256   0.34404   0.58782   0.79709   1.03037   1.14282   1.24481   1.33088   1.39622   1.43097   1.44583   1.45090   1.44583   1.43097   1.39622   1.33088   1.24481   1.14282   1.03037   0.79709   0.58782   0.34404   0.30256
              120.00   0.30256   0.30522   0.47664   0.63880   0.82403   0.91425   0.99643   1.06596   1.11881   1.14676   1.15891   1.16310   1.15891   1.14676   1.11881   1.06596   0.99643   0.91425   0.82403   0.63880   0.47664   0.30522   0.30256
              180.00   0.30256   0.22956   0.12279   0.07767   0.04518   0.03410   0.02625   0.02121   0.01646   0.01663   0.01718   0.01738   0.01718   0.01663   0.01646   0.02121   0.02625   0.03410   0.04518   0.07767   0.12279   0.22956   0.30256
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            </tableData>
          </table>
          </product>
        </function>
        <function name="aero/coefficient/CD_mach">
          <description>zero-lift drag's change with Mach: friction, wave drag</description>
          <product>
            <property>aero/qbar-psf</property>
            <property>metrics/Sw-sqft</property>
            <property>aero/function/mach-dCD0</property>
          </product>
        </function>
        <function name="aero/coefficient/CD_induced_mach">
          <description>induced drag's change with Mach (leading-edge suction lost)</description>
          <product>
            <property>aero/qbar-psf</property>
            <property>metrics/Sw-sqft</property>
            <property>aero/cl-squared</property>
            <property>aero/function/mach-dK</property>
          </product>
        </function>
        <function name="aero/coefficient/CD_aileron">
          <description>CD increment from aileron (deg), over alpha</description>
          <product>
            <property>aero/qbar-psf</property>
            <property>metrics/Sw-sqft</property>
            <property>aero/function/mach-aileron</property>
          <table>
            <independentVar lookup="row">aero/alpha-deg</independentVar>
            <independentVar lookup="column">fcs/left-aileron-pos-deg</independentVar>
            <tableData>
                        -25.00    -20.00    -15.00    -10.00     -5.00      0.00      5.00     10.00     15.00     20.00     25.00
             -180.00   0.01455   0.00953   0.00546   0.00246   0.00062   0.00000   0.00062   0.00246   0.00546   0.00953   0.01455
             -120.00   0.01454   0.00952   0.00545   0.00246   0.00062   0.00000   0.00062   0.00246   0.00545   0.00952   0.01454
              -70.00   0.01454   0.00952   0.00545   0.00245   0.00062   0.00000   0.00062   0.00245   0.00545   0.00952   0.01454
              -46.00   0.00649   0.00381   0.00185   0.00067   0.00014   0.00000   0.00014   0.00067   0.00185   0.00381   0.00649
              -32.00   0.01040   0.00637   0.00318   0.00109   0.00019   0.00000   0.00019   0.00109   0.00318   0.00637   0.01040
              -22.00   0.02802   0.02141   0.01460   0.00764   0.00208   0.00000   0.00208   0.00764   0.01460   0.02141   0.02802
              -17.00   0.03351   0.02589   0.01801   0.00975   0.00276   0.00000   0.00276   0.00975   0.01801   0.02589   0.03351
              -13.00   0.03366   0.02536   0.01713   0.00898   0.00248   0.00000   0.00248   0.00898   0.01713   0.02536   0.03366
               -9.00   0.03634   0.02708   0.01811   0.00946   0.00262   0.00000   0.00262   0.00946   0.01811   0.02708   0.03634
               -5.00   0.03845   0.02878   0.01921   0.00992   0.00272   0.00000   0.00272   0.00992   0.01921   0.02878   0.03845
               -1.00   0.03847   0.02883   0.01930   0.01002   0.00275   0.00000   0.00275   0.01002   0.01930   0.02883   0.03847
                3.00   0.03865   0.02895   0.01935   0.01003   0.00275   0.00000   0.00275   0.01003   0.01935   0.02895   0.03865
                7.00   0.03822   0.02849   0.01903   0.01007   0.00284   0.00000   0.00284   0.01007   0.01903   0.02849   0.03822
               11.00   0.03912   0.03054   0.02150   0.01181   0.00340   0.00000   0.00340   0.01181   0.02150   0.03054   0.03912
               15.00   0.04107   0.03271   0.02369   0.01341   0.00391   0.00000   0.00391   0.01341   0.02369   0.03271   0.04107
               19.00   0.03966   0.03216   0.02393   0.01432   0.00458   0.00000   0.00458   0.01432   0.02393   0.03216   0.03966
               23.00   0.03369   0.02674   0.01924   0.01086   0.00318   0.00000   0.00318   0.01086   0.01924   0.02674   0.03369
               27.00   0.02502   0.01865   0.01209   0.00563   0.00120   0.00000   0.00120   0.00563   0.01209   0.01865   0.02502
               32.00   0.00948   0.00501   0.00145  -0.00058  -0.00056   0.00000  -0.00056  -0.00058   0.00145   0.00501   0.00948
               46.00  -0.00193  -0.00337  -0.00361  -0.00246  -0.00076   0.00000  -0.00076  -0.00246  -0.00361  -0.00337  -0.00193
               70.00   0.01454   0.00952   0.00545   0.00245   0.00062   0.00000   0.00062   0.00245   0.00545   0.00952   0.01454
              120.00   0.01454   0.00952   0.00545   0.00246   0.00062   0.00000   0.00062   0.00246   0.00545   0.00952   0.01454
              180.00   0.01455   0.00953   0.00546   0.00246   0.00062   0.00000   0.00062   0.00246   0.00546   0.00953   0.01455
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            </tableData>
          </table>
          </product>
        </function>
        <function name="aero/coefficient/CD_elevator">
          <description>CD increment from elevator (deg), over alpha</description>
          <product>
            <property>aero/qbar-psf</property>
            <property>metrics/Sw-sqft</property>
            <property>aero/function/mach-elevator</property>
          <table>
            <independentVar lookup="row">aero/alpha-deg</independentVar>
            <independentVar lookup="column">fcs/elevator-pos-deg</independentVar>
            <tableData>
                        -25.00    -20.00    -15.00    -10.00     -5.00      0.00      5.00     10.00     15.00     20.00     25.00     30.00     35.00     40.00     45.00     50.00
             -180.00   0.03039   0.02537   0.01438   0.00427   0.00092   0.00000   0.00092   0.00427   0.01438   0.02537   0.03892   0.04880   0.05974   0.07139   0.08341   0.09542
             -120.00   0.04489   0.03987   0.03071   0.02081   0.01046   0.00000  -0.01027  -0.02003  -0.02900  -0.03688  -0.04345  -0.05432  -0.06414  -0.07261  -0.07948  -0.08654
              -70.00   0.05119   0.04617  -0.02374  -0.01587  -0.00787   0.00000   0.00751   0.01443   0.02055   0.02568   0.02967   0.02659   0.02153   0.01467   0.00620  -0.00362
              -46.00   0.00104  -0.01230   0.00223   0.00945   0.00801   0.00000  -0.01128  -0.02171  -0.02777  -0.03030  -0.03206  -0.02743  -0.02533  -0.02503  -0.02588  -0.02735
              -32.00   0.01765   0.00160   0.00431   0.00555   0.00361   0.00000  -0.00293  -0.00195   0.00625   0.02106   0.03921   0.06557   0.08984   0.11195   0.13191   0.14988
              -22.00   0.05470   0.03496   0.01969   0.00784   0.00023   0.00000   0.00870   0.02721   0.05737   0.09852   0.14776   0.20700   0.26776   0.32916   0.39045   0.45107
              -17.00   0.07565   0.05789   0.03819   0.01903   0.00503   0.00000   0.00633   0.02529   0.05871   0.10648   0.16618   0.23418   0.30689   0.38334   0.46259   0.54385
              -13.00   0.09070   0.07380   0.05240   0.03046   0.01117   0.00000  -0.00027   0.01256   0.04201   0.09029   0.15590   0.22554   0.30102   0.38099   0.46370   0.54856
               -9.00   0.09274   0.07733   0.05562   0.03353   0.01308   0.00000  -0.00144   0.01015   0.03520   0.07258   0.12114   0.17443   0.23718   0.30885   0.38828   0.47417
               -5.00   0.08293   0.06988   0.04804   0.02825   0.01094   0.00000  -0.00120   0.01019   0.03368   0.06743   0.11074   0.15505   0.20783   0.26954   0.34037   0.41788
               -1.00   0.07299   0.06243   0.03685   0.01832   0.00558   0.00000   0.00285   0.01417   0.03428   0.06308   0.10072   0.13729   0.18270   0.23725   0.30075   0.36903
                3.00   0.07039   0.06223   0.03179   0.01074   0.00025   0.00000   0.00839   0.02336   0.04214   0.06577   0.09705   0.12502   0.16216   0.20890   0.26429   0.32536
                7.00   0.07463   0.06869   0.03358   0.00942  -0.00182   0.00000   0.01284   0.03218   0.05322   0.07450   0.09969   0.11869   0.14694   0.18500   0.23173   0.28504
               11.00   0.07900   0.07573   0.03766   0.01297   0.00037   0.00000   0.01211   0.03307   0.05593   0.07760   0.09962   0.11013   0.12886   0.15725   0.19469   0.23941
               15.00   0.10241   0.10516   0.06007   0.02617   0.00580   0.00000   0.00757   0.02502   0.04611   0.06717   0.08832   0.09423   0.10481   0.12336   0.15090   0.18637
               19.00   0.11550   0.12091   0.07557   0.04026   0.01470   0.00000  -0.00122   0.00906   0.02495   0.04325   0.05773   0.06131   0.06793   0.07904   0.09703   0.12295
               23.00   0.10854   0.11583   0.07430   0.04157   0.01717   0.00000  -0.00730  -0.00420   0.00436   0.01604   0.03133   0.03627   0.04124   0.04959   0.04309   0.06005
               27.00   0.08462   0.09318   0.06065   0.03505   0.01575   0.00000  -0.01100  -0.01477  -0.01393  -0.01051  -0.00279  -0.00756  -0.00327   0.00378   0.01306   0.03048
               32.00   0.04169   0.05080   0.03149   0.01747   0.00824   0.00000  -0.00904  -0.01767  -0.02553  -0.03239  -0.03603  -0.04871  -0.05499  -0.05654  -0.04709  -0.03998
               46.00  -0.02790  -0.01907  -0.01602  -0.01108  -0.00465   0.00000  -0.00086  -0.00925  -0.02531  -0.04886  -0.07647  -0.11288  -0.14393  -0.16842  -0.18578  -0.19591
               70.00   0.03070   0.02568   0.02055   0.01443   0.00751   0.00000  -0.00787  -0.01587  -0.02374   0.04598   0.15369   0.16648   0.11135   0.05734   0.00739  -0.03596
              120.00  -0.03186  -0.03688  -0.02900  -0.02003  -0.01027   0.00000   0.01046   0.02081   0.03071   0.03987   0.04802   0.04909   0.04807   0.04498   0.03993   0.03306
              180.00   0.03039   0.02537   0.01438   0.00427   0.00092   0.00000   0.00092   0.00427   0.01438   0.02537   0.03892   0.04880   0.05974   0.07139   0.08341   0.09542
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            </tableData>
          </table>
          </product>
        </function>
        <function name="aero/coefficient/CD_rudder">
          <description>CD increment from rudder (deg), over alpha</description>
          <product>
            <property>aero/qbar-psf</property>
            <property>metrics/Sw-sqft</property>
            <property>aero/function/mach-rudder</property>
          <table>
            <independentVar lookup="row">aero/alpha-deg</independentVar>
            <independentVar lookup="column">fcs/rudder-pos-deg</independentVar>
            <tableData>
                        -30.00    -25.00    -20.00    -15.00    -10.00     -5.00      0.00      5.00     10.00     15.00     20.00     25.00     30.00
             -180.00   0.00352   0.00251   0.00165   0.00094   0.00042   0.00011   0.00000   0.00011   0.00042   0.00094   0.00165   0.00251   0.00352
             -120.00   0.00044   0.00031   0.00021   0.00012   0.00005   0.00001   0.00000   0.00001   0.00005   0.00012   0.00021   0.00031   0.00044
              -70.00   0.00015   0.00011   0.00007   0.00004   0.00002   0.00000   0.00000   0.00000   0.00002   0.00004   0.00007   0.00011   0.00015
              -46.00   0.00278   0.00221   0.00167   0.00112   0.00059   0.00016   0.00000   0.00016   0.00059   0.00112   0.00167   0.00221   0.00278
              -32.00   0.00477   0.00373   0.00277   0.00183   0.00094   0.00026   0.00000   0.00026   0.00094   0.00183   0.00277   0.00374   0.00477
              -22.00   0.00619   0.00485   0.00359   0.00237   0.00122   0.00033   0.00000   0.00033   0.00122   0.00237   0.00359   0.00485   0.00619
              -17.00   0.00680   0.00533   0.00394   0.00261   0.00134   0.00036   0.00000   0.00036   0.00134   0.00261   0.00395   0.00533   0.00681
              -13.00   0.00720   0.00564   0.00417   0.00276   0.00142   0.00039   0.00000   0.00039   0.00142   0.00276   0.00418   0.00564   0.00720
               -9.00   0.00750   0.00587   0.00435   0.00287   0.00147   0.00040   0.00000   0.00040   0.00147   0.00287   0.00435   0.00587   0.00750
               -5.00   0.00769   0.00602   0.00446   0.00294   0.00151   0.00041   0.00000   0.00041   0.00151   0.00295   0.00446   0.00602   0.00769
               -1.00   0.00776   0.00608   0.00450   0.00297   0.00153   0.00042   0.00000   0.00042   0.00153   0.00297   0.00450   0.00608   0.00777
                3.00   0.00772   0.00605   0.00448   0.00296   0.00152   0.00041   0.00000   0.00041   0.00152   0.00296   0.00448   0.00605   0.00773
                7.00   0.00757   0.00593   0.00439   0.00290   0.00149   0.00041   0.00000   0.00041   0.00149   0.00290   0.00439   0.00593   0.00757
               11.00   0.00731   0.00572   0.00423   0.00280   0.00143   0.00039   0.00000   0.00039   0.00143   0.00280   0.00424   0.00572   0.00731
               15.00   0.00694   0.00543   0.00402   0.00265   0.00136   0.00037   0.00000   0.00037   0.00136   0.00266   0.00402   0.00544   0.00695
               19.00   0.00649   0.00508   0.00376   0.00248   0.00127   0.00035   0.00000   0.00035   0.00127   0.00248   0.00376   0.00508   0.00649
               23.00   0.00596   0.00466   0.00345   0.00228   0.00117   0.00032   0.00000   0.00032   0.00117   0.00228   0.00345   0.00467   0.00597
               27.00   0.00538   0.00421   0.00311   0.00205   0.00105   0.00029   0.00000   0.00029   0.00105   0.00205   0.00312   0.00421   0.00539
               32.00   0.00467   0.00365   0.00270   0.00179   0.00092   0.00025   0.00000   0.00025   0.00092   0.00179   0.00271   0.00366   0.00467
               46.00   0.00274   0.00217   0.00164   0.00110   0.00057   0.00016   0.00000   0.00016   0.00057   0.00110   0.00164   0.00217   0.00274
               70.00   0.00015   0.00011   0.00007   0.00004   0.00002   0.00000   0.00000   0.00000   0.00002   0.00004   0.00007   0.00011   0.00015
              120.00   0.00044   0.00031   0.00021   0.00012   0.00005   0.00001   0.00000   0.00001   0.00005   0.00012   0.00021   0.00031   0.00044
              180.00   0.00352   0.00251   0.00165   0.00094   0.00042   0.00011   0.00000   0.00011   0.00042   0.00094   0.00165   0.00251   0.00352
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            </tableData>
          </table>
          </product>
        </function>
        <function name="aero/coefficient/CD_ground">
          <description>Induced drag change in ground effect</description>
          <product>
            <property>aero/qbar-psf</property>
            <property>metrics/Sw-sqft</property>
            <property>aero/cl-squared</property>
            <value>0.16229</value>
          <table>
            <independentVar lookup="row">aero/h_b-mac-ft</independentVar>
            <tableData>
                    0.00   -1.00000
                    0.10   -0.28090
                    0.15   -0.14793
                    0.20   -0.08897
                    0.30   -0.04160
                    0.40   -0.02383
                    0.50   -0.01538
                    0.60   -0.01073
                    0.70   -0.00791
                    0.80   -0.00607
                    0.90   -0.00480
                    1.00   -0.00389
                    1.10   -0.00322
            </tableData>
          </table>
          </product>
        </function>
        <function name="aero/coefficient/CD_airbrakes">
          <description>airbrakes: drag of its airbrake plates, 1.52 m2 opened to 50 deg (hangar)</description>
          <product>
            <property>aero/qbar-psf</property>
            <property>metrics/Sw-sqft</property>
            <value>0.0621518</value>
            <pow>
              <sin>
                <product>
                  <property>fcs/speedbrake-pos-norm</property>
                  <value>0.872665</value>
                </product>
              </sin>
              <value>2</value>
            </pow>
          </product>
        </function>
        <function name="aero/coefficient/CD_gear">
          <description>the gear extended: its wheels' and struts' drag by Raymer's components, 0.264 m2 (hangar)</description>
          <product>
            <property>aero/qbar-psf</property>
            <property>metrics/Sw-sqft</property>
            <value>0.00898783</value>
            <property>gear/gear-pos-norm</property>
          </product>
        </function>
      </axis>
      <axis name="SIDE">
        <function name="aero/coefficient/CY_base">
          <description>CY over alpha and beta (hangar)</description>
          <product>
            <property>aero/qbar-psf</property>
            <property>metrics/Sw-sqft</property>
            <property>aero/function/mach-side</property>
          <table>
            <independentVar lookup="row">aero/alpha-deg</independentVar>
            <independentVar lookup="column">aero/beta-deg</independentVar>
            <tableData>
                        -90.00    -70.00    -50.00    -40.00    -30.00    -25.00    -20.00    -15.00    -10.00     -6.00     -3.00      0.00      3.00      6.00     10.00     15.00     20.00     25.00     30.00     40.00     50.00     70.00     90.00
             -180.00   0.00000   0.08332   0.09634   0.07910   0.05431   0.04137   0.02922   0.01856   0.03612   0.04684   0.02488  -0.00000  -0.02488  -0.04684  -0.03612  -0.01856  -0.02922  -0.04137  -0.05431  -0.07910  -0.09634  -0.08332  -0.00000
             -120.00   0.00000  -0.06385  -0.26460  -0.33517  -0.34628  -0.32502  -0.28592  -0.23057  -0.16179  -0.09703  -0.03983  -0.00000   0.03983   0.09703   0.16179   0.23057   0.28592   0.32502   0.34628   0.33517   0.26460   0.06385  -0.00000
              -70.00   0.00000  -0.08974  -0.33081  -0.41281  -0.42319  -0.39629  -0.34802  -0.28018  -0.19592  -0.11934  -0.05381  -0.00000   0.05381   0.11934   0.19592   0.28018   0.34802   0.39629   0.42319   0.41281   0.33081   0.08974  -0.00000
              -46.00   0.00000  -0.16371  -0.38070  -0.44305  -0.42760  -0.38190  -0.32066  -0.25017  -0.15459  -0.09474  -0.04688  -0.00000   0.04688   0.09474   0.15459   0.25017   0.32066   0.38190   0.42760   0.44305   0.38070   0.16371  -0.00000
              -32.00   0.00000  -0.11197  -0.13871  -0.18063  -0.19432  -0.18241  -0.14046  -0.11155  -0.07705  -0.04660  -0.02332  -0.00000   0.02332   0.04660   0.07705   0.11155   0.14046   0.18241   0.19432   0.18063   0.13871   0.11197  -0.00000
              -22.00   0.00000  -0.00167   0.02279  -0.00208  -0.01925  -0.02031  -0.00439  -0.00708  -0.00782  -0.00595  -0.00330  -0.00000   0.00330   0.00595   0.00782   0.00708   0.00439   0.02031   0.01925   0.00208  -0.02279   0.00167  -0.00000
              -17.00   0.00000   0.04320   0.08012   0.06003   0.04081   0.04377   0.04469   0.03161   0.01916   0.01058   0.00503  -0.00000  -0.00503  -0.01058  -0.01916  -0.03161  -0.04469  -0.04377  -0.04081  -0.06003  -0.08012  -0.04320  -0.00000
              -13.00   0.00000   0.07110   0.11340   0.09687   0.07690   0.07747   0.07372   0.05499   0.03565   0.02085   0.01025  -0.00000  -0.01025  -0.02085  -0.03565  -0.05499  -0.07372  -0.07747  -0.07690  -0.09687  -0.11340  -0.07110  -0.00000
               -9.00   0.00000   0.09125   0.13666   0.12137   0.10100   0.09984   0.09307   0.07052   0.04642   0.02736   0.01348  -0.00000  -0.01348  -0.02736  -0.04642  -0.07052  -0.09307  -0.09984  -0.10100  -0.12137  -0.13666  -0.09125  -0.00000
               -5.00   0.00000   0.10246   0.14813   0.13417   0.11392   0.11177   0.10317   0.07841   0.05165   0.03039   0.01493  -0.00000  -0.01493  -0.03039  -0.05165  -0.07841  -0.10317  -0.11177  -0.11392  -0.13417  -0.14813  -0.10246  -0.00000
               -1.00   0.00000   0.10670   0.15176   0.13861   0.11863   0.11600   0.10661   0.08109   0.05332   0.03124   0.01524  -0.00000  -0.01524  -0.03124  -0.05332  -0.08109  -0.10661  -0.11600  -0.11863  -0.13861  -0.15176  -0.10670  -0.00000
                3.00   0.00000   0.10564   0.14971   0.13640   0.11659   0.11404   0.10484   0.07985   0.05254   0.03084   0.01511  -0.00000  -0.01511  -0.03084  -0.05254  -0.07985  -0.10484  -0.11404  -0.11659  -0.13640  -0.14971  -0.10564  -0.00000
                7.00   0.00000   0.09823   0.14138   0.12658   0.10689   0.10500   0.09742   0.07443   0.04908   0.02895   0.01426  -0.00000  -0.01426  -0.02895  -0.04908  -0.07443  -0.09742  -0.10500  -0.10689  -0.12658  -0.14138  -0.09823  -0.00000
               11.00   0.00000   0.08197   0.12372   0.10737   0.08760   0.07992   0.08245   0.06311   0.04154   0.02450   0.01210  -0.00000  -0.01210  -0.02450  -0.04154  -0.06311  -0.08245  -0.07992  -0.08760  -0.10737  -0.12372  -0.08197  -0.00000
               15.00   0.00000   0.05768   0.09453   0.07535   0.05727   0.05862   0.05380   0.04346   0.02838   0.01662   0.00817  -0.00000  -0.00817  -0.01662  -0.02838  -0.04346  -0.05380  -0.05862  -0.05727  -0.07535  -0.09453  -0.05768  -0.00000
               19.00   0.00000   0.02678   0.05387   0.03115   0.01523   0.01222   0.02269   0.01623   0.00906   0.00465   0.00208  -0.00000  -0.00208  -0.00465  -0.00906  -0.01623  -0.02269  -0.01222  -0.01523  -0.03115  -0.05387  -0.02678  -0.00000
               23.00   0.00000  -0.01028   0.00320  -0.02449  -0.03690  -0.03609  -0.01759  -0.01689  -0.01499  -0.01080  -0.00606  -0.00000   0.00606   0.01080   0.01499   0.01689   0.01759   0.03609   0.03690   0.02449  -0.00320   0.01028  -0.00000
               27.00   0.00000  -0.05277  -0.05803  -0.09169  -0.10158  -0.09598  -0.06895  -0.05799  -0.04297  -0.02728  -0.01408  -0.00000   0.01408   0.02728   0.04297   0.05799   0.06895   0.09598   0.10158   0.09169   0.05803   0.05277  -0.00000
               32.00   0.00000  -0.11022  -0.14513  -0.18879  -0.19803  -0.18503  -0.15928  -0.11510  -0.08027  -0.04889  -0.02458  -0.00000   0.02458   0.04889   0.08027   0.11510   0.15928   0.18503   0.19803   0.18879   0.14513   0.11022  -0.00000
               46.00   0.00000  -0.15733  -0.39950  -0.46846  -0.46138  -0.41315  -0.34416  -0.26384  -0.16146  -0.09827  -0.04875  -0.00000   0.04875   0.09827   0.16146   0.26384   0.34416   0.41315   0.46138   0.46846   0.39950   0.15733  -0.00000
               70.00   0.00000  -0.08974  -0.33082  -0.41282  -0.42319  -0.39630  -0.34802  -0.28018  -0.19592  -0.11934  -0.05381  -0.00000   0.05381   0.11934   0.19592   0.28018   0.34802   0.39630   0.42319   0.41282   0.33082   0.08974  -0.00000
              120.00   0.00000  -0.06385  -0.26460  -0.33517  -0.34628  -0.32502  -0.28592  -0.23057  -0.16179  -0.09703  -0.03983  -0.00000   0.03983   0.09703   0.16179   0.23057   0.28592   0.32502   0.34628   0.33517   0.26460   0.06385  -0.00000
              180.00   0.00000   0.08332   0.09634   0.07910   0.05431   0.04137   0.02922   0.01856   0.03612   0.04684   0.02488  -0.00000  -0.02488  -0.04684  -0.03612  -0.01856  -0.02922  -0.04137  -0.05431  -0.07910  -0.09634  -0.08332  -0.00000
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            </tableData>
          </table>
          </product>
        </function>
        <function name="aero/coefficient/CY_aileron">
          <description>CY increment from aileron (deg), over alpha</description>
          <product>
            <property>aero/qbar-psf</property>
            <property>metrics/Sw-sqft</property>
            <property>aero/function/mach-aileron</property>
          <table>
            <independentVar lookup="row">aero/alpha-deg</independentVar>
            <independentVar lookup="column">fcs/left-aileron-pos-deg</independentVar>
            <tableData>
                        -25.00    -20.00    -15.00    -10.00     -5.00      0.00      5.00     10.00     15.00     20.00     25.00
             -180.00   0.00000   0.00000   0.00000   0.00000   0.00000   0.00000   0.00000   0.00000   0.00000   0.00000   0.00000
              -35.00   0.00828   0.00721   0.00589   0.00418   0.00212   0.00000  -0.00212  -0.00418  -0.00589  -0.00721  -0.00828
              -11.00   0.01586   0.01390   0.01148   0.00829   0.00433   0.00000  -0.00433  -0.00829  -0.01148  -0.01390  -0.01586
                4.00   0.01858   0.01640   0.01367   0.00997   0.00526   0.00000  -0.00526  -0.00997  -0.01367  -0.01640  -0.01858
               19.00   0.02192   0.01917   0.01584   0.01153   0.00612   0.00000  -0.00612  -0.01153  -0.01584  -0.01917  -0.02192
               42.00   0.01075   0.00939   0.00766   0.00532   0.00246   0.00000  -0.00246  -0.00532  -0.00766  -0.00939  -0.01075
              180.00   0.00000   0.00000   0.00000   0.00000   0.00000   0.00000   0.00000   0.00000   0.00000   0.00000   0.00000
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            </tableData>
          </table>
          </product>
        </function>
        <function name="aero/coefficient/CY_rudder">
          <description>CY increment from rudder (deg), over alpha</description>
          <product>
            <property>aero/qbar-psf</property>
            <property>metrics/Sw-sqft</property>
            <property>aero/function/mach-rudder</property>
          <table>
            <independentVar lookup="row">aero/alpha-deg</independentVar>
            <independentVar lookup="column">fcs/rudder-pos-deg</independentVar>
            <tableData>
                        -30.00    -25.00    -20.00    -15.00    -10.00     -5.00      0.00      5.00     10.00     15.00     20.00     25.00     30.00
             -180.00   0.00000   0.00000   0.00000   0.00000   0.00000   0.00000   0.00000   0.00000   0.00000   0.00000   0.00000   0.00000   0.00000
              -35.00  -0.02565  -0.02348  -0.02097  -0.01765  -0.01298  -0.00684   0.00000   0.00684   0.01298   0.01765   0.02097   0.02348   0.02566
              -11.00  -0.03415  -0.03103  -0.02750  -0.02299  -0.01682  -0.00888   0.00000   0.00888   0.01682   0.02299   0.02751   0.03105   0.03418
                4.00  -0.03609  -0.03278  -0.02904  -0.02427  -0.01775  -0.00938   0.00000   0.00938   0.01775   0.02428   0.02906   0.03280   0.03612
               19.00  -0.03267  -0.02968  -0.02631  -0.02200  -0.01610  -0.00850   0.00000   0.00850   0.01610   0.02200   0.02633   0.02971   0.03270
               42.00  -0.03289  -0.03035  -0.02736  -0.02323  -0.01719  -0.00906   0.00000   0.00906   0.01719   0.02323   0.02736   0.03035   0.03288
              180.00   0.00000   0.00000   0.00000   0.00000   0.00000   0.00000   0.00000   0.00000   0.00000   0.00000   0.00000   0.00000   0.00000
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            </tableData>
          </table>
          </product>
        </function>
        <function name="aero/coefficient/CYp">
          <description>CY per p (non-dimensional), over alpha</description>
          <product>
            <property>aero/qbar-psf</property>
            <property>metrics/Sw-sqft</property>
            <property>aero/bi2vel</property>
            <property>velocities/p-aero-rad_sec</property>
            <property>aero/function/mach-lift</property>
          <table>
            <independentVar lookup="row">aero/alpha-deg</independentVar>
            <tableData>
                 -180.00   -0.19665
                 -165.00   -0.20943
                  -32.00   -0.05283
                  -10.00   -0.04524
                    5.00   -0.02743
                   20.00   -0.05649
                   46.00   -0.12228
                  180.00   -0.19665
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            </tableData>
          </table>
          </product>
        </function>
        <function name="aero/coefficient/CYr">
          <description>CY per r (non-dimensional), over alpha</description>
          <product>
            <property>aero/qbar-psf</property>
            <property>metrics/Sw-sqft</property>
            <property>aero/bi2vel</property>
            <property>velocities/r-aero-rad_sec</property>
            <property>aero/function/mach-lift</property>
          <table>
            <independentVar lookup="row">aero/alpha-deg</independentVar>
            <tableData>
                 -180.00    0.55260
                 -165.00    0.51194
                  -32.00    0.01252
                  -10.00    0.09138
                    5.00    0.10378
                   20.00    0.05460
                   46.00    0.08053
                  180.00    0.55260
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            </tableData>
          </table>
          </product>
        </function>
      </axis>
      <axis name="LIFT">
        <function name="aero/coefficient/CL_base">
          <description>CL over alpha and beta, ground effect, compressibility (hangar)</description>
          <product>
            <property>aero/qbar-psf</property>
            <property>metrics/Sw-sqft</property>
            <property>aero/function/CL-base</property>
            <property>aero/function/mach-lift</property>
          <table>
            <independentVar lookup="row">aero/h_b-mac-ft</independentVar>
            <tableData>
                    0.00    1.20000
                    0.10    1.08692
                    0.20    1.03778
                    0.40    1.00713
                    0.60    1.00135
                    0.80    1.00025
                    1.00    1.00005
                    1.10    1.00000
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            </tableData>
          </table>
          </product>
        </function>
        <function name="aero/coefficient/CL_elevator">
          <description>CL increment from elevator (deg), over alpha</description>
          <product>
            <property>aero/qbar-psf</property>
            <property>metrics/Sw-sqft</property>
            <property>aero/function/mach-elevator</property>
          <table>
            <independentVar lookup="row">aero/alpha-deg</independentVar>
            <independentVar lookup="column">fcs/elevator-pos-deg</independentVar>
            <tableData>
                        -25.00    -20.00    -15.00    -10.00     -5.00      0.00      5.00     10.00     15.00     20.00     25.00     30.00     35.00     40.00     45.00     50.00
             -180.00   0.04461   0.04461   0.03470   0.04921   0.04762   0.00000  -0.04762  -0.04921  -0.03470  -0.04461  -0.05317  -0.06011  -0.06522  -0.06835  -0.06940  -0.06835
              -35.00  -0.19726  -0.17866  -0.16154  -0.12533  -0.06926   0.00000   0.07489   0.14791   0.21250   0.26909   0.32224   0.35295   0.38592   0.42074   0.45702   0.49450
              -11.00  -0.26697  -0.23593  -0.20382  -0.15280  -0.08061   0.00000   0.07921   0.14788   0.19386   0.21055   0.19974   0.17249   0.16575   0.17492   0.19545   0.22414
                4.00  -0.27354  -0.23773  -0.21226  -0.16461  -0.09075   0.00000   0.09170   0.17120   0.22762   0.25818   0.27099   0.24709   0.22279   0.19958   0.18048   0.16956
               19.00  -0.28131  -0.24168  -0.19934  -0.14398  -0.07408   0.00000   0.06711   0.11896   0.15335   0.17649   0.17616   0.16083   0.14424   0.12364   0.09881   0.07311
               42.00  -0.28694  -0.26804  -0.21147  -0.14755  -0.07537   0.00000   0.07198   0.13295   0.17551   0.19886   0.20300   0.17920   0.14841   0.11559   0.08371   0.04998
              180.00   0.04461   0.04461   0.03470   0.04921   0.04762   0.00000  -0.04762  -0.04921  -0.03470  -0.04461  -0.05317  -0.06011  -0.06522  -0.06835  -0.06940  -0.06835
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            </tableData>
          </table>
          </product>
        </function>
        <function name="aero/coefficient/CLq">
          <description>CL per q (non-dimensional), over alpha</description>
          <product>
            <property>aero/qbar-psf</property>
            <property>metrics/Sw-sqft</property>
            <property>aero/ci2vel</property>
            <property>velocities/q-aero-rad_sec</property>
            <property>aero/function/mach-lift</property>
          <table>
            <independentVar lookup="row">aero/alpha-deg</independentVar>
            <tableData>
                 -180.00    0.53191
                 -165.00   -0.01409
                  -32.00    1.92676
                  -10.00    2.99048
                    5.00    3.02296
                   20.00    2.49038
                   46.00    0.98778
                  180.00    0.53191
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            </tableData>
          </table>
          </product>
        </function>
        <function name="aero/coefficient/CLadot">
          <description>CL per alpha-dot (downwash lag at the tail)</description>
          <product>
            <property>aero/qbar-psf</property>
            <property>metrics/Sw-sqft</property>
            <property>aero/ci2vel</property>
            <property>aero/alphadot-rad_sec</property>
            <value>0.00000</value>
            <property>aero/function/mach-lift</property>
          </product>
        </function>
      </axis>
      <axis name="ROLL">
        <function name="aero/coefficient/Cl_base">
          <description>Cl over alpha and beta (hangar)</description>
          <product>
            <property>aero/qbar-psf</property>
            <property>metrics/Sw-sqft</property>
            <property>metrics/bw-ft</property>
            <property>aero/function/mach-side</property>
          <table>
            <independentVar lookup="row">aero/alpha-deg</independentVar>
            <independentVar lookup="column">aero/beta-deg</independentVar>
            <tableData>
                        -90.00    -70.00    -50.00    -40.00    -30.00    -25.00    -20.00    -15.00    -10.00     -6.00     -3.00      0.00      3.00      6.00     10.00     15.00     20.00     25.00     30.00     40.00     50.00     70.00     90.00
             -180.00   0.02824   0.02230   0.01652   0.01297   0.00946   0.00776   0.00611   0.00451   0.00776   0.00960   0.00518  -0.00000  -0.00518  -0.00960  -0.00776  -0.00451  -0.00611  -0.00776  -0.00946  -0.01297  -0.01652  -0.02230  -0.02824
              -35.00   0.02824   0.03732   0.03735   0.03641   0.02535   0.01980   0.01361   0.01053   0.00283  -0.00107  -0.00128  -0.00000   0.00128   0.00107  -0.00283  -0.01053  -0.01361  -0.01980  -0.02535  -0.03641  -0.03735  -0.03732  -0.02824
              -11.00   0.02824   0.02365   0.01310  -0.00652  -0.03098  -0.03289  -0.02495  -0.01960  -0.01376  -0.00848  -0.00427  -0.00000   0.00427   0.00848   0.01376   0.01960   0.02495   0.03289   0.03098   0.00652  -0.01310  -0.02365  -0.02824
                4.00   0.02824   0.02092   0.01101   0.01072   0.01701   0.01946   0.01946   0.01560   0.01065   0.00646   0.00324  -0.00000  -0.00324  -0.00646  -0.01065  -0.01560  -0.01946  -0.01946  -0.01701  -0.01072  -0.01101  -0.02092  -0.02824
               19.00   0.02824   0.01457   0.00784   0.01951   0.05829   0.06403   0.05808   0.04552   0.03115   0.01891   0.00953  -0.00000  -0.00953  -0.01891  -0.03115  -0.04552  -0.05808  -0.06403  -0.05829  -0.01951  -0.00784  -0.01457  -0.02824
               42.00   0.02824   0.00636  -0.01141  -0.02429  -0.02943  -0.02410  -0.01373  -0.00324   0.00423   0.00362   0.00195  -0.00000  -0.00195  -0.00362  -0.00423   0.00324   0.01373   0.02410   0.02943   0.02429   0.01141  -0.00636  -0.02824
              180.00   0.02824   0.02230   0.01652   0.01297   0.00946   0.00776   0.00611   0.00451   0.00776   0.00960   0.00518  -0.00000  -0.00518  -0.00960  -0.00776  -0.00451  -0.00611  -0.00776  -0.00946  -0.01297  -0.01652  -0.02230  -0.02824
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            </tableData>
          </table>
          </product>
        </function>
        <function name="aero/coefficient/Cl_aileron">
          <description>Cl increment from aileron (deg), over alpha</description>
          <product>
            <property>aero/qbar-psf</property>
            <property>metrics/Sw-sqft</property>
            <property>metrics/bw-ft</property>
            <property>aero/function/mach-aileron</property>
          <table>
            <independentVar lookup="row">aero/alpha-deg</independentVar>
            <independentVar lookup="column">fcs/left-aileron-pos-deg</independentVar>
            <tableData>
                        -25.00    -20.00    -15.00    -10.00     -5.00      0.00      5.00     10.00     15.00     20.00     25.00
             -180.00   0.00000   0.00000   0.00000   0.00000   0.00000   0.00000   0.00000   0.00000   0.00000   0.00000   0.00000
              -35.00  -0.04386  -0.03860  -0.03204  -0.02333  -0.01230   0.00000   0.01230   0.02333   0.03204   0.03860   0.04386
              -11.00  -0.06356  -0.05625  -0.04694  -0.03430  -0.01811   0.00000   0.01811   0.03430   0.04694   0.05625   0.06356
                4.00  -0.06078  -0.05376  -0.04486  -0.03278  -0.01730   0.00000   0.01730   0.03278   0.04486   0.05376   0.06078
               19.00  -0.06097  -0.05324  -0.04390  -0.03178  -0.01669   0.00000   0.01669   0.03178   0.04390   0.05324   0.06096
               42.00  -0.03251  -0.02874  -0.02397  -0.01754  -0.00932   0.00000   0.00932   0.01754   0.02397   0.02874   0.03251
              180.00   0.00000   0.00000   0.00000   0.00000   0.00000   0.00000   0.00000   0.00000   0.00000   0.00000   0.00000
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            </tableData>
          </table>
          </product>
        </function>
        <function name="aero/coefficient/Cl_rudder">
          <description>Cl increment from rudder (deg), over alpha</description>
          <product>
            <property>aero/qbar-psf</property>
            <property>metrics/Sw-sqft</property>
            <property>metrics/bw-ft</property>
            <property>aero/function/mach-rudder</property>
          <table>
            <independentVar lookup="row">aero/alpha-deg</independentVar>
            <independentVar lookup="column">fcs/rudder-pos-deg</independentVar>
            <tableData>
                        -30.00    -25.00    -20.00    -15.00    -10.00     -5.00      0.00      5.00     10.00     15.00     20.00     25.00     30.00
             -180.00   0.00000   0.00000   0.00000   0.00000   0.00000   0.00000   0.00000   0.00000   0.00000   0.00000   0.00000   0.00000   0.00000
              -35.00  -0.00470  -0.00425  -0.00374  -0.00311  -0.00226  -0.00119   0.00000   0.00119   0.00226   0.00311   0.00374   0.00425   0.00471
              -11.00  -0.00638  -0.00571  -0.00499  -0.00411  -0.00297  -0.00156   0.00000   0.00156   0.00297   0.00411   0.00499   0.00572   0.00638
                4.00  -0.00685  -0.00615  -0.00538  -0.00444  -0.00322  -0.00169   0.00000   0.00169   0.00322   0.00444   0.00538   0.00615   0.00686
               19.00  -0.00620  -0.00555  -0.00485  -0.00400  -0.00289  -0.00152   0.00000   0.00152   0.00289   0.00400   0.00485   0.00556   0.00620
               42.00  -0.00597  -0.00545  -0.00486  -0.00409  -0.00301  -0.00160   0.00000   0.00160   0.00301   0.00409   0.00486   0.00545   0.00597
              180.00   0.00000   0.00000   0.00000   0.00000   0.00000   0.00000   0.00000   0.00000   0.00000   0.00000   0.00000   0.00000   0.00000
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            </tableData>
          </table>
          </product>
        </function>
        <function name="aero/coefficient/Clp">
          <description>Cl per p (non-dimensional), over alpha</description>
          <product>
            <property>aero/qbar-psf</property>
            <property>metrics/Sw-sqft</property>
            <property>metrics/bw-ft</property>
            <property>aero/bi2vel</property>
            <property>velocities/p-aero-rad_sec</property>
            <property>aero/function/mach-lift</property>
          <table>
            <independentVar lookup="row">aero/alpha-deg</independentVar>
            <tableData>
                 -180.00   -0.59631
                 -165.00   -0.16925
                  -32.00   -0.20449
                  -10.00   -0.28214
                    5.00   -0.21980
                   20.00   -0.23031
                   46.00   -0.20884
                  180.00   -0.59631
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            </tableData>
          </table>
          </product>
        </function>
        <function name="aero/coefficient/Clr">
          <description>Cl per r (non-dimensional), over alpha</description>
          <product>
            <property>aero/qbar-psf</property>
            <property>metrics/Sw-sqft</property>
            <property>metrics/bw-ft</property>
            <property>aero/bi2vel</property>
            <property>velocities/r-aero-rad_sec</property>
            <property>aero/function/mach-lift</property>
          <table>
            <independentVar lookup="row">aero/alpha-deg</independentVar>
            <tableData>
                 -180.00    0.07955
                 -165.00    0.11574
                  -32.00   -0.14004
                  -10.00   -0.02944
                    5.00    0.06767
                   20.00    0.13817
                   46.00    0.29518
                  180.00    0.07955
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            </tableData>
          </table>
          </product>
        </function>
      </axis>
      <axis name="PITCH">
        <function name="aero/coefficient/Cm_base">
          <description>Cm over alpha and beta (hangar)</description>
          <product>
            <property>aero/qbar-psf</property>
            <property>metrics/Sw-sqft</property>
            <property>metrics/cbarw-ft</property>
          <table>
            <independentVar lookup="row">aero/alpha-deg</independentVar>
            <independentVar lookup="column">aero/beta-deg</independentVar>
            <tableData>
                        -90.00    -70.00    -50.00    -40.00    -30.00    -25.00    -20.00    -15.00    -10.00     -6.00     -3.00      0.00      3.00      6.00     10.00     15.00     20.00     25.00     30.00     40.00     50.00     70.00     90.00
             -180.00  -0.00000   0.00001  -0.00004  -0.00012  -0.00021  -0.00025  -0.00028  -0.00031   0.00208   0.00157   0.00007  -0.00048   0.00007   0.00157   0.00208  -0.00031  -0.00028  -0.00025  -0.00021  -0.00012  -0.00004   0.00001  -0.00000
              -35.00  -0.00000  -0.00974  -0.11755  -0.15393  -0.18636  -0.19618  -0.19798  -0.19323  -0.18584  -0.18138  -0.17969  -0.17952  -0.17969  -0.18138  -0.18584  -0.19323  -0.19798  -0.19618  -0.18636  -0.15393  -0.11755  -0.00974  -0.00000
              -11.00  -0.00000  -0.00696  -0.03695  -0.04577  -0.05048  -0.05474  -0.06031  -0.06229  -0.06329  -0.06371  -0.06395  -0.06404  -0.06395  -0.06371  -0.06329  -0.06229  -0.06031  -0.05474  -0.05048  -0.04577  -0.03695  -0.00696  -0.00000
                4.00   0.00000   0.00260   0.01360   0.01882   0.02265   0.02255   0.02138   0.02148   0.02156   0.02145   0.02133   0.02128   0.02133   0.02145   0.02156   0.02148   0.02138   0.02255   0.02265   0.01882   0.01360   0.00260   0.00000
               19.00   0.00000  -0.00245   0.05504   0.07552   0.08563   0.08825   0.08803   0.09505   0.10234   0.10674   0.10908   0.11013   0.10908   0.10674   0.10234   0.09505   0.08803   0.08825   0.08563   0.07552   0.05504  -0.00245   0.00000
               42.00   0.00000  -0.00066   0.13845   0.18737   0.22931   0.24424   0.24535   0.23554   0.22222   0.22000   0.22144   0.22191   0.22144   0.22000   0.22222   0.23554   0.24535   0.24424   0.22931   0.18737   0.13845  -0.00066   0.00000
              180.00  -0.00000   0.00001  -0.00004  -0.00012  -0.00021  -0.00025  -0.00028  -0.00031   0.00208   0.00157   0.00007  -0.00048   0.00007   0.00157   0.00208  -0.00031  -0.00028  -0.00025  -0.00021  -0.00012  -0.00004   0.00001  -0.00000
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            </tableData>
          </table>
          </product>
        </function>
        <function name="aero/coefficient/Cm_mach">
          <description>Cm from the neutral point's move with Mach</description>
          <product>
            <property>aero/qbar-psf</property>
            <property>metrics/Sw-sqft</property>
            <property>metrics/cbarw-ft</property>
            <property>aero/function/CL-base</property>
            <property>aero/function/mach-dCm-dCL</property>
          </product>
        </function>
        <function name="aero/coefficient/Cm_elevator">
          <description>Cm increment from elevator (deg), over alpha</description>
          <product>
            <property>aero/qbar-psf</property>
            <property>metrics/Sw-sqft</property>
            <property>metrics/cbarw-ft</property>
            <property>aero/function/mach-elevator</property>
          <table>
            <independentVar lookup="row">aero/alpha-deg</independentVar>
            <independentVar lookup="column">fcs/elevator-pos-deg</independentVar>
            <tableData>
                        -25.00    -20.00    -15.00    -10.00     -5.00      0.00      5.00     10.00     15.00     20.00     25.00     30.00     35.00     40.00     45.00     50.00
             -180.00  -0.02107  -0.02111  -0.01625  -0.02256  -0.02174   0.00000   0.02172   0.02240   0.01533   0.01947   0.02289   0.02543   0.02702   0.02761   0.02712   0.02555
              -35.00   0.18698   0.17412   0.13596   0.09396   0.04764   0.00000  -0.04540  -0.08468  -0.11405  -0.13352  -0.14579  -0.14104  -0.13362  -0.12373  -0.11156  -0.09732
              -11.00   0.24336   0.22680   0.18370   0.13219   0.07070   0.00000  -0.07467  -0.14597  -0.20737  -0.25496  -0.28736  -0.30140  -0.31470  -0.32623  -0.33437  -0.33728
                4.00   0.26809   0.25062   0.19633   0.13513   0.06822   0.00000  -0.06718  -0.12926  -0.18229  -0.22913  -0.27349  -0.30099  -0.32765  -0.35242  -0.37319  -0.38754
               19.00   0.27882   0.26083   0.20863   0.14654   0.07527   0.00000  -0.07409  -0.14192  -0.19714  -0.23861  -0.25982  -0.27894  -0.29830  -0.31846  -0.33901  -0.35830
               42.00   0.12102   0.10881   0.09443   0.07090   0.03829   0.00000  -0.04054  -0.08031  -0.11687  -0.15101  -0.18674  -0.21659  -0.24697  -0.27444  -0.29791  -0.31883
              180.00  -0.02107  -0.02111  -0.01625  -0.02256  -0.02174   0.00000   0.02172   0.02240   0.01533   0.01947   0.02289   0.02543   0.02702   0.02761   0.02712   0.02555
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            </tableData>
          </table>
          </product>
        </function>
        <function name="aero/coefficient/Cmq">
          <description>Cm per q (non-dimensional), over alpha</description>
          <product>
            <property>aero/qbar-psf</property>
            <property>metrics/Sw-sqft</property>
            <property>metrics/cbarw-ft</property>
            <property>aero/ci2vel</property>
            <property>velocities/q-aero-rad_sec</property>
            <property>aero/function/mach-lift</property>
          <table>
            <independentVar lookup="row">aero/alpha-deg</independentVar>
            <tableData>
                 -180.00   -1.24864
                 -165.00   -0.28687
                  -32.00   -1.56731
                  -10.00   -1.58891
                    5.00   -1.40533
                   20.00   -1.63807
                   46.00   -1.75353
                  180.00   -1.24864
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            </tableData>
          </table>
          </product>
        </function>
        <function name="aero/coefficient/Cmadot">
          <description>Cm per alpha-dot (downwash lag at the tail)</description>
          <product>
            <property>aero/qbar-psf</property>
            <property>metrics/Sw-sqft</property>
            <property>metrics/cbarw-ft</property>
            <property>aero/ci2vel</property>
            <property>aero/alphadot-rad_sec</property>
            <value>0.00000</value>
            <property>aero/function/mach-lift</property>
          </product>
        </function>
        <function name="aero/coefficient/Cm_gear">
          <description>the gear's drag's pitching moment, -1.24 m from the reference point's height</description>
          <product>
            <property>aero/qbar-psf</property>
            <property>metrics/Sw-sqft</property>
            <property>metrics/cbarw-ft</property>
            <value>-0.00266064</value>
            <property>gear/gear-pos-norm</property>
          </product>
        </function>
      </axis>
      <axis name="YAW">
        <function name="aero/coefficient/Cn_base">
          <description>Cn over alpha and beta (hangar)</description>
          <product>
            <property>aero/qbar-psf</property>
            <property>metrics/Sw-sqft</property>
            <property>metrics/bw-ft</property>
            <property>aero/function/mach-side</property>
          <table>
            <independentVar lookup="row">aero/alpha-deg</independentVar>
            <independentVar lookup="column">aero/beta-deg</independentVar>
            <tableData>
                        -90.00    -70.00    -50.00    -40.00    -30.00    -25.00    -20.00    -15.00    -10.00     -6.00     -3.00      0.00      3.00      6.00     10.00     15.00     20.00     25.00     30.00     40.00     50.00     70.00     90.00
             -180.00  -0.02216  -0.04567  -0.06007  -0.05997  -0.05367  -0.04813  -0.04104  -0.03252  -0.03616  -0.03610  -0.01927  -0.00000   0.01927   0.03610   0.03616   0.03252   0.04104   0.04813   0.05367   0.05997   0.06007   0.04567   0.02216
              -35.00  -0.02216  -0.00176   0.01626   0.02512   0.02651   0.02389   0.01889   0.00846   0.00616   0.00375   0.00180  -0.00000  -0.00180  -0.00375  -0.00616  -0.00846  -0.01889  -0.02389  -0.02651  -0.02512  -0.01626   0.00176   0.02216
              -11.00  -0.02216  -0.00064   0.01714   0.02365   0.01960   0.01125   0.00297   0.00154   0.00094   0.00061   0.00034  -0.00000  -0.00034  -0.00061  -0.00094  -0.00154  -0.00297  -0.01125  -0.01960  -0.02365  -0.01714   0.00064   0.02216
                4.00  -0.02216  -0.00122   0.01690   0.02212   0.01696   0.00873   0.00049  -0.00101  -0.00111  -0.00081  -0.00043  -0.00000   0.00043   0.00081   0.00111   0.00101  -0.00049  -0.00873  -0.01696  -0.02212  -0.01690   0.00122   0.02216
               19.00  -0.02216  -0.00122   0.01708   0.02472   0.02502   0.02116   0.01074   0.00632   0.00408   0.00253   0.00132  -0.00000  -0.00132  -0.00253  -0.00408  -0.00632  -0.01074  -0.02116  -0.02502  -0.02472  -0.01708   0.00122   0.02216
               42.00  -0.02216  -0.00403   0.01585   0.02096   0.02156   0.01948   0.01617   0.01135   0.00261   0.00163   0.00059  -0.00000  -0.00059  -0.00163  -0.00261  -0.01135  -0.01617  -0.01948  -0.02156  -0.02096  -0.01585   0.00403   0.02216
              180.00  -0.02216  -0.04567  -0.06007  -0.05997  -0.05367  -0.04813  -0.04104  -0.03252  -0.03616  -0.03610  -0.01927  -0.00000   0.01927   0.03610   0.03616   0.03252   0.04104   0.04813   0.05367   0.05997   0.06007   0.04567   0.02216
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            </tableData>
          </table>
          </product>
        </function>
        <function name="aero/coefficient/Cn_aileron">
          <description>Cn increment from aileron (deg), over alpha</description>
          <product>
            <property>aero/qbar-psf</property>
            <property>metrics/Sw-sqft</property>
            <property>metrics/bw-ft</property>
            <property>aero/function/mach-aileron</property>
          <table>
            <independentVar lookup="row">aero/alpha-deg</independentVar>
            <independentVar lookup="column">fcs/left-aileron-pos-deg</independentVar>
            <tableData>
                        -25.00    -20.00    -15.00    -10.00     -5.00      0.00      5.00     10.00     15.00     20.00     25.00
             -180.00  -0.00000  -0.00000  -0.00000  -0.00000  -0.00000   0.00000  -0.00000  -0.00000  -0.00000  -0.00000  -0.00000
              -35.00   0.00187   0.00183   0.00170   0.00137   0.00078   0.00000  -0.00078  -0.00137  -0.00170  -0.00183  -0.00187
              -11.00  -0.00882  -0.00770  -0.00623  -0.00429  -0.00210   0.00000   0.00210   0.00429   0.00623   0.00770   0.00882
                4.00  -0.00591  -0.00517  -0.00427  -0.00309  -0.00162   0.00000   0.00162   0.00309   0.00427   0.00517   0.00591
               19.00  -0.00988  -0.00925  -0.00841  -0.00693  -0.00412   0.00000   0.00412   0.00693   0.00841   0.00925   0.00988
               42.00  -0.01445  -0.01314  -0.01125  -0.00834  -0.00434   0.00000   0.00434   0.00834   0.01125   0.01314   0.01445
              180.00  -0.00000  -0.00000  -0.00000  -0.00000  -0.00000   0.00000  -0.00000  -0.00000  -0.00000  -0.00000  -0.00000
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            </tableData>
          </table>
          </product>
        </function>
        <function name="aero/coefficient/Cn_rudder">
          <description>Cn increment from rudder (deg), over alpha</description>
          <product>
            <property>aero/qbar-psf</property>
            <property>metrics/Sw-sqft</property>
            <property>metrics/bw-ft</property>
            <property>aero/function/mach-rudder</property>
          <table>
            <independentVar lookup="row">aero/alpha-deg</independentVar>
            <independentVar lookup="column">fcs/rudder-pos-deg</independentVar>
            <tableData>
                        -30.00    -25.00    -20.00    -15.00    -10.00     -5.00      0.00      5.00     10.00     15.00     20.00     25.00     30.00
             -180.00  -0.00000  -0.00000  -0.00000  -0.00000  -0.00000  -0.00000   0.00000  -0.00000  -0.00000  -0.00000  -0.00000  -0.00000  -0.00000
              -35.00   0.01380   0.01266   0.01133   0.00957   0.00705   0.00372   0.00000  -0.00372  -0.00705  -0.00957  -0.01134  -0.01266  -0.01380
              -11.00   0.01869   0.01705   0.01517   0.01274   0.00934   0.00494   0.00000  -0.00494  -0.00935  -0.01274  -0.01518  -0.01705  -0.01870
                4.00   0.01994   0.01820   0.01621   0.01361   0.00999   0.00528   0.00000  -0.00528  -0.00999  -0.01361  -0.01621  -0.01821  -0.01996
               19.00   0.01843   0.01683   0.01499   0.01260   0.00925   0.00490   0.00000  -0.00490  -0.00925  -0.01260  -0.01500  -0.01683  -0.01844
               42.00   0.01665   0.01538   0.01386   0.01177   0.00871   0.00460   0.00000  -0.00460  -0.00871  -0.01177  -0.01386  -0.01537  -0.01665
              180.00  -0.00000  -0.00000  -0.00000  -0.00000  -0.00000  -0.00000   0.00000  -0.00000  -0.00000  -0.00000  -0.00000  -0.00000  -0.00000
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            </tableData>
          </table>
          </product>
        </function>
        <function name="aero/coefficient/Cnp">
          <description>Cn per p (non-dimensional), over alpha</description>
          <product>
            <property>aero/qbar-psf</property>
            <property>metrics/Sw-sqft</property>
            <property>metrics/bw-ft</property>
            <property>aero/bi2vel</property>
            <property>velocities/p-aero-rad_sec</property>
            <property>aero/function/mach-lift</property>
          <table>
            <independentVar lookup="row">aero/alpha-deg</independentVar>
            <tableData>
                 -180.00    0.10078
                 -165.00    0.11531
                  -32.00    0.02179
                  -10.00    0.02972
                    5.00   -0.00406
                   20.00    0.01381
                   46.00    0.03933
                  180.00    0.10078
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            </tableData>
          </table>
          </product>
        </function>
        <function name="aero/coefficient/Cnr">
          <description>Cn per r (non-dimensional), over alpha</description>
          <product>
            <property>aero/qbar-psf</property>
            <property>metrics/Sw-sqft</property>
            <property>metrics/bw-ft</property>
            <property>aero/bi2vel</property>
            <property>velocities/r-aero-rad_sec</property>
            <property>aero/function/mach-lift</property>
          <table>
            <independentVar lookup="row">aero/alpha-deg</independentVar>
            <tableData>
                 -180.00   -0.18149
                 -165.00   -0.20497
                  -32.00   -0.19718
                  -10.00   -0.17425
                    5.00   -0.17154
                   20.00   -0.18166
                   46.00   -0.21878
                  180.00   -0.18149
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            </tableData>
          </table>
          </product>
        </function>
      </axis>
    </aerodynamics>
</fdm_config>
