<?xml version="1.0"?>
<?xml-stylesheet type="text/xsl" href="http://jsbsim.sourceforge.net/JSBSim.xsl"?>
<!-- Generated by hangar 0.1.0 from h6k.toml on 2026-10-01. Edit the design and rebuild; changes
     made here are overwritten.  -->
<fdm_config name="h6k" version="2.0" release="ALPHA"
            xmlns:xsi="http://www.w3.org/2001/XMLSchema-instance"
            xsi:noNamespaceSchemaLocation="http://jsbsim.sourceforge.net/JSBSim.xsd">
    <fileheader>
      <author>hangar</author>
      <filecreationdate>2026-10-01</filecreationdate>
      <version>0.1.0</version>
      <description>Xi'an H-6K (hangar build)</description>
      <note>Aerodynamics: vortex lattice with viscous section polars, full-envelope
        strip model, slender-body fuselage (hangar). Mass: Raymer component
        weights on the geometry. Propeller: blade-element momentum theory.</note>
      <reference refID="fsim/applicability/aerobatic" author="the design" title="Wikipedia, Xi'an H-6 (the H-6K): a bomber, not cleared for aerobatic manoeuvres" date="n/a"/>
      <reference refID="fsim/applicability/carrier" author="the design" title="Wikipedia, Xi'an H-6 (the H-6K): a land-based bomber" date="n/a"/>
      <reference refID="fsim/applicability/flaps" author="the design" title="Wikipedia, Xi'an H-6 and Tupolev Tu-16: trailing-edge flaps" date="n/a"/>
      <reference refID="fsim/applicability/ground_contact" author="the design" title="Wikipedia, Xi'an H-6 and Tupolev Tu-16: main bogies retracting into wing nacelles, twin nose wheels" date="n/a"/>
      <reference refID="fsim/applicability/releasable_stores" author="the design" title="Wikipedia, Xi'an H-6 (the H-6K): six underwing pylons for cruise missiles" date="n/a"/>
      <reference refID="fsim/applicability/retractable_gear" author="the design" title="Wikipedia, Xi'an H-6 and Tupolev Tu-16: retractable gear" date="n/a"/>
      <reference refID="fsim/applicability/vertical_flight" author="the design" title="Wikipedia, Xi'an H-6 (the H-6K, a rebuilt Tu-16 airframe): a conventional take-off and landing jet bomber. Conventional take-off and landing: no rotors, lift fans or vectored lift to hover" date="n/a"/>
    </fileheader>
    <metrics>
      <wingarea unit="M2"> 164.6500 </wingarea>
      <wingspan unit="M"> 32.8800 </wingspan>
      <chord unit="M"> 5.3311 </chord>
      <htailarea unit="M2"> 34.6060 </htailarea>
      <htailarm unit="M"> 15.1255 </htailarm>
      <vtailarea unit="M2"> 24.0435 </vtailarea>
      <vtailarm unit="M"> 14.1979 </vtailarm>
      <location name="AERORP" unit="M">
        <x> 16.4842 </x>
        <y> 0.0000 </y>
        <z> -0.0641 </z>
      </location>
      <location name="EYEPOINT" unit="M">
        <x> 5.0000 </x>
        <y> 0.0000 </y>
        <z> 1.2500 </z>
      </location>
      <location name="VRP" unit="M">
        <x> 17.0000 </x>
        <y> 0.0000 </y>
        <z> 0.1000 </z>
      </location>
    </metrics>
    <mass_balance negated_crossproduct_inertia="false">
      <ixx unit="KG*M2"> 825009.09 </ixx>
      <iyy unit="KG*M2"> 1848266.59 </iyy>
      <izz unit="KG*M2"> 2537624.07 </izz>
      <ixy unit="KG*M2"> -0.124 </ixy>
      <ixz unit="KG*M2"> 56874.526 </ixz>
      <iyz unit="KG*M2"> -0.496 </iyz>
      <emptywt unit="KG"> 37200.00 </emptywt>
      <location name="CG" unit="M">
        <x> 17.0000 </x>
        <y> 0.0000 </y>
        <z> 0.1000 </z>
      </location>
      <pointmass name="pilots">
        <weight unit="KG"> 200.00 </weight>
        <location unit="M">
          <x> 5.0000 </x>
          <y> 0.0000 </y>
          <z> 0.5500 </z>
        </location>
      </pointmass>
      <pointmass name="navigator and weapons officer">
        <weight unit="KG"> 200.00 </weight>
        <location unit="M">
          <x> 3.6000 </x>
          <y> 0.0000 </y>
          <z> -0.1000 </z>
        </location>
      </pointmass>
    </mass_balance>
    <ground_reactions>
      <contact type="BOGEY" name="Nose Gear">
        <location unit="M">
          <x> 6.7300 </x>
          <y> 0.0000 </y>
          <z> -3.6300 </z>
        </location>
        <static_friction> 0.8 </static_friction>
        <dynamic_friction> 0.5 </dynamic_friction>
        <rolling_friction> 0.02 </rolling_friction>
        <spring_coeff unit="N/M"> 420675 </spring_coeff>
        <damping_coeff unit="N/M/SEC"> 46535 </damping_coeff>
        <damping_coeff_rebound unit="N/M/SEC"> 93069 </damping_coeff_rebound>
        <max_steer unit="DEG"> 55.0 </max_steer>
        <brake_group> NONE </brake_group>
        <retractable> 1 </retractable>
      </contact>
      <contact type="BOGEY" name="Left Main Gear">
        <location unit="M">
          <x> 17.5000 </x>
          <y> -4.9000 </y>
          <z> -3.6600 </z>
        </location>
        <static_friction> 0.8 </static_friction>
        <dynamic_friction> 0.5 </dynamic_friction>
        <rolling_friction> 0.02 </rolling_friction>
        <spring_coeff unit="N/M"> 1766909 </spring_coeff>
        <damping_coeff unit="N/M/SEC"> 218524 </damping_coeff>
        <damping_coeff_rebound unit="N/M/SEC"> 437048 </damping_coeff_rebound>
        <max_steer unit="DEG"> 0.0 </max_steer>
        <brake_group> LEFT </brake_group>
        <retractable> 1 </retractable>
      </contact>
      <contact type="BOGEY" name="Right Main Gear">
        <location unit="M">
          <x> 17.5000 </x>
          <y> 4.9000 </y>
          <z> -3.6600 </z>
        </location>
        <static_friction> 0.8 </static_friction>
        <dynamic_friction> 0.5 </dynamic_friction>
        <rolling_friction> 0.02 </rolling_friction>
        <spring_coeff unit="N/M"> 1766909 </spring_coeff>
        <damping_coeff unit="N/M/SEC"> 218524 </damping_coeff>
        <damping_coeff_rebound unit="N/M/SEC"> 437048 </damping_coeff_rebound>
        <max_steer unit="DEG"> 0.0 </max_steer>
        <brake_group> RIGHT </brake_group>
        <retractable> 1 </retractable>
      </contact>
      <contact type="STRUCTURE" name="EO turret front">
        <location unit="M">
          <x> 2.4643 </x>
          <y> -0.0000 </y>
          <z> -1.4166 </z>
        </location>
        <static_friction> 0.8 </static_friction>
        <dynamic_friction> 0.6 </dynamic_friction>
        <spring_coeff unit="N/M"> 3159177 </spring_coeff>
        <damping_coeff unit="N/M/SEC"> 105306 </damping_coeff>
        <damping_coeff_rebound unit="N/M/SEC"> 105306 </damping_coeff_rebound>
      </contact>
      <contact type="STRUCTURE" name="fin rear">
        <location unit="M">
          <x> 35.2500 </x>
          <y> 0.0000 </y>
          <z> 6.8500 </z>
        </location>
        <static_friction> 0.8 </static_friction>
        <dynamic_friction> 0.6 </dynamic_friction>
        <spring_coeff unit="N/M"> 3883733 </spring_coeff>
        <damping_coeff unit="N/M/SEC"> 129458 </damping_coeff>
        <damping_coeff_rebound unit="N/M/SEC"> 129458 </damping_coeff_rebound>
      </contact>
      <contact type="STRUCTURE" name="fuselage front">
        <location unit="M">
          <x> 0.0000 </x>
          <y> 0.0000 </y>
          <z> -0.0800 </z>
        </location>
        <static_friction> 0.8 </static_friction>
        <dynamic_friction> 0.6 </dynamic_friction>
        <spring_coeff unit="N/M"> 2455501 </spring_coeff>
        <damping_coeff unit="N/M/SEC"> 81850 </damping_coeff>
        <damping_coeff_rebound unit="N/M/SEC"> 81850 </damping_coeff_rebound>
      </contact>
      <contact type="STRUCTURE" name="fuselage rear">
        <location unit="M">
          <x> 34.5500 </x>
          <y> -0.0000 </y>
          <z> -0.1200 </z>
        </location>
        <static_friction> 0.8 </static_friction>
        <dynamic_friction> 0.6 </dynamic_friction>
        <spring_coeff unit="N/M"> 4649916 </spring_coeff>
        <damping_coeff unit="N/M/SEC"> 154997 </damping_coeff>
        <damping_coeff_rebound unit="N/M/SEC"> 154997 </damping_coeff_rebound>
      </contact>
      <contact type="STRUCTURE" name="htail left rear">
        <location unit="M">
          <x> 35.8994 </x>
          <y> -5.7200 </y>
          <z> 1.7962 </z>
        </location>
        <static_friction> 0.8 </static_friction>
        <dynamic_friction> 0.6 </dynamic_friction>
        <spring_coeff unit="N/M"> 3439002 </spring_coeff>
        <damping_coeff unit="N/M/SEC"> 114633 </damping_coeff>
        <damping_coeff_rebound unit="N/M/SEC"> 114633 </damping_coeff_rebound>
      </contact>
      <contact type="STRUCTURE" name="htail right rear">
        <location unit="M">
          <x> 35.8994 </x>
          <y> 5.7200 </y>
          <z> 1.7962 </z>
        </location>
        <static_friction> 0.8 </static_friction>
        <dynamic_friction> 0.6 </dynamic_friction>
        <spring_coeff unit="N/M"> 3439002 </spring_coeff>
        <damping_coeff unit="N/M/SEC"> 114633 </damping_coeff>
        <damping_coeff_rebound unit="N/M/SEC"> 114633 </damping_coeff_rebound>
      </contact>
      <contact type="STRUCTURE" name="wing left rear">
        <location unit="M">
          <x> 25.3209 </x>
          <y> -16.4415 </y>
          <z> -0.6196 </z>
        </location>
        <static_friction> 0.8 </static_friction>
        <dynamic_friction> 0.6 </dynamic_friction>
        <spring_coeff unit="N/M"> 1143077 </spring_coeff>
        <damping_coeff unit="N/M/SEC"> 38103 </damping_coeff>
        <damping_coeff_rebound unit="N/M/SEC"> 38103 </damping_coeff_rebound>
      </contact>
      <contact type="STRUCTURE" name="wing left rear 2">
        <location unit="M">
          <x> 22.3210 </x>
          <y> -16.4400 </y>
          <z> -0.6450 </z>
        </location>
        <static_friction> 0.8 </static_friction>
        <dynamic_friction> 0.6 </dynamic_friction>
        <spring_coeff unit="N/M"> 1211588 </spring_coeff>
        <damping_coeff unit="N/M/SEC"> 40386 </damping_coeff>
        <damping_coeff_rebound unit="N/M/SEC"> 40386 </damping_coeff_rebound>
      </contact>
      <contact type="STRUCTURE" name="wing right rear">
        <location unit="M">
          <x> 22.3210 </x>
          <y> 16.4400 </y>
          <z> -0.6450 </z>
        </location>
        <static_friction> 0.8 </static_friction>
        <dynamic_friction> 0.6 </dynamic_friction>
        <spring_coeff unit="N/M"> 1211587 </spring_coeff>
        <damping_coeff unit="N/M/SEC"> 40386 </damping_coeff>
        <damping_coeff_rebound unit="N/M/SEC"> 40386 </damping_coeff_rebound>
      </contact>
      <contact type="STRUCTURE" name="wing right rear 2">
        <location unit="M">
          <x> 25.3209 </x>
          <y> 16.4415 </y>
          <z> -0.6196 </z>
        </location>
        <static_friction> 0.8 </static_friction>
        <dynamic_friction> 0.6 </dynamic_friction>
        <spring_coeff unit="N/M"> 1143077 </spring_coeff>
        <damping_coeff unit="N/M/SEC"> 38103 </damping_coeff>
        <damping_coeff_rebound unit="N/M/SEC"> 38103 </damping_coeff_rebound>
      </contact>
    </ground_reactions>
    <propulsion>
      <engine file="h6k_engine0">
        <location unit="M">
          <x> 15.0000 </x>
          <y> -1.8700 </y>
          <z> 0.0000 </z>
        </location>
        <feed>0</feed>
        <feed>1</feed>
        <feed>2</feed>
        <feed>3</feed>
        <feed>4</feed>
        <feed>5</feed>
        <thruster file="h6k_nozzle0">
          <location unit="M">
            <x> 21.0000 </x>
            <y> -1.9800 </y>
            <z> 0.0000 </z>
          </location>
          <orient unit="DEG"> <roll>0.00</roll> <pitch>0.00</pitch> <yaw>0.00</yaw> </orient>

        </thruster>
      </engine>
      <engine file="h6k_engine0">
        <location unit="M">
          <x> 15.0000 </x>
          <y> 1.8700 </y>
          <z> 0.0000 </z>
        </location>
        <feed>0</feed>
        <feed>1</feed>
        <feed>2</feed>
        <feed>3</feed>
        <feed>4</feed>
        <feed>5</feed>
        <thruster file="h6k_nozzle0">
          <location unit="M">
            <x> 21.0000 </x>
            <y> 1.9800 </y>
            <z> 0.0000 </z>
          </location>
          <orient unit="DEG"> <roll>0.00</roll> <pitch>0.00</pitch> <yaw>0.00</yaw> </orient>

        </thruster>
      </engine>
      <tank type="FUEL">
        <location unit="M">
          <x> 9.5000 </x>
          <y> 0.0000 </y>
          <z> 0.2000 </z>
        </location>
        <capacity unit="KG"> 8000.00 </capacity>
        <contents unit="KG"> 4800.00 </contents>
      </tank>
      <tank type="FUEL">
        <location unit="M">
          <x> 21.0000 </x>
          <y> 0.0000 </y>
          <z> 0.2000 </z>
        </location>
        <capacity unit="KG"> 9000.00 </capacity>
        <contents unit="KG"> 5400.00 </contents>
      </tank>
      <tank type="FUEL">
        <location unit="M">
          <x> 14.8000 </x>
          <y> -3.5000 </y>
          <z> 0.1500 </z>
        </location>
        <capacity unit="KG"> 5500.00 </capacity>
        <contents unit="KG"> 3300.00 </contents>
      </tank>
      <tank type="FUEL">
        <location unit="M">
          <x> 14.8000 </x>
          <y> 3.5000 </y>
          <z> 0.1500 </z>
        </location>
        <capacity unit="KG"> 5500.00 </capacity>
        <contents unit="KG"> 3300.00 </contents>
      </tank>
      <tank type="FUEL">
        <location unit="M">
          <x> 18.7000 </x>
          <y> -9.0000 </y>
          <z> -0.1900 </z>
        </location>
        <capacity unit="KG"> 4000.00 </capacity>
        <contents unit="KG"> 2400.00 </contents>
      </tank>
      <tank type="FUEL">
        <location unit="M">
          <x> 18.7000 </x>
          <y> 9.0000 </y>
          <z> -0.1900 </z>
        </location>
        <capacity unit="KG"> 4000.00 </capacity>
        <contents unit="KG"> 2400.00 </contents>
      </tank>
    </propulsion>
    <flight_control name="h6k">
      <!-- the aircraft's profile for the platform (docs/control-architecture.md, section 7): what
           hangar knows of it - its design, its flight tests, its identified responses -->
      <property value="1">fsim/identity/version</property>
      <property value="1">fsim/identity/provenance</property>
      <property value="4">fsim/identity/class</property>
      <property value="1">fsim/identity/family</property>
      <property value="1">fsim/effectors/version</property>
      <property value="1">fsim/effectors/provenance</property>
      <property value="1">fsim/effectors/flaps</property>
      <property value="8">fsim/effectors/flaps_transit_s</property>
      <property value="0.0">fsim/effectors/neutral</property>
      <property value="0.0">fsim/effectors/pitch</property>
      <property value="1">fsim/effectors/pitch_trim</property>
      <property value="1">fsim/effectors/retractable_gear</property>
      <property value="0.0">fsim/effectors/roll</property>
      <property value="0.0">fsim/effectors/speedbrake</property>
      <property value="1">fsim/effectors/wheel_brakes</property>
      <property value="0.0">fsim/effectors/yaw</property>
      <property value="1">fsim/envelope/version</property>
      <property value="1">fsim/envelope/provenance</property>
      <property value="25.9589">fsim/envelope/clean/alpha_max_deg</property>
      <property value="55.6771">fsim/envelope/clean/cas_min_ms</property>
      <property value="15.43">fsim/envelope/crosswind_max_ms</property>
      <property value="11.25">fsim/envelope/ground_pitch_max_deg</property>
      <property value="8.02">fsim/envelope/ground_turn_radius_m</property>
      <property value="0.0553">fsim/envelope/ground_yaw_accel_rad_s2</property>
      <property value="1">fsim/propulsion/version</property>
      <property value="1">fsim/propulsion/provenance</property>
      <property value="0.0">fsim/propulsion/afterburner</property>
      <property value="2">fsim/propulsion/engines</property>
      <property value="0.201585">fsim/propulsion/spool_s</property>
      <property value="2">fsim/propulsion/type</property>
      <property value="1">fsim/plant/version</property>
      <property value="1">fsim/plant/provenance</property>
      <property value="-2.87386">fsim/plant/alpha_zero_lift_deg</property>
      <property value="3000">fsim/plant/altitude_m</property>
      <property value="129.221">fsim/plant/eas_ms</property>
      <property value="0.169697">fsim/plant/elevator_trim</property>
      <property value="-0.18899">fsim/plant/elevator_trim_lift</property>
      <property value="4.25898">fsim/plant/pitch/gain</property>
      <property value="0.834601">fsim/plant/pitch/tau_s</property>
      <property value="1.23044">fsim/plant/roll/gain</property>
      <property value="0.457082">fsim/plant/roll/tau_s</property>
      <property value="2.46682">fsim/plant/speed/gain</property>
      <property value="0.201585">fsim/plant/speed/tau_s</property>
      <property value="148.86">fsim/plant/tas_ms</property>
      <property value="0.505811">fsim/plant/throttle_trim</property>
      <property value="0.521988">fsim/plant/yaw/gain</property>
      <property value="1">fsim/performance/version</property>
      <property value="1">fsim/performance/provenance</property>
      <property value="12522.1">fsim/performance/ceiling_m</property>
      <property value="306.524">fsim/performance/max_tas_ms</property>
      <property value="55.6771">fsim/performance/stall_cas_ms</property>
      <property value="1">fsim/applicability/version</property>
      <property value="1">fsim/applicability/provenance</property>
      <property value="0.0">fsim/applicability/aerobatic</property>
      <property value="1">fsim/applicability/carrier</property>
      <property value="1">fsim/applicability/flaps</property>
      <property value="1">fsim/applicability/ground_contact</property>
      <property value="2">fsim/applicability/releasable_stores</property>
      <property value="1">fsim/applicability/retractable_gear</property>
      <property value="0.0">fsim/applicability/vertical_flight</property>
      <property value="1">fsim/tables/version</property>
      <property value="1">fsim/tables/provenance</property>
      <property value="100">fsim/tables/altitude_m/h0</property>
      <property value="2500">fsim/tables/altitude_m/h1</property>
      <property value="5010">fsim/tables/altitude_m/h2</property>
      <property value="6000">fsim/tables/altitude_m/h3</property>
      <property value="7510">fsim/tables/altitude_m/h4</property>
      <property value="9390">fsim/tables/altitude_m/h5</property>
      <property value="10640">fsim/tables/altitude_m/h6</property>
      <property value="11900">fsim/tables/altitude_m/h7</property>
      <property value="0.48536">fsim/tables/best_endurance_fuel_kg_s/h0/w0</property>
      <property value="0.612499">fsim/tables/best_endurance_fuel_kg_s/h0/w1</property>
      <property value="0.732739">fsim/tables/best_endurance_fuel_kg_s/h0/w2</property>
      <property value="0.444165">fsim/tables/best_endurance_fuel_kg_s/h1/w0</property>
      <property value="0.546927">fsim/tables/best_endurance_fuel_kg_s/h1/w1</property>
      <property value="0.658437">fsim/tables/best_endurance_fuel_kg_s/h1/w2</property>
      <property value="0.398077">fsim/tables/best_endurance_fuel_kg_s/h2/w0</property>
      <property value="0.486511">fsim/tables/best_endurance_fuel_kg_s/h2/w1</property>
      <property value="0.57527">fsim/tables/best_endurance_fuel_kg_s/h2/w2</property>
      <property value="0.376936">fsim/tables/best_endurance_fuel_kg_s/h3/w0</property>
      <property value="0.464688">fsim/tables/best_endurance_fuel_kg_s/h3/w1</property>
      <property value="0.53481">fsim/tables/best_endurance_fuel_kg_s/h3/w2</property>
      <property value="0.353053">fsim/tables/best_endurance_fuel_kg_s/h4/w0</property>
      <property value="0.429455">fsim/tables/best_endurance_fuel_kg_s/h4/w1</property>
      <property value="0.496665">fsim/tables/best_endurance_fuel_kg_s/h4/w2</property>
      <property value="0.319826">fsim/tables/best_endurance_fuel_kg_s/h5/w0</property>
      <property value="0.390329">fsim/tables/best_endurance_fuel_kg_s/h5/w1</property>
      <property value="0.444046">fsim/tables/best_endurance_fuel_kg_s/h5/w2</property>
      <property value="0.30024">fsim/tables/best_endurance_fuel_kg_s/h6/w0</property>
      <property value="0.367331">fsim/tables/best_endurance_fuel_kg_s/h6/w1</property>
      <property value="0.522218">fsim/tables/best_endurance_fuel_kg_s/h6/w2</property>
      <property value="0.28636">fsim/tables/best_endurance_fuel_kg_s/h7/w0</property>
      <property value="0.35114">fsim/tables/best_endurance_fuel_kg_s/h7/w1</property>
      <property value="95.2927">fsim/tables/best_endurance_tas_ms/h0/w0</property>
      <property value="107.159">fsim/tables/best_endurance_tas_ms/h0/w1</property>
      <property value="117.849">fsim/tables/best_endurance_tas_ms/h0/w2</property>
      <property value="107.169">fsim/tables/best_endurance_tas_ms/h1/w0</property>
      <property value="119.923">fsim/tables/best_endurance_tas_ms/h1/w1</property>
      <property value="131.77">fsim/tables/best_endurance_tas_ms/h1/w2</property>
      <property value="121.484">fsim/tables/best_endurance_tas_ms/h2/w0</property>
      <property value="135.414">fsim/tables/best_endurance_tas_ms/h2/w1</property>
      <property value="146.882">fsim/tables/best_endurance_tas_ms/h2/w2</property>
      <property value="128.084">fsim/tables/best_endurance_tas_ms/h3/w0</property>
      <property value="141.239">fsim/tables/best_endurance_tas_ms/h3/w1</property>
      <property value="152.625">fsim/tables/best_endurance_tas_ms/h3/w2</property>
      <property value="138.012">fsim/tables/best_endurance_tas_ms/h4/w0</property>
      <property value="153.176">fsim/tables/best_endurance_tas_ms/h4/w1</property>
      <property value="167.278">fsim/tables/best_endurance_tas_ms/h4/w2</property>
      <property value="154.51">fsim/tables/best_endurance_tas_ms/h5/w0</property>
      <property value="169.095">fsim/tables/best_endurance_tas_ms/h5/w1</property>
      <property value="188.681">fsim/tables/best_endurance_tas_ms/h5/w2</property>
      <property value="166.777">fsim/tables/best_endurance_tas_ms/h6/w0</property>
      <property value="180.75">fsim/tables/best_endurance_tas_ms/h6/w1</property>
      <property value="182.269">fsim/tables/best_endurance_tas_ms/h6/w2</property>
      <property value="183.667">fsim/tables/best_endurance_tas_ms/h7/w0</property>
      <property value="204.295">fsim/tables/best_endurance_tas_ms/h7/w1</property>
      <property value="0.601728">fsim/tables/best_range_fuel_kg_s/h0/w0</property>
      <property value="0.757744">fsim/tables/best_range_fuel_kg_s/h0/w1</property>
      <property value="0.944972">fsim/tables/best_range_fuel_kg_s/h0/w2</property>
      <property value="0.541466">fsim/tables/best_range_fuel_kg_s/h1/w0</property>
      <property value="0.688098">fsim/tables/best_range_fuel_kg_s/h1/w1</property>
      <property value="0.827077">fsim/tables/best_range_fuel_kg_s/h1/w2</property>
      <property value="0.487069">fsim/tables/best_range_fuel_kg_s/h2/w0</property>
      <property value="0.596754">fsim/tables/best_range_fuel_kg_s/h2/w1</property>
      <property value="0.725216">fsim/tables/best_range_fuel_kg_s/h2/w2</property>
      <property value="0.457811">fsim/tables/best_range_fuel_kg_s/h3/w0</property>
      <property value="0.564425">fsim/tables/best_range_fuel_kg_s/h3/w1</property>
      <property value="0.686991">fsim/tables/best_range_fuel_kg_s/h3/w2</property>
      <property value="0.421342">fsim/tables/best_range_fuel_kg_s/h4/w0</property>
      <property value="0.523244">fsim/tables/best_range_fuel_kg_s/h4/w1</property>
      <property value="0.618004">fsim/tables/best_range_fuel_kg_s/h4/w2</property>
      <property value="0.379392">fsim/tables/best_range_fuel_kg_s/h5/w0</property>
      <property value="0.459576">fsim/tables/best_range_fuel_kg_s/h5/w1</property>
      <property value="0.508613">fsim/tables/best_range_fuel_kg_s/h5/w2</property>
      <property value="0.352243">fsim/tables/best_range_fuel_kg_s/h6/w0</property>
      <property value="0.409257">fsim/tables/best_range_fuel_kg_s/h6/w1</property>
      <property value="0.53">fsim/tables/best_range_fuel_kg_s/h6/w2</property>
      <property value="0.325279">fsim/tables/best_range_fuel_kg_s/h7/w0</property>
      <property value="0.38091">fsim/tables/best_range_fuel_kg_s/h7/w1</property>
      <property value="135.631">fsim/tables/best_range_tas_ms/h0/w0</property>
      <property value="158.377">fsim/tables/best_range_tas_ms/h0/w1</property>
      <property value="185.224">fsim/tables/best_range_tas_ms/h0/w2</property>
      <property value="152.043">fsim/tables/best_range_tas_ms/h1/w0</property>
      <property value="178.871">fsim/tables/best_range_tas_ms/h1/w1</property>
      <property value="200.725">fsim/tables/best_range_tas_ms/h1/w2</property>
      <property value="173.598">fsim/tables/best_range_tas_ms/h2/w0</property>
      <property value="197.547">fsim/tables/best_range_tas_ms/h2/w1</property>
      <property value="221.973">fsim/tables/best_range_tas_ms/h2/w2</property>
      <property value="181.51">fsim/tables/best_range_tas_ms/h3/w0</property>
      <property value="207.064">fsim/tables/best_range_tas_ms/h3/w1</property>
      <property value="231.624">fsim/tables/best_range_tas_ms/h3/w2</property>
      <property value="194.491">fsim/tables/best_range_tas_ms/h4/w0</property>
      <property value="222.034">fsim/tables/best_range_tas_ms/h4/w1</property>
      <property value="239.75">fsim/tables/best_range_tas_ms/h4/w2</property>
      <property value="214.603">fsim/tables/best_range_tas_ms/h5/w0</property>
      <property value="236.573">fsim/tables/best_range_tas_ms/h5/w1</property>
      <property value="241.177">fsim/tables/best_range_tas_ms/h5/w2</property>
      <property value="227.392">fsim/tables/best_range_tas_ms/h6/w0</property>
      <property value="237.23">fsim/tables/best_range_tas_ms/h6/w1</property>
      <property value="231.651">fsim/tables/best_range_tas_ms/h6/w2</property>
      <property value="238.758">fsim/tables/best_range_tas_ms/h7/w0</property>
      <property value="247.053">fsim/tables/best_range_tas_ms/h7/w1</property>
      <property value="192.029">fsim/tables/climb_tas_ms/h0/w0</property>
      <property value="197.183">fsim/tables/climb_tas_ms/h0/w1</property>
      <property value="198.591">fsim/tables/climb_tas_ms/h0/w2</property>
      <property value="216.531">fsim/tables/climb_tas_ms/h1/w0</property>
      <property value="219.034">fsim/tables/climb_tas_ms/h1/w1</property>
      <property value="220.831">fsim/tables/climb_tas_ms/h1/w2</property>
      <property value="225.168">fsim/tables/climb_tas_ms/h2/w0</property>
      <property value="233.071">fsim/tables/climb_tas_ms/h2/w1</property>
      <property value="227.66">fsim/tables/climb_tas_ms/h2/w2</property>
      <property value="222.143">fsim/tables/climb_tas_ms/h3/w0</property>
      <property value="224.729">fsim/tables/climb_tas_ms/h3/w1</property>
      <property value="232.751">fsim/tables/climb_tas_ms/h3/w2</property>
      <property value="225.267">fsim/tables/climb_tas_ms/h4/w0</property>
      <property value="224.505">fsim/tables/climb_tas_ms/h4/w1</property>
      <property value="231.849">fsim/tables/climb_tas_ms/h4/w2</property>
      <property value="213.233">fsim/tables/climb_tas_ms/h5/w0</property>
      <property value="221.56">fsim/tables/climb_tas_ms/h5/w1</property>
      <property value="237.612">fsim/tables/climb_tas_ms/h5/w2</property>
      <property value="224.212">fsim/tables/climb_tas_ms/h6/w0</property>
      <property value="227.267">fsim/tables/climb_tas_ms/h6/w1</property>
      <property value="228.624">fsim/tables/climb_tas_ms/h6/w2</property>
      <property value="213.727">fsim/tables/climb_tas_ms/h7/w0</property>
      <property value="244.005">fsim/tables/climb_tas_ms/h7/w1</property>
      <property value="36000">fsim/tables/fuel_capacity_kg</property>
      <property value="0.507233">fsim/tables/fuel_kg_s/h0/w0/v0</property>
      <property value="0.485362">fsim/tables/fuel_kg_s/h0/w0/v1</property>
      <property value="1.14004">fsim/tables/fuel_kg_s/h0/w0/v10</property>
      <property value="1.24052">fsim/tables/fuel_kg_s/h0/w0/v11</property>
      <property value="1.34484">fsim/tables/fuel_kg_s/h0/w0/v12</property>
      <property value="1.45851">fsim/tables/fuel_kg_s/h0/w0/v13</property>
      <property value="1.5992">fsim/tables/fuel_kg_s/h0/w0/v14</property>
      <property value="1.82444">fsim/tables/fuel_kg_s/h0/w0/v15</property>
      <property value="0.506296">fsim/tables/fuel_kg_s/h0/w0/v2</property>
      <property value="0.553321">fsim/tables/fuel_kg_s/h0/w0/v3</property>
      <property value="0.613974">fsim/tables/fuel_kg_s/h0/w0/v4</property>
      <property value="0.688183">fsim/tables/fuel_kg_s/h0/w0/v5</property>
      <property value="0.76518">fsim/tables/fuel_kg_s/h0/w0/v6</property>
      <property value="0.854059">fsim/tables/fuel_kg_s/h0/w0/v7</property>
      <property value="0.947742">fsim/tables/fuel_kg_s/h0/w0/v8</property>
      <property value="1.04312">fsim/tables/fuel_kg_s/h0/w0/v9</property>
      <property value="0.721251">fsim/tables/fuel_kg_s/h0/w1/v0</property>
      <property value="0.618905">fsim/tables/fuel_kg_s/h0/w1/v1</property>
      <property value="1.16022">fsim/tables/fuel_kg_s/h0/w1/v10</property>
      <property value="1.25979">fsim/tables/fuel_kg_s/h0/w1/v11</property>
      <property value="1.3644">fsim/tables/fuel_kg_s/h0/w1/v12</property>
      <property value="1.4752">fsim/tables/fuel_kg_s/h0/w1/v13</property>
      <property value="1.61123">fsim/tables/fuel_kg_s/h0/w1/v14</property>
      <property value="1.82992">fsim/tables/fuel_kg_s/h0/w1/v15</property>
      <property value="0.613931">fsim/tables/fuel_kg_s/h0/w1/v2</property>
      <property value="0.636746">fsim/tables/fuel_kg_s/h0/w1/v3</property>
      <property value="0.679808">fsim/tables/fuel_kg_s/h0/w1/v4</property>
      <property value="0.739152">fsim/tables/fuel_kg_s/h0/w1/v5</property>
      <property value="0.810923">fsim/tables/fuel_kg_s/h0/w1/v6</property>
      <property value="0.88971">fsim/tables/fuel_kg_s/h0/w1/v7</property>
      <property value="0.971224">fsim/tables/fuel_kg_s/h0/w1/v8</property>
      <property value="1.06457">fsim/tables/fuel_kg_s/h0/w1/v9</property>
      <property value="0.919656">fsim/tables/fuel_kg_s/h0/w2/v0</property>
      <property value="0.827029">fsim/tables/fuel_kg_s/h0/w2/v1</property>
      <property value="1.18463">fsim/tables/fuel_kg_s/h0/w2/v10</property>
      <property value="1.28366">fsim/tables/fuel_kg_s/h0/w2/v11</property>
      <property value="1.38813">fsim/tables/fuel_kg_s/h0/w2/v12</property>
      <property value="1.49892">fsim/tables/fuel_kg_s/h0/w2/v13</property>
      <property value="1.63558">fsim/tables/fuel_kg_s/h0/w2/v14</property>
      <property value="1.85608">fsim/tables/fuel_kg_s/h0/w2/v15</property>
      <property value="0.739402">fsim/tables/fuel_kg_s/h0/w2/v2</property>
      <property value="0.753372">fsim/tables/fuel_kg_s/h0/w2/v3</property>
      <property value="0.780022">fsim/tables/fuel_kg_s/h0/w2/v4</property>
      <property value="0.815979">fsim/tables/fuel_kg_s/h0/w2/v5</property>
      <property value="0.872914">fsim/tables/fuel_kg_s/h0/w2/v6</property>
      <property value="0.937751">fsim/tables/fuel_kg_s/h0/w2/v7</property>
      <property value="1.01661">fsim/tables/fuel_kg_s/h0/w2/v8</property>
      <property value="1.0977">fsim/tables/fuel_kg_s/h0/w2/v9</property>
      <property value="0.508289">fsim/tables/fuel_kg_s/h1/w0/v0</property>
      <property value="0.453803">fsim/tables/fuel_kg_s/h1/w0/v1</property>
      <property value="0.869568">fsim/tables/fuel_kg_s/h1/w0/v10</property>
      <property value="0.949095">fsim/tables/fuel_kg_s/h1/w0/v11</property>
      <property value="1.0323">fsim/tables/fuel_kg_s/h1/w0/v12</property>
      <property value="1.11989">fsim/tables/fuel_kg_s/h1/w0/v13</property>
      <property value="1.22409">fsim/tables/fuel_kg_s/h1/w0/v14</property>
      <property value="1.40425">fsim/tables/fuel_kg_s/h1/w0/v15</property>
      <property value="0.44437">fsim/tables/fuel_kg_s/h1/w0/v2</property>
      <property value="0.460235">fsim/tables/fuel_kg_s/h1/w0/v3</property>
      <property value="0.494989">fsim/tables/fuel_kg_s/h1/w0/v4</property>
      <property value="0.539346">fsim/tables/fuel_kg_s/h1/w0/v5</property>
      <property value="0.596178">fsim/tables/fuel_kg_s/h1/w0/v6</property>
      <property value="0.655408">fsim/tables/fuel_kg_s/h1/w0/v7</property>
      <property value="0.720769">fsim/tables/fuel_kg_s/h1/w0/v8</property>
      <property value="0.793439">fsim/tables/fuel_kg_s/h1/w0/v9</property>
      <property value="0.684811">fsim/tables/fuel_kg_s/h1/w1/v0</property>
      <property value="0.607656">fsim/tables/fuel_kg_s/h1/w1/v1</property>
      <property value="0.895222">fsim/tables/fuel_kg_s/h1/w1/v10</property>
      <property value="0.973416">fsim/tables/fuel_kg_s/h1/w1/v11</property>
      <property value="1.05513">fsim/tables/fuel_kg_s/h1/w1/v12</property>
      <property value="1.14126">fsim/tables/fuel_kg_s/h1/w1/v13</property>
      <property value="1.24344">fsim/tables/fuel_kg_s/h1/w1/v14</property>
      <property value="1.41719">fsim/tables/fuel_kg_s/h1/w1/v15</property>
      <property value="0.553196">fsim/tables/fuel_kg_s/h1/w1/v2</property>
      <property value="0.554684">fsim/tables/fuel_kg_s/h1/w1/v3</property>
      <property value="0.573301">fsim/tables/fuel_kg_s/h1/w1/v4</property>
      <property value="0.605007">fsim/tables/fuel_kg_s/h1/w1/v5</property>
      <property value="0.650283">fsim/tables/fuel_kg_s/h1/w1/v6</property>
      <property value="0.701365">fsim/tables/fuel_kg_s/h1/w1/v7</property>
      <property value="0.761917">fsim/tables/fuel_kg_s/h1/w1/v8</property>
      <property value="0.825829">fsim/tables/fuel_kg_s/h1/w1/v9</property>
      <property value="0.836335">fsim/tables/fuel_kg_s/h1/w2/v0</property>
      <property value="0.766718">fsim/tables/fuel_kg_s/h1/w2/v1</property>
      <property value="0.938389">fsim/tables/fuel_kg_s/h1/w2/v10</property>
      <property value="1.00622">fsim/tables/fuel_kg_s/h1/w2/v11</property>
      <property value="1.08149">fsim/tables/fuel_kg_s/h1/w2/v12</property>
      <property value="1.16638">fsim/tables/fuel_kg_s/h1/w2/v13</property>
      <property value="1.26737">fsim/tables/fuel_kg_s/h1/w2/v14</property>
      <property value="1.43825">fsim/tables/fuel_kg_s/h1/w2/v15</property>
      <property value="0.682142">fsim/tables/fuel_kg_s/h1/w2/v2</property>
      <property value="0.658794">fsim/tables/fuel_kg_s/h1/w2/v3</property>
      <property value="0.67199">fsim/tables/fuel_kg_s/h1/w2/v4</property>
      <property value="0.695167">fsim/tables/fuel_kg_s/h1/w2/v5</property>
      <property value="0.725581">fsim/tables/fuel_kg_s/h1/w2/v6</property>
      <property value="0.767264">fsim/tables/fuel_kg_s/h1/w2/v7</property>
      <property value="0.81375">fsim/tables/fuel_kg_s/h1/w2/v8</property>
      <property value="0.873646">fsim/tables/fuel_kg_s/h1/w2/v9</property>
      <property value="0.462631">fsim/tables/fuel_kg_s/h2/w0/v0</property>
      <property value="0.436363">fsim/tables/fuel_kg_s/h2/w0/v1</property>
      <property value="0.640347">fsim/tables/fuel_kg_s/h2/w0/v10</property>
      <property value="0.696539">fsim/tables/fuel_kg_s/h2/w0/v11</property>
      <property value="0.755319">fsim/tables/fuel_kg_s/h2/w0/v12</property>
      <property value="0.819208">fsim/tables/fuel_kg_s/h2/w0/v13</property>
      <property value="0.897435">fsim/tables/fuel_kg_s/h2/w0/v14</property>
      <property value="1.03033">fsim/tables/fuel_kg_s/h2/w0/v15</property>
      <property value="0.402693">fsim/tables/fuel_kg_s/h2/w0/v2</property>
      <property value="0.398456">fsim/tables/fuel_kg_s/h2/w0/v3</property>
      <property value="0.409494">fsim/tables/fuel_kg_s/h2/w0/v4</property>
      <property value="0.432671">fsim/tables/fuel_kg_s/h2/w0/v5</property>
      <property value="0.463366">fsim/tables/fuel_kg_s/h2/w0/v6</property>
      <property value="0.500647">fsim/tables/fuel_kg_s/h2/w0/v7</property>
      <property value="0.542971">fsim/tables/fuel_kg_s/h2/w0/v8</property>
      <property value="0.588648">fsim/tables/fuel_kg_s/h2/w0/v9</property>
      <property value="0.644405">fsim/tables/fuel_kg_s/h2/w1/v0</property>
      <property value="0.583457">fsim/tables/fuel_kg_s/h2/w1/v1</property>
      <property value="0.67858">fsim/tables/fuel_kg_s/h2/w1/v10</property>
      <property value="0.727339">fsim/tables/fuel_kg_s/h2/w1/v11</property>
      <property value="0.779398">fsim/tables/fuel_kg_s/h2/w1/v12</property>
      <property value="0.842127">fsim/tables/fuel_kg_s/h2/w1/v13</property>
      <property value="0.918377">fsim/tables/fuel_kg_s/h2/w1/v14</property>
      <property value="1.04683">fsim/tables/fuel_kg_s/h2/w1/v15</property>
      <property value="0.515837">fsim/tables/fuel_kg_s/h2/w1/v2</property>
      <property value="0.488706">fsim/tables/fuel_kg_s/h2/w1/v3</property>
      <property value="0.492528">fsim/tables/fuel_kg_s/h2/w1/v4</property>
      <property value="0.504926">fsim/tables/fuel_kg_s/h2/w1/v5</property>
      <property value="0.526329">fsim/tables/fuel_kg_s/h2/w1/v6</property>
      <property value="0.555857">fsim/tables/fuel_kg_s/h2/w1/v7</property>
      <property value="0.589646">fsim/tables/fuel_kg_s/h2/w1/v8</property>
      <property value="0.631774">fsim/tables/fuel_kg_s/h2/w1/v9</property>
      <property value="0.671765">fsim/tables/fuel_kg_s/h2/w2/v1</property>
      <property value="0.727943">fsim/tables/fuel_kg_s/h2/w2/v10</property>
      <property value="0.77474">fsim/tables/fuel_kg_s/h2/w2/v11</property>
      <property value="0.824356">fsim/tables/fuel_kg_s/h2/w2/v12</property>
      <property value="0.879083">fsim/tables/fuel_kg_s/h2/w2/v13</property>
      <property value="0.946555">fsim/tables/fuel_kg_s/h2/w2/v14</property>
      <property value="1.07225">fsim/tables/fuel_kg_s/h2/w2/v15</property>
      <property value="0.650325">fsim/tables/fuel_kg_s/h2/w2/v2</property>
      <property value="0.584728">fsim/tables/fuel_kg_s/h2/w2/v3</property>
      <property value="0.575303">fsim/tables/fuel_kg_s/h2/w2/v4</property>
      <property value="0.587146">fsim/tables/fuel_kg_s/h2/w2/v5</property>
      <property value="0.603515">fsim/tables/fuel_kg_s/h2/w2/v6</property>
      <property value="0.628238">fsim/tables/fuel_kg_s/h2/w2/v7</property>
      <property value="0.654621">fsim/tables/fuel_kg_s/h2/w2/v8</property>
      <property value="0.690811">fsim/tables/fuel_kg_s/h2/w2/v9</property>
      <property value="0.460734">fsim/tables/fuel_kg_s/h3/w0/v0</property>
      <property value="0.431613">fsim/tables/fuel_kg_s/h3/w0/v1</property>
      <property value="0.563447">fsim/tables/fuel_kg_s/h3/w0/v10</property>
      <property value="0.610177">fsim/tables/fuel_kg_s/h3/w0/v11</property>
      <property value="0.660267">fsim/tables/fuel_kg_s/h3/w0/v12</property>
      <property value="0.716012">fsim/tables/fuel_kg_s/h3/w0/v13</property>
      <property value="0.787054">fsim/tables/fuel_kg_s/h3/w0/v14</property>
      <property value="0.90284">fsim/tables/fuel_kg_s/h3/w0/v15</property>
      <property value="0.389188">fsim/tables/fuel_kg_s/h3/w0/v2</property>
      <property value="0.377273">fsim/tables/fuel_kg_s/h3/w0/v3</property>
      <property value="0.382405">fsim/tables/fuel_kg_s/h3/w0/v4</property>
      <property value="0.397686">fsim/tables/fuel_kg_s/h3/w0/v5</property>
      <property value="0.421855">fsim/tables/fuel_kg_s/h3/w0/v6</property>
      <property value="0.448699">fsim/tables/fuel_kg_s/h3/w0/v7</property>
      <property value="0.484192">fsim/tables/fuel_kg_s/h3/w0/v8</property>
      <property value="0.522822">fsim/tables/fuel_kg_s/h3/w0/v9</property>
      <property value="0.626278">fsim/tables/fuel_kg_s/h3/w1/v0</property>
      <property value="0.560441">fsim/tables/fuel_kg_s/h3/w1/v1</property>
      <property value="0.604797">fsim/tables/fuel_kg_s/h3/w1/v10</property>
      <property value="0.6462">fsim/tables/fuel_kg_s/h3/w1/v11</property>
      <property value="0.68947">fsim/tables/fuel_kg_s/h3/w1/v12</property>
      <property value="0.739494">fsim/tables/fuel_kg_s/h3/w1/v13</property>
      <property value="0.808742">fsim/tables/fuel_kg_s/h3/w1/v14</property>
      <property value="0.920187">fsim/tables/fuel_kg_s/h3/w1/v15</property>
      <property value="0.507071">fsim/tables/fuel_kg_s/h3/w1/v2</property>
      <property value="0.466876">fsim/tables/fuel_kg_s/h3/w1/v3</property>
      <property value="0.465056">fsim/tables/fuel_kg_s/h3/w1/v4</property>
      <property value="0.471944">fsim/tables/fuel_kg_s/h3/w1/v5</property>
      <property value="0.486999">fsim/tables/fuel_kg_s/h3/w1/v6</property>
      <property value="0.506333">fsim/tables/fuel_kg_s/h3/w1/v7</property>
      <property value="0.53514">fsim/tables/fuel_kg_s/h3/w1/v8</property>
      <property value="0.56586">fsim/tables/fuel_kg_s/h3/w1/v9</property>
      <property value="0.635707">fsim/tables/fuel_kg_s/h3/w2/v1</property>
      <property value="0.660798">fsim/tables/fuel_kg_s/h3/w2/v10</property>
      <property value="0.694094">fsim/tables/fuel_kg_s/h3/w2/v11</property>
      <property value="0.73653">fsim/tables/fuel_kg_s/h3/w2/v12</property>
      <property value="0.78464">fsim/tables/fuel_kg_s/h3/w2/v13</property>
      <property value="0.845926">fsim/tables/fuel_kg_s/h3/w2/v14</property>
      <property value="0.947744">fsim/tables/fuel_kg_s/h3/w2/v15</property>
      <property value="0.623846">fsim/tables/fuel_kg_s/h3/w2/v2</property>
      <property value="0.571622">fsim/tables/fuel_kg_s/h3/w2/v3</property>
      <property value="0.536097">fsim/tables/fuel_kg_s/h3/w2/v4</property>
      <property value="0.549104">fsim/tables/fuel_kg_s/h3/w2/v5</property>
      <property value="0.560171">fsim/tables/fuel_kg_s/h3/w2/v6</property>
      <property value="0.57736">fsim/tables/fuel_kg_s/h3/w2/v7</property>
      <property value="0.601468">fsim/tables/fuel_kg_s/h3/w2/v8</property>
      <property value="0.628361">fsim/tables/fuel_kg_s/h3/w2/v9</property>
      <property value="0.462254">fsim/tables/fuel_kg_s/h4/w0/v0</property>
      <property value="0.426466">fsim/tables/fuel_kg_s/h4/w0/v1</property>
      <property value="0.47168">fsim/tables/fuel_kg_s/h4/w0/v10</property>
      <property value="0.504075">fsim/tables/fuel_kg_s/h4/w0/v11</property>
      <property value="0.539669">fsim/tables/fuel_kg_s/h4/w0/v12</property>
      <property value="0.583359">fsim/tables/fuel_kg_s/h4/w0/v13</property>
      <property value="0.639765">fsim/tables/fuel_kg_s/h4/w0/v14</property>
      <property value="0.729157">fsim/tables/fuel_kg_s/h4/w0/v15</property>
      <property value="0.376173">fsim/tables/fuel_kg_s/h4/w0/v2</property>
      <property value="0.355599">fsim/tables/fuel_kg_s/h4/w0/v3</property>
      <property value="0.353208">fsim/tables/fuel_kg_s/h4/w0/v4</property>
      <property value="0.358735">fsim/tables/fuel_kg_s/h4/w0/v5</property>
      <property value="0.371075">fsim/tables/fuel_kg_s/h4/w0/v6</property>
      <property value="0.390745">fsim/tables/fuel_kg_s/h4/w0/v7</property>
      <property value="0.412265">fsim/tables/fuel_kg_s/h4/w0/v8</property>
      <property value="0.440697">fsim/tables/fuel_kg_s/h4/w0/v9</property>
      <property value="0.598117">fsim/tables/fuel_kg_s/h4/w1/v0</property>
      <property value="0.530795">fsim/tables/fuel_kg_s/h4/w1/v1</property>
      <property value="0.514698">fsim/tables/fuel_kg_s/h4/w1/v10</property>
      <property value="0.543315">fsim/tables/fuel_kg_s/h4/w1/v11</property>
      <property value="0.57653">fsim/tables/fuel_kg_s/h4/w1/v12</property>
      <property value="0.615014">fsim/tables/fuel_kg_s/h4/w1/v13</property>
      <property value="0.664877">fsim/tables/fuel_kg_s/h4/w1/v14</property>
      <property value="0.747405">fsim/tables/fuel_kg_s/h4/w1/v15</property>
      <property value="0.495134">fsim/tables/fuel_kg_s/h4/w1/v2</property>
      <property value="0.447932">fsim/tables/fuel_kg_s/h4/w1/v3</property>
      <property value="0.431236">fsim/tables/fuel_kg_s/h4/w1/v4</property>
      <property value="0.432109">fsim/tables/fuel_kg_s/h4/w1/v5</property>
      <property value="0.438662">fsim/tables/fuel_kg_s/h4/w1/v6</property>
      <property value="0.451462">fsim/tables/fuel_kg_s/h4/w1/v7</property>
      <property value="0.466781">fsim/tables/fuel_kg_s/h4/w1/v8</property>
      <property value="0.490159">fsim/tables/fuel_kg_s/h4/w1/v9</property>
      <property value="0.572144">fsim/tables/fuel_kg_s/h4/w2/v10</property>
      <property value="0.599464">fsim/tables/fuel_kg_s/h4/w2/v11</property>
      <property value="0.626747">fsim/tables/fuel_kg_s/h4/w2/v12</property>
      <property value="0.661185">fsim/tables/fuel_kg_s/h4/w2/v13</property>
      <property value="0.709874">fsim/tables/fuel_kg_s/h4/w2/v14</property>
      <property value="0.787197">fsim/tables/fuel_kg_s/h4/w2/v15</property>
      <property value="0.575838">fsim/tables/fuel_kg_s/h4/w2/v2</property>
      <property value="0.553648">fsim/tables/fuel_kg_s/h4/w2/v3</property>
      <property value="0.510746">fsim/tables/fuel_kg_s/h4/w2/v4</property>
      <property value="0.496823">fsim/tables/fuel_kg_s/h4/w2/v5</property>
      <property value="0.505391">fsim/tables/fuel_kg_s/h4/w2/v6</property>
      <property value="0.515882">fsim/tables/fuel_kg_s/h4/w2/v7</property>
      <property value="0.530141">fsim/tables/fuel_kg_s/h4/w2/v8</property>
      <property value="0.551933">fsim/tables/fuel_kg_s/h4/w2/v9</property>
      <property value="0.437912">fsim/tables/fuel_kg_s/h5/w0/v0</property>
      <property value="0.38607">fsim/tables/fuel_kg_s/h5/w0/v1</property>
      <property value="0.375349">fsim/tables/fuel_kg_s/h5/w0/v10</property>
      <property value="0.397343">fsim/tables/fuel_kg_s/h5/w0/v11</property>
      <property value="0.420655">fsim/tables/fuel_kg_s/h5/w0/v12</property>
      <property value="0.447834">fsim/tables/fuel_kg_s/h5/w0/v13</property>
      <property value="0.483473">fsim/tables/fuel_kg_s/h5/w0/v14</property>
      <property value="0.545563">fsim/tables/fuel_kg_s/h5/w0/v15</property>
      <property value="0.366115">fsim/tables/fuel_kg_s/h5/w0/v2</property>
      <property value="0.332111">fsim/tables/fuel_kg_s/h5/w0/v3</property>
      <property value="0.322067">fsim/tables/fuel_kg_s/h5/w0/v4</property>
      <property value="0.319831">fsim/tables/fuel_kg_s/h5/w0/v5</property>
      <property value="0.322535">fsim/tables/fuel_kg_s/h5/w0/v6</property>
      <property value="0.330676">fsim/tables/fuel_kg_s/h5/w0/v7</property>
      <property value="0.342746">fsim/tables/fuel_kg_s/h5/w0/v8</property>
      <property value="0.358388">fsim/tables/fuel_kg_s/h5/w0/v9</property>
      <property value="0.638979">fsim/tables/fuel_kg_s/h5/w1/v0</property>
      <property value="0.504891">fsim/tables/fuel_kg_s/h5/w1/v1</property>
      <property value="0.42392">fsim/tables/fuel_kg_s/h5/w1/v10</property>
      <property value="0.441666">fsim/tables/fuel_kg_s/h5/w1/v11</property>
      <property value="0.460117">fsim/tables/fuel_kg_s/h5/w1/v12</property>
      <property value="0.483441">fsim/tables/fuel_kg_s/h5/w1/v13</property>
      <property value="0.5172">fsim/tables/fuel_kg_s/h5/w1/v14</property>
      <property value="0.572514">fsim/tables/fuel_kg_s/h5/w1/v15</property>
      <property value="0.476187">fsim/tables/fuel_kg_s/h5/w1/v2</property>
      <property value="0.442239">fsim/tables/fuel_kg_s/h5/w1/v3</property>
      <property value="0.404436">fsim/tables/fuel_kg_s/h5/w1/v4</property>
      <property value="0.391017">fsim/tables/fuel_kg_s/h5/w1/v5</property>
      <property value="0.390587">fsim/tables/fuel_kg_s/h5/w1/v6</property>
      <property value="0.393741">fsim/tables/fuel_kg_s/h5/w1/v7</property>
      <property value="0.400077">fsim/tables/fuel_kg_s/h5/w1/v8</property>
      <property value="0.411952">fsim/tables/fuel_kg_s/h5/w1/v9</property>
      <property value="0.477653">fsim/tables/fuel_kg_s/h5/w2/v10</property>
      <property value="0.493788">fsim/tables/fuel_kg_s/h5/w2/v11</property>
      <property value="0.508152">fsim/tables/fuel_kg_s/h5/w2/v12</property>
      <property value="0.530797">fsim/tables/fuel_kg_s/h5/w2/v13</property>
      <property value="0.555194">fsim/tables/fuel_kg_s/h5/w2/v14</property>
      <property value="0.584062">fsim/tables/fuel_kg_s/h5/w2/v15</property>
      <property value="0.636639">fsim/tables/fuel_kg_s/h5/w2/v2</property>
      <property value="0.45704">fsim/tables/fuel_kg_s/h5/w2/v3</property>
      <property value="0.459397">fsim/tables/fuel_kg_s/h5/w2/v4</property>
      <property value="0.445764">fsim/tables/fuel_kg_s/h5/w2/v5</property>
      <property value="0.444047">fsim/tables/fuel_kg_s/h5/w2/v6</property>
      <property value="0.445618">fsim/tables/fuel_kg_s/h5/w2/v7</property>
      <property value="0.454148">fsim/tables/fuel_kg_s/h5/w2/v8</property>
      <property value="0.465481">fsim/tables/fuel_kg_s/h5/w2/v9</property>
      <property value="0.399178">fsim/tables/fuel_kg_s/h6/w0/v0</property>
      <property value="0.37454">fsim/tables/fuel_kg_s/h6/w0/v1</property>
      <property value="0.330067">fsim/tables/fuel_kg_s/h6/w0/v10</property>
      <property value="0.342899">fsim/tables/fuel_kg_s/h6/w0/v11</property>
      <property value="0.359415">fsim/tables/fuel_kg_s/h6/w0/v12</property>
      <property value="0.380503">fsim/tables/fuel_kg_s/h6/w0/v13</property>
      <property value="0.407737">fsim/tables/fuel_kg_s/h6/w0/v14</property>
      <property value="0.452759">fsim/tables/fuel_kg_s/h6/w0/v15</property>
      <property value="0.328802">fsim/tables/fuel_kg_s/h6/w0/v3</property>
      <property value="0.309104">fsim/tables/fuel_kg_s/h6/w0/v4</property>
      <property value="0.301988">fsim/tables/fuel_kg_s/h6/w0/v5</property>
      <property value="0.300241">fsim/tables/fuel_kg_s/h6/w0/v6</property>
      <property value="0.302163">fsim/tables/fuel_kg_s/h6/w0/v7</property>
      <property value="0.308766">fsim/tables/fuel_kg_s/h6/w0/v8</property>
      <property value="0.317627">fsim/tables/fuel_kg_s/h6/w0/v9</property>
      <property value="0.484473">fsim/tables/fuel_kg_s/h6/w1/v0</property>
      <property value="0.447066">fsim/tables/fuel_kg_s/h6/w1/v1</property>
      <property value="0.387039">fsim/tables/fuel_kg_s/h6/w1/v10</property>
      <property value="0.395215">fsim/tables/fuel_kg_s/h6/w1/v11</property>
      <property value="0.40826">fsim/tables/fuel_kg_s/h6/w1/v12</property>
      <property value="0.424945">fsim/tables/fuel_kg_s/h6/w1/v13</property>
      <property value="0.445702">fsim/tables/fuel_kg_s/h6/w1/v14</property>
      <property value="0.481537">fsim/tables/fuel_kg_s/h6/w1/v15</property>
      <property value="0.429081">fsim/tables/fuel_kg_s/h6/w1/v2</property>
      <property value="0.396424">fsim/tables/fuel_kg_s/h6/w1/v3</property>
      <property value="0.372783">fsim/tables/fuel_kg_s/h6/w1/v4</property>
      <property value="0.36757">fsim/tables/fuel_kg_s/h6/w1/v5</property>
      <property value="0.367463">fsim/tables/fuel_kg_s/h6/w1/v6</property>
      <property value="0.368813">fsim/tables/fuel_kg_s/h6/w1/v7</property>
      <property value="0.372634">fsim/tables/fuel_kg_s/h6/w1/v8</property>
      <property value="0.378953">fsim/tables/fuel_kg_s/h6/w1/v9</property>
      <property value="0.521998">fsim/tables/fuel_kg_s/h6/w2/v0</property>
      <property value="0.525429">fsim/tables/fuel_kg_s/h6/w2/v1</property>
      <property value="0.531737">fsim/tables/fuel_kg_s/h6/w2/v14</property>
      <property value="0.579371">fsim/tables/fuel_kg_s/h6/w2/v15</property>
      <property value="0.527221">fsim/tables/fuel_kg_s/h6/w2/v2</property>
      <property value="0.423345">fsim/tables/fuel_kg_s/h7/w0/v0</property>
      <property value="0.338008">fsim/tables/fuel_kg_s/h7/w0/v1</property>
      <property value="0.297401">fsim/tables/fuel_kg_s/h7/w0/v10</property>
      <property value="0.30664">fsim/tables/fuel_kg_s/h7/w0/v11</property>
      <property value="0.316632">fsim/tables/fuel_kg_s/h7/w0/v12</property>
      <property value="0.329038">fsim/tables/fuel_kg_s/h7/w0/v13</property>
      <property value="0.349038">fsim/tables/fuel_kg_s/h7/w0/v14</property>
      <property value="0.383037">fsim/tables/fuel_kg_s/h7/w0/v15</property>
      <property value="0.306527">fsim/tables/fuel_kg_s/h7/w0/v4</property>
      <property value="0.293368">fsim/tables/fuel_kg_s/h7/w0/v5</property>
      <property value="0.288142">fsim/tables/fuel_kg_s/h7/w0/v6</property>
      <property value="0.286437">fsim/tables/fuel_kg_s/h7/w0/v7</property>
      <property value="0.286969">fsim/tables/fuel_kg_s/h7/w0/v8</property>
      <property value="0.292174">fsim/tables/fuel_kg_s/h7/w0/v9</property>
      <property value="0.36512">fsim/tables/fuel_kg_s/h7/w1/v0</property>
      <property value="0.357175">fsim/tables/fuel_kg_s/h7/w1/v1</property>
      <property value="0.364101">fsim/tables/fuel_kg_s/h7/w1/v10</property>
      <property value="0.368982">fsim/tables/fuel_kg_s/h7/w1/v11</property>
      <property value="0.375061">fsim/tables/fuel_kg_s/h7/w1/v12</property>
      <property value="0.382174">fsim/tables/fuel_kg_s/h7/w1/v13</property>
      <property value="0.392804">fsim/tables/fuel_kg_s/h7/w1/v14</property>
      <property value="0.403469">fsim/tables/fuel_kg_s/h7/w1/v15</property>
      <property value="0.353134">fsim/tables/fuel_kg_s/h7/w1/v2</property>
      <property value="0.351881">fsim/tables/fuel_kg_s/h7/w1/v3</property>
      <property value="0.351781">fsim/tables/fuel_kg_s/h7/w1/v4</property>
      <property value="0.351201">fsim/tables/fuel_kg_s/h7/w1/v5</property>
      <property value="0.352815">fsim/tables/fuel_kg_s/h7/w1/v6</property>
      <property value="0.354304">fsim/tables/fuel_kg_s/h7/w1/v7</property>
      <property value="0.355871">fsim/tables/fuel_kg_s/h7/w1/v8</property>
      <property value="0.359532">fsim/tables/fuel_kg_s/h7/w1/v9</property>
      <property value="57.2986">fsim/tables/max_climb_ms/h0/w0</property>
      <property value="40.6152">fsim/tables/max_climb_ms/h0/w1</property>
      <property value="30.9199">fsim/tables/max_climb_ms/h0/w2</property>
      <property value="44.4973">fsim/tables/max_climb_ms/h1/w0</property>
      <property value="31.3225">fsim/tables/max_climb_ms/h1/w1</property>
      <property value="23.5266">fsim/tables/max_climb_ms/h1/w2</property>
      <property value="32.3024">fsim/tables/max_climb_ms/h2/w0</property>
      <property value="22.2215">fsim/tables/max_climb_ms/h2/w1</property>
      <property value="16.3337">fsim/tables/max_climb_ms/h2/w2</property>
      <property value="26.9221">fsim/tables/max_climb_ms/h3/w0</property>
      <property value="18.1261">fsim/tables/max_climb_ms/h3/w1</property>
      <property value="13.0718">fsim/tables/max_climb_ms/h3/w2</property>
      <property value="21.249">fsim/tables/max_climb_ms/h4/w0</property>
      <property value="13.972">fsim/tables/max_climb_ms/h4/w1</property>
      <property value="9.47097">fsim/tables/max_climb_ms/h4/w2</property>
      <property value="14.1831">fsim/tables/max_climb_ms/h5/w0</property>
      <property value="8.42756">fsim/tables/max_climb_ms/h5/w1</property>
      <property value="4.89058">fsim/tables/max_climb_ms/h5/w2</property>
      <property value="10.5695">fsim/tables/max_climb_ms/h6/w0</property>
      <property value="5.60512">fsim/tables/max_climb_ms/h6/w1</property>
      <property value="2.3491">fsim/tables/max_climb_ms/h6/w2</property>
      <property value="7.35159">fsim/tables/max_climb_ms/h7/w0</property>
      <property value="2.88602">fsim/tables/max_climb_ms/h7/w1</property>
      <property value="306.922">fsim/tables/max_tas_ms/h0/w0</property>
      <property value="306.902">fsim/tables/max_tas_ms/h0/w1</property>
      <property value="307.018">fsim/tables/max_tas_ms/h0/w2</property>
      <property value="302.416">fsim/tables/max_tas_ms/h1/w0</property>
      <property value="302.004">fsim/tables/max_tas_ms/h1/w1</property>
      <property value="301.653">fsim/tables/max_tas_ms/h1/w2</property>
      <property value="295.431">fsim/tables/max_tas_ms/h2/w0</property>
      <property value="294.933">fsim/tables/max_tas_ms/h2/w1</property>
      <property value="294.47">fsim/tables/max_tas_ms/h2/w2</property>
      <property value="292.214">fsim/tables/max_tas_ms/h3/w0</property>
      <property value="291.685">fsim/tables/max_tas_ms/h3/w1</property>
      <property value="291.145">fsim/tables/max_tas_ms/h3/w2</property>
      <property value="286.603">fsim/tables/max_tas_ms/h4/w0</property>
      <property value="285.952">fsim/tables/max_tas_ms/h4/w1</property>
      <property value="285.027">fsim/tables/max_tas_ms/h4/w2</property>
      <property value="278.252">fsim/tables/max_tas_ms/h5/w0</property>
      <property value="277.075">fsim/tables/max_tas_ms/h5/w1</property>
      <property value="275.547">fsim/tables/max_tas_ms/h5/w2</property>
      <property value="272.789">fsim/tables/max_tas_ms/h6/w0</property>
      <property value="270.978">fsim/tables/max_tas_ms/h6/w1</property>
      <property value="267.542">fsim/tables/max_tas_ms/h6/w2</property>
      <property value="270.176">fsim/tables/max_tas_ms/h7/w0</property>
      <property value="266.634">fsim/tables/max_tas_ms/h7/w1</property>
      <property value="80.6504">fsim/tables/min_tas_ms/h0/w0</property>
      <property value="83.1526">fsim/tables/min_tas_ms/h0/w1</property>
      <property value="84.2854">fsim/tables/min_tas_ms/h0/w2</property>
      <property value="80.5645">fsim/tables/min_tas_ms/h1/w0</property>
      <property value="85.7701">fsim/tables/min_tas_ms/h1/w1</property>
      <property value="89.2882">fsim/tables/min_tas_ms/h1/w2</property>
      <property value="83.9226">fsim/tables/min_tas_ms/h2/w0</property>
      <property value="91.6585">fsim/tables/min_tas_ms/h2/w1</property>
      <property value="97.4897">fsim/tables/min_tas_ms/h2/w2</property>
      <property value="85.918">fsim/tables/min_tas_ms/h3/w0</property>
      <property value="94.7066">fsim/tables/min_tas_ms/h3/w1</property>
      <property value="101.725">fsim/tables/min_tas_ms/h3/w2</property>
      <property value="90.4224">fsim/tables/min_tas_ms/h4/w0</property>
      <property value="100.801">fsim/tables/min_tas_ms/h4/w1</property>
      <property value="110.823">fsim/tables/min_tas_ms/h4/w2</property>
      <property value="97.5605">fsim/tables/min_tas_ms/h5/w0</property>
      <property value="109.402">fsim/tables/min_tas_ms/h5/w1</property>
      <property value="135.993">fsim/tables/min_tas_ms/h5/w2</property>
      <property value="101.914">fsim/tables/min_tas_ms/h6/w0</property>
      <property value="132.233">fsim/tables/min_tas_ms/h6/w1</property>
      <property value="182.269">fsim/tables/min_tas_ms/h6/w2</property>
      <property value="109.996">fsim/tables/min_tas_ms/h7/w0</property>
      <property value="179.033">fsim/tables/min_tas_ms/h7/w1</property>
      <property value="33.4548">fsim/tables/ps_full_ms/h0/w0/v0</property>
      <property value="38.8562">fsim/tables/ps_full_ms/h0/w0/v1</property>
      <property value="53.874">fsim/tables/ps_full_ms/h0/w0/v10</property>
      <property value="50.4141">fsim/tables/ps_full_ms/h0/w0/v11</property>
      <property value="45.847">fsim/tables/ps_full_ms/h0/w0/v12</property>
      <property value="39.8903">fsim/tables/ps_full_ms/h0/w0/v13</property>
      <property value="30.664">fsim/tables/ps_full_ms/h0/w0/v14</property>
      <property value="15.3187">fsim/tables/ps_full_ms/h0/w0/v15</property>
      <property value="43.1765">fsim/tables/ps_full_ms/h0/w0/v2</property>
      <property value="47.0611">fsim/tables/ps_full_ms/h0/w0/v3</property>
      <property value="50.6156">fsim/tables/ps_full_ms/h0/w0/v4</property>
      <property value="53.6934">fsim/tables/ps_full_ms/h0/w0/v5</property>
      <property value="55.9279">fsim/tables/ps_full_ms/h0/w0/v6</property>
      <property value="57.0648">fsim/tables/ps_full_ms/h0/w0/v7</property>
      <property value="57.2689">fsim/tables/ps_full_ms/h0/w0/v8</property>
      <property value="56.2548">fsim/tables/ps_full_ms/h0/w0/v9</property>
      <property value="22.6982">fsim/tables/ps_full_ms/h0/w1/v0</property>
      <property value="26.908">fsim/tables/ps_full_ms/h0/w1/v1</property>
      <property value="38.0873">fsim/tables/ps_full_ms/h0/w1/v10</property>
      <property value="35.5388">fsim/tables/ps_full_ms/h0/w1/v11</property>
      <property value="32.1694">fsim/tables/ps_full_ms/h0/w1/v12</property>
      <property value="27.9617">fsim/tables/ps_full_ms/h0/w1/v13</property>
      <property value="21.4836">fsim/tables/ps_full_ms/h0/w1/v14</property>
      <property value="10.773">fsim/tables/ps_full_ms/h0/w1/v15</property>
      <property value="30.1236">fsim/tables/ps_full_ms/h0/w1/v2</property>
      <property value="33.0756">fsim/tables/ps_full_ms/h0/w1/v3</property>
      <property value="35.7588">fsim/tables/ps_full_ms/h0/w1/v4</property>
      <property value="37.9702">fsim/tables/ps_full_ms/h0/w1/v5</property>
      <property value="39.4134">fsim/tables/ps_full_ms/h0/w1/v6</property>
      <property value="40.2733">fsim/tables/ps_full_ms/h0/w1/v7</property>
      <property value="40.6149">fsim/tables/ps_full_ms/h0/w1/v8</property>
      <property value="39.8577">fsim/tables/ps_full_ms/h0/w1/v9</property>
      <property value="16.2551">fsim/tables/ps_full_ms/h0/w2/v0</property>
      <property value="19.7427">fsim/tables/ps_full_ms/h0/w2/v1</property>
      <property value="29.1696">fsim/tables/ps_full_ms/h0/w2/v10</property>
      <property value="27.1317">fsim/tables/ps_full_ms/h0/w2/v11</property>
      <property value="24.4544">fsim/tables/ps_full_ms/h0/w2/v12</property>
      <property value="21.1315">fsim/tables/ps_full_ms/h0/w2/v13</property>
      <property value="16.0303">fsim/tables/ps_full_ms/h0/w2/v14</property>
      <property value="7.63005">fsim/tables/ps_full_ms/h0/w2/v15</property>
      <property value="22.4003">fsim/tables/ps_full_ms/h0/w2/v2</property>
      <property value="24.6399">fsim/tables/ps_full_ms/h0/w2/v3</property>
      <property value="26.9901">fsim/tables/ps_full_ms/h0/w2/v4</property>
      <property value="28.8387">fsim/tables/ps_full_ms/h0/w2/v5</property>
      <property value="29.9568">fsim/tables/ps_full_ms/h0/w2/v6</property>
      <property value="30.696">fsim/tables/ps_full_ms/h0/w2/v7</property>
      <property value="30.9195">fsim/tables/ps_full_ms/h0/w2/v8</property>
      <property value="30.4435">fsim/tables/ps_full_ms/h0/w2/v9</property>
      <property value="23.5327">fsim/tables/ps_full_ms/h1/w0/v0</property>
      <property value="28.15">fsim/tables/ps_full_ms/h1/w0/v1</property>
      <property value="44.4477">fsim/tables/ps_full_ms/h1/w0/v10</property>
      <property value="43.9006">fsim/tables/ps_full_ms/h1/w0/v11</property>
      <property value="42.6935">fsim/tables/ps_full_ms/h1/w0/v12</property>
      <property value="40.5591">fsim/tables/ps_full_ms/h1/w0/v13</property>
      <property value="34.6889">fsim/tables/ps_full_ms/h1/w0/v14</property>
      <property value="23.3031">fsim/tables/ps_full_ms/h1/w0/v15</property>
      <property value="31.2513">fsim/tables/ps_full_ms/h1/w0/v2</property>
      <property value="34.106">fsim/tables/ps_full_ms/h1/w0/v3</property>
      <property value="37.0103">fsim/tables/ps_full_ms/h1/w0/v4</property>
      <property value="39.7664">fsim/tables/ps_full_ms/h1/w0/v5</property>
      <property value="41.7639">fsim/tables/ps_full_ms/h1/w0/v6</property>
      <property value="43.1724">fsim/tables/ps_full_ms/h1/w0/v7</property>
      <property value="43.9416">fsim/tables/ps_full_ms/h1/w0/v8</property>
      <property value="44.3988">fsim/tables/ps_full_ms/h1/w0/v9</property>
      <property value="15.8132">fsim/tables/ps_full_ms/h1/w1/v0</property>
      <property value="18.8373">fsim/tables/ps_full_ms/h1/w1/v1</property>
      <property value="31.2711">fsim/tables/ps_full_ms/h1/w1/v10</property>
      <property value="30.7832">fsim/tables/ps_full_ms/h1/w1/v11</property>
      <property value="29.8554">fsim/tables/ps_full_ms/h1/w1/v12</property>
      <property value="28.2993">fsim/tables/ps_full_ms/h1/w1/v13</property>
      <property value="24.0953">fsim/tables/ps_full_ms/h1/w1/v14</property>
      <property value="16.1951">fsim/tables/ps_full_ms/h1/w1/v15</property>
      <property value="21.5873">fsim/tables/ps_full_ms/h1/w1/v2</property>
      <property value="23.7404">fsim/tables/ps_full_ms/h1/w1/v3</property>
      <property value="25.9377">fsim/tables/ps_full_ms/h1/w1/v4</property>
      <property value="27.7945">fsim/tables/ps_full_ms/h1/w1/v5</property>
      <property value="29.1333">fsim/tables/ps_full_ms/h1/w1/v6</property>
      <property value="30.1481">fsim/tables/ps_full_ms/h1/w1/v7</property>
      <property value="30.7031">fsim/tables/ps_full_ms/h1/w1/v8</property>
      <property value="31.1799">fsim/tables/ps_full_ms/h1/w1/v9</property>
      <property value="10.9407">fsim/tables/ps_full_ms/h1/w2/v0</property>
      <property value="13.1851">fsim/tables/ps_full_ms/h1/w2/v1</property>
      <property value="23.5153">fsim/tables/ps_full_ms/h1/w2/v10</property>
      <property value="23.3031">fsim/tables/ps_full_ms/h1/w2/v11</property>
      <property value="22.6709">fsim/tables/ps_full_ms/h1/w2/v12</property>
      <property value="21.4219">fsim/tables/ps_full_ms/h1/w2/v13</property>
      <property value="18.1417">fsim/tables/ps_full_ms/h1/w2/v14</property>
      <property value="12.0878">fsim/tables/ps_full_ms/h1/w2/v15</property>
      <property value="15.2991">fsim/tables/ps_full_ms/h1/w2/v2</property>
      <property value="17.3669">fsim/tables/ps_full_ms/h1/w2/v3</property>
      <property value="19.2849">fsim/tables/ps_full_ms/h1/w2/v4</property>
      <property value="20.6954">fsim/tables/ps_full_ms/h1/w2/v5</property>
      <property value="21.7943">fsim/tables/ps_full_ms/h1/w2/v6</property>
      <property value="22.6026">fsim/tables/ps_full_ms/h1/w2/v7</property>
      <property value="23.1517">fsim/tables/ps_full_ms/h1/w2/v8</property>
      <property value="23.4631">fsim/tables/ps_full_ms/h1/w2/v9</property>
      <property value="15.7937">fsim/tables/ps_full_ms/h2/w0/v0</property>
      <property value="19.2773">fsim/tables/ps_full_ms/h2/w0/v1</property>
      <property value="32.2666">fsim/tables/ps_full_ms/h2/w0/v10</property>
      <property value="32.2417">fsim/tables/ps_full_ms/h2/w0/v11</property>
      <property value="31.8296">fsim/tables/ps_full_ms/h2/w0/v12</property>
      <property value="30.7605">fsim/tables/ps_full_ms/h2/w0/v13</property>
      <property value="28.0534">fsim/tables/ps_full_ms/h2/w0/v14</property>
      <property value="21.6223">fsim/tables/ps_full_ms/h2/w0/v15</property>
      <property value="21.5707">fsim/tables/ps_full_ms/h2/w0/v2</property>
      <property value="23.5098">fsim/tables/ps_full_ms/h2/w0/v3</property>
      <property value="25.8502">fsim/tables/ps_full_ms/h2/w0/v4</property>
      <property value="27.8641">fsim/tables/ps_full_ms/h2/w0/v5</property>
      <property value="29.2786">fsim/tables/ps_full_ms/h2/w0/v6</property>
      <property value="30.2616">fsim/tables/ps_full_ms/h2/w0/v7</property>
      <property value="30.9463">fsim/tables/ps_full_ms/h2/w0/v8</property>
      <property value="31.8254">fsim/tables/ps_full_ms/h2/w0/v9</property>
      <property value="10.1225">fsim/tables/ps_full_ms/h2/w1/v0</property>
      <property value="11.9453">fsim/tables/ps_full_ms/h2/w1/v1</property>
      <property value="22.1268">fsim/tables/ps_full_ms/h2/w1/v10</property>
      <property value="22.2205">fsim/tables/ps_full_ms/h2/w1/v11</property>
      <property value="22.0532">fsim/tables/ps_full_ms/h2/w1/v12</property>
      <property value="21.1949">fsim/tables/ps_full_ms/h2/w1/v13</property>
      <property value="19.2784">fsim/tables/ps_full_ms/h2/w1/v14</property>
      <property value="14.7932">fsim/tables/ps_full_ms/h2/w1/v15</property>
      <property value="14.1369">fsim/tables/ps_full_ms/h2/w1/v2</property>
      <property value="15.9558">fsim/tables/ps_full_ms/h2/w1/v3</property>
      <property value="17.5661">fsim/tables/ps_full_ms/h2/w1/v4</property>
      <property value="18.8742">fsim/tables/ps_full_ms/h2/w1/v5</property>
      <property value="19.9199">fsim/tables/ps_full_ms/h2/w1/v6</property>
      <property value="20.6593">fsim/tables/ps_full_ms/h2/w1/v7</property>
      <property value="21.2675">fsim/tables/ps_full_ms/h2/w1/v8</property>
      <property value="21.8304">fsim/tables/ps_full_ms/h2/w1/v9</property>
      <property value="6.12823">fsim/tables/ps_full_ms/h2/w2/v0</property>
      <property value="7.67236">fsim/tables/ps_full_ms/h2/w2/v1</property>
      <property value="16.308">fsim/tables/ps_full_ms/h2/w2/v10</property>
      <property value="16.302">fsim/tables/ps_full_ms/h2/w2/v11</property>
      <property value="16.1321">fsim/tables/ps_full_ms/h2/w2/v12</property>
      <property value="15.6092">fsim/tables/ps_full_ms/h2/w2/v13</property>
      <property value="14.3329">fsim/tables/ps_full_ms/h2/w2/v14</property>
      <property value="10.9064">fsim/tables/ps_full_ms/h2/w2/v15</property>
      <property value="9.07876">fsim/tables/ps_full_ms/h2/w2/v2</property>
      <property value="11.0944">fsim/tables/ps_full_ms/h2/w2/v3</property>
      <property value="12.3806">fsim/tables/ps_full_ms/h2/w2/v4</property>
      <property value="13.5165">fsim/tables/ps_full_ms/h2/w2/v5</property>
      <property value="14.3211">fsim/tables/ps_full_ms/h2/w2/v6</property>
      <property value="14.9505">fsim/tables/ps_full_ms/h2/w2/v7</property>
      <property value="15.489">fsim/tables/ps_full_ms/h2/w2/v8</property>
      <property value="15.9546">fsim/tables/ps_full_ms/h2/w2/v9</property>
      <property value="12.9596">fsim/tables/ps_full_ms/h3/w0/v0</property>
      <property value="15.7221">fsim/tables/ps_full_ms/h3/w0/v1</property>
      <property value="26.869">fsim/tables/ps_full_ms/h3/w0/v10</property>
      <property value="26.8048">fsim/tables/ps_full_ms/h3/w0/v11</property>
      <property value="26.344">fsim/tables/ps_full_ms/h3/w0/v12</property>
      <property value="25.5282">fsim/tables/ps_full_ms/h3/w0/v13</property>
      <property value="23.9868">fsim/tables/ps_full_ms/h3/w0/v14</property>
      <property value="19.3331">fsim/tables/ps_full_ms/h3/w0/v15</property>
      <property value="17.9559">fsim/tables/ps_full_ms/h3/w0/v2</property>
      <property value="19.6044">fsim/tables/ps_full_ms/h3/w0/v3</property>
      <property value="21.7041">fsim/tables/ps_full_ms/h3/w0/v4</property>
      <property value="23.3099">fsim/tables/ps_full_ms/h3/w0/v5</property>
      <property value="24.3907">fsim/tables/ps_full_ms/h3/w0/v6</property>
      <property value="25.2803">fsim/tables/ps_full_ms/h3/w0/v7</property>
      <property value="25.8211">fsim/tables/ps_full_ms/h3/w0/v8</property>
      <property value="26.4678">fsim/tables/ps_full_ms/h3/w0/v9</property>
      <property value="7.83588">fsim/tables/ps_full_ms/h3/w1/v0</property>
      <property value="9.36686">fsim/tables/ps_full_ms/h3/w1/v1</property>
      <property value="18.1099">fsim/tables/ps_full_ms/h3/w1/v10</property>
      <property value="18.0898">fsim/tables/ps_full_ms/h3/w1/v11</property>
      <property value="17.8955">fsim/tables/ps_full_ms/h3/w1/v12</property>
      <property value="17.4474">fsim/tables/ps_full_ms/h3/w1/v13</property>
      <property value="16.3174">fsim/tables/ps_full_ms/h3/w1/v14</property>
      <property value="13.1127">fsim/tables/ps_full_ms/h3/w1/v15</property>
      <property value="11.2144">fsim/tables/ps_full_ms/h3/w1/v2</property>
      <property value="12.9889">fsim/tables/ps_full_ms/h3/w1/v3</property>
      <property value="14.3096">fsim/tables/ps_full_ms/h3/w1/v4</property>
      <property value="15.4174">fsim/tables/ps_full_ms/h3/w1/v5</property>
      <property value="16.2602">fsim/tables/ps_full_ms/h3/w1/v6</property>
      <property value="16.936">fsim/tables/ps_full_ms/h3/w1/v7</property>
      <property value="17.3949">fsim/tables/ps_full_ms/h3/w1/v8</property>
      <property value="17.9337">fsim/tables/ps_full_ms/h3/w1/v9</property>
      <property value="4.3673">fsim/tables/ps_full_ms/h3/w2/v0</property>
      <property value="5.47225">fsim/tables/ps_full_ms/h3/w2/v1</property>
      <property value="12.9533">fsim/tables/ps_full_ms/h3/w2/v10</property>
      <property value="13.0629">fsim/tables/ps_full_ms/h3/w2/v11</property>
      <property value="12.8308">fsim/tables/ps_full_ms/h3/w2/v12</property>
      <property value="12.4588">fsim/tables/ps_full_ms/h3/w2/v13</property>
      <property value="11.7632">fsim/tables/ps_full_ms/h3/w2/v14</property>
      <property value="9.5503">fsim/tables/ps_full_ms/h3/w2/v15</property>
      <property value="6.71955">fsim/tables/ps_full_ms/h3/w2/v2</property>
      <property value="8.40572">fsim/tables/ps_full_ms/h3/w2/v3</property>
      <property value="9.73528">fsim/tables/ps_full_ms/h3/w2/v4</property>
      <property value="10.662">fsim/tables/ps_full_ms/h3/w2/v5</property>
      <property value="11.3144">fsim/tables/ps_full_ms/h3/w2/v6</property>
      <property value="11.8578">fsim/tables/ps_full_ms/h3/w2/v7</property>
      <property value="12.3517">fsim/tables/ps_full_ms/h3/w2/v8</property>
      <property value="12.7454">fsim/tables/ps_full_ms/h3/w2/v9</property>
      <property value="9.81819">fsim/tables/ps_full_ms/h4/w0/v0</property>
      <property value="11.8321">fsim/tables/ps_full_ms/h4/w0/v1</property>
      <property value="21.1798">fsim/tables/ps_full_ms/h4/w0/v10</property>
      <property value="21.2443">fsim/tables/ps_full_ms/h4/w0/v11</property>
      <property value="21.0257">fsim/tables/ps_full_ms/h4/w0/v12</property>
      <property value="20.4022">fsim/tables/ps_full_ms/h4/w0/v13</property>
      <property value="19.2102">fsim/tables/ps_full_ms/h4/w0/v14</property>
      <property value="15.6979">fsim/tables/ps_full_ms/h4/w0/v15</property>
      <property value="13.8336">fsim/tables/ps_full_ms/h4/w0/v2</property>
      <property value="15.3394">fsim/tables/ps_full_ms/h4/w0/v3</property>
      <property value="17.0063">fsim/tables/ps_full_ms/h4/w0/v4</property>
      <property value="18.2144">fsim/tables/ps_full_ms/h4/w0/v5</property>
      <property value="19.1623">fsim/tables/ps_full_ms/h4/w0/v6</property>
      <property value="19.8201">fsim/tables/ps_full_ms/h4/w0/v7</property>
      <property value="20.435">fsim/tables/ps_full_ms/h4/w0/v8</property>
      <property value="20.9201">fsim/tables/ps_full_ms/h4/w0/v9</property>
      <property value="5.19819">fsim/tables/ps_full_ms/h4/w1/v0</property>
      <property value="6.48835">fsim/tables/ps_full_ms/h4/w1/v1</property>
      <property value="13.8866">fsim/tables/ps_full_ms/h4/w1/v10</property>
      <property value="13.926">fsim/tables/ps_full_ms/h4/w1/v11</property>
      <property value="13.723">fsim/tables/ps_full_ms/h4/w1/v12</property>
      <property value="13.4037">fsim/tables/ps_full_ms/h4/w1/v13</property>
      <property value="12.7236">fsim/tables/ps_full_ms/h4/w1/v14</property>
      <property value="10.4411">fsim/tables/ps_full_ms/h4/w1/v15</property>
      <property value="7.79422">fsim/tables/ps_full_ms/h4/w1/v2</property>
      <property value="9.47442">fsim/tables/ps_full_ms/h4/w1/v3</property>
      <property value="10.6507">fsim/tables/ps_full_ms/h4/w1/v4</property>
      <property value="11.5465">fsim/tables/ps_full_ms/h4/w1/v5</property>
      <property value="12.2231">fsim/tables/ps_full_ms/h4/w1/v6</property>
      <property value="12.7261">fsim/tables/ps_full_ms/h4/w1/v7</property>
      <property value="13.2823">fsim/tables/ps_full_ms/h4/w1/v8</property>
      <property value="13.632">fsim/tables/ps_full_ms/h4/w1/v9</property>
      <property value="1.79399">fsim/tables/ps_full_ms/h4/w2/v0</property>
      <property value="3.16846">fsim/tables/ps_full_ms/h4/w2/v1</property>
      <property value="9.44082">fsim/tables/ps_full_ms/h4/w2/v10</property>
      <property value="9.47089">fsim/tables/ps_full_ms/h4/w2/v11</property>
      <property value="9.43742">fsim/tables/ps_full_ms/h4/w2/v12</property>
      <property value="9.24254">fsim/tables/ps_full_ms/h4/w2/v13</property>
      <property value="8.6829">fsim/tables/ps_full_ms/h4/w2/v14</property>
      <property value="7.06841">fsim/tables/ps_full_ms/h4/w2/v15</property>
      <property value="4.06415">fsim/tables/ps_full_ms/h4/w2/v2</property>
      <property value="5.28438">fsim/tables/ps_full_ms/h4/w2/v3</property>
      <property value="6.56794">fsim/tables/ps_full_ms/h4/w2/v4</property>
      <property value="7.416">fsim/tables/ps_full_ms/h4/w2/v5</property>
      <property value="7.96461">fsim/tables/ps_full_ms/h4/w2/v6</property>
      <property value="8.3943">fsim/tables/ps_full_ms/h4/w2/v7</property>
      <property value="8.8815">fsim/tables/ps_full_ms/h4/w2/v8</property>
      <property value="9.19957">fsim/tables/ps_full_ms/h4/w2/v9</property>
      <property value="5.74614">fsim/tables/ps_full_ms/h5/w0/v0</property>
      <property value="7.14221">fsim/tables/ps_full_ms/h5/w0/v1</property>
      <property value="14.1807">fsim/tables/ps_full_ms/h5/w0/v10</property>
      <property value="14.0995">fsim/tables/ps_full_ms/h5/w0/v11</property>
      <property value="13.8789">fsim/tables/ps_full_ms/h5/w0/v12</property>
      <property value="13.5295">fsim/tables/ps_full_ms/h5/w0/v13</property>
      <property value="12.8204">fsim/tables/ps_full_ms/h5/w0/v14</property>
      <property value="10.3227">fsim/tables/ps_full_ms/h5/w0/v15</property>
      <property value="8.37497">fsim/tables/ps_full_ms/h5/w0/v2</property>
      <property value="10.0568">fsim/tables/ps_full_ms/h5/w0/v3</property>
      <property value="11.0945">fsim/tables/ps_full_ms/h5/w0/v4</property>
      <property value="11.9577">fsim/tables/ps_full_ms/h5/w0/v5</property>
      <property value="12.6383">fsim/tables/ps_full_ms/h5/w0/v6</property>
      <property value="13.1129">fsim/tables/ps_full_ms/h5/w0/v7</property>
      <property value="13.5822">fsim/tables/ps_full_ms/h5/w0/v8</property>
      <property value="13.9341">fsim/tables/ps_full_ms/h5/w0/v9</property>
      <property value="1.53912">fsim/tables/ps_full_ms/h5/w1/v0</property>
      <property value="2.6582">fsim/tables/ps_full_ms/h5/w1/v1</property>
      <property value="8.42183">fsim/tables/ps_full_ms/h5/w1/v10</property>
      <property value="8.41997">fsim/tables/ps_full_ms/h5/w1/v11</property>
      <property value="8.3583">fsim/tables/ps_full_ms/h5/w1/v12</property>
      <property value="8.18361">fsim/tables/ps_full_ms/h5/w1/v13</property>
      <property value="7.66181">fsim/tables/ps_full_ms/h5/w1/v14</property>
      <property value="6.12811">fsim/tables/ps_full_ms/h5/w1/v15</property>
      <property value="3.48405">fsim/tables/ps_full_ms/h5/w1/v2</property>
      <property value="4.62365">fsim/tables/ps_full_ms/h5/w1/v3</property>
      <property value="5.80662">fsim/tables/ps_full_ms/h5/w1/v4</property>
      <property value="6.57278">fsim/tables/ps_full_ms/h5/w1/v5</property>
      <property value="7.06845">fsim/tables/ps_full_ms/h5/w1/v6</property>
      <property value="7.47404">fsim/tables/ps_full_ms/h5/w1/v7</property>
      <property value="7.9264">fsim/tables/ps_full_ms/h5/w1/v8</property>
      <property value="8.19635">fsim/tables/ps_full_ms/h5/w1/v9</property>
      <property value="0.781015">fsim/tables/ps_full_ms/h5/w2/v0</property>
      <property value="1.32773">fsim/tables/ps_full_ms/h5/w2/v1</property>
      <property value="4.79752">fsim/tables/ps_full_ms/h5/w2/v10</property>
      <property value="4.85988">fsim/tables/ps_full_ms/h5/w2/v11</property>
      <property value="4.84101">fsim/tables/ps_full_ms/h5/w2/v12</property>
      <property value="4.70468">fsim/tables/ps_full_ms/h5/w2/v13</property>
      <property value="4.4158">fsim/tables/ps_full_ms/h5/w2/v14</property>
      <property value="3.56933">fsim/tables/ps_full_ms/h5/w2/v15</property>
      <property value="1.88377">fsim/tables/ps_full_ms/h5/w2/v2</property>
      <property value="2.67946">fsim/tables/ps_full_ms/h5/w2/v3</property>
      <property value="3.43936">fsim/tables/ps_full_ms/h5/w2/v4</property>
      <property value="3.75098">fsim/tables/ps_full_ms/h5/w2/v5</property>
      <property value="4.01321">fsim/tables/ps_full_ms/h5/w2/v6</property>
      <property value="4.25042">fsim/tables/ps_full_ms/h5/w2/v7</property>
      <property value="4.4767">fsim/tables/ps_full_ms/h5/w2/v8</property>
      <property value="4.71566">fsim/tables/ps_full_ms/h5/w2/v9</property>
      <property value="3.2664">fsim/tables/ps_full_ms/h6/w0/v0</property>
      <property value="4.39645">fsim/tables/ps_full_ms/h6/w0/v1</property>
      <property value="10.491">fsim/tables/ps_full_ms/h6/w0/v10</property>
      <property value="10.5625">fsim/tables/ps_full_ms/h6/w0/v11</property>
      <property value="10.4113">fsim/tables/ps_full_ms/h6/w0/v12</property>
      <property value="10.0885">fsim/tables/ps_full_ms/h6/w0/v13</property>
      <property value="9.49987">fsim/tables/ps_full_ms/h6/w0/v14</property>
      <property value="7.71798">fsim/tables/ps_full_ms/h6/w0/v15</property>
      <property value="5.30909">fsim/tables/ps_full_ms/h6/w0/v2</property>
      <property value="6.87004">fsim/tables/ps_full_ms/h6/w0/v3</property>
      <property value="7.84788">fsim/tables/ps_full_ms/h6/w0/v4</property>
      <property value="8.57828">fsim/tables/ps_full_ms/h6/w0/v5</property>
      <property value="9.12963">fsim/tables/ps_full_ms/h6/w0/v6</property>
      <property value="9.57413">fsim/tables/ps_full_ms/h6/w0/v7</property>
      <property value="10.0057">fsim/tables/ps_full_ms/h6/w0/v8</property>
      <property value="10.3551">fsim/tables/ps_full_ms/h6/w0/v9</property>
      <property value="1.15445">fsim/tables/ps_full_ms/h6/w1/v0</property>
      <property value="1.75717">fsim/tables/ps_full_ms/h6/w1/v1</property>
      <property value="5.52087">fsim/tables/ps_full_ms/h6/w1/v10</property>
      <property value="5.60076">fsim/tables/ps_full_ms/h6/w1/v11</property>
      <property value="5.48803">fsim/tables/ps_full_ms/h6/w1/v12</property>
      <property value="5.36683">fsim/tables/ps_full_ms/h6/w1/v13</property>
      <property value="5.06445">fsim/tables/ps_full_ms/h6/w1/v14</property>
      <property value="4.06365">fsim/tables/ps_full_ms/h6/w1/v15</property>
      <property value="2.37897">fsim/tables/ps_full_ms/h6/w1/v2</property>
      <property value="3.22439">fsim/tables/ps_full_ms/h6/w1/v3</property>
      <property value="3.96363">fsim/tables/ps_full_ms/h6/w1/v4</property>
      <property value="4.3225">fsim/tables/ps_full_ms/h6/w1/v5</property>
      <property value="4.59751">fsim/tables/ps_full_ms/h6/w1/v6</property>
      <property value="4.96388">fsim/tables/ps_full_ms/h6/w1/v7</property>
      <property value="5.23286">fsim/tables/ps_full_ms/h6/w1/v8</property>
      <property value="5.41622">fsim/tables/ps_full_ms/h6/w1/v9</property>
      <property value="1.37321">fsim/tables/ps_full_ms/h6/w2/v0</property>
      <property value="1.51068">fsim/tables/ps_full_ms/h6/w2/v1</property>
      <property value="2.33362">fsim/tables/ps_full_ms/h6/w2/v10</property>
      <property value="2.32005">fsim/tables/ps_full_ms/h6/w2/v11</property>
      <property value="2.31885">fsim/tables/ps_full_ms/h6/w2/v12</property>
      <property value="2.30766">fsim/tables/ps_full_ms/h6/w2/v13</property>
      <property value="2.11098">fsim/tables/ps_full_ms/h6/w2/v14</property>
      <property value="1.68002">fsim/tables/ps_full_ms/h6/w2/v15</property>
      <property value="1.64814">fsim/tables/ps_full_ms/h6/w2/v2</property>
      <property value="1.78561">fsim/tables/ps_full_ms/h6/w2/v3</property>
      <property value="1.69696">fsim/tables/ps_full_ms/h6/w2/v4</property>
      <property value="1.95693">fsim/tables/ps_full_ms/h6/w2/v5</property>
      <property value="2.09199">fsim/tables/ps_full_ms/h6/w2/v6</property>
      <property value="2.17442">fsim/tables/ps_full_ms/h6/w2/v7</property>
      <property value="2.26152">fsim/tables/ps_full_ms/h6/w2/v8</property>
      <property value="2.34909">fsim/tables/ps_full_ms/h6/w2/v9</property>
      <property value="0.934457">fsim/tables/ps_full_ms/h7/w0/v0</property>
      <property value="2.03761">fsim/tables/ps_full_ms/h7/w0/v1</property>
      <property value="7.32247">fsim/tables/ps_full_ms/h7/w0/v10</property>
      <property value="7.33302">fsim/tables/ps_full_ms/h7/w0/v11</property>
      <property value="7.26071">fsim/tables/ps_full_ms/h7/w0/v12</property>
      <property value="7.15285">fsim/tables/ps_full_ms/h7/w0/v13</property>
      <property value="6.68574">fsim/tables/ps_full_ms/h7/w0/v14</property>
      <property value="5.29471">fsim/tables/ps_full_ms/h7/w0/v15</property>
      <property value="2.77159">fsim/tables/ps_full_ms/h7/w0/v2</property>
      <property value="3.8217">fsim/tables/ps_full_ms/h7/w0/v3</property>
      <property value="4.86419">fsim/tables/ps_full_ms/h7/w0/v4</property>
      <property value="5.58517">fsim/tables/ps_full_ms/h7/w0/v5</property>
      <property value="6.03565">fsim/tables/ps_full_ms/h7/w0/v6</property>
      <property value="6.44024">fsim/tables/ps_full_ms/h7/w0/v7</property>
      <property value="6.86868">fsim/tables/ps_full_ms/h7/w0/v8</property>
      <property value="7.10717">fsim/tables/ps_full_ms/h7/w0/v9</property>
      <property value="1.66602">fsim/tables/ps_full_ms/h7/w1/v0</property>
      <property value="1.87951">fsim/tables/ps_full_ms/h7/w1/v1</property>
      <property value="2.87188">fsim/tables/ps_full_ms/h7/w1/v10</property>
      <property value="2.87232">fsim/tables/ps_full_ms/h7/w1/v11</property>
      <property value="2.88449">fsim/tables/ps_full_ms/h7/w1/v12</property>
      <property value="2.8046">fsim/tables/ps_full_ms/h7/w1/v13</property>
      <property value="2.53811">fsim/tables/ps_full_ms/h7/w1/v14</property>
      <property value="2.07649">fsim/tables/ps_full_ms/h7/w1/v15</property>
      <property value="2.09301">fsim/tables/ps_full_ms/h7/w1/v2</property>
      <property value="2.3065">fsim/tables/ps_full_ms/h7/w1/v3</property>
      <property value="2.3915">fsim/tables/ps_full_ms/h7/w1/v4</property>
      <property value="2.54743">fsim/tables/ps_full_ms/h7/w1/v5</property>
      <property value="2.64852">fsim/tables/ps_full_ms/h7/w1/v6</property>
      <property value="2.75521">fsim/tables/ps_full_ms/h7/w1/v7</property>
      <property value="2.86591">fsim/tables/ps_full_ms/h7/w1/v8</property>
      <property value="2.87347">fsim/tables/ps_full_ms/h7/w1/v9</property>
      <property value="-3.04846">fsim/tables/ps_idle_ms/h0/w0/v0</property>
      <property value="-3.75944">fsim/tables/ps_idle_ms/h0/w0/v1</property>
      <property value="-42.1316">fsim/tables/ps_idle_ms/h0/w0/v10</property>
      <property value="-50.7002">fsim/tables/ps_idle_ms/h0/w0/v11</property>
      <property value="-60.2151">fsim/tables/ps_idle_ms/h0/w0/v12</property>
      <property value="-71.0835">fsim/tables/ps_idle_ms/h0/w0/v13</property>
      <property value="-84.3553">fsim/tables/ps_idle_ms/h0/w0/v14</property>
      <property value="-100.355">fsim/tables/ps_idle_ms/h0/w0/v15</property>
      <property value="-5.07059">fsim/tables/ps_idle_ms/h0/w0/v2</property>
      <property value="-6.99856">fsim/tables/ps_idle_ms/h0/w0/v3</property>
      <property value="-9.56821">fsim/tables/ps_idle_ms/h0/w0/v4</property>
      <property value="-12.9185">fsim/tables/ps_idle_ms/h0/w0/v5</property>
      <property value="-16.9095">fsim/tables/ps_idle_ms/h0/w0/v6</property>
      <property value="-21.9028">fsim/tables/ps_idle_ms/h0/w0/v7</property>
      <property value="-27.768">fsim/tables/ps_idle_ms/h0/w0/v8</property>
      <property value="-34.4999">fsim/tables/ps_idle_ms/h0/w0/v9</property>
      <property value="-4.40861">fsim/tables/ps_idle_ms/h0/w1/v0</property>
      <property value="-4.25779">fsim/tables/ps_idle_ms/h0/w1/v1</property>
      <property value="-31.074">fsim/tables/ps_idle_ms/h0/w1/v10</property>
      <property value="-37.2561">fsim/tables/ps_idle_ms/h0/w1/v11</property>
      <property value="-44.1308">fsim/tables/ps_idle_ms/h0/w1/v12</property>
      <property value="-51.6776">fsim/tables/ps_idle_ms/h0/w1/v13</property>
      <property value="-60.9074">fsim/tables/ps_idle_ms/h0/w1/v14</property>
      <property value="-74.2519">fsim/tables/ps_idle_ms/h0/w1/v15</property>
      <property value="-5.07163">fsim/tables/ps_idle_ms/h0/w1/v2</property>
      <property value="-6.35934">fsim/tables/ps_idle_ms/h0/w1/v3</property>
      <property value="-8.12572">fsim/tables/ps_idle_ms/h0/w1/v4</property>
      <property value="-10.4308">fsim/tables/ps_idle_ms/h0/w1/v5</property>
      <property value="-13.3263">fsim/tables/ps_idle_ms/h0/w1/v6</property>
      <property value="-16.7859">fsim/tables/ps_idle_ms/h0/w1/v7</property>
      <property value="-20.7683">fsim/tables/ps_idle_ms/h0/w1/v8</property>
      <property value="-25.5963">fsim/tables/ps_idle_ms/h0/w1/v9</property>
      <property value="-5.14539">fsim/tables/ps_idle_ms/h0/w2/v0</property>
      <property value="-5.29691">fsim/tables/ps_idle_ms/h0/w2/v1</property>
      <property value="-24.8644">fsim/tables/ps_idle_ms/h0/w2/v10</property>
      <property value="-29.7036">fsim/tables/ps_idle_ms/h0/w2/v11</property>
      <property value="-35.1369">fsim/tables/ps_idle_ms/h0/w2/v12</property>
      <property value="-41.0558">fsim/tables/ps_idle_ms/h0/w2/v13</property>
      <property value="-48.1824">fsim/tables/ps_idle_ms/h0/w2/v14</property>
      <property value="-58.726">fsim/tables/ps_idle_ms/h0/w2/v15</property>
      <property value="-5.30966">fsim/tables/ps_idle_ms/h0/w2/v2</property>
      <property value="-6.17818">fsim/tables/ps_idle_ms/h0/w2/v3</property>
      <property value="-7.46495">fsim/tables/ps_idle_ms/h0/w2/v4</property>
      <property value="-9.14803">fsim/tables/ps_idle_ms/h0/w2/v5</property>
      <property value="-11.3548">fsim/tables/ps_idle_ms/h0/w2/v6</property>
      <property value="-13.9527">fsim/tables/ps_idle_ms/h0/w2/v7</property>
      <property value="-17.1333">fsim/tables/ps_idle_ms/h0/w2/v8</property>
      <property value="-20.7309">fsim/tables/ps_idle_ms/h0/w2/v9</property>
      <property value="-4.08384">fsim/tables/ps_idle_ms/h1/w0/v0</property>
      <property value="-4.09884">fsim/tables/ps_idle_ms/h1/w0/v1</property>
      <property value="-32.3502">fsim/tables/ps_idle_ms/h1/w0/v10</property>
      <property value="-38.8405">fsim/tables/ps_idle_ms/h1/w0/v11</property>
      <property value="-46.0388">fsim/tables/ps_idle_ms/h1/w0/v12</property>
      <property value="-54.1112">fsim/tables/ps_idle_ms/h1/w0/v13</property>
      <property value="-64.2882">fsim/tables/ps_idle_ms/h1/w0/v14</property>
      <property value="-79.4243">fsim/tables/ps_idle_ms/h1/w0/v15</property>
      <property value="-4.95807">fsim/tables/ps_idle_ms/h1/w0/v2</property>
      <property value="-6.30965">fsim/tables/ps_idle_ms/h1/w0/v3</property>
      <property value="-8.1852">fsim/tables/ps_idle_ms/h1/w0/v4</property>
      <property value="-10.5661">fsim/tables/ps_idle_ms/h1/w0/v5</property>
      <property value="-13.6532">fsim/tables/ps_idle_ms/h1/w0/v6</property>
      <property value="-17.2495">fsim/tables/ps_idle_ms/h1/w0/v7</property>
      <property value="-21.527">fsim/tables/ps_idle_ms/h1/w0/v8</property>
      <property value="-26.5966">fsim/tables/ps_idle_ms/h1/w0/v9</property>
      <property value="-5.15156">fsim/tables/ps_idle_ms/h1/w1/v0</property>
      <property value="-5.21915">fsim/tables/ps_idle_ms/h1/w1/v1</property>
      <property value="-24.3013">fsim/tables/ps_idle_ms/h1/w1/v10</property>
      <property value="-28.9347">fsim/tables/ps_idle_ms/h1/w1/v11</property>
      <property value="-34.1022">fsim/tables/ps_idle_ms/h1/w1/v12</property>
      <property value="-39.7858">fsim/tables/ps_idle_ms/h1/w1/v13</property>
      <property value="-46.8108">fsim/tables/ps_idle_ms/h1/w1/v14</property>
      <property value="-57.6517">fsim/tables/ps_idle_ms/h1/w1/v15</property>
      <property value="-5.40582">fsim/tables/ps_idle_ms/h1/w1/v2</property>
      <property value="-6.28077">fsim/tables/ps_idle_ms/h1/w1/v3</property>
      <property value="-7.55044">fsim/tables/ps_idle_ms/h1/w1/v4</property>
      <property value="-9.19652">fsim/tables/ps_idle_ms/h1/w1/v5</property>
      <property value="-11.3275">fsim/tables/ps_idle_ms/h1/w1/v6</property>
      <property value="-13.8452">fsim/tables/ps_idle_ms/h1/w1/v7</property>
      <property value="-16.9008">fsim/tables/ps_idle_ms/h1/w1/v8</property>
      <property value="-20.3527">fsim/tables/ps_idle_ms/h1/w1/v9</property>
      <property value="-6.23055">fsim/tables/ps_idle_ms/h1/w2/v0</property>
      <property value="-6.29994">fsim/tables/ps_idle_ms/h1/w2/v1</property>
      <property value="-20.0571">fsim/tables/ps_idle_ms/h1/w2/v10</property>
      <property value="-23.4224">fsim/tables/ps_idle_ms/h1/w2/v11</property>
      <property value="-27.3139">fsim/tables/ps_idle_ms/h1/w2/v12</property>
      <property value="-31.773">fsim/tables/ps_idle_ms/h1/w2/v13</property>
      <property value="-37.0638">fsim/tables/ps_idle_ms/h1/w2/v14</property>
      <property value="-45.3542">fsim/tables/ps_idle_ms/h1/w2/v15</property>
      <property value="-6.16142">fsim/tables/ps_idle_ms/h1/w2/v2</property>
      <property value="-6.48449">fsim/tables/ps_idle_ms/h1/w2/v3</property>
      <property value="-7.38604">fsim/tables/ps_idle_ms/h1/w2/v4</property>
      <property value="-8.59905">fsim/tables/ps_idle_ms/h1/w2/v5</property>
      <property value="-10.1398">fsim/tables/ps_idle_ms/h1/w2/v6</property>
      <property value="-12.0827">fsim/tables/ps_idle_ms/h1/w2/v7</property>
      <property value="-14.294">fsim/tables/ps_idle_ms/h1/w2/v8</property>
      <property value="-16.9982">fsim/tables/ps_idle_ms/h1/w2/v9</property>
      <property value="-5.03523">fsim/tables/ps_idle_ms/h2/w0/v0</property>
      <property value="-4.97639">fsim/tables/ps_idle_ms/h2/w0/v1</property>
      <property value="-24.3236">fsim/tables/ps_idle_ms/h2/w0/v10</property>
      <property value="-28.9604">fsim/tables/ps_idle_ms/h2/w0/v11</property>
      <property value="-34.0993">fsim/tables/ps_idle_ms/h2/w0/v12</property>
      <property value="-39.8841">fsim/tables/ps_idle_ms/h2/w0/v13</property>
      <property value="-47.257">fsim/tables/ps_idle_ms/h2/w0/v14</property>
      <property value="-59.5548">fsim/tables/ps_idle_ms/h2/w0/v15</property>
      <property value="-5.2844">fsim/tables/ps_idle_ms/h2/w0/v2</property>
      <property value="-6.1907">fsim/tables/ps_idle_ms/h2/w0/v3</property>
      <property value="-7.47374">fsim/tables/ps_idle_ms/h2/w0/v4</property>
      <property value="-9.14902">fsim/tables/ps_idle_ms/h2/w0/v5</property>
      <property value="-11.256">fsim/tables/ps_idle_ms/h2/w0/v6</property>
      <property value="-13.8238">fsim/tables/ps_idle_ms/h2/w0/v7</property>
      <property value="-16.867">fsim/tables/ps_idle_ms/h2/w0/v8</property>
      <property value="-20.3032">fsim/tables/ps_idle_ms/h2/w0/v9</property>
      <property value="-6.23767">fsim/tables/ps_idle_ms/h2/w1/v0</property>
      <property value="-6.41367">fsim/tables/ps_idle_ms/h2/w1/v1</property>
      <property value="-19.0508">fsim/tables/ps_idle_ms/h2/w1/v10</property>
      <property value="-22.1272">fsim/tables/ps_idle_ms/h2/w1/v11</property>
      <property value="-25.587">fsim/tables/ps_idle_ms/h2/w1/v12</property>
      <property value="-29.7013">fsim/tables/ps_idle_ms/h2/w1/v13</property>
      <property value="-34.715">fsim/tables/ps_idle_ms/h2/w1/v14</property>
      <property value="-42.7153">fsim/tables/ps_idle_ms/h2/w1/v15</property>
      <property value="-6.23238">fsim/tables/ps_idle_ms/h2/w1/v2</property>
      <property value="-6.59511">fsim/tables/ps_idle_ms/h2/w1/v3</property>
      <property value="-7.44361">fsim/tables/ps_idle_ms/h2/w1/v4</property>
      <property value="-8.56547">fsim/tables/ps_idle_ms/h2/w1/v5</property>
      <property value="-10.0008">fsim/tables/ps_idle_ms/h2/w1/v6</property>
      <property value="-11.7784">fsim/tables/ps_idle_ms/h2/w1/v7</property>
      <property value="-13.8172">fsim/tables/ps_idle_ms/h2/w1/v8</property>
      <property value="-16.2575">fsim/tables/ps_idle_ms/h2/w1/v9</property>
      <property value="-7.56012">fsim/tables/ps_idle_ms/h2/w2/v0</property>
      <property value="-7.2204">fsim/tables/ps_idle_ms/h2/w2/v1</property>
      <property value="-16.1209">fsim/tables/ps_idle_ms/h2/w2/v10</property>
      <property value="-18.5393">fsim/tables/ps_idle_ms/h2/w2/v11</property>
      <property value="-21.1592">fsim/tables/ps_idle_ms/h2/w2/v12</property>
      <property value="-24.2316">fsim/tables/ps_idle_ms/h2/w2/v13</property>
      <property value="-27.7242">fsim/tables/ps_idle_ms/h2/w2/v14</property>
      <property value="-33.6563">fsim/tables/ps_idle_ms/h2/w2/v15</property>
      <property value="-7.49912">fsim/tables/ps_idle_ms/h2/w2/v2</property>
      <property value="-7.27673">fsim/tables/ps_idle_ms/h2/w2/v3</property>
      <property value="-7.6815">fsim/tables/ps_idle_ms/h2/w2/v4</property>
      <property value="-8.48572">fsim/tables/ps_idle_ms/h2/w2/v5</property>
      <property value="-9.5124">fsim/tables/ps_idle_ms/h2/w2/v6</property>
      <property value="-10.8172">fsim/tables/ps_idle_ms/h2/w2/v7</property>
      <property value="-12.3175">fsim/tables/ps_idle_ms/h2/w2/v8</property>
      <property value="-14.1431">fsim/tables/ps_idle_ms/h2/w2/v9</property>
      <property value="-5.27872">fsim/tables/ps_idle_ms/h3/w0/v0</property>
      <property value="-5.44962">fsim/tables/ps_idle_ms/h3/w0/v1</property>
      <property value="-21.7284">fsim/tables/ps_idle_ms/h3/w0/v10</property>
      <property value="-25.6814">fsim/tables/ps_idle_ms/h3/w0/v11</property>
      <property value="-30.1258">fsim/tables/ps_idle_ms/h3/w0/v12</property>
      <property value="-35.1462">fsim/tables/ps_idle_ms/h3/w0/v13</property>
      <property value="-41.5394">fsim/tables/ps_idle_ms/h3/w0/v14</property>
      <property value="-52.2592">fsim/tables/ps_idle_ms/h3/w0/v15</property>
      <property value="-5.51741">fsim/tables/ps_idle_ms/h3/w0/v2</property>
      <property value="-6.25662">fsim/tables/ps_idle_ms/h3/w0/v3</property>
      <property value="-7.32602">fsim/tables/ps_idle_ms/h3/w0/v4</property>
      <property value="-8.76878">fsim/tables/ps_idle_ms/h3/w0/v5</property>
      <property value="-10.5977">fsim/tables/ps_idle_ms/h3/w0/v6</property>
      <property value="-12.7278">fsim/tables/ps_idle_ms/h3/w0/v7</property>
      <property value="-15.3813">fsim/tables/ps_idle_ms/h3/w0/v8</property>
      <property value="-18.3868">fsim/tables/ps_idle_ms/h3/w0/v9</property>
      <property value="-6.74569">fsim/tables/ps_idle_ms/h3/w1/v0</property>
      <property value="-6.7822">fsim/tables/ps_idle_ms/h3/w1/v1</property>
      <property value="-17.3335">fsim/tables/ps_idle_ms/h3/w1/v10</property>
      <property value="-20.0042">fsim/tables/ps_idle_ms/h3/w1/v11</property>
      <property value="-22.9426">fsim/tables/ps_idle_ms/h3/w1/v12</property>
      <property value="-26.3364">fsim/tables/ps_idle_ms/h3/w1/v13</property>
      <property value="-30.6705">fsim/tables/ps_idle_ms/h3/w1/v14</property>
      <property value="-37.5888">fsim/tables/ps_idle_ms/h3/w1/v15</property>
      <property value="-6.72264">fsim/tables/ps_idle_ms/h3/w1/v2</property>
      <property value="-6.8262">fsim/tables/ps_idle_ms/h3/w1/v3</property>
      <property value="-7.53945">fsim/tables/ps_idle_ms/h3/w1/v4</property>
      <property value="-8.48642">fsim/tables/ps_idle_ms/h3/w1/v5</property>
      <property value="-9.69733">fsim/tables/ps_idle_ms/h3/w1/v6</property>
      <property value="-11.1347">fsim/tables/ps_idle_ms/h3/w1/v7</property>
      <property value="-12.9433">fsim/tables/ps_idle_ms/h3/w1/v8</property>
      <property value="-14.9257">fsim/tables/ps_idle_ms/h3/w1/v9</property>
      <property value="-8.12061">fsim/tables/ps_idle_ms/h3/w2/v0</property>
      <property value="-7.70091">fsim/tables/ps_idle_ms/h3/w2/v1</property>
      <property value="-15.0183">fsim/tables/ps_idle_ms/h3/w2/v10</property>
      <property value="-16.9156">fsim/tables/ps_idle_ms/h3/w2/v11</property>
      <property value="-19.1615">fsim/tables/ps_idle_ms/h3/w2/v12</property>
      <property value="-21.8456">fsim/tables/ps_idle_ms/h3/w2/v13</property>
      <property value="-24.7959">fsim/tables/ps_idle_ms/h3/w2/v14</property>
      <property value="-29.6612">fsim/tables/ps_idle_ms/h3/w2/v15</property>
      <property value="-8.03705">fsim/tables/ps_idle_ms/h3/w2/v2</property>
      <property value="-7.81973">fsim/tables/ps_idle_ms/h3/w2/v3</property>
      <property value="-7.94453">fsim/tables/ps_idle_ms/h3/w2/v4</property>
      <property value="-8.5974">fsim/tables/ps_idle_ms/h3/w2/v5</property>
      <property value="-9.44747">fsim/tables/ps_idle_ms/h3/w2/v6</property>
      <property value="-10.5015">fsim/tables/ps_idle_ms/h3/w2/v7</property>
      <property value="-11.7809">fsim/tables/ps_idle_ms/h3/w2/v8</property>
      <property value="-13.2897">fsim/tables/ps_idle_ms/h3/w2/v9</property>
      <property value="-5.82237">fsim/tables/ps_idle_ms/h4/w0/v0</property>
      <property value="-6.22075">fsim/tables/ps_idle_ms/h4/w0/v1</property>
      <property value="-18.5382">fsim/tables/ps_idle_ms/h4/w0/v10</property>
      <property value="-21.5003">fsim/tables/ps_idle_ms/h4/w0/v11</property>
      <property value="-24.8399">fsim/tables/ps_idle_ms/h4/w0/v12</property>
      <property value="-28.8208">fsim/tables/ps_idle_ms/h4/w0/v13</property>
      <property value="-33.8409">fsim/tables/ps_idle_ms/h4/w0/v14</property>
      <property value="-42.0456">fsim/tables/ps_idle_ms/h4/w0/v15</property>
      <property value="-6.06405">fsim/tables/ps_idle_ms/h4/w0/v2</property>
      <property value="-6.50352">fsim/tables/ps_idle_ms/h4/w0/v3</property>
      <property value="-7.33298">fsim/tables/ps_idle_ms/h4/w0/v4</property>
      <property value="-8.42851">fsim/tables/ps_idle_ms/h4/w0/v5</property>
      <property value="-9.79504">fsim/tables/ps_idle_ms/h4/w0/v6</property>
      <property value="-11.5301">fsim/tables/ps_idle_ms/h4/w0/v7</property>
      <property value="-13.4828">fsim/tables/ps_idle_ms/h4/w0/v8</property>
      <property value="-15.8597">fsim/tables/ps_idle_ms/h4/w0/v9</property>
      <property value="-7.5567">fsim/tables/ps_idle_ms/h4/w1/v0</property>
      <property value="-7.40941">fsim/tables/ps_idle_ms/h4/w1/v1</property>
      <property value="-15.161">fsim/tables/ps_idle_ms/h4/w1/v10</property>
      <property value="-17.1738">fsim/tables/ps_idle_ms/h4/w1/v11</property>
      <property value="-19.4737">fsim/tables/ps_idle_ms/h4/w1/v12</property>
      <property value="-22.1637">fsim/tables/ps_idle_ms/h4/w1/v13</property>
      <property value="-25.2913">fsim/tables/ps_idle_ms/h4/w1/v14</property>
      <property value="-30.4482">fsim/tables/ps_idle_ms/h4/w1/v15</property>
      <property value="-7.59368">fsim/tables/ps_idle_ms/h4/w1/v2</property>
      <property value="-7.42013">fsim/tables/ps_idle_ms/h4/w1/v3</property>
      <property value="-7.78972">fsim/tables/ps_idle_ms/h4/w1/v4</property>
      <property value="-8.49162">fsim/tables/ps_idle_ms/h4/w1/v5</property>
      <property value="-9.40245">fsim/tables/ps_idle_ms/h4/w1/v6</property>
      <property value="-10.5267">fsim/tables/ps_idle_ms/h4/w1/v7</property>
      <property value="-11.8032">fsim/tables/ps_idle_ms/h4/w1/v8</property>
      <property value="-13.4157">fsim/tables/ps_idle_ms/h4/w1/v9</property>
      <property value="-8.93957">fsim/tables/ps_idle_ms/h4/w2/v0</property>
      <property value="-8.51898">fsim/tables/ps_idle_ms/h4/w2/v1</property>
      <property value="-13.5822">fsim/tables/ps_idle_ms/h4/w2/v10</property>
      <property value="-15.0829">fsim/tables/ps_idle_ms/h4/w2/v11</property>
      <property value="-16.6091">fsim/tables/ps_idle_ms/h4/w2/v12</property>
      <property value="-18.6234">fsim/tables/ps_idle_ms/h4/w2/v13</property>
      <property value="-20.9146">fsim/tables/ps_idle_ms/h4/w2/v14</property>
      <property value="-24.4264">fsim/tables/ps_idle_ms/h4/w2/v15</property>
      <property value="-8.76838">fsim/tables/ps_idle_ms/h4/w2/v2</property>
      <property value="-8.72905">fsim/tables/ps_idle_ms/h4/w2/v3</property>
      <property value="-8.58283">fsim/tables/ps_idle_ms/h4/w2/v4</property>
      <property value="-8.93024">fsim/tables/ps_idle_ms/h4/w2/v5</property>
      <property value="-9.53891">fsim/tables/ps_idle_ms/h4/w2/v6</property>
      <property value="-10.315">fsim/tables/ps_idle_ms/h4/w2/v7</property>
      <property value="-11.2257">fsim/tables/ps_idle_ms/h4/w2/v8</property>
      <property value="-12.3567">fsim/tables/ps_idle_ms/h4/w2/v9</property>
      <property value="-6.96322">fsim/tables/ps_idle_ms/h5/w0/v0</property>
      <property value="-7.05724">fsim/tables/ps_idle_ms/h5/w0/v1</property>
      <property value="-15.1986">fsim/tables/ps_idle_ms/h5/w0/v10</property>
      <property value="-17.3544">fsim/tables/ps_idle_ms/h5/w0/v11</property>
      <property value="-19.7113">fsim/tables/ps_idle_ms/h5/w0/v12</property>
      <property value="-22.3939">fsim/tables/ps_idle_ms/h5/w0/v13</property>
      <property value="-25.7006">fsim/tables/ps_idle_ms/h5/w0/v14</property>
      <property value="-31.0046">fsim/tables/ps_idle_ms/h5/w0/v15</property>
      <property value="-7.02223">fsim/tables/ps_idle_ms/h5/w0/v2</property>
      <property value="-6.98774">fsim/tables/ps_idle_ms/h5/w0/v3</property>
      <property value="-7.5588">fsim/tables/ps_idle_ms/h5/w0/v4</property>
      <property value="-8.30138">fsim/tables/ps_idle_ms/h5/w0/v5</property>
      <property value="-9.22736">fsim/tables/ps_idle_ms/h5/w0/v6</property>
      <property value="-10.4158">fsim/tables/ps_idle_ms/h5/w0/v7</property>
      <property value="-11.7887">fsim/tables/ps_idle_ms/h5/w0/v8</property>
      <property value="-13.4216">fsim/tables/ps_idle_ms/h5/w0/v9</property>
      <property value="-8.75235">fsim/tables/ps_idle_ms/h5/w1/v0</property>
      <property value="-8.40742">fsim/tables/ps_idle_ms/h5/w1/v1</property>
      <property value="-13.0805">fsim/tables/ps_idle_ms/h5/w1/v10</property>
      <property value="-14.4799">fsim/tables/ps_idle_ms/h5/w1/v11</property>
      <property value="-15.9314">fsim/tables/ps_idle_ms/h5/w1/v12</property>
      <property value="-17.7375">fsim/tables/ps_idle_ms/h5/w1/v13</property>
      <property value="-19.9041">fsim/tables/ps_idle_ms/h5/w1/v14</property>
      <property value="-23.1663">fsim/tables/ps_idle_ms/h5/w1/v15</property>
      <property value="-8.64097">fsim/tables/ps_idle_ms/h5/w1/v2</property>
      <property value="-8.5678">fsim/tables/ps_idle_ms/h5/w1/v3</property>
      <property value="-8.45238">fsim/tables/ps_idle_ms/h5/w1/v4</property>
      <property value="-8.75691">fsim/tables/ps_idle_ms/h5/w1/v5</property>
      <property value="-9.34356">fsim/tables/ps_idle_ms/h5/w1/v6</property>
      <property value="-10.0602">fsim/tables/ps_idle_ms/h5/w1/v7</property>
      <property value="-10.8955">fsim/tables/ps_idle_ms/h5/w1/v8</property>
      <property value="-11.957">fsim/tables/ps_idle_ms/h5/w1/v9</property>
      <property value="-9.66128">fsim/tables/ps_idle_ms/h5/w2/v0</property>
      <property value="-9.81125">fsim/tables/ps_idle_ms/h5/w2/v1</property>
      <property value="-12.7648">fsim/tables/ps_idle_ms/h5/w2/v10</property>
      <property value="-13.6602">fsim/tables/ps_idle_ms/h5/w2/v11</property>
      <property value="-14.4873">fsim/tables/ps_idle_ms/h5/w2/v12</property>
      <property value="-15.9073">fsim/tables/ps_idle_ms/h5/w2/v13</property>
      <property value="-17.0163">fsim/tables/ps_idle_ms/h5/w2/v14</property>
      <property value="-18.8882">fsim/tables/ps_idle_ms/h5/w2/v15</property>
      <property value="-10.0165">fsim/tables/ps_idle_ms/h5/w2/v2</property>
      <property value="-9.76354">fsim/tables/ps_idle_ms/h5/w2/v3</property>
      <property value="-9.69139">fsim/tables/ps_idle_ms/h5/w2/v4</property>
      <property value="-9.85149">fsim/tables/ps_idle_ms/h5/w2/v5</property>
      <property value="-10.2652">fsim/tables/ps_idle_ms/h5/w2/v6</property>
      <property value="-10.7331">fsim/tables/ps_idle_ms/h5/w2/v7</property>
      <property value="-11.3336">fsim/tables/ps_idle_ms/h5/w2/v8</property>
      <property value="-11.9821">fsim/tables/ps_idle_ms/h5/w2/v9</property>
      <property value="-7.87998">fsim/tables/ps_idle_ms/h6/w0/v0</property>
      <property value="-7.54709">fsim/tables/ps_idle_ms/h6/w0/v1</property>
      <property value="-13.6395">fsim/tables/ps_idle_ms/h6/w0/v10</property>
      <property value="-15.1912">fsim/tables/ps_idle_ms/h6/w0/v11</property>
      <property value="-17.0015">fsim/tables/ps_idle_ms/h6/w0/v12</property>
      <property value="-19.166">fsim/tables/ps_idle_ms/h6/w0/v13</property>
      <property value="-21.7678">fsim/tables/ps_idle_ms/h6/w0/v14</property>
      <property value="-25.6772">fsim/tables/ps_idle_ms/h6/w0/v15</property>
      <property value="-7.84605">fsim/tables/ps_idle_ms/h6/w0/v2</property>
      <property value="-7.67267">fsim/tables/ps_idle_ms/h6/w0/v3</property>
      <property value="-7.80613">fsim/tables/ps_idle_ms/h6/w0/v4</property>
      <property value="-8.36315">fsim/tables/ps_idle_ms/h6/w0/v5</property>
      <property value="-9.06669">fsim/tables/ps_idle_ms/h6/w0/v6</property>
      <property value="-9.91571">fsim/tables/ps_idle_ms/h6/w0/v7</property>
      <property value="-10.9916">fsim/tables/ps_idle_ms/h6/w0/v8</property>
      <property value="-12.1896">fsim/tables/ps_idle_ms/h6/w0/v9</property>
      <property value="-9.16727">fsim/tables/ps_idle_ms/h6/w1/v0</property>
      <property value="-9.44163">fsim/tables/ps_idle_ms/h6/w1/v1</property>
      <property value="-12.7623">fsim/tables/ps_idle_ms/h6/w1/v10</property>
      <property value="-13.6424">fsim/tables/ps_idle_ms/h6/w1/v11</property>
      <property value="-14.6911">fsim/tables/ps_idle_ms/h6/w1/v12</property>
      <property value="-16.0377">fsim/tables/ps_idle_ms/h6/w1/v13</property>
      <property value="-17.3687">fsim/tables/ps_idle_ms/h6/w1/v14</property>
      <property value="-19.4933">fsim/tables/ps_idle_ms/h6/w1/v15</property>
      <property value="-9.4148">fsim/tables/ps_idle_ms/h6/w1/v2</property>
      <property value="-9.20289">fsim/tables/ps_idle_ms/h6/w1/v3</property>
      <property value="-9.17093">fsim/tables/ps_idle_ms/h6/w1/v4</property>
      <property value="-9.55321">fsim/tables/ps_idle_ms/h6/w1/v5</property>
      <property value="-10.0297">fsim/tables/ps_idle_ms/h6/w1/v6</property>
      <property value="-10.5662">fsim/tables/ps_idle_ms/h6/w1/v7</property>
      <property value="-11.2077">fsim/tables/ps_idle_ms/h6/w1/v8</property>
      <property value="-11.9318">fsim/tables/ps_idle_ms/h6/w1/v9</property>
      <property value="-10.5005">fsim/tables/ps_idle_ms/h6/w2/v0</property>
      <property value="-10.477">fsim/tables/ps_idle_ms/h6/w2/v1</property>
      <property value="-13.0697">fsim/tables/ps_idle_ms/h6/w2/v10</property>
      <property value="-13.609">fsim/tables/ps_idle_ms/h6/w2/v11</property>
      <property value="-14.421">fsim/tables/ps_idle_ms/h6/w2/v12</property>
      <property value="-14.8643">fsim/tables/ps_idle_ms/h6/w2/v13</property>
      <property value="-14.9445">fsim/tables/ps_idle_ms/h6/w2/v14</property>
      <property value="-16.1054">fsim/tables/ps_idle_ms/h6/w2/v15</property>
      <property value="-10.6769">fsim/tables/ps_idle_ms/h6/w2/v2</property>
      <property value="-10.8525">fsim/tables/ps_idle_ms/h6/w2/v3</property>
      <property value="-11.1198">fsim/tables/ps_idle_ms/h6/w2/v4</property>
      <property value="-11.4003">fsim/tables/ps_idle_ms/h6/w2/v5</property>
      <property value="-11.6422">fsim/tables/ps_idle_ms/h6/w2/v6</property>
      <property value="-11.9851">fsim/tables/ps_idle_ms/h6/w2/v7</property>
      <property value="-12.4004">fsim/tables/ps_idle_ms/h6/w2/v8</property>
      <property value="-12.7501">fsim/tables/ps_idle_ms/h6/w2/v9</property>
      <property value="-8.83067">fsim/tables/ps_idle_ms/h7/w0/v0</property>
      <property value="-8.26566">fsim/tables/ps_idle_ms/h7/w0/v1</property>
      <property value="-12.5766">fsim/tables/ps_idle_ms/h7/w0/v10</property>
      <property value="-13.8091">fsim/tables/ps_idle_ms/h7/w0/v11</property>
      <property value="-15.1478">fsim/tables/ps_idle_ms/h7/w0/v12</property>
      <property value="-16.683">fsim/tables/ps_idle_ms/h7/w0/v13</property>
      <property value="-18.6883">fsim/tables/ps_idle_ms/h7/w0/v14</property>
      <property value="-21.6852">fsim/tables/ps_idle_ms/h7/w0/v15</property>
      <property value="-8.66571">fsim/tables/ps_idle_ms/h7/w0/v2</property>
      <property value="-8.58787">fsim/tables/ps_idle_ms/h7/w0/v3</property>
      <property value="-8.49176">fsim/tables/ps_idle_ms/h7/w0/v4</property>
      <property value="-8.73938">fsim/tables/ps_idle_ms/h7/w0/v5</property>
      <property value="-9.25763">fsim/tables/ps_idle_ms/h7/w0/v6</property>
      <property value="-9.88803">fsim/tables/ps_idle_ms/h7/w0/v7</property>
      <property value="-10.6348">fsim/tables/ps_idle_ms/h7/w0/v8</property>
      <property value="-11.5763">fsim/tables/ps_idle_ms/h7/w0/v9</property>
      <property value="-10.0518">fsim/tables/ps_idle_ms/h7/w1/v0</property>
      <property value="-10.2088">fsim/tables/ps_idle_ms/h7/w1/v1</property>
      <property value="-13.2275">fsim/tables/ps_idle_ms/h7/w1/v10</property>
      <property value="-13.7487">fsim/tables/ps_idle_ms/h7/w1/v11</property>
      <property value="-14.4178">fsim/tables/ps_idle_ms/h7/w1/v12</property>
      <property value="-15.0483">fsim/tables/ps_idle_ms/h7/w1/v13</property>
      <property value="-15.6252">fsim/tables/ps_idle_ms/h7/w1/v14</property>
      <property value="-16.6321">fsim/tables/ps_idle_ms/h7/w1/v15</property>
      <property value="-10.4135">fsim/tables/ps_idle_ms/h7/w1/v2</property>
      <property value="-10.6657">fsim/tables/ps_idle_ms/h7/w1/v3</property>
      <property value="-10.9567">fsim/tables/ps_idle_ms/h7/w1/v4</property>
      <property value="-11.24">fsim/tables/ps_idle_ms/h7/w1/v5</property>
      <property value="-11.5864">fsim/tables/ps_idle_ms/h7/w1/v6</property>
      <property value="-11.9486">fsim/tables/ps_idle_ms/h7/w1/v7</property>
      <property value="-12.3333">fsim/tables/ps_idle_ms/h7/w1/v8</property>
      <property value="-12.789">fsim/tables/ps_idle_ms/h7/w1/v9</property>
      <property value="306.922">fsim/tables/reach_tas_ms/h0/w0</property>
      <property value="306.902">fsim/tables/reach_tas_ms/h0/w1</property>
      <property value="307.018">fsim/tables/reach_tas_ms/h0/w2</property>
      <property value="302.416">fsim/tables/reach_tas_ms/h1/w0</property>
      <property value="302.004">fsim/tables/reach_tas_ms/h1/w1</property>
      <property value="301.653">fsim/tables/reach_tas_ms/h1/w2</property>
      <property value="295.431">fsim/tables/reach_tas_ms/h2/w0</property>
      <property value="294.933">fsim/tables/reach_tas_ms/h2/w1</property>
      <property value="294.47">fsim/tables/reach_tas_ms/h2/w2</property>
      <property value="292.214">fsim/tables/reach_tas_ms/h3/w0</property>
      <property value="291.685">fsim/tables/reach_tas_ms/h3/w1</property>
      <property value="291.145">fsim/tables/reach_tas_ms/h3/w2</property>
      <property value="286.603">fsim/tables/reach_tas_ms/h4/w0</property>
      <property value="285.952">fsim/tables/reach_tas_ms/h4/w1</property>
      <property value="285.027">fsim/tables/reach_tas_ms/h4/w2</property>
      <property value="278.252">fsim/tables/reach_tas_ms/h5/w0</property>
      <property value="277.075">fsim/tables/reach_tas_ms/h5/w1</property>
      <property value="275.547">fsim/tables/reach_tas_ms/h5/w2</property>
      <property value="272.789">fsim/tables/reach_tas_ms/h6/w0</property>
      <property value="270.978">fsim/tables/reach_tas_ms/h6/w1</property>
      <property value="267.542">fsim/tables/reach_tas_ms/h6/w2</property>
      <property value="270.176">fsim/tables/reach_tas_ms/h7/w0</property>
      <property value="266.634">fsim/tables/reach_tas_ms/h7/w1</property>
      <property value="0.0">fsim/tables/speed_fraction/v0</property>
      <property value="0.0666667">fsim/tables/speed_fraction/v1</property>
      <property value="0.666667">fsim/tables/speed_fraction/v10</property>
      <property value="0.733333">fsim/tables/speed_fraction/v11</property>
      <property value="0.8">fsim/tables/speed_fraction/v12</property>
      <property value="0.866667">fsim/tables/speed_fraction/v13</property>
      <property value="0.933333">fsim/tables/speed_fraction/v14</property>
      <property value="1">fsim/tables/speed_fraction/v15</property>
      <property value="0.133333">fsim/tables/speed_fraction/v2</property>
      <property value="0.2">fsim/tables/speed_fraction/v3</property>
      <property value="0.266667">fsim/tables/speed_fraction/v4</property>
      <property value="0.333333">fsim/tables/speed_fraction/v5</property>
      <property value="0.4">fsim/tables/speed_fraction/v6</property>
      <property value="0.466667">fsim/tables/speed_fraction/v7</property>
      <property value="0.533333">fsim/tables/speed_fraction/v8</property>
      <property value="0.6">fsim/tables/speed_fraction/v9</property>
      <property value="45.0474">fsim/tables/stall_cas_ms/h0/w0</property>
      <property value="53.1713">fsim/tables/stall_cas_ms/h0/w1</property>
      <property value="60.2088">fsim/tables/stall_cas_ms/h0/w2</property>
      <property value="44.9598">fsim/tables/stall_cas_ms/h1/w0</property>
      <property value="53.0678">fsim/tables/stall_cas_ms/h1/w1</property>
      <property value="60.0917">fsim/tables/stall_cas_ms/h1/w2</property>
      <property value="44.9156">fsim/tables/stall_cas_ms/h2/w0</property>
      <property value="53.0157">fsim/tables/stall_cas_ms/h2/w1</property>
      <property value="60.0326">fsim/tables/stall_cas_ms/h2/w2</property>
      <property value="45.2979">fsim/tables/stall_cas_ms/h3/w0</property>
      <property value="53.467">fsim/tables/stall_cas_ms/h3/w1</property>
      <property value="60.5437">fsim/tables/stall_cas_ms/h3/w2</property>
      <property value="45.2621">fsim/tables/stall_cas_ms/h4/w0</property>
      <property value="53.4247">fsim/tables/stall_cas_ms/h4/w1</property>
      <property value="60.4958">fsim/tables/stall_cas_ms/h4/w2</property>
      <property value="45.5781">fsim/tables/stall_cas_ms/h5/w0</property>
      <property value="53.7977">fsim/tables/stall_cas_ms/h5/w1</property>
      <property value="60.9182">fsim/tables/stall_cas_ms/h5/w2</property>
      <property value="45.4379">fsim/tables/stall_cas_ms/h6/w0</property>
      <property value="53.6322">fsim/tables/stall_cas_ms/h6/w1</property>
      <property value="60.7308">fsim/tables/stall_cas_ms/h6/w2</property>
      <property value="45.5242">fsim/tables/stall_cas_ms/h7/w0</property>
      <property value="53.7341">fsim/tables/stall_cas_ms/h7/w1</property>
      <property value="41200">fsim/tables/weight_kg/w0</property>
      <property value="57400">fsim/tables/weight_kg/w1</property>
      <property value="73600">fsim/tables/weight_kg/w2</property>
      <channel name="Pitch">
        <summer name="fcs/pitch-trim-sum">
          <input>fcs/elevator-cmd-norm</input>
          <input>fcs/pitch-trim-cmd-norm</input>
          <clipto> <min>-1</min> <max>1</max> </clipto>
        </summer>
        <aerosurface_scale name="fcs/elevator-control">
          <input>fcs/pitch-trim-sum</input>
          <range> <min>-25.00</min> <max>15.00</max> </range>
          <gain>0.0174533</gain>
        </aerosurface_scale>
        <actuator name="fcs/elevator-actuator">
          <input>fcs/elevator-control</input>
          <rate_limit>2.0</rate_limit>
          <output>fcs/elevator-pos-rad</output>
        </actuator>
      </channel>
      <channel name="Roll">
        <summer name="fcs/roll-trim-sum">
          <input>fcs/aileron-cmd-norm</input>
          <input>fcs/roll-trim-cmd-norm</input>
          <clipto> <min>-1</min> <max>1</max> </clipto>
        </summer>
        <aerosurface_scale name="fcs/left-aileron-control">
          <input>fcs/roll-trim-sum</input>
          <range> <min>-20.00</min> <max>20.00</max> </range>
          <gain>0.0174533</gain>
        </aerosurface_scale>
        <actuator name="fcs/left-aileron-actuator">
          <input>fcs/left-aileron-control</input>
          <rate_limit>2.0</rate_limit>
          <output>fcs/left-aileron-pos-rad</output>
        </actuator>
        <pure_gain name="fcs/right-aileron">
          <input>fcs/left-aileron-pos-rad</input>
          <gain>-1</gain>
          <output>fcs/right-aileron-pos-rad</output>
        </pure_gain>
      </channel>
      <channel name="Yaw">
        <summer name="fcs/yaw-trim-sum">
          <input>fcs/rudder-cmd-norm</input>
          <input>fcs/yaw-trim-cmd-norm</input>
          <clipto> <min>-1</min> <max>1</max> </clipto>
        </summer>
        <aerosurface_scale name="fcs/rudder-control">
          <input>fcs/yaw-trim-sum</input>
          <range> <min>-25.00</min> <max>25.00</max> </range>
          <gain>0.0174533</gain>
        </aerosurface_scale>
        <actuator name="fcs/rudder-actuator">
          <input>fcs/rudder-control</input>
          <rate_limit>2.0</rate_limit>
          <output>fcs/rudder-pos-rad</output>
        </actuator>
        <!-- the nose or tail wheel steers with the rudder pedals (JSBSim steers from
             fcs/steer-cmd-norm, positive right; the rudder command is positive left) -->
        <pure_gain name="fcs/steer-from-rudder">
          <input>fcs/yaw-trim-sum</input>
          <gain>-1</gain>
          <output>fcs/steer-cmd-norm</output>
        </pure_gain>
      </channel>
      <channel name="Flaps">
        <kinematic name="fcs/flaps-control">
          <input>fcs/flap-cmd-norm</input>
          <traverse>
            <setting> <position>0.0</position> <time>0.0</time> </setting>
            <setting> <position>8.8</position> <time>2.0</time> </setting>
            <setting> <position>17.5</position> <time>2.0</time> </setting>
            <setting> <position>26.2</position> <time>2.0</time> </setting>
            <setting> <position>35.0</position> <time>2.0</time> </setting>
          </traverse>
          <output>fcs/flap-pos-deg</output>
        </kinematic>
        <pure_gain name="fcs/flaps-normalized">
          <input>fcs/flap-pos-deg</input>
          <gain>0.0285714</gain>
          <output>fcs/flap-pos-norm</output>
        </pure_gain>
      </channel>
      <channel name="Landing Gear">
        <kinematic name="fcs/gear-control">
          <input>gear/gear-cmd-norm</input>
          <traverse>
            <setting> <position>0</position> <time>0</time> </setting>
            <setting> <position>1</position> <time>5</time> </setting>
          </traverse>
          <output>gear/gear-pos-norm</output>
        </kinematic>
      </channel>
    </flight_control>
    <aerodynamics>
        <function name="aero/function/mach-lift">
          <description>lift, and damping, over its low-speed value (hangar: aero/mach.py)</description>
          <table>
            <independentVar lookup="row">velocities/mach</independentVar>
            <tableData>
                 0.000     1.000000
                 0.300     1.025567
                 0.500     1.077830
                 0.600     1.120323
                 0.700     1.180103
                 0.800     1.267921
                 0.850     1.329078
                 0.900     1.409039
                 0.950     1.429618
                 1.000     1.442509
                 1.050     1.449864
                 1.100     1.453836
                 1.200     1.460250
            </tableData>
          </table>
        </function>
        <function name="aero/function/mach-side">
          <description>side force, rolling and yawing moment over their low-speed values</description>
          <table>
            <independentVar lookup="row">velocities/mach</independentVar>
            <tableData>
                 0.000     1.000000
                 0.300     1.013309
                 0.500     1.039643
                 0.600     1.060111
                 0.700     1.087243
                 0.800     1.122705
                 0.850     1.143375
                 0.900     1.163591
                 0.950     1.160046
                 1.000     1.147401
                 1.050     1.128689
                 1.100     1.106943
                 1.200     1.066486
            </tableData>
          </table>
        </function>
        <function name="aero/function/mach-dCm-dCL">
          <description>pitching moment per unit low-speed lift: the neutral point's move</description>
          <table>
            <independentVar lookup="row">velocities/mach</independentVar>
            <tableData>
                 0.000     0.000000
                 0.300    -0.006756
                 0.500    -0.021080
                 0.600    -0.033344
                 0.700    -0.051767
                 0.800    -0.081946
                 0.850    -0.105679
                 0.900    -0.140978
                 0.950    -0.181017
                 1.000    -0.226826
                 1.050    -0.276282
                 1.100    -0.327344
                 1.200    -0.427243
            </tableData>
          </table>
        </function>
        <function name="aero/function/mach-dCD0">
          <description>zero-lift drag's change: friction and wave drag</description>
          <table>
            <independentVar lookup="row">velocities/mach</independentVar>
            <tableData>
                 0.000     0.000000
                 0.300    -0.000099
                 0.500    -0.000271
                 0.600    -0.000385
                 0.700    -0.000516
                 0.800    -0.000649
                 0.850    -0.000419
                 0.900     0.000895
                 0.950     0.012239
                 1.000     0.033439
                 1.050     0.044844
                 1.100     0.044751
                 1.200     0.044559
            </tableData>
          </table>
        </function>
        <function name="aero/function/mach-dK">
          <description>induced-drag factor's change (per CL^2)</description>
          <table>
            <independentVar lookup="row">velocities/mach</independentVar>
            <tableData>
                 0.000     0.000000
                 0.300     0.002836
                 0.500     0.008018
                 0.600     0.011708
                 0.700     0.016239
                 0.800     0.021770
                 0.850     0.024992
                 0.900     0.028587
                 0.950     0.029417
                 1.000     0.029918
                 1.050     0.038154
                 1.100     0.057578
                 1.200     0.103370
            </tableData>
          </table>
        </function>
        <function name="aero/function/mach-aileron">
          <description>aileron power over its low-speed value</description>
          <table>
            <independentVar lookup="row">velocities/mach</independentVar>
            <tableData>
                 0.000     1.000000
                 0.300     1.019965
                 0.500     1.059476
                 0.600     1.090276
                 0.700     1.131532
                 0.800     1.187641
                 0.850     1.223535
                 0.900     1.266482
                 0.950     1.197589
                 1.000     1.085864
                 1.050     0.945584
                 1.100     0.791026
                 1.200     0.496187
            </tableData>
          </table>
        </function>
        <function name="aero/function/mach-elevator">
          <description>elevator power over its low-speed value</description>
          <table>
            <independentVar lookup="row">velocities/mach</independentVar>
            <tableData>
                 0.000     1.000000
                 0.300     1.020731
                 0.500     1.062210
                 0.600     1.095033
                 0.700     1.139841
                 0.800     1.202905
                 0.850     1.245142
                 0.900     1.298900
                 0.950     1.251340
                 1.000     1.164976
                 1.050     1.052744
                 1.100     0.927577
                 1.200     0.690178
            </tableData>
          </table>
        </function>
        <function name="aero/function/mach-flap">
          <description>flap power over its low-speed value</description>
          <table>
            <independentVar lookup="row">velocities/mach</independentVar>
            <tableData>
                 0.000     1.000000
                 0.300     1.031497
                 0.500     1.096697
                 0.600     1.150450
                 0.700     1.227045
                 0.800     1.341130
                 0.850     1.421206
                 0.900     1.525681
                 0.950     1.465685
                 1.000     1.342699
                 1.050     1.177720
                 1.100     0.991745
                 1.200     0.640791
            </tableData>
          </table>
        </function>
        <function name="aero/function/mach-rudder">
          <description>rudder power over its low-speed value</description>
          <table>
            <independentVar lookup="row">velocities/mach</independentVar>
            <tableData>
                 0.000     1.000000
                 0.300     1.017894
                 0.500     1.053885
                 0.600     1.082578
                 0.700     1.122104
                 0.800     1.178506
                 0.850     1.216793
                 0.900     1.266026
                 0.950     1.202701
                 1.000     1.096268
                 1.050     0.961097
                 1.100     0.811557
                 1.200     0.526846
            </tableData>
          </table>
        </function>
        <function name="aero/function/CL-base">
          <description>CL over alpha and beta at low speed</description>
          <table>
            <independentVar lookup="row">aero/alpha-deg</independentVar>
            <independentVar lookup="column">aero/beta-deg</independentVar>
            <tableData>
                        -90.00    -70.00    -50.00    -40.00    -30.00    -25.00    -20.00    -15.00    -10.00     -6.00     -3.00      0.00      3.00      6.00     10.00     15.00     20.00     25.00     30.00     40.00     50.00     70.00     90.00
             -180.00   0.00000  -0.00985   0.02650   0.04473   0.05987   0.06621   0.07160   0.07592   0.07909   0.08074   0.08144   0.08168   0.08144   0.08074   0.07909   0.07592   0.07160   0.06621   0.05987   0.04473   0.02650  -0.00985   0.00000
             -120.00  -0.00000   0.12061   0.34122   0.46245   0.57354   0.62145   0.66250   0.69560   0.71987   0.73325   0.73927   0.73957   0.73927   0.73325   0.71987   0.69560   0.66250   0.62145   0.57354   0.46245   0.34122   0.12061  -0.00000
              -70.00  -0.00000  -0.10173  -0.29717  -0.40613  -0.50664  -0.55018  -0.58756  -0.61777  -0.63995  -0.65155  -0.65581  -0.65518  -0.65581  -0.65155  -0.63995  -0.61777  -0.58756  -0.55018  -0.50664  -0.40613  -0.29717  -0.10173  -0.00000
              -46.00  -0.00000  -0.17920  -0.52868  -0.72247  -0.89594  -0.96931  -1.03163  -1.08181  -1.11713  -1.13049  -1.13625  -1.13815  -1.13625  -1.13049  -1.11713  -1.08181  -1.03163  -0.96931  -0.89594  -0.72247  -0.52868  -0.17920  -0.00000
              -32.00  -0.00000  -0.20210  -0.59543  -0.81057  -0.98693  -1.06344  -1.13307  -1.19381  -1.23836  -1.26141  -1.27115  -1.27439  -1.27115  -1.26141  -1.23836  -1.19381  -1.13307  -1.06344  -0.98693  -0.81057  -0.59543  -0.20210  -0.00000
              -22.00  -0.00000  -0.18868  -0.67684  -0.97207  -1.25265  -1.32575  -1.38388  -1.45127  -1.49998  -1.52490  -1.53533  -1.53876  -1.53533  -1.52490  -1.49998  -1.45127  -1.38388  -1.32575  -1.25265  -0.97207  -0.67684  -0.18868  -0.00000
              -17.00  -0.00000  -0.15664  -0.64612  -0.87880  -0.98200  -1.04396  -1.09334  -1.14012  -1.17371  -1.19072  -1.19774  -1.20003  -1.19774  -1.19072  -1.17371  -1.14012  -1.09334  -1.04396  -0.98200  -0.87880  -0.64612  -0.15664  -0.00000
              -13.00  -0.00000  -0.13819  -0.54642  -0.64417  -0.72876  -0.78042  -0.81704  -0.84936  -0.87230  -0.88374  -0.88837  -0.88984  -0.88837  -0.88374  -0.87230  -0.84936  -0.81704  -0.78042  -0.72876  -0.64417  -0.54642  -0.13819  -0.00000
               -9.00  -0.00000  -0.11490  -0.34889  -0.41173  -0.47468  -0.50740  -0.52843  -0.54577  -0.55774  -0.56343  -0.56558  -0.56621  -0.56558  -0.56343  -0.55774  -0.54577  -0.52843  -0.50740  -0.47468  -0.41173  -0.34889  -0.11490  -0.00000
               -5.00  -0.00000  -0.05493  -0.13895  -0.18248  -0.21733  -0.22856  -0.23210  -0.23443  -0.23548  -0.23551  -0.23522  -0.23501  -0.23522  -0.23551  -0.23548  -0.23443  -0.23210  -0.22856  -0.21733  -0.18248  -0.13895  -0.05493  -0.00000
               -1.00  -0.00000   0.01808   0.05688   0.04679   0.04582   0.05622   0.07067   0.08247   0.09122   0.09584   0.09784   0.09855   0.09784   0.09584   0.09122   0.08247   0.07067   0.05622   0.04582   0.04679   0.05688   0.01808  -0.00000
                3.00   0.00000   0.08928   0.26109   0.27454   0.30538   0.33789   0.37056   0.39616   0.41437   0.42334   0.42685   0.42792   0.42685   0.42334   0.41437   0.39616   0.37056   0.33789   0.30538   0.27454   0.26109   0.08928   0.00000
                7.00   0.00000   0.13096   0.46688   0.49579   0.54745   0.60135   0.65469   0.69556   0.72502   0.73994   0.74605   0.74801   0.74605   0.73994   0.72502   0.69556   0.65469   0.60135   0.54745   0.49579   0.46688   0.13096   0.00000
               11.00   0.00000   0.15869   0.66612   0.71289   0.78806   0.86119   0.93728   0.99360   1.03445   1.05535   1.06403   1.06686   1.06403   1.05535   1.03445   0.99360   0.93728   0.86119   0.78806   0.71289   0.66612   0.15869   0.00000
               15.00   0.00000   0.18863   0.74053   0.92982   1.02481   1.11109   1.21078   1.28195   1.33367   1.36021   1.37131   1.37496   1.37131   1.36021   1.33367   1.28195   1.21078   1.11109   1.02481   0.92982   0.74053   0.18863   0.00000
               19.00   0.00000   0.20726   0.75530   1.03161   1.25188   1.34299   1.46256   1.54666   1.60808   1.63976   1.65308   1.65749   1.65308   1.63976   1.60808   1.54666   1.46256   1.34299   1.25188   1.03161   0.75530   0.20726   0.00000
               23.00   0.00000   0.22514   0.67763   0.98767   1.26767   1.39182   1.52970   1.64156   1.71386   1.74896   1.76338   1.76813   1.76338   1.74896   1.71386   1.64156   1.52970   1.39182   1.26767   0.98767   0.67763   0.22514   0.00000
               27.00   0.00000   0.21258   0.62344   0.86806   1.15963   1.29804   1.38731   1.44197   1.47609   1.48126   1.47984   1.47931   1.47984   1.48126   1.47609   1.44197   1.38731   1.29804   1.15963   0.86806   0.62344   0.21258   0.00000
               32.00   0.00000   0.19899   0.59480   0.81200   1.02653   1.12209   1.20026   1.25210   1.28860   1.30664   1.31367   1.30853   1.31367   1.30664   1.28860   1.25210   1.20026   1.12209   1.02653   0.81200   0.59480   0.19899   0.00000
               46.00   0.00000   0.17767   0.52380   0.71536   0.88411   0.95432   1.01338   1.06316   1.09022   1.10437   1.11046   1.11243   1.11046   1.10437   1.09022   1.06316   1.01338   0.95432   0.88411   0.71536   0.52380   0.17767   0.00000
               70.00   0.00000   0.09729   0.28197   0.38460   0.47919   0.52012   0.55527   0.58366   0.60450   0.61540   0.61936   0.61863   0.61936   0.61540   0.60450   0.58366   0.55527   0.52012   0.47919   0.38460   0.28197   0.09729   0.00000
              120.00   0.00000  -0.12301  -0.34931  -0.47387  -0.58809  -0.63737  -0.67960  -0.71366  -0.73864  -0.75239  -0.75856  -0.75892  -0.75856  -0.75239  -0.73864  -0.71366  -0.67960  -0.63737  -0.58809  -0.47387  -0.34931  -0.12301   0.00000
              180.00   0.00000  -0.00985   0.02650   0.04473   0.05987   0.06621   0.07160   0.07592   0.07909   0.08074   0.08144   0.08168   0.08144   0.08074   0.07909   0.07592   0.07160   0.06621   0.05987   0.04473   0.02650  -0.00985   0.00000
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            </tableData>
          </table>
        </function>
      <axis name="DRAG">
        <function name="aero/coefficient/CD_base">
          <description>CD over alpha and beta (hangar)</description>
          <product>
            <property>aero/qbar-psf</property>
            <property>metrics/Sw-sqft</property>
          <table>
            <independentVar lookup="row">aero/alpha-deg</independentVar>
            <independentVar lookup="column">aero/beta-deg</independentVar>
            <tableData>
                        -90.00    -70.00    -50.00    -40.00    -30.00    -25.00    -20.00    -15.00    -10.00     -6.00     -3.00      0.00      3.00      6.00     10.00     15.00     20.00     25.00     30.00     40.00     50.00     70.00     90.00
             -180.00   0.49162   0.38751   0.21109   0.13187   0.07259   0.05174   0.03662   0.02668   0.01884   0.01793   0.01829   0.01845   0.01829   0.01793   0.01884   0.02668   0.03662   0.05174   0.07259   0.13187   0.21109   0.38751   0.49162
             -120.00   0.49162   0.48953   0.64868   0.80514   0.98629   1.07514   1.15636   1.22528   1.27778   1.30560   1.31769   1.32190   1.31769   1.30560   1.27778   1.22528   1.15636   1.07514   0.98629   0.80514   0.64868   0.48953   0.49162
              -70.00   0.49162   0.53191   0.76527   0.96772   1.19475   1.30462   1.40449   1.48894   1.55316   1.58736   1.60196   1.60702   1.60196   1.58736   1.55316   1.48894   1.40449   1.30462   1.19475   0.96772   0.76527   0.53191   0.49162
              -46.00   0.49162   0.50037   0.56805   0.64294   0.73482   0.78133   0.82450   0.86327   0.89183   0.89938   0.90248   0.90346   0.90248   0.89938   0.89183   0.86327   0.82450   0.78133   0.73482   0.64294   0.56805   0.50037   0.49162
              -32.00   0.49162   0.47712   0.43839   0.44072   0.45914   0.46992   0.47799   0.47125   0.46685   0.46463   0.46370   0.46339   0.46370   0.46463   0.46685   0.47125   0.47799   0.46992   0.45914   0.44072   0.43839   0.47712   0.49162
              -22.00   0.49162   0.46284   0.35771   0.33859   0.35171   0.31490   0.26437   0.22523   0.19584   0.18032   0.17367   0.17144   0.17367   0.18032   0.19584   0.22523   0.26437   0.31490   0.35171   0.33859   0.35771   0.46284   0.49162
              -17.00   0.49162   0.45773   0.33564   0.29323   0.25441   0.21509   0.17780   0.14703   0.12419   0.11226   0.10718   0.10548   0.10718   0.11226   0.12419   0.14703   0.17780   0.21509   0.25441   0.29323   0.33564   0.45773   0.49162
              -13.00   0.49162   0.45361   0.31943   0.25809   0.21033   0.16219   0.12874   0.10178   0.08198   0.07176   0.06745   0.06601   0.06745   0.07176   0.08198   0.10178   0.12874   0.16219   0.21033   0.25809   0.31943   0.45361   0.49162
               -9.00   0.49162   0.45041   0.30595   0.22891   0.16683   0.12183   0.09172   0.06787   0.05060   0.04182   0.03817   0.03697   0.03817   0.04182   0.05060   0.06787   0.09172   0.12183   0.16683   0.22891   0.30595   0.45041   0.49162
               -5.00   0.49162   0.44895   0.29451   0.20805   0.14157   0.09572   0.06826   0.04681   0.03153   0.02391   0.02081   0.01981   0.02081   0.02391   0.03153   0.04681   0.06826   0.09572   0.14157   0.20805   0.29451   0.44895   0.49162
               -1.00   0.49162   0.44857   0.28878   0.19666   0.13006   0.08507   0.05962   0.03972   0.02572   0.01893   0.01623   0.01537   0.01623   0.01893   0.02572   0.03972   0.05962   0.08507   0.13006   0.19666   0.28878   0.44857   0.49162
                3.00   0.49162   0.44887   0.28683   0.19394   0.13228   0.09117   0.06824   0.04815   0.03406   0.02762   0.02502   0.02385   0.02502   0.02762   0.03406   0.04815   0.06824   0.09117   0.13228   0.19394   0.28683   0.44887   0.49162
                7.00   0.49162   0.45045   0.29522   0.20950   0.15076   0.11792   0.09529   0.07415   0.06014   0.05315   0.04986   0.04687   0.04986   0.05315   0.06014   0.07415   0.09529   0.11792   0.15076   0.20950   0.29522   0.45045   0.49162
               11.00   0.49162   0.45335   0.30838   0.23479   0.18403   0.15570   0.13093   0.10878   0.09182   0.08278   0.07874   0.07734   0.07874   0.08278   0.09182   0.10878   0.13093   0.15570   0.18403   0.23479   0.30838   0.45335   0.49162
               15.00   0.49162   0.45647   0.32811   0.27598   0.23518   0.21101   0.18519   0.15825   0.13773   0.12676   0.12113   0.11966   0.12113   0.12676   0.13773   0.15825   0.18519   0.21101   0.23518   0.27598   0.32811   0.45647   0.49162
               19.00   0.49162   0.46049   0.35941   0.32654   0.29538   0.27321   0.24792   0.21426   0.19189   0.18010   0.17435   0.17293   0.17435   0.18010   0.19189   0.21426   0.24792   0.27321   0.29538   0.32654   0.35941   0.46049   0.49162
               23.00   0.49162   0.46506   0.37950   0.37826   0.38263   0.36688   0.32801   0.28964   0.26717   0.25610   0.25150   0.24999   0.25150   0.25610   0.26717   0.28964   0.32801   0.36688   0.38263   0.37826   0.37950   0.46506   0.49162
               27.00   0.49162   0.47094   0.40674   0.40001   0.44360   0.45826   0.43705   0.41573   0.39814   0.37824   0.36885   0.36665   0.36885   0.37824   0.39814   0.41573   0.43705   0.45826   0.44360   0.40001   0.40674   0.47094   0.49162
               32.00   0.49162   0.47890   0.44740   0.45272   0.47778   0.49869   0.49628   0.48843   0.48324   0.48087   0.48001   0.47763   0.48001   0.48087   0.48324   0.48843   0.49628   0.49869   0.47778   0.45272   0.44740   0.47890   0.49162
               46.00   0.49162   0.50198   0.57837   0.65978   0.75405   0.79968   0.84086   0.87862   0.89841   0.90886   0.91316   0.91436   0.91316   0.90886   0.89841   0.87862   0.84086   0.79968   0.75405   0.65978   0.57837   0.50198   0.49162
               70.00   0.49162   0.53294   0.77190   0.97888   1.21086   1.32306   1.42505   1.51126   1.57680   1.61171   1.62661   1.63176   1.62661   1.61171   1.57680   1.51126   1.42505   1.32306   1.21086   0.97888   0.77190   0.53294   0.49162
              120.00   0.49162   0.48814   0.63975   0.79009   0.96458   1.05028   1.12867   1.19521   1.24592   1.27279   1.28447   1.28854   1.28447   1.27279   1.24592   1.19521   1.12867   1.05028   0.96458   0.79009   0.63975   0.48814   0.49162
              180.00   0.49162   0.38751   0.21109   0.13187   0.07259   0.05174   0.03662   0.02668   0.01884   0.01793   0.01829   0.01845   0.01829   0.01793   0.01884   0.02668   0.03662   0.05174   0.07259   0.13187   0.21109   0.38751   0.49162
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            </tableData>
          </table>
          </product>
        </function>
        <function name="aero/coefficient/CD_mach">
          <description>zero-lift drag's change with Mach: friction, wave drag</description>
          <product>
            <property>aero/qbar-psf</property>
            <property>metrics/Sw-sqft</property>
            <property>aero/function/mach-dCD0</property>
          </product>
        </function>
        <function name="aero/coefficient/CD_induced_mach">
          <description>induced drag's change with Mach (leading-edge suction lost)</description>
          <product>
            <property>aero/qbar-psf</property>
            <property>metrics/Sw-sqft</property>
            <property>aero/cl-squared</property>
            <property>aero/function/mach-dK</property>
          </product>
        </function>
        <function name="aero/coefficient/CD_aileron">
          <description>CD increment from aileron (deg), over alpha</description>
          <product>
            <property>aero/qbar-psf</property>
            <property>metrics/Sw-sqft</property>
            <property>aero/function/mach-aileron</property>
          <table>
            <independentVar lookup="row">aero/alpha-deg</independentVar>
            <independentVar lookup="column">fcs/left-aileron-pos-deg</independentVar>
            <tableData>
                        -20.00    -15.00    -10.00     -5.00      0.00      5.00     10.00     15.00     20.00
             -180.00   0.00327   0.00187   0.00084   0.00021   0.00000   0.00021   0.00084   0.00187   0.00327
             -120.00   0.00326   0.00187   0.00084   0.00021   0.00000   0.00021   0.00084   0.00187   0.00326
              -70.00   0.00326   0.00186   0.00084   0.00021   0.00000   0.00021   0.00084   0.00186   0.00326
              -46.00   0.00652   0.00409   0.00201   0.00053   0.00000   0.00053   0.00201   0.00409   0.00652
              -32.00   0.01122   0.00741   0.00381   0.00105   0.00000   0.00105   0.00381   0.00741   0.01122
              -22.00   0.00642   0.00417   0.00211   0.00057   0.00000   0.00057   0.00211   0.00417   0.00642
              -17.00   0.00709   0.00462   0.00235   0.00064   0.00000   0.00064   0.00235   0.00462   0.00709
              -13.00   0.00780   0.00511   0.00261   0.00071   0.00000   0.00071   0.00261   0.00511   0.00780
               -9.00   0.00836   0.00551   0.00282   0.00077   0.00000   0.00077   0.00282   0.00551   0.00836
               -5.00   0.00872   0.00577   0.00296   0.00081   0.00000   0.00081   0.00296   0.00577   0.00872
               -1.00   0.00885   0.00586   0.00302   0.00082   0.00000   0.00082   0.00302   0.00586   0.00885
                3.00   0.00875   0.00579   0.00298   0.00081   0.00000   0.00081   0.00298   0.00579   0.00875
                7.00   0.00843   0.00556   0.00285   0.00078   0.00000   0.00078   0.00285   0.00556   0.00843
               11.00   0.00790   0.00519   0.00265   0.00072   0.00000   0.00072   0.00265   0.00519   0.00790
               15.00   0.00819   0.00524   0.00260   0.00069   0.00000   0.00069   0.00260   0.00524   0.00819
               19.00   0.01734   0.01146   0.00575   0.00150   0.00000   0.00150   0.00575   0.01146   0.01734
               23.00   0.04879   0.03296   0.01781   0.00511   0.00000   0.00511   0.01781   0.03296   0.04879
               27.00   0.03992   0.03090   0.02327   0.01350   0.00000   0.01350   0.02327   0.03090   0.03992
               32.00   0.02192   0.01512   0.00874   0.00202   0.00000   0.00202   0.00874   0.01512   0.02192
               46.00   0.00777   0.00496   0.00247   0.00066   0.00000   0.00066   0.00247   0.00496   0.00777
               70.00   0.00326   0.00186   0.00084   0.00021   0.00000   0.00021   0.00084   0.00186   0.00326
              120.00   0.00326   0.00187   0.00084   0.00021   0.00000   0.00021   0.00084   0.00187   0.00326
              180.00   0.00327   0.00187   0.00084   0.00021   0.00000   0.00021   0.00084   0.00187   0.00327
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            </tableData>
          </table>
          </product>
        </function>
        <function name="aero/coefficient/CD_elevator">
          <description>CD increment from elevator (deg), over alpha</description>
          <product>
            <property>aero/qbar-psf</property>
            <property>metrics/Sw-sqft</property>
            <property>aero/function/mach-elevator</property>
          <table>
            <independentVar lookup="row">aero/alpha-deg</independentVar>
            <independentVar lookup="column">fcs/elevator-pos-deg</independentVar>
            <tableData>
                        -25.00    -20.00    -15.00    -10.00     -5.00      0.00      5.00     10.00     15.00
             -180.00   0.00559   0.00366   0.00210   0.00094   0.00024   0.00000   0.00024   0.00094   0.00210
             -120.00   0.00559   0.00366   0.00210   0.00094   0.00024   0.00000   0.00024   0.00094   0.00210
              -70.00   0.00559   0.00366   0.00210   0.00094   0.00024   0.00000   0.00024   0.00094   0.00210
              -46.00  -0.00243  -0.00311  -0.00339  -0.00313  -0.00207   0.00000   0.00317   0.00726   0.01181
              -32.00  -0.00087  -0.00141  -0.00174  -0.00188  -0.00155   0.00000   0.00348   0.00890   0.01546
              -22.00   0.02426   0.02095   0.01708   0.01215   0.00617   0.00000  -0.00541  -0.00932  -0.01133
              -17.00   0.02533   0.02142   0.01706   0.01182   0.00582   0.00000  -0.00477  -0.00792  -0.00924
              -13.00   0.02392   0.02008   0.01582   0.01077   0.00518   0.00000  -0.00396  -0.00627  -0.00690
               -9.00   0.02141   0.01767   0.01364   0.00905   0.00419   0.00000  -0.00284  -0.00408  -0.00386
               -5.00   0.01776   0.01427   0.01064   0.00673   0.00291   0.00000  -0.00147  -0.00143  -0.00024
               -1.00   0.01307   0.00994   0.00688   0.00387   0.00135   0.00000   0.00014   0.00161   0.00386
                3.00   0.00762   0.00496   0.00259   0.00066  -0.00037   0.00000   0.00187   0.00484   0.00818
                7.00   0.00368   0.00133  -0.00055  -0.00169  -0.00161   0.00000   0.00307   0.00704   0.01103
               11.00  -0.00129  -0.00311  -0.00427  -0.00440  -0.00302   0.00000   0.00439   0.00944   0.01418
               15.00  -0.00531  -0.00668  -0.00724  -0.00654  -0.00411   0.00000   0.00535   0.01113   0.01633
               19.00  -0.00889  -0.00987  -0.00989  -0.00842  -0.00505   0.00000   0.00615   0.01250   0.01803
               23.00  -0.01460  -0.01495  -0.01413  -0.01145  -0.00658   0.00000   0.00751   0.01493   0.02122
               27.00  -0.01657  -0.01677  -0.01561  -0.01240  -0.00698   0.00000   0.00774   0.01532   0.02193
               32.00   0.02456   0.01745   0.01055   0.00425   0.00004   0.00000   0.00592   0.01415   0.02085
               46.00   0.02025   0.01523   0.01048   0.00605   0.00237   0.00000  -0.00091  -0.00062   0.00039
               70.00   0.00559   0.00366   0.00210   0.00094   0.00024   0.00000   0.00024   0.00094   0.00210
              120.00   0.00559   0.00366   0.00210   0.00094   0.00024   0.00000   0.00024   0.00094   0.00210
              180.00   0.00559   0.00366   0.00210   0.00094   0.00024   0.00000   0.00024   0.00094   0.00210
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            </tableData>
          </table>
          </product>
        </function>
        <function name="aero/coefficient/CD_flap">
          <description>CD increment from flap (deg), over alpha</description>
          <product>
            <property>aero/qbar-psf</property>
            <property>metrics/Sw-sqft</property>
            <property>aero/function/mach-flap</property>
          <table>
            <independentVar lookup="row">aero/alpha-deg</independentVar>
            <independentVar lookup="column">fcs/flap-pos-deg</independentVar>
            <tableData>
                          0.00      5.00     10.00     15.00     20.00     25.00     30.00     35.00
             -180.00   0.00000   0.00027   0.00107   0.00238   0.00415   0.00634   0.00888   0.01168
             -120.00   0.00000   0.00027   0.00107   0.00237   0.00414   0.00631   0.00884   0.01163
              -70.00   0.00000   0.00027   0.00107   0.00237   0.00413   0.00631   0.00883   0.01162
              -46.00   0.00000   0.00965   0.02172   0.03567   0.05078   0.06651   0.08226   0.09801
              -32.00   0.00000   0.01386   0.03451   0.06034   0.08883   0.11795   0.14681   0.17502
              -22.00   0.00000  -0.01104  -0.02014  -0.02674  -0.03077  -0.03257  -0.03271  -0.03162
              -17.00   0.00000  -0.00785  -0.01351  -0.01678  -0.01783  -0.01708  -0.01499  -0.01191
              -13.00   0.00000  -0.00566  -0.00901  -0.01003  -0.00904  -0.00649  -0.00281   0.00174
               -9.00   0.00000  -0.00313  -0.00392  -0.00253   0.00060   0.00497   0.01022   0.01617
               -5.00   0.00000  -0.00041   0.00147   0.00529   0.01051   0.01660   0.02328   0.03046
               -1.00   0.00000   0.00237   0.00686   0.01297   0.02006   0.02763   0.03550   0.04366
                3.00   0.00000   0.00508   0.01211   0.02041   0.02925   0.03819   0.04712   0.05614
                7.00   0.00000   0.00825   0.01824   0.02912   0.04007   0.05065   0.06087   0.07094
               11.00   0.00000   0.00985   0.02110   0.03288   0.04444   0.05537   0.06568   0.07557
               15.00   0.00000   0.01159   0.02436   0.03703   0.04891   0.06007   0.07091   0.08183
               19.00   0.00000   0.01184   0.02649   0.04343   0.06150   0.07948   0.09685   0.11382
               23.00   0.00000   0.01309   0.03852   0.07032   0.10296   0.13259   0.15854   0.18141
               27.00   0.00000   0.00036   0.02660   0.07476   0.12379   0.16143   0.18677   0.20419
               32.00   0.00000  -0.01145  -0.01119  -0.00059   0.01749   0.04210   0.07306   0.11178
               46.00   0.00000  -0.00919  -0.01531  -0.01878  -0.02030  -0.02051  -0.01982  -0.01848
               70.00   0.00000   0.00027   0.00107   0.00237   0.00413   0.00631   0.00883   0.01162
              120.00   0.00000   0.00027   0.00107   0.00237   0.00414   0.00631   0.00884   0.01163
              180.00   0.00000   0.00027   0.00107   0.00238   0.00415   0.00634   0.00888   0.01168
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            </tableData>
          </table>
          </product>
        </function>
        <function name="aero/coefficient/CD_rudder">
          <description>CD increment from rudder (deg), over alpha</description>
          <product>
            <property>aero/qbar-psf</property>
            <property>metrics/Sw-sqft</property>
            <property>aero/function/mach-rudder</property>
          <table>
            <independentVar lookup="row">aero/alpha-deg</independentVar>
            <independentVar lookup="column">fcs/rudder-pos-deg</independentVar>
            <tableData>
                        -25.00    -20.00    -15.00    -10.00     -5.00      0.00      5.00     10.00     15.00     20.00     25.00
             -180.00   0.00401   0.00263   0.00150   0.00068   0.00017   0.00000   0.00017   0.00068   0.00150   0.00263   0.00401
             -120.00   0.00050   0.00033   0.00019   0.00008   0.00002   0.00000   0.00002   0.00008   0.00019   0.00033   0.00050
              -70.00   0.00017   0.00012   0.00007   0.00003   0.00001   0.00000   0.00001   0.00003   0.00007   0.00012   0.00017
              -46.00   0.00817   0.00641   0.00448   0.00240   0.00066   0.00000   0.00066   0.00240   0.00448   0.00641   0.00817
              -32.00   0.00970   0.00744   0.00509   0.00269   0.00074   0.00000   0.00074   0.00269   0.00509   0.00744   0.00970
              -22.00   0.01056   0.00800   0.00542   0.00284   0.00078   0.00000   0.00078   0.00284   0.00542   0.00800   0.01056
              -17.00   0.01086   0.00820   0.00553   0.00289   0.00080   0.00000   0.00080   0.00289   0.00553   0.00820   0.01086
              -13.00   0.01100   0.00829   0.00557   0.00290   0.00080   0.00000   0.00080   0.00290   0.00557   0.00829   0.01100
               -9.00   0.01104   0.00829   0.00556   0.00289   0.00079   0.00000   0.00079   0.00289   0.00556   0.00829   0.01104
               -5.00   0.01096   0.00821   0.00550   0.00285   0.00078   0.00000   0.00078   0.00285   0.00550   0.00821   0.01096
               -1.00   0.01077   0.00806   0.00538   0.00279   0.00076   0.00000   0.00076   0.00279   0.00538   0.00806   0.01077
                3.00   0.01048   0.00782   0.00521   0.00270   0.00074   0.00000   0.00074   0.00270   0.00521   0.00782   0.01048
                7.00   0.01008   0.00751   0.00500   0.00258   0.00071   0.00000   0.00071   0.00258   0.00500   0.00751   0.01008
               11.00   0.00958   0.00713   0.00474   0.00245   0.00067   0.00000   0.00067   0.00245   0.00474   0.00713   0.00958
               15.00   0.00899   0.00669   0.00444   0.00229   0.00063   0.00000   0.00063   0.00229   0.00444   0.00669   0.00899
               19.00   0.00834   0.00619   0.00411   0.00212   0.00058   0.00000   0.00058   0.00212   0.00411   0.00619   0.00834
               23.00   0.00764   0.00567   0.00376   0.00194   0.00053   0.00000   0.00053   0.00194   0.00376   0.00567   0.00764
               27.00   0.00690   0.00514   0.00342   0.00176   0.00048   0.00000   0.00048   0.00176   0.00342   0.00514   0.00690
               32.00   0.00629   0.00483   0.00350   0.00244   0.00192   0.00000   0.00192   0.00244   0.00350   0.00483   0.00629
               46.00   0.00684   0.00530   0.00367   0.00194   0.00054   0.00000   0.00054   0.00194   0.00367   0.00530   0.00684
               70.00   0.00017   0.00012   0.00007   0.00003   0.00001   0.00000   0.00001   0.00003   0.00007   0.00012   0.00017
              120.00   0.00050   0.00033   0.00019   0.00008   0.00002   0.00000   0.00002   0.00008   0.00019   0.00033   0.00050
              180.00   0.00401   0.00263   0.00150   0.00068   0.00017   0.00000   0.00017   0.00068   0.00150   0.00263   0.00401
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            </tableData>
          </table>
          </product>
        </function>
        <function name="aero/coefficient/CD_ground">
          <description>Induced drag change in ground effect</description>
          <product>
            <property>aero/qbar-psf</property>
            <property>metrics/Sw-sqft</property>
            <property>aero/cl-squared</property>
            <value>0.05703</value>
          <table>
            <independentVar lookup="row">aero/h_b-mac-ft</independentVar>
            <tableData>
                    0.00   -1.00000
                    0.10   -0.28090
                    0.15   -0.14793
                    0.20   -0.08897
                    0.30   -0.04160
                    0.40   -0.02383
                    0.50   -0.01538
                    0.60   -0.01073
                    0.70   -0.00791
                    0.80   -0.00607
                    0.90   -0.00480
                    1.00   -0.00389
                    1.10   -0.00322
            </tableData>
          </table>
          </product>
        </function>
        <function name="aero/coefficient/CD_gear">
          <description>the gear extended: its wheels' and struts' drag by Raymer's components, 1.13 m2 (hangar)</description>
          <product>
            <property>aero/qbar-psf</property>
            <property>metrics/Sw-sqft</property>
            <value>0.00685158</value>
            <property>gear/gear-pos-norm</property>
          </product>
        </function>
      </axis>
      <axis name="SIDE">
        <function name="aero/coefficient/CY_base">
          <description>CY over alpha and beta (hangar)</description>
          <product>
            <property>aero/qbar-psf</property>
            <property>metrics/Sw-sqft</property>
            <property>aero/function/mach-side</property>
          <table>
            <independentVar lookup="row">aero/alpha-deg</independentVar>
            <independentVar lookup="column">aero/beta-deg</independentVar>
            <tableData>
                        -90.00    -70.00    -50.00    -40.00    -30.00    -25.00    -20.00    -15.00    -10.00     -6.00     -3.00      0.00      3.00      6.00     10.00     15.00     20.00     25.00     30.00     40.00     50.00     70.00     90.00
             -180.00  -0.00000   0.14482   0.17986   0.15147   0.10715   0.08308   0.05988   0.03897   0.05011   0.06332   0.03373  -0.00000  -0.03373  -0.06332  -0.05011  -0.03897  -0.05988  -0.08308  -0.10715  -0.15147  -0.17986  -0.14482   0.00000
             -120.00  -0.00000  -0.04981  -0.24977  -0.32424  -0.33991  -0.32068  -0.28322  -0.22909  -0.16108  -0.09676  -0.03703  -0.00000   0.03703   0.09676   0.16108   0.22909   0.28322   0.32068   0.33991   0.32424   0.24977   0.04981   0.00000
              -70.00   0.00000  -0.07885  -0.31498  -0.39837  -0.41161  -0.38630  -0.33945  -0.27261  -0.18838  -0.10971  -0.04710  -0.00000   0.04710   0.10971   0.18838   0.27261   0.33945   0.38630   0.41161   0.39837   0.31498   0.07885  -0.00000
              -46.00   0.00000   0.02286  -0.07158  -0.11639  -0.13071  -0.12200  -0.10139  -0.06559  -0.01933  -0.01347  -0.00684  -0.00000   0.00684   0.01347   0.01933   0.06559   0.10139   0.12200   0.13071   0.11639   0.07158  -0.02286  -0.00000
              -32.00   0.00000   0.08661   0.07736   0.05332   0.04532   0.04999   0.08107   0.05539   0.03383   0.01933   0.00945  -0.00000  -0.00945  -0.01933  -0.03383  -0.05539  -0.08107  -0.04999  -0.04532  -0.05332  -0.07736  -0.08661  -0.00000
              -22.00   0.00000   0.12750   0.16351   0.15409   0.14780   0.17740   0.14588   0.10856   0.07114   0.04198   0.02076  -0.00000  -0.02076  -0.04198  -0.07114  -0.10856  -0.14588  -0.17740  -0.14780  -0.15409  -0.16351  -0.12750  -0.00000
              -17.00   0.00000   0.14714   0.21158   0.19825   0.19114   0.21017   0.17249   0.12904   0.08489   0.05018   0.02483  -0.00000  -0.02483  -0.05018  -0.08489  -0.12904  -0.17249  -0.21017  -0.19114  -0.19825  -0.21158  -0.14714  -0.00000
              -13.00   0.00000   0.16403   0.23489   0.22099   0.21814   0.22647   0.18512   0.13859   0.09116   0.05384   0.02661  -0.00000  -0.02661  -0.05384  -0.09116  -0.13859  -0.18512  -0.22647  -0.21814  -0.22099  -0.23489  -0.16403  -0.00000
               -9.00   0.00000   0.17862   0.24589   0.23582   0.24238   0.23466   0.19116   0.14287   0.09372   0.05518   0.02720  -0.00000  -0.02720  -0.05518  -0.09372  -0.14287  -0.19116  -0.23466  -0.24238  -0.23582  -0.24589  -0.17862  -0.00000
               -5.00   0.00000   0.18476   0.25223   0.24211   0.24787   0.23491   0.19065   0.14191   0.09253   0.05413   0.02653  -0.00000  -0.02653  -0.05413  -0.09253  -0.14191  -0.19065  -0.23491  -0.24787  -0.24211  -0.25223  -0.18476  -0.00000
               -1.00   0.00000   0.18585   0.25346   0.24007   0.24358   0.22755   0.18416   0.13649   0.08836   0.05116   0.02474  -0.00000  -0.02474  -0.05116  -0.08836  -0.13649  -0.18416  -0.22755  -0.24358  -0.24007  -0.25346  -0.18585  -0.00000
                3.00   0.00000   0.18479   0.24666   0.22773   0.23091   0.21365   0.17316   0.12863   0.08368   0.04887   0.02394  -0.00000  -0.02394  -0.04887  -0.08368  -0.12863  -0.17316  -0.21365  -0.23091  -0.22773  -0.24666  -0.18479  -0.00000
                7.00   0.00000   0.17522   0.23770   0.21155   0.21397   0.19434   0.15734   0.11691   0.07621   0.04465   0.02193  -0.00000  -0.02193  -0.04465  -0.07621  -0.11691  -0.15734  -0.19434  -0.21397  -0.21155  -0.23770  -0.17522  -0.00000
               11.00   0.00000   0.16011   0.22442   0.19004   0.18926   0.16805   0.13502   0.09980   0.06480   0.03788   0.01859  -0.00000  -0.01859  -0.03788  -0.06480  -0.09980  -0.13502  -0.16805  -0.18926  -0.19004  -0.22442  -0.16011  -0.00000
               15.00   0.00000   0.14633   0.20140   0.16377   0.15804   0.13519   0.10649   0.07770   0.04986   0.02894   0.01416  -0.00000  -0.01416  -0.02894  -0.04986  -0.07770  -0.10649  -0.13519  -0.15804  -0.16377  -0.20140  -0.14633  -0.00000
               19.00   0.00000   0.13084   0.16892   0.13981   0.12120   0.09767   0.07284   0.05133   0.03186   0.01808   0.00878  -0.00000  -0.00878  -0.01808  -0.03186  -0.05133  -0.07284  -0.09767  -0.12120  -0.13981  -0.16892  -0.13084  -0.00000
               23.00   0.00000   0.11548   0.14267   0.11354   0.07684   0.08464   0.06211   0.03836   0.02151   0.01165   0.00578  -0.00000  -0.00578  -0.01165  -0.02151  -0.03836  -0.06211  -0.08464  -0.07684  -0.11354  -0.14267  -0.11548  -0.00000
               27.00   0.00000   0.10185   0.11089   0.08355   0.05382   0.06353   0.05114   0.03897   0.02662   0.01586   0.00811  -0.00000  -0.00811  -0.01586  -0.02662  -0.03897  -0.05114  -0.06353  -0.05382  -0.08355  -0.11089  -0.10185  -0.00000
               32.00   0.00000   0.08234   0.06627   0.03710   0.01692   0.04120   0.02643   0.01245   0.00443   0.00092  -0.00104  -0.00000   0.00104  -0.00092  -0.00443  -0.01245  -0.02643  -0.04120  -0.01692  -0.03710  -0.06627  -0.08234  -0.00000
               46.00   0.00000   0.01854  -0.08379  -0.13100  -0.14487  -0.13413  -0.10987  -0.05272  -0.03868  -0.02481  -0.01182  -0.00000   0.01182   0.02481   0.03868   0.05272   0.10987   0.13413   0.14487   0.13100   0.08379  -0.01854  -0.00000
               70.00   0.00000  -0.08162  -0.32282  -0.40771  -0.42088  -0.39488  -0.34691  -0.27857  -0.19253  -0.11227  -0.04839  -0.00000   0.04839   0.11227   0.19253   0.27857   0.34691   0.39488   0.42088   0.40771   0.32282   0.08162  -0.00000
              120.00  -0.00000  -0.04607  -0.23919  -0.31166  -0.32742  -0.30912  -0.27317  -0.22105  -0.15548  -0.09332  -0.03529  -0.00000   0.03529   0.09332   0.15548   0.22105   0.27317   0.30912   0.32742   0.31166   0.23919   0.04607   0.00000
              180.00  -0.00000   0.14482   0.17986   0.15147   0.10715   0.08308   0.05988   0.03897   0.05011   0.06332   0.03373  -0.00000  -0.03373  -0.06332  -0.05011  -0.03897  -0.05988  -0.08308  -0.10715  -0.15147  -0.17986  -0.14482   0.00000
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            </tableData>
          </table>
          </product>
        </function>
        <function name="aero/coefficient/CY_aileron">
          <description>CY increment from aileron (deg), over alpha</description>
          <product>
            <property>aero/qbar-psf</property>
            <property>metrics/Sw-sqft</property>
            <property>aero/function/mach-aileron</property>
          <table>
            <independentVar lookup="row">aero/alpha-deg</independentVar>
            <independentVar lookup="column">fcs/left-aileron-pos-deg</independentVar>
            <tableData>
                        -20.00    -15.00    -10.00     -5.00      0.00      5.00     10.00     15.00     20.00
             -180.00   0.00000   0.00000   0.00000   0.00000   0.00000   0.00000   0.00000   0.00000   0.00000
             -120.00  -0.00089  -0.00076  -0.00056  -0.00030   0.00000   0.00030   0.00056   0.00076   0.00089
              -70.00   0.00027   0.00023   0.00017   0.00009   0.00000  -0.00009  -0.00017  -0.00023  -0.00027
              -46.00   0.00187   0.00164   0.00125   0.00067   0.00000  -0.00067  -0.00125  -0.00164  -0.00187
              -32.00   0.00659   0.00561   0.00420   0.00227   0.00000  -0.00227  -0.00420  -0.00561  -0.00659
              -22.00   0.00731   0.00627   0.00466   0.00248   0.00000  -0.00248  -0.00466  -0.00627  -0.00731
              -17.00   0.00869   0.00750   0.00562   0.00301   0.00000  -0.00301  -0.00562  -0.00750  -0.00869
              -13.00   0.00896   0.00774   0.00580   0.00311   0.00000  -0.00311  -0.00580  -0.00774  -0.00896
               -9.00   0.00912   0.00788   0.00591   0.00317   0.00000  -0.00317  -0.00591  -0.00788  -0.00912
               -5.00   0.00915   0.00791   0.00594   0.00318   0.00000  -0.00318  -0.00594  -0.00791  -0.00915
               -1.00   0.00903   0.00781   0.00586   0.00314   0.00000  -0.00314  -0.00586  -0.00781  -0.00903
                3.00   0.00875   0.00757   0.00569   0.00305   0.00000  -0.00305  -0.00569  -0.00757  -0.00875
                7.00   0.00823   0.00712   0.00534   0.00286   0.00000  -0.00286  -0.00534  -0.00712  -0.00823
               11.00   0.00746   0.00643   0.00481   0.00258   0.00000  -0.00258  -0.00481  -0.00643  -0.00746
               15.00   0.00649   0.00557   0.00417   0.00223   0.00000  -0.00223  -0.00417  -0.00557  -0.00649
               19.00   0.00431   0.00371   0.00277   0.00147   0.00000  -0.00147  -0.00277  -0.00371  -0.00431
               23.00  -0.02804  -0.01796  -0.01007  -0.00441   0.00000   0.00441   0.01007   0.01796   0.02804
               27.00  -0.04906  -0.04521  -0.04029  -0.02855   0.00000   0.02855   0.04029   0.04521   0.04906
               32.00  -0.00795  -0.00542  -0.00251  -0.00387   0.00000   0.00387   0.00251   0.00542   0.00795
               46.00  -0.00010   0.00004   0.00010   0.00008   0.00000  -0.00008  -0.00010  -0.00004   0.00010
               70.00   0.00032   0.00027   0.00020   0.00011   0.00000  -0.00011  -0.00020  -0.00027  -0.00032
              120.00  -0.00091  -0.00077  -0.00057  -0.00030   0.00000   0.00030   0.00057   0.00077   0.00091
              180.00   0.00000   0.00000   0.00000   0.00000   0.00000   0.00000   0.00000   0.00000   0.00000
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            </tableData>
          </table>
          </product>
        </function>
        <function name="aero/coefficient/CY_rudder">
          <description>CY increment from rudder (deg), over alpha</description>
          <product>
            <property>aero/qbar-psf</property>
            <property>metrics/Sw-sqft</property>
            <property>aero/function/mach-rudder</property>
          <table>
            <independentVar lookup="row">aero/alpha-deg</independentVar>
            <independentVar lookup="column">fcs/rudder-pos-deg</independentVar>
            <tableData>
                        -25.00    -20.00    -15.00    -10.00     -5.00      0.00      5.00     10.00     15.00     20.00     25.00
             -180.00   0.00000   0.00000   0.00000   0.00000   0.00000   0.00000   0.00000   0.00000   0.00000   0.00000   0.00000
             -120.00   0.00000   0.00000   0.00000   0.00000   0.00000   0.00000   0.00000   0.00000   0.00000   0.00000   0.00000
              -70.00  -0.01813  -0.01635  -0.01390  -0.01030  -0.00548   0.00000   0.00548   0.01030   0.01390   0.01635   0.01813
              -46.00  -0.05806  -0.05236  -0.04449  -0.03285  -0.01736   0.00000   0.01736   0.03285   0.04449   0.05236   0.05806
              -32.00  -0.05426  -0.04872  -0.04123  -0.03045  -0.01616   0.00000   0.01616   0.03045   0.04123   0.04872   0.05426
              -22.00  -0.06095  -0.05474  -0.04634  -0.03424  -0.01818   0.00000   0.01818   0.03424   0.04634   0.05474   0.06095
              -17.00  -0.06379  -0.05730  -0.04851  -0.03584  -0.01903   0.00000   0.01903   0.03584   0.04851   0.05730   0.06379
              -13.00  -0.06539  -0.05874  -0.04973  -0.03674  -0.01951   0.00000   0.01951   0.03674   0.04973   0.05874   0.06539
               -9.00  -0.06635  -0.05961  -0.05047  -0.03729  -0.01980   0.00000   0.01980   0.03729   0.05047   0.05961   0.06635
               -5.00  -0.06664  -0.05988  -0.05070  -0.03746  -0.01989   0.00000   0.01989   0.03746   0.05070   0.05988   0.06664
               -1.00  -0.06622  -0.05950  -0.05038  -0.03722  -0.01976   0.00000   0.01976   0.03722   0.05038   0.05950   0.06622
                3.00  -0.06534  -0.05872  -0.04974  -0.03676  -0.01952   0.00000   0.01952   0.03676   0.04974   0.05872   0.06534
                7.00  -0.06357  -0.05714  -0.04840  -0.03577  -0.01900   0.00000   0.01900   0.03577   0.04840   0.05714   0.06357
               11.00  -0.06122  -0.05504  -0.04662  -0.03447  -0.01831   0.00000   0.01831   0.03447   0.04662   0.05504   0.06122
               15.00  -0.05829  -0.05241  -0.04441  -0.03283  -0.01744   0.00000   0.01744   0.03283   0.04441   0.05241   0.05829
               19.00  -0.05482  -0.04931  -0.04179  -0.03090  -0.01642   0.00000   0.01642   0.03090   0.04179   0.04931   0.05482
               23.00  -0.05106  -0.04595  -0.03897  -0.02883  -0.01531   0.00000   0.01531   0.02883   0.03897   0.04595   0.05106
               27.00  -0.04703  -0.04238  -0.03598  -0.02662  -0.01415   0.00000   0.01415   0.02662   0.03598   0.04238   0.04703
               32.00  -0.03294  -0.02894  -0.02360  -0.01637  -0.00659   0.00000   0.00659   0.01637   0.02360   0.02894   0.03294
               46.00  -0.05111  -0.04619  -0.03933  -0.02878  -0.01520   0.00000   0.01520   0.02878   0.03933   0.04619   0.05111
               70.00  -0.01813  -0.01635  -0.01390  -0.01030  -0.00548   0.00000   0.00548   0.01030   0.01390   0.01635   0.01813
              120.00   0.00000   0.00000   0.00000   0.00000   0.00000   0.00000   0.00000   0.00000   0.00000   0.00000   0.00000
              180.00   0.00000   0.00000   0.00000   0.00000   0.00000   0.00000   0.00000   0.00000   0.00000   0.00000   0.00000
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            </tableData>
          </table>
          </product>
        </function>
        <function name="aero/coefficient/CYp">
          <description>CY per p (non-dimensional), over alpha</description>
          <product>
            <property>aero/qbar-psf</property>
            <property>metrics/Sw-sqft</property>
            <property>aero/bi2vel</property>
            <property>velocities/p-aero-rad_sec</property>
            <property>aero/function/mach-lift</property>
          <table>
            <independentVar lookup="row">aero/alpha-deg</independentVar>
            <tableData>
                 -180.00   -0.02636
                 -165.00   -0.11966
                 -105.00    0.01754
                  -60.00   -0.04754
                  -42.00   -0.08568
                  -30.00   -0.27764
                  -20.00    0.04019
                  -16.00    0.05429
                  -12.00    0.05862
                   -8.00    0.06214
                   -4.00    0.06364
                    0.00    0.06342
                    4.00    0.05723
                    8.00    0.03904
                   12.00    0.01048
                   16.00   -0.02155
                   20.00    0.02089
                   24.00    1.41004
                   28.00    0.47486
                   35.00    0.07940
                   50.00   -0.04542
                   80.00    0.02480
                  135.00   -0.06575
                  180.00   -0.02636
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            </tableData>
          </table>
          </product>
        </function>
        <function name="aero/coefficient/CYr">
          <description>CY per r (non-dimensional), over alpha</description>
          <product>
            <property>aero/qbar-psf</property>
            <property>metrics/Sw-sqft</property>
            <property>aero/bi2vel</property>
            <property>velocities/r-aero-rad_sec</property>
            <property>aero/function/mach-lift</property>
          <table>
            <independentVar lookup="row">aero/alpha-deg</independentVar>
            <tableData>
                 -180.00    0.65159
                 -165.00    0.62745
                 -105.00    0.16453
                  -60.00    0.41927
                  -42.00    0.41561
                  -30.00    0.48510
                  -20.00    0.34429
                  -16.00    0.34536
                  -12.00    0.34692
                   -8.00    0.34549
                   -4.00    0.34040
                    0.00    0.33173
                    4.00    0.32120
                    8.00    0.30316
                   12.00    0.27675
                   16.00    0.25323
                   20.00    0.25348
                   24.00    1.10178
                   28.00    0.43903
                   35.00    0.24454
                   50.00    0.35068
                   80.00    0.14334
                  135.00    0.48857
                  180.00    0.65159
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            </tableData>
          </table>
          </product>
        </function>
      </axis>
      <axis name="LIFT">
        <function name="aero/coefficient/CL_base">
          <description>CL over alpha and beta, ground effect, compressibility (hangar)</description>
          <product>
            <property>aero/qbar-psf</property>
            <property>metrics/Sw-sqft</property>
            <property>aero/function/CL-base</property>
            <property>aero/function/mach-lift</property>
          <table>
            <independentVar lookup="row">aero/h_b-mac-ft</independentVar>
            <tableData>
                    0.00    1.20000
                    0.10    1.08692
                    0.15    1.05730
                    0.20    1.03778
                    0.30    1.01642
                    0.40    1.00713
                    0.50    1.00310
                    0.60    1.00135
                    0.70    1.00059
                    0.80    1.00025
                    0.90    1.00011
                    1.00    1.00005
                    1.10    1.00000
            </tableData>
          </table>
          </product>
        </function>
        <function name="aero/coefficient/CL_elevator">
          <description>CL increment from elevator (deg), over alpha</description>
          <product>
            <property>aero/qbar-psf</property>
            <property>metrics/Sw-sqft</property>
            <property>aero/function/mach-elevator</property>
          <table>
            <independentVar lookup="row">aero/alpha-deg</independentVar>
            <independentVar lookup="column">fcs/elevator-pos-deg</independentVar>
            <tableData>
                        -25.00    -20.00    -15.00    -10.00     -5.00      0.00      5.00     10.00     15.00
             -180.00   0.00000   0.00000   0.00000   0.00000   0.00000   0.00000   0.00000   0.00000   0.00000
             -120.00  -0.02938  -0.02650  -0.02252  -0.01669  -0.00888   0.00000   0.00888   0.01669   0.02252
              -70.00  -0.00925  -0.00842  -0.00725  -0.00547  -0.00298   0.00000   0.00314   0.00604   0.00829
              -46.00  -0.03459  -0.03216  -0.02821  -0.02162  -0.01188   0.00000   0.01244   0.02357   0.03162
              -32.00  -0.04549  -0.04397  -0.04030  -0.03250  -0.01877   0.00000   0.02077   0.03960   0.05310
              -22.00  -0.07654  -0.07115  -0.06221  -0.04733  -0.02579   0.00000   0.02692   0.05131   0.06963
              -17.00  -0.09325  -0.08539  -0.07368  -0.05548  -0.02994   0.00000   0.03059   0.05782   0.07805
              -13.00  -0.09994  -0.09159  -0.07903  -0.05936  -0.03192   0.00000   0.03240   0.06111   0.08234
               -9.00  -0.10551  -0.09651  -0.08311  -0.06229  -0.03342   0.00000   0.03377   0.06355   0.08549
               -5.00  -0.10959  -0.10008  -0.08605  -0.06439  -0.03447   0.00000   0.03468   0.06515   0.08749
               -1.00  -0.11205  -0.10219  -0.08774  -0.06554  -0.03503   0.00000   0.03512   0.06585   0.08830
                3.00  -0.11325  -0.10312  -0.08839  -0.06591  -0.03516   0.00000   0.03510   0.06571   0.08799
                7.00  -0.11309  -0.10285  -0.08804  -0.06555  -0.03490   0.00000   0.03470   0.06482   0.08664
               11.00  -0.11123  -0.10104  -0.08637  -0.06420  -0.03411   0.00000   0.03378   0.06298   0.08404
               15.00  -0.10789  -0.09787  -0.08353  -0.06201  -0.03289   0.00000   0.03242   0.06033   0.08036
               19.00  -0.10233  -0.09287  -0.07916  -0.05861  -0.03100   0.00000   0.03039   0.05641   0.07501
               23.00  -0.09538  -0.08570  -0.07239  -0.05310  -0.02784   0.00000   0.02693   0.04986   0.06639
               27.00  -0.10445  -0.09265  -0.07697  -0.05535  -0.02850   0.00000   0.02697   0.04987   0.06688
               32.00  -0.11546  -0.10787  -0.09508  -0.07337  -0.04108   0.00000   0.06522   0.11121   0.13217
               46.00  -0.05982  -0.05502  -0.04750  -0.03554  -0.01893   0.00000   0.01861   0.03447   0.04582
               70.00  -0.01754  -0.01571  -0.01322  -0.00965  -0.00503   0.00000   0.00481   0.00888   0.01180
              120.00  -0.02450  -0.02210  -0.01878  -0.01392  -0.00740   0.00000   0.00740   0.01392   0.01878
              180.00   0.00000   0.00000   0.00000   0.00000   0.00000   0.00000   0.00000   0.00000   0.00000
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            </tableData>
          </table>
          </product>
        </function>
        <function name="aero/coefficient/CL_flap">
          <description>CL increment from flap (deg), over alpha</description>
          <product>
            <property>aero/qbar-psf</property>
            <property>metrics/Sw-sqft</property>
            <property>aero/function/mach-flap</property>
          <table>
            <independentVar lookup="row">aero/alpha-deg</independentVar>
            <independentVar lookup="column">fcs/flap-pos-deg</independentVar>
            <tableData>
                          0.00      5.00     10.00     15.00     20.00     25.00     30.00     35.00
             -180.00   0.00000   0.00000   0.00000   0.00000   0.00000   0.00000   0.00000   0.00000
             -120.00   0.00000   0.01741   0.03416   0.04937   0.06252   0.07364   0.08320   0.09178
              -70.00   0.00000   0.00960   0.01942   0.02885   0.03740   0.04494   0.05166   0.05788
              -46.00   0.00000   0.02994   0.05969   0.08698   0.11015   0.12885   0.14415   0.15713
              -32.00   0.00000   0.05074   0.10059   0.14530   0.18209   0.21062   0.23216   0.24923
              -22.00   0.00000   0.07522   0.15242   0.22531   0.28942   0.34389   0.39065   0.43254
              -17.00   0.00000   0.09065   0.17832   0.25808   0.32680   0.38454   0.43376   0.47756
              -13.00   0.00000   0.09428   0.18517   0.26766   0.33856   0.39802   0.44860   0.49353
               -9.00   0.00000   0.09671   0.18971   0.27391   0.34611   0.40652   0.45780   0.50326
               -5.00   0.00000   0.09810   0.19215   0.27704   0.34961   0.41020   0.46163   0.50724
               -1.00   0.00000   0.09795   0.19229   0.27787   0.35141   0.41305   0.46548   0.51204
                3.00   0.00000   0.09849   0.19320   0.27895   0.35249   0.41404   0.46632   0.51269
                7.00   0.00000   0.09643   0.18877   0.27201   0.34312   0.40241   0.45259   0.49693
               11.00   0.00000   0.09250   0.18077   0.26006   0.32761   0.38377   0.43104   0.47243
               15.00   0.00000   0.08721   0.16991   0.24260   0.30205   0.34899   0.38646   0.41770
               19.00   0.00000   0.07780   0.14330   0.19502   0.23417   0.26312   0.28468   0.30138
               23.00   0.00000   0.08092   0.13987   0.18255   0.21414   0.23714   0.25419   0.26683
               27.00   0.00000   0.11211   0.23378   0.34511   0.42796   0.48164   0.51456   0.53513
               32.00   0.00000   0.08026   0.17063   0.26467   0.33615   0.39894   0.45659   0.51165
               46.00   0.00000   0.03675   0.07130   0.10170   0.12698   0.14750   0.16442   0.17896
               70.00   0.00000   0.00869   0.01662   0.02345   0.02908   0.03365   0.03743   0.04071
              120.00   0.00000   0.02080   0.04081   0.05899   0.07470   0.08800   0.09943   0.10969
              180.00   0.00000   0.00000   0.00000   0.00000   0.00000   0.00000   0.00000   0.00000
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            </tableData>
          </table>
          <table>
            <independentVar lookup="row">aero/h_b-mac-ft</independentVar>
            <tableData>
                    0.00    1.20000
                    0.10    1.08692
                    0.15    1.05730
                    0.20    1.03778
                    0.30    1.01642
                    0.40    1.00713
                    0.50    1.00310
                    0.60    1.00135
                    0.70    1.00059
                    0.80    1.00025
                    0.90    1.00011
                    1.00    1.00005
                    1.10    1.00000
            </tableData>
          </table>
          </product>
        </function>
        <function name="aero/coefficient/CLq">
          <description>CL per q (non-dimensional), over alpha</description>
          <product>
            <property>aero/qbar-psf</property>
            <property>metrics/Sw-sqft</property>
            <property>aero/ci2vel</property>
            <property>velocities/q-aero-rad_sec</property>
            <property>aero/function/mach-lift</property>
          <table>
            <independentVar lookup="row">aero/alpha-deg</independentVar>
            <tableData>
                 -180.00   -3.10238
                 -165.00   -0.63197
                 -105.00   -0.86347
                  -60.00    1.24006
                  -42.00    1.33292
                  -30.00   -0.63244
                  -20.00    5.48474
                  -16.00    7.53480
                  -12.00    8.16354
                   -8.00    8.34913
                   -4.00    8.44124
                    0.00    8.51174
                    4.00    8.62188
                    8.00    8.63516
                   12.00    8.49488
                   16.00    8.31271
                   20.00    6.32020
                   24.00   -1.13760
                   28.00    0.04412
                   35.00   -0.08543
                   50.00    1.31287
                   80.00    0.61430
                  135.00   -1.69140
                  180.00   -3.10238
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            </tableData>
          </table>
          </product>
        </function>
        <function name="aero/coefficient/CLadot">
          <description>CL per alpha-dot (downwash lag at the tail)</description>
          <product>
            <property>aero/qbar-psf</property>
            <property>metrics/Sw-sqft</property>
            <property>aero/ci2vel</property>
            <property>aero/alphadot-rad_sec</property>
            <value>0.93385</value>
            <property>aero/function/mach-lift</property>
          </product>
        </function>
      </axis>
      <axis name="ROLL">
        <function name="aero/coefficient/Cl_base">
          <description>Cl over alpha and beta (hangar)</description>
          <product>
            <property>aero/qbar-psf</property>
            <property>metrics/Sw-sqft</property>
            <property>metrics/bw-ft</property>
            <property>aero/function/mach-side</property>
          <table>
            <independentVar lookup="row">aero/alpha-deg</independentVar>
            <independentVar lookup="column">aero/beta-deg</independentVar>
            <tableData>
                        -90.00    -70.00    -50.00    -40.00    -30.00    -25.00    -20.00    -15.00    -10.00     -6.00     -3.00      0.00      3.00      6.00     10.00     15.00     20.00     25.00     30.00     40.00     50.00     70.00     90.00
             -180.00   0.01817   0.00754  -0.01659  -0.01970  -0.01883  -0.01710  -0.01464  -0.01156  -0.00500   0.00072   0.00067  -0.00000  -0.00067  -0.00072   0.00500   0.01156   0.01464   0.01710   0.01883   0.01970   0.01659  -0.00754  -0.01817
             -120.00   0.01817   0.00839  -0.00120  -0.00415  -0.00538  -0.00534  -0.00487  -0.00403  -0.00287  -0.00151   0.00051  -0.00000  -0.00051   0.00151   0.00287   0.00403   0.00487   0.00534   0.00538   0.00415   0.00120  -0.00839  -0.01817
              -70.00   0.01817   0.00772  -0.00245  -0.00550  -0.00667  -0.00649  -0.00581  -0.00464  -0.00298  -0.00117   0.00030  -0.00000  -0.00030   0.00117   0.00298   0.00464   0.00581   0.00649   0.00667   0.00550   0.00245  -0.00772  -0.01817
              -46.00   0.01817   0.01081   0.00310   0.00070  -0.00007   0.00023   0.00104   0.00273   0.00510   0.00298   0.00150  -0.00000  -0.00150  -0.00298  -0.00510  -0.00273  -0.00104  -0.00023   0.00007  -0.00070  -0.00310  -0.01081  -0.01817
              -32.00   0.01817   0.01484   0.00915   0.00431  -0.01307  -0.01781  -0.01416  -0.01137  -0.00801  -0.00493  -0.00249  -0.00000   0.00249   0.00493   0.00801   0.01137   0.01416   0.01781   0.01307  -0.00431  -0.00915  -0.01484  -0.01817
              -22.00   0.01817   0.01540   0.02203  -0.00027  -0.06284  -0.06895  -0.06271  -0.04917  -0.03385  -0.02064  -0.01040  -0.00000   0.01040   0.02064   0.03385   0.04917   0.06271   0.06895   0.06284   0.00027  -0.02203  -0.01540  -0.01817
              -17.00   0.01817   0.00913   0.00000  -0.03188  -0.06363  -0.06371  -0.05507  -0.04281  -0.02929  -0.01782  -0.00896  -0.00000   0.00896   0.01782   0.02929   0.04281   0.05507   0.06371   0.06363   0.03188  -0.00000  -0.00913  -0.01817
              -13.00   0.01817   0.00295  -0.01679  -0.02754  -0.04715  -0.04663  -0.03966  -0.03082  -0.02109  -0.01283  -0.00645  -0.00000   0.00645   0.01283   0.02109   0.03082   0.03966   0.04663   0.04715   0.02754   0.01679  -0.00295  -0.01817
               -9.00   0.01817  -0.00436  -0.01621  -0.02099  -0.03018  -0.02917  -0.02441  -0.01896  -0.01297  -0.00790  -0.00397  -0.00000   0.00397   0.00790   0.01297   0.01896   0.02441   0.02917   0.03018   0.02099   0.01621   0.00436  -0.01817
               -5.00   0.01817  -0.00823  -0.01716  -0.01428  -0.01375  -0.01155  -0.00936  -0.00724  -0.00496  -0.00303  -0.00152  -0.00000   0.00152   0.00303   0.00496   0.00724   0.00936   0.01155   0.01375   0.01428   0.01716   0.00823  -0.01817
               -1.00   0.01817  -0.00835  -0.01787  -0.00809   0.00266   0.00617   0.00556   0.00436   0.00298   0.00180   0.00090  -0.00000  -0.00090  -0.00180  -0.00298  -0.00436  -0.00556  -0.00617  -0.00266   0.00809   0.01787   0.00835  -0.01817
                3.00   0.01817  -0.00826  -0.01712  -0.00061   0.01883   0.02377   0.02043   0.01594   0.01090   0.00662   0.00333  -0.00000  -0.00333  -0.00662  -0.01090  -0.01594  -0.02043  -0.02377  -0.01883   0.00061   0.01712   0.00826  -0.01817
                7.00   0.01817  -0.00250  -0.01676   0.00611   0.03483   0.04110   0.03531   0.02751   0.01885   0.01145   0.00575  -0.00000  -0.00575  -0.01145  -0.01885  -0.02751  -0.03531  -0.04110  -0.03483  -0.00611   0.01676   0.00250  -0.01817
               11.00   0.01817   0.00622  -0.01616   0.01151   0.05053   0.05814   0.05025   0.03914   0.02676   0.01626   0.00817  -0.00000  -0.00817  -0.01626  -0.02676  -0.03914  -0.05025  -0.05814  -0.05053  -0.01151   0.01616  -0.00622  -0.01817
               15.00   0.01817   0.01240   0.00695   0.01641   0.06585   0.07483   0.06539   0.05084   0.03473   0.02109   0.01059  -0.00000  -0.01059  -0.02109  -0.03473  -0.05084  -0.06539  -0.07483  -0.06585  -0.01641  -0.00695  -0.01240  -0.01817
               19.00   0.01817   0.01759   0.03105   0.04304   0.08469   0.09360   0.08330   0.06471   0.04430   0.02694   0.01354  -0.00000  -0.01354  -0.02694  -0.04430  -0.06471  -0.08330  -0.09360  -0.08469  -0.04304  -0.03105  -0.01759  -0.01817
               23.00   0.01817   0.02126   0.02013   0.04590   0.09698   0.10710   0.09728   0.07428   0.05034   0.03051   0.01534  -0.00000  -0.01534  -0.03051  -0.05034  -0.07428  -0.09728  -0.10710  -0.09698  -0.04590  -0.02013  -0.02126  -0.01817
               27.00   0.01817   0.01795   0.01274   0.02086   0.06043   0.07150   0.06923   0.05531   0.03840   0.02310   0.01144  -0.00000  -0.01144  -0.02310  -0.03840  -0.05531  -0.06923  -0.07150  -0.06043  -0.02086  -0.01274  -0.01795  -0.01817
               32.00   0.01817   0.01455   0.00904   0.00979   0.02431   0.03203   0.03226   0.02514   0.01716   0.01040   0.00517  -0.00000  -0.00517  -0.01040  -0.01716  -0.02514  -0.03226  -0.03203  -0.02431  -0.00979  -0.00904  -0.01455  -0.01817
               46.00   0.01817   0.01077   0.00304   0.00064  -0.00005   0.00034   0.00130   0.00495   0.00371   0.00220   0.00119  -0.00000  -0.00119  -0.00220  -0.00371  -0.00495  -0.00130  -0.00034   0.00005  -0.00064  -0.00304  -0.01077  -0.01817
               70.00   0.01817   0.00769  -0.00250  -0.00555  -0.00671  -0.00653  -0.00584  -0.00466  -0.00299  -0.00118   0.00030  -0.00000  -0.00030   0.00118   0.00299   0.00466   0.00584   0.00653   0.00671   0.00555   0.00250  -0.00769  -0.01817
              120.00   0.01817   0.00844  -0.00113  -0.00407  -0.00532  -0.00528  -0.00482  -0.00399  -0.00285  -0.00150   0.00051  -0.00000  -0.00051   0.00150   0.00285   0.00399   0.00482   0.00528   0.00532   0.00407   0.00113  -0.00844  -0.01817
              180.00   0.01817   0.00754  -0.01659  -0.01970  -0.01883  -0.01710  -0.01464  -0.01156  -0.00500   0.00072   0.00067  -0.00000  -0.00067  -0.00072   0.00500   0.01156   0.01464   0.01710   0.01883   0.01970   0.01659  -0.00754  -0.01817
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            </tableData>
          </table>
          </product>
        </function>
        <function name="aero/coefficient/Cl_aileron">
          <description>Cl increment from aileron (deg), over alpha</description>
          <product>
            <property>aero/qbar-psf</property>
            <property>metrics/Sw-sqft</property>
            <property>metrics/bw-ft</property>
            <property>aero/function/mach-aileron</property>
          <table>
            <independentVar lookup="row">aero/alpha-deg</independentVar>
            <independentVar lookup="column">fcs/left-aileron-pos-deg</independentVar>
            <tableData>
                        -20.00    -15.00    -10.00     -5.00      0.00      5.00     10.00     15.00     20.00
             -180.00   0.00000   0.00000   0.00000   0.00000   0.00000   0.00000   0.00000   0.00000   0.00000
              -35.00  -0.01366  -0.01247  -0.00976  -0.00537   0.00000   0.00537   0.00976   0.01247   0.01366
              -11.00  -0.04158  -0.03558  -0.02651  -0.01414   0.00000   0.01414   0.02651   0.03558   0.04158
                4.00  -0.04335  -0.03713  -0.02768  -0.01477   0.00000   0.01477   0.02768   0.03713   0.04335
               19.00  -0.04680  -0.03952  -0.02899  -0.01523   0.00000   0.01523   0.02899   0.03952   0.04680
               42.00  -0.01548  -0.01385  -0.01067  -0.00580   0.00000   0.00580   0.01067   0.01385   0.01548
              180.00   0.00000   0.00000   0.00000   0.00000   0.00000   0.00000   0.00000   0.00000   0.00000
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            </tableData>
          </table>
          </product>
        </function>
        <function name="aero/coefficient/Cl_rudder">
          <description>Cl increment from rudder (deg), over alpha</description>
          <product>
            <property>aero/qbar-psf</property>
            <property>metrics/Sw-sqft</property>
            <property>metrics/bw-ft</property>
            <property>aero/function/mach-rudder</property>
          <table>
            <independentVar lookup="row">aero/alpha-deg</independentVar>
            <independentVar lookup="column">fcs/rudder-pos-deg</independentVar>
            <tableData>
                        -25.00    -20.00    -15.00    -10.00     -5.00      0.00      5.00     10.00     15.00     20.00     25.00
             -180.00   0.00000   0.00000   0.00000   0.00000   0.00000   0.00000   0.00000   0.00000   0.00000   0.00000   0.00000
              -35.00  -0.00631  -0.00565  -0.00477  -0.00352  -0.00186   0.00000   0.00186   0.00352   0.00477   0.00565   0.00631
              -11.00  -0.00741  -0.00662  -0.00558  -0.00411  -0.00218   0.00000   0.00218   0.00411   0.00558   0.00662   0.00741
                4.00  -0.00720  -0.00644  -0.00543  -0.00400  -0.00212   0.00000   0.00212   0.00400   0.00543   0.00644   0.00720
               19.00  -0.00591  -0.00529  -0.00446  -0.00329  -0.00174   0.00000   0.00174   0.00329   0.00446   0.00529   0.00591
               42.00  -0.00538  -0.00485  -0.00411  -0.00299  -0.00158   0.00000   0.00158   0.00299   0.00411   0.00485   0.00538
              180.00   0.00000   0.00000   0.00000   0.00000   0.00000   0.00000   0.00000   0.00000   0.00000   0.00000   0.00000
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            </tableData>
          </table>
          </product>
        </function>
        <function name="aero/coefficient/Clp">
          <description>Cl per p (non-dimensional), over alpha</description>
          <product>
            <property>aero/qbar-psf</property>
            <property>metrics/Sw-sqft</property>
            <property>metrics/bw-ft</property>
            <property>aero/bi2vel</property>
            <property>velocities/p-aero-rad_sec</property>
            <property>aero/function/mach-lift</property>
          <table>
            <independentVar lookup="row">aero/alpha-deg</independentVar>
            <tableData>
                 -180.00   -0.69020
                 -165.00   -0.17840
                  -32.00   -0.10044
                  -10.00   -0.39963
                    5.00   -0.41251
                   20.00   -0.17392
                   46.00   -0.19062
                  180.00   -0.69020
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            </tableData>
          </table>
          </product>
        </function>
        <function name="aero/coefficient/Clr">
          <description>Cl per r (non-dimensional), over alpha</description>
          <product>
            <property>aero/qbar-psf</property>
            <property>metrics/Sw-sqft</property>
            <property>metrics/bw-ft</property>
            <property>aero/bi2vel</property>
            <property>velocities/r-aero-rad_sec</property>
            <property>aero/function/mach-lift</property>
          <table>
            <independentVar lookup="row">aero/alpha-deg</independentVar>
            <tableData>
                 -180.00    0.06856
                 -165.00    0.10906
                  -32.00   -0.21646
                  -10.00   -0.05190
                    5.00    0.12363
                   20.00    0.39584
                   46.00    0.21896
                  180.00    0.06856
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            </tableData>
          </table>
          </product>
        </function>
      </axis>
      <axis name="PITCH">
        <function name="aero/coefficient/Cm_base">
          <description>Cm over alpha and beta (hangar)</description>
          <product>
            <property>aero/qbar-psf</property>
            <property>metrics/Sw-sqft</property>
            <property>metrics/cbarw-ft</property>
          <table>
            <independentVar lookup="row">aero/alpha-deg</independentVar>
            <independentVar lookup="column">aero/beta-deg</independentVar>
            <tableData>
                        -90.00    -70.00    -50.00    -40.00    -30.00    -25.00    -20.00    -15.00    -10.00     -6.00     -3.00      0.00      3.00      6.00     10.00     15.00     20.00     25.00     30.00     40.00     50.00     70.00     90.00
             -180.00  -0.00000  -0.01146  -0.03017  -0.04201  -0.05340  -0.05842  -0.06277  -0.06630  -0.06417  -0.06601  -0.06989  -0.07131  -0.06989  -0.06601  -0.06417  -0.06630  -0.06277  -0.05842  -0.05340  -0.04201  -0.03017  -0.01146  -0.00000
              -35.00  -0.00000   0.06750   0.20886   0.26935   0.30026   0.30735   0.31935   0.30824   0.30217   0.29799   0.29595   0.29522   0.29595   0.29799   0.30217   0.30824   0.31935   0.30735   0.30026   0.26935   0.20886   0.06750  -0.00000
              -11.00  -0.00000   0.07512   0.24150   0.22693   0.21339   0.21705   0.24095   0.26023   0.27360   0.28000   0.28236   0.28299   0.28236   0.28000   0.27360   0.26023   0.24095   0.21705   0.21339   0.22693   0.24150   0.07512  -0.00000
                4.00  -0.00000  -0.02133  -0.04280  -0.01637  -0.00451  -0.00489   0.00089   0.00616   0.01027   0.01274   0.01395   0.01436   0.01395   0.01274   0.01027   0.00616   0.00089  -0.00489  -0.00451  -0.01637  -0.04280  -0.02133  -0.00000
               19.00  -0.00000  -0.06817  -0.25852  -0.28774  -0.19599  -0.19156  -0.21057  -0.22817  -0.24100  -0.24735  -0.25006  -0.25078  -0.25006  -0.24735  -0.24100  -0.22817  -0.21057  -0.19156  -0.19599  -0.28774  -0.25852  -0.06817  -0.00000
               42.00  -0.00000  -0.08264  -0.25706  -0.34710  -0.40386  -0.41895  -0.43065  -0.42761  -0.41953  -0.41483  -0.41246  -0.41142  -0.41246  -0.41483  -0.41953  -0.42761  -0.43065  -0.41895  -0.40386  -0.34710  -0.25706  -0.08264  -0.00000
              180.00  -0.00000  -0.01146  -0.03017  -0.04201  -0.05340  -0.05842  -0.06277  -0.06630  -0.06417  -0.06601  -0.06989  -0.07131  -0.06989  -0.06601  -0.06417  -0.06630  -0.06277  -0.05842  -0.05340  -0.04201  -0.03017  -0.01146  -0.00000
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            </tableData>
          </table>
          </product>
        </function>
        <function name="aero/coefficient/Cm_mach">
          <description>Cm from the neutral point's move with Mach</description>
          <product>
            <property>aero/qbar-psf</property>
            <property>metrics/Sw-sqft</property>
            <property>metrics/cbarw-ft</property>
            <property>aero/function/CL-base</property>
            <property>aero/function/mach-dCm-dCL</property>
          </product>
        </function>
        <function name="aero/coefficient/Cm_elevator">
          <description>Cm increment from elevator (deg), over alpha</description>
          <product>
            <property>aero/qbar-psf</property>
            <property>metrics/Sw-sqft</property>
            <property>metrics/cbarw-ft</property>
            <property>aero/function/mach-elevator</property>
          <table>
            <independentVar lookup="row">aero/alpha-deg</independentVar>
            <independentVar lookup="column">fcs/elevator-pos-deg</independentVar>
            <tableData>
                        -25.00    -20.00    -15.00    -10.00     -5.00      0.00      5.00     10.00     15.00
             -180.00  -0.00197  -0.00129  -0.00074  -0.00033  -0.00008   0.00000  -0.00008  -0.00033  -0.00074
              -35.00   0.08377   0.07970   0.07177   0.05642   0.03138   0.00000  -0.03115  -0.05508  -0.06698
              -11.00   0.30593   0.27771   0.23748   0.17686   0.09434   0.00000  -0.09436  -0.17685  -0.23709
                4.00   0.33112   0.30044   0.25667   0.19084   0.10156   0.00000  -0.10110  -0.18914  -0.25334
               19.00   0.29383   0.26717   0.22813   0.16932   0.08984   0.00000  -0.08882  -0.16569  -0.22157
               42.00   0.11977   0.11849   0.10904   0.08631   0.04830   0.00000  -0.05128  -0.09764  -0.13245
              180.00  -0.00197  -0.00129  -0.00074  -0.00033  -0.00008   0.00000  -0.00008  -0.00033  -0.00074
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            </tableData>
          </table>
          </product>
        </function>
        <function name="aero/coefficient/Cm_flap">
          <description>Cm increment from flap (deg), over alpha</description>
          <product>
            <property>aero/qbar-psf</property>
            <property>metrics/Sw-sqft</property>
            <property>metrics/cbarw-ft</property>
            <property>aero/function/mach-flap</property>
          <table>
            <independentVar lookup="row">aero/alpha-deg</independentVar>
            <independentVar lookup="column">fcs/flap-pos-deg</independentVar>
            <tableData>
                          0.00      5.00     10.00     15.00     20.00     25.00     30.00     35.00
             -180.00   0.00000   0.00000   0.00001   0.00001   0.00002   0.00003   0.00005   0.00006
              -35.00   0.00000   0.00001  -0.00066  -0.00209  -0.00407  -0.00618  -0.00796  -0.00989
              -11.00   0.00000  -0.00280  -0.00580  -0.00912  -0.01278  -0.01674  -0.02093  -0.02528
                4.00   0.00000  -0.00520  -0.01096  -0.01731  -0.02414  -0.03132  -0.03875  -0.04638
               19.00   0.00000   0.00075   0.00327   0.00668   0.00994   0.01195   0.01250   0.01184
               42.00   0.00000   0.00055   0.00182   0.00362   0.00570   0.00790   0.01011   0.01232
              180.00   0.00000   0.00000   0.00001   0.00001   0.00002   0.00003   0.00005   0.00006
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            </tableData>
          </table>
          </product>
        </function>
        <function name="aero/coefficient/Cmq">
          <description>Cm per q (non-dimensional), over alpha</description>
          <product>
            <property>aero/qbar-psf</property>
            <property>metrics/Sw-sqft</property>
            <property>metrics/cbarw-ft</property>
            <property>aero/ci2vel</property>
            <property>velocities/q-aero-rad_sec</property>
            <property>aero/function/mach-lift</property>
          <table>
            <independentVar lookup="row">aero/alpha-deg</independentVar>
            <tableData>
                 -180.00  -11.75859
                 -165.00   -3.09261
                  -32.00   -4.21482
                  -10.00  -14.80175
                    5.00  -15.90072
                   20.00  -13.16032
                   46.00   -8.96857
                  180.00  -11.75859
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            </tableData>
          </table>
          </product>
        </function>
        <function name="aero/coefficient/Cmadot">
          <description>Cm per alpha-dot (downwash lag at the tail)</description>
          <product>
            <property>aero/qbar-psf</property>
            <property>metrics/Sw-sqft</property>
            <property>metrics/cbarw-ft</property>
            <property>aero/ci2vel</property>
            <property>aero/alphadot-rad_sec</property>
            <value>-2.64954</value>
            <property>aero/function/mach-lift</property>
          </product>
        </function>
        <function name="aero/coefficient/Cm_gear">
          <description>the gear's drag's pitching moment, -2.54 m from the reference point's height</description>
          <product>
            <property>aero/qbar-psf</property>
            <property>metrics/Sw-sqft</property>
            <property>metrics/cbarw-ft</property>
            <value>-0.00326415</value>
            <property>gear/gear-pos-norm</property>
          </product>
        </function>
      </axis>
      <axis name="YAW">
        <function name="aero/coefficient/Cn_base">
          <description>Cn over alpha and beta (hangar)</description>
          <product>
            <property>aero/qbar-psf</property>
            <property>metrics/Sw-sqft</property>
            <property>metrics/bw-ft</property>
            <property>aero/function/mach-side</property>
          <table>
            <independentVar lookup="row">aero/alpha-deg</independentVar>
            <independentVar lookup="column">aero/beta-deg</independentVar>
            <tableData>
                        -90.00    -70.00    -50.00    -40.00    -30.00    -25.00    -20.00    -15.00    -10.00     -6.00     -3.00      0.00      3.00      6.00     10.00     15.00     20.00     25.00     30.00     40.00     50.00     70.00     90.00
             -180.00  -0.08962  -0.09662  -0.08841  -0.07715  -0.06167  -0.05260  -0.04282  -0.03249  -0.03568  -0.03920  -0.02113  -0.00000   0.02113   0.03920   0.03568   0.03249   0.04282   0.05260   0.06167   0.07715   0.08841   0.09662   0.08962
              -35.00  -0.08962  -0.07192  -0.04793  -0.03548  -0.02602  -0.02471  -0.04028  -0.02998  -0.01866  -0.01078  -0.00533  -0.00000   0.00533   0.01078   0.01866   0.02998   0.04028   0.02471   0.02602   0.03548   0.04793   0.07192   0.08962
              -11.00  -0.08962  -0.06622  -0.04001  -0.03347  -0.04030  -0.04332  -0.03591  -0.02701  -0.01776  -0.01043  -0.00512  -0.00000   0.00512   0.01043   0.01776   0.02701   0.03591   0.04332   0.04030   0.03347   0.04001   0.06622   0.08962
                4.00  -0.08962  -0.07540  -0.04946  -0.03731  -0.04936  -0.04981  -0.04305  -0.03334  -0.02264  -0.01365  -0.00682  -0.00000   0.00682   0.01365   0.02264   0.03334   0.04305   0.04981   0.04936   0.03731   0.04946   0.07540   0.08962
               19.00  -0.08962  -0.07251  -0.04547  -0.03734  -0.04115  -0.03693  -0.03082  -0.02310  -0.01551  -0.00927  -0.00460  -0.00000   0.00460   0.00927   0.01551   0.02310   0.03082   0.03693   0.04115   0.03734   0.04547   0.07251   0.08962
               42.00  -0.08962  -0.07239  -0.04775  -0.03516  -0.02537  -0.02321  -0.02628  -0.02712  -0.01689  -0.00986  -0.00514  -0.00000   0.00514   0.00986   0.01689   0.02712   0.02628   0.02321   0.02537   0.03516   0.04775   0.07239   0.08962
              180.00  -0.08962  -0.09662  -0.08841  -0.07715  -0.06167  -0.05260  -0.04282  -0.03249  -0.03568  -0.03920  -0.02113  -0.00000   0.02113   0.03920   0.03568   0.03249   0.04282   0.05260   0.06167   0.07715   0.08841   0.09662   0.08962
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            </tableData>
          </table>
          </product>
        </function>
        <function name="aero/coefficient/Cn_aileron">
          <description>Cn increment from aileron (deg), over alpha</description>
          <product>
            <property>aero/qbar-psf</property>
            <property>metrics/Sw-sqft</property>
            <property>metrics/bw-ft</property>
            <property>aero/function/mach-aileron</property>
          <table>
            <independentVar lookup="row">aero/alpha-deg</independentVar>
            <independentVar lookup="column">fcs/left-aileron-pos-deg</independentVar>
            <tableData>
                        -20.00    -15.00    -10.00     -5.00      0.00      5.00     10.00     15.00     20.00
             -180.00  -0.00000  -0.00000  -0.00000  -0.00000   0.00000  -0.00000  -0.00000  -0.00000  -0.00000
              -35.00   0.02061   0.01721   0.01259   0.00666   0.00000  -0.00666  -0.01259  -0.01721  -0.02061
              -11.00   0.00145   0.00122   0.00089   0.00047   0.00000  -0.00047  -0.00089  -0.00122  -0.00145
                4.00  -0.00182  -0.00157  -0.00117  -0.00063   0.00000   0.00063   0.00117   0.00157   0.00182
               19.00  -0.00955  -0.00738  -0.00484  -0.00227   0.00000   0.00227   0.00484   0.00738   0.00955
               42.00  -0.02297  -0.01941  -0.01432  -0.00760   0.00000   0.00760   0.01432   0.01941   0.02297
              180.00  -0.00000  -0.00000  -0.00000  -0.00000   0.00000  -0.00000  -0.00000  -0.00000  -0.00000
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            </tableData>
          </table>
          </product>
        </function>
        <function name="aero/coefficient/Cn_rudder">
          <description>Cn increment from rudder (deg), over alpha</description>
          <product>
            <property>aero/qbar-psf</property>
            <property>metrics/Sw-sqft</property>
            <property>metrics/bw-ft</property>
            <property>aero/function/mach-rudder</property>
          <table>
            <independentVar lookup="row">aero/alpha-deg</independentVar>
            <independentVar lookup="column">fcs/rudder-pos-deg</independentVar>
            <tableData>
                        -25.00    -20.00    -15.00    -10.00     -5.00      0.00      5.00     10.00     15.00     20.00     25.00
             -180.00  -0.00000  -0.00000  -0.00000  -0.00000  -0.00000   0.00000  -0.00000  -0.00000  -0.00000  -0.00000  -0.00000
              -35.00   0.02496   0.02244   0.01902   0.01405   0.00745   0.00000  -0.00745  -0.01405  -0.01902  -0.02244  -0.02496
              -11.00   0.03116   0.02799   0.02369   0.01750   0.00929   0.00000  -0.00929  -0.01750  -0.02369  -0.02799  -0.03116
                4.00   0.03225   0.02898   0.02454   0.01814   0.00963   0.00000  -0.00963  -0.01814  -0.02454  -0.02898  -0.03225
               19.00   0.02697   0.02426   0.02056   0.01520   0.00807   0.00000  -0.00807  -0.01520  -0.02056  -0.02426  -0.02697
               42.00   0.02330   0.02103   0.01787   0.01307   0.00691   0.00000  -0.00691  -0.01307  -0.01787  -0.02103  -0.02330
              180.00  -0.00000  -0.00000  -0.00000  -0.00000  -0.00000   0.00000  -0.00000  -0.00000  -0.00000  -0.00000  -0.00000
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            </tableData>
          </table>
          </product>
        </function>
        <function name="aero/coefficient/Cnp">
          <description>Cn per p (non-dimensional), over alpha</description>
          <product>
            <property>aero/qbar-psf</property>
            <property>metrics/Sw-sqft</property>
            <property>metrics/bw-ft</property>
            <property>aero/bi2vel</property>
            <property>velocities/p-aero-rad_sec</property>
            <property>aero/function/mach-lift</property>
          <table>
            <independentVar lookup="row">aero/alpha-deg</independentVar>
            <tableData>
                 -180.00    0.05981
                 -165.00    0.08090
                  -32.00    0.06386
                  -10.00    0.10939
                    5.00   -0.06684
                   20.00   -0.16273
                   46.00    0.02082
                  180.00    0.05981
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            </tableData>
          </table>
          </product>
        </function>
        <function name="aero/coefficient/Cnr">
          <description>Cn per r (non-dimensional), over alpha</description>
          <product>
            <property>aero/qbar-psf</property>
            <property>metrics/Sw-sqft</property>
            <property>metrics/bw-ft</property>
            <property>aero/bi2vel</property>
            <property>velocities/r-aero-rad_sec</property>
            <property>aero/function/mach-lift</property>
          <table>
            <independentVar lookup="row">aero/alpha-deg</independentVar>
            <tableData>
                 -180.00   -0.29579
                 -165.00   -0.29765
                  -32.00   -0.13532
                  -10.00   -0.18925
                    5.00   -0.18855
                   20.00   -0.14187
                   46.00   -0.15029
                  180.00   -0.29579
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            </tableData>
          </table>
          </product>
        </function>
      </axis>
    </aerodynamics>
</fdm_config>
