<?xml version="1.0"?>
<?xml-stylesheet type="text/xsl" href="http://jsbsim.sourceforge.net/JSBSim.xsl"?>
<!-- Generated by hangar 0.1.0 from j10a.toml on 2026-10-01. Edit the design and rebuild; changes
     made here are overwritten.  -->
<fdm_config name="j10a" version="2.0" release="ALPHA"
            xmlns:xsi="http://www.w3.org/2001/XMLSchema-instance"
            xsi:noNamespaceSchemaLocation="http://jsbsim.sourceforge.net/JSBSim.xsd">
    <fileheader>
      <author>hangar</author>
      <filecreationdate>2026-10-01</filecreationdate>
      <version>0.1.0</version>
      <description>Chengdu J-10A (hangar build)</description>
      <note>Aerodynamics: vortex lattice with viscous section polars, full-envelope
        strip model, slender-body fuselage (hangar). Mass: Raymer component
        weights on the geometry. Propeller: blade-element momentum theory.</note>
      <reference refID="fsim/applicability/aerobatic" author="the design" title="Jane's: +9 g (fsim/envelope/clean/n_max)" date="n/a"/>
      <reference refID="fsim/applicability/carrier" author="the design" title="Jane's: a land-based fighter" date="n/a"/>
      <reference refID="fsim/applicability/drag_devices" author="the design" title="Jane's: airbrakes on the rear fuselage" date="n/a"/>
      <reference refID="fsim/applicability/flaps" author="the design" title="Jane's: flaperons on the delta wing's trailing edge, the canards trimming pitch" date="n/a"/>
      <reference refID="fsim/applicability/ground_contact" author="the design" title="AVIC and Jane's: tricycle wheeled gear" date="n/a"/>
      <reference refID="fsim/applicability/releasable_stores" author="the design" title="Jane's: eleven hardpoints" date="n/a"/>
      <reference refID="fsim/applicability/retractable_gear" author="the design" title="Jane's: retractable gear" date="n/a"/>
      <reference refID="fsim/applicability/vertical_flight" author="the design" title="AVIC and Jane's: a conventional take-off and landing fighter. Conventional take-off and landing: no rotors, lift fans or vectored lift to hover" date="n/a"/>
    </fileheader>
    <metrics>
      <wingarea unit="M2"> 37.3131 </wingarea>
      <wingspan unit="M"> 9.7140 </wingspan>
      <chord unit="M"> 4.7233 </chord>
      <htailarea unit="M2"> 0.0000 </htailarea>
      <htailarm unit="M"> 0.0000 </htailarm>
      <vtailarea unit="M2"> 8.1014 </vtailarea>
      <vtailarm unit="M"> 4.4122 </vtailarm>
      <location name="AERORP" unit="M">
        <x> 8.8660 </x>
        <y> 0.0000 </y>
        <z> 0.0000 </z>
      </location>
      <location name="EYEPOINT" unit="M">
        <x> 4.0000 </x>
        <y> 0.0000 </y>
        <z> 1.9500 </z>
      </location>
      <location name="VRP" unit="M">
        <x> 8.8800 </x>
        <y> 0.0000 </y>
        <z> 0.2500 </z>
      </location>
    </metrics>
    <mass_balance negated_crossproduct_inertia="false">
      <ixx unit="KG*M2"> 14375.43 </ixx>
      <iyy unit="KG*M2"> 112365.50 </iyy>
      <izz unit="KG*M2"> 112890.41 </izz>
      <ixy unit="KG*M2"> 0.058 </ixy>
      <ixz unit="KG*M2"> 2834.497 </ixz>
      <iyz unit="KG*M2"> 0.009 </iyz>
      <emptywt unit="KG"> 9750.00 </emptywt>
      <location name="CG" unit="M">
        <x> 8.8800 </x>
        <y> 0.0000 </y>
        <z> 0.2500 </z>
      </location>
      <pointmass name="pilot">
        <weight unit="KG"> 100.00 </weight>
        <location unit="M">
          <x> 4.0000 </x>
          <y> 0.0000 </y>
          <z> 1.2500 </z>
        </location>
      </pointmass>
      <pointmass name="gun ammunition">
        <weight unit="KG"> 60.00 </weight>
        <location unit="M">
          <x> 6.0000 </x>
          <y> 0.0000 </y>
          <z> -0.1000 </z>
        </location>
      </pointmass>
    </mass_balance>
    <ground_reactions>
      <contact type="BOGEY" name="Nose Gear">
        <location unit="M">
          <x> 4.7800 </x>
          <y> 0.0000 </y>
          <z> -1.7000 </z>
        </location>
        <static_friction> 0.8 </static_friction>
        <dynamic_friction> 0.5 </dynamic_friction>
        <rolling_friction> 0.02 </rolling_friction>
        <spring_coeff unit="N/M"> 147272 </spring_coeff>
        <damping_coeff unit="N/M/SEC"> 16291 </damping_coeff>
        <damping_coeff_rebound unit="N/M/SEC"> 32582 </damping_coeff_rebound>
        <max_steer unit="DEG"> 50.0 </max_steer>
        <brake_group> NONE </brake_group>
        <retractable> 1 </retractable>
      </contact>
      <contact type="BOGEY" name="Left Main Gear">
        <location unit="M">
          <x> 9.4300 </x>
          <y> -1.3350 </y>
          <z> -1.7400 </z>
        </location>
        <static_friction> 0.8 </static_friction>
        <dynamic_friction> 0.5 </dynamic_friction>
        <rolling_friction> 0.02 </rolling_friction>
        <spring_coeff unit="N/M"> 400169 </spring_coeff>
        <damping_coeff unit="N/M/SEC"> 51114 </damping_coeff>
        <damping_coeff_rebound unit="N/M/SEC"> 102229 </damping_coeff_rebound>
        <max_steer unit="DEG"> 0.0 </max_steer>
        <brake_group> LEFT </brake_group>
        <retractable> 1 </retractable>
      </contact>
      <contact type="BOGEY" name="Right Main Gear">
        <location unit="M">
          <x> 9.4300 </x>
          <y> 1.3350 </y>
          <z> -1.7400 </z>
        </location>
        <static_friction> 0.8 </static_friction>
        <dynamic_friction> 0.5 </dynamic_friction>
        <rolling_friction> 0.02 </rolling_friction>
        <spring_coeff unit="N/M"> 400169 </spring_coeff>
        <damping_coeff unit="N/M/SEC"> 51114 </damping_coeff>
        <damping_coeff_rebound unit="N/M/SEC"> 102229 </damping_coeff_rebound>
        <max_steer unit="DEG"> 0.0 </max_steer>
        <brake_group> RIGHT </brake_group>
        <retractable> 1 </retractable>
      </contact>
      <contact type="STRUCTURE" name="canopy front">
        <location unit="M">
          <x> 3.2618 </x>
          <y> 0.0000 </y>
          <z> 1.7793 </z>
        </location>
        <static_friction> 0.8 </static_friction>
        <dynamic_friction> 0.6 </dynamic_friction>
        <spring_coeff unit="N/M"> 1559215 </spring_coeff>
        <damping_coeff unit="N/M/SEC"> 51974 </damping_coeff>
        <damping_coeff_rebound unit="N/M/SEC"> 51974 </damping_coeff_rebound>
      </contact>
      <contact type="STRUCTURE" name="chute housing rear">
        <location unit="M">
          <x> 15.8000 </x>
          <y> 0.0000 </y>
          <z> 1.4700 </z>
        </location>
        <static_friction> 0.8 </static_friction>
        <dynamic_friction> 0.6 </dynamic_friction>
        <spring_coeff unit="N/M"> 1491859 </spring_coeff>
        <damping_coeff unit="N/M/SEC"> 49729 </damping_coeff>
        <damping_coeff_rebound unit="N/M/SEC"> 49729 </damping_coeff_rebound>
      </contact>
      <contact type="STRUCTURE" name="fin rear">
        <location unit="M">
          <x> 16.1100 </x>
          <y> 0.0000 </y>
          <z> 4.1300 </z>
        </location>
        <static_friction> 0.8 </static_friction>
        <dynamic_friction> 0.6 </dynamic_friction>
        <spring_coeff unit="N/M"> 591378 </spring_coeff>
        <damping_coeff unit="N/M/SEC"> 19713 </damping_coeff>
        <damping_coeff_rebound unit="N/M/SEC"> 19713 </damping_coeff_rebound>
      </contact>
      <contact type="STRUCTURE" name="intake left front">
        <location unit="M">
          <x> 3.4700 </x>
          <y> -0.3613 </y>
          <z> -0.3222 </z>
        </location>
        <static_friction> 0.8 </static_friction>
        <dynamic_friction> 0.6 </dynamic_friction>
        <spring_coeff unit="N/M"> 1169133 </spring_coeff>
        <damping_coeff unit="N/M/SEC"> 38971 </damping_coeff>
        <damping_coeff_rebound unit="N/M/SEC"> 38971 </damping_coeff_rebound>
      </contact>
      <contact type="STRUCTURE" name="intake right front">
        <location unit="M">
          <x> 3.4700 </x>
          <y> 0.3613 </y>
          <z> -0.3222 </z>
        </location>
        <static_friction> 0.8 </static_friction>
        <dynamic_friction> 0.6 </dynamic_friction>
        <spring_coeff unit="N/M"> 1169133 </spring_coeff>
        <damping_coeff unit="N/M/SEC"> 38971 </damping_coeff>
        <damping_coeff_rebound unit="N/M/SEC"> 38971 </damping_coeff_rebound>
      </contact>
      <contact type="STRUCTURE" name="probe front">
        <location unit="M">
          <x> -0.8640 </x>
          <y> 0.0000 </y>
          <z> 0.5150 </z>
        </location>
        <static_friction> 0.8 </static_friction>
        <dynamic_friction> 0.6 </dynamic_friction>
        <spring_coeff unit="N/M"> 935780 </spring_coeff>
        <damping_coeff unit="N/M/SEC"> 31193 </damping_coeff>
        <damping_coeff_rebound unit="N/M/SEC"> 31193 </damping_coeff_rebound>
      </contact>
      <contact type="STRUCTURE" name="ventral left rear">
        <location unit="M">
          <x> 14.5500 </x>
          <y> -1.4600 </y>
          <z> -0.6000 </z>
        </location>
        <static_friction> 0.8 </static_friction>
        <dynamic_friction> 0.6 </dynamic_friction>
        <spring_coeff unit="N/M"> 1484300 </spring_coeff>
        <damping_coeff unit="N/M/SEC"> 49477 </damping_coeff>
        <damping_coeff_rebound unit="N/M/SEC"> 49477 </damping_coeff_rebound>
      </contact>
      <contact type="STRUCTURE" name="ventral right rear">
        <location unit="M">
          <x> 14.5500 </x>
          <y> 1.4600 </y>
          <z> -0.6000 </z>
        </location>
        <static_friction> 0.8 </static_friction>
        <dynamic_friction> 0.6 </dynamic_friction>
        <spring_coeff unit="N/M"> 1484304 </spring_coeff>
        <damping_coeff unit="N/M/SEC"> 49477 </damping_coeff>
        <damping_coeff_rebound unit="N/M/SEC"> 49477 </damping_coeff_rebound>
      </contact>
      <contact type="STRUCTURE" name="wing left rear">
        <location unit="M">
          <x> 12.6500 </x>
          <y> -4.8570 </y>
          <z> -0.1200 </z>
        </location>
        <static_friction> 0.8 </static_friction>
        <dynamic_friction> 0.6 </dynamic_friction>
        <spring_coeff unit="N/M"> 475032 </spring_coeff>
        <damping_coeff unit="N/M/SEC"> 15834 </damping_coeff>
        <damping_coeff_rebound unit="N/M/SEC"> 15834 </damping_coeff_rebound>
      </contact>
      <contact type="STRUCTURE" name="wing right rear">
        <location unit="M">
          <x> 12.6500 </x>
          <y> 4.8570 </y>
          <z> -0.1200 </z>
        </location>
        <static_friction> 0.8 </static_friction>
        <dynamic_friction> 0.6 </dynamic_friction>
        <spring_coeff unit="N/M"> 475033 </spring_coeff>
        <damping_coeff unit="N/M/SEC"> 15834 </damping_coeff>
        <damping_coeff_rebound unit="N/M/SEC"> 15834 </damping_coeff_rebound>
      </contact>
    </ground_reactions>
    <propulsion>
      <engine file="j10a_engine0">
        <location unit="M">
          <x> 12.2000 </x>
          <y> 0.0000 </y>
          <z> 0.5500 </z>
        </location>
        <feed>0</feed>
        <feed>1</feed>
        <feed>2</feed>
        <feed>3</feed>
        <feed>4</feed>
        <thruster file="j10a_nozzle0">
          <location unit="M">
            <x> 15.5200 </x>
            <y> 0.0000 </y>
            <z> 0.5500 </z>
          </location>
          <orient unit="DEG"> <roll>0.00</roll> <pitch>0.00</pitch> <yaw>0.00</yaw> </orient>

        </thruster>
      </engine>
      <tank type="FUEL">
        <location unit="M">
          <x> 7.8000 </x>
          <y> 0.0000 </y>
          <z> 0.4000 </z>
        </location>
        <capacity unit="KG"> 1800.00 </capacity>
        <contents unit="KG"> 1800.00 </contents>
      </tank>
      <tank type="FUEL">
        <location unit="M">
          <x> 9.2000 </x>
          <y> 0.0000 </y>
          <z> 0.4000 </z>
        </location>
        <capacity unit="KG"> 1700.00 </capacity>
        <contents unit="KG"> 1700.00 </contents>
      </tank>
      <tank type="FUEL">
        <location unit="M">
          <x> 10.6000 </x>
          <y> 0.0000 </y>
          <z> 0.4000 </z>
        </location>
        <capacity unit="KG"> 650.00 </capacity>
        <contents unit="KG"> 650.00 </contents>
      </tank>
      <tank type="FUEL">
        <location unit="M">
          <x> 9.8000 </x>
          <y> -2.0000 </y>
          <z> 0.0000 </z>
        </location>
        <capacity unit="KG"> 400.00 </capacity>
        <contents unit="KG"> 400.00 </contents>
      </tank>
      <tank type="FUEL">
        <location unit="M">
          <x> 9.8000 </x>
          <y> 2.0000 </y>
          <z> 0.0000 </z>
        </location>
        <capacity unit="KG"> 400.00 </capacity>
        <contents unit="KG"> 400.00 </contents>
      </tank>
    </propulsion>
    <flight_control name="j10a">
      <!-- the aircraft's profile for the platform (docs/control-architecture.md, section 7): what
           hangar knows of it - its design, its flight tests, its identified responses -->
      <property value="1">fsim/identity/version</property>
      <property value="1">fsim/identity/provenance</property>
      <property value="2">fsim/identity/class</property>
      <property value="2">fsim/identity/family</property>
      <property value="1">fsim/effectors/version</property>
      <property value="1">fsim/effectors/provenance</property>
      <property value="1">fsim/effectors/flaps</property>
      <property value="8">fsim/effectors/flaps_transit_s</property>
      <property value="1">fsim/effectors/neutral</property>
      <property value="1">fsim/effectors/pitch</property>
      <property value="0.0">fsim/effectors/pitch_trim</property>
      <property value="1">fsim/effectors/retractable_gear</property>
      <property value="1">fsim/effectors/roll</property>
      <property value="1">fsim/effectors/speedbrake</property>
      <property value="1">fsim/effectors/speedbrake_approach</property>
      <property value="1">fsim/effectors/wheel_brakes</property>
      <property value="0.0">fsim/effectors/yaw</property>
      <property value="1">fsim/envelope/version</property>
      <property value="1">fsim/envelope/provenance</property>
      <property value="30">fsim/envelope/clean/alpha_max_deg</property>
      <property value="62.851">fsim/envelope/clean/cas_min_ms</property>
      <property value="9">fsim/envelope/clean/n_max</property>
      <property value="-3">fsim/envelope/clean/n_min</property>
      <property value="270">fsim/envelope/clean/roll_rate_max_deg_s</property>
      <property value="15.43">fsim/envelope/crosswind_max_ms</property>
      <property value="10.84">fsim/envelope/ground_pitch_max_deg</property>
      <property value="4.28">fsim/envelope/ground_turn_radius_m</property>
      <property value="0.3592">fsim/envelope/ground_yaw_accel_rad_s2</property>
      <property value="1">fsim/envelope/law_alpha</property>
      <property value="1">fsim/envelope/law_load_factor</property>
      <property value="1">fsim/envelope/law_roll_rate</property>
      <property value="1">fsim/propulsion/version</property>
      <property value="1">fsim/propulsion/provenance</property>
      <property value="1">fsim/propulsion/afterburner</property>
      <property value="1">fsim/propulsion/engines</property>
      <property value="0.178957">fsim/propulsion/spool_s</property>
      <property value="2">fsim/propulsion/type</property>
      <property value="1">fsim/plant/version</property>
      <property value="1">fsim/plant/provenance</property>
      <property value="-0.674033">fsim/plant/alpha_zero_lift_deg</property>
      <property value="3000">fsim/plant/altitude_m</property>
      <property value="136.834">fsim/plant/eas_ms</property>
      <property value="0.0">fsim/plant/elevator_trim</property>
      <property value="0.0">fsim/plant/elevator_trim_lift</property>
      <property value="10.9738">fsim/plant/pitch/gain</property>
      <property value="1.04688">fsim/plant/pitch/tau_s</property>
      <property value="5.09729">fsim/plant/roll/gain</property>
      <property value="0.221585">fsim/plant/roll/tau_s</property>
      <property value="5.3742">fsim/plant/speed/gain</property>
      <property value="0.178957">fsim/plant/speed/tau_s</property>
      <property value="156.666">fsim/plant/tas_ms</property>
      <property value="0.337574">fsim/plant/throttle_trim</property>
      <property value="0.157497">fsim/plant/yaw/gain</property>
      <property value="1">fsim/performance/version</property>
      <property value="1">fsim/performance/provenance</property>
      <property value="18074.3">fsim/performance/ceiling_m</property>
      <property value="257.534">fsim/performance/climb_ms</property>
      <property value="489.527">fsim/performance/max_tas_ms</property>
      <property value="1">fsim/applicability/version</property>
      <property value="1">fsim/applicability/provenance</property>
      <property value="1">fsim/applicability/aerobatic</property>
      <property value="1">fsim/applicability/carrier</property>
      <property value="2">fsim/applicability/drag_devices</property>
      <property value="1">fsim/applicability/flaps</property>
      <property value="1">fsim/applicability/ground_contact</property>
      <property value="2">fsim/applicability/releasable_stores</property>
      <property value="1">fsim/applicability/retractable_gear</property>
      <property value="0.0">fsim/applicability/vertical_flight</property>
      <property value="1">fsim/tables/version</property>
      <property value="1">fsim/tables/provenance</property>
      <property value="100">fsim/tables/altitude_m/h0</property>
      <property value="3610">fsim/tables/altitude_m/h1</property>
      <property value="7230">fsim/tables/altitude_m/h2</property>
      <property value="10840">fsim/tables/altitude_m/h3</property>
      <property value="13560">fsim/tables/altitude_m/h4</property>
      <property value="15360">fsim/tables/altitude_m/h5</property>
      <property value="17170">fsim/tables/altitude_m/h6</property>
      <property value="0.414854">fsim/tables/best_endurance_fuel_kg_s/h0/w0</property>
      <property value="0.38717">fsim/tables/best_endurance_fuel_kg_s/h0/w1</property>
      <property value="0.43811">fsim/tables/best_endurance_fuel_kg_s/h0/w2</property>
      <property value="0.295436">fsim/tables/best_endurance_fuel_kg_s/h1/w0</property>
      <property value="0.341748">fsim/tables/best_endurance_fuel_kg_s/h1/w1</property>
      <property value="0.386031">fsim/tables/best_endurance_fuel_kg_s/h1/w2</property>
      <property value="0.254241">fsim/tables/best_endurance_fuel_kg_s/h2/w0</property>
      <property value="0.29616">fsim/tables/best_endurance_fuel_kg_s/h2/w1</property>
      <property value="0.335049">fsim/tables/best_endurance_fuel_kg_s/h2/w2</property>
      <property value="0.216926">fsim/tables/best_endurance_fuel_kg_s/h3/w0</property>
      <property value="0.251549">fsim/tables/best_endurance_fuel_kg_s/h3/w1</property>
      <property value="0.288844">fsim/tables/best_endurance_fuel_kg_s/h3/w2</property>
      <property value="0.200996">fsim/tables/best_endurance_fuel_kg_s/h4/w0</property>
      <property value="0.24215">fsim/tables/best_endurance_fuel_kg_s/h4/w1</property>
      <property value="0.290037">fsim/tables/best_endurance_fuel_kg_s/h4/w2</property>
      <property value="0.199415">fsim/tables/best_endurance_fuel_kg_s/h5/w0</property>
      <property value="0.745823">fsim/tables/best_endurance_fuel_kg_s/h5/w1</property>
      <property value="0.96451">fsim/tables/best_endurance_fuel_kg_s/h5/w2</property>
      <property value="0.656848">fsim/tables/best_endurance_fuel_kg_s/h6/w0</property>
      <property value="1.04832">fsim/tables/best_endurance_fuel_kg_s/h6/w1</property>
      <property value="195.389">fsim/tables/best_endurance_tas_ms/h0/w0</property>
      <property value="144.4">fsim/tables/best_endurance_tas_ms/h0/w1</property>
      <property value="158.459">fsim/tables/best_endurance_tas_ms/h0/w2</property>
      <property value="146.809">fsim/tables/best_endurance_tas_ms/h1/w0</property>
      <property value="173.69">fsim/tables/best_endurance_tas_ms/h1/w1</property>
      <property value="188.829">fsim/tables/best_endurance_tas_ms/h1/w2</property>
      <property value="189.667">fsim/tables/best_endurance_tas_ms/h2/w0</property>
      <property value="211.08">fsim/tables/best_endurance_tas_ms/h2/w1</property>
      <property value="228.144">fsim/tables/best_endurance_tas_ms/h2/w2</property>
      <property value="235.671">fsim/tables/best_endurance_tas_ms/h3/w0</property>
      <property value="253.624">fsim/tables/best_endurance_tas_ms/h3/w1</property>
      <property value="264.865">fsim/tables/best_endurance_tas_ms/h3/w2</property>
      <property value="267.899">fsim/tables/best_endurance_tas_ms/h4/w0</property>
      <property value="279.743">fsim/tables/best_endurance_tas_ms/h4/w1</property>
      <property value="285.585">fsim/tables/best_endurance_tas_ms/h4/w2</property>
      <property value="285.405">fsim/tables/best_endurance_tas_ms/h5/w0</property>
      <property value="287.585">fsim/tables/best_endurance_tas_ms/h5/w1</property>
      <property value="299.617">fsim/tables/best_endurance_tas_ms/h5/w2</property>
      <property value="286.462">fsim/tables/best_endurance_tas_ms/h6/w0</property>
      <property value="355.716">fsim/tables/best_endurance_tas_ms/h6/w1</property>
      <property value="0.414854">fsim/tables/best_range_fuel_kg_s/h0/w0</property>
      <property value="0.481086">fsim/tables/best_range_fuel_kg_s/h0/w1</property>
      <property value="0.54629">fsim/tables/best_range_fuel_kg_s/h0/w2</property>
      <property value="0.367124">fsim/tables/best_range_fuel_kg_s/h1/w0</property>
      <property value="0.423803">fsim/tables/best_range_fuel_kg_s/h1/w1</property>
      <property value="0.475178">fsim/tables/best_range_fuel_kg_s/h1/w2</property>
      <property value="0.308951">fsim/tables/best_range_fuel_kg_s/h2/w0</property>
      <property value="0.336929">fsim/tables/best_range_fuel_kg_s/h2/w1</property>
      <property value="0.364183">fsim/tables/best_range_fuel_kg_s/h2/w2</property>
      <property value="0.230457">fsim/tables/best_range_fuel_kg_s/h3/w0</property>
      <property value="0.261769">fsim/tables/best_range_fuel_kg_s/h3/w1</property>
      <property value="0.296903">fsim/tables/best_range_fuel_kg_s/h3/w2</property>
      <property value="0.20767">fsim/tables/best_range_fuel_kg_s/h4/w0</property>
      <property value="0.248063">fsim/tables/best_range_fuel_kg_s/h4/w1</property>
      <property value="0.300463">fsim/tables/best_range_fuel_kg_s/h4/w2</property>
      <property value="0.203562">fsim/tables/best_range_fuel_kg_s/h5/w0</property>
      <property value="0.77994">fsim/tables/best_range_fuel_kg_s/h5/w1</property>
      <property value="0.96451">fsim/tables/best_range_fuel_kg_s/h5/w2</property>
      <property value="0.671172">fsim/tables/best_range_fuel_kg_s/h6/w0</property>
      <property value="1.46655">fsim/tables/best_range_fuel_kg_s/h6/w1</property>
      <property value="195.389">fsim/tables/best_range_tas_ms/h0/w0</property>
      <property value="214.814">fsim/tables/best_range_tas_ms/h0/w1</property>
      <property value="233.723">fsim/tables/best_range_tas_ms/h0/w2</property>
      <property value="233.078">fsim/tables/best_range_tas_ms/h1/w0</property>
      <property value="256.312">fsim/tables/best_range_tas_ms/h1/w1</property>
      <property value="276.14">fsim/tables/best_range_tas_ms/h1/w2</property>
      <property value="274.891">fsim/tables/best_range_tas_ms/h2/w0</property>
      <property value="282.978">fsim/tables/best_range_tas_ms/h2/w1</property>
      <property value="287.446">fsim/tables/best_range_tas_ms/h2/w2</property>
      <property value="275.491">fsim/tables/best_range_tas_ms/h3/w0</property>
      <property value="279.913">fsim/tables/best_range_tas_ms/h3/w1</property>
      <property value="284.88">fsim/tables/best_range_tas_ms/h3/w2</property>
      <property value="289.059">fsim/tables/best_range_tas_ms/h4/w0</property>
      <property value="292.912">fsim/tables/best_range_tas_ms/h4/w1</property>
      <property value="298.829">fsim/tables/best_range_tas_ms/h4/w2</property>
      <property value="295.252">fsim/tables/best_range_tas_ms/h5/w0</property>
      <property value="296.37">fsim/tables/best_range_tas_ms/h5/w1</property>
      <property value="299.617">fsim/tables/best_range_tas_ms/h5/w2</property>
      <property value="294.136">fsim/tables/best_range_tas_ms/h6/w0</property>
      <property value="542.96">fsim/tables/best_range_tas_ms/h6/w1</property>
      <property value="333.543">fsim/tables/climb_tas_ms/h0/w0</property>
      <property value="337.649">fsim/tables/climb_tas_ms/h0/w1</property>
      <property value="340.143">fsim/tables/climb_tas_ms/h0/w2</property>
      <property value="325.774">fsim/tables/climb_tas_ms/h1/w0</property>
      <property value="327.507">fsim/tables/climb_tas_ms/h1/w1</property>
      <property value="331.328">fsim/tables/climb_tas_ms/h1/w2</property>
      <property value="317.282">fsim/tables/climb_tas_ms/h2/w0</property>
      <property value="319.227">fsim/tables/climb_tas_ms/h2/w1</property>
      <property value="320.447">fsim/tables/climb_tas_ms/h2/w2</property>
      <property value="528.224">fsim/tables/climb_tas_ms/h3/w0</property>
      <property value="528.775">fsim/tables/climb_tas_ms/h3/w1</property>
      <property value="529.293">fsim/tables/climb_tas_ms/h3/w2</property>
      <property value="528.973">fsim/tables/climb_tas_ms/h4/w0</property>
      <property value="529.659">fsim/tables/climb_tas_ms/h4/w1</property>
      <property value="529.318">fsim/tables/climb_tas_ms/h4/w2</property>
      <property value="529.29">fsim/tables/climb_tas_ms/h5/w0</property>
      <property value="529.774">fsim/tables/climb_tas_ms/h5/w1</property>
      <property value="529.748">fsim/tables/climb_tas_ms/h5/w2</property>
      <property value="529.909">fsim/tables/climb_tas_ms/h6/w0</property>
      <property value="530.207">fsim/tables/climb_tas_ms/h6/w1</property>
      <property value="530.451">fsim/tables/climb_tas_ms/h6/w2</property>
      <property value="4950">fsim/tables/fuel_capacity_kg</property>
      <property value="0.414848">fsim/tables/fuel_kg_s/h0/w0/v0</property>
      <property value="0.459843">fsim/tables/fuel_kg_s/h0/w0/v1</property>
      <property value="1.85375">fsim/tables/fuel_kg_s/h0/w0/v10</property>
      <property value="2.02445">fsim/tables/fuel_kg_s/h0/w0/v11</property>
      <property value="5.81859">fsim/tables/fuel_kg_s/h0/w0/v12</property>
      <property value="6.29385">fsim/tables/fuel_kg_s/h0/w0/v13</property>
      <property value="6.78266">fsim/tables/fuel_kg_s/h0/w0/v14</property>
      <property value="7.28423">fsim/tables/fuel_kg_s/h0/w0/v15</property>
      <property value="0.507585">fsim/tables/fuel_kg_s/h0/w0/v2</property>
      <property value="0.557407">fsim/tables/fuel_kg_s/h0/w0/v3</property>
      <property value="0.609947">fsim/tables/fuel_kg_s/h0/w0/v4</property>
      <property value="0.670914">fsim/tables/fuel_kg_s/h0/w0/v5</property>
      <property value="0.734813">fsim/tables/fuel_kg_s/h0/w0/v6</property>
      <property value="0.810494">fsim/tables/fuel_kg_s/h0/w0/v7</property>
      <property value="0.94616">fsim/tables/fuel_kg_s/h0/w0/v8</property>
      <property value="1.30948">fsim/tables/fuel_kg_s/h0/w0/v9</property>
      <property value="0.387159">fsim/tables/fuel_kg_s/h0/w1/v0</property>
      <property value="0.399569">fsim/tables/fuel_kg_s/h0/w1/v1</property>
      <property value="1.37128">fsim/tables/fuel_kg_s/h0/w1/v10</property>
      <property value="1.90207">fsim/tables/fuel_kg_s/h0/w1/v11</property>
      <property value="5.5744">fsim/tables/fuel_kg_s/h0/w1/v12</property>
      <property value="6.12804">fsim/tables/fuel_kg_s/h0/w1/v13</property>
      <property value="6.70097">fsim/tables/fuel_kg_s/h0/w1/v14</property>
      <property value="7.2923">fsim/tables/fuel_kg_s/h0/w1/v15</property>
      <property value="0.43063">fsim/tables/fuel_kg_s/h0/w1/v2</property>
      <property value="0.470431">fsim/tables/fuel_kg_s/h0/w1/v3</property>
      <property value="0.524689">fsim/tables/fuel_kg_s/h0/w1/v4</property>
      <property value="0.582377">fsim/tables/fuel_kg_s/h0/w1/v5</property>
      <property value="0.643188">fsim/tables/fuel_kg_s/h0/w1/v6</property>
      <property value="0.710773">fsim/tables/fuel_kg_s/h0/w1/v7</property>
      <property value="0.787493">fsim/tables/fuel_kg_s/h0/w1/v8</property>
      <property value="0.935328">fsim/tables/fuel_kg_s/h0/w1/v9</property>
      <property value="0.44803">fsim/tables/fuel_kg_s/h0/w2/v0</property>
      <property value="0.438394">fsim/tables/fuel_kg_s/h0/w2/v1</property>
      <property value="1.29536">fsim/tables/fuel_kg_s/h0/w2/v10</property>
      <property value="1.89383">fsim/tables/fuel_kg_s/h0/w2/v11</property>
      <property value="3.62891">fsim/tables/fuel_kg_s/h0/w2/v12</property>
      <property value="6.12161">fsim/tables/fuel_kg_s/h0/w2/v13</property>
      <property value="6.70287">fsim/tables/fuel_kg_s/h0/w2/v14</property>
      <property value="7.30289">fsim/tables/fuel_kg_s/h0/w2/v15</property>
      <property value="0.455861">fsim/tables/fuel_kg_s/h0/w2/v2</property>
      <property value="0.491241">fsim/tables/fuel_kg_s/h0/w2/v3</property>
      <property value="0.533603">fsim/tables/fuel_kg_s/h0/w2/v4</property>
      <property value="0.590185">fsim/tables/fuel_kg_s/h0/w2/v5</property>
      <property value="0.650135">fsim/tables/fuel_kg_s/h0/w2/v6</property>
      <property value="0.713366">fsim/tables/fuel_kg_s/h0/w2/v7</property>
      <property value="0.784912">fsim/tables/fuel_kg_s/h0/w2/v8</property>
      <property value="0.923168">fsim/tables/fuel_kg_s/h0/w2/v9</property>
      <property value="0.295433">fsim/tables/fuel_kg_s/h1/w0/v0</property>
      <property value="0.299024">fsim/tables/fuel_kg_s/h1/w0/v1</property>
      <property value="1.35384">fsim/tables/fuel_kg_s/h1/w0/v10</property>
      <property value="4.15891">fsim/tables/fuel_kg_s/h1/w0/v11</property>
      <property value="4.60645">fsim/tables/fuel_kg_s/h1/w0/v12</property>
      <property value="5.08195">fsim/tables/fuel_kg_s/h1/w0/v13</property>
      <property value="5.57886">fsim/tables/fuel_kg_s/h1/w0/v14</property>
      <property value="6.09357">fsim/tables/fuel_kg_s/h1/w0/v15</property>
      <property value="0.319003">fsim/tables/fuel_kg_s/h1/w0/v2</property>
      <property value="0.349584">fsim/tables/fuel_kg_s/h1/w0/v3</property>
      <property value="0.389862">fsim/tables/fuel_kg_s/h1/w0/v4</property>
      <property value="0.435394">fsim/tables/fuel_kg_s/h1/w0/v5</property>
      <property value="0.486191">fsim/tables/fuel_kg_s/h1/w0/v6</property>
      <property value="0.568209">fsim/tables/fuel_kg_s/h1/w0/v7</property>
      <property value="0.810973">fsim/tables/fuel_kg_s/h1/w0/v8</property>
      <property value="1.20496">fsim/tables/fuel_kg_s/h1/w0/v9</property>
      <property value="0.359961">fsim/tables/fuel_kg_s/h1/w1/v0</property>
      <property value="0.342289">fsim/tables/fuel_kg_s/h1/w1/v1</property>
      <property value="1.35122">fsim/tables/fuel_kg_s/h1/w1/v10</property>
      <property value="4.15453">fsim/tables/fuel_kg_s/h1/w1/v11</property>
      <property value="4.60529">fsim/tables/fuel_kg_s/h1/w1/v12</property>
      <property value="5.08489">fsim/tables/fuel_kg_s/h1/w1/v13</property>
      <property value="5.58642">fsim/tables/fuel_kg_s/h1/w1/v14</property>
      <property value="6.10622">fsim/tables/fuel_kg_s/h1/w1/v15</property>
      <property value="0.34956">fsim/tables/fuel_kg_s/h1/w1/v2</property>
      <property value="0.372554">fsim/tables/fuel_kg_s/h1/w1/v3</property>
      <property value="0.403938">fsim/tables/fuel_kg_s/h1/w1/v4</property>
      <property value="0.446182">fsim/tables/fuel_kg_s/h1/w1/v5</property>
      <property value="0.495245">fsim/tables/fuel_kg_s/h1/w1/v6</property>
      <property value="0.570974">fsim/tables/fuel_kg_s/h1/w1/v7</property>
      <property value="0.766323">fsim/tables/fuel_kg_s/h1/w1/v8</property>
      <property value="1.20102">fsim/tables/fuel_kg_s/h1/w1/v9</property>
      <property value="0.433727">fsim/tables/fuel_kg_s/h1/w2/v0</property>
      <property value="0.394004">fsim/tables/fuel_kg_s/h1/w2/v1</property>
      <property value="1.35393">fsim/tables/fuel_kg_s/h1/w2/v10</property>
      <property value="4.16227">fsim/tables/fuel_kg_s/h1/w2/v11</property>
      <property value="4.61377">fsim/tables/fuel_kg_s/h1/w2/v12</property>
      <property value="5.09482">fsim/tables/fuel_kg_s/h1/w2/v13</property>
      <property value="5.59797">fsim/tables/fuel_kg_s/h1/w2/v14</property>
      <property value="6.11958">fsim/tables/fuel_kg_s/h1/w2/v15</property>
      <property value="0.386247">fsim/tables/fuel_kg_s/h1/w2/v2</property>
      <property value="0.400122">fsim/tables/fuel_kg_s/h1/w2/v3</property>
      <property value="0.428121">fsim/tables/fuel_kg_s/h1/w2/v4</property>
      <property value="0.461252">fsim/tables/fuel_kg_s/h1/w2/v5</property>
      <property value="0.507986">fsim/tables/fuel_kg_s/h1/w2/v6</property>
      <property value="0.580415">fsim/tables/fuel_kg_s/h1/w2/v7</property>
      <property value="0.754178">fsim/tables/fuel_kg_s/h1/w2/v8</property>
      <property value="1.20831">fsim/tables/fuel_kg_s/h1/w2/v9</property>
      <property value="0.280617">fsim/tables/fuel_kg_s/h2/w0/v0</property>
      <property value="0.256748">fsim/tables/fuel_kg_s/h2/w0/v1</property>
      <property value="2.94619">fsim/tables/fuel_kg_s/h2/w0/v10</property>
      <property value="3.30091">fsim/tables/fuel_kg_s/h2/w0/v11</property>
      <property value="3.67376">fsim/tables/fuel_kg_s/h2/w0/v12</property>
      <property value="4.06245">fsim/tables/fuel_kg_s/h2/w0/v13</property>
      <property value="4.46712">fsim/tables/fuel_kg_s/h2/w0/v14</property>
      <property value="4.8866">fsim/tables/fuel_kg_s/h2/w0/v15</property>
      <property value="0.258112">fsim/tables/fuel_kg_s/h2/w0/v2</property>
      <property value="0.271905">fsim/tables/fuel_kg_s/h2/w0/v3</property>
      <property value="0.294937">fsim/tables/fuel_kg_s/h2/w0/v4</property>
      <property value="0.327943">fsim/tables/fuel_kg_s/h2/w0/v5</property>
      <property value="0.40233">fsim/tables/fuel_kg_s/h2/w0/v6</property>
      <property value="0.707152">fsim/tables/fuel_kg_s/h2/w0/v7</property>
      <property value="0.805094">fsim/tables/fuel_kg_s/h2/w0/v8</property>
      <property value="0.90858">fsim/tables/fuel_kg_s/h2/w0/v9</property>
      <property value="0.352154">fsim/tables/fuel_kg_s/h2/w1/v0</property>
      <property value="0.307591">fsim/tables/fuel_kg_s/h2/w1/v1</property>
      <property value="2.98988">fsim/tables/fuel_kg_s/h2/w1/v10</property>
      <property value="3.3344">fsim/tables/fuel_kg_s/h2/w1/v11</property>
      <property value="3.69761">fsim/tables/fuel_kg_s/h2/w1/v12</property>
      <property value="4.08032">fsim/tables/fuel_kg_s/h2/w1/v13</property>
      <property value="4.48317">fsim/tables/fuel_kg_s/h2/w1/v14</property>
      <property value="4.90092">fsim/tables/fuel_kg_s/h2/w1/v15</property>
      <property value="0.296417">fsim/tables/fuel_kg_s/h2/w1/v2</property>
      <property value="0.30176">fsim/tables/fuel_kg_s/h2/w1/v3</property>
      <property value="0.318366">fsim/tables/fuel_kg_s/h2/w1/v4</property>
      <property value="0.344966">fsim/tables/fuel_kg_s/h2/w1/v5</property>
      <property value="0.416527">fsim/tables/fuel_kg_s/h2/w1/v6</property>
      <property value="0.721246">fsim/tables/fuel_kg_s/h2/w1/v7</property>
      <property value="0.819813">fsim/tables/fuel_kg_s/h2/w1/v8</property>
      <property value="0.923937">fsim/tables/fuel_kg_s/h2/w1/v9</property>
      <property value="0.426813">fsim/tables/fuel_kg_s/h2/w2/v0</property>
      <property value="0.362839">fsim/tables/fuel_kg_s/h2/w2/v1</property>
      <property value="3.04368">fsim/tables/fuel_kg_s/h2/w2/v10</property>
      <property value="3.38698">fsim/tables/fuel_kg_s/h2/w2/v11</property>
      <property value="3.74958">fsim/tables/fuel_kg_s/h2/w2/v12</property>
      <property value="4.12499">fsim/tables/fuel_kg_s/h2/w2/v13</property>
      <property value="4.51664">fsim/tables/fuel_kg_s/h2/w2/v14</property>
      <property value="4.92278">fsim/tables/fuel_kg_s/h2/w2/v15</property>
      <property value="0.337885">fsim/tables/fuel_kg_s/h2/w2/v2</property>
      <property value="0.335535">fsim/tables/fuel_kg_s/h2/w2/v3</property>
      <property value="0.344522">fsim/tables/fuel_kg_s/h2/w2/v4</property>
      <property value="0.368982">fsim/tables/fuel_kg_s/h2/w2/v5</property>
      <property value="0.437041">fsim/tables/fuel_kg_s/h2/w2/v6</property>
      <property value="0.739542">fsim/tables/fuel_kg_s/h2/w2/v7</property>
      <property value="0.838343">fsim/tables/fuel_kg_s/h2/w2/v8</property>
      <property value="2.72201">fsim/tables/fuel_kg_s/h2/w2/v9</property>
      <property value="0.274815">fsim/tables/fuel_kg_s/h3/w0/v0</property>
      <property value="0.232759">fsim/tables/fuel_kg_s/h3/w0/v1</property>
      <property value="2.32274">fsim/tables/fuel_kg_s/h3/w0/v10</property>
      <property value="2.58811">fsim/tables/fuel_kg_s/h3/w0/v11</property>
      <property value="2.8663">fsim/tables/fuel_kg_s/h3/w0/v12</property>
      <property value="3.15554">fsim/tables/fuel_kg_s/h3/w0/v13</property>
      <property value="3.45635">fsim/tables/fuel_kg_s/h3/w0/v14</property>
      <property value="3.7673">fsim/tables/fuel_kg_s/h3/w0/v15</property>
      <property value="0.218261">fsim/tables/fuel_kg_s/h3/w0/v2</property>
      <property value="0.21971">fsim/tables/fuel_kg_s/h3/w0/v3</property>
      <property value="0.235953">fsim/tables/fuel_kg_s/h3/w0/v4</property>
      <property value="0.342814">fsim/tables/fuel_kg_s/h3/w0/v5</property>
      <property value="0.462945">fsim/tables/fuel_kg_s/h3/w0/v6</property>
      <property value="0.529391">fsim/tables/fuel_kg_s/h3/w0/v7</property>
      <property value="1.82933">fsim/tables/fuel_kg_s/h3/w0/v8</property>
      <property value="2.06976">fsim/tables/fuel_kg_s/h3/w0/v9</property>
      <property value="0.347471">fsim/tables/fuel_kg_s/h3/w1/v0</property>
      <property value="0.285496">fsim/tables/fuel_kg_s/h3/w1/v1</property>
      <property value="2.38364">fsim/tables/fuel_kg_s/h3/w1/v10</property>
      <property value="2.64475">fsim/tables/fuel_kg_s/h3/w1/v11</property>
      <property value="2.91846">fsim/tables/fuel_kg_s/h3/w1/v12</property>
      <property value="3.20284">fsim/tables/fuel_kg_s/h3/w1/v13</property>
      <property value="3.49895">fsim/tables/fuel_kg_s/h3/w1/v14</property>
      <property value="3.80478">fsim/tables/fuel_kg_s/h3/w1/v15</property>
      <property value="0.259399">fsim/tables/fuel_kg_s/h3/w1/v2</property>
      <property value="0.251824">fsim/tables/fuel_kg_s/h3/w1/v3</property>
      <property value="0.266374">fsim/tables/fuel_kg_s/h3/w1/v4</property>
      <property value="0.393795">fsim/tables/fuel_kg_s/h3/w1/v5</property>
      <property value="0.490686">fsim/tables/fuel_kg_s/h3/w1/v6</property>
      <property value="0.554405">fsim/tables/fuel_kg_s/h3/w1/v7</property>
      <property value="1.89502">fsim/tables/fuel_kg_s/h3/w1/v8</property>
      <property value="2.13344">fsim/tables/fuel_kg_s/h3/w1/v9</property>
      <property value="0.42552">fsim/tables/fuel_kg_s/h3/w2/v0</property>
      <property value="0.341152">fsim/tables/fuel_kg_s/h3/w2/v1</property>
      <property value="2.4517">fsim/tables/fuel_kg_s/h3/w2/v10</property>
      <property value="2.70568">fsim/tables/fuel_kg_s/h3/w2/v11</property>
      <property value="2.97367">fsim/tables/fuel_kg_s/h3/w2/v12</property>
      <property value="3.25181">fsim/tables/fuel_kg_s/h3/w2/v13</property>
      <property value="3.54198">fsim/tables/fuel_kg_s/h3/w2/v14</property>
      <property value="3.84125">fsim/tables/fuel_kg_s/h3/w2/v15</property>
      <property value="0.302594">fsim/tables/fuel_kg_s/h3/w2/v2</property>
      <property value="0.288868">fsim/tables/fuel_kg_s/h3/w2/v3</property>
      <property value="0.300396">fsim/tables/fuel_kg_s/h3/w2/v4</property>
      <property value="0.459962">fsim/tables/fuel_kg_s/h3/w2/v5</property>
      <property value="0.521751">fsim/tables/fuel_kg_s/h3/w2/v6</property>
      <property value="1.78051">fsim/tables/fuel_kg_s/h3/w2/v7</property>
      <property value="1.99045">fsim/tables/fuel_kg_s/h3/w2/v8</property>
      <property value="2.21344">fsim/tables/fuel_kg_s/h3/w2/v9</property>
      <property value="0.299185">fsim/tables/fuel_kg_s/h4/w0/v0</property>
      <property value="0.238038">fsim/tables/fuel_kg_s/h4/w0/v1</property>
      <property value="1.66347">fsim/tables/fuel_kg_s/h4/w0/v10</property>
      <property value="1.82481">fsim/tables/fuel_kg_s/h4/w0/v11</property>
      <property value="2.00157">fsim/tables/fuel_kg_s/h4/w0/v12</property>
      <property value="2.18597">fsim/tables/fuel_kg_s/h4/w0/v13</property>
      <property value="2.37773">fsim/tables/fuel_kg_s/h4/w0/v14</property>
      <property value="2.5763">fsim/tables/fuel_kg_s/h4/w0/v15</property>
      <property value="0.210355">fsim/tables/fuel_kg_s/h4/w0/v2</property>
      <property value="0.200998">fsim/tables/fuel_kg_s/h4/w0/v3</property>
      <property value="0.210871">fsim/tables/fuel_kg_s/h4/w0/v4</property>
      <property value="0.320693">fsim/tables/fuel_kg_s/h4/w0/v5</property>
      <property value="0.356444">fsim/tables/fuel_kg_s/h4/w0/v6</property>
      <property value="1.21708">fsim/tables/fuel_kg_s/h4/w0/v7</property>
      <property value="1.35808">fsim/tables/fuel_kg_s/h4/w0/v8</property>
      <property value="1.5075">fsim/tables/fuel_kg_s/h4/w0/v9</property>
      <property value="0.300655">fsim/tables/fuel_kg_s/h4/w1/v1</property>
      <property value="1.75471">fsim/tables/fuel_kg_s/h4/w1/v10</property>
      <property value="1.90896">fsim/tables/fuel_kg_s/h4/w1/v11</property>
      <property value="2.07195">fsim/tables/fuel_kg_s/h4/w1/v12</property>
      <property value="2.24154">fsim/tables/fuel_kg_s/h4/w1/v13</property>
      <property value="2.4185">fsim/tables/fuel_kg_s/h4/w1/v14</property>
      <property value="2.59913">fsim/tables/fuel_kg_s/h4/w1/v15</property>
      <property value="0.259275">fsim/tables/fuel_kg_s/h4/w1/v2</property>
      <property value="0.242383">fsim/tables/fuel_kg_s/h4/w1/v3</property>
      <property value="0.252222">fsim/tables/fuel_kg_s/h4/w1/v4</property>
      <property value="0.983624">fsim/tables/fuel_kg_s/h4/w1/v5</property>
      <property value="1.20453">fsim/tables/fuel_kg_s/h4/w1/v6</property>
      <property value="1.32453">fsim/tables/fuel_kg_s/h4/w1/v7</property>
      <property value="1.45489">fsim/tables/fuel_kg_s/h4/w1/v8</property>
      <property value="1.60282">fsim/tables/fuel_kg_s/h4/w1/v9</property>
      <property value="1.12838">fsim/tables/fuel_kg_s/h4/w2/v1</property>
      <property value="1.84807">fsim/tables/fuel_kg_s/h4/w2/v10</property>
      <property value="1.9946">fsim/tables/fuel_kg_s/h4/w2/v11</property>
      <property value="2.1506">fsim/tables/fuel_kg_s/h4/w2/v12</property>
      <property value="2.31222">fsim/tables/fuel_kg_s/h4/w2/v13</property>
      <property value="2.48312">fsim/tables/fuel_kg_s/h4/w2/v14</property>
      <property value="2.65558">fsim/tables/fuel_kg_s/h4/w2/v15</property>
      <property value="0.315887">fsim/tables/fuel_kg_s/h4/w2/v2</property>
      <property value="0.290164">fsim/tables/fuel_kg_s/h4/w2/v3</property>
      <property value="0.309183">fsim/tables/fuel_kg_s/h4/w2/v4</property>
      <property value="1.24173">fsim/tables/fuel_kg_s/h4/w2/v5</property>
      <property value="1.33298">fsim/tables/fuel_kg_s/h4/w2/v6</property>
      <property value="1.45073">fsim/tables/fuel_kg_s/h4/w2/v7</property>
      <property value="1.57807">fsim/tables/fuel_kg_s/h4/w2/v8</property>
      <property value="1.71145">fsim/tables/fuel_kg_s/h4/w2/v9</property>
      <property value="0.774983">fsim/tables/fuel_kg_s/h5/w0/v1</property>
      <property value="1.34778">fsim/tables/fuel_kg_s/h5/w0/v10</property>
      <property value="1.45943">fsim/tables/fuel_kg_s/h5/w0/v11</property>
      <property value="1.57867">fsim/tables/fuel_kg_s/h5/w0/v12</property>
      <property value="1.70161">fsim/tables/fuel_kg_s/h5/w0/v13</property>
      <property value="1.83138">fsim/tables/fuel_kg_s/h5/w0/v14</property>
      <property value="1.96201">fsim/tables/fuel_kg_s/h5/w0/v15</property>
      <property value="0.216992">fsim/tables/fuel_kg_s/h5/w0/v2</property>
      <property value="0.200064">fsim/tables/fuel_kg_s/h5/w0/v3</property>
      <property value="0.206079">fsim/tables/fuel_kg_s/h5/w0/v4</property>
      <property value="0.879553">fsim/tables/fuel_kg_s/h5/w0/v5</property>
      <property value="0.951966">fsim/tables/fuel_kg_s/h5/w0/v6</property>
      <property value="1.04208">fsim/tables/fuel_kg_s/h5/w0/v7</property>
      <property value="1.13674">fsim/tables/fuel_kg_s/h5/w0/v8</property>
      <property value="1.23614">fsim/tables/fuel_kg_s/h5/w0/v9</property>
      <property value="1.4599">fsim/tables/fuel_kg_s/h5/w1/v10</property>
      <property value="1.55544">fsim/tables/fuel_kg_s/h5/w1/v11</property>
      <property value="1.66">fsim/tables/fuel_kg_s/h5/w1/v12</property>
      <property value="1.76944">fsim/tables/fuel_kg_s/h5/w1/v13</property>
      <property value="1.89151">fsim/tables/fuel_kg_s/h5/w1/v14</property>
      <property value="2.01421">fsim/tables/fuel_kg_s/h5/w1/v15</property>
      <property value="0.84812">fsim/tables/fuel_kg_s/h5/w1/v2</property>
      <property value="0.745911">fsim/tables/fuel_kg_s/h5/w1/v3</property>
      <property value="0.860887">fsim/tables/fuel_kg_s/h5/w1/v4</property>
      <property value="1.02483">fsim/tables/fuel_kg_s/h5/w1/v5</property>
      <property value="1.09865">fsim/tables/fuel_kg_s/h5/w1/v6</property>
      <property value="1.17447">fsim/tables/fuel_kg_s/h5/w1/v7</property>
      <property value="1.26177">fsim/tables/fuel_kg_s/h5/w1/v8</property>
      <property value="1.36014">fsim/tables/fuel_kg_s/h5/w1/v9</property>
      <property value="1.58476">fsim/tables/fuel_kg_s/h5/w2/v10</property>
      <property value="1.67224">fsim/tables/fuel_kg_s/h5/w2/v11</property>
      <property value="1.76926">fsim/tables/fuel_kg_s/h5/w2/v12</property>
      <property value="1.86781">fsim/tables/fuel_kg_s/h5/w2/v13</property>
      <property value="1.97339">fsim/tables/fuel_kg_s/h5/w2/v14</property>
      <property value="2.08073">fsim/tables/fuel_kg_s/h5/w2/v15</property>
      <property value="0.96451">fsim/tables/fuel_kg_s/h5/w2/v3</property>
      <property value="1.16962">fsim/tables/fuel_kg_s/h5/w2/v4</property>
      <property value="1.2083">fsim/tables/fuel_kg_s/h5/w2/v5</property>
      <property value="1.26992">fsim/tables/fuel_kg_s/h5/w2/v6</property>
      <property value="1.33672">fsim/tables/fuel_kg_s/h5/w2/v7</property>
      <property value="1.41397">fsim/tables/fuel_kg_s/h5/w2/v8</property>
      <property value="1.49821">fsim/tables/fuel_kg_s/h5/w2/v9</property>
      <property value="1.12358">fsim/tables/fuel_kg_s/h6/w0/v0</property>
      <property value="1.15731">fsim/tables/fuel_kg_s/h6/w0/v10</property>
      <property value="1.22786">fsim/tables/fuel_kg_s/h6/w0/v11</property>
      <property value="1.30518">fsim/tables/fuel_kg_s/h6/w0/v12</property>
      <property value="1.38324">fsim/tables/fuel_kg_s/h6/w0/v13</property>
      <property value="1.46836">fsim/tables/fuel_kg_s/h6/w0/v14</property>
      <property value="1.55173">fsim/tables/fuel_kg_s/h6/w0/v15</property>
      <property value="0.664639">fsim/tables/fuel_kg_s/h6/w0/v3</property>
      <property value="0.782394">fsim/tables/fuel_kg_s/h6/w0/v4</property>
      <property value="0.851313">fsim/tables/fuel_kg_s/h6/w0/v5</property>
      <property value="0.902047">fsim/tables/fuel_kg_s/h6/w0/v6</property>
      <property value="0.95896">fsim/tables/fuel_kg_s/h6/w0/v7</property>
      <property value="1.01822">fsim/tables/fuel_kg_s/h6/w0/v8</property>
      <property value="1.08335">fsim/tables/fuel_kg_s/h6/w0/v9</property>
      <property value="1.32224">fsim/tables/fuel_kg_s/h6/w1/v10</property>
      <property value="1.37428">fsim/tables/fuel_kg_s/h6/w1/v11</property>
      <property value="1.43295">fsim/tables/fuel_kg_s/h6/w1/v12</property>
      <property value="1.49133">fsim/tables/fuel_kg_s/h6/w1/v13</property>
      <property value="1.558">fsim/tables/fuel_kg_s/h6/w1/v14</property>
      <property value="1.62945">fsim/tables/fuel_kg_s/h6/w1/v15</property>
      <property value="1.04832">fsim/tables/fuel_kg_s/h6/w1/v4</property>
      <property value="1.08164">fsim/tables/fuel_kg_s/h6/w1/v5</property>
      <property value="1.12412">fsim/tables/fuel_kg_s/h6/w1/v6</property>
      <property value="1.16747">fsim/tables/fuel_kg_s/h6/w1/v7</property>
      <property value="1.21644">fsim/tables/fuel_kg_s/h6/w1/v8</property>
      <property value="1.27235">fsim/tables/fuel_kg_s/h6/w1/v9</property>
      <property value="352.371">fsim/tables/max_climb_ms/h0/w0</property>
      <property value="292.294">fsim/tables/max_climb_ms/h0/w1</property>
      <property value="248.765">fsim/tables/max_climb_ms/h0/w2</property>
      <property value="281.077">fsim/tables/max_climb_ms/h1/w0</property>
      <property value="231.495">fsim/tables/max_climb_ms/h1/w1</property>
      <property value="196.25">fsim/tables/max_climb_ms/h1/w2</property>
      <property value="213.067">fsim/tables/max_climb_ms/h2/w0</property>
      <property value="174.724">fsim/tables/max_climb_ms/h2/w1</property>
      <property value="147.053">fsim/tables/max_climb_ms/h2/w2</property>
      <property value="187.936">fsim/tables/max_climb_ms/h3/w0</property>
      <property value="150.535">fsim/tables/max_climb_ms/h3/w1</property>
      <property value="124.246">fsim/tables/max_climb_ms/h3/w2</property>
      <property value="124.328">fsim/tables/max_climb_ms/h4/w0</property>
      <property value="95.6731">fsim/tables/max_climb_ms/h4/w1</property>
      <property value="75.1386">fsim/tables/max_climb_ms/h4/w2</property>
      <property value="77.9818">fsim/tables/max_climb_ms/h5/w0</property>
      <property value="56.5415">fsim/tables/max_climb_ms/h5/w1</property>
      <property value="39.3734">fsim/tables/max_climb_ms/h5/w2</property>
      <property value="50.2393">fsim/tables/max_climb_ms/h6/w0</property>
      <property value="30.3589">fsim/tables/max_climb_ms/h6/w1</property>
      <property value="13.7869">fsim/tables/max_climb_ms/h6/w2</property>
      <property value="490.013">fsim/tables/max_tas_ms/h0/w0</property>
      <property value="489.515">fsim/tables/max_tas_ms/h0/w1</property>
      <property value="489.071">fsim/tables/max_tas_ms/h0/w2</property>
      <property value="539.653">fsim/tables/max_tas_ms/h1/w0</property>
      <property value="539.12">fsim/tables/max_tas_ms/h1/w1</property>
      <property value="538.505">fsim/tables/max_tas_ms/h1/w2</property>
      <property value="595.233">fsim/tables/max_tas_ms/h2/w0</property>
      <property value="594.476">fsim/tables/max_tas_ms/h2/w1</property>
      <property value="593.544">fsim/tables/max_tas_ms/h2/w2</property>
      <property value="655.481">fsim/tables/max_tas_ms/h3/w0</property>
      <property value="653.027">fsim/tables/max_tas_ms/h3/w1</property>
      <property value="650.421">fsim/tables/max_tas_ms/h3/w2</property>
      <property value="656.266">fsim/tables/max_tas_ms/h4/w0</property>
      <property value="650.035">fsim/tables/max_tas_ms/h4/w1</property>
      <property value="643.397">fsim/tables/max_tas_ms/h4/w2</property>
      <property value="641.512">fsim/tables/max_tas_ms/h5/w0</property>
      <property value="632.114">fsim/tables/max_tas_ms/h5/w1</property>
      <property value="621.778">fsim/tables/max_tas_ms/h5/w2</property>
      <property value="631.072">fsim/tables/max_tas_ms/h6/w0</property>
      <property value="614.4">fsim/tables/max_tas_ms/h6/w1</property>
      <property value="593.061">fsim/tables/max_tas_ms/h6/w2</property>
      <property value="195.389">fsim/tables/min_tas_ms/h0/w0</property>
      <property value="144.4">fsim/tables/min_tas_ms/h0/w1</property>
      <property value="139.368">fsim/tables/min_tas_ms/h0/w2</property>
      <property value="146.809">fsim/tables/min_tas_ms/h1/w0</property>
      <property value="143.106">fsim/tables/min_tas_ms/h1/w1</property>
      <property value="141.678">fsim/tables/min_tas_ms/h1/w2</property>
      <property value="148.327">fsim/tables/min_tas_ms/h2/w0</property>
      <property value="149.054">fsim/tables/min_tas_ms/h2/w1</property>
      <property value="151.613">fsim/tables/min_tas_ms/h2/w2</property>
      <property value="159.13">fsim/tables/min_tas_ms/h3/w0</property>
      <property value="164.85">fsim/tables/min_tas_ms/h3/w1</property>
      <property value="171.717">fsim/tables/min_tas_ms/h3/w2</property>
      <property value="176.275">fsim/tables/min_tas_ms/h4/w0</property>
      <property value="187.204">fsim/tables/min_tas_ms/h4/w1</property>
      <property value="198.327">fsim/tables/min_tas_ms/h4/w2</property>
      <property value="192.705">fsim/tables/min_tas_ms/h5/w0</property>
      <property value="207.146">fsim/tables/min_tas_ms/h5/w1</property>
      <property value="223.63">fsim/tables/min_tas_ms/h5/w2</property>
      <property value="215.953">fsim/tables/min_tas_ms/h6/w0</property>
      <property value="268.325">fsim/tables/min_tas_ms/h6/w1</property>
      <property value="285.45">fsim/tables/min_tas_ms/h6/w2</property>
      <property value="222.219">fsim/tables/ps_full_ms/h0/w0/v0</property>
      <property value="242.609">fsim/tables/ps_full_ms/h0/w0/v1</property>
      <property value="241.784">fsim/tables/ps_full_ms/h0/w0/v10</property>
      <property value="222.666">fsim/tables/ps_full_ms/h0/w0/v11</property>
      <property value="196.366">fsim/tables/ps_full_ms/h0/w0/v12</property>
      <property value="156.06">fsim/tables/ps_full_ms/h0/w0/v13</property>
      <property value="109.955">fsim/tables/ps_full_ms/h0/w0/v14</property>
      <property value="55.8689">fsim/tables/ps_full_ms/h0/w0/v15</property>
      <property value="262.575">fsim/tables/ps_full_ms/h0/w0/v2</property>
      <property value="281.98">fsim/tables/ps_full_ms/h0/w0/v3</property>
      <property value="300.876">fsim/tables/ps_full_ms/h0/w0/v4</property>
      <property value="319.473">fsim/tables/ps_full_ms/h0/w0/v5</property>
      <property value="336.985">fsim/tables/ps_full_ms/h0/w0/v6</property>
      <property value="349.994">fsim/tables/ps_full_ms/h0/w0/v7</property>
      <property value="346.564">fsim/tables/ps_full_ms/h0/w0/v8</property>
      <property value="306.731">fsim/tables/ps_full_ms/h0/w0/v9</property>
      <property value="134.651">fsim/tables/ps_full_ms/h0/w1/v0</property>
      <property value="155.847">fsim/tables/ps_full_ms/h0/w1/v1</property>
      <property value="250.466">fsim/tables/ps_full_ms/h0/w1/v10</property>
      <property value="190.456">fsim/tables/ps_full_ms/h0/w1/v11</property>
      <property value="176.165">fsim/tables/ps_full_ms/h0/w1/v12</property>
      <property value="140.92">fsim/tables/ps_full_ms/h0/w1/v13</property>
      <property value="97.2164">fsim/tables/ps_full_ms/h0/w1/v14</property>
      <property value="46.0618">fsim/tables/ps_full_ms/h0/w1/v15</property>
      <property value="175.895">fsim/tables/ps_full_ms/h0/w1/v2</property>
      <property value="195.271">fsim/tables/ps_full_ms/h0/w1/v3</property>
      <property value="214.353">fsim/tables/ps_full_ms/h0/w1/v4</property>
      <property value="232.819">fsim/tables/ps_full_ms/h0/w1/v5</property>
      <property value="250.976">fsim/tables/ps_full_ms/h0/w1/v6</property>
      <property value="269.53">fsim/tables/ps_full_ms/h0/w1/v7</property>
      <property value="285.849">fsim/tables/ps_full_ms/h0/w1/v8</property>
      <property value="291.002">fsim/tables/ps_full_ms/h0/w1/v9</property>
      <property value="108.51">fsim/tables/ps_full_ms/h0/w2/v0</property>
      <property value="127.329">fsim/tables/ps_full_ms/h0/w2/v1</property>
      <property value="218.569">fsim/tables/ps_full_ms/h0/w2/v10</property>
      <property value="161.732">fsim/tables/ps_full_ms/h0/w2/v11</property>
      <property value="150.631">fsim/tables/ps_full_ms/h0/w2/v12</property>
      <property value="120.674">fsim/tables/ps_full_ms/h0/w2/v13</property>
      <property value="82.3466">fsim/tables/ps_full_ms/h0/w2/v14</property>
      <property value="39.3255">fsim/tables/ps_full_ms/h0/w2/v15</property>
      <property value="144.754">fsim/tables/ps_full_ms/h0/w2/v2</property>
      <property value="161.422">fsim/tables/ps_full_ms/h0/w2/v3</property>
      <property value="178.065">fsim/tables/ps_full_ms/h0/w2/v4</property>
      <property value="193.949">fsim/tables/ps_full_ms/h0/w2/v5</property>
      <property value="209.591">fsim/tables/ps_full_ms/h0/w2/v6</property>
      <property value="226.007">fsim/tables/ps_full_ms/h0/w2/v7</property>
      <property value="241.468">fsim/tables/ps_full_ms/h0/w2/v8</property>
      <property value="248.719">fsim/tables/ps_full_ms/h0/w2/v9</property>
      <property value="130.489">fsim/tables/ps_full_ms/h1/w0/v0</property>
      <property value="153.859">fsim/tables/ps_full_ms/h1/w0/v1</property>
      <property value="215.038">fsim/tables/ps_full_ms/h1/w0/v10</property>
      <property value="211.895">fsim/tables/ps_full_ms/h1/w0/v11</property>
      <property value="205.117">fsim/tables/ps_full_ms/h1/w0/v12</property>
      <property value="171.638">fsim/tables/ps_full_ms/h1/w0/v13</property>
      <property value="118.127">fsim/tables/ps_full_ms/h1/w0/v14</property>
      <property value="56.6928">fsim/tables/ps_full_ms/h1/w0/v15</property>
      <property value="176.382">fsim/tables/ps_full_ms/h1/w0/v2</property>
      <property value="198.736">fsim/tables/ps_full_ms/h1/w0/v3</property>
      <property value="220.473">fsim/tables/ps_full_ms/h1/w0/v4</property>
      <property value="242.092">fsim/tables/ps_full_ms/h1/w0/v5</property>
      <property value="263.874">fsim/tables/ps_full_ms/h1/w0/v6</property>
      <property value="280.274">fsim/tables/ps_full_ms/h1/w0/v7</property>
      <property value="260.753">fsim/tables/ps_full_ms/h1/w0/v8</property>
      <property value="218.164">fsim/tables/ps_full_ms/h1/w0/v9</property>
      <property value="101.774">fsim/tables/ps_full_ms/h1/w1/v0</property>
      <property value="122.133">fsim/tables/ps_full_ms/h1/w1/v1</property>
      <property value="176.233">fsim/tables/ps_full_ms/h1/w1/v10</property>
      <property value="173.696">fsim/tables/ps_full_ms/h1/w1/v11</property>
      <property value="167.983">fsim/tables/ps_full_ms/h1/w1/v12</property>
      <property value="141.016">fsim/tables/ps_full_ms/h1/w1/v13</property>
      <property value="97.4035">fsim/tables/ps_full_ms/h1/w1/v14</property>
      <property value="46.2144">fsim/tables/ps_full_ms/h1/w1/v15</property>
      <property value="140.959">fsim/tables/ps_full_ms/h1/w1/v2</property>
      <property value="159.445">fsim/tables/ps_full_ms/h1/w1/v3</property>
      <property value="177.523">fsim/tables/ps_full_ms/h1/w1/v4</property>
      <property value="195.632">fsim/tables/ps_full_ms/h1/w1/v5</property>
      <property value="214.386">fsim/tables/ps_full_ms/h1/w1/v6</property>
      <property value="229.324">fsim/tables/ps_full_ms/h1/w1/v7</property>
      <property value="218.184">fsim/tables/ps_full_ms/h1/w1/v8</property>
      <property value="178.6">fsim/tables/ps_full_ms/h1/w1/v9</property>
      <property value="82.5337">fsim/tables/ps_full_ms/h1/w2/v0</property>
      <property value="100.736">fsim/tables/ps_full_ms/h1/w2/v1</property>
      <property value="148.31">fsim/tables/ps_full_ms/h1/w2/v10</property>
      <property value="146.626">fsim/tables/ps_full_ms/h1/w2/v11</property>
      <property value="141.752">fsim/tables/ps_full_ms/h1/w2/v12</property>
      <property value="119.588">fsim/tables/ps_full_ms/h1/w2/v13</property>
      <property value="82.5625">fsim/tables/ps_full_ms/h1/w2/v14</property>
      <property value="39.1446">fsim/tables/ps_full_ms/h1/w2/v15</property>
      <property value="116.828">fsim/tables/ps_full_ms/h1/w2/v2</property>
      <property value="132.688">fsim/tables/ps_full_ms/h1/w2/v3</property>
      <property value="147.897">fsim/tables/ps_full_ms/h1/w2/v4</property>
      <property value="163.674">fsim/tables/ps_full_ms/h1/w2/v5</property>
      <property value="180.468">fsim/tables/ps_full_ms/h1/w2/v6</property>
      <property value="193.497">fsim/tables/ps_full_ms/h1/w2/v7</property>
      <property value="186.838">fsim/tables/ps_full_ms/h1/w2/v8</property>
      <property value="150.076">fsim/tables/ps_full_ms/h1/w2/v9</property>
      <property value="96.3583">fsim/tables/ps_full_ms/h2/w0/v0</property>
      <property value="118.213">fsim/tables/ps_full_ms/h2/w0/v1</property>
      <property value="197.723">fsim/tables/ps_full_ms/h2/w0/v10</property>
      <property value="198.7">fsim/tables/ps_full_ms/h2/w0/v11</property>
      <property value="196.994">fsim/tables/ps_full_ms/h2/w0/v12</property>
      <property value="167.222">fsim/tables/ps_full_ms/h2/w0/v13</property>
      <property value="122.216">fsim/tables/ps_full_ms/h2/w0/v14</property>
      <property value="54.1108">fsim/tables/ps_full_ms/h2/w0/v15</property>
      <property value="138.66">fsim/tables/ps_full_ms/h2/w0/v2</property>
      <property value="159.135">fsim/tables/ps_full_ms/h2/w0/v3</property>
      <property value="179.728">fsim/tables/ps_full_ms/h2/w0/v4</property>
      <property value="200.749">fsim/tables/ps_full_ms/h2/w0/v5</property>
      <property value="212.727">fsim/tables/ps_full_ms/h2/w0/v6</property>
      <property value="185.927">fsim/tables/ps_full_ms/h2/w0/v7</property>
      <property value="189.026">fsim/tables/ps_full_ms/h2/w0/v8</property>
      <property value="194.765">fsim/tables/ps_full_ms/h2/w0/v9</property>
      <property value="75.3962">fsim/tables/ps_full_ms/h2/w1/v0</property>
      <property value="94.6464">fsim/tables/ps_full_ms/h2/w1/v1</property>
      <property value="159.562">fsim/tables/ps_full_ms/h2/w1/v10</property>
      <property value="160.847">fsim/tables/ps_full_ms/h2/w1/v11</property>
      <property value="160.42">fsim/tables/ps_full_ms/h2/w1/v12</property>
      <property value="136.539">fsim/tables/ps_full_ms/h2/w1/v13</property>
      <property value="99.5147">fsim/tables/ps_full_ms/h2/w1/v14</property>
      <property value="44.3667">fsim/tables/ps_full_ms/h2/w1/v15</property>
      <property value="111.6">fsim/tables/ps_full_ms/h2/w1/v2</property>
      <property value="128.382">fsim/tables/ps_full_ms/h2/w1/v3</property>
      <property value="145.547">fsim/tables/ps_full_ms/h2/w1/v4</property>
      <property value="163.445">fsim/tables/ps_full_ms/h2/w1/v5</property>
      <property value="174.615">fsim/tables/ps_full_ms/h2/w1/v6</property>
      <property value="150.096">fsim/tables/ps_full_ms/h2/w1/v7</property>
      <property value="153.121">fsim/tables/ps_full_ms/h2/w1/v8</property>
      <property value="157.481">fsim/tables/ps_full_ms/h2/w1/v9</property>
      <property value="60.9314">fsim/tables/ps_full_ms/h2/w2/v0</property>
      <property value="78.0828">fsim/tables/ps_full_ms/h2/w2/v1</property>
      <property value="132.957">fsim/tables/ps_full_ms/h2/w2/v10</property>
      <property value="133.925">fsim/tables/ps_full_ms/h2/w2/v11</property>
      <property value="133.316">fsim/tables/ps_full_ms/h2/w2/v12</property>
      <property value="113.133">fsim/tables/ps_full_ms/h2/w2/v13</property>
      <property value="82.5237">fsim/tables/ps_full_ms/h2/w2/v14</property>
      <property value="37.0972">fsim/tables/ps_full_ms/h2/w2/v15</property>
      <property value="92.649">fsim/tables/ps_full_ms/h2/w2/v2</property>
      <property value="107.038">fsim/tables/ps_full_ms/h2/w2/v3</property>
      <property value="122.102">fsim/tables/ps_full_ms/h2/w2/v4</property>
      <property value="137.759">fsim/tables/ps_full_ms/h2/w2/v5</property>
      <property value="146.972">fsim/tables/ps_full_ms/h2/w2/v6</property>
      <property value="124.949">fsim/tables/ps_full_ms/h2/w2/v7</property>
      <property value="127.876">fsim/tables/ps_full_ms/h2/w2/v8</property>
      <property value="131.514">fsim/tables/ps_full_ms/h2/w2/v9</property>
      <property value="69.768">fsim/tables/ps_full_ms/h3/w0/v0</property>
      <property value="89.347">fsim/tables/ps_full_ms/h3/w0/v1</property>
      <property value="178.054">fsim/tables/ps_full_ms/h3/w0/v10</property>
      <property value="185.068">fsim/tables/ps_full_ms/h3/w0/v11</property>
      <property value="184.559">fsim/tables/ps_full_ms/h3/w0/v12</property>
      <property value="164.551">fsim/tables/ps_full_ms/h3/w0/v13</property>
      <property value="124.128">fsim/tables/ps_full_ms/h3/w0/v14</property>
      <property value="50.4908">fsim/tables/ps_full_ms/h3/w0/v15</property>
      <property value="107.402">fsim/tables/ps_full_ms/h3/w0/v2</property>
      <property value="125.894">fsim/tables/ps_full_ms/h3/w0/v3</property>
      <property value="144.326">fsim/tables/ps_full_ms/h3/w0/v4</property>
      <property value="147.081">fsim/tables/ps_full_ms/h3/w0/v5</property>
      <property value="145.769">fsim/tables/ps_full_ms/h3/w0/v6</property>
      <property value="155.301">fsim/tables/ps_full_ms/h3/w0/v7</property>
      <property value="163.316">fsim/tables/ps_full_ms/h3/w0/v8</property>
      <property value="171.054">fsim/tables/ps_full_ms/h3/w0/v9</property>
      <property value="53.2121">fsim/tables/ps_full_ms/h3/w1/v0</property>
      <property value="71.1972">fsim/tables/ps_full_ms/h3/w1/v1</property>
      <property value="142.828">fsim/tables/ps_full_ms/h3/w1/v10</property>
      <property value="148.084">fsim/tables/ps_full_ms/h3/w1/v11</property>
      <property value="147.938">fsim/tables/ps_full_ms/h3/w1/v12</property>
      <property value="131.607">fsim/tables/ps_full_ms/h3/w1/v13</property>
      <property value="100.351">fsim/tables/ps_full_ms/h3/w1/v14</property>
      <property value="40.9701">fsim/tables/ps_full_ms/h3/w1/v15</property>
      <property value="86.2572">fsim/tables/ps_full_ms/h3/w1/v2</property>
      <property value="101.561">fsim/tables/ps_full_ms/h3/w1/v3</property>
      <property value="116.741">fsim/tables/ps_full_ms/h3/w1/v4</property>
      <property value="115.914">fsim/tables/ps_full_ms/h3/w1/v5</property>
      <property value="116.98">fsim/tables/ps_full_ms/h3/w1/v6</property>
      <property value="124.727">fsim/tables/ps_full_ms/h3/w1/v7</property>
      <property value="131.332">fsim/tables/ps_full_ms/h3/w1/v8</property>
      <property value="137.652">fsim/tables/ps_full_ms/h3/w1/v9</property>
      <property value="41.7399">fsim/tables/ps_full_ms/h3/w2/v0</property>
      <property value="57.8454">fsim/tables/ps_full_ms/h3/w2/v1</property>
      <property value="117.897">fsim/tables/ps_full_ms/h3/w2/v10</property>
      <property value="122.176">fsim/tables/ps_full_ms/h3/w2/v11</property>
      <property value="122.119">fsim/tables/ps_full_ms/h3/w2/v12</property>
      <property value="108.341">fsim/tables/ps_full_ms/h3/w2/v13</property>
      <property value="83.8089">fsim/tables/ps_full_ms/h3/w2/v14</property>
      <property value="34.5391">fsim/tables/ps_full_ms/h3/w2/v15</property>
      <property value="71.0199">fsim/tables/ps_full_ms/h3/w2/v2</property>
      <property value="84.5593">fsim/tables/ps_full_ms/h3/w2/v3</property>
      <property value="97.4421">fsim/tables/ps_full_ms/h3/w2/v4</property>
      <property value="92.6615">fsim/tables/ps_full_ms/h3/w2/v5</property>
      <property value="96.4314">fsim/tables/ps_full_ms/h3/w2/v6</property>
      <property value="102.786">fsim/tables/ps_full_ms/h3/w2/v7</property>
      <property value="107.799">fsim/tables/ps_full_ms/h3/w2/v8</property>
      <property value="113.416">fsim/tables/ps_full_ms/h3/w2/v9</property>
      <property value="40.3757">fsim/tables/ps_full_ms/h4/w0/v0</property>
      <property value="55.7411">fsim/tables/ps_full_ms/h4/w0/v1</property>
      <property value="117.307">fsim/tables/ps_full_ms/h4/w0/v10</property>
      <property value="122.644">fsim/tables/ps_full_ms/h4/w0/v11</property>
      <property value="121.044">fsim/tables/ps_full_ms/h4/w0/v12</property>
      <property value="110.467">fsim/tables/ps_full_ms/h4/w0/v13</property>
      <property value="82.1755">fsim/tables/ps_full_ms/h4/w0/v14</property>
      <property value="34.3857">fsim/tables/ps_full_ms/h4/w0/v15</property>
      <property value="68.9178">fsim/tables/ps_full_ms/h4/w0/v2</property>
      <property value="82.837">fsim/tables/ps_full_ms/h4/w0/v3</property>
      <property value="94.8686">fsim/tables/ps_full_ms/h4/w0/v4</property>
      <property value="88.2637">fsim/tables/ps_full_ms/h4/w0/v5</property>
      <property value="94.6591">fsim/tables/ps_full_ms/h4/w0/v6</property>
      <property value="101.148">fsim/tables/ps_full_ms/h4/w0/v7</property>
      <property value="106.497">fsim/tables/ps_full_ms/h4/w0/v8</property>
      <property value="112.165">fsim/tables/ps_full_ms/h4/w0/v9</property>
      <property value="28.0735">fsim/tables/ps_full_ms/h4/w1/v0</property>
      <property value="41.6885">fsim/tables/ps_full_ms/h4/w1/v1</property>
      <property value="90.0889">fsim/tables/ps_full_ms/h4/w1/v10</property>
      <property value="94.0569">fsim/tables/ps_full_ms/h4/w1/v11</property>
      <property value="93.6339">fsim/tables/ps_full_ms/h4/w1/v12</property>
      <property value="85.7247">fsim/tables/ps_full_ms/h4/w1/v13</property>
      <property value="67.3973">fsim/tables/ps_full_ms/h4/w1/v14</property>
      <property value="30.9287">fsim/tables/ps_full_ms/h4/w1/v15</property>
      <property value="53.0378">fsim/tables/ps_full_ms/h4/w1/v2</property>
      <property value="65.4177">fsim/tables/ps_full_ms/h4/w1/v3</property>
      <property value="74.3661">fsim/tables/ps_full_ms/h4/w1/v4</property>
      <property value="68.3706">fsim/tables/ps_full_ms/h4/w1/v5</property>
      <property value="73.5089">fsim/tables/ps_full_ms/h4/w1/v6</property>
      <property value="78.3247">fsim/tables/ps_full_ms/h4/w1/v7</property>
      <property value="82.7167">fsim/tables/ps_full_ms/h4/w1/v8</property>
      <property value="86.503">fsim/tables/ps_full_ms/h4/w1/v9</property>
      <property value="19.0553">fsim/tables/ps_full_ms/h4/w2/v0</property>
      <property value="30.8328">fsim/tables/ps_full_ms/h4/w2/v1</property>
      <property value="70.7875">fsim/tables/ps_full_ms/h4/w2/v10</property>
      <property value="73.7378">fsim/tables/ps_full_ms/h4/w2/v11</property>
      <property value="73.8247">fsim/tables/ps_full_ms/h4/w2/v12</property>
      <property value="67.2283">fsim/tables/ps_full_ms/h4/w2/v13</property>
      <property value="55.2901">fsim/tables/ps_full_ms/h4/w2/v14</property>
      <property value="25.8923">fsim/tables/ps_full_ms/h4/w2/v15</property>
      <property value="41.787">fsim/tables/ps_full_ms/h4/w2/v2</property>
      <property value="52.0774">fsim/tables/ps_full_ms/h4/w2/v3</property>
      <property value="57.6299">fsim/tables/ps_full_ms/h4/w2/v4</property>
      <property value="53.6546">fsim/tables/ps_full_ms/h4/w2/v5</property>
      <property value="58.1771">fsim/tables/ps_full_ms/h4/w2/v6</property>
      <property value="61.2446">fsim/tables/ps_full_ms/h4/w2/v7</property>
      <property value="64.6331">fsim/tables/ps_full_ms/h4/w2/v8</property>
      <property value="67.6724">fsim/tables/ps_full_ms/h4/w2/v9</property>
      <property value="21.4141">fsim/tables/ps_full_ms/h5/w0/v0</property>
      <property value="33.4978">fsim/tables/ps_full_ms/h5/w0/v1</property>
      <property value="73.6531">fsim/tables/ps_full_ms/h5/w0/v10</property>
      <property value="76.5153">fsim/tables/ps_full_ms/h5/w0/v11</property>
      <property value="77.0285">fsim/tables/ps_full_ms/h5/w0/v12</property>
      <property value="69.8248">fsim/tables/ps_full_ms/h5/w0/v13</property>
      <property value="58.3316">fsim/tables/ps_full_ms/h5/w0/v14</property>
      <property value="27.0244">fsim/tables/ps_full_ms/h5/w0/v15</property>
      <property value="44.2636">fsim/tables/ps_full_ms/h5/w0/v2</property>
      <property value="55.3995">fsim/tables/ps_full_ms/h5/w0/v3</property>
      <property value="62.6758">fsim/tables/ps_full_ms/h5/w0/v4</property>
      <property value="56.8302">fsim/tables/ps_full_ms/h5/w0/v5</property>
      <property value="60.9921">fsim/tables/ps_full_ms/h5/w0/v6</property>
      <property value="64.6523">fsim/tables/ps_full_ms/h5/w0/v7</property>
      <property value="68.0171">fsim/tables/ps_full_ms/h5/w0/v8</property>
      <property value="71.2452">fsim/tables/ps_full_ms/h5/w0/v9</property>
      <property value="11.0326">fsim/tables/ps_full_ms/h5/w1/v0</property>
      <property value="20.9853">fsim/tables/ps_full_ms/h5/w1/v1</property>
      <property value="52.3561">fsim/tables/ps_full_ms/h5/w1/v10</property>
      <property value="54.9159">fsim/tables/ps_full_ms/h5/w1/v11</property>
      <property value="56.4425">fsim/tables/ps_full_ms/h5/w1/v12</property>
      <property value="51.0558">fsim/tables/ps_full_ms/h5/w1/v13</property>
      <property value="43.8647">fsim/tables/ps_full_ms/h5/w1/v14</property>
      <property value="22.1903">fsim/tables/ps_full_ms/h5/w1/v15</property>
      <property value="31.9996">fsim/tables/ps_full_ms/h5/w1/v2</property>
      <property value="39.9215">fsim/tables/ps_full_ms/h5/w1/v3</property>
      <property value="42.7848">fsim/tables/ps_full_ms/h5/w1/v4</property>
      <property value="40.8903">fsim/tables/ps_full_ms/h5/w1/v5</property>
      <property value="43.5225">fsim/tables/ps_full_ms/h5/w1/v6</property>
      <property value="46.3644">fsim/tables/ps_full_ms/h5/w1/v7</property>
      <property value="48.7011">fsim/tables/ps_full_ms/h5/w1/v8</property>
      <property value="50.5685">fsim/tables/ps_full_ms/h5/w1/v9</property>
      <property value="2.69585">fsim/tables/ps_full_ms/h5/w2/v0</property>
      <property value="13.6586">fsim/tables/ps_full_ms/h5/w2/v1</property>
      <property value="36.4585">fsim/tables/ps_full_ms/h5/w2/v10</property>
      <property value="38.2082">fsim/tables/ps_full_ms/h5/w2/v11</property>
      <property value="39.3101">fsim/tables/ps_full_ms/h5/w2/v12</property>
      <property value="35.8736">fsim/tables/ps_full_ms/h5/w2/v13</property>
      <property value="30.5828">fsim/tables/ps_full_ms/h5/w2/v14</property>
      <property value="18.1565">fsim/tables/ps_full_ms/h5/w2/v15</property>
      <property value="22.013">fsim/tables/ps_full_ms/h5/w2/v2</property>
      <property value="28.6051">fsim/tables/ps_full_ms/h5/w2/v3</property>
      <property value="25.2163">fsim/tables/ps_full_ms/h5/w2/v4</property>
      <property value="27.7677">fsim/tables/ps_full_ms/h5/w2/v5</property>
      <property value="29.9716">fsim/tables/ps_full_ms/h5/w2/v6</property>
      <property value="31.8938">fsim/tables/ps_full_ms/h5/w2/v7</property>
      <property value="33.6196">fsim/tables/ps_full_ms/h5/w2/v8</property>
      <property value="35.2602">fsim/tables/ps_full_ms/h5/w2/v9</property>
      <property value="9.95778">fsim/tables/ps_full_ms/h6/w0/v0</property>
      <property value="18.0674">fsim/tables/ps_full_ms/h6/w0/v1</property>
      <property value="46.5544">fsim/tables/ps_full_ms/h6/w0/v10</property>
      <property value="48.8448">fsim/tables/ps_full_ms/h6/w0/v11</property>
      <property value="50.0442">fsim/tables/ps_full_ms/h6/w0/v12</property>
      <property value="45.5063">fsim/tables/ps_full_ms/h6/w0/v13</property>
      <property value="39.5714">fsim/tables/ps_full_ms/h6/w0/v14</property>
      <property value="20.7993">fsim/tables/ps_full_ms/h6/w0/v15</property>
      <property value="27.7635">fsim/tables/ps_full_ms/h6/w0/v2</property>
      <property value="35.3353">fsim/tables/ps_full_ms/h6/w0/v3</property>
      <property value="33.8675">fsim/tables/ps_full_ms/h6/w0/v4</property>
      <property value="35.0619">fsim/tables/ps_full_ms/h6/w0/v5</property>
      <property value="37.664">fsim/tables/ps_full_ms/h6/w0/v6</property>
      <property value="40.0917">fsim/tables/ps_full_ms/h6/w0/v7</property>
      <property value="42.5589">fsim/tables/ps_full_ms/h6/w0/v8</property>
      <property value="44.8333">fsim/tables/ps_full_ms/h6/w0/v9</property>
      <property value="13.3551">fsim/tables/ps_full_ms/h6/w1/v0</property>
      <property value="18.9523">fsim/tables/ps_full_ms/h6/w1/v1</property>
      <property value="27.7422">fsim/tables/ps_full_ms/h6/w1/v10</property>
      <property value="29.3142">fsim/tables/ps_full_ms/h6/w1/v11</property>
      <property value="30.3568">fsim/tables/ps_full_ms/h6/w1/v12</property>
      <property value="27.4038">fsim/tables/ps_full_ms/h6/w1/v13</property>
      <property value="23.4594">fsim/tables/ps_full_ms/h6/w1/v14</property>
      <property value="16.2209">fsim/tables/ps_full_ms/h6/w1/v15</property>
      <property value="21.4857">fsim/tables/ps_full_ms/h6/w1/v2</property>
      <property value="19.8527">fsim/tables/ps_full_ms/h6/w1/v3</property>
      <property value="19.7646">fsim/tables/ps_full_ms/h6/w1/v4</property>
      <property value="20.3573">fsim/tables/ps_full_ms/h6/w1/v5</property>
      <property value="22.3178">fsim/tables/ps_full_ms/h6/w1/v6</property>
      <property value="23.9399">fsim/tables/ps_full_ms/h6/w1/v7</property>
      <property value="25.2377">fsim/tables/ps_full_ms/h6/w1/v8</property>
      <property value="26.1708">fsim/tables/ps_full_ms/h6/w1/v9</property>
      <property value="4.08249">fsim/tables/ps_full_ms/h6/w2/v0</property>
      <property value="5.88968">fsim/tables/ps_full_ms/h6/w2/v1</property>
      <property value="11.7952">fsim/tables/ps_full_ms/h6/w2/v10</property>
      <property value="13.0492">fsim/tables/ps_full_ms/h6/w2/v11</property>
      <property value="13.6338">fsim/tables/ps_full_ms/h6/w2/v12</property>
      <property value="13.2195">fsim/tables/ps_full_ms/h6/w2/v13</property>
      <property value="10.8171">fsim/tables/ps_full_ms/h6/w2/v14</property>
      <property value="7.75655">fsim/tables/ps_full_ms/h6/w2/v15</property>
      <property value="7.47472">fsim/tables/ps_full_ms/h6/w2/v2</property>
      <property value="8.24579">fsim/tables/ps_full_ms/h6/w2/v3</property>
      <property value="8.5648">fsim/tables/ps_full_ms/h6/w2/v4</property>
      <property value="8.44423">fsim/tables/ps_full_ms/h6/w2/v5</property>
      <property value="8.50208">fsim/tables/ps_full_ms/h6/w2/v6</property>
      <property value="9.47092">fsim/tables/ps_full_ms/h6/w2/v7</property>
      <property value="10.2171">fsim/tables/ps_full_ms/h6/w2/v8</property>
      <property value="10.8489">fsim/tables/ps_full_ms/h6/w2/v9</property>
      <property value="-26.6392">fsim/tables/ps_idle_ms/h0/w0/v0</property>
      <property value="-34.1721">fsim/tables/ps_idle_ms/h0/w0/v1</property>
      <property value="-336.912">fsim/tables/ps_idle_ms/h0/w0/v10</property>
      <property value="-400.219">fsim/tables/ps_idle_ms/h0/w0/v11</property>
      <property value="-455.133">fsim/tables/ps_idle_ms/h0/w0/v12</property>
      <property value="-514.356">fsim/tables/ps_idle_ms/h0/w0/v13</property>
      <property value="-562.154">fsim/tables/ps_idle_ms/h0/w0/v14</property>
      <property value="-589.262">fsim/tables/ps_idle_ms/h0/w0/v15</property>
      <property value="-42.9651">fsim/tables/ps_idle_ms/h0/w0/v2</property>
      <property value="-53.0652">fsim/tables/ps_idle_ms/h0/w0/v3</property>
      <property value="-64.6905">fsim/tables/ps_idle_ms/h0/w0/v4</property>
      <property value="-78.3705">fsim/tables/ps_idle_ms/h0/w0/v5</property>
      <property value="-93.9011">fsim/tables/ps_idle_ms/h0/w0/v6</property>
      <property value="-113.946">fsim/tables/ps_idle_ms/h0/w0/v7</property>
      <property value="-145.898">fsim/tables/ps_idle_ms/h0/w0/v8</property>
      <property value="-238.363">fsim/tables/ps_idle_ms/h0/w0/v9</property>
      <property value="-13.4149">fsim/tables/ps_idle_ms/h0/w1/v0</property>
      <property value="-16.87">fsim/tables/ps_idle_ms/h0/w1/v1</property>
      <property value="-203.319">fsim/tables/ps_idle_ms/h0/w1/v10</property>
      <property value="-296.58">fsim/tables/ps_idle_ms/h0/w1/v11</property>
      <property value="-349.803">fsim/tables/ps_idle_ms/h0/w1/v12</property>
      <property value="-404.692">fsim/tables/ps_idle_ms/h0/w1/v13</property>
      <property value="-464.339">fsim/tables/ps_idle_ms/h0/w1/v14</property>
      <property value="-494.814">fsim/tables/ps_idle_ms/h0/w1/v15</property>
      <property value="-21.9162">fsim/tables/ps_idle_ms/h0/w1/v2</property>
      <property value="-28.3279">fsim/tables/ps_idle_ms/h0/w1/v3</property>
      <property value="-36.8067">fsim/tables/ps_idle_ms/h0/w1/v4</property>
      <property value="-46.7932">fsim/tables/ps_idle_ms/h0/w1/v5</property>
      <property value="-58.4689">fsim/tables/ps_idle_ms/h0/w1/v6</property>
      <property value="-71.8962">fsim/tables/ps_idle_ms/h0/w1/v7</property>
      <property value="-88.5554">fsim/tables/ps_idle_ms/h0/w1/v8</property>
      <property value="-117.489">fsim/tables/ps_idle_ms/h0/w1/v9</property>
      <property value="-13.3632">fsim/tables/ps_idle_ms/h0/w2/v0</property>
      <property value="-15.6339">fsim/tables/ps_idle_ms/h0/w2/v1</property>
      <property value="-162.066">fsim/tables/ps_idle_ms/h0/w2/v10</property>
      <property value="-250.375">fsim/tables/ps_idle_ms/h0/w2/v11</property>
      <property value="-295.883">fsim/tables/ps_idle_ms/h0/w2/v12</property>
      <property value="-342.508">fsim/tables/ps_idle_ms/h0/w2/v13</property>
      <property value="-394.233">fsim/tables/ps_idle_ms/h0/w2/v14</property>
      <property value="-426.568">fsim/tables/ps_idle_ms/h0/w2/v15</property>
      <property value="-19.4228">fsim/tables/ps_idle_ms/h0/w2/v2</property>
      <property value="-24.7619">fsim/tables/ps_idle_ms/h0/w2/v3</property>
      <property value="-31.2706">fsim/tables/ps_idle_ms/h0/w2/v4</property>
      <property value="-39.7488">fsim/tables/ps_idle_ms/h0/w2/v5</property>
      <property value="-49.5943">fsim/tables/ps_idle_ms/h0/w2/v6</property>
      <property value="-60.9057">fsim/tables/ps_idle_ms/h0/w2/v7</property>
      <property value="-73.9882">fsim/tables/ps_idle_ms/h0/w2/v8</property>
      <property value="-97.3886">fsim/tables/ps_idle_ms/h0/w2/v9</property>
      <property value="-14.0639">fsim/tables/ps_idle_ms/h1/w0/v0</property>
      <property value="-17.4195">fsim/tables/ps_idle_ms/h1/w0/v1</property>
      <property value="-277.685">fsim/tables/ps_idle_ms/h1/w0/v10</property>
      <property value="-329.243">fsim/tables/ps_idle_ms/h1/w0/v11</property>
      <property value="-385.559">fsim/tables/ps_idle_ms/h1/w0/v12</property>
      <property value="-447.732">fsim/tables/ps_idle_ms/h1/w0/v13</property>
      <property value="-516.817">fsim/tables/ps_idle_ms/h1/w0/v14</property>
      <property value="-556.137">fsim/tables/ps_idle_ms/h1/w0/v15</property>
      <property value="-22.521">fsim/tables/ps_idle_ms/h1/w0/v2</property>
      <property value="-29.3512">fsim/tables/ps_idle_ms/h1/w0/v3</property>
      <property value="-38.3297">fsim/tables/ps_idle_ms/h1/w0/v4</property>
      <property value="-49.1671">fsim/tables/ps_idle_ms/h1/w0/v5</property>
      <property value="-62.0986">fsim/tables/ps_idle_ms/h1/w0/v6</property>
      <property value="-82.3231">fsim/tables/ps_idle_ms/h1/w0/v7</property>
      <property value="-142.002">fsim/tables/ps_idle_ms/h1/w0/v8</property>
      <property value="-229.748">fsim/tables/ps_idle_ms/h1/w0/v9</property>
      <property value="-14.7252">fsim/tables/ps_idle_ms/h1/w1/v0</property>
      <property value="-16.6955">fsim/tables/ps_idle_ms/h1/w1/v1</property>
      <property value="-227.067">fsim/tables/ps_idle_ms/h1/w1/v10</property>
      <property value="-270.076">fsim/tables/ps_idle_ms/h1/w1/v11</property>
      <property value="-317.032">fsim/tables/ps_idle_ms/h1/w1/v12</property>
      <property value="-368.29">fsim/tables/ps_idle_ms/h1/w1/v13</property>
      <property value="-424.869">fsim/tables/ps_idle_ms/h1/w1/v14</property>
      <property value="-465.5">fsim/tables/ps_idle_ms/h1/w1/v15</property>
      <property value="-20.3815">fsim/tables/ps_idle_ms/h1/w1/v2</property>
      <property value="-25.6951">fsim/tables/ps_idle_ms/h1/w1/v3</property>
      <property value="-32.4574">fsim/tables/ps_idle_ms/h1/w1/v4</property>
      <property value="-41.328">fsim/tables/ps_idle_ms/h1/w1/v5</property>
      <property value="-51.6332">fsim/tables/ps_idle_ms/h1/w1/v6</property>
      <property value="-67.9091">fsim/tables/ps_idle_ms/h1/w1/v7</property>
      <property value="-107.689">fsim/tables/ps_idle_ms/h1/w1/v8</property>
      <property value="-187.397">fsim/tables/ps_idle_ms/h1/w1/v9</property>
      <property value="-16.0405">fsim/tables/ps_idle_ms/h1/w2/v0</property>
      <property value="-16.9549">fsim/tables/ps_idle_ms/h1/w2/v1</property>
      <property value="-192.696">fsim/tables/ps_idle_ms/h1/w2/v10</property>
      <property value="-229.357">fsim/tables/ps_idle_ms/h1/w2/v11</property>
      <property value="-269.711">fsim/tables/ps_idle_ms/h1/w2/v12</property>
      <property value="-313.407">fsim/tables/ps_idle_ms/h1/w2/v13</property>
      <property value="-361.07">fsim/tables/ps_idle_ms/h1/w2/v14</property>
      <property value="-400.275">fsim/tables/ps_idle_ms/h1/w2/v15</property>
      <property value="-19.5424">fsim/tables/ps_idle_ms/h1/w2/v2</property>
      <property value="-23.6951">fsim/tables/ps_idle_ms/h1/w2/v3</property>
      <property value="-29.4577">fsim/tables/ps_idle_ms/h1/w2/v4</property>
      <property value="-36.3486">fsim/tables/ps_idle_ms/h1/w2/v5</property>
      <property value="-45.054">fsim/tables/ps_idle_ms/h1/w2/v6</property>
      <property value="-58.5705">fsim/tables/ps_idle_ms/h1/w2/v7</property>
      <property value="-89.0817">fsim/tables/ps_idle_ms/h1/w2/v8</property>
      <property value="-159.41">fsim/tables/ps_idle_ms/h1/w2/v9</property>
      <property value="-16.5436">fsim/tables/ps_idle_ms/h2/w0/v0</property>
      <property value="-17.9203">fsim/tables/ps_idle_ms/h2/w0/v1</property>
      <property value="-238.908">fsim/tables/ps_idle_ms/h2/w0/v10</property>
      <property value="-285.5">fsim/tables/ps_idle_ms/h2/w0/v11</property>
      <property value="-337.029">fsim/tables/ps_idle_ms/h2/w0/v12</property>
      <property value="-393.329">fsim/tables/ps_idle_ms/h2/w0/v13</property>
      <property value="-455.098">fsim/tables/ps_idle_ms/h2/w0/v14</property>
      <property value="-503.928">fsim/tables/ps_idle_ms/h2/w0/v15</property>
      <property value="-21.4625">fsim/tables/ps_idle_ms/h2/w0/v2</property>
      <property value="-26.7292">fsim/tables/ps_idle_ms/h2/w0/v3</property>
      <property value="-33.7619">fsim/tables/ps_idle_ms/h2/w0/v4</property>
      <property value="-43.0619">fsim/tables/ps_idle_ms/h2/w0/v5</property>
      <property value="-61.5212">fsim/tables/ps_idle_ms/h2/w0/v6</property>
      <property value="-129.518">fsim/tables/ps_idle_ms/h2/w0/v7</property>
      <property value="-162.41">fsim/tables/ps_idle_ms/h2/w0/v8</property>
      <property value="-198.056">fsim/tables/ps_idle_ms/h2/w0/v9</property>
      <property value="-18.73">fsim/tables/ps_idle_ms/h2/w1/v0</property>
      <property value="-18.8499">fsim/tables/ps_idle_ms/h2/w1/v1</property>
      <property value="-199.029">fsim/tables/ps_idle_ms/h2/w1/v10</property>
      <property value="-236.982">fsim/tables/ps_idle_ms/h2/w1/v11</property>
      <property value="-279.107">fsim/tables/ps_idle_ms/h2/w1/v12</property>
      <property value="-325.224">fsim/tables/ps_idle_ms/h2/w1/v13</property>
      <property value="-375.645">fsim/tables/ps_idle_ms/h2/w1/v14</property>
      <property value="-420.452">fsim/tables/ps_idle_ms/h2/w1/v15</property>
      <property value="-21.173">fsim/tables/ps_idle_ms/h2/w1/v2</property>
      <property value="-25.1345">fsim/tables/ps_idle_ms/h2/w1/v3</property>
      <property value="-30.665">fsim/tables/ps_idle_ms/h2/w1/v4</property>
      <property value="-37.7375">fsim/tables/ps_idle_ms/h2/w1/v5</property>
      <property value="-52.9129">fsim/tables/ps_idle_ms/h2/w1/v6</property>
      <property value="-109.38">fsim/tables/ps_idle_ms/h2/w1/v7</property>
      <property value="-136.314">fsim/tables/ps_idle_ms/h2/w1/v8</property>
      <property value="-165.714">fsim/tables/ps_idle_ms/h2/w1/v9</property>
      <property value="-21.0485">fsim/tables/ps_idle_ms/h2/w2/v0</property>
      <property value="-20.2611">fsim/tables/ps_idle_ms/h2/w2/v1</property>
      <property value="-172.116">fsim/tables/ps_idle_ms/h2/w2/v10</property>
      <property value="-204.267">fsim/tables/ps_idle_ms/h2/w2/v11</property>
      <property value="-240.196">fsim/tables/ps_idle_ms/h2/w2/v12</property>
      <property value="-279.208">fsim/tables/ps_idle_ms/h2/w2/v13</property>
      <property value="-320.505">fsim/tables/ps_idle_ms/h2/w2/v14</property>
      <property value="-360.759">fsim/tables/ps_idle_ms/h2/w2/v15</property>
      <property value="-21.5789">fsim/tables/ps_idle_ms/h2/w2/v2</property>
      <property value="-24.632">fsim/tables/ps_idle_ms/h2/w2/v3</property>
      <property value="-28.923">fsim/tables/ps_idle_ms/h2/w2/v4</property>
      <property value="-35.0051">fsim/tables/ps_idle_ms/h2/w2/v5</property>
      <property value="-47.8385">fsim/tables/ps_idle_ms/h2/w2/v6</property>
      <property value="-95.9018">fsim/tables/ps_idle_ms/h2/w2/v7</property>
      <property value="-118.754">fsim/tables/ps_idle_ms/h2/w2/v8</property>
      <property value="-143.86">fsim/tables/ps_idle_ms/h2/w2/v9</property>
      <property value="-22.0426">fsim/tables/ps_idle_ms/h3/w0/v0</property>
      <property value="-21.2957">fsim/tables/ps_idle_ms/h3/w0/v1</property>
      <property value="-205.644">fsim/tables/ps_idle_ms/h3/w0/v10</property>
      <property value="-244.4">fsim/tables/ps_idle_ms/h3/w0/v11</property>
      <property value="-287.857">fsim/tables/ps_idle_ms/h3/w0/v12</property>
      <property value="-335.271">fsim/tables/ps_idle_ms/h3/w0/v13</property>
      <property value="-385.532">fsim/tables/ps_idle_ms/h3/w0/v14</property>
      <property value="-434.401">fsim/tables/ps_idle_ms/h3/w0/v15</property>
      <property value="-23.0583">fsim/tables/ps_idle_ms/h3/w0/v2</property>
      <property value="-26.7205">fsim/tables/ps_idle_ms/h3/w0/v3</property>
      <property value="-33.1316">fsim/tables/ps_idle_ms/h3/w0/v4</property>
      <property value="-58.8403">fsim/tables/ps_idle_ms/h3/w0/v5</property>
      <property value="-90.5667">fsim/tables/ps_idle_ms/h3/w0/v6</property>
      <property value="-113.707">fsim/tables/ps_idle_ms/h3/w0/v7</property>
      <property value="-140.494">fsim/tables/ps_idle_ms/h3/w0/v8</property>
      <property value="-171.149">fsim/tables/ps_idle_ms/h3/w0/v9</property>
      <property value="-25.3302">fsim/tables/ps_idle_ms/h3/w1/v0</property>
      <property value="-23.4958">fsim/tables/ps_idle_ms/h3/w1/v1</property>
      <property value="-173.855">fsim/tables/ps_idle_ms/h3/w1/v10</property>
      <property value="-205.31">fsim/tables/ps_idle_ms/h3/w1/v11</property>
      <property value="-240.66">fsim/tables/ps_idle_ms/h3/w1/v12</property>
      <property value="-279.532">fsim/tables/ps_idle_ms/h3/w1/v13</property>
      <property value="-320.678">fsim/tables/ps_idle_ms/h3/w1/v14</property>
      <property value="-362.543">fsim/tables/ps_idle_ms/h3/w1/v15</property>
      <property value="-24.22">fsim/tables/ps_idle_ms/h3/w1/v2</property>
      <property value="-26.6139">fsim/tables/ps_idle_ms/h3/w1/v3</property>
      <property value="-32.0874">fsim/tables/ps_idle_ms/h3/w1/v4</property>
      <property value="-57.3279">fsim/tables/ps_idle_ms/h3/w1/v5</property>
      <property value="-79.8143">fsim/tables/ps_idle_ms/h3/w1/v6</property>
      <property value="-98.4652">fsim/tables/ps_idle_ms/h3/w1/v7</property>
      <property value="-120.15">fsim/tables/ps_idle_ms/h3/w1/v8</property>
      <property value="-145.52">fsim/tables/ps_idle_ms/h3/w1/v9</property>
      <property value="-28.3638">fsim/tables/ps_idle_ms/h3/w2/v0</property>
      <property value="-25.7789">fsim/tables/ps_idle_ms/h3/w2/v1</property>
      <property value="-152.051">fsim/tables/ps_idle_ms/h3/w2/v10</property>
      <property value="-178.35">fsim/tables/ps_idle_ms/h3/w2/v11</property>
      <property value="-207.857">fsim/tables/ps_idle_ms/h3/w2/v12</property>
      <property value="-240.439">fsim/tables/ps_idle_ms/h3/w2/v13</property>
      <property value="-275.191">fsim/tables/ps_idle_ms/h3/w2/v14</property>
      <property value="-311.526">fsim/tables/ps_idle_ms/h3/w2/v15</property>
      <property value="-25.6563">fsim/tables/ps_idle_ms/h3/w2/v2</property>
      <property value="-27.2796">fsim/tables/ps_idle_ms/h3/w2/v3</property>
      <property value="-32.1125">fsim/tables/ps_idle_ms/h3/w2/v4</property>
      <property value="-57.3042">fsim/tables/ps_idle_ms/h3/w2/v5</property>
      <property value="-72.7969">fsim/tables/ps_idle_ms/h3/w2/v6</property>
      <property value="-88.9697">fsim/tables/ps_idle_ms/h3/w2/v7</property>
      <property value="-107.5">fsim/tables/ps_idle_ms/h3/w2/v8</property>
      <property value="-128.464">fsim/tables/ps_idle_ms/h3/w2/v9</property>
      <property value="-29.5804">fsim/tables/ps_idle_ms/h4/w0/v0</property>
      <property value="-26.8334">fsim/tables/ps_idle_ms/h4/w0/v1</property>
      <property value="-148.807">fsim/tables/ps_idle_ms/h4/w0/v10</property>
      <property value="-173.763">fsim/tables/ps_idle_ms/h4/w0/v11</property>
      <property value="-202.023">fsim/tables/ps_idle_ms/h4/w0/v12</property>
      <property value="-233.17">fsim/tables/ps_idle_ms/h4/w0/v13</property>
      <property value="-266.266">fsim/tables/ps_idle_ms/h4/w0/v14</property>
      <property value="-301.645">fsim/tables/ps_idle_ms/h4/w0/v15</property>
      <property value="-26.4326">fsim/tables/ps_idle_ms/h4/w0/v2</property>
      <property value="-28.1155">fsim/tables/ps_idle_ms/h4/w0/v3</property>
      <property value="-33.3237">fsim/tables/ps_idle_ms/h4/w0/v4</property>
      <property value="-59.0231">fsim/tables/ps_idle_ms/h4/w0/v5</property>
      <property value="-72.2381">fsim/tables/ps_idle_ms/h4/w0/v6</property>
      <property value="-88.0804">fsim/tables/ps_idle_ms/h4/w0/v7</property>
      <property value="-106.122">fsim/tables/ps_idle_ms/h4/w0/v8</property>
      <property value="-126.431">fsim/tables/ps_idle_ms/h4/w0/v9</property>
      <property value="-33.7899">fsim/tables/ps_idle_ms/h4/w1/v0</property>
      <property value="-30.2074">fsim/tables/ps_idle_ms/h4/w1/v1</property>
      <property value="-129.039">fsim/tables/ps_idle_ms/h4/w1/v10</property>
      <property value="-148.888">fsim/tables/ps_idle_ms/h4/w1/v11</property>
      <property value="-170.882">fsim/tables/ps_idle_ms/h4/w1/v12</property>
      <property value="-195.045">fsim/tables/ps_idle_ms/h4/w1/v13</property>
      <property value="-220.806">fsim/tables/ps_idle_ms/h4/w1/v14</property>
      <property value="-248.209">fsim/tables/ps_idle_ms/h4/w1/v15</property>
      <property value="-29.0299">fsim/tables/ps_idle_ms/h4/w1/v2</property>
      <property value="-29.8573">fsim/tables/ps_idle_ms/h4/w1/v3</property>
      <property value="-34.6688">fsim/tables/ps_idle_ms/h4/w1/v4</property>
      <property value="-55.4815">fsim/tables/ps_idle_ms/h4/w1/v5</property>
      <property value="-66.6814">fsim/tables/ps_idle_ms/h4/w1/v6</property>
      <property value="-79.3774">fsim/tables/ps_idle_ms/h4/w1/v7</property>
      <property value="-93.9652">fsim/tables/ps_idle_ms/h4/w1/v8</property>
      <property value="-110.734">fsim/tables/ps_idle_ms/h4/w1/v9</property>
      <property value="-37.4451">fsim/tables/ps_idle_ms/h4/w2/v0</property>
      <property value="-33.4826">fsim/tables/ps_idle_ms/h4/w2/v1</property>
      <property value="-115.328">fsim/tables/ps_idle_ms/h4/w2/v10</property>
      <property value="-131.762">fsim/tables/ps_idle_ms/h4/w2/v11</property>
      <property value="-149.91">fsim/tables/ps_idle_ms/h4/w2/v12</property>
      <property value="-169.542">fsim/tables/ps_idle_ms/h4/w2/v13</property>
      <property value="-190.906">fsim/tables/ps_idle_ms/h4/w2/v14</property>
      <property value="-212.864">fsim/tables/ps_idle_ms/h4/w2/v15</property>
      <property value="-31.7862">fsim/tables/ps_idle_ms/h4/w2/v2</property>
      <property value="-32.0278">fsim/tables/ps_idle_ms/h4/w2/v3</property>
      <property value="-37.8956">fsim/tables/ps_idle_ms/h4/w2/v4</property>
      <property value="-54.1775">fsim/tables/ps_idle_ms/h4/w2/v5</property>
      <property value="-63.3728">fsim/tables/ps_idle_ms/h4/w2/v6</property>
      <property value="-74.4403">fsim/tables/ps_idle_ms/h4/w2/v7</property>
      <property value="-86.8122">fsim/tables/ps_idle_ms/h4/w2/v8</property>
      <property value="-100.399">fsim/tables/ps_idle_ms/h4/w2/v9</property>
      <property value="-36.2121">fsim/tables/ps_idle_ms/h5/w0/v0</property>
      <property value="-32.1179">fsim/tables/ps_idle_ms/h5/w0/v1</property>
      <property value="-119.401">fsim/tables/ps_idle_ms/h5/w0/v10</property>
      <property value="-136.949">fsim/tables/ps_idle_ms/h5/w0/v11</property>
      <property value="-156.411">fsim/tables/ps_idle_ms/h5/w0/v12</property>
      <property value="-177.426">fsim/tables/ps_idle_ms/h5/w0/v13</property>
      <property value="-200.217">fsim/tables/ps_idle_ms/h5/w0/v14</property>
      <property value="-224.058">fsim/tables/ps_idle_ms/h5/w0/v15</property>
      <property value="-30.4854">fsim/tables/ps_idle_ms/h5/w0/v2</property>
      <property value="-30.9252">fsim/tables/ps_idle_ms/h5/w0/v3</property>
      <property value="-35.2216">fsim/tables/ps_idle_ms/h5/w0/v4</property>
      <property value="-54.2894">fsim/tables/ps_idle_ms/h5/w0/v5</property>
      <property value="-64.0156">fsim/tables/ps_idle_ms/h5/w0/v6</property>
      <property value="-75.6056">fsim/tables/ps_idle_ms/h5/w0/v7</property>
      <property value="-88.5812">fsim/tables/ps_idle_ms/h5/w0/v8</property>
      <property value="-103.008">fsim/tables/ps_idle_ms/h5/w0/v9</property>
      <property value="-40.5911">fsim/tables/ps_idle_ms/h5/w1/v0</property>
      <property value="-36.3133">fsim/tables/ps_idle_ms/h5/w1/v1</property>
      <property value="-106.07">fsim/tables/ps_idle_ms/h5/w1/v10</property>
      <property value="-119.404">fsim/tables/ps_idle_ms/h5/w1/v11</property>
      <property value="-134.242">fsim/tables/ps_idle_ms/h5/w1/v12</property>
      <property value="-150.242">fsim/tables/ps_idle_ms/h5/w1/v13</property>
      <property value="-168.109">fsim/tables/ps_idle_ms/h5/w1/v14</property>
      <property value="-187.168">fsim/tables/ps_idle_ms/h5/w1/v15</property>
      <property value="-33.8722">fsim/tables/ps_idle_ms/h5/w1/v2</property>
      <property value="-34.409">fsim/tables/ps_idle_ms/h5/w1/v3</property>
      <property value="-41.5036">fsim/tables/ps_idle_ms/h5/w1/v4</property>
      <property value="-53.3602">fsim/tables/ps_idle_ms/h5/w1/v5</property>
      <property value="-61.5785">fsim/tables/ps_idle_ms/h5/w1/v6</property>
      <property value="-70.8176">fsim/tables/ps_idle_ms/h5/w1/v7</property>
      <property value="-81.4216">fsim/tables/ps_idle_ms/h5/w1/v8</property>
      <property value="-93.3131">fsim/tables/ps_idle_ms/h5/w1/v9</property>
      <property value="-44.1246">fsim/tables/ps_idle_ms/h5/w2/v0</property>
      <property value="-40.0304">fsim/tables/ps_idle_ms/h5/w2/v1</property>
      <property value="-97.826">fsim/tables/ps_idle_ms/h5/w2/v10</property>
      <property value="-108.717">fsim/tables/ps_idle_ms/h5/w2/v11</property>
      <property value="-120.889">fsim/tables/ps_idle_ms/h5/w2/v12</property>
      <property value="-132.921">fsim/tables/ps_idle_ms/h5/w2/v13</property>
      <property value="-146.407">fsim/tables/ps_idle_ms/h5/w2/v14</property>
      <property value="-161.863">fsim/tables/ps_idle_ms/h5/w2/v15</property>
      <property value="-37.6947">fsim/tables/ps_idle_ms/h5/w2/v2</property>
      <property value="-38.3373">fsim/tables/ps_idle_ms/h5/w2/v3</property>
      <property value="-49.4011">fsim/tables/ps_idle_ms/h5/w2/v4</property>
      <property value="-54.8553">fsim/tables/ps_idle_ms/h5/w2/v5</property>
      <property value="-61.3731">fsim/tables/ps_idle_ms/h5/w2/v6</property>
      <property value="-69.2209">fsim/tables/ps_idle_ms/h5/w2/v7</property>
      <property value="-78.0859">fsim/tables/ps_idle_ms/h5/w2/v8</property>
      <property value="-87.5486">fsim/tables/ps_idle_ms/h5/w2/v9</property>
      <property value="-42.9782">fsim/tables/ps_idle_ms/h6/w0/v0</property>
      <property value="-38.4809">fsim/tables/ps_idle_ms/h6/w0/v1</property>
      <property value="-102.848">fsim/tables/ps_idle_ms/h6/w0/v10</property>
      <property value="-115.148">fsim/tables/ps_idle_ms/h6/w0/v11</property>
      <property value="-128.825">fsim/tables/ps_idle_ms/h6/w0/v12</property>
      <property value="-142.578">fsim/tables/ps_idle_ms/h6/w0/v13</property>
      <property value="-158.006">fsim/tables/ps_idle_ms/h6/w0/v14</property>
      <property value="-175.488">fsim/tables/ps_idle_ms/h6/w0/v15</property>
      <property value="-36.2164">fsim/tables/ps_idle_ms/h6/w0/v2</property>
      <property value="-36.6586">fsim/tables/ps_idle_ms/h6/w0/v3</property>
      <property value="-47.224">fsim/tables/ps_idle_ms/h6/w0/v4</property>
      <property value="-54.7163">fsim/tables/ps_idle_ms/h6/w0/v5</property>
      <property value="-62.2176">fsim/tables/ps_idle_ms/h6/w0/v6</property>
      <property value="-70.7886">fsim/tables/ps_idle_ms/h6/w0/v7</property>
      <property value="-80.4194">fsim/tables/ps_idle_ms/h6/w0/v8</property>
      <property value="-91.1128">fsim/tables/ps_idle_ms/h6/w0/v9</property>
      <property value="-42.1667">fsim/tables/ps_idle_ms/h6/w1/v0</property>
      <property value="-41.3142">fsim/tables/ps_idle_ms/h6/w1/v1</property>
      <property value="-98.1241">fsim/tables/ps_idle_ms/h6/w1/v10</property>
      <property value="-106.737">fsim/tables/ps_idle_ms/h6/w1/v11</property>
      <property value="-115.89">fsim/tables/ps_idle_ms/h6/w1/v12</property>
      <property value="-124.738">fsim/tables/ps_idle_ms/h6/w1/v13</property>
      <property value="-135.376">fsim/tables/ps_idle_ms/h6/w1/v14</property>
      <property value="-148.377">fsim/tables/ps_idle_ms/h6/w1/v15</property>
      <property value="-43.5975">fsim/tables/ps_idle_ms/h6/w1/v2</property>
      <property value="-52.3097">fsim/tables/ps_idle_ms/h6/w1/v3</property>
      <property value="-57.1317">fsim/tables/ps_idle_ms/h6/w1/v4</property>
      <property value="-62.3838">fsim/tables/ps_idle_ms/h6/w1/v5</property>
      <property value="-68.4213">fsim/tables/ps_idle_ms/h6/w1/v6</property>
      <property value="-74.853">fsim/tables/ps_idle_ms/h6/w1/v7</property>
      <property value="-82.0848">fsim/tables/ps_idle_ms/h6/w1/v8</property>
      <property value="-90.1382">fsim/tables/ps_idle_ms/h6/w1/v9</property>
      <property value="-47.3688">fsim/tables/ps_idle_ms/h6/w2/v0</property>
      <property value="-47.1788">fsim/tables/ps_idle_ms/h6/w2/v1</property>
      <property value="-92.2357">fsim/tables/ps_idle_ms/h6/w2/v10</property>
      <property value="-98.5356">fsim/tables/ps_idle_ms/h6/w2/v11</property>
      <property value="-105.133">fsim/tables/ps_idle_ms/h6/w2/v12</property>
      <property value="-110.898">fsim/tables/ps_idle_ms/h6/w2/v13</property>
      <property value="-118.352">fsim/tables/ps_idle_ms/h6/w2/v14</property>
      <property value="-129.039">fsim/tables/ps_idle_ms/h6/w2/v15</property>
      <property value="-53.9609">fsim/tables/ps_idle_ms/h6/w2/v2</property>
      <property value="-56.5006">fsim/tables/ps_idle_ms/h6/w2/v3</property>
      <property value="-60.4365">fsim/tables/ps_idle_ms/h6/w2/v4</property>
      <property value="-64.8133">fsim/tables/ps_idle_ms/h6/w2/v5</property>
      <property value="-69.6045">fsim/tables/ps_idle_ms/h6/w2/v6</property>
      <property value="-74.6057">fsim/tables/ps_idle_ms/h6/w2/v7</property>
      <property value="-80.1573">fsim/tables/ps_idle_ms/h6/w2/v8</property>
      <property value="-86.0453">fsim/tables/ps_idle_ms/h6/w2/v9</property>
      <property value="490.013">fsim/tables/reach_tas_ms/h0/w0</property>
      <property value="489.515">fsim/tables/reach_tas_ms/h0/w1</property>
      <property value="489.071">fsim/tables/reach_tas_ms/h0/w2</property>
      <property value="539.653">fsim/tables/reach_tas_ms/h1/w0</property>
      <property value="539.12">fsim/tables/reach_tas_ms/h1/w1</property>
      <property value="538.505">fsim/tables/reach_tas_ms/h1/w2</property>
      <property value="595.233">fsim/tables/reach_tas_ms/h2/w0</property>
      <property value="594.476">fsim/tables/reach_tas_ms/h2/w1</property>
      <property value="593.544">fsim/tables/reach_tas_ms/h2/w2</property>
      <property value="655.481">fsim/tables/reach_tas_ms/h3/w0</property>
      <property value="653.027">fsim/tables/reach_tas_ms/h3/w1</property>
      <property value="650.421">fsim/tables/reach_tas_ms/h3/w2</property>
      <property value="656.266">fsim/tables/reach_tas_ms/h4/w0</property>
      <property value="650.035">fsim/tables/reach_tas_ms/h4/w1</property>
      <property value="643.397">fsim/tables/reach_tas_ms/h4/w2</property>
      <property value="641.512">fsim/tables/reach_tas_ms/h5/w0</property>
      <property value="632.114">fsim/tables/reach_tas_ms/h5/w1</property>
      <property value="621.778">fsim/tables/reach_tas_ms/h5/w2</property>
      <property value="631.072">fsim/tables/reach_tas_ms/h6/w0</property>
      <property value="614.4">fsim/tables/reach_tas_ms/h6/w1</property>
      <property value="593.061">fsim/tables/reach_tas_ms/h6/w2</property>
      <property value="0.0">fsim/tables/speed_fraction/v0</property>
      <property value="0.0666667">fsim/tables/speed_fraction/v1</property>
      <property value="0.666667">fsim/tables/speed_fraction/v10</property>
      <property value="0.733333">fsim/tables/speed_fraction/v11</property>
      <property value="0.8">fsim/tables/speed_fraction/v12</property>
      <property value="0.866667">fsim/tables/speed_fraction/v13</property>
      <property value="0.933333">fsim/tables/speed_fraction/v14</property>
      <property value="1">fsim/tables/speed_fraction/v15</property>
      <property value="0.133333">fsim/tables/speed_fraction/v2</property>
      <property value="0.2">fsim/tables/speed_fraction/v3</property>
      <property value="0.266667">fsim/tables/speed_fraction/v4</property>
      <property value="0.333333">fsim/tables/speed_fraction/v5</property>
      <property value="0.4">fsim/tables/speed_fraction/v6</property>
      <property value="0.466667">fsim/tables/speed_fraction/v7</property>
      <property value="0.533333">fsim/tables/speed_fraction/v8</property>
      <property value="0.6">fsim/tables/speed_fraction/v9</property>
      <property value="52.5925">fsim/tables/stall_cas_ms/h0/w0</property>
      <property value="57.9492">fsim/tables/stall_cas_ms/h0/w1</property>
      <property value="62.851">fsim/tables/stall_cas_ms/h0/w2</property>
      <property value="53.353">fsim/tables/stall_cas_ms/h1/w0</property>
      <property value="58.7872">fsim/tables/stall_cas_ms/h1/w1</property>
      <property value="63.7599">fsim/tables/stall_cas_ms/h1/w2</property>
      <property value="53.162">fsim/tables/stall_cas_ms/h2/w0</property>
      <property value="58.5767">fsim/tables/stall_cas_ms/h2/w1</property>
      <property value="63.5316">fsim/tables/stall_cas_ms/h2/w2</property>
      <property value="54.301">fsim/tables/stall_cas_ms/h3/w0</property>
      <property value="59.8318">fsim/tables/stall_cas_ms/h3/w1</property>
      <property value="64.8928">fsim/tables/stall_cas_ms/h3/w2</property>
      <property value="54.881">fsim/tables/stall_cas_ms/h4/w0</property>
      <property value="60.4708">fsim/tables/stall_cas_ms/h4/w1</property>
      <property value="65.5859">fsim/tables/stall_cas_ms/h4/w2</property>
      <property value="55.6711">fsim/tables/stall_cas_ms/h5/w0</property>
      <property value="61.3413">fsim/tables/stall_cas_ms/h5/w1</property>
      <property value="66.5301">fsim/tables/stall_cas_ms/h5/w2</property>
      <property value="56.2244">fsim/tables/stall_cas_ms/h6/w0</property>
      <property value="61.951">fsim/tables/stall_cas_ms/h6/w1</property>
      <property value="67.1913">fsim/tables/stall_cas_ms/h6/w2</property>
      <property value="10405">fsim/tables/weight_kg/w0</property>
      <property value="12632.5">fsim/tables/weight_kg/w1</property>
      <property value="14860">fsim/tables/weight_kg/w2</property>
      <channel name="Pitch (fly-by-wire)">
        <!-- hangar: load factor command, alpha and pitch-rate inner loop (hangar/fcs.py) -->
        <summer name="fcs/pitch-trim-sum">
          <input>fcs/elevator-cmd-norm</input>
          <input>fcs/pitch-trim-cmd-norm</input>
          <clipto> <min>-1</min> <max>1</max> </clipto>
        </summer>
        <!-- the integrators are reset below 60 kt and while a wheel carries weight
             (on the ground, taking off and landing) -->
        <switch name="fcs/fbw/reset">
          <default value="0"/>
          <test logic="OR" value="-1">
            velocities/vc-kts lt 60
            gear/wow gt 0
          </test>
        </switch>
        <fcs_function name="fcs/fbw/k-alpha">
          <function>
            <table>
              <independentVar lookup="row">aero/qbar-psf</independentVar>
              <independentVar lookup="column">velocities/mach</independentVar>
              <tableData>
                       0.150     0.400     0.700     0.900     1.100     1.400     2.000
              10.0  -4.89423  -4.92229  -4.64320  -4.12017  -6.00000  -6.00000  -6.00000
              20.0  -2.50519  -2.57492  -2.43503  -2.14983  -4.31867  -6.00000  -6.00000
              40.0  -1.31594  -1.40196  -1.33116  -1.16479  -2.29404  -4.29303  -6.00000
              80.0  -0.58681  -0.73960  -0.73621  -0.61580  -0.84563  -1.25761  -2.86526
             150.0  -0.56833  -0.75040  -0.74962  -0.61638  -0.84017  -1.27438  -1.19051
             300.0  -0.53190  -0.68812  -0.70499  -0.58019  -0.78530  -1.21690  -1.19170
             600.0  -0.59703  -0.61129  -0.64502  -0.53120  -0.70553  -1.11897  -1.14204
            1200.0  -1.03825  -0.44904  -0.42711  -0.28172  -0.17745  -0.43410  -1.06200
            2400.0  -3.09470  -0.41121  -0.24947  -0.10098   0.23104   0.38229   0.05243
              </tableData>
            </table>
          </function>
        </fcs_function>
        <fcs_function name="fcs/fbw/k-q">
          <function>
            <table>
              <independentVar lookup="row">aero/qbar-psf</independentVar>
              <independentVar lookup="column">velocities/mach</independentVar>
              <tableData>
                       0.150     0.400     0.700     0.900     1.100     1.400     2.000
              10.0  -3.00000  -3.00000  -3.00000  -3.00000  -3.00000  -3.00000  -3.00000
              20.0  -2.25105  -2.39061  -2.29206  -2.05541  -3.00000  -3.00000  -3.00000
              40.0  -1.01928  -1.15480  -1.12309  -1.01063  -2.09225  -3.00000  -3.00000
              80.0  -0.31271  -0.48925  -0.52715  -0.51244  -1.07890  -1.88180  -2.55481
             150.0  -0.17975  -0.35502  -0.39024  -0.37746  -0.79926  -1.43007  -1.69277
             300.0  -0.05375  -0.22368  -0.26007  -0.25458  -0.54502  -0.98894  -1.20600
             600.0   0.04475  -0.12818  -0.16621  -0.16657  -0.36300  -0.66993  -0.83275
            1200.0   0.15268  -0.04136  -0.07686  -0.07729  -0.17696  -0.37082  -0.56824
            2400.0   0.31856   0.02972  -0.01104  -0.01837  -0.05556  -0.14340  -0.26009
              </tableData>
            </table>
          </function>
        </fcs_function>
        <fcs_function name="fcs/fbw/k-ff">
          <function>
            <table>
              <independentVar lookup="row">aero/qbar-psf</independentVar>
              <independentVar lookup="column">velocities/mach</independentVar>
              <tableData>
                       0.150     0.400     0.700     0.900     1.100     1.400     2.000
              10.0  -0.30000  -0.30000  -0.30000  -0.30000  -0.30000  -0.30000  -0.30000
              20.0  -0.30000  -0.30000  -0.30000  -0.30000  -0.30000  -0.30000  -0.30000
              40.0  -0.30000  -0.30000  -0.30000  -0.30000  -0.30000  -0.30000  -0.30000
              80.0  -0.18926  -0.18776  -0.18233  -0.17106  -0.30000  -0.30000  -0.30000
             150.0  -0.10936  -0.10822  -0.10453  -0.09763  -0.21467  -0.30000  -0.30000
             300.0  -0.05601  -0.05538  -0.05338  -0.04976  -0.10998  -0.20791  -0.28771
             600.0  -0.02809  -0.02777  -0.02676  -0.02495  -0.05521  -0.10462  -0.14645
            1200.0  -0.01091  -0.01056  -0.00955  -0.00812  -0.01783  -0.03846  -0.07346
            2400.0  -0.00273  -0.00265  -0.00239  -0.00204  -0.00447  -0.00965  -0.01904
              </tableData>
            </table>
          </function>
        </fcs_function>
        <fcs_function name="fcs/fbw/k-i">
          <function>
            <table>
              <independentVar lookup="row">aero/qbar-psf</independentVar>
              <independentVar lookup="column">velocities/mach</independentVar>
              <tableData>
                       0.150     0.400     0.700     0.900     1.100     1.400     2.000
              10.0  -0.60000  -0.60000  -0.60000  -0.60000  -0.60000  -0.60000  -0.60000
              20.0  -0.60000  -0.60000  -0.60000  -0.60000  -0.60000  -0.60000  -0.60000
              40.0  -0.60000  -0.60000  -0.60000  -0.60000  -0.60000  -0.60000  -0.60000
              80.0  -0.18926  -0.18776  -0.18233  -0.17106  -0.37185  -0.60000  -0.60000
             150.0  -0.10936  -0.10822  -0.10453  -0.09763  -0.21467  -0.40113  -0.52911
             300.0  -0.05601  -0.05538  -0.05338  -0.04976  -0.10998  -0.20791  -0.28771
             600.0  -0.02809  -0.02777  -0.02676  -0.02495  -0.05521  -0.10462  -0.14645
            1200.0  -0.01091  -0.01056  -0.00955  -0.00812  -0.01783  -0.03846  -0.07346
            2400.0  -0.00273  -0.00265  -0.00239  -0.00204  -0.00447  -0.00965  -0.01904
              </tableData>
            </table>
          </function>
        </fcs_function>
        <fcs_function name="fcs/fbw/n-alpha">
          <function>
            <table>
              <independentVar lookup="row">aero/qbar-psf</independentVar>
              <independentVar lookup="column">velocities/mach</independentVar>
              <tableData>
                       0.150     0.400     0.700     0.900     1.100     1.400     2.000
              10.0   1.00000   1.00000   1.00000   1.00000   1.00000   1.00000   1.00000
              20.0   1.00000   1.00000   1.00000   1.00000   1.00000   1.00000   1.00000
              40.0   1.00000   1.00000   1.00000   1.00000   1.00000   1.00000   1.00000
              80.0   2.95091   3.05891   3.37478   3.81249   3.85239   3.23774   1.00000
             150.0   6.06772   6.19304   6.57976   7.18306   7.24291   6.40149   4.57655
             300.0  11.78563  12.03532  12.80678  14.02168  14.14221  12.45067   8.93874
             600.0  23.30834  23.80933  25.35723  27.79484  28.03669  24.64272  17.57170
            1200.0  46.37163  47.37325  50.46795  55.34145  55.82497  49.03943  34.90000
            2400.0  92.47627  94.47848 100.66470 110.40669 111.37323  97.80913  69.54483
              </tableData>
            </table>
          </function>
        </fcs_function>
        <!-- the pitching moment's departures from a straight line through the
             angle-of-attack envelope (+0.211 per rad about the CG), cancelled by the
             elevator: the gains are designed on the line -->
        <fcs_function name="fcs/fbw/moment-comp">
          <function>
            <table>
              <independentVar lookup="row">aero/alpha-rad</independentVar>
              <independentVar lookup="column">velocities/mach</independentVar>
              <tableData>
                       0.150     0.400     0.700     0.900     1.100     1.400     2.000
          -0.17453   0.00457   0.00449   0.00422   0.00377   0.00774   0.01445   0.02011
          -0.15708  -0.01108  -0.01087  -0.01022  -0.00912  -0.01875  -0.03501  -0.04871
          -0.13963  -0.01805  -0.01771  -0.01666  -0.01486  -0.03054  -0.05703  -0.07935
          -0.12217  -0.00698  -0.00685  -0.00644  -0.00575  -0.01182  -0.02206  -0.03070
          -0.10472   0.00677   0.00665   0.00625   0.00558   0.01146   0.02140   0.02978
          -0.08727   0.00577   0.00566   0.00532   0.00475   0.00976   0.01823   0.02537
          -0.06981   0.00508   0.00498   0.00469   0.00418   0.00860   0.01605   0.02233
          -0.05236   0.00506   0.00497   0.00467   0.00417   0.00857   0.01600   0.02226
          -0.03491   0.00485   0.00476   0.00448   0.00399   0.00821   0.01532   0.02132
          -0.01745   0.00435   0.00427   0.00402   0.00359   0.00737   0.01376   0.01915
           0.00000   0.00368   0.00361   0.00340   0.00303   0.00623   0.01164   0.01620
           0.01745   0.00298   0.00293   0.00275   0.00246   0.00505   0.00943   0.01312
           0.03491   0.00241   0.00237   0.00223   0.00199   0.00408   0.00762   0.01060
           0.05236   0.00197   0.00193   0.00182   0.00162   0.00334   0.00623   0.00867
           0.06981   0.00163   0.00160   0.00151   0.00135   0.00277   0.00516   0.00718
           0.08727   0.00137   0.00134   0.00126   0.00113   0.00231   0.00432   0.00601
           0.10472   0.00112   0.00110   0.00104   0.00092   0.00190   0.00355   0.00493
           0.12217   0.00082   0.00081   0.00076   0.00068   0.00139   0.00260   0.00361
           0.13963   0.00051   0.00050   0.00047   0.00042   0.00087   0.00162   0.00226
           0.15708   0.00014   0.00014   0.00013   0.00012   0.00024   0.00045   0.00063
           0.17453  -0.00016  -0.00016  -0.00015  -0.00013  -0.00027  -0.00051  -0.00071
           0.19199  -0.00047  -0.00047  -0.00044  -0.00039  -0.00080  -0.00150  -0.00208
           0.20944  -0.00069  -0.00067  -0.00063  -0.00056  -0.00116  -0.00217  -0.00301
           0.22689  -0.00090  -0.00089  -0.00083  -0.00074  -0.00153  -0.00286  -0.00398
           0.24435  -0.00104  -0.00102  -0.00096  -0.00086  -0.00176  -0.00329  -0.00457
           0.26180  -0.00121  -0.00119  -0.00112  -0.00100  -0.00205  -0.00383  -0.00534
           0.27925  -0.00144  -0.00142  -0.00133  -0.00119  -0.00244  -0.00456  -0.00635
           0.29671  -0.00196  -0.00192  -0.00181  -0.00161  -0.00331  -0.00618  -0.00861
           0.31416  -0.00276  -0.00271  -0.00254  -0.00227  -0.00467  -0.00871  -0.01212
           0.33161  -0.00362  -0.00355  -0.00334  -0.00298  -0.00613  -0.01145  -0.01593
           0.34907  -0.00418  -0.00410  -0.00385  -0.00344  -0.00707  -0.01320  -0.01836
           0.36652  -0.00446  -0.00438  -0.00412  -0.00368  -0.00755  -0.01410  -0.01962
           0.38397  -0.00428  -0.00420  -0.00395  -0.00353  -0.00725  -0.01353  -0.01883
           0.40143  -0.00364  -0.00357  -0.00336  -0.00300  -0.00616  -0.01150  -0.01599
           0.41888  -0.00260  -0.00255  -0.00240  -0.00214  -0.00440  -0.00821  -0.01143
           0.43633  -0.00136  -0.00133  -0.00125  -0.00112  -0.00229  -0.00428  -0.00596
           0.45379   0.00010   0.00010   0.00009   0.00008   0.00017   0.00031   0.00043
           0.47124   0.00175   0.00172   0.00162   0.00144   0.00297   0.00554   0.00770
           0.48869   0.00372   0.00365   0.00343   0.00306   0.00630   0.01176   0.01636
           0.50615   0.00605   0.00594   0.00558   0.00498   0.01024   0.01911   0.02660
           0.52360   0.00894   0.00877   0.00825   0.00736   0.01514   0.02826   0.03932
              </tableData>
            </table>
          </function>
        </fcs_function>
        <!-- the gravity reference: the load factor that holds the flight path -->
        <fcs_function name="fcs/fbw/g-ref">
          <function>
            <product>
              <cos><property>attitude/theta-rad</property></cos>
              <cos><property>attitude/phi-rad</property></cos>
            </product>
          </function>
        </fcs_function>
        <!-- stick to load factor beyond the gravity reference, aft (negative) to n_max,
             no more than the lift at the angle-of-attack limits gives - beyond the
             gravity reference of the moment, so that full aft stick still reaches
             the limit in a steep climb or inverted - through a 0.2 s prefilter and
             a 12 g/s onset limit (a full pull at once pitches an agile airframe
             faster than its nose-down control can stop at the angle-of-attack
             limit) -->
        <fcs_function name="fcs/fbw/dn-stick">
          <function>
            <max>
              <min>
                <table>
                  <independentVar lookup="row">fcs/pitch-trim-sum</independentVar>
                  <tableData>
                    -1.0  8.000
                     0.0  0.0
                     1.0  -4.000
                  </tableData>
                </table>
                <difference><product><property>fcs/fbw/n-alpha</property><value>0.52360</value></product><property>fcs/fbw/g-ref</property></difference>
              </min>
              <difference><product><property>fcs/fbw/n-alpha</property><value>-0.17453</value></product><property>fcs/fbw/g-ref</property></difference>
            </max>
          </function>
        </fcs_function>
        <lag_filter name="fcs/fbw/dn-lag">
          <input>fcs/fbw/dn-stick</input>
          <c1>5.0</c1>
        </lag_filter>
        <actuator name="fcs/fbw/dn-cmd">
          <input>fcs/fbw/dn-lag</input>
          <rate_limit>12.0</rate_limit>
        </actuator>
        <!-- the response the command should produce (the short period's rise): the
             integrator trims away what differs from it, not the rise itself -->
        <lag_filter name="fcs/fbw/dn-model">
          <input>fcs/fbw/dn-cmd</input>
          <c1>2.5</c1>
        </lag_filter>
        <fcs_function name="fcs/fbw/dn">
          <function>
            <difference><property>accelerations/Nz</property><property>fcs/fbw/g-ref</property></difference>
          </function>
        </fcs_function>
        <!-- the angle of attack with its rise over the next 0.35 s counted as spent
             (the rise, not the pitch rate: in a steady pull the nose turns with the
             flight path and the angle of attack holds), and the load factor the
             angle of attack left to each limit gives -->
        <fcs_function name="fcs/fbw/alpha-ahead">
          <function>
            <sum>
              <property>aero/alpha-rad</property>
              <product><value>0.35</value><property>aero/alphadot-rad_sec</property></product>
            </sum>
          </function>
        </fcs_function>
        <fcs_function name="fcs/fbw/dn-room-up">
          <function>
            <product><property>fcs/fbw/n-alpha</property>
              <difference><value>0.52360</value><property>fcs/fbw/alpha-ahead</property></difference></product>
          </function>
        </fcs_function>
        <fcs_function name="fcs/fbw/dn-room-down">
          <function>
            <product><property>fcs/fbw/n-alpha</property>
              <difference><value>-0.17453</value><property>fcs/fbw/alpha-ahead</property></difference></product>
          </function>
        </fcs_function>
        <!-- the command limited to the load factor the aircraft pulls now plus what
             the angle of attack left gives: at a limit the feedforward asks for the
             load factor the airframe gives there, whatever elevator holds it - a
             steady pull on a stable airframe, a push on an unstable one (a
             feedforward faded out past the limit instead took about 10 deg of
             elevator per deg of alpha, on one side of it only: the actuator's rate
             limit could not follow, and the MiG-29A cycled between 24 and 29 deg) -->
        <fcs_function name="fcs/fbw/dn-limited">
          <function>
            <max>
              <min>
                <property>fcs/fbw/dn-cmd</property>
                <sum><property>fcs/fbw/dn</property><property>fcs/fbw/dn-room-up</property></sum>
              </min>
              <sum><property>fcs/fbw/dn</property><property>fcs/fbw/dn-room-down</property></sum>
            </max>
          </function>
        </fcs_function>
        <!-- the integrator's error: the load factor's departure from the model
             response, and at a limit the angle of attack left, counted five times -
             it trims what the airframe needs there beyond the linear design (vortex
             lift, the tail's power at high alpha) in a fraction of a second, not
             over the pull -->
        <fcs_function name="fcs/fbw/pitch-error">
          <function>
            <max>
              <min>
                <difference><property>fcs/fbw/dn-model</property><property>fcs/fbw/dn</property></difference>
                <product><value>5.0</value><property>fcs/fbw/dn-room-up</property></product>
              </min>
              <product><value>5.0</value><property>fcs/fbw/dn-room-down</property></product>
            </max>
          </function>
        </fcs_function>
        <fcs_function name="fcs/fbw/pitch-error-rate">
          <function><product><property>fcs/fbw/k-i</property><property>fcs/fbw/pitch-error</property></product></function>
        </fcs_function>
        <!-- the integrator: reset below 60 kt and on the wheels, held while the
             elevator is at a stop it would push further into (anti-windup) -->
        <switch name="fcs/fbw/pitch-hold">
          <default value="0"/>
          <test logic="OR" value="-1">
            velocities/vc-kts lt 60
            gear/wow gt 0
          </test>
          <test logic="AND" value="1">
            fcs/fbw/elevator-raw gt 0.87266
            fcs/fbw/pitch-error-rate gt 0
          </test>
          <test logic="AND" value="1">
            fcs/fbw/elevator-raw lt -0.43633
            fcs/fbw/pitch-error-rate lt 0
          </test>
        </switch>
        <integrator name="fcs/fbw/pitch-integral">
          <input>fcs/fbw/pitch-error-rate</input>
          <c1>1.0</c1>
          <trigger>fcs/fbw/pitch-hold</trigger>
          <clipto> <min>-0.5</min> <max>0.5</max> </clipto>
        </integrator>
        <!-- past an angle-of-attack limit (the next 0.35 s counted) a push back
             in proportion, all the travel 4 deg beyond: an unstable airframe
             pitching up fast needs it at once, not when an integrator winds -->
        <fcs_function name="fcs/fbw/alpha-push">
          <function>
            <difference>
              <product><value>12.50000</value>
                <max><value>0</value><difference><property>fcs/fbw/alpha-ahead</property><value>0.52360</value></difference></max></product>
              <product><value>6.25000</value>
                <max><value>0</value><difference><value>-0.17453</value><property>fcs/fbw/alpha-ahead</property></difference></max></product>
            </difference>
          </function>
        </fcs_function>
        <lag_filter name="fcs/fbw/ground">
          <input>gear/wow</input>
          <c1>2.0</c1>
        </lag_filter>
        <fcs_function name="fcs/fbw/ground-direct">
          <function>
            <product>
              <property>fcs/fbw/ground</property>
              <table>
                <independentVar lookup="row">fcs/pitch-trim-sum</independentVar>
                <tableData>
                  -1.0  -0.43633
                   0.0  0.0
                   1.0  0.87266
                </tableData>
              </table>
            </product>
          </function>
        </fcs_function>
        <!-- the elevator: the push, the moment compensation, angle-of-attack and
             pitch-rate feedback, the feedforward of the limited command, the
             integrator, the ground mode's direct stick -->
        <fcs_function name="fcs/fbw/elevator-raw">
          <function>
            <sum>
              <property>fcs/fbw/alpha-push</property>
              <property>fcs/fbw/moment-comp</property>
              <product><value>-1</value><property>fcs/fbw/k-alpha</property><property>aero/alpha-rad</property></product>
              <product><value>-1</value><property>fcs/fbw/k-q</property><property>velocities/q-rad_sec</property></product>
              <product><property>fcs/fbw/k-ff</property><property>fcs/fbw/dn-limited</property></product>
              <property>fcs/fbw/pitch-integral</property>
              <property>fcs/fbw/ground-direct</property>
            </sum>
          </function>
        </fcs_function>
        <pure_gain name="fcs/fbw/elevator">
          <input>fcs/fbw/elevator-raw</input>
          <gain>1.0</gain>
          <clipto> <min>-0.43633</min> <max>0.87266</max> </clipto>
        </pure_gain>
        <!-- full travel in 0.83 s: 60 deg/s for a +-25 deg tail, faster for a
             canard's longer throw -->
        <actuator name="fcs/elevator-actuator">
          <input>fcs/fbw/elevator</input>
          <lag>40</lag>
          <rate_limit>1.577</rate_limit>
          <output>fcs/elevator-pos-rad</output>
        </actuator>
      </channel>
      <channel name="Roll (fly-by-wire)">
        <!-- hangar: roll-rate command about the flight path, limited to what the rudder can
             coordinate; bank hold at neutral stick -->
        <summer name="fcs/roll-trim-sum">
          <input>fcs/aileron-cmd-norm</input>
          <input>fcs/roll-trim-cmd-norm</input>
          <clipto> <min>-1</min> <max>1</max> </clipto>
        </summer>
        <fcs_function name="fcs/fbw/k-roll">
          <function>
            <table>
              <independentVar lookup="row">aero/qbar-psf</independentVar>
              <independentVar lookup="column">velocities/mach</independentVar>
              <tableData>
                       0.150     0.400     0.700     0.900     1.100     1.400     2.000
              10.0   1.50000   1.50000   1.50000   1.50000   1.50000   1.50000   1.50000
              20.0   1.50000   1.50000   1.50000   1.50000   1.50000   1.50000   1.50000
              40.0   0.92960   0.97108   0.89573   0.75417   1.50000   1.50000   1.50000
              80.0   0.16810   0.29642   0.29493   0.24977   0.51921   1.02973   1.50000
             150.0   0.01833   0.12216   0.13352   0.11626   0.24516   0.48724   0.73795
             300.0   0.00000   0.03770   0.05306   0.04816   0.10542   0.21885   0.33684
             600.0   0.00000   0.00000   0.01242   0.01391   0.03554   0.08694   0.15234
            1200.0   0.00000   0.00000   0.00000   0.00000   0.00072   0.02124   0.06056
            2400.0   0.00000   0.00000   0.00000   0.00000   0.00000   0.00000   0.01493
              </tableData>
            </table>
          </function>
        </fcs_function>
        <fcs_function name="fcs/fbw/k-roll-ff">
          <function>
            <table>
              <independentVar lookup="row">aero/qbar-psf</independentVar>
              <independentVar lookup="column">velocities/mach</independentVar>
              <tableData>
                       0.150     0.400     0.700     0.900     1.100     1.400     2.000
              10.0   0.11654   0.04329   0.02390   0.01710   0.02875   0.03737   0.02585
              20.0   0.11654   0.04329   0.02390   0.01710   0.02875   0.03737   0.02585
              40.0   0.11654   0.04329   0.02390   0.01710   0.02875   0.03737   0.02585
              80.0   0.22571   0.08381   0.04570   0.03148   0.05270   0.07222   0.02709
             150.0   0.17408   0.06406   0.03442   0.02372   0.03973   0.05446   0.04405
             300.0   0.14287   0.05297   0.02908   0.02065   0.03469   0.04558   0.03335
             600.0   0.13848   0.05143   0.02837   0.02028   0.03408   0.04437   0.03090
            1200.0   0.13786   0.05122   0.02827   0.02023   0.03399   0.04420   0.03061
            2400.0   0.13772   0.05116   0.02824   0.02021   0.03397   0.04416   0.03055
              </tableData>
            </table>
          </function>
        </fcs_function>
        <fcs_function name="fcs/fbw/k-roll-i">
          <function>
            <table>
              <independentVar lookup="row">aero/qbar-psf</independentVar>
              <independentVar lookup="column">velocities/mach</independentVar>
              <tableData>
                       0.150     0.400     0.700     0.900     1.100     1.400     2.000
              10.0   0.37196   0.36067   0.32698   0.27423   0.55841   1.00000   1.00000
              20.0   0.18598   0.18033   0.16349   0.13712   0.27921   0.52614   0.73210
              40.0   0.09299   0.09017   0.08174   0.06856   0.13960   0.26307   0.36605
              80.0   0.03501   0.03380   0.03028   0.02500   0.05084   0.09795   0.16654
             150.0   0.01710   0.01655   0.01493   0.01244   0.02532   0.04815   0.06951
             300.0   0.00831   0.00806   0.00730   0.00612   0.01245   0.02350   0.03291
             600.0   0.00413   0.00400   0.00363   0.00304   0.00619   0.01167   0.01629
            1200.0   0.00206   0.00199   0.00181   0.00152   0.00309   0.00582   0.00810
            2400.0   0.00103   0.00100   0.00090   0.00076   0.00154   0.00290   0.00404
              </tableData>
            </table>
          </function>
        </fcs_function>
        <fcs_function name="fcs/fbw/p-max">
          <function>
            <table>
              <independentVar lookup="row">aero/qbar-psf</independentVar>
              <independentVar lookup="column">velocities/mach</independentVar>
              <tableData>
                       0.150     0.400     0.700     0.900     1.100     1.400     2.000
              10.0   2.99533   4.71239   4.71239   4.71239   4.71239   4.71239   4.71239
              20.0   2.99533   4.71239   4.71239   4.71239   4.71239   4.71239   4.71239
              40.0   2.99533   4.71239   4.71239   4.71239   4.71239   4.71239   4.71239
              80.0   1.54653   4.16505   4.71239   4.71239   4.71239   4.71239   4.71239
             150.0   2.00526   4.71239   4.71239   4.71239   4.71239   4.71239   4.71239
             300.0   2.44320   4.71239   4.71239   4.71239   4.71239   4.71239   4.71239
             600.0   2.52064   4.71239   4.71239   4.71239   4.71239   4.71239   4.71239
            1200.0   2.53196   4.71239   4.71239   4.71239   4.71239   4.71239   4.71239
            2400.0   2.53462   4.71239   4.71239   4.71239   4.71239   4.71239   4.71239
              </tableData>
            </table>
          </function>
        </fcs_function>
        <!-- the stick's rate halves towards alpha_max -->
        <fcs_function name="fcs/fbw/p-stick">
          <function>
            <product>
              <property>fcs/roll-trim-sum</property>
              <property>fcs/fbw/p-max</property>
              <table>
                <independentVar lookup="row">aero/alpha-rad</independentVar>
                <tableData>
                  0.20944 1.0
                  0.52360 0.5
                </tableData>
              </table>
            </product>
          </function>
        </fcs_function>
        <!-- the rudder's yaw acceleration at full travel (1/s^2), and the yaw damping (1/s) -->
        <fcs_function name="fcs/fbw/yaw-accel">
          <function>
            <table>
              <independentVar lookup="row">aero/qbar-psf</independentVar>
              <independentVar lookup="column">velocities/mach</independentVar>
              <tableData>
                       0.150     0.400     0.700     0.900     1.100     1.400     2.000
              10.0   0.06681   0.06835   0.07327   0.08164   0.04909   0.03159   0.03139
              20.0   0.13363   0.13671   0.14654   0.16328   0.09817   0.06318   0.06279
              40.0   0.26726   0.27341   0.29309   0.32656   0.19634   0.12637   0.12558
              80.0   0.66932   0.68835   0.74860   0.84885   0.51111   0.32077   0.26794
             150.0   1.37146   1.40540   1.51370   1.69663   1.02063   0.65128   0.62675
             300.0   2.83657   2.90332   3.11666   3.47915   2.09217   1.34292   1.32041
             600.0   5.72885   5.86168   6.28642   7.00860   4.21411   2.70987   2.68461
            1200.0  11.49395  11.75926  12.60767  14.05056   8.44797   5.43546   5.39578
            2400.0  23.01446  23.54481  25.24085  28.12552  16.91041  10.88243  10.81033
              </tableData>
            </table>
          </function>
        </fcs_function>
        <fcs_function name="fcs/fbw/yaw-damping">
          <function>
            <table>
              <independentVar lookup="row">aero/qbar-psf</independentVar>
              <independentVar lookup="column">velocities/mach</independentVar>
              <tableData>
                       0.150     0.400     0.700     0.900     1.100     1.400     2.000
              10.0   0.04233   0.01622   0.00988   0.00843   0.00696   0.00480   0.00239
              20.0   0.08466   0.03244   0.01975   0.01685   0.01391   0.00960   0.00477
              40.0   0.16932   0.06487   0.03950   0.03371   0.02782   0.01919   0.00954
              80.0   0.37318   0.14305   0.08732   0.07498   0.06192   0.04235   0.01982
             150.0   0.72303   0.27725   0.16921   0.14479   0.11953   0.08212   0.04020
             300.0   1.46315   0.56058   0.34134   0.29122   0.24036   0.16582   0.08231
             600.0   2.91936   1.11845   0.68093   0.58084   0.47939   0.33081   0.16469
            1200.0   5.82730   2.23260   1.35938   1.15971   0.95717   0.66039   0.32857
            2400.0  11.64954   4.46344   2.71802   2.31916   1.91415   1.32036   0.65642
              </tableData>
            </table>
          </function>
        </fcs_function>
        <!-- the rudder's share of the yaw a roll about the flight path needs, per unit of
             its roll acceleration: sin(alpha), less the ailerons' own yaw and what a
             principal axis inclined to the body axis gives -->
        <fcs_function name="fcs/fbw/roll-yaw-share">
          <function>
            <table>
              <independentVar lookup="row">aero/alpha-rad</independentVar>
              <tableData>
                   -0.34907  -0.36568
                   -0.26180  -0.28847
                   -0.17453  -0.20935
                   -0.08727  -0.12648
                    0.00000  -0.03775
                    0.08727   0.05160
                    0.17453   0.13199
                    0.26180   0.20269
                    0.34907   0.27358
                    0.43633   0.34647
                    0.52360   0.42389
                    0.61087   0.50934
                    0.69813   0.59467
                    0.78540   0.67009
                    0.87266   0.72638
              </tableData>
            </table>
          </function>
        </fcs_function>
        <!-- the yaw acceleration each rad/s of roll rate needs while the aircraft pitches
             under it: the pitch rate's inertia coupling, the angle of attack rising, and
             the yaw damping the roll's yaw rate meets -->
        <fcs_function name="fcs/fbw/p-yaw-need">
          <function>
            <abs>
              <sum>
                <product>
                  <sum>
                    <property>aero/alphadot-rad_sec</property>
                    <product><value>0.82800</value><property>velocities/q-rad_sec</property></product>
                  </sum>
                  <cos><property>aero/alpha-rad</property></cos>
                </product>
                <product><property>fcs/fbw/yaw-damping</property><sin><property>aero/alpha-rad</property></sin></product>
              </sum>
            </abs>
          </function>
        </fcs_function>
        <!-- no more roll rate than 0.5 of the rudder's yaw holds: a roll the rudder cannot
             follow turns the angle of attack into sideslip -->
        <fcs_function name="fcs/fbw/p-yaw-max">
          <function>
            <quotient>
              <product><value>0.5</value><property>fcs/fbw/yaw-accel</property></product>
              <max><value>0.001</value><property>fcs/fbw/p-yaw-need</property></max>
            </quotient>
          </function>
        </fcs_function>
        <fcs_function name="fcs/fbw/p-limited">
          <function>
            <max>
              <min><property>fcs/fbw/p-stick</property><property>fcs/fbw/p-yaw-max</property></min>
              <product><value>-1</value><property>fcs/fbw/p-yaw-max</property></product>
            </max>
          </function>
        </fcs_function>
        <!-- and while the rate grows, no faster roll acceleration than all of it
             coordinates, unless the roll asked for could not leave 2.0 deg of sideslip
             even uncoordinated: at worst c^2 p^2 / (8 Y), c the rudder's share, Y its yaw
             acceleration, p the rate asked for -->
        <fcs_function name="fcs/fbw/p-accel">
          <function>
            <product>
              <quotient>
                <property>fcs/fbw/yaw-accel</property>
                <max><value>0.01</value><abs><property>fcs/fbw/roll-yaw-share</property></abs></max>
              </quotient>
              <max>
                <value>1</value>
                <quotient>
                  <product><value>0.27925</value><property>fcs/fbw/yaw-accel</property></product>
                  <sum>
                    <value>1e-9</value>
                    <product>
                      <property>fcs/fbw/roll-yaw-share</property><property>fcs/fbw/roll-yaw-share</property>
                      <property>fcs/fbw/p-limited</property><property>fcs/fbw/p-limited</property>
                    </product>
                  </sum>
                </quotient>
              </max>
            </product>
          </function>
        </fcs_function>
        <!-- a roll is stopped as fast as the ailerons can -->
        <fcs_function name="fcs/fbw/p-accel-up">
          <function>
            <sum><property>fcs/fbw/p-accel</property>
              <product><value>1000</value><lt><property>fcs/fbw/p-cmd</property><value>0</value></lt></product></sum>
          </function>
        </fcs_function>
        <fcs_function name="fcs/fbw/p-accel-down">
          <function>
            <sum><property>fcs/fbw/p-accel</property>
              <product><value>1000</value><gt><property>fcs/fbw/p-cmd</property><value>0</value></gt></product></sum>
          </function>
        </fcs_function>
        <actuator name="fcs/fbw/p-cmd">
          <input>fcs/fbw/p-limited</input>
          <rate_limit sense="incr">fcs/fbw/p-accel-up</rate_limit>
          <rate_limit sense="decr">fcs/fbw/p-accel-down</rate_limit>
        </actuator>
        <fcs_function name="fcs/fbw/p-stability">
          <function>
            <sum>
              <product><property>velocities/p-rad_sec</property><cos><property>aero/alpha-rad</property></cos></product>
              <product><property>velocities/r-rad_sec</property><sin><property>aero/alpha-rad</property></sin></product>
            </sum>
          </function>
        </fcs_function>
        <fcs_function name="fcs/fbw/roll-error-rate">
          <function>
            <product><property>fcs/fbw/k-roll-i</property>
              <difference><property>fcs/fbw/p-cmd</property><property>fcs/fbw/p-stability</property></difference></product>
          </function>
        </fcs_function>
        <integrator name="fcs/fbw/roll-integral">
          <input>fcs/fbw/roll-error-rate</input>
          <c1>1.0</c1>
          <trigger>fcs/fbw/reset</trigger>
          <clipto> <min>-0.21817</min> <max>0.21817</max> </clipto>
        </integrator>
        <fcs_function name="fcs/fbw/aileron">
          <function>
            <sum>
              <product><property>fcs/fbw/k-roll-ff</property><property>fcs/fbw/p-cmd</property></product>
              <product><property>fcs/fbw/k-roll</property>
                <difference><property>fcs/fbw/p-cmd</property><property>fcs/fbw/p-stability</property></difference></product>
              <property>fcs/fbw/roll-integral</property>
            </sum>
          </function>
          <clipto> <min>-0.43633</min> <max>0.43633</max> </clipto>
        </fcs_function>
        <actuator name="fcs/left-aileron-actuator">
          <input>fcs/fbw/aileron</input>
          <lag>40</lag>
          <rate_limit>1.4</rate_limit>
          <output>fcs/left-aileron-pos-rad</output>
        </actuator>
        <pure_gain name="fcs/right-aileron">
          <input>fcs/left-aileron-pos-rad</input>
          <gain>-1</gain>
          <output>fcs/right-aileron-pos-rad</output>
        </pure_gain>
      </channel>
      <channel name="Yaw (fly-by-wire)">
        <!-- hangar: yaw damper, sideslip feedback, pedals command sideslip -->
        <summer name="fcs/yaw-trim-sum">
          <input>fcs/rudder-cmd-norm</input>
          <input>fcs/yaw-trim-cmd-norm</input>
          <clipto> <min>-1</min> <max>1</max> </clipto>
        </summer>
        <fcs_function name="fcs/fbw/k-yaw-r">
          <function>
            <table>
              <independentVar lookup="row">aero/qbar-psf</independentVar>
              <independentVar lookup="column">velocities/mach</independentVar>
              <tableData>
                       0.150     0.400     0.700     0.900     1.100     1.400     2.000
              10.0  -3.00000  -3.00000  -3.00000  -3.00000  -3.00000  -3.00000  -3.00000
              20.0  -3.00000  -3.00000  -3.00000  -3.00000  -3.00000  -3.00000  -3.00000
              40.0  -2.65712  -2.76706  -2.61967  -2.35892  -3.00000  -3.00000  -3.00000
              80.0  -1.65166  -1.79982  -1.68396  -1.45346  -2.40097  -3.00000  -3.00000
             150.0  -0.57821  -0.76733  -0.75754  -0.68423  -1.14264  -1.78766  -2.27120
             300.0  -0.16750  -0.36900  -0.39686  -0.37390  -0.63291  -0.96569  -1.10317
             600.0   0.00000  -0.19380  -0.23324  -0.22716  -0.39092  -0.59742  -0.65857
            1200.0   0.00000  -0.09322  -0.13775  -0.13956  -0.24618  -0.38419  -0.42761
            2400.0   0.00000  -0.02740  -0.07487  -0.08135  -0.14994  -0.24433  -0.28332
              </tableData>
            </table>
          </function>
        </fcs_function>
        <fcs_function name="fcs/fbw/k-yaw-beta">
          <function>
            <table>
              <independentVar lookup="row">aero/qbar-psf</independentVar>
              <independentVar lookup="column">velocities/mach</independentVar>
              <tableData>
                       0.150     0.400     0.700     0.900     1.100     1.400     2.000
              10.0   3.00000   3.00000   3.00000   3.00000   3.00000   3.00000   3.00000
              20.0   3.00000   3.00000   3.00000   3.00000   3.00000   3.00000   3.00000
              40.0   3.00000   3.00000   2.91218   2.53968   3.00000   3.00000   3.00000
              80.0   0.00000   0.00000   0.00000   0.00000   0.00000   0.00000   0.00000
             150.0   0.00000   0.00000   0.00000   0.00000   0.00000   0.00000   0.00000
             300.0   0.00000   0.00000   0.00000   0.00000   0.00000   0.00000   0.00000
             600.0   0.00000   0.00000   0.00000   0.00000   0.00000   0.00000   0.00000
            1200.0   0.00000   0.00000   0.00000   0.00000   0.00000   0.00000   0.00000
            2400.0   0.00000   0.00000   0.00000   0.00000   0.00000   0.00000   0.00000
              </tableData>
            </table>
          </function>
        </fcs_function>
        <fcs_function name="fcs/fbw/k-pedal">
          <function>
            <table>
              <independentVar lookup="row">aero/qbar-psf</independentVar>
              <independentVar lookup="column">velocities/mach</independentVar>
              <tableData>
                       0.150     0.400     0.700     0.900     1.100     1.400     2.000
              10.0   0.11691   0.11639   0.11460   0.11052   0.18176   0.24342   0.24342
              20.0   0.11691   0.11639   0.11460   0.11052   0.18176   0.24342   0.24342
              40.0   0.11691   0.11639   0.11460   0.11052   0.18176   0.24342   0.24342
              80.0   0.12831   0.12929   0.13117   0.13019   0.21460   0.27536   0.24334
             150.0   0.15202   0.15192   0.15119   0.14790   0.24354   0.31961   0.29862
             300.0   0.16644   0.16600   0.16427   0.15948   0.26243   0.34813   0.33628
             600.0   0.17316   0.17252   0.17022   0.16461   0.27078   0.36122   0.35621
            1200.0   0.17596   0.17524   0.17271   0.16677   0.27429   0.36669   0.36452
            2400.0   0.17701   0.17625   0.17360   0.16748   0.27544   0.36867   0.36798
              </tableData>
            </table>
          </function>
        </fcs_function>
        <!-- the yaw damper damps the sideslip's rate, the stability-axis yaw rate less
             the one that coordinates the bank and the side force: in the dutch roll the
             yaw rate itself, and zero in a steady coordinated turn, in a roll about the
             flight path and in a steady sideslip - it coordinates those as long as they
             last (a damper on the washed-out yaw rate stopped coordinating a sustained
             roll, and at low speed the roll turned the angle of attack into sideslip) -->
        <!-- on the wheels (the pitch's ground mode, fcs/fbw/ground) the pedals move the rudder
             directly over its travel, a ground law: the sideslip feedback, there the
             crosswind's, turned the nose into it, and as the C-17A's nose wheel unloaded
             towards its rotation it ran 8.6 m off its line across 10 m/s -->
        <fcs_function name="fcs/fbw/rudder">
          <function>
            <sum>
              <product>
                <difference><value>1</value><property>fcs/fbw/ground</property></difference>
                <sum>
                  <product><property>fcs/fbw/k-pedal</property><property>fcs/yaw-trim-sum</property></product>
                  <product><value>-1</value><property>fcs/fbw/k-yaw-beta</property>
                    <difference><property>aero/beta-rad</property>
                      <product><value>0.17453</value><property>fcs/yaw-trim-sum</property></product></difference></product>
                  <product><property>fcs/fbw/k-yaw-r</property><property>aero/betadot-rad_sec</property></product>
                </sum>
              </product>
              <product><property>fcs/fbw/ground</property><value>0.52360</value><property>fcs/yaw-trim-sum</property></product>
            </sum>
          </function>
          <clipto> <min>-0.52360</min> <max>0.52360</max> </clipto>
        </fcs_function>
        <actuator name="fcs/rudder-actuator">
          <input>fcs/fbw/rudder</input>
          <lag>40</lag>
          <rate_limit>1.4</rate_limit>
          <output>fcs/rudder-pos-rad</output>
        </actuator>
        <!-- the nose wheel steers with the pedals (JSBSim steers from fcs/steer-cmd-norm,
             positive right; the rudder command is positive left) -->
        <pure_gain name="fcs/steer-from-rudder">
          <input>fcs/yaw-trim-sum</input>
          <gain>-1</gain>
          <output>fcs/steer-cmd-norm</output>
        </pure_gain>
      </channel>
      <channel name="Flaps">
        <kinematic name="fcs/flaps-control">
          <input>fcs/flap-cmd-norm</input>
          <traverse>
            <setting> <position>0.0</position> <time>0.0</time> </setting>
            <setting> <position>6.2</position> <time>2.0</time> </setting>
            <setting> <position>12.5</position> <time>2.0</time> </setting>
            <setting> <position>18.8</position> <time>2.0</time> </setting>
            <setting> <position>25.0</position> <time>2.0</time> </setting>
          </traverse>
          <output>fcs/flap-pos-deg</output>
        </kinematic>
        <pure_gain name="fcs/flaps-normalized">
          <input>fcs/flap-pos-deg</input>
          <gain>0.04</gain>
          <output>fcs/flap-pos-norm</output>
        </pure_gain>
      </channel>
      <channel name="Speedbrake">
        <kinematic name="fcs/speedbrake-control">
          <input>fcs/speedbrake-cmd-norm</input>
          <traverse>
            <setting> <position>0</position> <time>0</time> </setting>
            <setting> <position>1</position> <time>2.00</time> </setting>
          </traverse>
          <output>fcs/speedbrake-pos-norm</output>
        </kinematic>
      </channel>
      <channel name="Leading-Edge Flaps">
        <fcs_function name="fcs/lef-schedule">
          <function>
            <sum>
              <product> <value>1.38</value> <property>aero/alpha-deg</property> </product>
              <product> <value>-9.05</value>
                <quotient> <property>aero/qbar-psf</property> <property>atmosphere/P-psf</property> </quotient>
              </product>
              <value>1.45</value>
            </sum>
          </function>
          <clipto> <min>-3</min> <max>25</max> </clipto>
        </fcs_function>
        <actuator name="fcs/lef-actuator">
          <input>fcs/lef-schedule</input>
          <lag>7.35</lag>
          <rate_limit>25</rate_limit>
          <output>fcs/lef-pos-deg</output>
        </actuator>
      </channel>
      <channel name="Throttle 0">
        <fcs_function name="fcs/throttle-lever-0">
          <function>
            <table>
              <independentVar lookup="row">fcs/throttle-cmd-norm[0]</independentVar>
              <tableData>
                0.0  0.0
                0.8  1.0
                1.0  2.0
              </tableData>
            </table>
          </function>
          <output>fcs/throttle-pos-norm[0]</output>
        </fcs_function>
      </channel>
      <channel name="Landing Gear">
        <kinematic name="fcs/gear-control">
          <input>gear/gear-cmd-norm</input>
          <traverse>
            <setting> <position>0</position> <time>0</time> </setting>
            <setting> <position>1</position> <time>5</time> </setting>
          </traverse>
          <output>gear/gear-pos-norm</output>
        </kinematic>
      </channel>
    </flight_control>
    <aerodynamics>
        <function name="aero/function/mach-lift">
          <description>lift, and damping, over its low-speed value (hangar: aero/mach.py)</description>
          <table>
            <independentVar lookup="row">velocities/mach</independentVar>
            <tableData>
                 0.000     1.000000
                 0.300     1.014721
                 0.500     1.043753
                 0.600     1.066370
                 0.700     1.096828
                 0.800     1.139124
                 0.850     1.167299
                 0.900     1.203269
                 0.950     1.206548
                 1.000     1.209703
                 1.050     1.212282
                 1.100     1.213830
                 1.200     1.212019
                 1.400     1.065627
                 1.600     0.957416
                 1.800     0.858207
                 2.000     0.756810
                 2.300     0.646141
                 2.600     0.565637
            </tableData>
          </table>
        </function>
        <function name="aero/function/mach-side">
          <description>side force, rolling and yawing moment over their low-speed values</description>
          <table>
            <independentVar lookup="row">velocities/mach</independentVar>
            <tableData>
                 0.000     1.000000
                 0.300     1.012547
                 0.500     1.037249
                 0.600     1.056379
                 0.700     1.081781
                 0.800     1.115772
                 0.850     1.137118
                 0.900     1.162363
                 0.950     1.167738
                 1.000     1.166843
                 1.050     1.160456
                 1.100     1.149353
                 1.200     1.116098
                 1.400     0.990667
                 1.600     0.895982
                 1.800     1.101115
                 2.000     0.984488
                 2.300     0.852017
                 2.600     0.752657
            </tableData>
          </table>
        </function>
        <function name="aero/function/mach-dCm-dCL">
          <description>pitching moment per unit low-speed lift: the neutral point's move</description>
          <table>
            <independentVar lookup="row">velocities/mach</independentVar>
            <tableData>
                 0.000     0.000000
                 0.300    -0.003283
                 0.500    -0.010306
                 0.600    -0.016310
                 0.700    -0.025184
                 0.800    -0.039094
                 0.850    -0.049414
                 0.900    -0.063797
                 0.950    -0.080101
                 1.000    -0.098518
                 1.050    -0.116952
                 1.100    -0.133263
                 1.200    -0.150848
                 1.400    -0.137675
                 1.600    -0.128390
                 1.800    -0.131314
                 2.000    -0.122951
                 2.300    -0.113791
                 2.600    -0.107109
            </tableData>
          </table>
        </function>
        <function name="aero/function/mach-dCD0">
          <description>zero-lift drag's change: friction and wave drag</description>
          <table>
            <independentVar lookup="row">velocities/mach</independentVar>
            <tableData>
                 0.000     0.000000
                 0.300    -0.000098
                 0.500    -0.000266
                 0.600    -0.000378
                 0.700    -0.000507
                 0.800    -0.000652
                 0.850    -0.000729
                 0.900    -0.000810
                 0.950    -0.000894
                 1.000     0.000171
                 1.050     0.001490
                 1.100     0.012715
                 1.200     0.012526
                 1.400     0.011748
                 1.600     0.011150
                 1.800     0.010584
                 2.000     0.010040
                 2.300     0.009265
                 2.600     0.008541
            </tableData>
          </table>
        </function>
        <function name="aero/function/mach-dK">
          <description>induced-drag factor's change (per CL^2)</description>
          <table>
            <independentVar lookup="row">velocities/mach</independentVar>
            <tableData>
                 0.000     0.000000
                 0.300     0.005686
                 0.500     0.016203
                 0.600     0.023809
                 0.700     0.033316
                 0.800     0.045276
                 0.850     0.052531
                 0.900     0.061064
                 0.950     0.061804
                 1.000     0.062510
                 1.050     0.064314
                 1.100     0.068044
                 1.200     0.079359
                 1.400     0.096810
                 1.600     0.118123
                 1.800     0.104384
                 2.000     0.077648
                 2.300     0.021803
                 2.600    -0.051970
            </tableData>
          </table>
        </function>
        <function name="aero/function/mach-aileron">
          <description>aileron power over its low-speed value</description>
          <table>
            <independentVar lookup="row">velocities/mach</independentVar>
            <tableData>
                 0.000     1.000000
                 0.300     1.020634
                 0.500     1.063253
                 0.600     1.098492
                 0.700     1.149296
                 0.800     1.227696
                 0.850     1.286233
                 0.900     1.370366
                 0.950     1.277656
                 1.000     1.103227
                 1.050     0.888019
                 1.100     0.672974
                 1.200     0.407142
                 1.400     0.357125
                 1.600     0.320327
                 1.800     0.291007
                 2.000     0.256657
                 2.300     0.219153
                 2.600     0.191864
            </tableData>
          </table>
        </function>
        <function name="aero/function/mach-elevator">
          <description>elevator power over its low-speed value</description>
          <table>
            <independentVar lookup="row">velocities/mach</independentVar>
            <tableData>
                 0.000     1.000000
                 0.300     1.012513
                 0.500     1.038343
                 0.600     1.059644
                 0.700     1.090210
                 0.800     1.137000
                 0.850     1.171743
                 0.900     1.221839
                 0.950     1.130525
                 1.000     0.972578
                 1.050     0.782426
                 1.100     0.594496
                 1.200     0.363014
                 1.400     0.318418
                 1.600     0.285609
                 1.800     0.259466
                 2.000     0.228839
                 2.300     0.195400
                 2.600     0.171069
            </tableData>
          </table>
        </function>
        <function name="aero/function/mach-flap">
          <description>flap power over its low-speed value</description>
          <table>
            <independentVar lookup="row">velocities/mach</independentVar>
            <tableData>
                 0.000     1.000000
                 0.300     1.026733
                 0.500     1.082784
                 0.600     1.129979
                 0.700     1.199396
                 0.800     1.309852
                 0.850     1.395189
                 0.900     1.522797
                 0.950     1.431621
                 1.000     1.241106
                 1.050     0.999590
                 1.100     0.755413
                 1.200     0.452430
                 1.400     0.396849
                 1.600     0.355959
                 1.800     0.323377
                 2.000     0.285206
                 2.300     0.243530
                 2.600     0.213206
            </tableData>
          </table>
        </function>
        <function name="aero/function/mach-rudder">
          <description>rudder power over its low-speed value</description>
          <table>
            <independentVar lookup="row">velocities/mach</independentVar>
            <tableData>
                 0.000     1.000000
                 0.300     1.015420
                 0.500     1.046399
                 0.600     1.071080
                 0.700     1.105104
                 0.800     1.153892
                 0.850     1.187381
                 0.900     1.231300
                 0.950     1.161073
                 1.000     1.039029
                 1.050     0.890372
                 1.100     0.740311
                 1.200     0.536798
                 1.400     0.476471
                 1.600     0.430931
                 1.800     0.529592
                 2.000     0.473499
                 2.300     0.409786
                 2.600     0.361998
            </tableData>
          </table>
        </function>
        <function name="aero/function/CL-base">
          <description>CL over alpha and beta at low speed</description>
          <table>
            <independentVar lookup="row">aero/alpha-deg</independentVar>
            <independentVar lookup="column">aero/beta-deg</independentVar>
            <tableData>
                        -90.00    -70.00    -50.00    -40.00    -30.00    -25.00    -20.00    -15.00    -10.00     -6.00     -3.00      0.00      3.00      6.00     10.00     15.00     20.00     25.00     30.00     40.00     50.00     70.00     90.00
             -180.00  -0.00000   0.00000   0.00000   0.00000   0.00000   0.00000   0.00000   0.00000   0.00000   0.00000   0.00000   0.00000   0.00000   0.00000   0.00000   0.00000   0.00000   0.00000   0.00000   0.00000   0.00000   0.00000  -0.00000
             -120.00   0.00000   0.09769   0.29195   0.40083   0.50203   0.54531   0.58291   0.61334   0.63571   0.64873   0.65437   0.65386   0.65437   0.64873   0.63571   0.61334   0.58291   0.54531   0.50203   0.40083   0.29195   0.09769   0.00000
              -70.00  -0.00000  -0.07740  -0.23469  -0.32328  -0.40558  -0.44126  -0.47200  -0.49690  -0.51522  -0.52476  -0.53004  -0.52909  -0.53004  -0.52476  -0.51522  -0.49690  -0.47200  -0.44126  -0.40558  -0.32328  -0.23469  -0.07740  -0.00000
              -46.00  -0.00000  -0.30190  -0.68136  -0.89690  -1.10589  -1.17882  -1.22916  -1.26362  -1.29635  -1.32025  -1.32897  -1.33192  -1.32897  -1.32025  -1.29635  -1.26362  -1.22916  -1.17882  -1.10589  -0.89690  -0.68136  -0.30190  -0.00000
              -32.00  -0.00000  -0.39780  -0.66505  -0.88080  -1.09494  -1.18668  -1.26322  -1.32623  -1.35400  -1.35884  -1.35940  -1.36074  -1.35940  -1.35884  -1.35400  -1.32623  -1.26322  -1.18668  -1.09494  -0.88080  -0.66505  -0.39780  -0.00000
              -22.00  -0.00000  -0.32454  -0.51216  -0.68114  -0.85042  -0.92247  -0.98672  -1.04811  -1.10034  -1.13255  -1.14853  -1.15454  -1.14853  -1.13255  -1.10034  -1.04811  -0.98672  -0.92247  -0.85042  -0.68114  -0.51216  -0.32454  -0.00000
              -17.00  -0.00000  -0.26076  -0.40643  -0.54149  -0.68101  -0.74088  -0.79857  -0.84663  -0.88439  -0.90429  -0.91217  -0.91444  -0.91217  -0.90429  -0.88439  -0.84663  -0.79857  -0.74088  -0.68101  -0.54149  -0.40643  -0.26076  -0.00000
              -13.00  -0.00000  -0.20511  -0.31695  -0.42458  -0.53877  -0.58633  -0.62843  -0.66012  -0.68210  -0.69227  -0.69654  -0.69799  -0.69654  -0.69227  -0.68210  -0.66012  -0.62843  -0.58633  -0.53877  -0.42458  -0.31695  -0.20511  -0.00000
               -9.00  -0.00000  -0.14792  -0.21392  -0.28523  -0.36713  -0.39690  -0.41920  -0.43460  -0.44518  -0.45055  -0.45279  -0.45352  -0.45279  -0.45055  -0.44518  -0.43460  -0.41920  -0.39690  -0.36713  -0.28523  -0.21392  -0.14792  -0.00000
               -5.00  -0.00000  -0.08734  -0.12758  -0.17177  -0.22451  -0.24124  -0.25228  -0.25973  -0.26497  -0.26757  -0.26860  -0.26892  -0.26860  -0.26757  -0.26497  -0.25973  -0.25228  -0.24124  -0.22451  -0.17177  -0.12758  -0.08734  -0.00000
               -1.00  -0.00000  -0.02160  -0.02594  -0.04224  -0.05808  -0.06006  -0.05879  -0.05696  -0.05554  -0.05475  -0.05438  -0.05422  -0.05438  -0.05475  -0.05554  -0.05696  -0.05879  -0.06006  -0.05808  -0.04224  -0.02594  -0.02160  -0.00000
                3.00   0.00000   0.04615   0.07932   0.09270   0.11142   0.12393   0.13774   0.14927   0.15765   0.16191   0.16366   0.16421   0.16366   0.16191   0.15765   0.14927   0.13774   0.12393   0.11142   0.09270   0.07932   0.04615   0.00000
                7.00   0.00000   0.11507   0.17789   0.22501   0.28138   0.30902   0.33670   0.35822   0.37370   0.38161   0.38491   0.38600   0.38491   0.38161   0.37370   0.35822   0.33670   0.30902   0.28138   0.22501   0.17789   0.11507   0.00000
               11.00   0.00000   0.18290   0.28122   0.36174   0.45269   0.49568   0.53825   0.57171   0.59557   0.60760   0.61256   0.61421   0.61256   0.60760   0.59557   0.57171   0.53825   0.49568   0.45269   0.36174   0.28122   0.18290   0.00000
               15.00   0.00000   0.24262   0.38285   0.49671   0.61561   0.67263   0.73189   0.78019   0.81633   0.83486   0.84228   0.84475   0.84228   0.83486   0.81633   0.78019   0.73189   0.67263   0.61561   0.49671   0.38285   0.24262   0.00000
               19.00   0.00000   0.29471   0.47618   0.61806   0.76176   0.83099   0.90408   0.96581   1.01607   1.04509   1.05881   1.06395   1.05881   1.04509   1.01607   0.96581   0.90408   0.83099   0.76176   0.61806   0.47618   0.29471   0.00000
               23.00   0.00000   0.33989   0.55931   0.73018   0.89792   0.97684   1.05369   1.12172   1.17962   1.21678   1.23335   1.23896   1.23335   1.21678   1.17962   1.12172   1.05369   0.97684   0.89792   0.73018   0.55931   0.33989   0.00000
               27.00   0.00000   0.37820   0.62884   0.82589   1.01619   1.10463   1.18747   1.25773   1.30477   1.33033   1.34180   1.34573   1.34180   1.33033   1.30477   1.25773   1.18747   1.10463   1.01619   0.82589   0.62884   0.37820   0.00000
               32.00   0.00000   0.40824   0.69601   0.91966   1.13957   1.23892   1.32631   1.38515   1.40980   1.41069   1.40563   1.40351   1.40563   1.41069   1.40980   1.38515   1.32631   1.23892   1.13957   0.91966   0.69601   0.40824   0.00000
               46.00   0.00000   0.28518   0.72030   0.95696   1.17434   1.24105   1.28349   1.31691   1.36054   1.38142   1.39042   1.39326   1.39042   1.38142   1.36054   1.31691   1.28349   1.24105   1.17434   0.95696   0.72030   0.28518   0.00000
               70.00   0.00000   0.07748   0.23497   0.32367   0.40611   0.44183   0.47262   0.49755   0.51589   0.52545   0.53073   0.52979   0.53073   0.52545   0.51589   0.49755   0.47262   0.44183   0.40611   0.32367   0.23497   0.07748   0.00000
              120.00  -0.00000  -0.09769  -0.29195  -0.40083  -0.50203  -0.54531  -0.58291  -0.61334  -0.63571  -0.64873  -0.65437  -0.65386  -0.65437  -0.64873  -0.63571  -0.61334  -0.58291  -0.54531  -0.50203  -0.40083  -0.29195  -0.09769  -0.00000
              180.00   0.00000   0.00000   0.00000   0.00000   0.00000   0.00000   0.00000   0.00000   0.00000   0.00000   0.00000   0.00000   0.00000   0.00000   0.00000   0.00000   0.00000   0.00000   0.00000   0.00000   0.00000   0.00000   0.00000
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            </tableData>
          </table>
        </function>
      <axis name="DRAG">
        <function name="aero/coefficient/CD_base">
          <description>CD over alpha and beta (hangar)</description>
          <product>
            <property>aero/qbar-psf</property>
            <property>metrics/Sw-sqft</property>
          <table>
            <independentVar lookup="row">aero/alpha-deg</independentVar>
            <independentVar lookup="column">aero/beta-deg</independentVar>
            <tableData>
                        -90.00    -70.00    -50.00    -40.00    -30.00    -25.00    -20.00    -15.00    -10.00     -6.00     -3.00      0.00      3.00      6.00     10.00     15.00     20.00     25.00     30.00     40.00     50.00     70.00     90.00
             -180.00   0.44661   0.36613   0.21955   0.14769   0.08853   0.06535   0.04686   0.03253   0.01937   0.01765   0.01770   0.01772   0.01770   0.01765   0.01937   0.03253   0.04686   0.06535   0.08853   0.14769   0.21955   0.36613   0.44661
             -120.00   0.44661   0.43481   0.55675   0.68823   0.84426   0.92172   0.99295   1.05369   1.10013   1.12463   1.13542   1.13926   1.13542   1.12463   1.10013   1.05369   0.99295   0.92172   0.84426   0.68823   0.55675   0.43481   0.44661
              -70.00   0.44661   0.46699   0.66169   0.84378   1.05264   1.15485   1.24831   1.32775   1.38841   1.42081   1.43463   1.43943   1.43463   1.42081   1.38841   1.32775   1.24831   1.15485   1.05264   0.84378   0.66169   0.46699   0.44661
              -46.00   0.44661   0.50302   0.69748   0.85567   1.04014   1.11525   1.17274   1.21532   1.25582   1.28551   1.29817   1.30256   1.29817   1.28551   1.25582   1.21532   1.17274   1.11525   1.04014   0.85567   0.69748   0.50302   0.44661
              -32.00   0.44661   0.49036   0.51569   0.55555   0.63552   0.68055   0.72198   0.76189   0.77772   0.77994   0.77957   0.77995   0.77957   0.77994   0.77772   0.76189   0.72198   0.68055   0.63552   0.55555   0.51569   0.49036   0.44661
              -22.00   0.44661   0.45443   0.37538   0.33801   0.34319   0.35258   0.36817   0.38471   0.39713   0.40588   0.41062   0.41248   0.41062   0.40588   0.39713   0.38471   0.36817   0.35258   0.34319   0.33801   0.37538   0.45443   0.44661
              -17.00   0.44661   0.43740   0.32076   0.25587   0.23350   0.23084   0.23914   0.24048   0.24111   0.24161   0.24165   0.24154   0.24165   0.24161   0.24111   0.24048   0.23914   0.23084   0.23350   0.25587   0.32076   0.43740   0.44661
              -13.00   0.44661   0.42674   0.28809   0.20753   0.16917   0.15871   0.15846   0.14998   0.14246   0.13826   0.13649   0.13590   0.13649   0.13826   0.14246   0.14998   0.15846   0.15871   0.16917   0.20753   0.28809   0.42674   0.44661
               -9.00   0.44661   0.41932   0.26449   0.17361   0.12218   0.10524   0.09820   0.08354   0.07181   0.06572   0.06314   0.06228   0.06314   0.06572   0.07181   0.08354   0.09820   0.10524   0.12218   0.17361   0.26449   0.41932   0.44661
               -5.00   0.44661   0.41486   0.25004   0.15402   0.09714   0.07738   0.06790   0.05120   0.03821   0.03149   0.02867   0.02773   0.02867   0.03149   0.03821   0.05120   0.06790   0.07738   0.09714   0.15402   0.25004   0.41486   0.44661
               -1.00   0.44661   0.41268   0.24655   0.14629   0.08767   0.06671   0.05610   0.03865   0.02525   0.01836   0.01548   0.01453   0.01548   0.01836   0.02525   0.03865   0.05610   0.06671   0.08767   0.14629   0.24655   0.41268   0.44661
                3.00   0.44661   0.41294   0.24945   0.14877   0.09032   0.06980   0.05953   0.04248   0.02946   0.02276   0.01996   0.01903   0.01996   0.02276   0.02946   0.04248   0.05953   0.06980   0.09032   0.14877   0.24945   0.41294   0.44661
                7.00   0.44661   0.41594   0.25803   0.16176   0.10605   0.08769   0.07953   0.06426   0.05249   0.04641   0.04386   0.04301   0.04386   0.04641   0.05249   0.06426   0.07953   0.08769   0.10605   0.16176   0.25803   0.41594   0.44661
               11.00   0.44661   0.42204   0.27599   0.18758   0.14019   0.12641   0.12265   0.11178   0.10302   0.09841   0.09644   0.09578   0.09644   0.09841   0.10302   0.11178   0.12265   0.12641   0.14019   0.18758   0.27599   0.42204   0.44661
               15.00   0.44661   0.43161   0.30434   0.22823   0.19516   0.18847   0.19225   0.18972   0.18737   0.18614   0.18550   0.18529   0.18550   0.18614   0.18737   0.18972   0.19225   0.18847   0.19516   0.22823   0.30434   0.43161   0.44661
               19.00   0.44661   0.44386   0.34223   0.28444   0.26961   0.27236   0.28673   0.29478   0.30219   0.30733   0.31008   0.31123   0.31008   0.30733   0.30219   0.29478   0.28673   0.27236   0.26961   0.28444   0.34223   0.44386   0.44661
               23.00   0.44661   0.45816   0.38884   0.35570   0.36507   0.37979   0.40336   0.42246   0.43997   0.45232   0.45801   0.45996   0.45801   0.45232   0.43997   0.42246   0.40336   0.37979   0.36507   0.35570   0.38884   0.45816   0.44661
               27.00   0.44661   0.47387   0.44280   0.44045   0.47951   0.50938   0.54356   0.57453   0.59517   0.60599   0.61093   0.61263   0.61093   0.60599   0.59517   0.57453   0.54356   0.50938   0.47951   0.44045   0.44280   0.47387   0.44661
               32.00   0.44661   0.49325   0.51697   0.56051   0.64650   0.69797   0.74766   0.78731   0.80303   0.80382   0.80072   0.79939   0.80072   0.80382   0.80303   0.78731   0.74766   0.69797   0.64650   0.56051   0.51697   0.49325   0.44661
               46.00   0.44661   0.49880   0.70614   0.88742   1.08755   1.15962   1.21254   1.25822   1.31163   1.34159   1.35435   1.35853   1.35435   1.34159   1.31163   1.25822   1.21254   1.15962   1.08755   0.88742   0.70614   0.49880   0.44661
               70.00   0.44661   0.46699   0.66169   0.84379   1.05265   1.15485   1.24832   1.32775   1.38841   1.42081   1.43463   1.43943   1.43463   1.42081   1.38841   1.32775   1.24832   1.15485   1.05265   0.84379   0.66169   0.46699   0.44661
              120.00   0.44661   0.43481   0.55675   0.68823   0.84426   0.92172   0.99295   1.05369   1.10013   1.12463   1.13542   1.13926   1.13542   1.12463   1.10013   1.05369   0.99295   0.92172   0.84426   0.68823   0.55675   0.43481   0.44661
              180.00   0.44661   0.36613   0.21955   0.14769   0.08853   0.06535   0.04686   0.03253   0.01937   0.01765   0.01770   0.01772   0.01770   0.01765   0.01937   0.03253   0.04686   0.06535   0.08853   0.14769   0.21955   0.36613   0.44661
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            </tableData>
          </table>
          </product>
        </function>
        <function name="aero/coefficient/CD_mach">
          <description>zero-lift drag's change with Mach: friction, wave drag</description>
          <product>
            <property>aero/qbar-psf</property>
            <property>metrics/Sw-sqft</property>
            <property>aero/function/mach-dCD0</property>
          </product>
        </function>
        <function name="aero/coefficient/CD_induced_mach">
          <description>induced drag's change with Mach (leading-edge suction lost)</description>
          <product>
            <property>aero/qbar-psf</property>
            <property>metrics/Sw-sqft</property>
            <property>aero/cl-squared</property>
            <property>aero/function/mach-dK</property>
          </product>
        </function>
        <function name="aero/coefficient/CD_aileron">
          <description>CD increment from aileron (deg), over alpha</description>
          <product>
            <property>aero/qbar-psf</property>
            <property>metrics/Sw-sqft</property>
            <property>aero/function/mach-aileron</property>
          <table>
            <independentVar lookup="row">aero/alpha-deg</independentVar>
            <independentVar lookup="column">fcs/left-aileron-pos-deg</independentVar>
            <tableData>
                        -25.00    -20.00    -15.00    -10.00     -5.00      0.00      5.00     10.00     15.00     20.00     25.00
             -180.00   0.01046   0.00685   0.00392   0.00177   0.00044   0.00000   0.00044   0.00177   0.00392   0.00685   0.01046
             -120.00   0.01045   0.00685   0.00392   0.00176   0.00044   0.00000   0.00044   0.00176   0.00392   0.00685   0.01045
              -70.00   0.01045   0.00685   0.00392   0.00176   0.00044   0.00000   0.00044   0.00176   0.00392   0.00685   0.01045
              -46.00   0.00550   0.00348   0.00201   0.00114   0.00057   0.00000   0.00057   0.00114   0.00201   0.00348   0.00550
              -32.00   0.00834   0.00524   0.00277   0.00108   0.00023   0.00000   0.00023   0.00108   0.00277   0.00524   0.00834
              -22.00   0.01855   0.01374   0.00908   0.00463   0.00125   0.00000   0.00125   0.00463   0.00908   0.01374   0.01855
              -17.00   0.02183   0.01638   0.01097   0.00567   0.00155   0.00000   0.00155   0.00567   0.01097   0.01638   0.02183
              -13.00   0.02383   0.01791   0.01203   0.00627   0.00172   0.00000   0.00172   0.00627   0.01203   0.01791   0.02383
               -9.00   0.02700   0.02026   0.01363   0.00713   0.00197   0.00000   0.00197   0.00713   0.01363   0.02026   0.02700
               -5.00   0.03035   0.02288   0.01536   0.00795   0.00218   0.00000   0.00218   0.00795   0.01536   0.02288   0.03035
               -1.00   0.03026   0.02286   0.01543   0.00807   0.00222   0.00000   0.00222   0.00807   0.01543   0.02286   0.03026
                3.00   0.03042   0.02297   0.01549   0.00807   0.00222   0.00000   0.00222   0.00807   0.01549   0.02297   0.03042
                7.00   0.02952   0.02218   0.01517   0.00816   0.00232   0.00000   0.00232   0.00816   0.01517   0.02218   0.02952
               11.00   0.03073   0.02417   0.01715   0.00949   0.00275   0.00000   0.00275   0.00949   0.01715   0.02417   0.03073
               15.00   0.03053   0.02422   0.01745   0.00985   0.00290   0.00000   0.00290   0.00985   0.01745   0.02422   0.03053
               19.00   0.02557   0.02011   0.01437   0.00810   0.00239   0.00000   0.00239   0.00810   0.01437   0.02011   0.02557
               23.00   0.01829   0.01371   0.00920   0.00478   0.00131   0.00000   0.00131   0.00478   0.00920   0.01371   0.01829
               27.00   0.01088   0.00721   0.00398   0.00153   0.00030   0.00000   0.00030   0.00153   0.00398   0.00721   0.01088
               32.00   0.00220  -0.00022  -0.00164  -0.00169  -0.00066   0.00000  -0.00066  -0.00169  -0.00164  -0.00022   0.00220
               46.00  -0.00265  -0.00342  -0.00327  -0.00212  -0.00065   0.00000  -0.00065  -0.00212  -0.00327  -0.00342  -0.00265
               70.00   0.01045   0.00685   0.00392   0.00176   0.00044   0.00000   0.00044   0.00176   0.00392   0.00685   0.01045
              120.00   0.01045   0.00685   0.00392   0.00176   0.00044   0.00000   0.00044   0.00176   0.00392   0.00685   0.01045
              180.00   0.01046   0.00685   0.00392   0.00177   0.00044   0.00000   0.00044   0.00177   0.00392   0.00685   0.01046
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            </tableData>
          </table>
          </product>
        </function>
        <function name="aero/coefficient/CD_elevator">
          <description>CD increment from elevator (deg), over alpha</description>
          <product>
            <property>aero/qbar-psf</property>
            <property>metrics/Sw-sqft</property>
            <property>aero/function/mach-elevator</property>
          <table>
            <independentVar lookup="row">aero/alpha-deg</independentVar>
            <independentVar lookup="column">fcs/elevator-pos-deg</independentVar>
            <tableData>
                        -25.00    -20.00    -15.00    -10.00     -5.00      0.00      5.00     10.00     15.00     20.00     25.00     30.00     35.00     40.00     45.00     50.00
             -180.00   0.02397   0.02036   0.01153   0.00331   0.00070   0.00000   0.00070   0.00331   0.01153   0.02036   0.03124   0.03966   0.04898   0.05892   0.06916   0.07940
             -120.00   0.03611   0.03250   0.02525   0.01725   0.00874   0.00000  -0.00872  -0.01715  -0.02504  -0.03215  -0.03825  -0.04735  -0.05556  -0.06263  -0.06834  -0.07422
              -70.00   0.03188   0.02827  -0.02052  -0.01363  -0.00670   0.00000   0.00625   0.01187   0.01668   0.02054   0.02333   0.02079   0.01660   0.01089   0.00383  -0.00436
              -46.00   0.02528   0.01528   0.01904   0.01795   0.01092   0.00000  -0.01137  -0.02059  -0.02509  -0.02471  -0.02180  -0.01315  -0.00578   0.00046   0.00570   0.01014
              -32.00   0.04343   0.03118   0.02762   0.02134   0.01141   0.00000  -0.01017  -0.01611  -0.01499  -0.00727   0.00425   0.02343   0.04192   0.05965   0.07663   0.09295
              -22.00   0.06641   0.05232   0.03980   0.02623   0.01203   0.00000  -0.00768  -0.00873  -0.00081   0.01551   0.03767   0.06885   0.10116   0.13425   0.16785   0.20186
              -17.00   0.07290   0.05914   0.04268   0.02612   0.01095   0.00000  -0.00478  -0.00157   0.01155   0.03417   0.06413   0.10216   0.14310   0.18656   0.23221   0.27984
              -13.00   0.07723   0.06413   0.04686   0.02855   0.01140   0.00000  -0.00362   0.00162   0.01704   0.04206   0.07483   0.11380   0.15686   0.20367   0.25395   0.30751
               -9.00   0.08013   0.06800   0.05007   0.03140   0.01329   0.00000  -0.00469   0.00047   0.01562   0.03973   0.07136   0.10594   0.14536   0.18943   0.23800   0.29050
               -5.00   0.06935   0.05900   0.04086   0.02433   0.00968   0.00000  -0.00211   0.00567   0.02284   0.04748   0.07869   0.11048   0.14776   0.19044   0.23843   0.29006
               -1.00   0.05815   0.05013   0.02996   0.01496   0.00459   0.00000   0.00219   0.01116   0.02692   0.04894   0.07703   0.10393   0.13679   0.17566   0.22035   0.26866
                3.00   0.05233   0.04652   0.02363   0.00759  -0.00027   0.00000   0.00720   0.01970   0.03526   0.05448   0.07902   0.10043   0.12817   0.16235   0.20254   0.24640
                7.00   0.04990   0.04606   0.02070   0.00390  -0.00304   0.00000   0.01145   0.02783   0.04528   0.06284   0.08349   0.09886   0.12079   0.14949   0.18433   0.22334
               11.00   0.04554   0.04613   0.02212   0.00602  -0.00158   0.00000   0.01117   0.02890   0.04756   0.06500   0.08285   0.09221   0.10794   0.13058   0.15956   0.19343
               15.00   0.05071   0.05329   0.02846   0.01110   0.00156   0.00000   0.00719   0.02189   0.03929   0.05604   0.07263   0.07792   0.08781   0.10422   0.12720   0.15561
               19.00   0.04936   0.05387   0.03024   0.01355   0.00363   0.00000   0.00340   0.01324   0.02613   0.04000   0.05487   0.05821   0.06429   0.07487   0.09139   0.11350
               23.00   0.03717   0.04336   0.02368   0.01046   0.00317   0.00000   0.00128   0.00715   0.01513   0.02370   0.03440   0.03539   0.03917   0.04585   0.05664   0.07219
               27.00   0.02252   0.02972   0.01479   0.00570   0.00172   0.00000  -0.00012   0.00176   0.00462   0.00792   0.01249   0.00944   0.01050   0.01453   0.02167   0.03229
               32.00   0.00757   0.01478   0.00447  -0.00060  -0.00096   0.00000   0.00009  -0.00105  -0.00351  -0.00651  -0.00824  -0.01730  -0.02304  -0.02275  -0.01902  -0.01237
               46.00  -0.01634  -0.00973  -0.01175  -0.01009  -0.00506   0.00000   0.00198  -0.00083  -0.00879  -0.02026  -0.03299  -0.05157  -0.06847  -0.08306  -0.09481  -0.10373
               70.00   0.02414   0.02054   0.01668   0.01187   0.00625   0.00000  -0.00670  -0.01363  -0.02052   0.02813   0.10351   0.11211   0.07344   0.03439  -0.00267  -0.03558
              120.00  -0.02854  -0.03215  -0.02504  -0.01715  -0.00872   0.00000   0.00874   0.01725   0.02525   0.03250   0.03879   0.03975   0.03895   0.03642   0.03223   0.02652
              180.00   0.02397   0.02036   0.01153   0.00331   0.00070   0.00000   0.00070   0.00331   0.01153   0.02036   0.03124   0.03966   0.04898   0.05892   0.06916   0.07940
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            </tableData>
          </table>
          </product>
        </function>
        <function name="aero/coefficient/CD_flap">
          <description>CD increment from flap (deg), over alpha</description>
          <product>
            <property>aero/qbar-psf</property>
            <property>metrics/Sw-sqft</property>
            <property>aero/function/mach-flap</property>
          <table>
            <independentVar lookup="row">aero/alpha-deg</independentVar>
            <independentVar lookup="column">fcs/flap-pos-deg</independentVar>
            <tableData>
                        -25.00    -20.00    -15.00    -10.00     -5.00      0.00      5.00     10.00     15.00     20.00     25.00
             -180.00   0.00393   0.00257   0.00147   0.00066   0.00017   0.00000   0.00017   0.00066   0.00147   0.00257   0.00393
             -120.00   0.00392   0.00257   0.00147   0.00066   0.00017   0.00000   0.00017   0.00066   0.00147   0.00257   0.00392
              -70.00   0.00392   0.00257   0.00147   0.00066   0.00017   0.00000   0.00017   0.00066   0.00147   0.00257   0.00392
              -46.00   0.03856   0.03420   0.02867   0.02107   0.01115   0.00000  -0.00997  -0.01974  -0.02703  -0.03177  -0.03490
              -32.00   0.04340   0.03751   0.03079   0.02346   0.01180   0.00000  -0.01137  -0.02131  -0.02858  -0.03327  -0.03633
              -22.00   0.05743   0.04961   0.03991   0.02740   0.01321   0.00000  -0.01130  -0.02009  -0.02614  -0.02992  -0.03232
              -17.00   0.05437   0.04729   0.03849   0.02692   0.01323   0.00000  -0.01100  -0.01908  -0.02423  -0.02717  -0.02883
              -13.00   0.04603   0.03990   0.03241   0.02270   0.01122   0.00000  -0.00934  -0.01606  -0.02008  -0.02210  -0.02295
               -9.00   0.03420   0.02916   0.02327   0.01598   0.00774   0.00000  -0.00612  -0.01015  -0.01213  -0.01261  -0.01219
               -5.00   0.02286   0.01890   0.01456   0.00956   0.00436   0.00000  -0.00286  -0.00406  -0.00389  -0.00286  -0.00133
               -1.00   0.01301   0.01004   0.00704   0.00403   0.00144   0.00000   0.00004   0.00140   0.00351   0.00588   0.00840
                3.00   0.00332   0.00132  -0.00035  -0.00145  -0.00147   0.00000   0.00296   0.00689   0.01093   0.01464   0.01815
                7.00  -0.00706  -0.00792  -0.00812  -0.00720  -0.00457   0.00000   0.00618   0.01303   0.01928   0.02449   0.02907
               11.00  -0.01329  -0.01354  -0.01322  -0.01161  -0.00740   0.00000   0.00971   0.01993   0.02871   0.03561   0.04137
               15.00  -0.01497  -0.01456  -0.01370  -0.01199  -0.00806   0.00000   0.01188   0.02483   0.03587   0.04433   0.05118
               19.00  -0.01720  -0.01583  -0.01378  -0.01090  -0.00693   0.00000   0.01150   0.02542   0.03781   0.04735   0.05503
               23.00  -0.02144  -0.01928  -0.01620  -0.01190  -0.00665   0.00000   0.01005   0.02312   0.03556   0.04545   0.05350
               27.00  -0.02489  -0.02221  -0.01839  -0.01302  -0.00663   0.00000   0.00828   0.01929   0.03072   0.04030   0.04827
               32.00  -0.02850  -0.02562  -0.02140  -0.01527  -0.00766   0.00000   0.00729   0.01498   0.02278   0.02981   0.03615
               46.00  -0.03018  -0.02727  -0.02299  -0.01666  -0.00854   0.00000   0.00778   0.01415   0.01896   0.02264   0.02579
               70.00   0.00392   0.00257   0.00147   0.00066   0.00017   0.00000   0.00017   0.00066   0.00147   0.00257   0.00392
              120.00   0.00392   0.00257   0.00147   0.00066   0.00017   0.00000   0.00017   0.00066   0.00147   0.00257   0.00392
              180.00   0.00393   0.00257   0.00147   0.00066   0.00017   0.00000   0.00017   0.00066   0.00147   0.00257   0.00393
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            </tableData>
          </table>
          </product>
        </function>
        <function name="aero/coefficient/CD_rudder">
          <description>CD increment from rudder (deg), over alpha</description>
          <product>
            <property>aero/qbar-psf</property>
            <property>metrics/Sw-sqft</property>
            <property>aero/function/mach-rudder</property>
          <table>
            <independentVar lookup="row">aero/alpha-deg</independentVar>
            <independentVar lookup="column">fcs/rudder-pos-deg</independentVar>
            <tableData>
                        -30.00    -25.00    -20.00    -15.00    -10.00     -5.00      0.00      5.00     10.00     15.00     20.00     25.00     30.00
             -180.00   0.00601   0.00430   0.00281   0.00161   0.00073   0.00018   0.00000   0.00018   0.00073   0.00161   0.00281   0.00430   0.00601
             -120.00   0.00075   0.00054   0.00035   0.00020   0.00009   0.00002   0.00000   0.00002   0.00009   0.00020   0.00035   0.00054   0.00075
              -70.00   0.00025   0.00018   0.00012   0.00007   0.00003   0.00001   0.00000   0.00001   0.00003   0.00007   0.00012   0.00018   0.00025
              -46.00   0.00447   0.00353   0.00265   0.00177   0.00092   0.00026   0.00000   0.00026   0.00092   0.00177   0.00264   0.00353   0.00447
              -32.00   0.00862   0.00677   0.00505   0.00336   0.00173   0.00047   0.00000   0.00047   0.00173   0.00336   0.00505   0.00677   0.00862
              -22.00   0.01090   0.00859   0.00642   0.00429   0.00222   0.00061   0.00000   0.00061   0.00222   0.00429   0.00642   0.00859   0.01090
              -17.00   0.01198   0.00944   0.00705   0.00470   0.00243   0.00067   0.00000   0.00067   0.00243   0.00470   0.00705   0.00944   0.01198
              -13.00   0.01263   0.00995   0.00743   0.00495   0.00256   0.00070   0.00000   0.00070   0.00256   0.00495   0.00743   0.00995   0.01264
               -9.00   0.01311   0.01033   0.00771   0.00514   0.00265   0.00073   0.00000   0.00073   0.00265   0.00514   0.00771   0.01033   0.01312
               -5.00   0.01340   0.01056   0.00787   0.00524   0.00271   0.00074   0.00000   0.00074   0.00271   0.00525   0.00788   0.01056   0.01341
               -1.00   0.01351   0.01063   0.00793   0.00528   0.00273   0.00075   0.00000   0.00075   0.00273   0.00528   0.00793   0.01064   0.01351
                3.00   0.01341   0.01056   0.00787   0.00524   0.00271   0.00074   0.00000   0.00074   0.00271   0.00524   0.00787   0.01056   0.01342
                7.00   0.01313   0.01033   0.00770   0.00512   0.00265   0.00072   0.00000   0.00072   0.00265   0.00513   0.00770   0.01034   0.01313
               11.00   0.01266   0.00996   0.00742   0.00494   0.00255   0.00070   0.00000   0.00070   0.00255   0.00494   0.00742   0.00997   0.01267
               15.00   0.01203   0.00946   0.00704   0.00468   0.00242   0.00066   0.00000   0.00066   0.00242   0.00468   0.00704   0.00946   0.01203
               19.00   0.01123   0.00883   0.00657   0.00437   0.00225   0.00062   0.00000   0.00062   0.00225   0.00437   0.00657   0.00883   0.01124
               23.00   0.01032   0.00810   0.00603   0.00400   0.00207   0.00057   0.00000   0.00057   0.00207   0.00401   0.00603   0.00811   0.01032
               27.00   0.00930   0.00730   0.00543   0.00360   0.00186   0.00051   0.00000   0.00051   0.00186   0.00361   0.00543   0.00731   0.00931
               32.00   0.00804   0.00631   0.00469   0.00312   0.00161   0.00044   0.00000   0.00044   0.00161   0.00312   0.00469   0.00632   0.00805
               46.00   0.00469   0.00371   0.00279   0.00187   0.00097   0.00027   0.00000   0.00027   0.00097   0.00187   0.00279   0.00371   0.00469
               70.00   0.00025   0.00018   0.00012   0.00007   0.00003   0.00001   0.00000   0.00001   0.00003   0.00007   0.00012   0.00018   0.00025
              120.00   0.00075   0.00054   0.00035   0.00020   0.00009   0.00002   0.00000   0.00002   0.00009   0.00020   0.00035   0.00054   0.00075
              180.00   0.00601   0.00430   0.00281   0.00161   0.00073   0.00018   0.00000   0.00018   0.00073   0.00161   0.00281   0.00430   0.00601
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            </tableData>
          </table>
          </product>
        </function>
        <function name="aero/coefficient/CD_ground">
          <description>Induced drag change in ground effect</description>
          <product>
            <property>aero/qbar-psf</property>
            <property>metrics/Sw-sqft</property>
            <property>aero/cl-squared</property>
            <value>0.14808</value>
          <table>
            <independentVar lookup="row">aero/h_b-mac-ft</independentVar>
            <tableData>
                    0.00   -1.00000
                    0.10   -0.28090
                    0.20   -0.08897
                    0.40   -0.02383
                    0.60   -0.01073
                    0.80   -0.00607
                    1.00   -0.00389
                    1.10   -0.00322
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            </tableData>
          </table>
          </product>
        </function>
        <function name="aero/coefficient/CD_airbrakes">
          <description>airbrakes: drag of its airbrake plates, 1.93 m2 opened to 50 deg (hangar)</description>
          <product>
            <property>aero/qbar-psf</property>
            <property>metrics/Sw-sqft</property>
            <value>0.0621658</value>
            <pow>
              <sin>
                <product>
                  <property>fcs/speedbrake-pos-norm</property>
                  <value>0.872665</value>
                </product>
              </sin>
              <value>2</value>
            </pow>
          </product>
        </function>
        <function name="aero/coefficient/CD_gear">
          <description>the gear extended: its wheels' and struts' drag by Raymer's components, 0.303 m2 (hangar)</description>
          <product>
            <property>aero/qbar-psf</property>
            <property>metrics/Sw-sqft</property>
            <value>0.00811506</value>
            <property>gear/gear-pos-norm</property>
          </product>
        </function>
      </axis>
      <axis name="SIDE">
        <function name="aero/coefficient/CY_base">
          <description>CY over alpha and beta (hangar)</description>
          <product>
            <property>aero/qbar-psf</property>
            <property>metrics/Sw-sqft</property>
            <property>aero/function/mach-side</property>
          <table>
            <independentVar lookup="row">aero/alpha-deg</independentVar>
            <independentVar lookup="column">aero/beta-deg</independentVar>
            <tableData>
                        -90.00    -70.00    -50.00    -40.00    -30.00    -25.00    -20.00    -15.00    -10.00     -6.00     -3.00      0.00      3.00      6.00     10.00     15.00     20.00     25.00     30.00     40.00     50.00     70.00     90.00
             -180.00  -0.00000   0.13339   0.18048   0.16684   0.13306   0.11155   0.08847   0.06813   0.10417   0.11349   0.06011  -0.00000  -0.06011  -0.11349  -0.10417  -0.06813  -0.08847  -0.11155  -0.13306  -0.16684  -0.18048  -0.13339   0.00000
              -35.00   0.00000  -0.10645  -0.11896  -0.17629  -0.20250  -0.19365  -0.16725  -0.09060  -0.06054  -0.03618  -0.01899  -0.00000   0.01899   0.03618   0.06054   0.09060   0.16725   0.19365   0.20250   0.17629   0.11896   0.10645  -0.00000
              -11.00   0.00000   0.12644   0.18075   0.14556   0.11749   0.10820   0.13818   0.11141   0.07581   0.04584   0.02297  -0.00000  -0.02297  -0.04584  -0.07581  -0.11141  -0.13818  -0.10820  -0.11749  -0.14556  -0.18075  -0.12644  -0.00000
                4.00   0.00000   0.15060   0.20645   0.17438   0.14533   0.13419   0.15629   0.12361   0.08374   0.05040   0.02516  -0.00000  -0.02516  -0.05040  -0.08374  -0.12361  -0.15629  -0.13419  -0.14533  -0.17438  -0.20645  -0.15060  -0.00000
               19.00   0.00000   0.06463   0.11116   0.06964   0.04159   0.03518   0.06366   0.05266   0.03419   0.01997   0.00968  -0.00000  -0.00968  -0.01997  -0.03419  -0.05266  -0.06366  -0.03518  -0.04159  -0.06964  -0.11116  -0.06463  -0.00000
               42.00   0.00000  -0.16020  -0.26908  -0.33564  -0.36054  -0.33553  -0.28487  -0.21177  -0.11825  -0.07171  -0.03507  -0.00000   0.03507   0.07171   0.11825   0.21177   0.28487   0.33553   0.36054   0.33564   0.26908   0.16020  -0.00000
              180.00  -0.00000   0.13339   0.18048   0.16684   0.13306   0.11155   0.08847   0.06813   0.10417   0.11349   0.06011  -0.00000  -0.06011  -0.11349  -0.10417  -0.06813  -0.08847  -0.11155  -0.13306  -0.16684  -0.18048  -0.13339   0.00000
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            </tableData>
          </table>
          </product>
        </function>
        <function name="aero/coefficient/CY_aileron">
          <description>CY increment from aileron (deg), over alpha</description>
          <product>
            <property>aero/qbar-psf</property>
            <property>metrics/Sw-sqft</property>
            <property>aero/function/mach-aileron</property>
          <table>
            <independentVar lookup="row">aero/alpha-deg</independentVar>
            <independentVar lookup="column">fcs/left-aileron-pos-deg</independentVar>
            <tableData>
                        -25.00    -20.00    -15.00    -10.00     -5.00      0.00      5.00     10.00     15.00     20.00     25.00
             -180.00   0.00000   0.00000   0.00000   0.00000   0.00000   0.00000   0.00000   0.00000   0.00000   0.00000   0.00000
              -35.00   0.00995   0.00870   0.00716   0.00513   0.00266   0.00000  -0.00266  -0.00513  -0.00716  -0.00870  -0.00995
              -11.00   0.01594   0.01415   0.01184   0.00866   0.00456   0.00000  -0.00456  -0.00866  -0.01184  -0.01415  -0.01594
                4.00   0.01936   0.01715   0.01432   0.01045   0.00550   0.00000  -0.00550  -0.01046  -0.01433  -0.01715  -0.01936
               19.00   0.02536   0.02220   0.01836   0.01332   0.00699   0.00000  -0.00699  -0.01332  -0.01836  -0.02220  -0.02536
               42.00  -0.00142  -0.00146  -0.00159  -0.00174  -0.00137   0.00000   0.00137   0.00174   0.00159   0.00146   0.00142
              180.00   0.00000   0.00000   0.00000   0.00000   0.00000   0.00000   0.00000   0.00000   0.00000   0.00000   0.00000
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            </tableData>
          </table>
          </product>
        </function>
        <function name="aero/coefficient/CY_rudder">
          <description>CY increment from rudder (deg), over alpha</description>
          <product>
            <property>aero/qbar-psf</property>
            <property>metrics/Sw-sqft</property>
            <property>aero/function/mach-rudder</property>
          <table>
            <independentVar lookup="row">aero/alpha-deg</independentVar>
            <independentVar lookup="column">fcs/rudder-pos-deg</independentVar>
            <tableData>
                        -30.00    -25.00    -20.00    -15.00    -10.00     -5.00      0.00      5.00     10.00     15.00     20.00     25.00     30.00
             -180.00   0.00000   0.00000   0.00000   0.00000   0.00000   0.00000   0.00000   0.00000   0.00000   0.00000   0.00000   0.00000   0.00000
              -35.00  -0.05573  -0.05092  -0.04540  -0.03813  -0.02797  -0.01479   0.00000   0.01479   0.02797   0.03813   0.04540   0.05093   0.05574
              -11.00  -0.07006  -0.06386  -0.05682  -0.04768  -0.03501  -0.01854   0.00000   0.01854   0.03501   0.04769   0.05683   0.06388   0.07009
                4.00  -0.06889  -0.06285  -0.05597  -0.04702  -0.03455  -0.01831   0.00000   0.01831   0.03455   0.04702   0.05599   0.06287   0.06892
               19.00  -0.05799  -0.05290  -0.04710  -0.03955  -0.02904  -0.01537   0.00000   0.01537   0.02904   0.03955   0.04712   0.05293   0.05803
               42.00  -0.05223  -0.04809  -0.04325  -0.03661  -0.02690  -0.01419   0.00000   0.01419   0.02689   0.03661   0.04324   0.04808   0.05222
              180.00   0.00000   0.00000   0.00000   0.00000   0.00000   0.00000   0.00000   0.00000   0.00000   0.00000   0.00000   0.00000   0.00000
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            </tableData>
          </table>
          </product>
        </function>
        <function name="aero/coefficient/CYp">
          <description>CY per p (non-dimensional), over alpha</description>
          <product>
            <property>aero/qbar-psf</property>
            <property>metrics/Sw-sqft</property>
            <property>aero/bi2vel</property>
            <property>velocities/p-aero-rad_sec</property>
            <property>aero/function/mach-lift</property>
          <table>
            <independentVar lookup="row">aero/alpha-deg</independentVar>
            <tableData>
                 -180.00   -0.43505
                 -165.00   -0.50986
                  -32.00   -0.19230
                  -10.00   -0.16676
                    5.00   -0.13515
                   20.00   -0.13001
                   46.00   -0.32924
                  180.00   -0.43505
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            </tableData>
          </table>
          </product>
        </function>
        <function name="aero/coefficient/CYr">
          <description>CY per r (non-dimensional), over alpha</description>
          <product>
            <property>aero/qbar-psf</property>
            <property>metrics/Sw-sqft</property>
            <property>aero/bi2vel</property>
            <property>velocities/r-aero-rad_sec</property>
            <property>aero/function/mach-lift</property>
          <table>
            <independentVar lookup="row">aero/alpha-deg</independentVar>
            <tableData>
                 -180.00    1.20337
                 -165.00    0.89790
                  -32.00    0.33052
                  -10.00    0.43510
                    5.00    0.42425
                   20.00    0.33724
                   46.00    0.30130
                  180.00    1.20337
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            </tableData>
          </table>
          </product>
        </function>
      </axis>
      <axis name="LIFT">
        <function name="aero/coefficient/CL_base">
          <description>CL over alpha and beta, ground effect, compressibility (hangar)</description>
          <product>
            <property>aero/qbar-psf</property>
            <property>metrics/Sw-sqft</property>
            <property>aero/function/CL-base</property>
            <property>aero/function/mach-lift</property>
          <table>
            <independentVar lookup="row">aero/h_b-mac-ft</independentVar>
            <tableData>
                    0.00    1.20000
                    0.10    1.08692
                    0.20    1.03778
                    0.40    1.00713
                    0.60    1.00135
                    0.80    1.00025
                    1.00    1.00005
                    1.10    1.00000
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            </tableData>
          </table>
          </product>
        </function>
        <function name="aero/coefficient/CL_elevator">
          <description>CL increment from elevator (deg), over alpha</description>
          <product>
            <property>aero/qbar-psf</property>
            <property>metrics/Sw-sqft</property>
            <property>aero/function/mach-elevator</property>
          <table>
            <independentVar lookup="row">aero/alpha-deg</independentVar>
            <independentVar lookup="column">fcs/elevator-pos-deg</independentVar>
            <tableData>
                        -25.00    -20.00    -15.00    -10.00     -5.00      0.00      5.00     10.00     15.00     20.00     25.00     30.00     35.00     40.00     45.00     50.00
             -180.00   0.03777   0.03777   0.02938   0.04187   0.04070   0.00000  -0.04070  -0.04187  -0.02938  -0.03777  -0.04501  -0.05088  -0.05521  -0.05786  -0.05875  -0.05786
              -35.00  -0.15791  -0.14257  -0.12822  -0.09932  -0.05477   0.00000   0.05848   0.11393   0.16060   0.19893   0.23333   0.25050   0.26959   0.29039   0.31275   0.33662
              -11.00  -0.25829  -0.22971  -0.19859  -0.14946  -0.07994   0.00000   0.07997   0.15087   0.20316   0.23771   0.26275   0.25655   0.25360   0.25468   0.26072   0.27254
                4.00  -0.26013  -0.22735  -0.20001  -0.15305  -0.08340   0.00000   0.08356   0.15559   0.20589   0.23357   0.24731   0.22885   0.21091   0.19432   0.18087   0.17324
               19.00  -0.24959  -0.21769  -0.18188  -0.13241  -0.06863   0.00000   0.06373   0.11516   0.15043   0.17031   0.18026   0.16553   0.14927   0.12941   0.10793   0.08813
               42.00  -0.19557  -0.18065  -0.14510  -0.10274  -0.05287   0.00000   0.05034   0.09216   0.12000   0.13419   0.13874   0.12699   0.11295   0.09852   0.08396   0.06472
              180.00   0.03777   0.03777   0.02938   0.04187   0.04070   0.00000  -0.04070  -0.04187  -0.02938  -0.03777  -0.04501  -0.05088  -0.05521  -0.05786  -0.05875  -0.05786
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            </tableData>
          </table>
          </product>
        </function>
        <function name="aero/coefficient/CL_flap">
          <description>CL increment from flap (deg), over alpha</description>
          <product>
            <property>aero/qbar-psf</property>
            <property>metrics/Sw-sqft</property>
            <property>aero/function/mach-flap</property>
          <table>
            <independentVar lookup="row">aero/alpha-deg</independentVar>
            <independentVar lookup="column">fcs/flap-pos-deg</independentVar>
            <tableData>
                        -25.00    -20.00    -15.00    -10.00     -5.00      0.00      5.00     10.00     15.00     20.00     25.00
             -180.00  -0.00000  -0.00000  -0.00000  -0.00000   0.00000   0.00000   0.00000  -0.00000  -0.00000  -0.00000  -0.00000
              -35.00  -0.07559  -0.07174  -0.06064  -0.04472  -0.02372   0.00000   0.02363   0.04434   0.05992   0.07077   0.07889
              -11.00  -0.12951  -0.11638  -0.09864  -0.07306  -0.03895   0.00000   0.03937   0.07454   0.10140   0.12034   0.13458
                4.00  -0.14047  -0.12571  -0.10605  -0.07813  -0.04139   0.00000   0.04129   0.07775   0.10533   0.12465   0.13907
               19.00  -0.12359  -0.11003  -0.09225  -0.06739  -0.03524   0.00000   0.03389   0.06298   0.08469   0.09981   0.11106
               42.00  -0.06736  -0.06055  -0.05142  -0.03824  -0.02050   0.00000   0.02089   0.03943   0.05304   0.06195   0.06806
              180.00   0.00000   0.00000   0.00000  -0.00000  -0.00000   0.00000  -0.00000  -0.00000   0.00000   0.00000   0.00000
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            </tableData>
          </table>
          <table>
            <independentVar lookup="row">aero/h_b-mac-ft</independentVar>
            <tableData>
                    0.00    1.20000
                    0.10    1.08692
                    0.20    1.03778
                    0.40    1.00713
                    0.60    1.00135
                    0.80    1.00025
                    1.00    1.00005
                    1.10    1.00000
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            </tableData>
          </table>
          </product>
        </function>
        <function name="aero/coefficient/CLq">
          <description>CL per q (non-dimensional), over alpha</description>
          <product>
            <property>aero/qbar-psf</property>
            <property>metrics/Sw-sqft</property>
            <property>aero/ci2vel</property>
            <property>velocities/q-aero-rad_sec</property>
            <property>aero/function/mach-lift</property>
          <table>
            <independentVar lookup="row">aero/alpha-deg</independentVar>
            <tableData>
                 -180.00    0.41763
                 -165.00   -0.03006
                  -32.00    1.84539
                  -10.00    3.18688
                    5.00    3.07785
                   20.00    2.86619
                   46.00    1.05410
                  180.00    0.41763
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            </tableData>
          </table>
          </product>
        </function>
        <function name="aero/coefficient/CLadot">
          <description>CL per alpha-dot (downwash lag at the tail)</description>
          <product>
            <property>aero/qbar-psf</property>
            <property>metrics/Sw-sqft</property>
            <property>aero/ci2vel</property>
            <property>aero/alphadot-rad_sec</property>
            <value>0.00000</value>
            <property>aero/function/mach-lift</property>
          </product>
        </function>
      </axis>
      <axis name="ROLL">
        <function name="aero/coefficient/Cl_base">
          <description>Cl over alpha and beta (hangar)</description>
          <product>
            <property>aero/qbar-psf</property>
            <property>metrics/Sw-sqft</property>
            <property>metrics/bw-ft</property>
            <property>aero/function/mach-side</property>
          <table>
            <independentVar lookup="row">aero/alpha-deg</independentVar>
            <independentVar lookup="column">aero/beta-deg</independentVar>
            <tableData>
                        -90.00    -70.00    -50.00    -40.00    -30.00    -25.00    -20.00    -15.00    -10.00     -6.00     -3.00      0.00      3.00      6.00     10.00     15.00     20.00     25.00     30.00     40.00     50.00     70.00     90.00
             -180.00   0.07048   0.05807   0.04176   0.03371   0.02463   0.02010   0.01570   0.01110   0.01663   0.02112   0.01140  -0.00000  -0.01140  -0.02112  -0.01663  -0.01110  -0.01570  -0.02010  -0.02463  -0.03371  -0.04176  -0.05807  -0.07048
              -35.00   0.07048   0.07199   0.06350   0.05157   0.02863   0.02084   0.01850   0.02632   0.01810   0.00992   0.00489  -0.00000  -0.00489  -0.00992  -0.01810  -0.02632  -0.01850  -0.02084  -0.02863  -0.05157  -0.06350  -0.07199  -0.07048
              -11.00   0.07048   0.06406   0.03228  -0.00806  -0.04237  -0.04462  -0.02629  -0.01869  -0.01280  -0.00777  -0.00391  -0.00000   0.00391   0.00777   0.01280   0.01869   0.02629   0.04462   0.04237   0.00806  -0.03228  -0.06406  -0.07048
                4.00   0.07048   0.06144   0.03066   0.00930   0.01030   0.01381   0.02437   0.02070   0.01420   0.00861   0.00431  -0.00000  -0.00431  -0.00861  -0.01420  -0.02070  -0.02437  -0.01381  -0.01030  -0.00930  -0.03066  -0.06144  -0.07048
               19.00   0.07048   0.05391   0.02757   0.02144   0.05259   0.05854   0.06125   0.05166   0.03639   0.02281   0.01169  -0.00000  -0.01169  -0.02281  -0.03639  -0.05166  -0.06125  -0.05854  -0.05259  -0.02144  -0.02757  -0.05391  -0.07048
               42.00   0.07048   0.04598   0.01190  -0.00938  -0.02934  -0.02768  -0.01737  -0.00385   0.01077   0.00689   0.00373  -0.00000  -0.00373  -0.00689  -0.01077   0.00385   0.01737   0.02768   0.02934   0.00938  -0.01190  -0.04598  -0.07048
              180.00   0.07048   0.05807   0.04176   0.03371   0.02463   0.02010   0.01570   0.01110   0.01663   0.02112   0.01140  -0.00000  -0.01140  -0.02112  -0.01663  -0.01110  -0.01570  -0.02010  -0.02463  -0.03371  -0.04176  -0.05807  -0.07048
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            </tableData>
          </table>
          </product>
        </function>
        <function name="aero/coefficient/Cl_aileron">
          <description>Cl increment from aileron (deg), over alpha</description>
          <product>
            <property>aero/qbar-psf</property>
            <property>metrics/Sw-sqft</property>
            <property>metrics/bw-ft</property>
            <property>aero/function/mach-aileron</property>
          <table>
            <independentVar lookup="row">aero/alpha-deg</independentVar>
            <independentVar lookup="column">fcs/left-aileron-pos-deg</independentVar>
            <tableData>
                        -25.00    -20.00    -15.00    -10.00     -5.00      0.00      5.00     10.00     15.00     20.00     25.00
             -180.00   0.00000   0.00000   0.00000   0.00000   0.00000   0.00000   0.00000   0.00000   0.00000   0.00000   0.00000
              -35.00  -0.03759  -0.03358  -0.02829  -0.02084  -0.01105   0.00000   0.01105   0.02084   0.02829   0.03358   0.03759
              -11.00  -0.05885  -0.05216  -0.04361  -0.03191  -0.01686   0.00000   0.01686   0.03191   0.04361   0.05216   0.05885
                4.00  -0.05510  -0.04888  -0.04090  -0.02995  -0.01583   0.00000   0.01583   0.02995   0.04090   0.04888   0.05510
               19.00  -0.04925  -0.04352  -0.03625  -0.02643  -0.01392   0.00000   0.01392   0.02643   0.03625   0.04352   0.04925
               42.00  -0.02749  -0.02470  -0.02095  -0.01557  -0.00836   0.00000   0.00836   0.01557   0.02095   0.02470   0.02749
              180.00   0.00000   0.00000   0.00000   0.00000   0.00000   0.00000   0.00000   0.00000   0.00000   0.00000   0.00000
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            </tableData>
          </table>
          </product>
        </function>
        <function name="aero/coefficient/Cl_rudder">
          <description>Cl increment from rudder (deg), over alpha</description>
          <product>
            <property>aero/qbar-psf</property>
            <property>metrics/Sw-sqft</property>
            <property>metrics/bw-ft</property>
            <property>aero/function/mach-rudder</property>
          <table>
            <independentVar lookup="row">aero/alpha-deg</independentVar>
            <independentVar lookup="column">fcs/rudder-pos-deg</independentVar>
            <tableData>
                        -30.00    -25.00    -20.00    -15.00    -10.00     -5.00      0.00      5.00     10.00     15.00     20.00     25.00     30.00
             -180.00   0.00000   0.00000   0.00000   0.00000   0.00000   0.00000   0.00000   0.00000   0.00000   0.00000   0.00000   0.00000   0.00000
              -35.00  -0.01459  -0.01326  -0.01176  -0.00983  -0.00719  -0.00380   0.00000   0.00380   0.00719   0.00983   0.01176   0.01326   0.01459
              -11.00  -0.01855  -0.01683  -0.01490  -0.01244  -0.00910  -0.00481   0.00000   0.00481   0.00910   0.01245   0.01491   0.01684   0.01856
                4.00  -0.01880  -0.01708  -0.01515  -0.01266  -0.00927  -0.00490   0.00000   0.00490   0.00927   0.01267   0.01515   0.01709   0.01881
               19.00  -0.01614  -0.01464  -0.01296  -0.01082  -0.00791  -0.00418   0.00000   0.00418   0.00791   0.01083   0.01297   0.01465   0.01614
               42.00  -0.01453  -0.01336  -0.01200  -0.01014  -0.00743  -0.00393   0.00000   0.00393   0.00743   0.01014   0.01200   0.01336   0.01453
              180.00   0.00000   0.00000   0.00000   0.00000   0.00000   0.00000   0.00000   0.00000   0.00000   0.00000   0.00000   0.00000   0.00000
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            </tableData>
          </table>
          </product>
        </function>
        <function name="aero/coefficient/Clp">
          <description>Cl per p (non-dimensional), over alpha</description>
          <product>
            <property>aero/qbar-psf</property>
            <property>metrics/Sw-sqft</property>
            <property>metrics/bw-ft</property>
            <property>aero/bi2vel</property>
            <property>velocities/p-aero-rad_sec</property>
            <property>aero/function/mach-lift</property>
          <table>
            <independentVar lookup="row">aero/alpha-deg</independentVar>
            <tableData>
                 -180.00   -0.63459
                 -165.00   -0.24507
                  -32.00   -0.16105
                  -10.00   -0.32234
                    5.00   -0.25664
                   20.00   -0.32275
                   46.00   -0.26508
                  180.00   -0.63459
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            </tableData>
          </table>
          </product>
        </function>
        <function name="aero/coefficient/Clr">
          <description>Cl per r (non-dimensional), over alpha</description>
          <product>
            <property>aero/qbar-psf</property>
            <property>metrics/Sw-sqft</property>
            <property>metrics/bw-ft</property>
            <property>aero/bi2vel</property>
            <property>velocities/r-aero-rad_sec</property>
            <property>aero/function/mach-lift</property>
          <table>
            <independentVar lookup="row">aero/alpha-deg</independentVar>
            <tableData>
                 -180.00    0.21912
                 -165.00    0.27723
                  -32.00   -0.09540
                  -10.00    0.03179
                    5.00    0.14700
                   20.00    0.23805
                   46.00    0.37502
                  180.00    0.21912
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            </tableData>
          </table>
          </product>
        </function>
      </axis>
      <axis name="PITCH">
        <function name="aero/coefficient/Cm_base">
          <description>Cm over alpha and beta (hangar)</description>
          <product>
            <property>aero/qbar-psf</property>
            <property>metrics/Sw-sqft</property>
            <property>metrics/cbarw-ft</property>
          <table>
            <independentVar lookup="row">aero/alpha-deg</independentVar>
            <independentVar lookup="column">aero/beta-deg</independentVar>
            <tableData>
                        -90.00    -70.00    -50.00    -40.00    -30.00    -25.00    -20.00    -15.00    -10.00     -6.00     -3.00      0.00      3.00      6.00     10.00     15.00     20.00     25.00     30.00     40.00     50.00     70.00     90.00
             -180.00  -0.00000  -0.00014   0.00002  -0.00016  -0.00063  -0.00085  -0.00105  -0.00130   0.00431   0.00323  -0.00039  -0.00171  -0.00039   0.00323   0.00431  -0.00130  -0.00105  -0.00085  -0.00063  -0.00016   0.00002  -0.00014  -0.00000
              -35.00  -0.00000  -0.00592  -0.05712  -0.07856  -0.10107  -0.10534  -0.10493  -0.11024  -0.11252  -0.11670  -0.11874  -0.12017  -0.11874  -0.11670  -0.11252  -0.11024  -0.10493  -0.10534  -0.10107  -0.07856  -0.05712  -0.00592  -0.00000
              -11.00  -0.00000  -0.01804  -0.02838  -0.02857  -0.03010  -0.03284  -0.03991  -0.03907  -0.03807  -0.03751  -0.03721  -0.03710  -0.03721  -0.03751  -0.03807  -0.03907  -0.03991  -0.03284  -0.03010  -0.02857  -0.02838  -0.01804  -0.00000
                4.00   0.00000   0.00028   0.00730   0.01587   0.01868   0.01787   0.01243   0.01311   0.01402   0.01438   0.01446   0.01446   0.01446   0.01438   0.01402   0.01311   0.01243   0.01787   0.01868   0.01587   0.00730   0.00028   0.00000
               19.00   0.00000   0.01190   0.03661   0.05807   0.07273   0.07404   0.06601   0.06432   0.06490   0.06536   0.06553   0.06537   0.06553   0.06536   0.06490   0.06432   0.06601   0.07404   0.07273   0.05807   0.03661   0.01190   0.00000
               42.00   0.00000   0.00459   0.06814   0.09402   0.12207   0.13529   0.14568   0.15497   0.15851   0.16148   0.16349   0.16418   0.16349   0.16148   0.15851   0.15497   0.14568   0.13529   0.12207   0.09402   0.06814   0.00459   0.00000
              180.00  -0.00000  -0.00014   0.00002  -0.00016  -0.00063  -0.00085  -0.00105  -0.00130   0.00431   0.00323  -0.00039  -0.00171  -0.00039   0.00323   0.00431  -0.00130  -0.00105  -0.00085  -0.00063  -0.00016   0.00002  -0.00014  -0.00000
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            </tableData>
          </table>
          </product>
        </function>
        <function name="aero/coefficient/Cm_mach">
          <description>Cm from the neutral point's move with Mach</description>
          <product>
            <property>aero/qbar-psf</property>
            <property>metrics/Sw-sqft</property>
            <property>metrics/cbarw-ft</property>
            <property>aero/function/CL-base</property>
            <property>aero/function/mach-dCm-dCL</property>
          </product>
        </function>
        <function name="aero/coefficient/Cm_elevator">
          <description>Cm increment from elevator (deg), over alpha</description>
          <product>
            <property>aero/qbar-psf</property>
            <property>metrics/Sw-sqft</property>
            <property>metrics/cbarw-ft</property>
            <property>aero/function/mach-elevator</property>
          <table>
            <independentVar lookup="row">aero/alpha-deg</independentVar>
            <independentVar lookup="column">fcs/elevator-pos-deg</independentVar>
            <tableData>
                        -25.00    -20.00    -15.00    -10.00     -5.00      0.00      5.00     10.00     15.00     20.00     25.00     30.00     35.00     40.00     45.00     50.00
             -180.00  -0.02376  -0.02381  -0.01797  -0.02391  -0.02299   0.00000   0.02290   0.02335   0.01508   0.01867   0.02134   0.02294   0.02346   0.02285   0.02110   0.01825
              -35.00   0.17581   0.16456   0.13033   0.09112   0.04658   0.00000  -0.04467  -0.08326  -0.11201  -0.13116  -0.14357  -0.14131  -0.13665  -0.12968  -0.12050  -0.10918
              -11.00   0.23400   0.21892   0.17729   0.12697   0.06701   0.00000  -0.06917  -0.13344  -0.18685  -0.22894  -0.26270  -0.27678  -0.28702  -0.29301  -0.29441  -0.29085
                4.00   0.25898   0.24317   0.19237   0.13375   0.06809   0.00000  -0.06715  -0.12862  -0.18020  -0.22365  -0.26178  -0.28265  -0.30121  -0.31677  -0.32805  -0.33341
               19.00   0.25901   0.24307   0.19535   0.13788   0.07098   0.00000  -0.06940  -0.13156  -0.18117  -0.22021  -0.25336  -0.27141  -0.28908  -0.30688  -0.32308  -0.33575
               42.00   0.14556   0.13458   0.11296   0.08276   0.04391   0.00000  -0.04519  -0.08818  -0.12607  -0.15914  -0.18948  -0.21009  -0.23019  -0.24874  -0.26624  -0.28269
              180.00  -0.02376  -0.02381  -0.01797  -0.02391  -0.02299   0.00000   0.02290   0.02335   0.01508   0.01867   0.02134   0.02294   0.02346   0.02285   0.02110   0.01825
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            </tableData>
          </table>
          </product>
        </function>
        <function name="aero/coefficient/Cm_flap">
          <description>Cm increment from flap (deg), over alpha</description>
          <product>
            <property>aero/qbar-psf</property>
            <property>metrics/Sw-sqft</property>
            <property>metrics/cbarw-ft</property>
            <property>aero/function/mach-flap</property>
          <table>
            <independentVar lookup="row">aero/alpha-deg</independentVar>
            <independentVar lookup="column">fcs/flap-pos-deg</independentVar>
            <tableData>
                        -25.00    -20.00    -15.00    -10.00     -5.00      0.00      5.00     10.00     15.00     20.00     25.00
             -180.00   0.00003   0.00002   0.00001   0.00001   0.00000   0.00000   0.00000   0.00001   0.00001   0.00002   0.00003
              -35.00   0.04933   0.04747   0.03951   0.02876   0.01515   0.00000  -0.01516  -0.02862  -0.03889  -0.04608  -0.05144
              -11.00   0.06546   0.05899   0.05011   0.03712   0.01975   0.00000  -0.01985  -0.03746  -0.05071  -0.05983  -0.06649
                4.00   0.06626   0.05962   0.05055   0.03736   0.01982   0.00000  -0.01980  -0.03730  -0.05044  -0.05949  -0.06612
               19.00   0.06562   0.05891   0.04980   0.03668   0.01937   0.00000  -0.01917  -0.03599  -0.04863  -0.05739  -0.06389
               42.00   0.05321   0.04750   0.03992   0.02921   0.01534   0.00000  -0.01505  -0.02817  -0.03804  -0.04495  -0.05013
              180.00   0.00003   0.00002   0.00001   0.00001   0.00000   0.00000   0.00000   0.00001   0.00001   0.00002   0.00003
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            </tableData>
          </table>
          </product>
        </function>
        <function name="aero/coefficient/Cmq">
          <description>Cm per q (non-dimensional), over alpha</description>
          <product>
            <property>aero/qbar-psf</property>
            <property>metrics/Sw-sqft</property>
            <property>metrics/cbarw-ft</property>
            <property>aero/ci2vel</property>
            <property>velocities/q-aero-rad_sec</property>
            <property>aero/function/mach-lift</property>
          <table>
            <independentVar lookup="row">aero/alpha-deg</independentVar>
            <tableData>
                 -180.00   -1.41116
                 -165.00   -0.10209
                  -32.00   -1.73863
                  -10.00   -1.81036
                    5.00   -1.72849
                   20.00   -1.99713
                   46.00   -2.02333
                  180.00   -1.41116
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            </tableData>
          </table>
          </product>
        </function>
        <function name="aero/coefficient/Cmadot">
          <description>Cm per alpha-dot (downwash lag at the tail)</description>
          <product>
            <property>aero/qbar-psf</property>
            <property>metrics/Sw-sqft</property>
            <property>metrics/cbarw-ft</property>
            <property>aero/ci2vel</property>
            <property>aero/alphadot-rad_sec</property>
            <value>0.00000</value>
            <property>aero/function/mach-lift</property>
          </product>
        </function>
        <function name="aero/coefficient/Cm_gear">
          <description>the gear's drag's pitching moment, -1.00 m from the reference point's height</description>
          <product>
            <property>aero/qbar-psf</property>
            <property>metrics/Sw-sqft</property>
            <property>metrics/cbarw-ft</property>
            <value>-0.00171911</value>
            <property>gear/gear-pos-norm</property>
          </product>
        </function>
      </axis>
      <axis name="YAW">
        <function name="aero/coefficient/Cn_base">
          <description>Cn over alpha and beta (hangar)</description>
          <product>
            <property>aero/qbar-psf</property>
            <property>metrics/Sw-sqft</property>
            <property>metrics/bw-ft</property>
            <property>aero/function/mach-side</property>
          <table>
            <independentVar lookup="row">aero/alpha-deg</independentVar>
            <independentVar lookup="column">aero/beta-deg</independentVar>
            <tableData>
                        -90.00    -70.00    -50.00    -40.00    -30.00    -25.00    -20.00    -15.00    -10.00     -6.00     -3.00      0.00      3.00      6.00     10.00     15.00     20.00     25.00     30.00     40.00     50.00     70.00     90.00
             -180.00  -0.11935  -0.13804  -0.13717  -0.12513  -0.10467  -0.09128  -0.07595  -0.06052  -0.07657  -0.07807  -0.04160  -0.00000   0.04160   0.07807   0.07657   0.06052   0.07595   0.09128   0.10467   0.12513   0.13717   0.13804   0.11935
              -35.00  -0.11935  -0.09104  -0.05204  -0.02234  -0.00496  -0.00199  -0.00281  -0.02333  -0.01697  -0.01021  -0.00461  -0.00000   0.00461   0.01021   0.01697   0.02333   0.00281   0.00199   0.00496   0.02234   0.05204   0.09104   0.11935
              -11.00  -0.11935  -0.08951  -0.04157  -0.01118  -0.00501  -0.00785  -0.03112  -0.02854  -0.02023  -0.01251  -0.00634  -0.00000   0.00634   0.01251   0.02023   0.02854   0.03112   0.00785   0.00501   0.01118   0.04157   0.08951   0.11935
                4.00  -0.11935  -0.09052  -0.04394  -0.01347  -0.00759  -0.01071  -0.03206  -0.02860  -0.02046  -0.01278  -0.00652  -0.00000   0.00652   0.01278   0.02046   0.02860   0.03206   0.01071   0.00759   0.01347   0.04394   0.09052   0.11935
               19.00  -0.11935  -0.09024  -0.04835  -0.01375   0.00057   0.00041  -0.01607  -0.01875  -0.01340  -0.00825  -0.00412  -0.00000   0.00412   0.00825   0.01340   0.01875   0.01607  -0.00041  -0.00057   0.01375   0.04835   0.09024   0.11935
               42.00  -0.11935  -0.09289  -0.05089  -0.02839  -0.00844  -0.00233   0.00068  -0.00167  -0.01055  -0.00681  -0.00390  -0.00000   0.00390   0.00681   0.01055   0.00167  -0.00068   0.00233   0.00844   0.02839   0.05089   0.09289   0.11935
              180.00  -0.11935  -0.13804  -0.13717  -0.12513  -0.10467  -0.09128  -0.07595  -0.06052  -0.07657  -0.07807  -0.04160  -0.00000   0.04160   0.07807   0.07657   0.06052   0.07595   0.09128   0.10467   0.12513   0.13717   0.13804   0.11935
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            </tableData>
          </table>
          </product>
        </function>
        <function name="aero/coefficient/Cn_aileron">
          <description>Cn increment from aileron (deg), over alpha</description>
          <product>
            <property>aero/qbar-psf</property>
            <property>metrics/Sw-sqft</property>
            <property>metrics/bw-ft</property>
            <property>aero/function/mach-aileron</property>
          <table>
            <independentVar lookup="row">aero/alpha-deg</independentVar>
            <independentVar lookup="column">fcs/left-aileron-pos-deg</independentVar>
            <tableData>
                        -25.00    -20.00    -15.00    -10.00     -5.00      0.00      5.00     10.00     15.00     20.00     25.00
             -180.00  -0.00000  -0.00000  -0.00000  -0.00000  -0.00000   0.00000  -0.00000  -0.00000  -0.00000  -0.00000  -0.00000
              -35.00   0.00026   0.00038   0.00045   0.00044   0.00028   0.00000  -0.00028  -0.00044  -0.00045  -0.00038  -0.00026
              -11.00  -0.00794  -0.00697  -0.00569  -0.00398  -0.00199   0.00000   0.00199   0.00398   0.00569   0.00697   0.00794
                4.00  -0.00728  -0.00641  -0.00532  -0.00386  -0.00203   0.00000   0.00203   0.00386   0.00532   0.00641   0.00728
               19.00  -0.01528  -0.01396  -0.01220  -0.00948  -0.00531   0.00000   0.00531   0.00948   0.01220   0.01396   0.01528
               42.00  -0.00918  -0.00828  -0.00697  -0.00499  -0.00249   0.00000   0.00249   0.00499   0.00697   0.00828   0.00918
              180.00  -0.00000  -0.00000  -0.00000  -0.00000  -0.00000   0.00000  -0.00000  -0.00000  -0.00000  -0.00000  -0.00000
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            </tableData>
          </table>
          </product>
        </function>
        <function name="aero/coefficient/Cn_rudder">
          <description>Cn increment from rudder (deg), over alpha</description>
          <product>
            <property>aero/qbar-psf</property>
            <property>metrics/Sw-sqft</property>
            <property>metrics/bw-ft</property>
            <property>aero/function/mach-rudder</property>
          <table>
            <independentVar lookup="row">aero/alpha-deg</independentVar>
            <independentVar lookup="column">fcs/rudder-pos-deg</independentVar>
            <tableData>
                        -30.00    -25.00    -20.00    -15.00    -10.00     -5.00      0.00      5.00     10.00     15.00     20.00     25.00     30.00
             -180.00  -0.00000  -0.00000  -0.00000  -0.00000  -0.00000  -0.00000   0.00000  -0.00000  -0.00000  -0.00000  -0.00000  -0.00000  -0.00000
              -35.00   0.03183   0.02912   0.02599   0.02186   0.01606   0.00850   0.00000  -0.00850  -0.01606  -0.02186  -0.02599  -0.02912  -0.03183
              -11.00   0.04152   0.03791   0.03380   0.02841   0.02089   0.01107   0.00000  -0.01107  -0.02089  -0.02842  -0.03380  -0.03792  -0.04153
                4.00   0.04182   0.03823   0.03413   0.02873   0.02114   0.01121   0.00000  -0.01121  -0.02114  -0.02873  -0.03413  -0.03824  -0.04183
               19.00   0.03642   0.03329   0.02971   0.02499   0.01838   0.00974   0.00000  -0.00974  -0.01838  -0.02500  -0.02971  -0.03330  -0.03643
               42.00   0.03170   0.02915   0.02618   0.02213   0.01626   0.00860   0.00000  -0.00860  -0.01626  -0.02213  -0.02617  -0.02914  -0.03170
              180.00  -0.00000  -0.00000  -0.00000  -0.00000  -0.00000  -0.00000   0.00000  -0.00000  -0.00000  -0.00000  -0.00000  -0.00000  -0.00000
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            </tableData>
          </table>
          </product>
        </function>
        <function name="aero/coefficient/Cnp">
          <description>Cn per p (non-dimensional), over alpha</description>
          <product>
            <property>aero/qbar-psf</property>
            <property>metrics/Sw-sqft</property>
            <property>metrics/bw-ft</property>
            <property>aero/bi2vel</property>
            <property>velocities/p-aero-rad_sec</property>
            <property>aero/function/mach-lift</property>
          <table>
            <independentVar lookup="row">aero/alpha-deg</independentVar>
            <tableData>
                 -180.00    0.28655
                 -165.00    0.32850
                  -32.00    0.07012
                  -10.00    0.07366
                    5.00    0.03476
                   20.00    0.04009
                   46.00    0.11346
                  180.00    0.28655
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            </tableData>
          </table>
          </product>
        </function>
        <function name="aero/coefficient/Cnr">
          <description>Cn per r (non-dimensional), over alpha</description>
          <product>
            <property>aero/qbar-psf</property>
            <property>metrics/Sw-sqft</property>
            <property>metrics/bw-ft</property>
            <property>aero/bi2vel</property>
            <property>velocities/r-aero-rad_sec</property>
            <property>aero/function/mach-lift</property>
          <table>
            <independentVar lookup="row">aero/alpha-deg</independentVar>
            <tableData>
                 -180.00   -0.61861
                 -165.00   -0.48968
                  -32.00   -0.34881
                  -10.00   -0.34798
                    5.00   -0.34144
                   20.00   -0.32807
                   46.00   -0.31795
                  180.00   -0.61861
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            </tableData>
          </table>
          </product>
        </function>
      </axis>
    </aerodynamics>
</fdm_config>
