<?xml version="1.0"?>
<?xml-stylesheet type="text/xsl" href="http://jsbsim.sourceforge.net/JSBSim.xsl"?>
<!-- Generated by hangar 0.1.0 from j20a.toml on 2026-10-01. Edit the design and rebuild; changes
     made here are overwritten.  -->
<fdm_config name="j20a" version="2.0" release="ALPHA"
            xmlns:xsi="http://www.w3.org/2001/XMLSchema-instance"
            xsi:noNamespaceSchemaLocation="http://jsbsim.sourceforge.net/JSBSim.xsd">
    <fileheader>
      <author>hangar</author>
      <filecreationdate>2026-10-01</filecreationdate>
      <version>0.1.0</version>
      <description>Chengdu J-20A (hangar build, from public estimates)</description>
      <note>Aerodynamics: vortex lattice with viscous section polars, full-envelope
        strip model, slender-body fuselage (hangar). Mass: Raymer component
        weights on the geometry. Propeller: blade-element momentum theory.</note>
      <reference refID="fsim/applicability/aerobatic" author="the design" title="Public reference works: +9 g (fsim/envelope/clean/n_max)" date="n/a"/>
      <reference refID="fsim/applicability/carrier" author="the design" title="Public reference works: a land-based fighter" date="n/a"/>
      <reference refID="fsim/applicability/flaps" author="the design" title="Public reference works: flaperons on the wing's trailing edge" date="n/a"/>
      <reference refID="fsim/applicability/ground_contact" author="the design" title="Public reference works: tricycle wheeled gear" date="n/a"/>
      <reference refID="fsim/applicability/releasable_stores" author="the design" title="Public reference works: internal weapons bays" date="n/a"/>
      <reference refID="fsim/applicability/retractable_gear" author="the design" title="Public reference works: retractable gear" date="n/a"/>
      <reference refID="fsim/applicability/vertical_flight" author="the design" title="Public reference works: a conventional take-off and landing fighter. Conventional take-off and landing: no rotors, lift fans or vectored lift to hover" date="n/a"/>
    </fileheader>
    <metrics>
      <wingarea unit="M2"> 72.5860 </wingarea>
      <wingspan unit="M"> 13.0100 </wingspan>
      <chord unit="M"> 6.5275 </chord>
      <htailarea unit="M2"> 0.0000 </htailarea>
      <htailarm unit="M"> 0.0000 </htailarm>
      <vtailarea unit="M2"> 6.8107 </vtailarea>
      <vtailarm unit="M"> 6.4091 </vtailarm>
      <location name="AERORP" unit="M">
        <x> 11.4570 </x>
        <y> 0.0000 </y>
        <z> 0.0000 </z>
      </location>
      <location name="EYEPOINT" unit="M">
        <x> 4.3000 </x>
        <y> 0.0000 </y>
        <z> 1.2500 </z>
      </location>
      <location name="VRP" unit="M">
        <x> 11.5050 </x>
        <y> 0.0000 </y>
        <z> -0.3500 </z>
      </location>
    </metrics>
    <mass_balance negated_crossproduct_inertia="false">
      <ixx unit="KG*M2"> 55493.62 </ixx>
      <iyy unit="KG*M2"> 406089.63 </iyy>
      <izz unit="KG*M2"> 415723.18 </izz>
      <ixy unit="KG*M2"> 0.815 </ixy>
      <ixz unit="KG*M2"> -899.280 </ixz>
      <iyz unit="KG*M2"> 0.375 </iyz>
      <emptywt unit="KG"> 19400.00 </emptywt>
      <location name="CG" unit="M">
        <x> 11.5050 </x>
        <y> 0.0000 </y>
        <z> -0.3500 </z>
      </location>
      <pointmass name="pilot">
        <weight unit="KG"> 100.00 </weight>
        <location unit="M">
          <x> 4.3000 </x>
          <y> 0.0000 </y>
          <z> 0.5500 </z>
        </location>
      </pointmass>
      <pointmass name="internal missiles">
        <weight unit="KG"> 1020.00 </weight>
        <location unit="M">
          <x> 11.8750 </x>
          <y> 0.0000 </y>
          <z> -0.8000 </z>
        </location>
      </pointmass>
    </mass_balance>
    <ground_reactions>
      <contact type="BOGEY" name="Nose Gear">
        <location unit="M">
          <x> 6.0400 </x>
          <y> 0.0000 </y>
          <z> -2.8800 </z>
        </location>
        <static_friction> 0.8 </static_friction>
        <dynamic_friction> 0.5 </dynamic_friction>
        <rolling_friction> 0.02 </rolling_friction>
        <spring_coeff unit="N/M"> 356317 </spring_coeff>
        <damping_coeff unit="N/M/SEC"> 42574 </damping_coeff>
        <damping_coeff_rebound unit="N/M/SEC"> 85147 </damping_coeff_rebound>
        <max_steer unit="DEG"> 60.0 </max_steer>
        <brake_group> NONE </brake_group>
        <retractable> 1 </retractable>
      </contact>
      <contact type="BOGEY" name="Left Main Gear">
        <location unit="M">
          <x> 12.5200 </x>
          <y> -1.6000 </y>
          <z> -2.9200 </z>
        </location>
        <static_friction> 0.8 </static_friction>
        <dynamic_friction> 0.5 </dynamic_friction>
        <rolling_friction> 0.02 </rolling_friction>
        <spring_coeff unit="N/M"> 706439 </spring_coeff>
        <damping_coeff unit="N/M/SEC"> 95708 </damping_coeff>
        <damping_coeff_rebound unit="N/M/SEC"> 191417 </damping_coeff_rebound>
        <max_steer unit="DEG"> 0.0 </max_steer>
        <brake_group> LEFT </brake_group>
        <retractable> 1 </retractable>
      </contact>
      <contact type="BOGEY" name="Right Main Gear">
        <location unit="M">
          <x> 12.5200 </x>
          <y> 1.6000 </y>
          <z> -2.9200 </z>
        </location>
        <static_friction> 0.8 </static_friction>
        <dynamic_friction> 0.5 </dynamic_friction>
        <rolling_friction> 0.02 </rolling_friction>
        <spring_coeff unit="N/M"> 706439 </spring_coeff>
        <damping_coeff unit="N/M/SEC"> 95708 </damping_coeff>
        <damping_coeff_rebound unit="N/M/SEC"> 191417 </damping_coeff_rebound>
        <max_steer unit="DEG"> 0.0 </max_steer>
        <brake_group> RIGHT </brake_group>
        <retractable> 1 </retractable>
      </contact>
      <contact type="STRUCTURE" name="boom left rear">
        <location unit="M">
          <x> 19.5000 </x>
          <y> -2.1000 </y>
          <z> -0.2000 </z>
        </location>
        <static_friction> 0.8 </static_friction>
        <dynamic_friction> 0.6 </dynamic_friction>
        <spring_coeff unit="N/M"> 1557602 </spring_coeff>
        <damping_coeff unit="N/M/SEC"> 51920 </damping_coeff>
        <damping_coeff_rebound unit="N/M/SEC"> 51920 </damping_coeff_rebound>
      </contact>
      <contact type="STRUCTURE" name="boom right rear">
        <location unit="M">
          <x> 19.5000 </x>
          <y> 2.1000 </y>
          <z> -0.2000 </z>
        </location>
        <static_friction> 0.8 </static_friction>
        <dynamic_friction> 0.6 </dynamic_friction>
        <spring_coeff unit="N/M"> 1557617 </spring_coeff>
        <damping_coeff unit="N/M/SEC"> 51921 </damping_coeff>
        <damping_coeff_rebound unit="N/M/SEC"> 51921 </damping_coeff_rebound>
      </contact>
      <contact type="STRUCTURE" name="canard left front">
        <location unit="M">
          <x> 8.4700 </x>
          <y> -3.8000 </y>
          <z> 0.3600 </z>
        </location>
        <static_friction> 0.8 </static_friction>
        <dynamic_friction> 0.6 </dynamic_friction>
        <spring_coeff unit="N/M"> 2621234 </spring_coeff>
        <damping_coeff unit="N/M/SEC"> 87374 </damping_coeff>
        <damping_coeff_rebound unit="N/M/SEC"> 87374 </damping_coeff_rebound>
      </contact>
      <contact type="STRUCTURE" name="canard right front">
        <location unit="M">
          <x> 8.4700 </x>
          <y> 3.8000 </y>
          <z> 0.3600 </z>
        </location>
        <static_friction> 0.8 </static_friction>
        <dynamic_friction> 0.6 </dynamic_friction>
        <spring_coeff unit="N/M"> 2621227 </spring_coeff>
        <damping_coeff unit="N/M/SEC"> 87374 </damping_coeff>
        <damping_coeff_rebound unit="N/M/SEC"> 87374 </damping_coeff_rebound>
      </contact>
      <contact type="STRUCTURE" name="fin left rear">
        <location unit="M">
          <x> 19.7300 </x>
          <y> -3.2201 </y>
          <z> 1.9499 </z>
        </location>
        <static_friction> 0.8 </static_friction>
        <dynamic_friction> 0.6 </dynamic_friction>
        <spring_coeff unit="N/M"> 1798216 </spring_coeff>
        <damping_coeff unit="N/M/SEC"> 59941 </damping_coeff>
        <damping_coeff_rebound unit="N/M/SEC"> 59941 </damping_coeff_rebound>
      </contact>
      <contact type="STRUCTURE" name="fin right rear">
        <location unit="M">
          <x> 19.7300 </x>
          <y> 3.2201 </y>
          <z> 1.9499 </z>
        </location>
        <static_friction> 0.8 </static_friction>
        <dynamic_friction> 0.6 </dynamic_friction>
        <spring_coeff unit="N/M"> 1798231 </spring_coeff>
        <damping_coeff unit="N/M/SEC"> 59941 </damping_coeff>
        <damping_coeff_rebound unit="N/M/SEC"> 59941 </damping_coeff_rebound>
      </contact>
      <contact type="STRUCTURE" name="fuselage front">
        <location unit="M">
          <x> 3.3453 </x>
          <y> 0.0000 </y>
          <z> -1.0315 </z>
        </location>
        <static_friction> 0.8 </static_friction>
        <dynamic_friction> 0.6 </dynamic_friction>
        <spring_coeff unit="N/M"> 4081416 </spring_coeff>
        <damping_coeff unit="N/M/SEC"> 136047 </damping_coeff>
        <damping_coeff_rebound unit="N/M/SEC"> 136047 </damping_coeff_rebound>
      </contact>
      <contact type="STRUCTURE" name="probe front">
        <location unit="M">
          <x> -1.5500 </x>
          <y> 0.0000 </y>
          <z> -0.0400 </z>
        </location>
        <static_friction> 0.8 </static_friction>
        <dynamic_friction> 0.6 </dynamic_friction>
        <spring_coeff unit="N/M"> 1908898 </spring_coeff>
        <damping_coeff unit="N/M/SEC"> 63630 </damping_coeff>
        <damping_coeff_rebound unit="N/M/SEC"> 63630 </damping_coeff_rebound>
      </contact>
      <contact type="STRUCTURE" name="ventral left rear">
        <location unit="M">
          <x> 18.8000 </x>
          <y> -2.4200 </y>
          <z> -1.2500 </z>
        </location>
        <static_friction> 0.8 </static_friction>
        <dynamic_friction> 0.6 </dynamic_friction>
        <spring_coeff unit="N/M"> 1490666 </spring_coeff>
        <damping_coeff unit="N/M/SEC"> 49689 </damping_coeff>
        <damping_coeff_rebound unit="N/M/SEC"> 49689 </damping_coeff_rebound>
      </contact>
      <contact type="STRUCTURE" name="ventral right rear">
        <location unit="M">
          <x> 18.8000 </x>
          <y> 2.4200 </y>
          <z> -1.2500 </z>
        </location>
        <static_friction> 0.8 </static_friction>
        <dynamic_friction> 0.6 </dynamic_friction>
        <spring_coeff unit="N/M"> 1490682 </spring_coeff>
        <damping_coeff unit="N/M/SEC"> 49689 </damping_coeff>
        <damping_coeff_rebound unit="N/M/SEC"> 49689 </damping_coeff_rebound>
      </contact>
      <contact type="STRUCTURE" name="wing left rear">
        <location unit="M">
          <x> 15.4500 </x>
          <y> -6.5050 </y>
          <z> -0.3750 </z>
        </location>
        <static_friction> 0.8 </static_friction>
        <dynamic_friction> 0.6 </dynamic_friction>
        <spring_coeff unit="N/M"> 527903 </spring_coeff>
        <damping_coeff unit="N/M/SEC"> 17597 </damping_coeff>
        <damping_coeff_rebound unit="N/M/SEC"> 17597 </damping_coeff_rebound>
      </contact>
      <contact type="STRUCTURE" name="wing left rear 2">
        <location unit="M">
          <x> 17.0200 </x>
          <y> -6.5050 </y>
          <z> -0.3751 </z>
        </location>
        <static_friction> 0.8 </static_friction>
        <dynamic_friction> 0.6 </dynamic_friction>
        <spring_coeff unit="N/M"> 506186 </spring_coeff>
        <damping_coeff unit="N/M/SEC"> 16873 </damping_coeff>
        <damping_coeff_rebound unit="N/M/SEC"> 16873 </damping_coeff_rebound>
      </contact>
      <contact type="STRUCTURE" name="wing right rear">
        <location unit="M">
          <x> 17.0200 </x>
          <y> 6.5050 </y>
          <z> -0.3751 </z>
        </location>
        <static_friction> 0.8 </static_friction>
        <dynamic_friction> 0.6 </dynamic_friction>
        <spring_coeff unit="N/M"> 506190 </spring_coeff>
        <damping_coeff unit="N/M/SEC"> 16873 </damping_coeff>
        <damping_coeff_rebound unit="N/M/SEC"> 16873 </damping_coeff_rebound>
      </contact>
      <contact type="STRUCTURE" name="wing right rear 2">
        <location unit="M">
          <x> 15.4500 </x>
          <y> 6.5050 </y>
          <z> -0.3750 </z>
        </location>
        <static_friction> 0.8 </static_friction>
        <dynamic_friction> 0.6 </dynamic_friction>
        <spring_coeff unit="N/M"> 527906 </spring_coeff>
        <damping_coeff unit="N/M/SEC"> 17597 </damping_coeff>
        <damping_coeff_rebound unit="N/M/SEC"> 17597 </damping_coeff_rebound>
      </contact>
    </ground_reactions>
    <propulsion>
      <engine file="j20a_engine0">
        <location unit="M">
          <x> 15.8000 </x>
          <y> -0.7500 </y>
          <z> -0.3500 </z>
        </location>
        <feed>0</feed>
        <feed>1</feed>
        <feed>2</feed>
        <feed>3</feed>
        <feed>4</feed>
        <thruster file="j20a_nozzle0">
          <location unit="M">
            <x> 18.9000 </x>
            <y> -0.7500 </y>
            <z> -0.3500 </z>
          </location>
          <orient unit="DEG"> <roll>0.00</roll> <pitch>0.00</pitch> <yaw>0.00</yaw> </orient>

        </thruster>
      </engine>
      <engine file="j20a_engine0">
        <location unit="M">
          <x> 15.8000 </x>
          <y> 0.7500 </y>
          <z> -0.3500 </z>
        </location>
        <feed>0</feed>
        <feed>1</feed>
        <feed>2</feed>
        <feed>3</feed>
        <feed>4</feed>
        <thruster file="j20a_nozzle0">
          <location unit="M">
            <x> 18.9000 </x>
            <y> 0.7500 </y>
            <z> -0.3500 </z>
          </location>
          <orient unit="DEG"> <roll>0.00</roll> <pitch>0.00</pitch> <yaw>0.00</yaw> </orient>

        </thruster>
      </engine>
      <tank type="FUEL">
        <location unit="M">
          <x> 9.1550 </x>
          <y> 0.0000 </y>
          <z> -0.2000 </z>
        </location>
        <capacity unit="KG"> 3200.00 </capacity>
        <contents unit="KG"> 3200.00 </contents>
      </tank>
      <tank type="FUEL">
        <location unit="M">
          <x> 11.6550 </x>
          <y> 0.0000 </y>
          <z> -0.2000 </z>
        </location>
        <capacity unit="KG"> 3300.00 </capacity>
        <contents unit="KG"> 3300.00 </contents>
      </tank>
      <tank type="FUEL">
        <location unit="M">
          <x> 13.8550 </x>
          <y> 0.0000 </y>
          <z> -0.2500 </z>
        </location>
        <capacity unit="KG"> 1800.00 </capacity>
        <contents unit="KG"> 1800.00 </contents>
      </tank>
      <tank type="FUEL">
        <location unit="M">
          <x> 12.2600 </x>
          <y> -3.2000 </y>
          <z> -0.1800 </z>
        </location>
        <capacity unit="KG"> 1100.00 </capacity>
        <contents unit="KG"> 1100.00 </contents>
      </tank>
      <tank type="FUEL">
        <location unit="M">
          <x> 12.2600 </x>
          <y> 3.2000 </y>
          <z> -0.1800 </z>
        </location>
        <capacity unit="KG"> 1100.00 </capacity>
        <contents unit="KG"> 1100.00 </contents>
      </tank>
    </propulsion>
    <flight_control name="j20a">
      <!-- the aircraft's profile for the platform (docs/control-architecture.md, section 7): what
           hangar knows of it - its design, its flight tests, its identified responses -->
      <property value="1">fsim/identity/version</property>
      <property value="1">fsim/identity/provenance</property>
      <property value="2">fsim/identity/class</property>
      <property value="2">fsim/identity/family</property>
      <property value="1">fsim/effectors/version</property>
      <property value="1">fsim/effectors/provenance</property>
      <property value="1">fsim/effectors/flaps</property>
      <property value="8">fsim/effectors/flaps_transit_s</property>
      <property value="1">fsim/effectors/neutral</property>
      <property value="1">fsim/effectors/pitch</property>
      <property value="0.0">fsim/effectors/pitch_trim</property>
      <property value="1">fsim/effectors/retractable_gear</property>
      <property value="1">fsim/effectors/roll</property>
      <property value="0.0">fsim/effectors/speedbrake</property>
      <property value="1">fsim/effectors/wheel_brakes</property>
      <property value="0.0">fsim/effectors/yaw</property>
      <property value="1">fsim/envelope/version</property>
      <property value="1">fsim/envelope/provenance</property>
      <property value="30">fsim/envelope/clean/alpha_max_deg</property>
      <property value="67.4802">fsim/envelope/clean/cas_min_ms</property>
      <property value="9">fsim/envelope/clean/n_max</property>
      <property value="-3">fsim/envelope/clean/n_min</property>
      <property value="250">fsim/envelope/clean/roll_rate_max_deg_s</property>
      <property value="15.43">fsim/envelope/crosswind_max_ms</property>
      <property value="13.35">fsim/envelope/ground_pitch_max_deg</property>
      <property value="4.38">fsim/envelope/ground_turn_radius_m</property>
      <property value="0.2152">fsim/envelope/ground_yaw_accel_rad_s2</property>
      <property value="1">fsim/envelope/law_alpha</property>
      <property value="1">fsim/envelope/law_load_factor</property>
      <property value="1">fsim/envelope/law_roll_rate</property>
      <property value="1">fsim/propulsion/version</property>
      <property value="1">fsim/propulsion/provenance</property>
      <property value="1">fsim/propulsion/afterburner</property>
      <property value="2">fsim/propulsion/engines</property>
      <property value="0.178957">fsim/propulsion/spool_s</property>
      <property value="2">fsim/propulsion/type</property>
      <property value="1">fsim/plant/version</property>
      <property value="1">fsim/plant/provenance</property>
      <property value="-0.518862">fsim/plant/alpha_zero_lift_deg</property>
      <property value="3000">fsim/plant/altitude_m</property>
      <property value="141.85">fsim/plant/eas_ms</property>
      <property value="0.0">fsim/plant/elevator_trim</property>
      <property value="0.0">fsim/plant/elevator_trim_lift</property>
      <property value="10.0277">fsim/plant/pitch/gain</property>
      <property value="0.88862">fsim/plant/pitch/tau_s</property>
      <property value="4.13888">fsim/plant/roll/gain</property>
      <property value="0.181037">fsim/plant/roll/tau_s</property>
      <property value="5.70766">fsim/plant/speed/gain</property>
      <property value="0.178957">fsim/plant/speed/tau_s</property>
      <property value="162.29">fsim/plant/tas_ms</property>
      <property value="0.336124">fsim/plant/throttle_trim</property>
      <property value="0.0998027">fsim/plant/yaw/gain</property>
      <property value="1">fsim/performance/version</property>
      <property value="1">fsim/performance/provenance</property>
      <property value="17899">fsim/performance/ceiling_m</property>
      <property value="259.357">fsim/performance/climb_ms</property>
      <property value="436.622">fsim/performance/max_tas_ms</property>
      <property value="1">fsim/applicability/version</property>
      <property value="1">fsim/applicability/provenance</property>
      <property value="1">fsim/applicability/aerobatic</property>
      <property value="1">fsim/applicability/carrier</property>
      <property value="1">fsim/applicability/flaps</property>
      <property value="1">fsim/applicability/ground_contact</property>
      <property value="2">fsim/applicability/releasable_stores</property>
      <property value="1">fsim/applicability/retractable_gear</property>
      <property value="0.0">fsim/applicability/vertical_flight</property>
      <property value="1">fsim/tables/version</property>
      <property value="1">fsim/tables/provenance</property>
      <property value="100">fsim/tables/altitude_m/h0</property>
      <property value="3580">fsim/tables/altitude_m/h1</property>
      <property value="7160">fsim/tables/altitude_m/h2</property>
      <property value="10740">fsim/tables/altitude_m/h3</property>
      <property value="13420">fsim/tables/altitude_m/h4</property>
      <property value="15210">fsim/tables/altitude_m/h5</property>
      <property value="17000">fsim/tables/altitude_m/h6</property>
      <property value="0.863839">fsim/tables/best_endurance_fuel_kg_s/h0/w0</property>
      <property value="0.799137">fsim/tables/best_endurance_fuel_kg_s/h0/w1</property>
      <property value="0.908441">fsim/tables/best_endurance_fuel_kg_s/h0/w2</property>
      <property value="0.607253">fsim/tables/best_endurance_fuel_kg_s/h1/w0</property>
      <property value="0.706183">fsim/tables/best_endurance_fuel_kg_s/h1/w1</property>
      <property value="0.80259">fsim/tables/best_endurance_fuel_kg_s/h1/w2</property>
      <property value="0.529928">fsim/tables/best_endurance_fuel_kg_s/h2/w0</property>
      <property value="0.61479">fsim/tables/best_endurance_fuel_kg_s/h2/w1</property>
      <property value="0.698315">fsim/tables/best_endurance_fuel_kg_s/h2/w2</property>
      <property value="0.452962">fsim/tables/best_endurance_fuel_kg_s/h3/w0</property>
      <property value="0.529909">fsim/tables/best_endurance_fuel_kg_s/h3/w1</property>
      <property value="0.590245">fsim/tables/best_endurance_fuel_kg_s/h3/w2</property>
      <property value="0.406542">fsim/tables/best_endurance_fuel_kg_s/h4/w0</property>
      <property value="0.525629">fsim/tables/best_endurance_fuel_kg_s/h4/w1</property>
      <property value="0.641121">fsim/tables/best_endurance_fuel_kg_s/h4/w2</property>
      <property value="0.267477">fsim/tables/best_endurance_fuel_kg_s/h5/w0</property>
      <property value="1.66677">fsim/tables/best_endurance_fuel_kg_s/h5/w1</property>
      <property value="2.2124">fsim/tables/best_endurance_fuel_kg_s/h5/w2</property>
      <property value="1.46873">fsim/tables/best_endurance_fuel_kg_s/h6/w0</property>
      <property value="2.02794">fsim/tables/best_endurance_fuel_kg_s/h6/w1</property>
      <property value="3.42948">fsim/tables/best_endurance_fuel_kg_s/h6/w2</property>
      <property value="203.451">fsim/tables/best_endurance_tas_ms/h0/w0</property>
      <property value="152.67">fsim/tables/best_endurance_tas_ms/h0/w1</property>
      <property value="163.051">fsim/tables/best_endurance_tas_ms/h0/w2</property>
      <property value="162.703">fsim/tables/best_endurance_tas_ms/h1/w0</property>
      <property value="178.627">fsim/tables/best_endurance_tas_ms/h1/w1</property>
      <property value="193.863">fsim/tables/best_endurance_tas_ms/h1/w2</property>
      <property value="196.85">fsim/tables/best_endurance_tas_ms/h2/w0</property>
      <property value="216.716">fsim/tables/best_endurance_tas_ms/h2/w1</property>
      <property value="235.756">fsim/tables/best_endurance_tas_ms/h2/w2</property>
      <property value="241.34">fsim/tables/best_endurance_tas_ms/h3/w0</property>
      <property value="257.792">fsim/tables/best_endurance_tas_ms/h3/w1</property>
      <property value="263.64">fsim/tables/best_endurance_tas_ms/h3/w2</property>
      <property value="264.502">fsim/tables/best_endurance_tas_ms/h4/w0</property>
      <property value="270.746">fsim/tables/best_endurance_tas_ms/h4/w1</property>
      <property value="274.136">fsim/tables/best_endurance_tas_ms/h4/w2</property>
      <property value="273.154">fsim/tables/best_endurance_tas_ms/h5/w0</property>
      <property value="277.214">fsim/tables/best_endurance_tas_ms/h5/w1</property>
      <property value="282.703">fsim/tables/best_endurance_tas_ms/h5/w2</property>
      <property value="278.243">fsim/tables/best_endurance_tas_ms/h6/w0</property>
      <property value="293.354">fsim/tables/best_endurance_tas_ms/h6/w1</property>
      <property value="447.645">fsim/tables/best_endurance_tas_ms/h6/w2</property>
      <property value="0.863839">fsim/tables/best_range_fuel_kg_s/h0/w0</property>
      <property value="1.00021">fsim/tables/best_range_fuel_kg_s/h0/w1</property>
      <property value="1.12379">fsim/tables/best_range_fuel_kg_s/h0/w2</property>
      <property value="0.753172">fsim/tables/best_range_fuel_kg_s/h1/w0</property>
      <property value="0.869723">fsim/tables/best_range_fuel_kg_s/h1/w1</property>
      <property value="0.952487">fsim/tables/best_range_fuel_kg_s/h1/w2</property>
      <property value="0.608776">fsim/tables/best_range_fuel_kg_s/h2/w0</property>
      <property value="0.666798">fsim/tables/best_range_fuel_kg_s/h2/w1</property>
      <property value="0.733694">fsim/tables/best_range_fuel_kg_s/h2/w2</property>
      <property value="0.48">fsim/tables/best_range_fuel_kg_s/h3/w0</property>
      <property value="0.534168">fsim/tables/best_range_fuel_kg_s/h3/w1</property>
      <property value="0.614821">fsim/tables/best_range_fuel_kg_s/h3/w2</property>
      <property value="0.425174">fsim/tables/best_range_fuel_kg_s/h4/w0</property>
      <property value="0.533925">fsim/tables/best_range_fuel_kg_s/h4/w1</property>
      <property value="0.655402">fsim/tables/best_range_fuel_kg_s/h4/w2</property>
      <property value="0.439025">fsim/tables/best_range_fuel_kg_s/h5/w0</property>
      <property value="1.72786">fsim/tables/best_range_fuel_kg_s/h5/w1</property>
      <property value="3.82737">fsim/tables/best_range_fuel_kg_s/h5/w2</property>
      <property value="1.535">fsim/tables/best_range_fuel_kg_s/h6/w0</property>
      <property value="3.30221">fsim/tables/best_range_fuel_kg_s/h6/w1</property>
      <property value="3.54328">fsim/tables/best_range_fuel_kg_s/h6/w2</property>
      <property value="203.451">fsim/tables/best_range_tas_ms/h0/w0</property>
      <property value="223.178">fsim/tables/best_range_tas_ms/h0/w1</property>
      <property value="240.186">fsim/tables/best_range_tas_ms/h0/w2</property>
      <property value="238.379">fsim/tables/best_range_tas_ms/h1/w0</property>
      <property value="262.106">fsim/tables/best_range_tas_ms/h1/w1</property>
      <property value="275.024">fsim/tables/best_range_tas_ms/h1/w2</property>
      <property value="267.535">fsim/tables/best_range_tas_ms/h2/w0</property>
      <property value="270.759">fsim/tables/best_range_tas_ms/h2/w1</property>
      <property value="276.457">fsim/tables/best_range_tas_ms/h2/w2</property>
      <property value="267.956">fsim/tables/best_range_tas_ms/h3/w0</property>
      <property value="268.301">fsim/tables/best_range_tas_ms/h3/w1</property>
      <property value="272.483">fsim/tables/best_range_tas_ms/h3/w2</property>
      <property value="272.965">fsim/tables/best_range_tas_ms/h4/w0</property>
      <property value="279.729">fsim/tables/best_range_tas_ms/h4/w1</property>
      <property value="279.952">fsim/tables/best_range_tas_ms/h4/w2</property>
      <property value="275.961">fsim/tables/best_range_tas_ms/h5/w0</property>
      <property value="287.084">fsim/tables/best_range_tas_ms/h5/w1</property>
      <property value="501.502">fsim/tables/best_range_tas_ms/h5/w2</property>
      <property value="291.355">fsim/tables/best_range_tas_ms/h6/w0</property>
      <property value="530.048">fsim/tables/best_range_tas_ms/h6/w1</property>
      <property value="494.49">fsim/tables/best_range_tas_ms/h6/w2</property>
      <property value="305.186">fsim/tables/climb_tas_ms/h0/w0</property>
      <property value="305.994">fsim/tables/climb_tas_ms/h0/w1</property>
      <property value="310.62">fsim/tables/climb_tas_ms/h0/w2</property>
      <property value="307.363">fsim/tables/climb_tas_ms/h1/w0</property>
      <property value="311.299">fsim/tables/climb_tas_ms/h1/w1</property>
      <property value="309.784">fsim/tables/climb_tas_ms/h1/w2</property>
      <property value="301.634">fsim/tables/climb_tas_ms/h2/w0</property>
      <property value="300.439">fsim/tables/climb_tas_ms/h2/w1</property>
      <property value="301.919">fsim/tables/climb_tas_ms/h2/w2</property>
      <property value="466.59">fsim/tables/climb_tas_ms/h3/w0</property>
      <property value="468.829">fsim/tables/climb_tas_ms/h3/w1</property>
      <property value="469.065">fsim/tables/climb_tas_ms/h3/w2</property>
      <property value="469.864">fsim/tables/climb_tas_ms/h4/w0</property>
      <property value="469.924">fsim/tables/climb_tas_ms/h4/w1</property>
      <property value="470.422">fsim/tables/climb_tas_ms/h4/w2</property>
      <property value="469.922">fsim/tables/climb_tas_ms/h5/w0</property>
      <property value="470.818">fsim/tables/climb_tas_ms/h5/w1</property>
      <property value="471.434">fsim/tables/climb_tas_ms/h5/w2</property>
      <property value="471.095">fsim/tables/climb_tas_ms/h6/w0</property>
      <property value="471.522">fsim/tables/climb_tas_ms/h6/w1</property>
      <property value="471.898">fsim/tables/climb_tas_ms/h6/w2</property>
      <property value="10500">fsim/tables/fuel_capacity_kg</property>
      <property value="0.863816">fsim/tables/fuel_kg_s/h0/w0/v0</property>
      <property value="0.936389">fsim/tables/fuel_kg_s/h0/w0/v1</property>
      <property value="3.00739">fsim/tables/fuel_kg_s/h0/w0/v10</property>
      <property value="9.76378">fsim/tables/fuel_kg_s/h0/w0/v11</property>
      <property value="10.5372">fsim/tables/fuel_kg_s/h0/w0/v12</property>
      <property value="11.336">fsim/tables/fuel_kg_s/h0/w0/v13</property>
      <property value="12.1553">fsim/tables/fuel_kg_s/h0/w0/v14</property>
      <property value="12.9498">fsim/tables/fuel_kg_s/h0/w0/v15</property>
      <property value="1.01215">fsim/tables/fuel_kg_s/h0/w0/v2</property>
      <property value="1.09027">fsim/tables/fuel_kg_s/h0/w0/v3</property>
      <property value="1.1708">fsim/tables/fuel_kg_s/h0/w0/v4</property>
      <property value="1.25222">fsim/tables/fuel_kg_s/h0/w0/v5</property>
      <property value="1.34113">fsim/tables/fuel_kg_s/h0/w0/v6</property>
      <property value="1.44488">fsim/tables/fuel_kg_s/h0/w0/v7</property>
      <property value="1.59062">fsim/tables/fuel_kg_s/h0/w0/v8</property>
      <property value="2.09059">fsim/tables/fuel_kg_s/h0/w0/v9</property>
      <property value="0.799117">fsim/tables/fuel_kg_s/h0/w1/v0</property>
      <property value="0.822951">fsim/tables/fuel_kg_s/h0/w1/v1</property>
      <property value="2.00329">fsim/tables/fuel_kg_s/h0/w1/v10</property>
      <property value="3.07799">fsim/tables/fuel_kg_s/h0/w1/v11</property>
      <property value="10.0127">fsim/tables/fuel_kg_s/h0/w1/v12</property>
      <property value="10.9782">fsim/tables/fuel_kg_s/h0/w1/v13</property>
      <property value="11.9816">fsim/tables/fuel_kg_s/h0/w1/v14</property>
      <property value="12.9645">fsim/tables/fuel_kg_s/h0/w1/v15</property>
      <property value="0.868383">fsim/tables/fuel_kg_s/h0/w1/v2</property>
      <property value="0.9334">fsim/tables/fuel_kg_s/h0/w1/v3</property>
      <property value="1.00743">fsim/tables/fuel_kg_s/h0/w1/v4</property>
      <property value="1.10045">fsim/tables/fuel_kg_s/h0/w1/v5</property>
      <property value="1.19702">fsim/tables/fuel_kg_s/h0/w1/v6</property>
      <property value="1.29334">fsim/tables/fuel_kg_s/h0/w1/v7</property>
      <property value="1.39356">fsim/tables/fuel_kg_s/h0/w1/v8</property>
      <property value="1.54282">fsim/tables/fuel_kg_s/h0/w1/v9</property>
      <property value="0.930636">fsim/tables/fuel_kg_s/h0/w2/v0</property>
      <property value="0.908537">fsim/tables/fuel_kg_s/h0/w2/v1</property>
      <property value="1.88439">fsim/tables/fuel_kg_s/h0/w2/v10</property>
      <property value="2.86709">fsim/tables/fuel_kg_s/h0/w2/v11</property>
      <property value="9.93129">fsim/tables/fuel_kg_s/h0/w2/v12</property>
      <property value="10.9276">fsim/tables/fuel_kg_s/h0/w2/v13</property>
      <property value="11.9651">fsim/tables/fuel_kg_s/h0/w2/v14</property>
      <property value="12.9864">fsim/tables/fuel_kg_s/h0/w2/v15</property>
      <property value="0.925187">fsim/tables/fuel_kg_s/h0/w2/v2</property>
      <property value="0.965002">fsim/tables/fuel_kg_s/h0/w2/v3</property>
      <property value="1.03235">fsim/tables/fuel_kg_s/h0/w2/v4</property>
      <property value="1.10487">fsim/tables/fuel_kg_s/h0/w2/v5</property>
      <property value="1.19949">fsim/tables/fuel_kg_s/h0/w2/v6</property>
      <property value="1.29941">fsim/tables/fuel_kg_s/h0/w2/v7</property>
      <property value="1.39581">fsim/tables/fuel_kg_s/h0/w2/v8</property>
      <property value="1.52399">fsim/tables/fuel_kg_s/h0/w2/v9</property>
      <property value="0.619285">fsim/tables/fuel_kg_s/h1/w0/v0</property>
      <property value="0.607691">fsim/tables/fuel_kg_s/h1/w0/v1</property>
      <property value="2.48402">fsim/tables/fuel_kg_s/h1/w0/v10</property>
      <property value="2.76114">fsim/tables/fuel_kg_s/h1/w0/v11</property>
      <property value="8.43256">fsim/tables/fuel_kg_s/h1/w0/v12</property>
      <property value="9.25852">fsim/tables/fuel_kg_s/h1/w0/v13</property>
      <property value="10.1087">fsim/tables/fuel_kg_s/h1/w0/v14</property>
      <property value="11.0044">fsim/tables/fuel_kg_s/h1/w0/v15</property>
      <property value="0.630208">fsim/tables/fuel_kg_s/h1/w0/v2</property>
      <property value="0.675112">fsim/tables/fuel_kg_s/h1/w0/v3</property>
      <property value="0.730561">fsim/tables/fuel_kg_s/h1/w0/v4</property>
      <property value="0.802966">fsim/tables/fuel_kg_s/h1/w0/v5</property>
      <property value="0.88249">fsim/tables/fuel_kg_s/h1/w0/v6</property>
      <property value="0.984916">fsim/tables/fuel_kg_s/h1/w0/v7</property>
      <property value="1.29069">fsim/tables/fuel_kg_s/h1/w0/v8</property>
      <property value="2.1537">fsim/tables/fuel_kg_s/h1/w0/v9</property>
      <property value="0.743657">fsim/tables/fuel_kg_s/h1/w1/v0</property>
      <property value="0.709134">fsim/tables/fuel_kg_s/h1/w1/v1</property>
      <property value="2.51349">fsim/tables/fuel_kg_s/h1/w1/v10</property>
      <property value="2.78589">fsim/tables/fuel_kg_s/h1/w1/v11</property>
      <property value="8.49104">fsim/tables/fuel_kg_s/h1/w1/v12</property>
      <property value="9.30875">fsim/tables/fuel_kg_s/h1/w1/v13</property>
      <property value="10.1487">fsim/tables/fuel_kg_s/h1/w1/v14</property>
      <property value="11.0308">fsim/tables/fuel_kg_s/h1/w1/v15</property>
      <property value="0.713394">fsim/tables/fuel_kg_s/h1/w1/v2</property>
      <property value="0.740741">fsim/tables/fuel_kg_s/h1/w1/v3</property>
      <property value="0.792706">fsim/tables/fuel_kg_s/h1/w1/v4</property>
      <property value="0.848239">fsim/tables/fuel_kg_s/h1/w1/v5</property>
      <property value="0.924317">fsim/tables/fuel_kg_s/h1/w1/v6</property>
      <property value="1.02861">fsim/tables/fuel_kg_s/h1/w1/v7</property>
      <property value="1.36121">fsim/tables/fuel_kg_s/h1/w1/v8</property>
      <property value="2.24357">fsim/tables/fuel_kg_s/h1/w1/v9</property>
      <property value="0.916145">fsim/tables/fuel_kg_s/h1/w2/v0</property>
      <property value="0.83137">fsim/tables/fuel_kg_s/h1/w2/v1</property>
      <property value="2.51901">fsim/tables/fuel_kg_s/h1/w2/v10</property>
      <property value="2.79242">fsim/tables/fuel_kg_s/h1/w2/v11</property>
      <property value="8.50722">fsim/tables/fuel_kg_s/h1/w2/v12</property>
      <property value="9.32169">fsim/tables/fuel_kg_s/h1/w2/v13</property>
      <property value="10.1682">fsim/tables/fuel_kg_s/h1/w2/v14</property>
      <property value="11.0622">fsim/tables/fuel_kg_s/h1/w2/v15</property>
      <property value="0.8042">fsim/tables/fuel_kg_s/h1/w2/v2</property>
      <property value="0.810578">fsim/tables/fuel_kg_s/h1/w2/v3</property>
      <property value="0.838213">fsim/tables/fuel_kg_s/h1/w2/v4</property>
      <property value="0.891398">fsim/tables/fuel_kg_s/h1/w2/v5</property>
      <property value="0.948526">fsim/tables/fuel_kg_s/h1/w2/v6</property>
      <property value="1.04161">fsim/tables/fuel_kg_s/h1/w2/v7</property>
      <property value="1.3206">fsim/tables/fuel_kg_s/h1/w2/v8</property>
      <property value="2.14442">fsim/tables/fuel_kg_s/h1/w2/v9</property>
      <property value="0.613272">fsim/tables/fuel_kg_s/h2/w0/v0</property>
      <property value="0.547607">fsim/tables/fuel_kg_s/h2/w0/v1</property>
      <property value="1.91444">fsim/tables/fuel_kg_s/h2/w0/v10</property>
      <property value="6.14924">fsim/tables/fuel_kg_s/h2/w0/v11</property>
      <property value="6.7942">fsim/tables/fuel_kg_s/h2/w0/v12</property>
      <property value="7.48981">fsim/tables/fuel_kg_s/h2/w0/v13</property>
      <property value="8.21853">fsim/tables/fuel_kg_s/h2/w0/v14</property>
      <property value="8.97327">fsim/tables/fuel_kg_s/h2/w0/v15</property>
      <property value="0.530149">fsim/tables/fuel_kg_s/h2/w0/v2</property>
      <property value="0.540572">fsim/tables/fuel_kg_s/h2/w0/v3</property>
      <property value="0.569372">fsim/tables/fuel_kg_s/h2/w0/v4</property>
      <property value="0.612099">fsim/tables/fuel_kg_s/h2/w0/v5</property>
      <property value="0.694003">fsim/tables/fuel_kg_s/h2/w0/v6</property>
      <property value="1.17986">fsim/tables/fuel_kg_s/h2/w0/v7</property>
      <property value="1.52639">fsim/tables/fuel_kg_s/h2/w0/v8</property>
      <property value="1.71906">fsim/tables/fuel_kg_s/h2/w0/v9</property>
      <property value="0.744833">fsim/tables/fuel_kg_s/h2/w1/v0</property>
      <property value="0.65794">fsim/tables/fuel_kg_s/h2/w1/v1</property>
      <property value="1.96925">fsim/tables/fuel_kg_s/h2/w1/v10</property>
      <property value="6.30548">fsim/tables/fuel_kg_s/h2/w1/v11</property>
      <property value="6.94132">fsim/tables/fuel_kg_s/h2/w1/v12</property>
      <property value="7.59771">fsim/tables/fuel_kg_s/h2/w1/v13</property>
      <property value="8.27821">fsim/tables/fuel_kg_s/h2/w1/v14</property>
      <property value="9.01022">fsim/tables/fuel_kg_s/h2/w1/v15</property>
      <property value="0.619428">fsim/tables/fuel_kg_s/h2/w1/v2</property>
      <property value="0.615981">fsim/tables/fuel_kg_s/h2/w1/v3</property>
      <property value="0.633593">fsim/tables/fuel_kg_s/h2/w1/v4</property>
      <property value="0.672549">fsim/tables/fuel_kg_s/h2/w1/v5</property>
      <property value="0.78197">fsim/tables/fuel_kg_s/h2/w1/v6</property>
      <property value="1.32106">fsim/tables/fuel_kg_s/h2/w1/v7</property>
      <property value="1.58087">fsim/tables/fuel_kg_s/h2/w1/v8</property>
      <property value="1.77402">fsim/tables/fuel_kg_s/h2/w1/v9</property>
      <property value="0.92944">fsim/tables/fuel_kg_s/h2/w2/v0</property>
      <property value="0.792342">fsim/tables/fuel_kg_s/h2/w2/v1</property>
      <property value="2.00173">fsim/tables/fuel_kg_s/h2/w2/v10</property>
      <property value="6.40357">fsim/tables/fuel_kg_s/h2/w2/v11</property>
      <property value="7.04052">fsim/tables/fuel_kg_s/h2/w2/v12</property>
      <property value="7.69119">fsim/tables/fuel_kg_s/h2/w2/v13</property>
      <property value="8.36628">fsim/tables/fuel_kg_s/h2/w2/v14</property>
      <property value="9.07993">fsim/tables/fuel_kg_s/h2/w2/v15</property>
      <property value="0.724794">fsim/tables/fuel_kg_s/h2/w2/v2</property>
      <property value="0.700818">fsim/tables/fuel_kg_s/h2/w2/v3</property>
      <property value="0.702241">fsim/tables/fuel_kg_s/h2/w2/v4</property>
      <property value="0.723734">fsim/tables/fuel_kg_s/h2/w2/v5</property>
      <property value="0.822357">fsim/tables/fuel_kg_s/h2/w2/v6</property>
      <property value="1.33944">fsim/tables/fuel_kg_s/h2/w2/v7</property>
      <property value="1.60808">fsim/tables/fuel_kg_s/h2/w2/v8</property>
      <property value="1.80299">fsim/tables/fuel_kg_s/h2/w2/v9</property>
      <property value="0.706773">fsim/tables/fuel_kg_s/h3/w0/v0</property>
      <property value="0.549809">fsim/tables/fuel_kg_s/h3/w0/v1</property>
      <property value="4.34561">fsim/tables/fuel_kg_s/h3/w0/v10</property>
      <property value="4.82555">fsim/tables/fuel_kg_s/h3/w0/v11</property>
      <property value="5.33802">fsim/tables/fuel_kg_s/h3/w0/v12</property>
      <property value="5.88396">fsim/tables/fuel_kg_s/h3/w0/v13</property>
      <property value="6.45182">fsim/tables/fuel_kg_s/h3/w0/v14</property>
      <property value="7.04077">fsim/tables/fuel_kg_s/h3/w0/v15</property>
      <property value="0.482939">fsim/tables/fuel_kg_s/h3/w0/v2</property>
      <property value="0.456252">fsim/tables/fuel_kg_s/h3/w0/v3</property>
      <property value="0.456372">fsim/tables/fuel_kg_s/h3/w0/v4</property>
      <property value="0.514267">fsim/tables/fuel_kg_s/h3/w0/v5</property>
      <property value="0.874452">fsim/tables/fuel_kg_s/h3/w0/v6</property>
      <property value="0.997919">fsim/tables/fuel_kg_s/h3/w0/v7</property>
      <property value="1.1312">fsim/tables/fuel_kg_s/h3/w0/v8</property>
      <property value="1.27639">fsim/tables/fuel_kg_s/h3/w0/v9</property>
      <property value="0.766293">fsim/tables/fuel_kg_s/h3/w1/v0</property>
      <property value="0.630151">fsim/tables/fuel_kg_s/h3/w1/v1</property>
      <property value="4.59086">fsim/tables/fuel_kg_s/h3/w1/v10</property>
      <property value="5.03805">fsim/tables/fuel_kg_s/h3/w1/v11</property>
      <property value="5.52372">fsim/tables/fuel_kg_s/h3/w1/v12</property>
      <property value="6.03841">fsim/tables/fuel_kg_s/h3/w1/v13</property>
      <property value="6.57304">fsim/tables/fuel_kg_s/h3/w1/v14</property>
      <property value="7.12645">fsim/tables/fuel_kg_s/h3/w1/v15</property>
      <property value="0.563921">fsim/tables/fuel_kg_s/h3/w1/v2</property>
      <property value="0.533399">fsim/tables/fuel_kg_s/h3/w1/v3</property>
      <property value="0.534299">fsim/tables/fuel_kg_s/h3/w1/v4</property>
      <property value="0.717945">fsim/tables/fuel_kg_s/h3/w1/v5</property>
      <property value="0.974907">fsim/tables/fuel_kg_s/h3/w1/v6</property>
      <property value="1.10258">fsim/tables/fuel_kg_s/h3/w1/v7</property>
      <property value="1.23557">fsim/tables/fuel_kg_s/h3/w1/v8</property>
      <property value="4.1877">fsim/tables/fuel_kg_s/h3/w1/v9</property>
      <property value="0.960342">fsim/tables/fuel_kg_s/h3/w2/v0</property>
      <property value="0.767604">fsim/tables/fuel_kg_s/h3/w2/v1</property>
      <property value="4.80581">fsim/tables/fuel_kg_s/h3/w2/v10</property>
      <property value="5.20373">fsim/tables/fuel_kg_s/h3/w2/v11</property>
      <property value="5.6534">fsim/tables/fuel_kg_s/h3/w2/v12</property>
      <property value="6.1541">fsim/tables/fuel_kg_s/h3/w2/v13</property>
      <property value="6.67577">fsim/tables/fuel_kg_s/h3/w2/v14</property>
      <property value="7.21471">fsim/tables/fuel_kg_s/h3/w2/v15</property>
      <property value="0.670694">fsim/tables/fuel_kg_s/h3/w2/v2</property>
      <property value="0.623575">fsim/tables/fuel_kg_s/h3/w2/v3</property>
      <property value="0.613559">fsim/tables/fuel_kg_s/h3/w2/v4</property>
      <property value="0.828417">fsim/tables/fuel_kg_s/h3/w2/v5</property>
      <property value="1.04992">fsim/tables/fuel_kg_s/h3/w2/v6</property>
      <property value="1.17307">fsim/tables/fuel_kg_s/h3/w2/v7</property>
      <property value="3.97503">fsim/tables/fuel_kg_s/h3/w2/v8</property>
      <property value="4.41411">fsim/tables/fuel_kg_s/h3/w2/v9</property>
      <property value="1.19325">fsim/tables/fuel_kg_s/h4/w0/v0</property>
      <property value="0.544923">fsim/tables/fuel_kg_s/h4/w0/v1</property>
      <property value="3.26688">fsim/tables/fuel_kg_s/h4/w0/v10</property>
      <property value="3.53702">fsim/tables/fuel_kg_s/h4/w0/v11</property>
      <property value="3.84682">fsim/tables/fuel_kg_s/h4/w0/v12</property>
      <property value="4.18053">fsim/tables/fuel_kg_s/h4/w0/v13</property>
      <property value="4.53405">fsim/tables/fuel_kg_s/h4/w0/v14</property>
      <property value="4.90253">fsim/tables/fuel_kg_s/h4/w0/v15</property>
      <property value="0.471647">fsim/tables/fuel_kg_s/h4/w0/v2</property>
      <property value="0.43335">fsim/tables/fuel_kg_s/h4/w0/v3</property>
      <property value="0.423873">fsim/tables/fuel_kg_s/h4/w0/v4</property>
      <property value="0.588985">fsim/tables/fuel_kg_s/h4/w0/v5</property>
      <property value="0.714539">fsim/tables/fuel_kg_s/h4/w0/v6</property>
      <property value="0.799084">fsim/tables/fuel_kg_s/h4/w0/v7</property>
      <property value="2.71099">fsim/tables/fuel_kg_s/h4/w0/v8</property>
      <property value="3.01086">fsim/tables/fuel_kg_s/h4/w0/v9</property>
      <property value="2.64357">fsim/tables/fuel_kg_s/h4/w1/v0</property>
      <property value="0.686615">fsim/tables/fuel_kg_s/h4/w1/v1</property>
      <property value="3.49451">fsim/tables/fuel_kg_s/h4/w1/v10</property>
      <property value="3.74734">fsim/tables/fuel_kg_s/h4/w1/v11</property>
      <property value="4.03301">fsim/tables/fuel_kg_s/h4/w1/v12</property>
      <property value="4.34404">fsim/tables/fuel_kg_s/h4/w1/v13</property>
      <property value="4.66573">fsim/tables/fuel_kg_s/h4/w1/v14</property>
      <property value="4.99718">fsim/tables/fuel_kg_s/h4/w1/v15</property>
      <property value="0.584725">fsim/tables/fuel_kg_s/h4/w1/v2</property>
      <property value="0.531088">fsim/tables/fuel_kg_s/h4/w1/v3</property>
      <property value="0.534713">fsim/tables/fuel_kg_s/h4/w1/v4</property>
      <property value="0.74337">fsim/tables/fuel_kg_s/h4/w1/v5</property>
      <property value="0.813741">fsim/tables/fuel_kg_s/h4/w1/v6</property>
      <property value="2.73851">fsim/tables/fuel_kg_s/h4/w1/v7</property>
      <property value="3.01641">fsim/tables/fuel_kg_s/h4/w1/v8</property>
      <property value="3.29623">fsim/tables/fuel_kg_s/h4/w1/v9</property>
      <property value="2.63961">fsim/tables/fuel_kg_s/h4/w2/v1</property>
      <property value="3.79177">fsim/tables/fuel_kg_s/h4/w2/v10</property>
      <property value="3.98603">fsim/tables/fuel_kg_s/h4/w2/v11</property>
      <property value="4.22266">fsim/tables/fuel_kg_s/h4/w2/v12</property>
      <property value="4.51309">fsim/tables/fuel_kg_s/h4/w2/v13</property>
      <property value="4.82039">fsim/tables/fuel_kg_s/h4/w2/v14</property>
      <property value="5.13148">fsim/tables/fuel_kg_s/h4/w2/v15</property>
      <property value="0.728092">fsim/tables/fuel_kg_s/h4/w2/v2</property>
      <property value="0.646928">fsim/tables/fuel_kg_s/h4/w2/v3</property>
      <property value="0.661482">fsim/tables/fuel_kg_s/h4/w2/v4</property>
      <property value="2.61957">fsim/tables/fuel_kg_s/h4/w2/v5</property>
      <property value="2.82315">fsim/tables/fuel_kg_s/h4/w2/v6</property>
      <property value="3.07881">fsim/tables/fuel_kg_s/h4/w2/v7</property>
      <property value="3.34271">fsim/tables/fuel_kg_s/h4/w2/v8</property>
      <property value="3.60857">fsim/tables/fuel_kg_s/h4/w2/v9</property>
      <property value="1.77926">fsim/tables/fuel_kg_s/h5/w0/v1</property>
      <property value="2.72305">fsim/tables/fuel_kg_s/h5/w0/v10</property>
      <property value="2.8767">fsim/tables/fuel_kg_s/h5/w0/v11</property>
      <property value="3.07803">fsim/tables/fuel_kg_s/h5/w0/v12</property>
      <property value="3.30165">fsim/tables/fuel_kg_s/h5/w0/v13</property>
      <property value="3.53769">fsim/tables/fuel_kg_s/h5/w0/v14</property>
      <property value="3.77654">fsim/tables/fuel_kg_s/h5/w0/v15</property>
      <property value="0.493057">fsim/tables/fuel_kg_s/h5/w0/v2</property>
      <property value="0.44074">fsim/tables/fuel_kg_s/h5/w0/v3</property>
      <property value="0.437945">fsim/tables/fuel_kg_s/h5/w0/v4</property>
      <property value="1.81221">fsim/tables/fuel_kg_s/h5/w0/v5</property>
      <property value="1.97324">fsim/tables/fuel_kg_s/h5/w0/v6</property>
      <property value="2.16004">fsim/tables/fuel_kg_s/h5/w0/v7</property>
      <property value="2.3569">fsim/tables/fuel_kg_s/h5/w0/v8</property>
      <property value="2.5757">fsim/tables/fuel_kg_s/h5/w0/v9</property>
      <property value="3.03406">fsim/tables/fuel_kg_s/h5/w1/v10</property>
      <property value="3.16139">fsim/tables/fuel_kg_s/h5/w1/v11</property>
      <property value="3.31707">fsim/tables/fuel_kg_s/h5/w1/v12</property>
      <property value="3.50783">fsim/tables/fuel_kg_s/h5/w1/v13</property>
      <property value="3.71805">fsim/tables/fuel_kg_s/h5/w1/v14</property>
      <property value="3.92125">fsim/tables/fuel_kg_s/h5/w1/v15</property>
      <property value="1.98099">fsim/tables/fuel_kg_s/h5/w1/v2</property>
      <property value="1.68797">fsim/tables/fuel_kg_s/h5/w1/v3</property>
      <property value="1.73999">fsim/tables/fuel_kg_s/h5/w1/v4</property>
      <property value="2.19892">fsim/tables/fuel_kg_s/h5/w1/v5</property>
      <property value="2.35243">fsim/tables/fuel_kg_s/h5/w1/v6</property>
      <property value="2.52724">fsim/tables/fuel_kg_s/h5/w1/v7</property>
      <property value="2.72471">fsim/tables/fuel_kg_s/h5/w1/v8</property>
      <property value="2.93394">fsim/tables/fuel_kg_s/h5/w1/v9</property>
      <property value="3.41033">fsim/tables/fuel_kg_s/h5/w2/v10</property>
      <property value="3.51345">fsim/tables/fuel_kg_s/h5/w2/v11</property>
      <property value="3.62004">fsim/tables/fuel_kg_s/h5/w2/v12</property>
      <property value="3.76723">fsim/tables/fuel_kg_s/h5/w2/v13</property>
      <property value="3.94116">fsim/tables/fuel_kg_s/h5/w2/v14</property>
      <property value="4.13007">fsim/tables/fuel_kg_s/h5/w2/v15</property>
      <property value="2.26066">fsim/tables/fuel_kg_s/h5/w2/v3</property>
      <property value="2.25906">fsim/tables/fuel_kg_s/h5/w2/v4</property>
      <property value="2.63653">fsim/tables/fuel_kg_s/h5/w2/v5</property>
      <property value="2.77119">fsim/tables/fuel_kg_s/h5/w2/v6</property>
      <property value="2.92814">fsim/tables/fuel_kg_s/h5/w2/v7</property>
      <property value="3.11839">fsim/tables/fuel_kg_s/h5/w2/v8</property>
      <property value="3.31567">fsim/tables/fuel_kg_s/h5/w2/v9</property>
      <property value="2.43251">fsim/tables/fuel_kg_s/h6/w0/v10</property>
      <property value="2.50656">fsim/tables/fuel_kg_s/h6/w0/v11</property>
      <property value="2.62412">fsim/tables/fuel_kg_s/h6/w0/v12</property>
      <property value="2.75659">fsim/tables/fuel_kg_s/h6/w0/v13</property>
      <property value="2.90785">fsim/tables/fuel_kg_s/h6/w0/v14</property>
      <property value="3.05693">fsim/tables/fuel_kg_s/h6/w0/v15</property>
      <property value="1.64167">fsim/tables/fuel_kg_s/h6/w0/v2</property>
      <property value="1.47222">fsim/tables/fuel_kg_s/h6/w0/v3</property>
      <property value="1.55778">fsim/tables/fuel_kg_s/h6/w0/v4</property>
      <property value="1.82134">fsim/tables/fuel_kg_s/h6/w0/v5</property>
      <property value="1.9321">fsim/tables/fuel_kg_s/h6/w0/v6</property>
      <property value="2.07138">fsim/tables/fuel_kg_s/h6/w0/v7</property>
      <property value="2.21295">fsim/tables/fuel_kg_s/h6/w0/v8</property>
      <property value="2.36671">fsim/tables/fuel_kg_s/h6/w0/v9</property>
      <property value="2.89319">fsim/tables/fuel_kg_s/h6/w1/v10</property>
      <property value="2.94171">fsim/tables/fuel_kg_s/h6/w1/v11</property>
      <property value="3.01155">fsim/tables/fuel_kg_s/h6/w1/v12</property>
      <property value="3.09479">fsim/tables/fuel_kg_s/h6/w1/v13</property>
      <property value="3.19168">fsim/tables/fuel_kg_s/h6/w1/v14</property>
      <property value="3.30221">fsim/tables/fuel_kg_s/h6/w1/v15</property>
      <property value="2.02794">fsim/tables/fuel_kg_s/h6/w1/v2</property>
      <property value="2.27719">fsim/tables/fuel_kg_s/h6/w1/v3</property>
      <property value="2.34187">fsim/tables/fuel_kg_s/h6/w1/v4</property>
      <property value="2.42748">fsim/tables/fuel_kg_s/h6/w1/v5</property>
      <property value="2.54856">fsim/tables/fuel_kg_s/h6/w1/v6</property>
      <property value="2.656">fsim/tables/fuel_kg_s/h6/w1/v7</property>
      <property value="2.772">fsim/tables/fuel_kg_s/h6/w1/v8</property>
      <property value="2.85504">fsim/tables/fuel_kg_s/h6/w1/v9</property>
      <property value="3.42948">fsim/tables/fuel_kg_s/h6/w2/v11</property>
      <property value="3.4677">fsim/tables/fuel_kg_s/h6/w2/v12</property>
      <property value="3.50859">fsim/tables/fuel_kg_s/h6/w2/v13</property>
      <property value="3.54543">fsim/tables/fuel_kg_s/h6/w2/v14</property>
      <property value="3.75335">fsim/tables/fuel_kg_s/h6/w2/v15</property>
      <property value="362.74">fsim/tables/max_climb_ms/h0/w0</property>
      <property value="298.194">fsim/tables/max_climb_ms/h0/w1</property>
      <property value="252.691">fsim/tables/max_climb_ms/h0/w2</property>
      <property value="308.24">fsim/tables/max_climb_ms/h1/w0</property>
      <property value="253.457">fsim/tables/max_climb_ms/h1/w1</property>
      <property value="214.778">fsim/tables/max_climb_ms/h1/w2</property>
      <property value="232.35">fsim/tables/max_climb_ms/h2/w0</property>
      <property value="189.778">fsim/tables/max_climb_ms/h2/w1</property>
      <property value="159.124">fsim/tables/max_climb_ms/h2/w2</property>
      <property value="206.687">fsim/tables/max_climb_ms/h3/w0</property>
      <property value="165.454">fsim/tables/max_climb_ms/h3/w1</property>
      <property value="136.004">fsim/tables/max_climb_ms/h3/w2</property>
      <property value="142.091">fsim/tables/max_climb_ms/h4/w0</property>
      <property value="109.505">fsim/tables/max_climb_ms/h4/w1</property>
      <property value="86.1701">fsim/tables/max_climb_ms/h4/w2</property>
      <property value="92.0264">fsim/tables/max_climb_ms/h5/w0</property>
      <property value="66.2019">fsim/tables/max_climb_ms/h5/w1</property>
      <property value="45.8218">fsim/tables/max_climb_ms/h5/w2</property>
      <property value="60.254">fsim/tables/max_climb_ms/h6/w0</property>
      <property value="35.4717">fsim/tables/max_climb_ms/h6/w1</property>
      <property value="15.9931">fsim/tables/max_climb_ms/h6/w2</property>
      <property value="437.415">fsim/tables/max_tas_ms/h0/w0</property>
      <property value="436.799">fsim/tables/max_tas_ms/h0/w1</property>
      <property value="436.281">fsim/tables/max_tas_ms/h0/w2</property>
      <property value="485.823">fsim/tables/max_tas_ms/h1/w0</property>
      <property value="485.028">fsim/tables/max_tas_ms/h1/w1</property>
      <property value="484.266">fsim/tables/max_tas_ms/h1/w2</property>
      <property value="538.381">fsim/tables/max_tas_ms/h2/w0</property>
      <property value="537.367">fsim/tables/max_tas_ms/h2/w1</property>
      <property value="535.599">fsim/tables/max_tas_ms/h2/w2</property>
      <property value="594.594">fsim/tables/max_tas_ms/h3/w0</property>
      <property value="591.679">fsim/tables/max_tas_ms/h3/w1</property>
      <property value="588.676">fsim/tables/max_tas_ms/h3/w2</property>
      <property value="596.312">fsim/tables/max_tas_ms/h4/w0</property>
      <property value="588.461">fsim/tables/max_tas_ms/h4/w1</property>
      <property value="580.835">fsim/tables/max_tas_ms/h4/w2</property>
      <property value="580.442">fsim/tables/max_tas_ms/h5/w0</property>
      <property value="569.982">fsim/tables/max_tas_ms/h5/w1</property>
      <property value="555.031">fsim/tables/max_tas_ms/h5/w2</property>
      <property value="568.282">fsim/tables/max_tas_ms/h6/w0</property>
      <property value="546.572">fsim/tables/max_tas_ms/h6/w1</property>
      <property value="527.094">fsim/tables/max_tas_ms/h6/w2</property>
      <property value="203.451">fsim/tables/min_tas_ms/h0/w0</property>
      <property value="152.67">fsim/tables/min_tas_ms/h0/w1</property>
      <property value="143.078">fsim/tables/min_tas_ms/h0/w2</property>
      <property value="144.419">fsim/tables/min_tas_ms/h1/w0</property>
      <property value="148.83">fsim/tables/min_tas_ms/h1/w1</property>
      <property value="143.66">fsim/tables/min_tas_ms/h1/w2</property>
      <property value="143.125">fsim/tables/min_tas_ms/h2/w0</property>
      <property value="150.973">fsim/tables/min_tas_ms/h2/w1</property>
      <property value="151.192">fsim/tables/min_tas_ms/h2/w2</property>
      <property value="139.435">fsim/tables/min_tas_ms/h3/w0</property>
      <property value="162.612">fsim/tables/min_tas_ms/h3/w1</property>
      <property value="168.547">fsim/tables/min_tas_ms/h3/w2</property>
      <property value="167.038">fsim/tables/min_tas_ms/h4/w0</property>
      <property value="181.593">fsim/tables/min_tas_ms/h4/w1</property>
      <property value="191.05">fsim/tables/min_tas_ms/h4/w2</property>
      <property value="184.895">fsim/tables/min_tas_ms/h5/w0</property>
      <property value="197.949">fsim/tables/min_tas_ms/h5/w1</property>
      <property value="204.704">fsim/tables/min_tas_ms/h5/w2</property>
      <property value="205.198">fsim/tables/min_tas_ms/h6/w0</property>
      <property value="256.851">fsim/tables/min_tas_ms/h6/w1</property>
      <property value="272.801">fsim/tables/min_tas_ms/h6/w2</property>
      <property value="264.592">fsim/tables/ps_full_ms/h0/w0/v0</property>
      <property value="283.653">fsim/tables/ps_full_ms/h0/w0/v1</property>
      <property value="264.364">fsim/tables/ps_full_ms/h0/w0/v10</property>
      <property value="197.851">fsim/tables/ps_full_ms/h0/w0/v11</property>
      <property value="162.715">fsim/tables/ps_full_ms/h0/w0/v12</property>
      <property value="127.748">fsim/tables/ps_full_ms/h0/w0/v13</property>
      <property value="88.5352">fsim/tables/ps_full_ms/h0/w0/v14</property>
      <property value="43.3983">fsim/tables/ps_full_ms/h0/w0/v15</property>
      <property value="302.595">fsim/tables/ps_full_ms/h0/w0/v2</property>
      <property value="320.91">fsim/tables/ps_full_ms/h0/w0/v3</property>
      <property value="337.214">fsim/tables/ps_full_ms/h0/w0/v4</property>
      <property value="350.473">fsim/tables/ps_full_ms/h0/w0/v5</property>
      <property value="359.947">fsim/tables/ps_full_ms/h0/w0/v6</property>
      <property value="362.38">fsim/tables/ps_full_ms/h0/w0/v7</property>
      <property value="352.198">fsim/tables/ps_full_ms/h0/w0/v8</property>
      <property value="321.108">fsim/tables/ps_full_ms/h0/w0/v9</property>
      <property value="161.255">fsim/tables/ps_full_ms/h0/w1/v0</property>
      <property value="180.698">fsim/tables/ps_full_ms/h0/w1/v1</property>
      <property value="273.773">fsim/tables/ps_full_ms/h0/w1/v10</property>
      <property value="211.69">fsim/tables/ps_full_ms/h0/w1/v11</property>
      <property value="151.496">fsim/tables/ps_full_ms/h0/w1/v12</property>
      <property value="118.05">fsim/tables/ps_full_ms/h0/w1/v13</property>
      <property value="79.8738">fsim/tables/ps_full_ms/h0/w1/v14</property>
      <property value="35.4045">fsim/tables/ps_full_ms/h0/w1/v15</property>
      <property value="199.74">fsim/tables/ps_full_ms/h0/w1/v2</property>
      <property value="218.612">fsim/tables/ps_full_ms/h0/w1/v3</property>
      <property value="237.473">fsim/tables/ps_full_ms/h0/w1/v4</property>
      <property value="256.118">fsim/tables/ps_full_ms/h0/w1/v5</property>
      <property value="273.382">fsim/tables/ps_full_ms/h0/w1/v6</property>
      <property value="287.246">fsim/tables/ps_full_ms/h0/w1/v7</property>
      <property value="296.429">fsim/tables/ps_full_ms/h0/w1/v8</property>
      <property value="296.426">fsim/tables/ps_full_ms/h0/w1/v9</property>
      <property value="125.875">fsim/tables/ps_full_ms/h0/w2/v0</property>
      <property value="143.303">fsim/tables/ps_full_ms/h0/w2/v1</property>
      <property value="239.757">fsim/tables/ps_full_ms/h0/w2/v10</property>
      <property value="188.817">fsim/tables/ps_full_ms/h0/w2/v11</property>
      <property value="131.229">fsim/tables/ps_full_ms/h0/w2/v12</property>
      <property value="102.162">fsim/tables/ps_full_ms/h0/w2/v13</property>
      <property value="68.7628">fsim/tables/ps_full_ms/h0/w2/v14</property>
      <property value="29.9656">fsim/tables/ps_full_ms/h0/w2/v15</property>
      <property value="160.188">fsim/tables/ps_full_ms/h0/w2/v2</property>
      <property value="176.594">fsim/tables/ps_full_ms/h0/w2/v3</property>
      <property value="193.128">fsim/tables/ps_full_ms/h0/w2/v4</property>
      <property value="209.697">fsim/tables/ps_full_ms/h0/w2/v5</property>
      <property value="225.84">fsim/tables/ps_full_ms/h0/w2/v6</property>
      <property value="239.537">fsim/tables/ps_full_ms/h0/w2/v7</property>
      <property value="248.893">fsim/tables/ps_full_ms/h0/w2/v8</property>
      <property value="252.605">fsim/tables/ps_full_ms/h0/w2/v9</property>
      <property value="148.133">fsim/tables/ps_full_ms/h1/w0/v0</property>
      <property value="170.218">fsim/tables/ps_full_ms/h1/w0/v1</property>
      <property value="237.396">fsim/tables/ps_full_ms/h1/w0/v10</property>
      <property value="220.422">fsim/tables/ps_full_ms/h1/w0/v11</property>
      <property value="190.701">fsim/tables/ps_full_ms/h1/w0/v12</property>
      <property value="149.782">fsim/tables/ps_full_ms/h1/w0/v13</property>
      <property value="102.708">fsim/tables/ps_full_ms/h1/w0/v14</property>
      <property value="45.0297">fsim/tables/ps_full_ms/h1/w0/v15</property>
      <property value="192.227">fsim/tables/ps_full_ms/h1/w0/v2</property>
      <property value="214.688">fsim/tables/ps_full_ms/h1/w0/v3</property>
      <property value="237.188">fsim/tables/ps_full_ms/h1/w0/v4</property>
      <property value="259.773">fsim/tables/ps_full_ms/h1/w0/v5</property>
      <property value="283.171">fsim/tables/ps_full_ms/h1/w0/v6</property>
      <property value="304.025">fsim/tables/ps_full_ms/h1/w0/v7</property>
      <property value="303.584">fsim/tables/ps_full_ms/h1/w0/v8</property>
      <property value="268.718">fsim/tables/ps_full_ms/h1/w0/v9</property>
      <property value="120.842">fsim/tables/ps_full_ms/h1/w1/v0</property>
      <property value="139.72">fsim/tables/ps_full_ms/h1/w1/v1</property>
      <property value="193.198">fsim/tables/ps_full_ms/h1/w1/v10</property>
      <property value="179.722">fsim/tables/ps_full_ms/h1/w1/v11</property>
      <property value="155.099">fsim/tables/ps_full_ms/h1/w1/v12</property>
      <property value="121.982">fsim/tables/ps_full_ms/h1/w1/v13</property>
      <property value="83.7431">fsim/tables/ps_full_ms/h1/w1/v14</property>
      <property value="36.7094">fsim/tables/ps_full_ms/h1/w1/v15</property>
      <property value="158.248">fsim/tables/ps_full_ms/h1/w1/v2</property>
      <property value="176.822">fsim/tables/ps_full_ms/h1/w1/v3</property>
      <property value="195.237">fsim/tables/ps_full_ms/h1/w1/v4</property>
      <property value="213.866">fsim/tables/ps_full_ms/h1/w1/v5</property>
      <property value="233.133">fsim/tables/ps_full_ms/h1/w1/v6</property>
      <property value="250.206">fsim/tables/ps_full_ms/h1/w1/v7</property>
      <property value="248.755">fsim/tables/ps_full_ms/h1/w1/v8</property>
      <property value="214.333">fsim/tables/ps_full_ms/h1/w1/v9</property>
      <property value="95.7536">fsim/tables/ps_full_ms/h1/w2/v0</property>
      <property value="112.432">fsim/tables/ps_full_ms/h1/w2/v1</property>
      <property value="162.781">fsim/tables/ps_full_ms/h1/w2/v10</property>
      <property value="151.483">fsim/tables/ps_full_ms/h1/w2/v11</property>
      <property value="131.504">fsim/tables/ps_full_ms/h1/w2/v12</property>
      <property value="103.87">fsim/tables/ps_full_ms/h1/w2/v13</property>
      <property value="71.0433">fsim/tables/ps_full_ms/h1/w2/v14</property>
      <property value="30.9784">fsim/tables/ps_full_ms/h1/w2/v15</property>
      <property value="128.363">fsim/tables/ps_full_ms/h1/w2/v2</property>
      <property value="144.352">fsim/tables/ps_full_ms/h1/w2/v3</property>
      <property value="160.28">fsim/tables/ps_full_ms/h1/w2/v4</property>
      <property value="176.224">fsim/tables/ps_full_ms/h1/w2/v5</property>
      <property value="193.25">fsim/tables/ps_full_ms/h1/w2/v6</property>
      <property value="209.569">fsim/tables/ps_full_ms/h1/w2/v7</property>
      <property value="212.927">fsim/tables/ps_full_ms/h1/w2/v8</property>
      <property value="183.108">fsim/tables/ps_full_ms/h1/w2/v9</property>
      <property value="109.892">fsim/tables/ps_full_ms/h2/w0/v0</property>
      <property value="129.667">fsim/tables/ps_full_ms/h2/w0/v1</property>
      <property value="219.319">fsim/tables/ps_full_ms/h2/w0/v10</property>
      <property value="210.789">fsim/tables/ps_full_ms/h2/w0/v11</property>
      <property value="190.192">fsim/tables/ps_full_ms/h2/w0/v12</property>
      <property value="151.357">fsim/tables/ps_full_ms/h2/w0/v13</property>
      <property value="105.885">fsim/tables/ps_full_ms/h2/w0/v14</property>
      <property value="44.0935">fsim/tables/ps_full_ms/h2/w0/v15</property>
      <property value="149.249">fsim/tables/ps_full_ms/h2/w0/v2</property>
      <property value="169.881">fsim/tables/ps_full_ms/h2/w0/v3</property>
      <property value="191.231">fsim/tables/ps_full_ms/h2/w0/v4</property>
      <property value="213.284">fsim/tables/ps_full_ms/h2/w0/v5</property>
      <property value="231.268">fsim/tables/ps_full_ms/h2/w0/v6</property>
      <property value="222.619">fsim/tables/ps_full_ms/h2/w0/v7</property>
      <property value="215.884">fsim/tables/ps_full_ms/h2/w0/v8</property>
      <property value="222.425">fsim/tables/ps_full_ms/h2/w0/v9</property>
      <property value="88.6411">fsim/tables/ps_full_ms/h2/w1/v0</property>
      <property value="106.37">fsim/tables/ps_full_ms/h2/w1/v1</property>
      <property value="176.205">fsim/tables/ps_full_ms/h2/w1/v10</property>
      <property value="168.443">fsim/tables/ps_full_ms/h2/w1/v11</property>
      <property value="150.947">fsim/tables/ps_full_ms/h2/w1/v12</property>
      <property value="120.735">fsim/tables/ps_full_ms/h2/w1/v13</property>
      <property value="85.1649">fsim/tables/ps_full_ms/h2/w1/v14</property>
      <property value="35.9613">fsim/tables/ps_full_ms/h2/w1/v15</property>
      <property value="123.466">fsim/tables/ps_full_ms/h2/w1/v2</property>
      <property value="140.911">fsim/tables/ps_full_ms/h2/w1/v3</property>
      <property value="158.536">fsim/tables/ps_full_ms/h2/w1/v4</property>
      <property value="176.793">fsim/tables/ps_full_ms/h2/w1/v5</property>
      <property value="189.615">fsim/tables/ps_full_ms/h2/w1/v6</property>
      <property value="177.258">fsim/tables/ps_full_ms/h2/w1/v7</property>
      <property value="175.569">fsim/tables/ps_full_ms/h2/w1/v8</property>
      <property value="180.083">fsim/tables/ps_full_ms/h2/w1/v9</property>
      <property value="70.9923">fsim/tables/ps_full_ms/h2/w2/v0</property>
      <property value="86.5915">fsim/tables/ps_full_ms/h2/w2/v1</property>
      <property value="146.734">fsim/tables/ps_full_ms/h2/w2/v10</property>
      <property value="140.015">fsim/tables/ps_full_ms/h2/w2/v11</property>
      <property value="125.767">fsim/tables/ps_full_ms/h2/w2/v12</property>
      <property value="100.367">fsim/tables/ps_full_ms/h2/w2/v13</property>
      <property value="70.4953">fsim/tables/ps_full_ms/h2/w2/v14</property>
      <property value="29.98">fsim/tables/ps_full_ms/h2/w2/v15</property>
      <property value="101.125">fsim/tables/ps_full_ms/h2/w2/v2</property>
      <property value="116.057">fsim/tables/ps_full_ms/h2/w2/v3</property>
      <property value="131.095">fsim/tables/ps_full_ms/h2/w2/v4</property>
      <property value="147.077">fsim/tables/ps_full_ms/h2/w2/v5</property>
      <property value="158.919">fsim/tables/ps_full_ms/h2/w2/v6</property>
      <property value="147.911">fsim/tables/ps_full_ms/h2/w2/v7</property>
      <property value="146.474">fsim/tables/ps_full_ms/h2/w2/v8</property>
      <property value="150.167">fsim/tables/ps_full_ms/h2/w2/v9</property>
      <property value="71.3011">fsim/tables/ps_full_ms/h3/w0/v0</property>
      <property value="93.1635">fsim/tables/ps_full_ms/h3/w0/v1</property>
      <property value="198.906">fsim/tables/ps_full_ms/h3/w0/v10</property>
      <property value="205.736">fsim/tables/ps_full_ms/h3/w0/v11</property>
      <property value="191.374">fsim/tables/ps_full_ms/h3/w0/v12</property>
      <property value="152.707">fsim/tables/ps_full_ms/h3/w0/v13</property>
      <property value="103.119">fsim/tables/ps_full_ms/h3/w0/v14</property>
      <property value="41.5365">fsim/tables/ps_full_ms/h3/w0/v15</property>
      <property value="107.398">fsim/tables/ps_full_ms/h3/w0/v2</property>
      <property value="125.562">fsim/tables/ps_full_ms/h3/w0/v3</property>
      <property value="146.672">fsim/tables/ps_full_ms/h3/w0/v4</property>
      <property value="163.538">fsim/tables/ps_full_ms/h3/w0/v5</property>
      <property value="158.844">fsim/tables/ps_full_ms/h3/w0/v6</property>
      <property value="168.898">fsim/tables/ps_full_ms/h3/w0/v7</property>
      <property value="180.264">fsim/tables/ps_full_ms/h3/w0/v8</property>
      <property value="190.653">fsim/tables/ps_full_ms/h3/w0/v9</property>
      <property value="62.3817">fsim/tables/ps_full_ms/h3/w1/v0</property>
      <property value="78.755">fsim/tables/ps_full_ms/h3/w1/v1</property>
      <property value="159.906">fsim/tables/ps_full_ms/h3/w1/v10</property>
      <property value="165.104">fsim/tables/ps_full_ms/h3/w1/v11</property>
      <property value="149.825">fsim/tables/ps_full_ms/h3/w1/v12</property>
      <property value="119.343">fsim/tables/ps_full_ms/h3/w1/v13</property>
      <property value="81.1095">fsim/tables/ps_full_ms/h3/w1/v14</property>
      <property value="33.6799">fsim/tables/ps_full_ms/h3/w1/v15</property>
      <property value="94.3339">fsim/tables/ps_full_ms/h3/w1/v2</property>
      <property value="110.342">fsim/tables/ps_full_ms/h3/w1/v3</property>
      <property value="126.524">fsim/tables/ps_full_ms/h3/w1/v4</property>
      <property value="130.26">fsim/tables/ps_full_ms/h3/w1/v5</property>
      <property value="129.693">fsim/tables/ps_full_ms/h3/w1/v6</property>
      <property value="137.644">fsim/tables/ps_full_ms/h3/w1/v7</property>
      <property value="145.753">fsim/tables/ps_full_ms/h3/w1/v8</property>
      <property value="152.967">fsim/tables/ps_full_ms/h3/w1/v9</property>
      <property value="49.2731">fsim/tables/ps_full_ms/h3/w2/v0</property>
      <property value="63.8071">fsim/tables/ps_full_ms/h3/w2/v1</property>
      <property value="130.292">fsim/tables/ps_full_ms/h3/w2/v10</property>
      <property value="135.313">fsim/tables/ps_full_ms/h3/w2/v11</property>
      <property value="123.657">fsim/tables/ps_full_ms/h3/w2/v12</property>
      <property value="98.5034">fsim/tables/ps_full_ms/h3/w2/v13</property>
      <property value="67.2633">fsim/tables/ps_full_ms/h3/w2/v14</property>
      <property value="28.2115">fsim/tables/ps_full_ms/h3/w2/v15</property>
      <property value="77.2744">fsim/tables/ps_full_ms/h3/w2/v2</property>
      <property value="90.9874">fsim/tables/ps_full_ms/h3/w2/v3</property>
      <property value="104.904">fsim/tables/ps_full_ms/h3/w2/v4</property>
      <property value="105.909">fsim/tables/ps_full_ms/h3/w2/v5</property>
      <property value="106.764">fsim/tables/ps_full_ms/h3/w2/v6</property>
      <property value="112.998">fsim/tables/ps_full_ms/h3/w2/v7</property>
      <property value="119.255">fsim/tables/ps_full_ms/h3/w2/v8</property>
      <property value="124.652">fsim/tables/ps_full_ms/h3/w2/v9</property>
      <property value="53.5431">fsim/tables/ps_full_ms/h4/w0/v0</property>
      <property value="60.2077">fsim/tables/ps_full_ms/h4/w0/v1</property>
      <property value="134.619">fsim/tables/ps_full_ms/h4/w0/v10</property>
      <property value="142.072">fsim/tables/ps_full_ms/h4/w0/v11</property>
      <property value="125.734">fsim/tables/ps_full_ms/h4/w0/v12</property>
      <property value="101.421">fsim/tables/ps_full_ms/h4/w0/v13</property>
      <property value="68.3964">fsim/tables/ps_full_ms/h4/w0/v14</property>
      <property value="28.8762">fsim/tables/ps_full_ms/h4/w0/v15</property>
      <property value="73.8256">fsim/tables/ps_full_ms/h4/w0/v2</property>
      <property value="88.7489">fsim/tables/ps_full_ms/h4/w0/v3</property>
      <property value="103.082">fsim/tables/ps_full_ms/h4/w0/v4</property>
      <property value="103.351">fsim/tables/ps_full_ms/h4/w0/v5</property>
      <property value="106.529">fsim/tables/ps_full_ms/h4/w0/v6</property>
      <property value="113.019">fsim/tables/ps_full_ms/h4/w0/v7</property>
      <property value="120.073">fsim/tables/ps_full_ms/h4/w0/v8</property>
      <property value="126.131">fsim/tables/ps_full_ms/h4/w0/v9</property>
      <property value="34.7756">fsim/tables/ps_full_ms/h4/w1/v0</property>
      <property value="46.9841">fsim/tables/ps_full_ms/h4/w1/v1</property>
      <property value="103.418">fsim/tables/ps_full_ms/h4/w1/v10</property>
      <property value="109.242">fsim/tables/ps_full_ms/h4/w1/v11</property>
      <property value="97.6527">fsim/tables/ps_full_ms/h4/w1/v12</property>
      <property value="79.0248">fsim/tables/ps_full_ms/h4/w1/v13</property>
      <property value="54.969">fsim/tables/ps_full_ms/h4/w1/v14</property>
      <property value="25.3876">fsim/tables/ps_full_ms/h4/w1/v15</property>
      <property value="59.0622">fsim/tables/ps_full_ms/h4/w1/v2</property>
      <property value="70.7518">fsim/tables/ps_full_ms/h4/w1/v3</property>
      <property value="80.8499">fsim/tables/ps_full_ms/h4/w1/v4</property>
      <property value="77.6411">fsim/tables/ps_full_ms/h4/w1/v5</property>
      <property value="82.5859">fsim/tables/ps_full_ms/h4/w1/v6</property>
      <property value="87.0373">fsim/tables/ps_full_ms/h4/w1/v7</property>
      <property value="91.7471">fsim/tables/ps_full_ms/h4/w1/v8</property>
      <property value="95.9771">fsim/tables/ps_full_ms/h4/w1/v9</property>
      <property value="23.2547">fsim/tables/ps_full_ms/h4/w2/v0</property>
      <property value="34.3797">fsim/tables/ps_full_ms/h4/w2/v1</property>
      <property value="79.5127">fsim/tables/ps_full_ms/h4/w2/v10</property>
      <property value="85.0365">fsim/tables/ps_full_ms/h4/w2/v11</property>
      <property value="78.3145">fsim/tables/ps_full_ms/h4/w2/v12</property>
      <property value="63.353">fsim/tables/ps_full_ms/h4/w2/v13</property>
      <property value="44.875">fsim/tables/ps_full_ms/h4/w2/v14</property>
      <property value="21.3747">fsim/tables/ps_full_ms/h4/w2/v15</property>
      <property value="45.1552">fsim/tables/ps_full_ms/h4/w2/v2</property>
      <property value="56.0913">fsim/tables/ps_full_ms/h4/w2/v3</property>
      <property value="63.2319">fsim/tables/ps_full_ms/h4/w2/v4</property>
      <property value="60.1175">fsim/tables/ps_full_ms/h4/w2/v5</property>
      <property value="64.1057">fsim/tables/ps_full_ms/h4/w2/v6</property>
      <property value="67.4122">fsim/tables/ps_full_ms/h4/w2/v7</property>
      <property value="70.6216">fsim/tables/ps_full_ms/h4/w2/v8</property>
      <property value="73.6134">fsim/tables/ps_full_ms/h4/w2/v9</property>
      <property value="30.5588">fsim/tables/ps_full_ms/h5/w0/v0</property>
      <property value="37.2769">fsim/tables/ps_full_ms/h5/w0/v1</property>
      <property value="85.3451">fsim/tables/ps_full_ms/h5/w0/v10</property>
      <property value="90.875">fsim/tables/ps_full_ms/h5/w0/v11</property>
      <property value="84.2062">fsim/tables/ps_full_ms/h5/w0/v12</property>
      <property value="68.0021">fsim/tables/ps_full_ms/h5/w0/v13</property>
      <property value="48.0944">fsim/tables/ps_full_ms/h5/w0/v14</property>
      <property value="22.6016">fsim/tables/ps_full_ms/h5/w0/v15</property>
      <property value="48.5101">fsim/tables/ps_full_ms/h5/w0/v2</property>
      <property value="60.3666">fsim/tables/ps_full_ms/h5/w0/v3</property>
      <property value="69.0969">fsim/tables/ps_full_ms/h5/w0/v4</property>
      <property value="65.3717">fsim/tables/ps_full_ms/h5/w0/v5</property>
      <property value="69.307">fsim/tables/ps_full_ms/h5/w0/v6</property>
      <property value="72.9482">fsim/tables/ps_full_ms/h5/w0/v7</property>
      <property value="76.5212">fsim/tables/ps_full_ms/h5/w0/v8</property>
      <property value="79.3582">fsim/tables/ps_full_ms/h5/w0/v9</property>
      <property value="13.9988">fsim/tables/ps_full_ms/h5/w1/v0</property>
      <property value="23.8723">fsim/tables/ps_full_ms/h5/w1/v1</property>
      <property value="59.8875">fsim/tables/ps_full_ms/h5/w1/v10</property>
      <property value="64.136">fsim/tables/ps_full_ms/h5/w1/v11</property>
      <property value="62.3384">fsim/tables/ps_full_ms/h5/w1/v12</property>
      <property value="50.4048">fsim/tables/ps_full_ms/h5/w1/v13</property>
      <property value="36.3721">fsim/tables/ps_full_ms/h5/w1/v14</property>
      <property value="18.0862">fsim/tables/ps_full_ms/h5/w1/v15</property>
      <property value="33.7596">fsim/tables/ps_full_ms/h5/w1/v2</property>
      <property value="44.2664">fsim/tables/ps_full_ms/h5/w1/v3</property>
      <property value="48.9253">fsim/tables/ps_full_ms/h5/w1/v4</property>
      <property value="46.2694">fsim/tables/ps_full_ms/h5/w1/v5</property>
      <property value="49.0715">fsim/tables/ps_full_ms/h5/w1/v6</property>
      <property value="51.4795">fsim/tables/ps_full_ms/h5/w1/v7</property>
      <property value="53.223">fsim/tables/ps_full_ms/h5/w1/v8</property>
      <property value="54.7464">fsim/tables/ps_full_ms/h5/w1/v9</property>
      <property value="2.24712">fsim/tables/ps_full_ms/h5/w2/v0</property>
      <property value="13.0245">fsim/tables/ps_full_ms/h5/w2/v1</property>
      <property value="38.71">fsim/tables/ps_full_ms/h5/w2/v10</property>
      <property value="42.369">fsim/tables/ps_full_ms/h5/w2/v11</property>
      <property value="45.8151">fsim/tables/ps_full_ms/h5/w2/v12</property>
      <property value="37.4656">fsim/tables/ps_full_ms/h5/w2/v13</property>
      <property value="27.027">fsim/tables/ps_full_ms/h5/w2/v14</property>
      <property value="14.35">fsim/tables/ps_full_ms/h5/w2/v15</property>
      <property value="23.332">fsim/tables/ps_full_ms/h5/w2/v2</property>
      <property value="31.3627">fsim/tables/ps_full_ms/h5/w2/v3</property>
      <property value="33.6423">fsim/tables/ps_full_ms/h5/w2/v4</property>
      <property value="32.645">fsim/tables/ps_full_ms/h5/w2/v5</property>
      <property value="33.9982">fsim/tables/ps_full_ms/h5/w2/v6</property>
      <property value="33.6477">fsim/tables/ps_full_ms/h5/w2/v7</property>
      <property value="34.7196">fsim/tables/ps_full_ms/h5/w2/v8</property>
      <property value="35.4466">fsim/tables/ps_full_ms/h5/w2/v9</property>
      <property value="11.7731">fsim/tables/ps_full_ms/h6/w0/v0</property>
      <property value="20.5447">fsim/tables/ps_full_ms/h6/w0/v1</property>
      <property value="53.8529">fsim/tables/ps_full_ms/h6/w0/v10</property>
      <property value="58.5805">fsim/tables/ps_full_ms/h6/w0/v11</property>
      <property value="56.6275">fsim/tables/ps_full_ms/h6/w0/v12</property>
      <property value="46.021">fsim/tables/ps_full_ms/h6/w0/v13</property>
      <property value="33.2599">fsim/tables/ps_full_ms/h6/w0/v14</property>
      <property value="16.7871">fsim/tables/ps_full_ms/h6/w0/v15</property>
      <property value="30.7283">fsim/tables/ps_full_ms/h6/w0/v2</property>
      <property value="39.9428">fsim/tables/ps_full_ms/h6/w0/v3</property>
      <property value="42.9166">fsim/tables/ps_full_ms/h6/w0/v4</property>
      <property value="41.4477">fsim/tables/ps_full_ms/h6/w0/v5</property>
      <property value="43.8652">fsim/tables/ps_full_ms/h6/w0/v6</property>
      <property value="45.8204">fsim/tables/ps_full_ms/h6/w0/v7</property>
      <property value="47.6352">fsim/tables/ps_full_ms/h6/w0/v8</property>
      <property value="48.8165">fsim/tables/ps_full_ms/h6/w0/v9</property>
      <property value="17.3406">fsim/tables/ps_full_ms/h6/w1/v0</property>
      <property value="22.3421">fsim/tables/ps_full_ms/h6/w1/v1</property>
      <property value="30.6881">fsim/tables/ps_full_ms/h6/w1/v10</property>
      <property value="33.5753">fsim/tables/ps_full_ms/h6/w1/v11</property>
      <property value="34.6163">fsim/tables/ps_full_ms/h6/w1/v12</property>
      <property value="28.2024">fsim/tables/ps_full_ms/h6/w1/v13</property>
      <property value="20.7531">fsim/tables/ps_full_ms/h6/w1/v14</property>
      <property value="12.1993">fsim/tables/ps_full_ms/h6/w1/v15</property>
      <property value="26.6563">fsim/tables/ps_full_ms/h6/w1/v2</property>
      <property value="25.4904">fsim/tables/ps_full_ms/h6/w1/v3</property>
      <property value="24.7921">fsim/tables/ps_full_ms/h6/w1/v4</property>
      <property value="26.3759">fsim/tables/ps_full_ms/h6/w1/v5</property>
      <property value="24.0372">fsim/tables/ps_full_ms/h6/w1/v6</property>
      <property value="25.4745">fsim/tables/ps_full_ms/h6/w1/v7</property>
      <property value="25.8181">fsim/tables/ps_full_ms/h6/w1/v8</property>
      <property value="27.3429">fsim/tables/ps_full_ms/h6/w1/v9</property>
      <property value="7.23439">fsim/tables/ps_full_ms/h6/w2/v0</property>
      <property value="8.5527">fsim/tables/ps_full_ms/h6/w2/v1</property>
      <property value="10.0065">fsim/tables/ps_full_ms/h6/w2/v10</property>
      <property value="12.6695">fsim/tables/ps_full_ms/h6/w2/v11</property>
      <property value="14.8384">fsim/tables/ps_full_ms/h6/w2/v12</property>
      <property value="14.0584">fsim/tables/ps_full_ms/h6/w2/v13</property>
      <property value="9.27515">fsim/tables/ps_full_ms/h6/w2/v14</property>
      <property value="3.5431">fsim/tables/ps_full_ms/h6/w2/v15</property>
      <property value="9.87101">fsim/tables/ps_full_ms/h6/w2/v2</property>
      <property value="10.4101">fsim/tables/ps_full_ms/h6/w2/v3</property>
      <property value="10.8859">fsim/tables/ps_full_ms/h6/w2/v4</property>
      <property value="10.3037">fsim/tables/ps_full_ms/h6/w2/v5</property>
      <property value="9.68923">fsim/tables/ps_full_ms/h6/w2/v6</property>
      <property value="7.15017">fsim/tables/ps_full_ms/h6/w2/v7</property>
      <property value="7.20504">fsim/tables/ps_full_ms/h6/w2/v8</property>
      <property value="7.18104">fsim/tables/ps_full_ms/h6/w2/v9</property>
      <property value="-27.3024">fsim/tables/ps_idle_ms/h0/w0/v0</property>
      <property value="-33.1056">fsim/tables/ps_idle_ms/h0/w0/v1</property>
      <property value="-246.048">fsim/tables/ps_idle_ms/h0/w0/v10</property>
      <property value="-310.043">fsim/tables/ps_idle_ms/h0/w0/v11</property>
      <property value="-357.607">fsim/tables/ps_idle_ms/h0/w0/v12</property>
      <property value="-399.848">fsim/tables/ps_idle_ms/h0/w0/v13</property>
      <property value="-431.123">fsim/tables/ps_idle_ms/h0/w0/v14</property>
      <property value="-449.842">fsim/tables/ps_idle_ms/h0/w0/v15</property>
      <property value="-39.6475">fsim/tables/ps_idle_ms/h0/w0/v2</property>
      <property value="-46.933">fsim/tables/ps_idle_ms/h0/w0/v3</property>
      <property value="-55.0103">fsim/tables/ps_idle_ms/h0/w0/v4</property>
      <property value="-63.9999">fsim/tables/ps_idle_ms/h0/w0/v5</property>
      <property value="-74.5669">fsim/tables/ps_idle_ms/h0/w0/v6</property>
      <property value="-87.3938">fsim/tables/ps_idle_ms/h0/w0/v7</property>
      <property value="-107.095">fsim/tables/ps_idle_ms/h0/w0/v8</property>
      <property value="-160.433">fsim/tables/ps_idle_ms/h0/w0/v9</property>
      <property value="-13.8207">fsim/tables/ps_idle_ms/h0/w1/v0</property>
      <property value="-16.6604">fsim/tables/ps_idle_ms/h0/w1/v1</property>
      <property value="-120.467">fsim/tables/ps_idle_ms/h0/w1/v10</property>
      <property value="-206.388">fsim/tables/ps_idle_ms/h0/w1/v11</property>
      <property value="-268.613">fsim/tables/ps_idle_ms/h0/w1/v12</property>
      <property value="-311.231">fsim/tables/ps_idle_ms/h0/w1/v13</property>
      <property value="-354.364">fsim/tables/ps_idle_ms/h0/w1/v14</property>
      <property value="-376.262">fsim/tables/ps_idle_ms/h0/w1/v15</property>
      <property value="-20.4107">fsim/tables/ps_idle_ms/h0/w1/v2</property>
      <property value="-25.2427">fsim/tables/ps_idle_ms/h0/w1/v3</property>
      <property value="-30.9156">fsim/tables/ps_idle_ms/h0/w1/v4</property>
      <property value="-38.0189">fsim/tables/ps_idle_ms/h0/w1/v5</property>
      <property value="-46.0628">fsim/tables/ps_idle_ms/h0/w1/v6</property>
      <property value="-55.1151">fsim/tables/ps_idle_ms/h0/w1/v7</property>
      <property value="-65.6758">fsim/tables/ps_idle_ms/h0/w1/v8</property>
      <property value="-80.3385">fsim/tables/ps_idle_ms/h0/w1/v9</property>
      <property value="-13.3338">fsim/tables/ps_idle_ms/h0/w2/v0</property>
      <property value="-15.0431">fsim/tables/ps_idle_ms/h0/w2/v1</property>
      <property value="-92.716">fsim/tables/ps_idle_ms/h0/w2/v10</property>
      <property value="-163.806">fsim/tables/ps_idle_ms/h0/w2/v11</property>
      <property value="-224.032">fsim/tables/ps_idle_ms/h0/w2/v12</property>
      <property value="-261.089">fsim/tables/ps_idle_ms/h0/w2/v13</property>
      <property value="-299.565">fsim/tables/ps_idle_ms/h0/w2/v14</property>
      <property value="-323.544">fsim/tables/ps_idle_ms/h0/w2/v15</property>
      <property value="-17.7121">fsim/tables/ps_idle_ms/h0/w2/v2</property>
      <property value="-21.231">fsim/tables/ps_idle_ms/h0/w2/v3</property>
      <property value="-25.9406">fsim/tables/ps_idle_ms/h0/w2/v4</property>
      <property value="-31.3095">fsim/tables/ps_idle_ms/h0/w2/v5</property>
      <property value="-38.0365">fsim/tables/ps_idle_ms/h0/w2/v6</property>
      <property value="-45.7545">fsim/tables/ps_idle_ms/h0/w2/v7</property>
      <property value="-54.5738">fsim/tables/ps_idle_ms/h0/w2/v8</property>
      <property value="-65.9358">fsim/tables/ps_idle_ms/h0/w2/v9</property>
      <property value="-13.5609">fsim/tables/ps_idle_ms/h1/w0/v0</property>
      <property value="-15.7607">fsim/tables/ps_idle_ms/h1/w0/v1</property>
      <property value="-219.832">fsim/tables/ps_idle_ms/h1/w0/v10</property>
      <property value="-260.802">fsim/tables/ps_idle_ms/h1/w0/v11</property>
      <property value="-305.068">fsim/tables/ps_idle_ms/h1/w0/v12</property>
      <property value="-352.863">fsim/tables/ps_idle_ms/h1/w0/v13</property>
      <property value="-404.928">fsim/tables/ps_idle_ms/h1/w0/v14</property>
      <property value="-435.27">fsim/tables/ps_idle_ms/h1/w0/v15</property>
      <property value="-19.3382">fsim/tables/ps_idle_ms/h1/w0/v2</property>
      <property value="-24.2341">fsim/tables/ps_idle_ms/h1/w0/v3</property>
      <property value="-30.2562">fsim/tables/ps_idle_ms/h1/w0/v4</property>
      <property value="-37.934">fsim/tables/ps_idle_ms/h1/w0/v5</property>
      <property value="-46.9941">fsim/tables/ps_idle_ms/h1/w0/v6</property>
      <property value="-58.6817">fsim/tables/ps_idle_ms/h1/w0/v7</property>
      <property value="-88.9611">fsim/tables/ps_idle_ms/h1/w0/v8</property>
      <property value="-169.978">fsim/tables/ps_idle_ms/h1/w0/v9</property>
      <property value="-14.8501">fsim/tables/ps_idle_ms/h1/w1/v0</property>
      <property value="-16.3283">fsim/tables/ps_idle_ms/h1/w1/v1</property>
      <property value="-182.942">fsim/tables/ps_idle_ms/h1/w1/v10</property>
      <property value="-216.087">fsim/tables/ps_idle_ms/h1/w1/v11</property>
      <property value="-251.949">fsim/tables/ps_idle_ms/h1/w1/v12</property>
      <property value="-290.687">fsim/tables/ps_idle_ms/h1/w1/v13</property>
      <property value="-332.755">fsim/tables/ps_idle_ms/h1/w1/v14</property>
      <property value="-362.7">fsim/tables/ps_idle_ms/h1/w1/v15</property>
      <property value="-19.0443">fsim/tables/ps_idle_ms/h1/w1/v2</property>
      <property value="-22.7906">fsim/tables/ps_idle_ms/h1/w1/v3</property>
      <property value="-27.8737">fsim/tables/ps_idle_ms/h1/w1/v4</property>
      <property value="-33.7133">fsim/tables/ps_idle_ms/h1/w1/v5</property>
      <property value="-41.1857">fsim/tables/ps_idle_ms/h1/w1/v6</property>
      <property value="-51.076">fsim/tables/ps_idle_ms/h1/w1/v7</property>
      <property value="-78.2123">fsim/tables/ps_idle_ms/h1/w1/v8</property>
      <property value="-145.638">fsim/tables/ps_idle_ms/h1/w1/v9</property>
      <property value="-16.2022">fsim/tables/ps_idle_ms/h1/w2/v0</property>
      <property value="-16.5913">fsim/tables/ps_idle_ms/h1/w2/v1</property>
      <property value="-154.27">fsim/tables/ps_idle_ms/h1/w2/v10</property>
      <property value="-182.676">fsim/tables/ps_idle_ms/h1/w2/v11</property>
      <property value="-213.095">fsim/tables/ps_idle_ms/h1/w2/v12</property>
      <property value="-245.982">fsim/tables/ps_idle_ms/h1/w2/v13</property>
      <property value="-281.762">fsim/tables/ps_idle_ms/h1/w2/v14</property>
      <property value="-310.998">fsim/tables/ps_idle_ms/h1/w2/v15</property>
      <property value="-18.3148">fsim/tables/ps_idle_ms/h1/w2/v2</property>
      <property value="-21.0952">fsim/tables/ps_idle_ms/h1/w2/v3</property>
      <property value="-24.8201">fsim/tables/ps_idle_ms/h1/w2/v4</property>
      <property value="-29.8197">fsim/tables/ps_idle_ms/h1/w2/v5</property>
      <property value="-35.4901">fsim/tables/ps_idle_ms/h1/w2/v6</property>
      <property value="-43.429">fsim/tables/ps_idle_ms/h1/w2/v7</property>
      <property value="-63.095">fsim/tables/ps_idle_ms/h1/w2/v8</property>
      <property value="-119.784">fsim/tables/ps_idle_ms/h1/w2/v9</property>
      <property value="-16.619">fsim/tables/ps_idle_ms/h2/w0/v0</property>
      <property value="-17.023">fsim/tables/ps_idle_ms/h2/w0/v1</property>
      <property value="-194.823">fsim/tables/ps_idle_ms/h2/w0/v10</property>
      <property value="-230.686">fsim/tables/ps_idle_ms/h2/w0/v11</property>
      <property value="-270.212">fsim/tables/ps_idle_ms/h2/w0/v12</property>
      <property value="-314.338">fsim/tables/ps_idle_ms/h2/w0/v13</property>
      <property value="-363.116">fsim/tables/ps_idle_ms/h2/w0/v14</property>
      <property value="-401.913">fsim/tables/ps_idle_ms/h2/w0/v15</property>
      <property value="-19.1907">fsim/tables/ps_idle_ms/h2/w0/v2</property>
      <property value="-22.7409">fsim/tables/ps_idle_ms/h2/w0/v3</property>
      <property value="-27.6027">fsim/tables/ps_idle_ms/h2/w0/v4</property>
      <property value="-33.8687">fsim/tables/ps_idle_ms/h2/w0/v5</property>
      <property value="-44.0124">fsim/tables/ps_idle_ms/h2/w0/v6</property>
      <property value="-92.1042">fsim/tables/ps_idle_ms/h2/w0/v7</property>
      <property value="-132.782">fsim/tables/ps_idle_ms/h2/w0/v8</property>
      <property value="-162.458">fsim/tables/ps_idle_ms/h2/w0/v9</property>
      <property value="-18.9292">fsim/tables/ps_idle_ms/h2/w1/v0</property>
      <property value="-18.7207">fsim/tables/ps_idle_ms/h2/w1/v1</property>
      <property value="-165.197">fsim/tables/ps_idle_ms/h2/w1/v10</property>
      <property value="-194.541">fsim/tables/ps_idle_ms/h2/w1/v11</property>
      <property value="-226.61">fsim/tables/ps_idle_ms/h2/w1/v12</property>
      <property value="-261.594">fsim/tables/ps_idle_ms/h2/w1/v13</property>
      <property value="-299.817">fsim/tables/ps_idle_ms/h2/w1/v14</property>
      <property value="-334.07">fsim/tables/ps_idle_ms/h2/w1/v15</property>
      <property value="-20.0403">fsim/tables/ps_idle_ms/h2/w1/v2</property>
      <property value="-22.682">fsim/tables/ps_idle_ms/h2/w1/v3</property>
      <property value="-26.5231">fsim/tables/ps_idle_ms/h2/w1/v4</property>
      <property value="-31.803">fsim/tables/ps_idle_ms/h2/w1/v5</property>
      <property value="-42.2396">fsim/tables/ps_idle_ms/h2/w1/v6</property>
      <property value="-86.2944">fsim/tables/ps_idle_ms/h2/w1/v7</property>
      <property value="-114.219">fsim/tables/ps_idle_ms/h2/w1/v8</property>
      <property value="-138.712">fsim/tables/ps_idle_ms/h2/w1/v9</property>
      <property value="-21.8089">fsim/tables/ps_idle_ms/h2/w2/v0</property>
      <property value="-20.4037">fsim/tables/ps_idle_ms/h2/w2/v1</property>
      <property value="-141.873">fsim/tables/ps_idle_ms/h2/w2/v10</property>
      <property value="-166.869">fsim/tables/ps_idle_ms/h2/w2/v11</property>
      <property value="-194.082">fsim/tables/ps_idle_ms/h2/w2/v12</property>
      <property value="-223.57">fsim/tables/ps_idle_ms/h2/w2/v13</property>
      <property value="-255.833">fsim/tables/ps_idle_ms/h2/w2/v14</property>
      <property value="-286.47">fsim/tables/ps_idle_ms/h2/w2/v15</property>
      <property value="-20.8269">fsim/tables/ps_idle_ms/h2/w2/v2</property>
      <property value="-22.6423">fsim/tables/ps_idle_ms/h2/w2/v3</property>
      <property value="-25.5006">fsim/tables/ps_idle_ms/h2/w2/v4</property>
      <property value="-29.4327">fsim/tables/ps_idle_ms/h2/w2/v5</property>
      <property value="-37.9709">fsim/tables/ps_idle_ms/h2/w2/v6</property>
      <property value="-74.5462">fsim/tables/ps_idle_ms/h2/w2/v7</property>
      <property value="-98.4334">fsim/tables/ps_idle_ms/h2/w2/v8</property>
      <property value="-119.299">fsim/tables/ps_idle_ms/h2/w2/v9</property>
      <property value="-25.0008">fsim/tables/ps_idle_ms/h3/w0/v0</property>
      <property value="-21.5954">fsim/tables/ps_idle_ms/h3/w0/v1</property>
      <property value="-166.372">fsim/tables/ps_idle_ms/h3/w0/v10</property>
      <property value="-197.216">fsim/tables/ps_idle_ms/h3/w0/v11</property>
      <property value="-231.905">fsim/tables/ps_idle_ms/h3/w0/v12</property>
      <property value="-270.704">fsim/tables/ps_idle_ms/h3/w0/v13</property>
      <property value="-313.224">fsim/tables/ps_idle_ms/h3/w0/v14</property>
      <property value="-354.173">fsim/tables/ps_idle_ms/h3/w0/v15</property>
      <property value="-21.3515">fsim/tables/ps_idle_ms/h3/w0/v2</property>
      <property value="-22.9634">fsim/tables/ps_idle_ms/h3/w0/v3</property>
      <property value="-26.2234">fsim/tables/ps_idle_ms/h3/w0/v4</property>
      <property value="-34.2381">fsim/tables/ps_idle_ms/h3/w0/v5</property>
      <property value="-71.6338">fsim/tables/ps_idle_ms/h3/w0/v6</property>
      <property value="-91.2178">fsim/tables/ps_idle_ms/h3/w0/v7</property>
      <property value="-113.296">fsim/tables/ps_idle_ms/h3/w0/v8</property>
      <property value="-138.454">fsim/tables/ps_idle_ms/h3/w0/v9</property>
      <property value="-26.425">fsim/tables/ps_idle_ms/h3/w1/v0</property>
      <property value="-23.8825">fsim/tables/ps_idle_ms/h3/w1/v1</property>
      <property value="-146.155">fsim/tables/ps_idle_ms/h3/w1/v10</property>
      <property value="-170.275">fsim/tables/ps_idle_ms/h3/w1/v11</property>
      <property value="-197.558">fsim/tables/ps_idle_ms/h3/w1/v12</property>
      <property value="-227.878">fsim/tables/ps_idle_ms/h3/w1/v13</property>
      <property value="-261.009">fsim/tables/ps_idle_ms/h3/w1/v14</property>
      <property value="-294.737">fsim/tables/ps_idle_ms/h3/w1/v15</property>
      <property value="-23.6787">fsim/tables/ps_idle_ms/h3/w1/v2</property>
      <property value="-24.9319">fsim/tables/ps_idle_ms/h3/w1/v3</property>
      <property value="-27.9755">fsim/tables/ps_idle_ms/h3/w1/v4</property>
      <property value="-44.739">fsim/tables/ps_idle_ms/h3/w1/v5</property>
      <property value="-69.3869">fsim/tables/ps_idle_ms/h3/w1/v6</property>
      <property value="-85.9909">fsim/tables/ps_idle_ms/h3/w1/v7</property>
      <property value="-104.284">fsim/tables/ps_idle_ms/h3/w1/v8</property>
      <property value="-124.909">fsim/tables/ps_idle_ms/h3/w1/v9</property>
      <property value="-30.355">fsim/tables/ps_idle_ms/h3/w2/v0</property>
      <property value="-26.6969">fsim/tables/ps_idle_ms/h3/w2/v1</property>
      <property value="-129.534">fsim/tables/ps_idle_ms/h3/w2/v10</property>
      <property value="-148.873">fsim/tables/ps_idle_ms/h3/w2/v11</property>
      <property value="-170.84">fsim/tables/ps_idle_ms/h3/w2/v12</property>
      <property value="-195.927">fsim/tables/ps_idle_ms/h3/w2/v13</property>
      <property value="-223.484">fsim/tables/ps_idle_ms/h3/w2/v14</property>
      <property value="-252.932">fsim/tables/ps_idle_ms/h3/w2/v15</property>
      <property value="-25.6282">fsim/tables/ps_idle_ms/h3/w2/v2</property>
      <property value="-26.2156">fsim/tables/ps_idle_ms/h3/w2/v3</property>
      <property value="-28.5671">fsim/tables/ps_idle_ms/h3/w2/v4</property>
      <property value="-45.3098">fsim/tables/ps_idle_ms/h3/w2/v5</property>
      <property value="-64.1703">fsim/tables/ps_idle_ms/h3/w2/v6</property>
      <property value="-78.1449">fsim/tables/ps_idle_ms/h3/w2/v7</property>
      <property value="-93.7479">fsim/tables/ps_idle_ms/h3/w2/v8</property>
      <property value="-111.622">fsim/tables/ps_idle_ms/h3/w2/v9</property>
      <property value="-32.2291">fsim/tables/ps_idle_ms/h4/w0/v0</property>
      <property value="-27.7313">fsim/tables/ps_idle_ms/h4/w0/v1</property>
      <property value="-127.909">fsim/tables/ps_idle_ms/h4/w0/v10</property>
      <property value="-147.119">fsim/tables/ps_idle_ms/h4/w0/v11</property>
      <property value="-169.181">fsim/tables/ps_idle_ms/h4/w0/v12</property>
      <property value="-193.8">fsim/tables/ps_idle_ms/h4/w0/v13</property>
      <property value="-220.947">fsim/tables/ps_idle_ms/h4/w0/v14</property>
      <property value="-250.474">fsim/tables/ps_idle_ms/h4/w0/v15</property>
      <property value="-26.3429">fsim/tables/ps_idle_ms/h4/w0/v2</property>
      <property value="-26.6122">fsim/tables/ps_idle_ms/h4/w0/v3</property>
      <property value="-28.7947">fsim/tables/ps_idle_ms/h4/w0/v4</property>
      <property value="-47.1501">fsim/tables/ps_idle_ms/h4/w0/v5</property>
      <property value="-63.4777">fsim/tables/ps_idle_ms/h4/w0/v6</property>
      <property value="-77.3918">fsim/tables/ps_idle_ms/h4/w0/v7</property>
      <property value="-92.7704">fsim/tables/ps_idle_ms/h4/w0/v8</property>
      <property value="-110.422">fsim/tables/ps_idle_ms/h4/w0/v9</property>
      <property value="-36.3956">fsim/tables/ps_idle_ms/h4/w1/v0</property>
      <property value="-31.5885">fsim/tables/ps_idle_ms/h4/w1/v1</property>
      <property value="-112.132">fsim/tables/ps_idle_ms/h4/w1/v10</property>
      <property value="-127.064">fsim/tables/ps_idle_ms/h4/w1/v11</property>
      <property value="-144.297">fsim/tables/ps_idle_ms/h4/w1/v12</property>
      <property value="-163.386">fsim/tables/ps_idle_ms/h4/w1/v13</property>
      <property value="-184.052">fsim/tables/ps_idle_ms/h4/w1/v14</property>
      <property value="-206.809">fsim/tables/ps_idle_ms/h4/w1/v15</property>
      <property value="-29.4914">fsim/tables/ps_idle_ms/h4/w1/v2</property>
      <property value="-29.1628">fsim/tables/ps_idle_ms/h4/w1/v3</property>
      <property value="-32.3742">fsim/tables/ps_idle_ms/h4/w1/v4</property>
      <property value="-50.6262">fsim/tables/ps_idle_ms/h4/w1/v5</property>
      <property value="-60.522">fsim/tables/ps_idle_ms/h4/w1/v6</property>
      <property value="-72.0455">fsim/tables/ps_idle_ms/h4/w1/v7</property>
      <property value="-85.1269">fsim/tables/ps_idle_ms/h4/w1/v8</property>
      <property value="-99.3807">fsim/tables/ps_idle_ms/h4/w1/v9</property>
      <property value="-41.3393">fsim/tables/ps_idle_ms/h4/w2/v0</property>
      <property value="-35.6873">fsim/tables/ps_idle_ms/h4/w2/v1</property>
      <property value="-102.381">fsim/tables/ps_idle_ms/h4/w2/v10</property>
      <property value="-113.662">fsim/tables/ps_idle_ms/h4/w2/v11</property>
      <property value="-126.938">fsim/tables/ps_idle_ms/h4/w2/v12</property>
      <property value="-142.136">fsim/tables/ps_idle_ms/h4/w2/v13</property>
      <property value="-158.899">fsim/tables/ps_idle_ms/h4/w2/v14</property>
      <property value="-177.629">fsim/tables/ps_idle_ms/h4/w2/v15</property>
      <property value="-32.8604">fsim/tables/ps_idle_ms/h4/w2/v2</property>
      <property value="-31.7113">fsim/tables/ps_idle_ms/h4/w2/v3</property>
      <property value="-35.6184">fsim/tables/ps_idle_ms/h4/w2/v4</property>
      <property value="-50.5677">fsim/tables/ps_idle_ms/h4/w2/v5</property>
      <property value="-58.7259">fsim/tables/ps_idle_ms/h4/w2/v6</property>
      <property value="-68.9175">fsim/tables/ps_idle_ms/h4/w2/v7</property>
      <property value="-79.9598">fsim/tables/ps_idle_ms/h4/w2/v8</property>
      <property value="-91.9202">fsim/tables/ps_idle_ms/h4/w2/v9</property>
      <property value="-39.069">fsim/tables/ps_idle_ms/h5/w0/v0</property>
      <property value="-33.6152">fsim/tables/ps_idle_ms/h5/w0/v1</property>
      <property value="-105.203">fsim/tables/ps_idle_ms/h5/w0/v10</property>
      <property value="-117.493">fsim/tables/ps_idle_ms/h5/w0/v11</property>
      <property value="-132.524">fsim/tables/ps_idle_ms/h5/w0/v12</property>
      <property value="-149.219">fsim/tables/ps_idle_ms/h5/w0/v13</property>
      <property value="-167.525">fsim/tables/ps_idle_ms/h5/w0/v14</property>
      <property value="-187.71">fsim/tables/ps_idle_ms/h5/w0/v15</property>
      <property value="-31.1387">fsim/tables/ps_idle_ms/h5/w0/v2</property>
      <property value="-30.2768">fsim/tables/ps_idle_ms/h5/w0/v3</property>
      <property value="-32.9658">fsim/tables/ps_idle_ms/h5/w0/v4</property>
      <property value="-49.2706">fsim/tables/ps_idle_ms/h5/w0/v5</property>
      <property value="-58.4397">fsim/tables/ps_idle_ms/h5/w0/v6</property>
      <property value="-68.8957">fsim/tables/ps_idle_ms/h5/w0/v7</property>
      <property value="-80.4061">fsim/tables/ps_idle_ms/h5/w0/v8</property>
      <property value="-93.6825">fsim/tables/ps_idle_ms/h5/w0/v9</property>
      <property value="-44.6985">fsim/tables/ps_idle_ms/h5/w1/v0</property>
      <property value="-38.9176">fsim/tables/ps_idle_ms/h5/w1/v1</property>
      <property value="-95.5418">fsim/tables/ps_idle_ms/h5/w1/v10</property>
      <property value="-104.843">fsim/tables/ps_idle_ms/h5/w1/v11</property>
      <property value="-115.785">fsim/tables/ps_idle_ms/h5/w1/v12</property>
      <property value="-127.937">fsim/tables/ps_idle_ms/h5/w1/v13</property>
      <property value="-141.576">fsim/tables/ps_idle_ms/h5/w1/v14</property>
      <property value="-157.169">fsim/tables/ps_idle_ms/h5/w1/v15</property>
      <property value="-35.6778">fsim/tables/ps_idle_ms/h5/w1/v2</property>
      <property value="-34.1311">fsim/tables/ps_idle_ms/h5/w1/v3</property>
      <property value="-37.8016">fsim/tables/ps_idle_ms/h5/w1/v4</property>
      <property value="-50.362">fsim/tables/ps_idle_ms/h5/w1/v5</property>
      <property value="-57.864">fsim/tables/ps_idle_ms/h5/w1/v6</property>
      <property value="-66.5331">fsim/tables/ps_idle_ms/h5/w1/v7</property>
      <property value="-76.2952">fsim/tables/ps_idle_ms/h5/w1/v8</property>
      <property value="-87.354">fsim/tables/ps_idle_ms/h5/w1/v9</property>
      <property value="-52.5515">fsim/tables/ps_idle_ms/h5/w2/v0</property>
      <property value="-45.3704">fsim/tables/ps_idle_ms/h5/w2/v1</property>
      <property value="-89.6332">fsim/tables/ps_idle_ms/h5/w2/v10</property>
      <property value="-97.1344">fsim/tables/ps_idle_ms/h5/w2/v11</property>
      <property value="-104.942">fsim/tables/ps_idle_ms/h5/w2/v12</property>
      <property value="-113.558">fsim/tables/ps_idle_ms/h5/w2/v13</property>
      <property value="-123.787">fsim/tables/ps_idle_ms/h5/w2/v14</property>
      <property value="-137.149">fsim/tables/ps_idle_ms/h5/w2/v15</property>
      <property value="-40.9747">fsim/tables/ps_idle_ms/h5/w2/v2</property>
      <property value="-38.5147">fsim/tables/ps_idle_ms/h5/w2/v3</property>
      <property value="-41.3681">fsim/tables/ps_idle_ms/h5/w2/v4</property>
      <property value="-51.5288">fsim/tables/ps_idle_ms/h5/w2/v5</property>
      <property value="-57.7256">fsim/tables/ps_idle_ms/h5/w2/v6</property>
      <property value="-65.0694">fsim/tables/ps_idle_ms/h5/w2/v7</property>
      <property value="-73.2792">fsim/tables/ps_idle_ms/h5/w2/v8</property>
      <property value="-82.7214">fsim/tables/ps_idle_ms/h5/w2/v9</property>
      <property value="-46.9331">fsim/tables/ps_idle_ms/h6/w0/v0</property>
      <property value="-40.8059">fsim/tables/ps_idle_ms/h6/w0/v1</property>
      <property value="-93.7526">fsim/tables/ps_idle_ms/h6/w0/v10</property>
      <property value="-101.663">fsim/tables/ps_idle_ms/h6/w0/v11</property>
      <property value="-111.805">fsim/tables/ps_idle_ms/h6/w0/v12</property>
      <property value="-122.389">fsim/tables/ps_idle_ms/h6/w0/v13</property>
      <property value="-134.632">fsim/tables/ps_idle_ms/h6/w0/v14</property>
      <property value="-149.184">fsim/tables/ps_idle_ms/h6/w0/v15</property>
      <property value="-37.5258">fsim/tables/ps_idle_ms/h6/w0/v2</property>
      <property value="-35.9692">fsim/tables/ps_idle_ms/h6/w0/v3</property>
      <property value="-41.1545">fsim/tables/ps_idle_ms/h6/w0/v4</property>
      <property value="-51.8087">fsim/tables/ps_idle_ms/h6/w0/v5</property>
      <property value="-58.7434">fsim/tables/ps_idle_ms/h6/w0/v6</property>
      <property value="-67.1758">fsim/tables/ps_idle_ms/h6/w0/v7</property>
      <property value="-76.2621">fsim/tables/ps_idle_ms/h6/w0/v8</property>
      <property value="-86.3129">fsim/tables/ps_idle_ms/h6/w0/v9</property>
      <property value="-44.3101">fsim/tables/ps_idle_ms/h6/w1/v0</property>
      <property value="-42.2086">fsim/tables/ps_idle_ms/h6/w1/v1</property>
      <property value="-92.6677">fsim/tables/ps_idle_ms/h6/w1/v10</property>
      <property value="-97.8547">fsim/tables/ps_idle_ms/h6/w1/v11</property>
      <property value="-103.696">fsim/tables/ps_idle_ms/h6/w1/v12</property>
      <property value="-109.377">fsim/tables/ps_idle_ms/h6/w1/v13</property>
      <property value="-116.998">fsim/tables/ps_idle_ms/h6/w1/v14</property>
      <property value="-127.972">fsim/tables/ps_idle_ms/h6/w1/v15</property>
      <property value="-44.3434">fsim/tables/ps_idle_ms/h6/w1/v2</property>
      <property value="-52.2443">fsim/tables/ps_idle_ms/h6/w1/v3</property>
      <property value="-56.7627">fsim/tables/ps_idle_ms/h6/w1/v4</property>
      <property value="-62.0486">fsim/tables/ps_idle_ms/h6/w1/v5</property>
      <property value="-68.2228">fsim/tables/ps_idle_ms/h6/w1/v6</property>
      <property value="-74.5065">fsim/tables/ps_idle_ms/h6/w1/v7</property>
      <property value="-81.6564">fsim/tables/ps_idle_ms/h6/w1/v8</property>
      <property value="-87.6375">fsim/tables/ps_idle_ms/h6/w1/v9</property>
      <property value="-49.8729">fsim/tables/ps_idle_ms/h6/w2/v0</property>
      <property value="-50.0831">fsim/tables/ps_idle_ms/h6/w2/v1</property>
      <property value="-93.0913">fsim/tables/ps_idle_ms/h6/w2/v10</property>
      <property value="-95.861">fsim/tables/ps_idle_ms/h6/w2/v11</property>
      <property value="-98.4756">fsim/tables/ps_idle_ms/h6/w2/v12</property>
      <property value="-101.716">fsim/tables/ps_idle_ms/h6/w2/v13</property>
      <property value="-107.623">fsim/tables/ps_idle_ms/h6/w2/v14</property>
      <property value="-117.189">fsim/tables/ps_idle_ms/h6/w2/v15</property>
      <property value="-54.6476">fsim/tables/ps_idle_ms/h6/w2/v2</property>
      <property value="-59.1224">fsim/tables/ps_idle_ms/h6/w2/v3</property>
      <property value="-62.9227">fsim/tables/ps_idle_ms/h6/w2/v4</property>
      <property value="-68.1171">fsim/tables/ps_idle_ms/h6/w2/v5</property>
      <property value="-72.7925">fsim/tables/ps_idle_ms/h6/w2/v6</property>
      <property value="-78.0991">fsim/tables/ps_idle_ms/h6/w2/v7</property>
      <property value="-84.1691">fsim/tables/ps_idle_ms/h6/w2/v8</property>
      <property value="-89.6877">fsim/tables/ps_idle_ms/h6/w2/v9</property>
      <property value="437.415">fsim/tables/reach_tas_ms/h0/w0</property>
      <property value="436.799">fsim/tables/reach_tas_ms/h0/w1</property>
      <property value="436.281">fsim/tables/reach_tas_ms/h0/w2</property>
      <property value="485.823">fsim/tables/reach_tas_ms/h1/w0</property>
      <property value="485.028">fsim/tables/reach_tas_ms/h1/w1</property>
      <property value="484.266">fsim/tables/reach_tas_ms/h1/w2</property>
      <property value="538.381">fsim/tables/reach_tas_ms/h2/w0</property>
      <property value="537.367">fsim/tables/reach_tas_ms/h2/w1</property>
      <property value="535.599">fsim/tables/reach_tas_ms/h2/w2</property>
      <property value="594.594">fsim/tables/reach_tas_ms/h3/w0</property>
      <property value="591.679">fsim/tables/reach_tas_ms/h3/w1</property>
      <property value="588.676">fsim/tables/reach_tas_ms/h3/w2</property>
      <property value="596.312">fsim/tables/reach_tas_ms/h4/w0</property>
      <property value="588.461">fsim/tables/reach_tas_ms/h4/w1</property>
      <property value="580.835">fsim/tables/reach_tas_ms/h4/w2</property>
      <property value="580.442">fsim/tables/reach_tas_ms/h5/w0</property>
      <property value="569.982">fsim/tables/reach_tas_ms/h5/w1</property>
      <property value="555.031">fsim/tables/reach_tas_ms/h5/w2</property>
      <property value="568.282">fsim/tables/reach_tas_ms/h6/w0</property>
      <property value="546.572">fsim/tables/reach_tas_ms/h6/w1</property>
      <property value="513.679">fsim/tables/reach_tas_ms/h6/w2</property>
      <property value="0.0">fsim/tables/speed_fraction/v0</property>
      <property value="0.0666667">fsim/tables/speed_fraction/v1</property>
      <property value="0.666667">fsim/tables/speed_fraction/v10</property>
      <property value="0.733333">fsim/tables/speed_fraction/v11</property>
      <property value="0.8">fsim/tables/speed_fraction/v12</property>
      <property value="0.866667">fsim/tables/speed_fraction/v13</property>
      <property value="0.933333">fsim/tables/speed_fraction/v14</property>
      <property value="1">fsim/tables/speed_fraction/v15</property>
      <property value="0.133333">fsim/tables/speed_fraction/v2</property>
      <property value="0.2">fsim/tables/speed_fraction/v3</property>
      <property value="0.266667">fsim/tables/speed_fraction/v4</property>
      <property value="0.333333">fsim/tables/speed_fraction/v5</property>
      <property value="0.4">fsim/tables/speed_fraction/v6</property>
      <property value="0.466667">fsim/tables/speed_fraction/v7</property>
      <property value="0.533333">fsim/tables/speed_fraction/v8</property>
      <property value="0.6">fsim/tables/speed_fraction/v9</property>
      <property value="56.2705">fsim/tables/stall_cas_ms/h0/w0</property>
      <property value="62.1287">fsim/tables/stall_cas_ms/h0/w1</property>
      <property value="67.4802">fsim/tables/stall_cas_ms/h0/w2</property>
      <property value="56.6075">fsim/tables/stall_cas_ms/h1/w0</property>
      <property value="62.5008">fsim/tables/stall_cas_ms/h1/w1</property>
      <property value="67.8844">fsim/tables/stall_cas_ms/h1/w2</property>
      <property value="58.013">fsim/tables/stall_cas_ms/h2/w0</property>
      <property value="64.0526">fsim/tables/stall_cas_ms/h2/w1</property>
      <property value="69.5699">fsim/tables/stall_cas_ms/h2/w2</property>
      <property value="59.0831">fsim/tables/stall_cas_ms/h3/w0</property>
      <property value="65.2341">fsim/tables/stall_cas_ms/h3/w1</property>
      <property value="70.8531">fsim/tables/stall_cas_ms/h3/w2</property>
      <property value="59.6553">fsim/tables/stall_cas_ms/h4/w0</property>
      <property value="65.8659">fsim/tables/stall_cas_ms/h4/w1</property>
      <property value="71.5393">fsim/tables/stall_cas_ms/h4/w2</property>
      <property value="60.5654">fsim/tables/stall_cas_ms/h5/w0</property>
      <property value="66.8708">fsim/tables/stall_cas_ms/h5/w1</property>
      <property value="72.6308">fsim/tables/stall_cas_ms/h5/w2</property>
      <property value="61.0609">fsim/tables/stall_cas_ms/h6/w0</property>
      <property value="67.4178">fsim/tables/stall_cas_ms/h6/w1</property>
      <property value="73.2249">fsim/tables/stall_cas_ms/h6/w2</property>
      <property value="21570">fsim/tables/weight_kg/w0</property>
      <property value="26295">fsim/tables/weight_kg/w1</property>
      <property value="31020">fsim/tables/weight_kg/w2</property>
      <channel name="Pitch (fly-by-wire)">
        <!-- hangar: load factor command, alpha and pitch-rate inner loop (hangar/fcs.py) -->
        <summer name="fcs/pitch-trim-sum">
          <input>fcs/elevator-cmd-norm</input>
          <input>fcs/pitch-trim-cmd-norm</input>
          <clipto> <min>-1</min> <max>1</max> </clipto>
        </summer>
        <!-- the integrators are reset below 60 kt and while a wheel carries weight
             (on the ground, taking off and landing) -->
        <switch name="fcs/fbw/reset">
          <default value="0"/>
          <test logic="OR" value="-1">
            velocities/vc-kts lt 60
            gear/wow gt 0
          </test>
        </switch>
        <fcs_function name="fcs/fbw/k-alpha">
          <function>
            <table>
              <independentVar lookup="row">aero/qbar-psf</independentVar>
              <independentVar lookup="column">velocities/mach</independentVar>
              <tableData>
                       0.150     0.400     0.700     0.900     1.100     1.400     2.000
              10.0  -6.00000  -6.00000  -6.00000  -6.00000  -6.00000  -6.00000  -6.00000
              20.0  -5.53473  -5.75397  -5.20969  -4.32968  -6.00000  -6.00000  -6.00000
              40.0  -2.52286  -2.81467  -2.56964  -2.10914  -3.56289  -6.00000  -6.00000
              80.0  -0.88811  -1.21191  -1.20174  -1.03254  -1.23472  -1.56538  -3.04425
             150.0  -0.73077  -1.08688  -1.08930  -0.92365  -1.10614  -1.47287  -0.60154
             300.0  -0.58912  -0.92027  -0.96604  -0.83215  -0.98273  -1.29844  -0.50801
             600.0  -0.59901  -0.77617  -0.85965  -0.74856  -0.86779  -1.17035  -0.43879
            1200.0  -0.98655  -0.50972  -0.53848  -0.39923  -0.31746  -0.82890  -0.35030
            2400.0  -2.77187  -0.32357  -0.17914  -0.06829   0.35548   0.46680   0.77814
              </tableData>
            </table>
          </function>
        </fcs_function>
        <fcs_function name="fcs/fbw/k-q">
          <function>
            <table>
              <independentVar lookup="row">aero/qbar-psf</independentVar>
              <independentVar lookup="column">velocities/mach</independentVar>
              <tableData>
                       0.150     0.400     0.700     0.900     1.100     1.400     2.000
              10.0  -3.00000  -3.00000  -3.00000  -3.00000  -3.00000  -3.00000  -3.00000
              20.0  -3.00000  -3.00000  -3.00000  -3.00000  -3.00000  -3.00000  -3.00000
              40.0  -2.36955  -2.80992  -2.63948  -2.24513  -3.00000  -3.00000  -3.00000
              80.0  -0.68142  -1.09362  -1.11149  -0.99537  -1.84725  -3.00000  -3.00000
             150.0  -0.31815  -0.68421  -0.71686  -0.64538  -1.20950  -2.10324  -2.35914
             300.0  -0.05786  -0.40393  -0.45560  -0.41960  -0.79310  -1.36417  -1.50626
             600.0   0.12563  -0.22211  -0.28579  -0.27026  -0.52211  -0.91645  -1.02147
            1200.0   0.29149  -0.06978  -0.13667  -0.13034  -0.27858  -0.58290  -0.69312
            2400.0   0.48066   0.06793  -0.01347  -0.02627  -0.08477  -0.23085  -0.34291
              </tableData>
            </table>
          </function>
        </fcs_function>
        <fcs_function name="fcs/fbw/k-ff">
          <function>
            <table>
              <independentVar lookup="row">aero/qbar-psf</independentVar>
              <independentVar lookup="column">velocities/mach</independentVar>
              <tableData>
                       0.150     0.400     0.700     0.900     1.100     1.400     2.000
              10.0  -0.30000  -0.30000  -0.30000  -0.30000  -0.30000  -0.30000  -0.30000
              20.0  -0.30000  -0.30000  -0.30000  -0.30000  -0.30000  -0.30000  -0.30000
              40.0  -0.30000  -0.30000  -0.30000  -0.30000  -0.30000  -0.30000  -0.30000
              80.0  -0.30000  -0.30000  -0.30000  -0.30000  -0.30000  -0.30000  -0.30000
             150.0  -0.23846  -0.23052  -0.20766  -0.17588  -0.30000  -0.30000  -0.30000
             300.0  -0.11748  -0.11375  -0.10288  -0.08755  -0.16888  -0.30000  -0.30000
             600.0  -0.05894  -0.05706  -0.05160  -0.04390  -0.08484  -0.15666  -0.19211
            1200.0  -0.02498  -0.02370  -0.02016  -0.01574  -0.03215  -0.07324  -0.09669
            2400.0  -0.00634  -0.00601  -0.00511  -0.00398  -0.00813  -0.01859  -0.02882
              </tableData>
            </table>
          </function>
        </fcs_function>
        <fcs_function name="fcs/fbw/k-i">
          <function>
            <table>
              <independentVar lookup="row">aero/qbar-psf</independentVar>
              <independentVar lookup="column">velocities/mach</independentVar>
              <tableData>
                       0.150     0.400     0.700     0.900     1.100     1.400     2.000
              10.0  -0.60000  -0.60000  -0.60000  -0.60000  -0.60000  -0.60000  -0.60000
              20.0  -0.60000  -0.60000  -0.60000  -0.60000  -0.60000  -0.60000  -0.60000
              40.0  -0.60000  -0.60000  -0.60000  -0.60000  -0.60000  -0.60000  -0.60000
              80.0  -0.47420  -0.45921  -0.41493  -0.35129  -0.60000  -0.60000  -0.60000
             150.0  -0.23846  -0.23052  -0.20766  -0.17588  -0.33873  -0.60000  -0.60000
             300.0  -0.11748  -0.11375  -0.10288  -0.08755  -0.16888  -0.31065  -0.37906
             600.0  -0.05894  -0.05706  -0.05160  -0.04390  -0.08484  -0.15666  -0.19211
            1200.0  -0.02498  -0.02370  -0.02016  -0.01574  -0.03215  -0.07324  -0.09669
            2400.0  -0.00634  -0.00601  -0.00511  -0.00398  -0.00813  -0.01859  -0.02882
              </tableData>
            </table>
          </function>
        </fcs_function>
        <fcs_function name="fcs/fbw/n-alpha">
          <function>
            <table>
              <independentVar lookup="row">aero/qbar-psf</independentVar>
              <independentVar lookup="column">velocities/mach</independentVar>
              <tableData>
                       0.150     0.400     0.700     0.900     1.100     1.400     2.000
              10.0   1.00000   1.00000   1.00000   1.00000   1.00000   1.00000   1.00000
              20.0   1.00000   1.00000   1.00000   1.00000   1.00000   1.00000   1.00000
              40.0   1.00000   1.00000   1.00000   1.00000   1.00000   1.00000   1.00000
              80.0   2.68552   2.78035   3.06262   3.46168   3.19733   2.22944   1.03390
             150.0   5.71659   5.83443   6.19447   6.72832   6.37096   5.17127   4.01064
             300.0  11.05854  11.28477  11.99154  13.05235  12.34072  10.02534   7.99824
             600.0  21.72049  22.17069  23.57563  25.68206  24.26900  19.66437  15.60051
            1200.0  42.96854  43.87179  46.69053  50.91668  48.08163  38.84334  30.74680
            2400.0  85.59017  87.40180  93.05533 101.53168  95.84545  77.31631  61.07714
              </tableData>
            </table>
          </function>
        </fcs_function>
        <!-- the pitching moment's departures from a straight line through the
             angle-of-attack envelope (+0.058 per rad about the CG), cancelled by the
             elevator: the gains are designed on the line -->
        <fcs_function name="fcs/fbw/moment-comp">
          <function>
            <table>
              <independentVar lookup="row">aero/alpha-rad</independentVar>
              <independentVar lookup="column">velocities/mach</independentVar>
              <tableData>
                       0.150     0.400     0.700     0.900     1.100     1.400     2.000
          -0.17453  -0.01990  -0.01922  -0.01725  -0.01450  -0.02702  -0.04938  -0.05844
          -0.15708  -0.01976  -0.01908  -0.01712  -0.01440  -0.02683  -0.04902  -0.05801
          -0.13963  -0.01918  -0.01852  -0.01662  -0.01397  -0.02604  -0.04758  -0.05631
          -0.12217  -0.01842  -0.01779  -0.01596  -0.01342  -0.02502  -0.04571  -0.05410
          -0.10472  -0.01724  -0.01665  -0.01494  -0.01256  -0.02341  -0.04278  -0.05062
          -0.08727  -0.01578  -0.01524  -0.01367  -0.01150  -0.02142  -0.03914  -0.04632
          -0.06981  -0.01387  -0.01339  -0.01202  -0.01010  -0.01883  -0.03440  -0.04071
          -0.05236  -0.01355  -0.01309  -0.01174  -0.00987  -0.01840  -0.03362  -0.03979
          -0.03491  -0.01194  -0.01153  -0.01035  -0.00870  -0.01621  -0.02963  -0.03506
          -0.01745  -0.00809  -0.00781  -0.00701  -0.00590  -0.01099  -0.02008  -0.02376
           0.00000  -0.00506  -0.00489  -0.00439  -0.00369  -0.00688  -0.01256  -0.01487
           0.01745  -0.00253  -0.00245  -0.00220  -0.00185  -0.00344  -0.00629  -0.00744
           0.03491  -0.00028  -0.00027  -0.00024  -0.00020  -0.00037  -0.00068  -0.00081
           0.05236   0.00282   0.00272   0.00244   0.00206   0.00383   0.00700   0.00828
           0.06981   0.00644   0.00622   0.00558   0.00469   0.00875   0.01598   0.01892
           0.08727   0.01076   0.01039   0.00932   0.00784   0.01461   0.02669   0.03158
           0.10472   0.01554   0.01501   0.01347   0.01133   0.02110   0.03856   0.04564
           0.12217   0.02011   0.01942   0.01743   0.01465   0.02731   0.04990   0.05905
           0.13963   0.02488   0.02403   0.02156   0.01813   0.03378   0.06173   0.07305
           0.15708   0.02872   0.02774   0.02489   0.02093   0.03900   0.07127   0.08434
           0.17453   0.03235   0.03125   0.02803   0.02357   0.04393   0.08027   0.09499
           0.19199   0.03424   0.03307   0.02967   0.02495   0.04650   0.08496   0.10055
           0.20944   0.03547   0.03425   0.03073   0.02584   0.04816   0.08800   0.10414
           0.22689   0.03464   0.03345   0.03001   0.02524   0.04703   0.08594   0.10170
           0.24435   0.03250   0.03139   0.02816   0.02368   0.04413   0.08064   0.09543
           0.26180   0.02883   0.02785   0.02499   0.02101   0.03915   0.07154   0.08466
           0.27925   0.02365   0.02284   0.02049   0.01723   0.03211   0.05868   0.06944
           0.29671   0.01766   0.01706   0.01531   0.01287   0.02399   0.04383   0.05187
           0.31416   0.01118   0.01080   0.00969   0.00815   0.01518   0.02774   0.03283
           0.33161   0.00507   0.00489   0.00439   0.00369   0.00688   0.01257   0.01488
           0.34907  -0.00048  -0.00046  -0.00041  -0.00035  -0.00065  -0.00118  -0.00140
           0.36652  -0.00569  -0.00550  -0.00493  -0.00415  -0.00773  -0.01412  -0.01671
           0.38397  -0.01060  -0.01023  -0.00918  -0.00772  -0.01439  -0.02629  -0.03111
           0.40143  -0.01536  -0.01484  -0.01331  -0.01120  -0.02086  -0.03812  -0.04511
           0.41888  -0.01994  -0.01926  -0.01728  -0.01453  -0.02707  -0.04947  -0.05854
           0.43633  -0.02406  -0.02323  -0.02084  -0.01753  -0.03266  -0.05969  -0.07063
           0.45379  -0.02813  -0.02717  -0.02438  -0.02050  -0.03820  -0.06980  -0.08260
           0.47124  -0.03213  -0.03103  -0.02784  -0.02341  -0.04363  -0.07972  -0.09435
           0.48869  -0.03603  -0.03479  -0.03122  -0.02625  -0.04892  -0.08939  -0.10578
           0.50615  -0.03960  -0.03825  -0.03432  -0.02886  -0.05378  -0.09827  -0.11629
           0.52360  -0.04303  -0.04156  -0.03729  -0.03135  -0.05843  -0.10676  -0.12634
              </tableData>
            </table>
          </function>
        </fcs_function>
        <!-- the gravity reference: the load factor that holds the flight path -->
        <fcs_function name="fcs/fbw/g-ref">
          <function>
            <product>
              <cos><property>attitude/theta-rad</property></cos>
              <cos><property>attitude/phi-rad</property></cos>
            </product>
          </function>
        </fcs_function>
        <!-- stick to load factor beyond the gravity reference, aft (negative) to n_max,
             no more than the lift at the angle-of-attack limits gives - beyond the
             gravity reference of the moment, so that full aft stick still reaches
             the limit in a steep climb or inverted - through a 0.2 s prefilter and
             a 12 g/s onset limit (a full pull at once pitches an agile airframe
             faster than its nose-down control can stop at the angle-of-attack
             limit) -->
        <fcs_function name="fcs/fbw/dn-stick">
          <function>
            <max>
              <min>
                <table>
                  <independentVar lookup="row">fcs/pitch-trim-sum</independentVar>
                  <tableData>
                    -1.0  8.000
                     0.0  0.0
                     1.0  -4.000
                  </tableData>
                </table>
                <difference><product><property>fcs/fbw/n-alpha</property><value>0.52360</value></product><property>fcs/fbw/g-ref</property></difference>
              </min>
              <difference><product><property>fcs/fbw/n-alpha</property><value>-0.17453</value></product><property>fcs/fbw/g-ref</property></difference>
            </max>
          </function>
        </fcs_function>
        <lag_filter name="fcs/fbw/dn-lag">
          <input>fcs/fbw/dn-stick</input>
          <c1>5.0</c1>
        </lag_filter>
        <actuator name="fcs/fbw/dn-cmd">
          <input>fcs/fbw/dn-lag</input>
          <rate_limit>12.0</rate_limit>
        </actuator>
        <!-- the response the command should produce (the short period's rise): the
             integrator trims away what differs from it, not the rise itself -->
        <lag_filter name="fcs/fbw/dn-model">
          <input>fcs/fbw/dn-cmd</input>
          <c1>2.5</c1>
        </lag_filter>
        <fcs_function name="fcs/fbw/dn">
          <function>
            <difference><property>accelerations/Nz</property><property>fcs/fbw/g-ref</property></difference>
          </function>
        </fcs_function>
        <!-- the angle of attack with its rise over the next 0.35 s counted as spent
             (the rise, not the pitch rate: in a steady pull the nose turns with the
             flight path and the angle of attack holds), and the load factor the
             angle of attack left to each limit gives -->
        <fcs_function name="fcs/fbw/alpha-ahead">
          <function>
            <sum>
              <property>aero/alpha-rad</property>
              <product><value>0.35</value><property>aero/alphadot-rad_sec</property></product>
            </sum>
          </function>
        </fcs_function>
        <fcs_function name="fcs/fbw/dn-room-up">
          <function>
            <product><property>fcs/fbw/n-alpha</property>
              <difference><value>0.52360</value><property>fcs/fbw/alpha-ahead</property></difference></product>
          </function>
        </fcs_function>
        <fcs_function name="fcs/fbw/dn-room-down">
          <function>
            <product><property>fcs/fbw/n-alpha</property>
              <difference><value>-0.17453</value><property>fcs/fbw/alpha-ahead</property></difference></product>
          </function>
        </fcs_function>
        <!-- the command limited to the load factor the aircraft pulls now plus what
             the angle of attack left gives: at a limit the feedforward asks for the
             load factor the airframe gives there, whatever elevator holds it - a
             steady pull on a stable airframe, a push on an unstable one (a
             feedforward faded out past the limit instead took about 10 deg of
             elevator per deg of alpha, on one side of it only: the actuator's rate
             limit could not follow, and the MiG-29A cycled between 24 and 29 deg) -->
        <fcs_function name="fcs/fbw/dn-limited">
          <function>
            <max>
              <min>
                <property>fcs/fbw/dn-cmd</property>
                <sum><property>fcs/fbw/dn</property><property>fcs/fbw/dn-room-up</property></sum>
              </min>
              <sum><property>fcs/fbw/dn</property><property>fcs/fbw/dn-room-down</property></sum>
            </max>
          </function>
        </fcs_function>
        <!-- the integrator's error: the load factor's departure from the model
             response, and at a limit the angle of attack left, counted five times -
             it trims what the airframe needs there beyond the linear design (vortex
             lift, the tail's power at high alpha) in a fraction of a second, not
             over the pull -->
        <fcs_function name="fcs/fbw/pitch-error">
          <function>
            <max>
              <min>
                <difference><property>fcs/fbw/dn-model</property><property>fcs/fbw/dn</property></difference>
                <product><value>5.0</value><property>fcs/fbw/dn-room-up</property></product>
              </min>
              <product><value>5.0</value><property>fcs/fbw/dn-room-down</property></product>
            </max>
          </function>
        </fcs_function>
        <fcs_function name="fcs/fbw/pitch-error-rate">
          <function><product><property>fcs/fbw/k-i</property><property>fcs/fbw/pitch-error</property></product></function>
        </fcs_function>
        <!-- the integrator: reset below 60 kt and on the wheels, held while the
             elevator is at a stop it would push further into (anti-windup) -->
        <switch name="fcs/fbw/pitch-hold">
          <default value="0"/>
          <test logic="OR" value="-1">
            velocities/vc-kts lt 60
            gear/wow gt 0
          </test>
          <test logic="AND" value="1">
            fcs/fbw/elevator-raw gt 0.87266
            fcs/fbw/pitch-error-rate gt 0
          </test>
          <test logic="AND" value="1">
            fcs/fbw/elevator-raw lt -0.43633
            fcs/fbw/pitch-error-rate lt 0
          </test>
        </switch>
        <integrator name="fcs/fbw/pitch-integral">
          <input>fcs/fbw/pitch-error-rate</input>
          <c1>1.0</c1>
          <trigger>fcs/fbw/pitch-hold</trigger>
          <clipto> <min>-0.5</min> <max>0.5</max> </clipto>
        </integrator>
        <!-- past an angle-of-attack limit (the next 0.35 s counted) a push back
             in proportion, all the travel 4 deg beyond: an unstable airframe
             pitching up fast needs it at once, not when an integrator winds -->
        <fcs_function name="fcs/fbw/alpha-push">
          <function>
            <difference>
              <product><value>12.50000</value>
                <max><value>0</value><difference><property>fcs/fbw/alpha-ahead</property><value>0.52360</value></difference></max></product>
              <product><value>6.25000</value>
                <max><value>0</value><difference><value>-0.17453</value><property>fcs/fbw/alpha-ahead</property></difference></max></product>
            </difference>
          </function>
        </fcs_function>
        <lag_filter name="fcs/fbw/ground">
          <input>gear/wow</input>
          <c1>2.0</c1>
        </lag_filter>
        <fcs_function name="fcs/fbw/ground-direct">
          <function>
            <product>
              <property>fcs/fbw/ground</property>
              <table>
                <independentVar lookup="row">fcs/pitch-trim-sum</independentVar>
                <tableData>
                  -1.0  -0.43633
                   0.0  0.0
                   1.0  0.87266
                </tableData>
              </table>
            </product>
          </function>
        </fcs_function>
        <!-- the elevator: the push, the moment compensation, angle-of-attack and
             pitch-rate feedback, the feedforward of the limited command, the
             integrator, the ground mode's direct stick -->
        <fcs_function name="fcs/fbw/elevator-raw">
          <function>
            <sum>
              <property>fcs/fbw/alpha-push</property>
              <property>fcs/fbw/moment-comp</property>
              <product><value>-1</value><property>fcs/fbw/k-alpha</property><property>aero/alpha-rad</property></product>
              <product><value>-1</value><property>fcs/fbw/k-q</property><property>velocities/q-rad_sec</property></product>
              <product><property>fcs/fbw/k-ff</property><property>fcs/fbw/dn-limited</property></product>
              <property>fcs/fbw/pitch-integral</property>
              <property>fcs/fbw/ground-direct</property>
            </sum>
          </function>
        </fcs_function>
        <pure_gain name="fcs/fbw/elevator">
          <input>fcs/fbw/elevator-raw</input>
          <gain>1.0</gain>
          <clipto> <min>-0.43633</min> <max>0.87266</max> </clipto>
        </pure_gain>
        <!-- full travel in 0.83 s: 60 deg/s for a +-25 deg tail, faster for a
             canard's longer throw -->
        <actuator name="fcs/elevator-actuator">
          <input>fcs/fbw/elevator</input>
          <lag>40</lag>
          <rate_limit>1.577</rate_limit>
          <output>fcs/elevator-pos-rad</output>
        </actuator>
      </channel>
      <channel name="Roll (fly-by-wire)">
        <!-- hangar: roll-rate command about the flight path, limited to what the rudder can
             coordinate; bank hold at neutral stick -->
        <summer name="fcs/roll-trim-sum">
          <input>fcs/aileron-cmd-norm</input>
          <input>fcs/roll-trim-cmd-norm</input>
          <clipto> <min>-1</min> <max>1</max> </clipto>
        </summer>
        <fcs_function name="fcs/fbw/k-roll">
          <function>
            <table>
              <independentVar lookup="row">aero/qbar-psf</independentVar>
              <independentVar lookup="column">velocities/mach</independentVar>
              <tableData>
                       0.150     0.400     0.700     0.900     1.100     1.400     2.000
              10.0   1.50000   1.50000   1.50000   1.50000   1.50000   1.50000   1.50000
              20.0   1.50000   1.50000   1.50000   1.50000   1.50000   1.50000   1.50000
              40.0   1.14047   1.27793   1.20489   1.03745   1.50000   1.50000   1.50000
              80.0   0.38785   0.51601   0.50155   0.43386   0.87098   1.50000   1.50000
             150.0   0.12295   0.23687   0.24204   0.21171   0.42986   0.85787   1.05967
             300.0   0.00000   0.09161   0.10535   0.09448   0.19655   0.39980   0.49750
             600.0   0.00000   0.01790   0.03702   0.03580   0.08090   0.17911   0.23462
            1200.0   0.00000   0.00000   0.00254   0.00630   0.02281   0.06823   0.10336
            2400.0   0.00000   0.00000   0.00000   0.00000   0.00000   0.01279   0.03771
              </tableData>
            </table>
          </function>
        </fcs_function>
        <fcs_function name="fcs/fbw/k-roll-ff">
          <function>
            <table>
              <independentVar lookup="row">aero/qbar-psf</independentVar>
              <independentVar lookup="column">velocities/mach</independentVar>
              <tableData>
                       0.150     0.400     0.700     0.900     1.100     1.400     2.000
              10.0   0.28319   0.10538   0.05857   0.04249   0.06461   0.07811   0.05107
              20.0   0.28319   0.10538   0.05857   0.04249   0.06461   0.07811   0.05107
              40.0   0.28319   0.10538   0.05857   0.04249   0.06461   0.07811   0.05107
              80.0   0.23234   0.08597   0.04709   0.03350   0.05162   0.06633   0.05107
             150.0   0.19566   0.07235   0.03943   0.02782   0.04310   0.05565   0.03899
             300.0   0.16179   0.06001   0.03309   0.02382   0.03640   0.04538   0.03151
             600.0   0.15526   0.05775   0.03207   0.02324   0.03536   0.04289   0.02827
            1200.0   0.15458   0.05752   0.03197   0.02319   0.03526   0.04264   0.02788
            2400.0   0.15456   0.05751   0.03197   0.02319   0.03526   0.04263   0.02787
              </tableData>
            </table>
          </function>
        </fcs_function>
        <fcs_function name="fcs/fbw/k-roll-i">
          <function>
            <table>
              <independentVar lookup="row">aero/qbar-psf</independentVar>
              <independentVar lookup="column">velocities/mach</independentVar>
              <tableData>
                       0.150     0.400     0.700     0.900     1.100     1.400     2.000
              10.0   0.50619   0.49184   0.44923   0.38398   0.75603   1.00000   1.00000
              20.0   0.25310   0.24592   0.22462   0.19199   0.37802   0.72148   0.85380
              40.0   0.12655   0.12296   0.11231   0.09600   0.18901   0.36074   0.42690
              80.0   0.05513   0.05351   0.04877   0.04154   0.08201   0.15874   0.21345
             150.0   0.02832   0.02749   0.02502   0.02129   0.04204   0.08120   0.09766
             300.0   0.01387   0.01348   0.01231   0.01052   0.02071   0.03957   0.04702
             600.0   0.00692   0.00672   0.00614   0.00525   0.01033   0.01973   0.02337
            1200.0   0.00346   0.00336   0.00307   0.00262   0.00516   0.00986   0.01167
            2400.0   0.00173   0.00168   0.00153   0.00131   0.00258   0.00493   0.00583
              </tableData>
            </table>
          </function>
        </fcs_function>
        <fcs_function name="fcs/fbw/p-max">
          <function>
            <table>
              <independentVar lookup="row">aero/qbar-psf</independentVar>
              <independentVar lookup="column">velocities/mach</independentVar>
              <tableData>
                       0.150     0.400     0.700     0.900     1.100     1.400     2.000
              10.0   1.23260   3.31250   4.36332   4.36332   4.36332   4.36332   4.36332
              20.0   1.23260   3.31250   4.36332   4.36332   4.36332   4.36332   4.36332
              40.0   1.23260   3.31250   4.36332   4.36332   4.36332   4.36332   4.36332
              80.0   1.50241   4.06041   4.36332   4.36332   4.36332   4.36332   4.36332
             150.0   1.78400   4.36332   4.36332   4.36332   4.36332   4.36332   4.36332
             300.0   2.15753   4.36332   4.36332   4.36332   4.36332   4.36332   4.36332
             600.0   2.24833   4.36332   4.36332   4.36332   4.36332   4.36332   4.36332
            1200.0   2.25813   4.36332   4.36332   4.36332   4.36332   4.36332   4.36332
            2400.0   2.25844   4.36332   4.36332   4.36332   4.36332   4.36332   4.36332
              </tableData>
            </table>
          </function>
        </fcs_function>
        <!-- the stick's rate halves towards alpha_max -->
        <fcs_function name="fcs/fbw/p-stick">
          <function>
            <product>
              <property>fcs/roll-trim-sum</property>
              <property>fcs/fbw/p-max</property>
              <table>
                <independentVar lookup="row">aero/alpha-rad</independentVar>
                <tableData>
                  0.20944 1.0
                  0.52360 0.5
                </tableData>
              </table>
            </product>
          </function>
        </fcs_function>
        <!-- the rudder's yaw acceleration at full travel (1/s^2), and the yaw damping (1/s) -->
        <fcs_function name="fcs/fbw/yaw-accel">
          <function>
            <table>
              <independentVar lookup="row">aero/qbar-psf</independentVar>
              <independentVar lookup="column">velocities/mach</independentVar>
              <tableData>
                       0.150     0.400     0.700     0.900     1.100     1.400     2.000
              10.0   0.01492   0.01510   0.01558   0.01601   0.01552   0.01279   0.01130
              20.0   0.02984   0.03019   0.03116   0.03202   0.03105   0.02559   0.02261
              40.0   0.05968   0.06038   0.06232   0.06403   0.06209   0.05117   0.04521
              80.0   0.16275   0.16616   0.17541   0.18462   0.17638   0.13201   0.09042
             150.0   0.33843   0.34284   0.35558   0.36774   0.35510   0.28842   0.24975
             300.0   0.70266   0.71134   0.73542   0.75697   0.73315   0.60041   0.52519
             600.0   1.41965   1.43642   1.48306   1.52434   1.47776   1.21646   1.07219
            1200.0   2.84342   2.87669   2.96917   3.05059   2.95815   2.43782   2.15381
            2400.0   5.68790   5.75448   5.93951   6.10241   5.91747   4.87651   4.30827
              </tableData>
            </table>
          </function>
        </fcs_function>
        <fcs_function name="fcs/fbw/yaw-damping">
          <function>
            <table>
              <independentVar lookup="row">aero/qbar-psf</independentVar>
              <independentVar lookup="column">velocities/mach</independentVar>
              <tableData>
                       0.150     0.400     0.700     0.900     1.100     1.400     2.000
              10.0   0.02239   0.00857   0.00522   0.00443   0.00342   0.00217   0.00120
              20.0   0.04477   0.01715   0.01043   0.00886   0.00684   0.00433   0.00239
              40.0   0.08955   0.03429   0.02087   0.01771   0.01368   0.00866   0.00479
              80.0   0.18716   0.07288   0.04596   0.03981   0.03050   0.01676   0.00957
             150.0   0.36849   0.14124   0.08613   0.07327   0.05651   0.03551   0.01984
             300.0   0.73569   0.28158   0.17103   0.14482   0.11202   0.07140   0.03962
             600.0   1.44782   0.55426   0.33693   0.28562   0.22075   0.14034   0.07791
            1200.0   2.87065   1.09915   0.66849   0.56705   0.43809   0.27801   0.15399
            2400.0   5.72428   2.19211   1.33379   1.13202   0.87426   0.55393   0.30617
              </tableData>
            </table>
          </function>
        </fcs_function>
        <!-- the rudder's share of the yaw a roll about the flight path needs, per unit of
             its roll acceleration: sin(alpha), less the ailerons' own yaw and what a
             principal axis inclined to the body axis gives -->
        <fcs_function name="fcs/fbw/roll-yaw-share">
          <function>
            <table>
              <independentVar lookup="row">aero/alpha-rad</independentVar>
              <tableData>
                   -0.34907  -0.35460
                   -0.26180  -0.27894
                   -0.17453  -0.19986
                   -0.08727  -0.11520
                    0.00000  -0.02387
                    0.08727   0.06809
                    0.17453   0.15049
                    0.26180   0.22017
                    0.34907   0.29715
                    0.43633   0.37333
                    0.52360   0.44565
                    0.61087   0.52102
                    0.69813   0.59273
                    0.78540   0.68236
                    0.87266   0.70551
              </tableData>
            </table>
          </function>
        </fcs_function>
        <!-- the yaw acceleration each rad/s of roll rate needs while the aircraft pitches
             under it: the pitch rate's inertia coupling, the angle of attack rising, and
             the yaw damping the roll's yaw rate meets -->
        <fcs_function name="fcs/fbw/p-yaw-need">
          <function>
            <abs>
              <sum>
                <product>
                  <sum>
                    <property>aero/alphadot-rad_sec</property>
                    <product><value>0.76678</value><property>velocities/q-rad_sec</property></product>
                  </sum>
                  <cos><property>aero/alpha-rad</property></cos>
                </product>
                <product><property>fcs/fbw/yaw-damping</property><sin><property>aero/alpha-rad</property></sin></product>
              </sum>
            </abs>
          </function>
        </fcs_function>
        <!-- no more roll rate than 0.5 of the rudder's yaw holds: a roll the rudder cannot
             follow turns the angle of attack into sideslip -->
        <fcs_function name="fcs/fbw/p-yaw-max">
          <function>
            <quotient>
              <product><value>0.5</value><property>fcs/fbw/yaw-accel</property></product>
              <max><value>0.001</value><property>fcs/fbw/p-yaw-need</property></max>
            </quotient>
          </function>
        </fcs_function>
        <fcs_function name="fcs/fbw/p-limited">
          <function>
            <max>
              <min><property>fcs/fbw/p-stick</property><property>fcs/fbw/p-yaw-max</property></min>
              <product><value>-1</value><property>fcs/fbw/p-yaw-max</property></product>
            </max>
          </function>
        </fcs_function>
        <!-- and while the rate grows, no faster roll acceleration than all of it
             coordinates, unless the roll asked for could not leave 2.0 deg of sideslip
             even uncoordinated: at worst c^2 p^2 / (8 Y), c the rudder's share, Y its yaw
             acceleration, p the rate asked for -->
        <fcs_function name="fcs/fbw/p-accel">
          <function>
            <product>
              <quotient>
                <property>fcs/fbw/yaw-accel</property>
                <max><value>0.01</value><abs><property>fcs/fbw/roll-yaw-share</property></abs></max>
              </quotient>
              <max>
                <value>1</value>
                <quotient>
                  <product><value>0.27925</value><property>fcs/fbw/yaw-accel</property></product>
                  <sum>
                    <value>1e-9</value>
                    <product>
                      <property>fcs/fbw/roll-yaw-share</property><property>fcs/fbw/roll-yaw-share</property>
                      <property>fcs/fbw/p-limited</property><property>fcs/fbw/p-limited</property>
                    </product>
                  </sum>
                </quotient>
              </max>
            </product>
          </function>
        </fcs_function>
        <!-- a roll is stopped as fast as the ailerons can -->
        <fcs_function name="fcs/fbw/p-accel-up">
          <function>
            <sum><property>fcs/fbw/p-accel</property>
              <product><value>1000</value><lt><property>fcs/fbw/p-cmd</property><value>0</value></lt></product></sum>
          </function>
        </fcs_function>
        <fcs_function name="fcs/fbw/p-accel-down">
          <function>
            <sum><property>fcs/fbw/p-accel</property>
              <product><value>1000</value><gt><property>fcs/fbw/p-cmd</property><value>0</value></gt></product></sum>
          </function>
        </fcs_function>
        <actuator name="fcs/fbw/p-cmd">
          <input>fcs/fbw/p-limited</input>
          <rate_limit sense="incr">fcs/fbw/p-accel-up</rate_limit>
          <rate_limit sense="decr">fcs/fbw/p-accel-down</rate_limit>
        </actuator>
        <fcs_function name="fcs/fbw/p-stability">
          <function>
            <sum>
              <product><property>velocities/p-rad_sec</property><cos><property>aero/alpha-rad</property></cos></product>
              <product><property>velocities/r-rad_sec</property><sin><property>aero/alpha-rad</property></sin></product>
            </sum>
          </function>
        </fcs_function>
        <fcs_function name="fcs/fbw/roll-error-rate">
          <function>
            <product><property>fcs/fbw/k-roll-i</property>
              <difference><property>fcs/fbw/p-cmd</property><property>fcs/fbw/p-stability</property></difference></product>
          </function>
        </fcs_function>
        <integrator name="fcs/fbw/roll-integral">
          <input>fcs/fbw/roll-error-rate</input>
          <c1>1.0</c1>
          <trigger>fcs/fbw/reset</trigger>
          <clipto> <min>-0.21817</min> <max>0.21817</max> </clipto>
        </integrator>
        <fcs_function name="fcs/fbw/aileron">
          <function>
            <sum>
              <product><property>fcs/fbw/k-roll-ff</property><property>fcs/fbw/p-cmd</property></product>
              <product><property>fcs/fbw/k-roll</property>
                <difference><property>fcs/fbw/p-cmd</property><property>fcs/fbw/p-stability</property></difference></product>
              <property>fcs/fbw/roll-integral</property>
            </sum>
          </function>
          <clipto> <min>-0.43633</min> <max>0.43633</max> </clipto>
        </fcs_function>
        <actuator name="fcs/left-aileron-actuator">
          <input>fcs/fbw/aileron</input>
          <lag>40</lag>
          <rate_limit>1.4</rate_limit>
          <output>fcs/left-aileron-pos-rad</output>
        </actuator>
        <pure_gain name="fcs/right-aileron">
          <input>fcs/left-aileron-pos-rad</input>
          <gain>-1</gain>
          <output>fcs/right-aileron-pos-rad</output>
        </pure_gain>
      </channel>
      <channel name="Yaw (fly-by-wire)">
        <!-- hangar: yaw damper, sideslip feedback, pedals command sideslip -->
        <summer name="fcs/yaw-trim-sum">
          <input>fcs/rudder-cmd-norm</input>
          <input>fcs/yaw-trim-cmd-norm</input>
          <clipto> <min>-1</min> <max>1</max> </clipto>
        </summer>
        <fcs_function name="fcs/fbw/k-yaw-r">
          <function>
            <table>
              <independentVar lookup="row">aero/qbar-psf</independentVar>
              <independentVar lookup="column">velocities/mach</independentVar>
              <tableData>
                       0.150     0.400     0.700     0.900     1.100     1.400     2.000
              10.0  -3.00000  -3.00000  -3.00000  -3.00000  -3.00000  -3.00000  -3.00000
              20.0  -3.00000  -3.00000  -3.00000  -3.00000  -3.00000  -3.00000  -3.00000
              40.0  -3.00000  -3.00000  -3.00000  -3.00000  -3.00000  -3.00000  -3.00000
              80.0  -2.92798  -3.00000  -2.88830  -2.75374  -2.90402  -3.00000  -3.00000
             150.0  -1.07711  -1.34945  -1.36824  -1.33870  -1.40647  -1.76380  -2.06423
             300.0  -0.27540  -0.55895  -0.60879  -0.60800  -0.64703  -0.81985  -0.96332
             600.0   0.00000  -0.18993  -0.25127  -0.26084  -0.28807  -0.37912  -0.45531
            1200.0   0.00000  -0.03748  -0.10414  -0.11785  -0.13796  -0.17701  -0.21558
            2400.0   0.00000   0.00000  -0.04010  -0.05583  -0.07450  -0.10464  -0.13428
              </tableData>
            </table>
          </function>
        </fcs_function>
        <fcs_function name="fcs/fbw/k-yaw-beta">
          <function>
            <table>
              <independentVar lookup="row">aero/qbar-psf</independentVar>
              <independentVar lookup="column">velocities/mach</independentVar>
              <tableData>
                       0.150     0.400     0.700     0.900     1.100     1.400     2.000
              10.0   3.00000   3.00000   3.00000   3.00000   3.00000   3.00000   3.00000
              20.0   3.00000   3.00000   3.00000   3.00000   3.00000   3.00000   3.00000
              40.0   3.00000   3.00000   3.00000   3.00000   3.00000   3.00000   3.00000
              80.0   0.00000   0.00000   0.30501   0.80998   0.58959   0.00000   0.00000
             150.0   0.63722   0.66511   0.74419   0.85895   0.82797   0.83878   0.37325
             300.0   0.42274   0.42694   0.43914   0.46326   0.46800   0.56204   0.49947
             600.0   0.11391   0.11337   0.11232   0.11569   0.12456   0.20265   0.22981
            1200.0   0.00000   0.00000   0.00000   0.00000   0.00000   0.00000   0.00000
            2400.0   0.00000   0.00000   0.00000   0.00000   0.00000   0.00000   0.00000
              </tableData>
            </table>
          </function>
        </fcs_function>
        <fcs_function name="fcs/fbw/k-pedal">
          <function>
            <table>
              <independentVar lookup="row">aero/qbar-psf</independentVar>
              <independentVar lookup="column">velocities/mach</independentVar>
              <tableData>
                       0.150     0.400     0.700     0.900     1.100     1.400     2.000
              10.0   0.00000   0.00000   0.00000   0.00000   0.00000   0.00000   0.00000
              20.0   0.00000   0.00000   0.00000   0.00000   0.00000   0.00000   0.00000
              40.0   0.00000   0.00000   0.00000   0.00000   0.00000   0.00000   0.00000
              80.0   0.00000   0.00000   0.00000   0.00781   0.00000   0.00000   0.00000
             150.0   0.02467   0.02475   0.02521   0.02623   0.02523   0.02297   0.01883
             300.0   0.03782   0.03802   0.03864   0.03961   0.03860   0.03446   0.02995
             600.0   0.04895   0.04892   0.04885   0.04896   0.04841   0.04608   0.04262
            1200.0   0.05415   0.05396   0.05344   0.05300   0.05277   0.05178   0.05041
            2400.0   0.05630   0.05604   0.05532   0.05464   0.05454   0.05415   0.05360
              </tableData>
            </table>
          </function>
        </fcs_function>
        <!-- the yaw damper damps the sideslip's rate, the stability-axis yaw rate less
             the one that coordinates the bank and the side force: in the dutch roll the
             yaw rate itself, and zero in a steady coordinated turn, in a roll about the
             flight path and in a steady sideslip - it coordinates those as long as they
             last (a damper on the washed-out yaw rate stopped coordinating a sustained
             roll, and at low speed the roll turned the angle of attack into sideslip) -->
        <!-- on the wheels (the pitch's ground mode, fcs/fbw/ground) the pedals move the rudder
             directly over its travel, a ground law: the sideslip feedback, there the
             crosswind's, turned the nose into it, and as the C-17A's nose wheel unloaded
             towards its rotation it ran 8.6 m off its line across 10 m/s -->
        <fcs_function name="fcs/fbw/rudder">
          <function>
            <sum>
              <product>
                <difference><value>1</value><property>fcs/fbw/ground</property></difference>
                <sum>
                  <product><property>fcs/fbw/k-pedal</property><property>fcs/yaw-trim-sum</property></product>
                  <product><value>-1</value><property>fcs/fbw/k-yaw-beta</property>
                    <difference><property>aero/beta-rad</property>
                      <product><value>0.17453</value><property>fcs/yaw-trim-sum</property></product></difference></product>
                  <product><property>fcs/fbw/k-yaw-r</property><property>aero/betadot-rad_sec</property></product>
                </sum>
              </product>
              <product><property>fcs/fbw/ground</property><value>0.34907</value><property>fcs/yaw-trim-sum</property></product>
            </sum>
          </function>
          <clipto> <min>-0.34907</min> <max>0.34907</max> </clipto>
        </fcs_function>
        <actuator name="fcs/rudder-actuator">
          <input>fcs/fbw/rudder</input>
          <lag>40</lag>
          <rate_limit>1.4</rate_limit>
          <output>fcs/rudder-pos-rad</output>
        </actuator>
        <!-- the nose wheel steers with the pedals (JSBSim steers from fcs/steer-cmd-norm,
             positive right; the rudder command is positive left) -->
        <pure_gain name="fcs/steer-from-rudder">
          <input>fcs/yaw-trim-sum</input>
          <gain>-1</gain>
          <output>fcs/steer-cmd-norm</output>
        </pure_gain>
      </channel>
      <channel name="Flaps">
        <kinematic name="fcs/flaps-control">
          <input>fcs/flap-cmd-norm</input>
          <traverse>
            <setting> <position>0.0</position> <time>0.0</time> </setting>
            <setting> <position>6.2</position> <time>2.0</time> </setting>
            <setting> <position>12.5</position> <time>2.0</time> </setting>
            <setting> <position>18.8</position> <time>2.0</time> </setting>
            <setting> <position>25.0</position> <time>2.0</time> </setting>
          </traverse>
          <output>fcs/flap-pos-deg</output>
        </kinematic>
        <pure_gain name="fcs/flaps-normalized">
          <input>fcs/flap-pos-deg</input>
          <gain>0.04</gain>
          <output>fcs/flap-pos-norm</output>
        </pure_gain>
      </channel>
      <channel name="Leading-Edge Flaps">
        <fcs_function name="fcs/lef-schedule">
          <function>
            <sum>
              <product> <value>1.38</value> <property>aero/alpha-deg</property> </product>
              <product> <value>-9.05</value>
                <quotient> <property>aero/qbar-psf</property> <property>atmosphere/P-psf</property> </quotient>
              </product>
              <value>1.45</value>
            </sum>
          </function>
          <clipto> <min>-3</min> <max>25</max> </clipto>
        </fcs_function>
        <actuator name="fcs/lef-actuator">
          <input>fcs/lef-schedule</input>
          <lag>7.35</lag>
          <rate_limit>25</rate_limit>
          <output>fcs/lef-pos-deg</output>
        </actuator>
      </channel>
      <channel name="Throttle 0">
        <fcs_function name="fcs/throttle-lever-0">
          <function>
            <table>
              <independentVar lookup="row">fcs/throttle-cmd-norm[0]</independentVar>
              <tableData>
                0.0  0.0
                0.8  1.0
                1.0  2.0
              </tableData>
            </table>
          </function>
          <output>fcs/throttle-pos-norm[0]</output>
        </fcs_function>
      </channel>
      <channel name="Throttle 1">
        <fcs_function name="fcs/throttle-lever-1">
          <function>
            <table>
              <independentVar lookup="row">fcs/throttle-cmd-norm[1]</independentVar>
              <tableData>
                0.0  0.0
                0.8  1.0
                1.0  2.0
              </tableData>
            </table>
          </function>
          <output>fcs/throttle-pos-norm[1]</output>
        </fcs_function>
      </channel>
      <channel name="Landing Gear">
        <kinematic name="fcs/gear-control">
          <input>gear/gear-cmd-norm</input>
          <traverse>
            <setting> <position>0</position> <time>0</time> </setting>
            <setting> <position>1</position> <time>5</time> </setting>
          </traverse>
          <output>gear/gear-pos-norm</output>
        </kinematic>
      </channel>
    </flight_control>
    <aerodynamics>
        <function name="aero/function/mach-lift">
          <description>lift, and damping, over its low-speed value (hangar: aero/mach.py)</description>
          <table>
            <independentVar lookup="row">velocities/mach</independentVar>
            <tableData>
                 0.000     1.000000
                 0.300     1.014316
                 0.500     1.042769
                 0.600     1.065106
                 0.700     1.095277
                 0.800     1.136697
                 0.850     1.163311
                 0.900     1.195332
                 0.950     1.193496
                 1.000     1.179672
                 1.050     1.156899
                 1.100     1.128211
                 1.200     1.065246
                 1.400     0.909493
                 1.600     0.942283
                 1.800     0.812536
                 2.000     0.717806
                 2.300     0.614098
                 2.600     0.538438
            </tableData>
          </table>
        </function>
        <function name="aero/function/mach-side">
          <description>side force, rolling and yawing moment over their low-speed values</description>
          <table>
            <independentVar lookup="row">velocities/mach</independentVar>
            <tableData>
                 0.000     1.000000
                 0.300     1.004425
                 0.500     1.012601
                 0.600     1.018429
                 0.700     1.025432
                 0.800     1.033169
                 0.850     1.036578
                 0.900     1.037850
                 0.950     1.033612
                 1.000     1.027387
                 1.050     1.018522
                 1.100     1.006366
                 1.200     0.969573
                 1.400     0.829420
                 1.600     0.956463
                 1.800     0.827796
                 2.000     0.732831
                 2.300     0.628091
                 2.600     0.551267
            </tableData>
          </table>
        </function>
        <function name="aero/function/mach-dCm-dCL">
          <description>pitching moment per unit low-speed lift: the neutral point's move</description>
          <table>
            <independentVar lookup="row">velocities/mach</independentVar>
            <tableData>
                 0.000     0.000000
                 0.300    -0.002567
                 0.500    -0.007890
                 0.600    -0.012269
                 0.700    -0.018459
                 0.800    -0.027471
                 0.850    -0.033590
                 0.900    -0.041352
                 0.950    -0.056184
                 1.000    -0.074919
                 1.050    -0.094010
                 1.100    -0.110223
                 1.200    -0.123617
                 1.400    -0.111223
                 1.600    -0.165680
                 1.800    -0.150124
                 2.000    -0.138388
                 2.300    -0.125253
                 2.600    -0.115521
            </tableData>
          </table>
        </function>
        <function name="aero/function/mach-dCD0">
          <description>zero-lift drag's change: friction and wave drag</description>
          <table>
            <independentVar lookup="row">velocities/mach</independentVar>
            <tableData>
                 0.000     0.000000
                 0.300    -0.000094
                 0.500    -0.000257
                 0.600    -0.000366
                 0.700    -0.000491
                 0.800    -0.000631
                 0.850    -0.000705
                 0.900    -0.000572
                 0.950     0.000110
                 1.000     0.005708
                 1.050     0.016195
                 1.100     0.016107
                 1.200     0.015924
                 1.400     0.014985
                 1.600     0.014317
                 1.800     0.013697
                 2.000     0.013109
                 2.300     0.012277
                 2.600     0.011504
            </tableData>
          </table>
        </function>
        <function name="aero/function/mach-dK">
          <description>induced-drag factor's change (per CL^2)</description>
          <table>
            <independentVar lookup="row">velocities/mach</independentVar>
            <tableData>
                 0.000     0.000000
                 0.300     0.005436
                 0.500     0.015583
                 0.600     0.022986
                 0.700     0.032275
                 0.800     0.043843
                 0.850     0.050633
                 0.900     0.058208
                 0.950     0.057790
                 1.000     0.054581
                 1.050     0.052114
                 1.100     0.053804
                 1.200     0.070493
                 1.400     0.115967
                 1.600     0.122539
                 1.800     0.101656
                 2.000     0.071186
                 2.300     0.008903
                 2.600    -0.072268
            </tableData>
          </table>
        </function>
        <function name="aero/function/mach-aileron">
          <description>aileron power over its low-speed value</description>
          <table>
            <independentVar lookup="row">velocities/mach</independentVar>
            <tableData>
                 0.000     1.000000
                 0.300     1.019304
                 0.500     1.058915
                 0.600     1.091378
                 0.700     1.137676
                 0.800     1.207838
                 0.850     1.259114
                 0.900     1.331004
                 0.950     1.241591
                 1.000     1.078319
                 1.050     0.877640
                 1.100     0.676003
                 1.200     0.415660
                 1.400     0.354187
                 1.600     0.392456
                 1.800     0.338701
                 2.000     0.299297
                 2.300     0.256053
                 2.600     0.224460
            </tableData>
          </table>
        </function>
        <function name="aero/function/mach-elevator">
          <description>elevator power over its low-speed value</description>
          <table>
            <independentVar lookup="row">velocities/mach</independentVar>
            <tableData>
                 0.000     1.000000
                 0.300     1.023426
                 0.500     1.071657
                 0.600     1.111242
                 0.700     1.167561
                 0.800     1.251563
                 0.850     1.310878
                 0.900     1.388410
                 0.950     1.302643
                 1.000     1.143145
                 1.050     0.945451
                 1.100     0.745093
                 1.200     0.478524
                 1.400     0.407753
                 1.600     0.451810
                 1.800     0.389925
                 2.000     0.344561
                 2.300     0.294778
                 2.600     0.258407
            </tableData>
          </table>
        </function>
        <function name="aero/function/mach-flap">
          <description>flap power over its low-speed value</description>
          <table>
            <independentVar lookup="row">velocities/mach</independentVar>
            <tableData>
                 0.000     1.000000
                 0.300     1.023448
                 0.500     1.072039
                 0.600     1.112338
                 0.700     1.170570
                 0.800     1.260651
                 0.850     1.328102
                 0.900     1.425611
                 0.950     1.336963
                 1.000     1.164080
                 1.050     0.947713
                 1.100     0.728610
                 1.200     0.445205
                 1.400     0.379362
                 1.600     0.420351
                 1.800     0.362776
                 2.000     0.320570
                 2.300     0.274253
                 2.600     0.240415
            </tableData>
          </table>
        </function>
        <function name="aero/function/mach-rudder">
          <description>rudder power over its low-speed value</description>
          <table>
            <independentVar lookup="row">velocities/mach</independentVar>
            <tableData>
                 0.000     1.000000
                 0.300     1.008163
                 0.500     1.023494
                 0.600     1.034669
                 0.700     1.048473
                 0.800     1.064528
                 0.850     1.072372
                 0.900     1.077206
                 0.950     1.072880
                 1.000     1.066439
                 1.050     1.057224
                 1.100     1.044575
                 1.200     1.006341
                 1.400     0.860872
                 1.600     0.992733
                 1.800     0.859187
                 2.000     0.760621
                 2.300     0.651909
                 2.600     0.572172
            </tableData>
          </table>
        </function>
        <function name="aero/function/CL-base">
          <description>CL over alpha and beta at low speed</description>
          <table>
            <independentVar lookup="row">aero/alpha-deg</independentVar>
            <independentVar lookup="column">aero/beta-deg</independentVar>
            <tableData>
                        -90.00    -70.00    -50.00    -40.00    -30.00    -25.00    -20.00    -15.00    -10.00     -6.00     -3.00      0.00      3.00      6.00     10.00     15.00     20.00     25.00     30.00     40.00     50.00     70.00     90.00
             -180.00  -0.00000   0.00000   0.00000   0.00000   0.00000   0.00000   0.00000   0.00000   0.00000   0.00000   0.00000   0.00000   0.00000   0.00000   0.00000   0.00000   0.00000   0.00000   0.00000   0.00000   0.00000   0.00000  -0.00000
             -120.00   0.00000   0.10458   0.30632   0.41797   0.51974   0.56540   0.60191   0.63224   0.65463   0.66598   0.67129   0.67284   0.67129   0.66598   0.65463   0.63224   0.60191   0.56540   0.51974   0.41797   0.30632   0.10458   0.00000
              -70.00  -0.00000  -0.08284  -0.24622  -0.33707  -0.42030  -0.45667  -0.48746  -0.51233  -0.53064  -0.53998  -0.54411  -0.54544  -0.54411  -0.53998  -0.53064  -0.51233  -0.48746  -0.45667  -0.42030  -0.33707  -0.24622  -0.08284  -0.00000
              -46.00  -0.00000  -0.27091  -0.67135  -0.90039  -1.13351  -1.23721  -1.33044  -1.42069  -1.49838  -1.54634  -1.56796  -1.57330  -1.56796  -1.54634  -1.49838  -1.42069  -1.33044  -1.23721  -1.13351  -0.90039  -0.67135  -0.27091  -0.00000
              -32.00  -0.00000  -0.38272  -0.67881  -0.90588  -1.15399  -1.27243  -1.36979  -1.45005  -1.50794  -1.53981  -1.55628  -1.56029  -1.55628  -1.53981  -1.50794  -1.45005  -1.36979  -1.27243  -1.15399  -0.90588  -0.67881  -0.38272  -0.00000
              -22.00  -0.00000  -0.32256  -0.53586  -0.73542  -0.92188  -1.00090  -1.06168  -1.11667  -1.16188  -1.18244  -1.19118  -1.19406  -1.19118  -1.18244  -1.16188  -1.11667  -1.06168  -1.00090  -0.92188  -0.73542  -0.53586  -0.32256  -0.00000
              -17.00  -0.00000  -0.26348  -0.43245  -0.58431  -0.73099  -0.79540  -0.84386  -0.89163  -0.92061  -0.93515  -0.94096  -0.94275  -0.94096  -0.93515  -0.92061  -0.89163  -0.84386  -0.79540  -0.73099  -0.58431  -0.43245  -0.26348  -0.00000
              -13.00  -0.00000  -0.20752  -0.33468  -0.44673  -0.55934  -0.60936  -0.64772  -0.68501  -0.70682  -0.71766  -0.72200  -0.72313  -0.72200  -0.71766  -0.70682  -0.68501  -0.64772  -0.60936  -0.55934  -0.44673  -0.33468  -0.20752  -0.00000
               -9.00  -0.00000  -0.14927  -0.22793  -0.30595  -0.38694  -0.41585  -0.44277  -0.46844  -0.48306  -0.49048  -0.49354  -0.49449  -0.49354  -0.49048  -0.48306  -0.46844  -0.44277  -0.41585  -0.38694  -0.30595  -0.22793  -0.14927  -0.00000
               -5.00  -0.00000  -0.08815  -0.12460  -0.16854  -0.21488  -0.22746  -0.24621  -0.25591  -0.26288  -0.26641  -0.26786  -0.26833  -0.26786  -0.26641  -0.26288  -0.25591  -0.24621  -0.22746  -0.21488  -0.16854  -0.12460  -0.08815  -0.00000
               -1.00  -0.00000  -0.02041  -0.02478  -0.03864  -0.05195  -0.04924  -0.05459  -0.05423  -0.05391  -0.05368  -0.05355  -0.05346  -0.05355  -0.05368  -0.05391  -0.05423  -0.05459  -0.04924  -0.05195  -0.03864  -0.02478  -0.02041  -0.00000
                3.00   0.00000   0.05232   0.07455   0.09220   0.11287   0.12586   0.13922   0.14987   0.15763   0.16162   0.16329   0.16383   0.16329   0.16162   0.15763   0.14987   0.13922   0.12586   0.11287   0.09220   0.07455   0.05232   0.00000
                7.00   0.00000   0.12612   0.17908   0.22853   0.28507   0.31235   0.33844   0.35934   0.37457   0.38244   0.38578   0.38689   0.38578   0.38244   0.37457   0.35934   0.33844   0.31235   0.28507   0.22853   0.17908   0.12612   0.00000
               11.00   0.00000   0.19570   0.28440   0.36701   0.45991   0.50681   0.54215   0.57415   0.59771   0.61002   0.61529   0.61709   0.61529   0.61002   0.59771   0.57415   0.54215   0.50681   0.45991   0.36701   0.28440   0.19570   0.00000
               15.00   0.00000   0.26103   0.38917   0.50486   0.63349   0.69618   0.74787   0.79138   0.82337   0.83962   0.84669   0.84899   0.84669   0.83962   0.82337   0.79138   0.74787   0.69618   0.63349   0.50486   0.38917   0.26103   0.00000
               19.00   0.00000   0.31721   0.48639   0.63522   0.79695   0.87599   0.94379   0.99807   1.03676   1.05587   1.06381   1.06738   1.06381   1.05587   1.03676   0.99807   0.94379   0.87599   0.79695   0.63522   0.48639   0.31721   0.00000
               23.00   0.00000   0.36032   0.57219   0.75757   0.95490   1.04250   1.12607   1.18580   1.22800   1.24894   1.25783   1.26038   1.25783   1.24894   1.22800   1.18580   1.12607   1.04250   0.95490   0.75757   0.57219   0.36032   0.00000
               27.00   0.00000   0.39047   0.63774   0.85637   1.08939   1.18552   1.27952   1.34089   1.38570   1.40883   1.41887   1.42211   1.41887   1.40883   1.38570   1.34089   1.27952   1.18552   1.08939   0.85637   0.63774   0.39047   0.00000
               32.00   0.00000   0.41658   0.69424   0.93423   1.19833   1.31187   1.41002   1.47922   1.52726   1.55378   1.56428   1.56789   1.56428   1.55378   1.52726   1.47922   1.41002   1.31187   1.19833   0.93423   0.69424   0.41658   0.00000
               46.00   0.00000   0.24626   0.70551   0.94494   1.17814   1.27646   1.36584   1.44865   1.52093   1.56989   1.59501   1.60316   1.59501   1.56989   1.52093   1.44865   1.36584   1.27646   1.17814   0.94494   0.70551   0.24626   0.00000
               70.00   0.00000   0.08299   0.24653   0.33750   0.42086   0.45730   0.48814   0.51304   0.53135   0.54074   0.54491   0.54622   0.54491   0.54074   0.53135   0.51304   0.48814   0.45730   0.42086   0.33750   0.24653   0.08299   0.00000
              120.00  -0.00000  -0.10458  -0.30632  -0.41797  -0.51974  -0.56540  -0.60191  -0.63224  -0.65463  -0.66598  -0.67129  -0.67284  -0.67129  -0.66598  -0.65463  -0.63224  -0.60191  -0.56540  -0.51974  -0.41797  -0.30632  -0.10458  -0.00000
              180.00   0.00000   0.00000   0.00000   0.00000   0.00000   0.00000   0.00000   0.00000   0.00000   0.00000   0.00000   0.00000   0.00000   0.00000   0.00000   0.00000   0.00000   0.00000   0.00000   0.00000   0.00000   0.00000   0.00000
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            </tableData>
          </table>
        </function>
      <axis name="DRAG">
        <function name="aero/coefficient/CD_base">
          <description>CD over alpha and beta (hangar)</description>
          <product>
            <property>aero/qbar-psf</property>
            <property>metrics/Sw-sqft</property>
          <table>
            <independentVar lookup="row">aero/alpha-deg</independentVar>
            <independentVar lookup="column">aero/beta-deg</independentVar>
            <tableData>
                        -90.00    -70.00    -50.00    -40.00    -30.00    -25.00    -20.00    -15.00    -10.00     -6.00     -3.00      0.00      3.00      6.00     10.00     15.00     20.00     25.00     30.00     40.00     50.00     70.00     90.00
             -180.00   0.28359   0.20781   0.10701   0.06606   0.03813   0.02902   0.02283   0.01859   0.01495   0.01601   0.01674   0.01700   0.01674   0.01601   0.01495   0.01859   0.02283   0.02902   0.03813   0.06606   0.10701   0.20781   0.28359
             -120.00   0.28359   0.29292   0.47934   0.64758   0.83563   0.92593   1.00754   1.07607   1.12781   1.15530   1.16702   1.17090   1.16702   1.15530   1.12781   1.07607   1.00754   0.92593   0.83563   0.64758   0.47934   0.29292   0.28359
              -70.00   0.28359   0.33983   0.60703   0.82584   1.06426   1.17740   1.27906   1.36414   1.42826   1.46221   1.47674   1.48160   1.47674   1.46221   1.42826   1.36414   1.27906   1.17740   1.06426   0.82584   0.60703   0.33983   0.28359
              -46.00   0.28359   0.35971   0.61844   0.81494   1.04748   1.15945   1.26265   1.36717   1.46209   1.51889   1.54403   1.55060   1.54403   1.51889   1.46209   1.36717   1.26265   1.15945   1.04748   0.81494   0.61844   0.35971   0.28359
              -32.00   0.28359   0.36044   0.45145   0.53615   0.66181   0.72936   0.78496   0.83243   0.86820   0.88811   0.89814   0.90069   0.89814   0.88811   0.86820   0.83243   0.78496   0.72936   0.66181   0.53615   0.45145   0.36044   0.28359
              -22.00   0.28359   0.33050   0.31916   0.33617   0.37323   0.38524   0.39439   0.40451   0.41484   0.41893   0.42070   0.42127   0.42070   0.41893   0.41484   0.40451   0.39439   0.38524   0.37323   0.33617   0.31916   0.33050   0.28359
              -17.00   0.28359   0.31510   0.26739   0.25049   0.25156   0.24856   0.24506   0.24599   0.24418   0.24312   0.24245   0.24218   0.24245   0.24312   0.24418   0.24599   0.24506   0.24856   0.25156   0.25049   0.26739   0.31510   0.28359
              -13.00   0.28359   0.30524   0.23489   0.19808   0.17823   0.16622   0.15539   0.14952   0.14298   0.13966   0.13819   0.13759   0.13819   0.13966   0.14298   0.14952   0.15539   0.16622   0.17823   0.19808   0.23489   0.30524   0.28359
               -9.00   0.28359   0.29794   0.21083   0.16178   0.12513   0.10936   0.09343   0.08254   0.07301   0.06830   0.06638   0.06573   0.06638   0.06830   0.07301   0.08254   0.09343   0.10936   0.12513   0.16178   0.21083   0.29794   0.28359
               -5.00   0.28359   0.29253   0.19564   0.14054   0.09708   0.07878   0.06240   0.04678   0.03577   0.03033   0.02813   0.02742   0.02813   0.03033   0.03577   0.04678   0.06240   0.07878   0.09708   0.14054   0.19564   0.29253   0.28359
               -1.00   0.28359   0.28976   0.19128   0.13334   0.08703   0.06806   0.05027   0.03405   0.02266   0.01707   0.01482   0.01410   0.01482   0.01707   0.02266   0.03405   0.05027   0.06806   0.08703   0.13334   0.19128   0.28976   0.28359
                3.00   0.28359   0.29066   0.19459   0.13617   0.08963   0.07339   0.05345   0.03769   0.02668   0.02129   0.01912   0.01843   0.01912   0.02129   0.02668   0.03769   0.05345   0.07339   0.08963   0.13617   0.19459   0.29066   0.28359
                7.00   0.28359   0.29539   0.20281   0.14789   0.10575   0.09139   0.07355   0.05941   0.04956   0.04473   0.04279   0.04216   0.04279   0.04473   0.04956   0.05941   0.07355   0.09139   0.10575   0.14789   0.20281   0.29539   0.28359
               11.00   0.28359   0.30279   0.21908   0.17211   0.13999   0.12833   0.11704   0.10698   0.10016   0.09693   0.09569   0.09530   0.09569   0.09693   0.10016   0.10698   0.11704   0.12833   0.13999   0.17211   0.21908   0.30279   0.28359
               15.00   0.28359   0.31241   0.24562   0.21259   0.19688   0.19387   0.19064   0.18739   0.18567   0.18497   0.18480   0.18476   0.18480   0.18497   0.18567   0.18739   0.19064   0.19387   0.19688   0.21259   0.24562   0.31241   0.28359
               19.00   0.28359   0.32496   0.28248   0.26901   0.27635   0.28563   0.29403   0.29998   0.30460   0.30687   0.30776   0.30835   0.30776   0.30687   0.30460   0.29998   0.29403   0.28563   0.27635   0.26901   0.28248   0.32496   0.28359
               23.00   0.28359   0.33909   0.32863   0.34203   0.38071   0.40103   0.42669   0.44286   0.45484   0.46096   0.46355   0.46430   0.46355   0.46096   0.45484   0.44286   0.42669   0.40103   0.38071   0.34203   0.32863   0.33909   0.28359
               27.00   0.28359   0.35352   0.38056   0.42669   0.50318   0.54293   0.58284   0.60937   0.62964   0.64049   0.64531   0.64693   0.64531   0.64049   0.62964   0.60937   0.58284   0.54293   0.50318   0.42669   0.38056   0.35352   0.28359
               32.00   0.28359   0.37207   0.45056   0.53883   0.66843   0.73376   0.79290   0.83786   0.86959   0.88740   0.89484   0.89739   0.89484   0.88740   0.86959   0.83786   0.79290   0.73376   0.66843   0.53883   0.45056   0.37207   0.28359
               46.00   0.28359   0.35365   0.63517   0.84226   1.07724   1.18807   1.29071   1.38524   1.47104   1.52796   1.55838   1.56879   1.55838   1.52796   1.47104   1.38524   1.29071   1.18807   1.07724   0.84226   0.63517   0.35365   0.28359
               70.00   0.28359   0.33986   0.60702   0.82584   1.06427   1.17741   1.27907   1.36414   1.42826   1.46221   1.47674   1.48160   1.47674   1.46221   1.42826   1.36414   1.27907   1.17741   1.06427   0.82584   0.60702   0.33986   0.28359
              120.00   0.28359   0.29292   0.47934   0.64758   0.83563   0.92593   1.00754   1.07607   1.12781   1.15530   1.16702   1.17090   1.16702   1.15530   1.12781   1.07607   1.00754   0.92593   0.83563   0.64758   0.47934   0.29292   0.28359
              180.00   0.28359   0.20781   0.10701   0.06606   0.03813   0.02902   0.02283   0.01859   0.01495   0.01601   0.01674   0.01700   0.01674   0.01601   0.01495   0.01859   0.02283   0.02902   0.03813   0.06606   0.10701   0.20781   0.28359
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            </tableData>
          </table>
          </product>
        </function>
        <function name="aero/coefficient/CD_mach">
          <description>zero-lift drag's change with Mach: friction, wave drag</description>
          <product>
            <property>aero/qbar-psf</property>
            <property>metrics/Sw-sqft</property>
            <property>aero/function/mach-dCD0</property>
          </product>
        </function>
        <function name="aero/coefficient/CD_induced_mach">
          <description>induced drag's change with Mach (leading-edge suction lost)</description>
          <product>
            <property>aero/qbar-psf</property>
            <property>metrics/Sw-sqft</property>
            <property>aero/cl-squared</property>
            <property>aero/function/mach-dK</property>
          </product>
        </function>
        <function name="aero/coefficient/CD_aileron">
          <description>CD increment from aileron (deg), over alpha</description>
          <product>
            <property>aero/qbar-psf</property>
            <property>metrics/Sw-sqft</property>
            <property>aero/function/mach-aileron</property>
          <table>
            <independentVar lookup="row">aero/alpha-deg</independentVar>
            <independentVar lookup="column">fcs/left-aileron-pos-deg</independentVar>
            <tableData>
                        -25.00    -20.00    -15.00    -10.00     -5.00      0.00      5.00     10.00     15.00     20.00     25.00
             -180.00   0.01119   0.00733   0.00420   0.00189   0.00048   0.00000   0.00048   0.00189   0.00420   0.00733   0.01119
             -120.00   0.01115   0.00730   0.00418   0.00188   0.00047   0.00000   0.00047   0.00188   0.00418   0.00730   0.01115
              -70.00   0.01115   0.00730   0.00418   0.00188   0.00047   0.00000   0.00047   0.00188   0.00418   0.00730   0.01115
              -46.00   0.00514   0.00301   0.00144   0.00052   0.00011   0.00000   0.00011   0.00052   0.00144   0.00301   0.00514
              -32.00   0.00851   0.00528   0.00270   0.00098   0.00018   0.00000   0.00018   0.00098   0.00270   0.00528   0.00851
              -22.00   0.01910   0.01411   0.00927   0.00469   0.00125   0.00000   0.00125   0.00469   0.00927   0.01411   0.01910
              -17.00   0.02417   0.01835   0.01247   0.00656   0.00181   0.00000   0.00181   0.00656   0.01247   0.01835   0.02417
              -13.00   0.02610   0.01977   0.01341   0.00704   0.00195   0.00000   0.00195   0.00704   0.01341   0.01977   0.02610
               -9.00   0.02831   0.02122   0.01427   0.00748   0.00207   0.00000   0.00207   0.00748   0.01427   0.02122   0.02831
               -5.00   0.03034   0.02282   0.01532   0.00794   0.00218   0.00000   0.00218   0.00794   0.01532   0.02282   0.03034
               -1.00   0.03038   0.02289   0.01541   0.00805   0.00222   0.00000   0.00222   0.00805   0.01541   0.02289   0.03038
                3.00   0.03061   0.02304   0.01548   0.00806   0.00221   0.00000   0.00221   0.00806   0.01548   0.02304   0.03061
                7.00   0.03007   0.02252   0.01527   0.00820   0.00234   0.00000   0.00234   0.00820   0.01527   0.02252   0.03007
               11.00   0.03151   0.02483   0.01769   0.00985   0.00287   0.00000   0.00287   0.00985   0.01769   0.02483   0.03151
               15.00   0.03148   0.02508   0.01818   0.01037   0.00310   0.00000   0.00310   0.01037   0.01818   0.02508   0.03148
               19.00   0.02682   0.02103   0.01497   0.00841   0.00243   0.00000   0.00243   0.00841   0.01497   0.02103   0.02682
               23.00   0.01976   0.01482   0.00996   0.00524   0.00154   0.00000   0.00154   0.00524   0.00996   0.01482   0.01976
               27.00   0.01197   0.00809   0.00466   0.00190   0.00033   0.00000   0.00033   0.00190   0.00466   0.00809   0.01197
               32.00   0.00413   0.00150  -0.00046  -0.00125  -0.00062   0.00000  -0.00062  -0.00125  -0.00046   0.00150   0.00413
               46.00  -0.00212  -0.00276  -0.00241  -0.00093   0.00091   0.00000   0.00091  -0.00093  -0.00241  -0.00276  -0.00212
               70.00   0.01115   0.00730   0.00418   0.00188   0.00047   0.00000   0.00047   0.00188   0.00418   0.00730   0.01115
              120.00   0.01115   0.00730   0.00418   0.00188   0.00047   0.00000   0.00047   0.00188   0.00418   0.00730   0.01115
              180.00   0.01119   0.00733   0.00420   0.00189   0.00048   0.00000   0.00048   0.00189   0.00420   0.00733   0.01119
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            </tableData>
          </table>
          </product>
        </function>
        <function name="aero/coefficient/CD_elevator">
          <description>CD increment from elevator (deg), over alpha</description>
          <product>
            <property>aero/qbar-psf</property>
            <property>metrics/Sw-sqft</property>
            <property>aero/function/mach-elevator</property>
          <table>
            <independentVar lookup="row">aero/alpha-deg</independentVar>
            <independentVar lookup="column">fcs/elevator-pos-deg</independentVar>
            <tableData>
                        -25.00    -20.00    -15.00    -10.00     -5.00      0.00      5.00     10.00     15.00     20.00     25.00     30.00     35.00     40.00     45.00     50.00
             -180.00   0.01844   0.01683   0.00952   0.00236   0.00044   0.00000   0.00044   0.00236   0.00952   0.01683   0.02585   0.03443   0.04392   0.05403   0.06447   0.07490
             -120.00   0.03060   0.02899   0.02329   0.01642   0.00857   0.00000  -0.00904  -0.01827  -0.02742  -0.03620  -0.04435  -0.05348  -0.06170  -0.06877  -0.07448  -0.08037
              -70.00   0.01557   0.01397  -0.02275  -0.01471  -0.00699   0.00000   0.00605   0.01098   0.01464   0.01692   0.01774   0.01522   0.01105   0.00536  -0.00170  -0.00990
              -46.00  -0.02010  -0.02565  -0.01367  -0.00526  -0.00098   0.00000  -0.00108  -0.00328  -0.00549  -0.00761  -0.00986  -0.00927  -0.00923  -0.00922  -0.00887  -0.00786
              -32.00  -0.02342  -0.02948  -0.02058  -0.01234  -0.00567   0.00000   0.00562   0.01237   0.02137   0.03227   0.04378   0.05848   0.07167   0.08320   0.09345   0.10294
              -22.00  -0.00904  -0.01477  -0.01354  -0.01059  -0.00617   0.00000   0.00832   0.01936   0.03383   0.05137   0.07080   0.09398   0.11908   0.14883   0.17217   0.18805
              -17.00   0.00524  -0.00044  -0.00531  -0.00676  -0.00532   0.00000   0.00889   0.02147   0.03838   0.05915   0.08233   0.10404   0.12477   0.14747   0.17070   0.19414
              -13.00   0.01855   0.01286   0.00416  -0.00203  -0.00350   0.00000   0.00857   0.02163   0.03875   0.05895   0.08197   0.10824   0.13602   0.16496   0.19474   0.22522
               -9.00   0.02955   0.02459   0.01477   0.00629   0.00032   0.00000   0.00600   0.01745   0.03391   0.05511   0.08064   0.10907   0.14016   0.17342   0.20845   0.24512
               -5.00   0.03201   0.02817   0.01749   0.00944   0.00322   0.00000   0.00173   0.01001   0.02445   0.04423   0.06871   0.09526   0.12547   0.15909   0.19588   0.23515
               -1.00   0.03423   0.03127   0.01677   0.00743   0.00208   0.00000   0.00143   0.00718   0.01863   0.03549   0.05732   0.08099   0.10902   0.14122   0.17737   0.21596
                3.00   0.04229   0.04000   0.02141   0.00817   0.00122   0.00000   0.00270   0.00843   0.01688   0.02956   0.04736   0.06671   0.09098   0.12002   0.15323   0.18901
                7.00   0.05319   0.05175   0.03091   0.01490   0.00415   0.00000   0.00260   0.00920   0.01756   0.02750   0.04110   0.05545   0.07516   0.10005   0.12939   0.16158
               11.00   0.06377   0.06400   0.04212   0.02386   0.00941   0.00000  -0.00243   0.00211   0.01025   0.01964   0.03070   0.04008   0.05438   0.07397   0.09812   0.12568
               15.00   0.06656   0.06778   0.04586   0.02708   0.01185   0.00000  -0.00685  -0.00773  -0.00406   0.00306   0.01235   0.01836   0.02790   0.04180   0.06017   0.08236
               19.00   0.05878   0.06102   0.04155   0.02501   0.01139   0.00000  -0.00877  -0.01355  -0.01468  -0.01335  -0.00770  -0.00433   0.00194   0.01158   0.02480   0.04133
               23.00   0.04717   0.05039   0.03465   0.02110   0.00986   0.00000  -0.00885  -0.01602  -0.02104  -0.02387  -0.02514  -0.02732  -0.02462  -0.01773  -0.00759   0.00516
               27.00   0.03998   0.04382   0.03032   0.01868   0.00895   0.00000  -0.00898  -0.01796  -0.02637  -0.03344  -0.03825  -0.04567  -0.04983  -0.04795  -0.04141  -0.03137
               32.00   0.03133   0.03565   0.02509   0.01587   0.00795   0.00000  -0.00902  -0.01951  -0.03118  -0.04286  -0.05313  -0.06551  -0.07470  -0.08091  -0.08232  -0.07829
               46.00  -0.02200  -0.01803  -0.01299  -0.00744  -0.00240   0.00000  -0.00261  -0.01073  -0.02345  -0.04002  -0.05971  -0.08551  -0.11041  -0.13196  -0.14976  -0.16387
               70.00   0.01852   0.01692   0.01464   0.01098   0.00605   0.00000  -0.00699  -0.01471  -0.02275   0.01384   0.07307   0.08030   0.04896   0.01602  -0.01626  -0.04571
              120.00  -0.03459  -0.03620  -0.02742  -0.01827  -0.00904   0.00000   0.00857   0.01642   0.02329   0.02899   0.03335   0.03436   0.03361   0.03111   0.02694   0.02124
              180.00   0.01844   0.01683   0.00952   0.00236   0.00044   0.00000   0.00044   0.00236   0.00952   0.01683   0.02585   0.03443   0.04392   0.05403   0.06447   0.07490
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            </tableData>
          </table>
          </product>
        </function>
        <function name="aero/coefficient/CD_flap">
          <description>CD increment from flap (deg), over alpha</description>
          <product>
            <property>aero/qbar-psf</property>
            <property>metrics/Sw-sqft</property>
            <property>aero/function/mach-flap</property>
          <table>
            <independentVar lookup="row">aero/alpha-deg</independentVar>
            <independentVar lookup="column">fcs/flap-pos-deg</independentVar>
            <tableData>
                        -25.00    -20.00    -15.00    -10.00     -5.00      0.00      5.00     10.00     15.00     20.00     25.00
             -180.00   0.00653   0.00427   0.00245   0.00110   0.00028   0.00000   0.00028   0.00110   0.00245   0.00427   0.00653
             -120.00   0.00650   0.00426   0.00244   0.00110   0.00028   0.00000   0.00028   0.00110   0.00244   0.00426   0.00650
              -70.00   0.00650   0.00426   0.00244   0.00110   0.00028   0.00000   0.00028   0.00110   0.00244   0.00426   0.00650
              -46.00   0.05915   0.05242   0.04393   0.03228   0.01711   0.00000  -0.01708  -0.03200  -0.04285  -0.04976  -0.05420
              -32.00   0.06538   0.05681   0.04647   0.03327   0.01730   0.00000  -0.01710  -0.03204  -0.04285  -0.04965  -0.05390
              -22.00   0.07018   0.06022   0.04801   0.03262   0.01561   0.00000  -0.01328  -0.02394  -0.03132  -0.03568  -0.03812
              -17.00   0.06647   0.05726   0.04596   0.03142   0.01495   0.00000  -0.01169  -0.02008  -0.02530  -0.02802  -0.02916
              -13.00   0.05791   0.04985   0.04012   0.02766   0.01330   0.00000  -0.01031  -0.01725  -0.02108  -0.02259  -0.02269
               -9.00   0.04522   0.03837   0.03043   0.02069   0.00982   0.00000  -0.00728  -0.01163  -0.01330  -0.01302  -0.01153
               -5.00   0.03104   0.02543   0.01935   0.01250   0.00555   0.00000  -0.00324  -0.00405  -0.00297  -0.00078   0.00206
               -1.00   0.01927   0.01479   0.01031   0.00582   0.00202   0.00000   0.00026   0.00252   0.00590   0.00965   0.01364
                3.00   0.00780   0.00441   0.00145  -0.00077  -0.00150   0.00000   0.00379   0.00915   0.01484   0.02018   0.02532
                7.00  -0.00442  -0.00659  -0.00780  -0.00756  -0.00515   0.00000   0.00761   0.01644   0.02471   0.03176   0.03807
               11.00  -0.01192  -0.01277  -0.01295  -0.01185  -0.00801   0.00000   0.01154   0.02421   0.03533   0.04419   0.05169
               15.00  -0.01571  -0.01554  -0.01451  -0.01243  -0.00848   0.00000   0.01372   0.02940   0.04302   0.05354   0.06215
               19.00  -0.02180  -0.02048  -0.01791  -0.01374  -0.00824   0.00000   0.01357   0.03058   0.04596   0.05784   0.06744
               23.00  -0.02900  -0.02669  -0.02278  -0.01668  -0.00895   0.00000   0.01264   0.02917   0.04495   0.05740   0.06747
               27.00  -0.03605  -0.03292  -0.02788  -0.02015  -0.01031   0.00000   0.01162   0.02608   0.04068   0.05272   0.06265
               32.00  -0.04277  -0.03897  -0.03300  -0.02388  -0.01215   0.00000   0.01156   0.02351   0.03533   0.04548   0.05420
               46.00  -0.04558  -0.04152  -0.03529  -0.02579  -0.01333   0.00000   0.01560   0.02537   0.03270   0.03825   0.04296
               70.00   0.00650   0.00426   0.00244   0.00110   0.00028   0.00000   0.00028   0.00110   0.00244   0.00426   0.00650
              120.00   0.00650   0.00426   0.00244   0.00110   0.00028   0.00000   0.00028   0.00110   0.00244   0.00426   0.00650
              180.00   0.00653   0.00427   0.00245   0.00110   0.00028   0.00000   0.00028   0.00110   0.00245   0.00427   0.00653
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            </tableData>
          </table>
          </product>
        </function>
        <function name="aero/coefficient/CD_rudder">
          <description>CD increment from rudder (deg), over alpha</description>
          <product>
            <property>aero/qbar-psf</property>
            <property>metrics/Sw-sqft</property>
            <property>aero/function/mach-rudder</property>
          <table>
            <independentVar lookup="row">aero/alpha-deg</independentVar>
            <independentVar lookup="column">fcs/rudder-pos-deg</independentVar>
            <tableData>
                        -20.00    -15.00    -10.00     -5.00      0.00      5.00     10.00     15.00     20.00
             -180.00   0.01230   0.00693   0.00141   0.00022   0.00000   0.00022   0.00141   0.00693   0.01230
             -120.00   0.00041   0.00023   0.00011   0.00003   0.00000   0.00003   0.00011   0.00023   0.00041
              -70.00  -0.00090  -0.00051  -0.00023  -0.00006   0.00000  -0.00006  -0.00023  -0.00051  -0.00090
              -46.00   0.00298   0.00251   0.00082   0.00020   0.00000   0.00020   0.00082   0.00251   0.00298
              -32.00   0.00189  -0.00009  -0.00120   0.00032   0.00000   0.00032  -0.00120  -0.00009   0.00189
              -22.00   0.00586   0.00273   0.00265   0.00068   0.00000   0.00068   0.00265   0.00273   0.00586
              -17.00   0.00773   0.00420   0.00304   0.00076   0.00000   0.00076   0.00304   0.00420   0.00773
              -13.00   0.00903   0.00712   0.00322   0.00080   0.00000   0.00080   0.00322   0.00712   0.00903
               -9.00   0.01016   0.00750   0.00334   0.00084   0.00000   0.00084   0.00334   0.00750   0.01016
               -5.00   0.01330   0.00769   0.00342   0.00085   0.00000   0.00085   0.00342   0.00769   0.01330
               -1.00   0.01375   0.00776   0.00344   0.00086   0.00000   0.00086   0.00344   0.00776   0.01375
                3.00   0.01365   0.00769   0.00341   0.00085   0.00000   0.00085   0.00341   0.00769   0.01365
                7.00   0.01331   0.00750   0.00333   0.00083   0.00000   0.00083   0.00333   0.00750   0.01331
               11.00   0.01189   0.00717   0.00318   0.00080   0.00000   0.00080   0.00318   0.00717   0.01189
               15.00   0.01195   0.00671   0.00295   0.00072   0.00000   0.00072   0.00295   0.00671   0.01195
               19.00   0.01077   0.00588   0.00239   0.00033   0.00000   0.00033   0.00239   0.00588   0.01077
               23.00   0.00988   0.00547   0.00230   0.00047   0.00000   0.00047   0.00230   0.00547   0.00988
               27.00   0.00863   0.00497   0.00217   0.00066   0.00000   0.00066   0.00217   0.00497   0.00863
               32.00   0.00436   0.00421   0.00194   0.00060   0.00000   0.00060   0.00194   0.00421   0.00436
               46.00   0.00263   0.00242   0.00082   0.00112   0.00000   0.00112   0.00082   0.00242   0.00263
               70.00  -0.00090  -0.00051  -0.00023  -0.00006   0.00000  -0.00006  -0.00023  -0.00051  -0.00090
              120.00   0.00041   0.00023   0.00011   0.00003   0.00000   0.00003   0.00011   0.00023   0.00041
              180.00   0.01230   0.00693   0.00141   0.00022   0.00000   0.00022   0.00141   0.00693   0.01230
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            </tableData>
          </table>
          </product>
        </function>
        <function name="aero/coefficient/CD_ground">
          <description>Induced drag change in ground effect</description>
          <product>
            <property>aero/qbar-psf</property>
            <property>metrics/Sw-sqft</property>
            <property>aero/cl-squared</property>
            <value>0.16059</value>
          <table>
            <independentVar lookup="row">aero/h_b-mac-ft</independentVar>
            <tableData>
                    0.00   -1.00000
                    0.10   -0.28090
                    0.20   -0.08897
                    0.40   -0.02383
                    0.60   -0.01073
                    0.80   -0.00607
                    1.00   -0.00389
                    1.10   -0.00322
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            </tableData>
          </table>
          </product>
        </function>
        <function name="aero/coefficient/CD_gear">
          <description>the gear extended: its wheels' and struts' drag by Raymer's components, 0.41 m2 (hangar)</description>
          <product>
            <property>aero/qbar-psf</property>
            <property>metrics/Sw-sqft</property>
            <value>0.00564186</value>
            <property>gear/gear-pos-norm</property>
          </product>
        </function>
      </axis>
      <axis name="SIDE">
        <function name="aero/coefficient/CY_base">
          <description>CY over alpha and beta (hangar)</description>
          <product>
            <property>aero/qbar-psf</property>
            <property>metrics/Sw-sqft</property>
            <property>aero/function/mach-side</property>
          <table>
            <independentVar lookup="row">aero/alpha-deg</independentVar>
            <independentVar lookup="column">aero/beta-deg</independentVar>
            <tableData>
                        -90.00    -70.00    -50.00    -40.00    -30.00    -25.00    -20.00    -15.00    -10.00     -6.00     -3.00      0.00      3.00      6.00     10.00     15.00     20.00     25.00     30.00     40.00     50.00     70.00     90.00
             -180.00   0.00000   0.08136   0.09377   0.07892   0.05473   0.04164   0.02937   0.02141   0.04670   0.04697   0.02432  -0.00000  -0.02432  -0.04697  -0.04670  -0.02141  -0.02937  -0.04164  -0.05473  -0.07892  -0.09377  -0.08136  -0.00000
              -35.00   0.00000  -0.14127  -0.18560  -0.22906  -0.23696  -0.23177  -0.20715  -0.17403  -0.12540  -0.07892  -0.03768  -0.00000   0.03768   0.07892   0.12540   0.17403   0.20715   0.23177   0.23696   0.22906   0.18560   0.14127  -0.00000
              -11.00   0.00000   0.07873   0.12925   0.12291   0.11183   0.10471   0.08602   0.07231   0.04757   0.02817   0.01406  -0.00000  -0.01406  -0.02817  -0.04757  -0.07231  -0.08602  -0.10471  -0.11183  -0.12291  -0.12925  -0.07873  -0.00000
                4.00   0.00000   0.10838   0.15848   0.15322   0.13815   0.13888   0.11338   0.08503   0.05573   0.03263   0.01597  -0.00000  -0.01597  -0.03263  -0.05573  -0.08503  -0.11338  -0.13888  -0.13815  -0.15322  -0.15848  -0.10838  -0.00000
               19.00   0.00000   0.01310   0.05433   0.03738   0.02316   0.02181   0.01977   0.01073   0.00451   0.00180   0.00075  -0.00000  -0.00075  -0.00180  -0.00451  -0.01073  -0.01977  -0.02181  -0.02316  -0.03738  -0.05433  -0.01310  -0.00000
               42.00   0.00000  -0.16129  -0.31524  -0.37292  -0.37788  -0.34485  -0.30587  -0.25522  -0.18658  -0.11970  -0.05575  -0.00000   0.05575   0.11970   0.18658   0.25522   0.30587   0.34485   0.37788   0.37292   0.31524   0.16129  -0.00000
              180.00   0.00000   0.08136   0.09377   0.07892   0.05473   0.04164   0.02937   0.02141   0.04670   0.04697   0.02432  -0.00000  -0.02432  -0.04697  -0.04670  -0.02141  -0.02937  -0.04164  -0.05473  -0.07892  -0.09377  -0.08136  -0.00000
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            </tableData>
          </table>
          </product>
        </function>
        <function name="aero/coefficient/CY_aileron">
          <description>CY increment from aileron (deg), over alpha</description>
          <product>
            <property>aero/qbar-psf</property>
            <property>metrics/Sw-sqft</property>
            <property>aero/function/mach-aileron</property>
          <table>
            <independentVar lookup="row">aero/alpha-deg</independentVar>
            <independentVar lookup="column">fcs/left-aileron-pos-deg</independentVar>
            <tableData>
                        -25.00    -20.00    -15.00    -10.00     -5.00      0.00      5.00     10.00     15.00     20.00     25.00
             -180.00  -0.00000  -0.00000  -0.00000  -0.00000  -0.00000   0.00000  -0.00000  -0.00000  -0.00000  -0.00000  -0.00000
              -35.00   0.00401   0.00263   0.00978   0.00735   0.00403   0.00000  -0.00403  -0.00735  -0.00978  -0.00263  -0.00401
              -11.00   0.02307   0.02030   0.01686   0.01229   0.00648   0.00000  -0.00648  -0.01229  -0.01686  -0.02030  -0.02307
                4.00   0.02320   0.02046   0.01703   0.01241   0.00654   0.00000  -0.00654  -0.01241  -0.01703  -0.02046  -0.02320
               19.00   0.02259   0.01983   0.01646   0.01204   0.00645   0.00000  -0.00645  -0.01204  -0.01646  -0.01983  -0.02259
               42.00   0.00783   0.00755   0.00660   0.00499   0.00272   0.00000  -0.00272  -0.00499  -0.00660  -0.00755  -0.00783
              180.00  -0.00000  -0.00000  -0.00000  -0.00000   0.00000   0.00000   0.00000  -0.00000  -0.00000  -0.00000  -0.00000
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            </tableData>
          </table>
          </product>
        </function>
        <function name="aero/coefficient/CY_rudder">
          <description>CY increment from rudder (deg), over alpha</description>
          <product>
            <property>aero/qbar-psf</property>
            <property>metrics/Sw-sqft</property>
            <property>aero/function/mach-rudder</property>
          <table>
            <independentVar lookup="row">aero/alpha-deg</independentVar>
            <independentVar lookup="column">fcs/rudder-pos-deg</independentVar>
            <tableData>
                        -20.00    -15.00    -10.00     -5.00      0.00      5.00     10.00     15.00     20.00
             -180.00   0.02964   0.02306   0.03293   0.03225   0.00000  -0.03225  -0.03293  -0.02306  -0.02964
              -35.00  -0.02097  -0.01397  -0.00702  -0.00081   0.00000   0.00081   0.00702   0.01397   0.02097
              -11.00  -0.03826  -0.03903  -0.02630  -0.01326   0.00000   0.01326   0.02630   0.03903   0.03826
                4.00  -0.05048  -0.03824  -0.02562  -0.01284   0.00000   0.01284   0.02562   0.03824   0.05048
               19.00  -0.04379  -0.03320  -0.02231  -0.01127   0.00000   0.01127   0.02231   0.03320   0.04379
               42.00  -0.01719  -0.00855   0.00233  -0.00701   0.00000   0.00701  -0.00233   0.00855   0.01719
              180.00   0.02964   0.02306   0.03293   0.03225   0.00000  -0.03225  -0.03293  -0.02306  -0.02964
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            </tableData>
          </table>
          </product>
        </function>
        <function name="aero/coefficient/CYp">
          <description>CY per p (non-dimensional), over alpha</description>
          <product>
            <property>aero/qbar-psf</property>
            <property>metrics/Sw-sqft</property>
            <property>aero/bi2vel</property>
            <property>velocities/p-aero-rad_sec</property>
            <property>aero/function/mach-lift</property>
          <table>
            <independentVar lookup="row">aero/alpha-deg</independentVar>
            <tableData>
                 -180.00   -0.02481
                 -165.00    0.07602
                  -32.00    0.02783
                  -10.00    0.01770
                    5.00    0.02033
                   20.00    0.03791
                   46.00    0.01469
                  180.00   -0.02481
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            </tableData>
          </table>
          </product>
        </function>
        <function name="aero/coefficient/CYr">
          <description>CY per r (non-dimensional), over alpha</description>
          <product>
            <property>aero/qbar-psf</property>
            <property>metrics/Sw-sqft</property>
            <property>aero/bi2vel</property>
            <property>velocities/r-aero-rad_sec</property>
            <property>aero/function/mach-lift</property>
          <table>
            <independentVar lookup="row">aero/alpha-deg</independentVar>
            <tableData>
                 -180.00    0.61997
                 -165.00    0.25226
                  -32.00    0.10816
                  -10.00    0.12322
                    5.00    0.10912
                   20.00    0.05231
                   46.00   -0.19191
                  180.00    0.61997
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            </tableData>
          </table>
          </product>
        </function>
      </axis>
      <axis name="LIFT">
        <function name="aero/coefficient/CL_base">
          <description>CL over alpha and beta, ground effect, compressibility (hangar)</description>
          <product>
            <property>aero/qbar-psf</property>
            <property>metrics/Sw-sqft</property>
            <property>aero/function/CL-base</property>
            <property>aero/function/mach-lift</property>
          <table>
            <independentVar lookup="row">aero/h_b-mac-ft</independentVar>
            <tableData>
                    0.00    1.20000
                    0.10    1.08692
                    0.20    1.03778
                    0.40    1.00713
                    0.60    1.00135
                    0.80    1.00025
                    1.00    1.00005
                    1.10    1.00000
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            </tableData>
          </table>
          </product>
        </function>
        <function name="aero/coefficient/CL_elevator">
          <description>CL increment from elevator (deg), over alpha</description>
          <product>
            <property>aero/qbar-psf</property>
            <property>metrics/Sw-sqft</property>
            <property>aero/function/mach-elevator</property>
          <table>
            <independentVar lookup="row">aero/alpha-deg</independentVar>
            <independentVar lookup="column">fcs/elevator-pos-deg</independentVar>
            <tableData>
                        -25.00    -20.00    -15.00    -10.00     -5.00      0.00      5.00     10.00     15.00     20.00     25.00     30.00     35.00     40.00     45.00     50.00
             -180.00   0.03824   0.03824   0.02974   0.04192   0.04091   0.00000  -0.04091  -0.04192  -0.02974  -0.03824  -0.04557  -0.05152  -0.05590  -0.05858  -0.05949  -0.05858
              -35.00  -0.07769  -0.07001  -0.06482  -0.05119  -0.02878   0.00000   0.03227   0.06505   0.09564   0.12391   0.15132   0.17070   0.19099   0.21181   0.23297   0.25456
              -11.00  -0.07160  -0.06065  -0.05616  -0.04476  -0.02531   0.00000   0.02589   0.04982   0.07048   0.08825   0.10526   0.10882   0.11469   0.12300   0.13367   0.14672
                4.00  -0.07902  -0.06684  -0.06008  -0.04720  -0.02627   0.00000   0.02649   0.04869   0.06264   0.06784   0.06828   0.05758   0.04834   0.04116   0.03719   0.03811
               19.00  -0.10571  -0.09212  -0.07443  -0.05242  -0.02633   0.00000   0.02257   0.03788   0.04616   0.04892   0.04363   0.02821   0.01187  -0.00586  -0.02158  -0.03358
               42.00  -0.14046  -0.13322  -0.10354  -0.07042  -0.03491   0.00000   0.03201   0.05905   0.07883   0.09114   0.09656   0.08717   0.06827   0.04844   0.02706   0.00398
              180.00   0.03824   0.03824   0.02974   0.04192   0.04091   0.00000  -0.04091  -0.04192  -0.02974  -0.03824  -0.04557  -0.05152  -0.05590  -0.05858  -0.05949  -0.05858
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            </tableData>
          </table>
          </product>
        </function>
        <function name="aero/coefficient/CL_flap">
          <description>CL increment from flap (deg), over alpha</description>
          <product>
            <property>aero/qbar-psf</property>
            <property>metrics/Sw-sqft</property>
            <property>aero/function/mach-flap</property>
          <table>
            <independentVar lookup="row">aero/alpha-deg</independentVar>
            <independentVar lookup="column">fcs/flap-pos-deg</independentVar>
            <tableData>
                        -25.00    -20.00    -15.00    -10.00     -5.00      0.00      5.00     10.00     15.00     20.00     25.00
             -180.00  -0.00000  -0.00000  -0.00000  -0.00000  -0.00000   0.00000  -0.00000  -0.00000  -0.00000  -0.00000  -0.00000
              -35.00  -0.10314  -0.09391  -0.08055  -0.06017  -0.03218   0.00000   0.03236   0.06099   0.08255   0.09753   0.10864
              -11.00  -0.15394  -0.13948  -0.11912  -0.08877  -0.04751   0.00000   0.04804   0.09063   0.12250   0.14423   0.15992
                4.00  -0.16411  -0.14802  -0.12580  -0.09322  -0.04957   0.00000   0.04934   0.09246   0.12437   0.14592   0.16132
               19.00  -0.15400  -0.13840  -0.11716  -0.08633  -0.04530   0.00000   0.04264   0.07833   0.10411   0.12124   0.13331
               42.00  -0.08557  -0.07713  -0.06566  -0.04890  -0.02622   0.00000   0.02671   0.05038   0.06759   0.07870   0.08624
              180.00   0.00000   0.00000   0.00000   0.00000   0.00000   0.00000   0.00000   0.00000   0.00000   0.00000   0.00000
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            </tableData>
          </table>
          <table>
            <independentVar lookup="row">aero/h_b-mac-ft</independentVar>
            <tableData>
                    0.00    1.20000
                    0.10    1.08692
                    0.20    1.03778
                    0.40    1.00713
                    0.60    1.00135
                    0.80    1.00025
                    1.00    1.00005
                    1.10    1.00000
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            </tableData>
          </table>
          </product>
        </function>
        <function name="aero/coefficient/CLq">
          <description>CL per q (non-dimensional), over alpha</description>
          <product>
            <property>aero/qbar-psf</property>
            <property>metrics/Sw-sqft</property>
            <property>aero/ci2vel</property>
            <property>velocities/q-aero-rad_sec</property>
            <property>aero/function/mach-lift</property>
          <table>
            <independentVar lookup="row">aero/alpha-deg</independentVar>
            <tableData>
                 -180.00   -0.82451
                 -165.00   -0.33682
                  -32.00    3.11463
                  -10.00    3.90898
                    5.00    3.88998
                   20.00    3.84244
                   46.00    1.65163
                  180.00   -0.82451
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            </tableData>
          </table>
          </product>
        </function>
        <function name="aero/coefficient/CLadot">
          <description>CL per alpha-dot (downwash lag at the tail)</description>
          <product>
            <property>aero/qbar-psf</property>
            <property>metrics/Sw-sqft</property>
            <property>aero/ci2vel</property>
            <property>aero/alphadot-rad_sec</property>
            <value>0.00000</value>
            <property>aero/function/mach-lift</property>
          </product>
        </function>
      </axis>
      <axis name="ROLL">
        <function name="aero/coefficient/Cl_base">
          <description>Cl over alpha and beta (hangar)</description>
          <product>
            <property>aero/qbar-psf</property>
            <property>metrics/Sw-sqft</property>
            <property>metrics/bw-ft</property>
            <property>aero/function/mach-side</property>
          <table>
            <independentVar lookup="row">aero/alpha-deg</independentVar>
            <independentVar lookup="column">aero/beta-deg</independentVar>
            <tableData>
                        -90.00    -70.00    -50.00    -40.00    -30.00    -25.00    -20.00    -15.00    -10.00     -6.00     -3.00      0.00      3.00      6.00     10.00     15.00     20.00     25.00     30.00     40.00     50.00     70.00     90.00
             -180.00   0.00832  -0.00015  -0.01466  -0.01293  -0.01032  -0.00906  -0.00761  -0.00541   0.00001   0.00115   0.00064  -0.00000  -0.00064  -0.00115  -0.00001   0.00541   0.00761   0.00906   0.01032   0.01293   0.01466   0.00015  -0.00832
              -35.00   0.00832  -0.00110   0.01268   0.01718   0.00531  -0.00671  -0.01494  -0.01495  -0.01039  -0.00676  -0.00408  -0.00000   0.00408   0.00676   0.01039   0.01495   0.01494   0.00671  -0.00531  -0.01718  -0.01268   0.00110  -0.00832
              -11.00   0.00832  -0.00456  -0.00116  -0.00803  -0.02573  -0.02776  -0.02381  -0.01707  -0.01169  -0.00711  -0.00358  -0.00000   0.00358   0.00711   0.01169   0.01707   0.02381   0.02776   0.02573   0.00803   0.00116   0.00456  -0.00832
                4.00   0.00832  -0.00941  -0.00038   0.00936   0.01682   0.02016   0.01678   0.01290   0.00875   0.00530   0.00266  -0.00000  -0.00266  -0.00530  -0.00875  -0.01290  -0.01678  -0.02016  -0.01682  -0.00936   0.00038   0.00941  -0.00832
               19.00   0.00832  -0.01633  -0.00497   0.01545   0.05347   0.06107   0.05472   0.04181   0.02805   0.01674   0.00829  -0.00000  -0.00829  -0.01674  -0.02805  -0.04181  -0.05472  -0.06107  -0.05347  -0.01545   0.00497   0.01633  -0.00832
               42.00   0.00832  -0.00303  -0.02535  -0.03194  -0.03460  -0.03259  -0.02831  -0.02097  -0.01252  -0.00492  -0.00014  -0.00000   0.00014   0.00492   0.01252   0.02097   0.02831   0.03259   0.03460   0.03194   0.02535   0.00303  -0.00832
              180.00   0.00832  -0.00015  -0.01466  -0.01293  -0.01032  -0.00906  -0.00761  -0.00541   0.00001   0.00115   0.00064  -0.00000  -0.00064  -0.00115  -0.00001   0.00541   0.00761   0.00906   0.01032   0.01293   0.01466   0.00015  -0.00832
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            </tableData>
          </table>
          </product>
        </function>
        <function name="aero/coefficient/Cl_aileron">
          <description>Cl increment from aileron (deg), over alpha</description>
          <product>
            <property>aero/qbar-psf</property>
            <property>metrics/Sw-sqft</property>
            <property>metrics/bw-ft</property>
            <property>aero/function/mach-aileron</property>
          <table>
            <independentVar lookup="row">aero/alpha-deg</independentVar>
            <independentVar lookup="column">fcs/left-aileron-pos-deg</independentVar>
            <tableData>
                        -25.00    -20.00    -15.00    -10.00     -5.00      0.00      5.00     10.00     15.00     20.00     25.00
             -180.00   0.00000   0.00000   0.00000  -0.00000  -0.00000   0.00000  -0.00000  -0.00000   0.00000   0.00000   0.00000
              -35.00  -0.04748  -0.04192  -0.03387  -0.02467  -0.01301   0.00000   0.01301   0.02467   0.03387   0.04192   0.04748
              -11.00  -0.05770  -0.05122  -0.04289  -0.03143  -0.01661   0.00000   0.01661   0.03143   0.04289   0.05122   0.05770
                4.00  -0.05547  -0.04929  -0.04131  -0.03031  -0.01604   0.00000   0.01604   0.03031   0.04131   0.04929   0.05547
               19.00  -0.05389  -0.04750  -0.03948  -0.02875  -0.01513   0.00000   0.01513   0.02875   0.03948   0.04750   0.05389
               42.00  -0.03533  -0.03091  -0.02558  -0.01857  -0.00976   0.00000   0.00976   0.01857   0.02558   0.03091   0.03533
              180.00  -0.00000   0.00000   0.00000  -0.00000  -0.00000   0.00000  -0.00000  -0.00000   0.00000   0.00000  -0.00000
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            </tableData>
          </table>
          </product>
        </function>
        <function name="aero/coefficient/Cl_rudder">
          <description>Cl increment from rudder (deg), over alpha</description>
          <product>
            <property>aero/qbar-psf</property>
            <property>metrics/Sw-sqft</property>
            <property>metrics/bw-ft</property>
            <property>aero/function/mach-rudder</property>
          <table>
            <independentVar lookup="row">aero/alpha-deg</independentVar>
            <independentVar lookup="column">fcs/rudder-pos-deg</independentVar>
            <tableData>
                        -20.00    -15.00    -10.00     -5.00      0.00      5.00     10.00     15.00     20.00
             -180.00   0.00604   0.00470   0.00672   0.00657   0.00000  -0.00657  -0.00672  -0.00470  -0.00604
              -35.00  -0.00204  -0.00120  -0.00041   0.00029   0.00000  -0.00029   0.00041   0.00120   0.00204
              -11.00  -0.00499  -0.00567  -0.00384  -0.00194   0.00000   0.00194   0.00384   0.00567   0.00499
                4.00  -0.00777  -0.00591  -0.00397  -0.00199   0.00000   0.00199   0.00397   0.00591   0.00777
               19.00  -0.00652  -0.00495  -0.00333  -0.00167   0.00000   0.00167   0.00333   0.00495   0.00652
               42.00  -0.00197  -0.00050   0.00127  -0.00108   0.00000   0.00108  -0.00127   0.00050   0.00197
              180.00   0.00604   0.00470   0.00672   0.00657   0.00000  -0.00657  -0.00672  -0.00470  -0.00604
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            </tableData>
          </table>
          </product>
        </function>
        <function name="aero/coefficient/Clp">
          <description>Cl per p (non-dimensional), over alpha</description>
          <product>
            <property>aero/qbar-psf</property>
            <property>metrics/Sw-sqft</property>
            <property>metrics/bw-ft</property>
            <property>aero/bi2vel</property>
            <property>velocities/p-aero-rad_sec</property>
            <property>aero/function/mach-lift</property>
          <table>
            <independentVar lookup="row">aero/alpha-deg</independentVar>
            <tableData>
                 -180.00   -0.59633
                 -165.00   -0.12650
                  -32.00   -0.33840
                  -10.00   -0.26991
                    5.00   -0.21807
                   20.00   -0.29975
                   46.00   -0.14888
                  180.00   -0.59633
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            </tableData>
          </table>
          </product>
        </function>
        <function name="aero/coefficient/Clr">
          <description>Cl per r (non-dimensional), over alpha</description>
          <product>
            <property>aero/qbar-psf</property>
            <property>metrics/Sw-sqft</property>
            <property>metrics/bw-ft</property>
            <property>aero/bi2vel</property>
            <property>velocities/r-aero-rad_sec</property>
            <property>aero/function/mach-lift</property>
          <table>
            <independentVar lookup="row">aero/alpha-deg</independentVar>
            <tableData>
                 -180.00    0.01891
                 -165.00    0.00531
                  -32.00   -0.18941
                  -10.00   -0.06695
                    5.00    0.04431
                   20.00    0.13784
                   46.00    0.31992
                  180.00    0.01891
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            </tableData>
          </table>
          </product>
        </function>
      </axis>
      <axis name="PITCH">
        <function name="aero/coefficient/Cm_base">
          <description>Cm over alpha and beta (hangar)</description>
          <product>
            <property>aero/qbar-psf</property>
            <property>metrics/Sw-sqft</property>
            <property>metrics/cbarw-ft</property>
          <table>
            <independentVar lookup="row">aero/alpha-deg</independentVar>
            <independentVar lookup="column">aero/beta-deg</independentVar>
            <tableData>
                        -90.00    -70.00    -50.00    -40.00    -30.00    -25.00    -20.00    -15.00    -10.00     -6.00     -3.00      0.00      3.00      6.00     10.00     15.00     20.00     25.00     30.00     40.00     50.00     70.00     90.00
             -180.00  -0.00000  -0.00013  -0.00003   0.00012   0.00021   0.00024   0.00026   0.00047   0.00088   0.00052   0.00034   0.00028   0.00034   0.00052   0.00088   0.00047   0.00026   0.00024   0.00021   0.00012  -0.00003  -0.00013  -0.00000
              -35.00   0.00000   0.04797  -0.01759  -0.02552  -0.03395  -0.02779  -0.01864  -0.01048  -0.00532  -0.00173   0.00155   0.00449   0.00155  -0.00173  -0.00532  -0.01048  -0.01864  -0.02779  -0.03395  -0.02552  -0.01759   0.04797   0.00000
              -11.00  -0.00000   0.00564  -0.01309  -0.01047  -0.01056  -0.01649  -0.01957  -0.01722  -0.01854  -0.01902  -0.01908  -0.01895  -0.01908  -0.01902  -0.01854  -0.01722  -0.01957  -0.01649  -0.01056  -0.01047  -0.01309   0.00564  -0.00000
                4.00   0.00000  -0.00818   0.00595   0.01575   0.02121   0.01930   0.01628   0.01384   0.01187   0.01071   0.01013   0.00991   0.01013   0.01071   0.01187   0.01384   0.01628   0.01930   0.02121   0.01575   0.00595  -0.00818   0.00000
               19.00   0.00000  -0.02922   0.01621   0.03502   0.04235   0.03639   0.03370   0.03189   0.02939   0.02704   0.02534   0.02382   0.02534   0.02704   0.02939   0.03189   0.03370   0.03639   0.04235   0.03502   0.01621  -0.02922   0.00000
               42.00  -0.00000  -0.03299   0.01913   0.03544   0.04171   0.04359   0.03777   0.02934   0.01760   0.01226   0.01108   0.01147   0.01108   0.01226   0.01760   0.02934   0.03777   0.04359   0.04171   0.03544   0.01913  -0.03299  -0.00000
              180.00  -0.00000  -0.00013  -0.00003   0.00012   0.00021   0.00024   0.00026   0.00047   0.00088   0.00052   0.00034   0.00028   0.00034   0.00052   0.00088   0.00047   0.00026   0.00024   0.00021   0.00012  -0.00003  -0.00013  -0.00000
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            </tableData>
          </table>
          </product>
        </function>
        <function name="aero/coefficient/Cm_mach">
          <description>Cm from the neutral point's move with Mach</description>
          <product>
            <property>aero/qbar-psf</property>
            <property>metrics/Sw-sqft</property>
            <property>metrics/cbarw-ft</property>
            <property>aero/function/CL-base</property>
            <property>aero/function/mach-dCm-dCL</property>
          </product>
        </function>
        <function name="aero/coefficient/Cm_elevator">
          <description>Cm increment from elevator (deg), over alpha</description>
          <product>
            <property>aero/qbar-psf</property>
            <property>metrics/Sw-sqft</property>
            <property>metrics/cbarw-ft</property>
            <property>aero/function/mach-elevator</property>
          <table>
            <independentVar lookup="row">aero/alpha-deg</independentVar>
            <independentVar lookup="column">fcs/elevator-pos-deg</independentVar>
            <tableData>
                        -25.00    -20.00    -15.00    -10.00     -5.00      0.00      5.00     10.00     15.00     20.00     25.00     30.00     35.00     40.00     45.00     50.00
             -180.00  -0.01782  -0.01789  -0.01390  -0.01956  -0.01906   0.00000   0.01907   0.01957   0.01377   0.01766   0.02099   0.02356   0.02534   0.02628   0.02630   0.02538
              -35.00   0.11748   0.11174   0.08524   0.05754   0.02863   0.00000  -0.02659  -0.04937  -0.06672  -0.07882  -0.08701  -0.08675  -0.08455  -0.08066  -0.07523  -0.06841
              -11.00   0.16707   0.16004   0.12590   0.08768   0.04501   0.00000  -0.04584  -0.08929  -0.12715  -0.15929  -0.18710  -0.20320  -0.21626  -0.22612  -0.23270  -0.23594
                4.00   0.17636   0.16927   0.13315   0.09216   0.04681   0.00000  -0.04658  -0.09085  -0.13090  -0.16744  -0.20133  -0.22670  -0.25031  -0.27166  -0.28983  -0.30366
               19.00   0.14009   0.13240   0.10667   0.07567   0.03937   0.00000  -0.03999  -0.07830  -0.11120  -0.13878  -0.16637  -0.18768  -0.20941  -0.23127  -0.25097  -0.26731
               42.00   0.04882   0.04359   0.03936   0.03091   0.01743   0.00000  -0.01966  -0.04001  -0.06011  -0.08021  -0.10136  -0.12215  -0.14698  -0.17063  -0.19340  -0.21536
              180.00  -0.01782  -0.01789  -0.01390  -0.01956  -0.01906   0.00000   0.01907   0.01957   0.01377   0.01766   0.02099   0.02356   0.02534   0.02628   0.02630   0.02538
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            </tableData>
          </table>
          </product>
        </function>
        <function name="aero/coefficient/Cm_flap">
          <description>Cm increment from flap (deg), over alpha</description>
          <product>
            <property>aero/qbar-psf</property>
            <property>metrics/Sw-sqft</property>
            <property>metrics/cbarw-ft</property>
            <property>aero/function/mach-flap</property>
          <table>
            <independentVar lookup="row">aero/alpha-deg</independentVar>
            <independentVar lookup="column">fcs/flap-pos-deg</independentVar>
            <tableData>
                        -25.00    -20.00    -15.00    -10.00     -5.00      0.00      5.00     10.00     15.00     20.00     25.00
             -180.00   0.00016   0.00010   0.00006   0.00003   0.00001   0.00000   0.00001   0.00003   0.00006   0.00010   0.00016
              -35.00   0.07147   0.06431   0.05458   0.04047   0.02159   0.00000  -0.02186  -0.04139  -0.05618  -0.06638  -0.07382
              -11.00   0.08362   0.07526   0.06384   0.04727   0.02516   0.00000  -0.02528  -0.04769  -0.06458  -0.07622  -0.08472
                4.00   0.08955   0.08062   0.06840   0.05064   0.02694   0.00000  -0.02690  -0.05057  -0.06834  -0.08058  -0.08954
               19.00   0.08885   0.07999   0.06780   0.05004   0.02641   0.00000  -0.02580  -0.04846  -0.06549  -0.07719  -0.08571
               42.00   0.06421   0.05783   0.04898   0.03606   0.01901   0.00000  -0.01872  -0.03509  -0.04744  -0.05614  -0.06280
              180.00   0.00016   0.00010   0.00006   0.00003   0.00001   0.00000   0.00001   0.00003   0.00006   0.00010   0.00016
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            </tableData>
          </table>
          </product>
        </function>
        <function name="aero/coefficient/Cmq">
          <description>Cm per q (non-dimensional), over alpha</description>
          <product>
            <property>aero/qbar-psf</property>
            <property>metrics/Sw-sqft</property>
            <property>metrics/cbarw-ft</property>
            <property>aero/ci2vel</property>
            <property>velocities/q-aero-rad_sec</property>
            <property>aero/function/mach-lift</property>
          <table>
            <independentVar lookup="row">aero/alpha-deg</independentVar>
            <tableData>
                 -180.00   -2.48381
                 -165.00   -0.30562
                  -32.00   -2.54136
                  -10.00   -2.47834
                    5.00   -2.29759
                   20.00   -2.43294
                   46.00   -1.98794
                  180.00   -2.48381
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            </tableData>
          </table>
          </product>
        </function>
        <function name="aero/coefficient/Cmadot">
          <description>Cm per alpha-dot (downwash lag at the tail)</description>
          <product>
            <property>aero/qbar-psf</property>
            <property>metrics/Sw-sqft</property>
            <property>metrics/cbarw-ft</property>
            <property>aero/ci2vel</property>
            <property>aero/alphadot-rad_sec</property>
            <value>0.00000</value>
            <property>aero/function/mach-lift</property>
          </product>
        </function>
        <function name="aero/coefficient/Cm_gear">
          <description>the gear's drag's pitching moment, -1.97 m from the reference point's height</description>
          <product>
            <property>aero/qbar-psf</property>
            <property>metrics/Sw-sqft</property>
            <property>metrics/cbarw-ft</property>
            <value>-0.00170127</value>
            <property>gear/gear-pos-norm</property>
          </product>
        </function>
      </axis>
      <axis name="YAW">
        <function name="aero/coefficient/Cn_base">
          <description>Cn over alpha and beta (hangar)</description>
          <product>
            <property>aero/qbar-psf</property>
            <property>metrics/Sw-sqft</property>
            <property>metrics/bw-ft</property>
            <property>aero/function/mach-side</property>
          <table>
            <independentVar lookup="row">aero/alpha-deg</independentVar>
            <independentVar lookup="column">aero/beta-deg</independentVar>
            <tableData>
                        -90.00    -70.00    -50.00    -40.00    -30.00    -25.00    -20.00    -15.00    -10.00     -6.00     -3.00      0.00      3.00      6.00     10.00     15.00     20.00     25.00     30.00     40.00     50.00     70.00     90.00
             -180.00  -0.05379  -0.07293  -0.07906  -0.07300  -0.06129  -0.05350  -0.04451  -0.03588  -0.04334  -0.03739  -0.01952  -0.00000   0.01952   0.03739   0.04334   0.03588   0.04451   0.05350   0.06129   0.07300   0.07906   0.07293   0.05379
              -35.00  -0.05379  -0.03325  -0.00869   0.00224   0.00313   0.00459   0.00360   0.00508   0.00501   0.00386   0.00099  -0.00000  -0.00099  -0.00386  -0.00501  -0.00508  -0.00360  -0.00459  -0.00313  -0.00224   0.00869   0.03325   0.05379
              -11.00  -0.05379  -0.03027  -0.00651   0.00075  -0.00169  -0.00466  -0.00395  -0.00660  -0.00407  -0.00231  -0.00116  -0.00000   0.00116   0.00231   0.00407   0.00660   0.00395   0.00466   0.00169  -0.00075   0.00651   0.03027   0.05379
                4.00  -0.05379  -0.03140  -0.00934  -0.00111  -0.00209  -0.01023  -0.00809  -0.00576  -0.00357  -0.00197  -0.00090  -0.00000   0.00090   0.00197   0.00357   0.00576   0.00809   0.01023   0.00209   0.00111   0.00934   0.03140   0.05379
               19.00  -0.05379  -0.03192  -0.00999   0.00181   0.00574   0.00330   0.00032   0.00095   0.00115   0.00083   0.00041  -0.00000  -0.00041  -0.00083  -0.00115  -0.00095  -0.00032  -0.00330  -0.00574  -0.00181   0.00999   0.03192   0.05379
               42.00  -0.05379  -0.03445  -0.01443  -0.00507   0.00244   0.00216   0.00437   0.00627   0.00645   0.00525   0.00063  -0.00000  -0.00063  -0.00525  -0.00645  -0.00627  -0.00437  -0.00216  -0.00244   0.00507   0.01443   0.03445   0.05379
              180.00  -0.05379  -0.07293  -0.07906  -0.07300  -0.06129  -0.05350  -0.04451  -0.03588  -0.04334  -0.03739  -0.01952  -0.00000   0.01952   0.03739   0.04334   0.03588   0.04451   0.05350   0.06129   0.07300   0.07906   0.07293   0.05379
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            </tableData>
          </table>
          </product>
        </function>
        <function name="aero/coefficient/Cn_aileron">
          <description>Cn increment from aileron (deg), over alpha</description>
          <product>
            <property>aero/qbar-psf</property>
            <property>metrics/Sw-sqft</property>
            <property>metrics/bw-ft</property>
            <property>aero/function/mach-aileron</property>
          <table>
            <independentVar lookup="row">aero/alpha-deg</independentVar>
            <independentVar lookup="column">fcs/left-aileron-pos-deg</independentVar>
            <tableData>
                        -25.00    -20.00    -15.00    -10.00     -5.00      0.00      5.00     10.00     15.00     20.00     25.00
             -180.00   0.00000  -0.00000  -0.00000  -0.00000  -0.00000   0.00000  -0.00000  -0.00000  -0.00000  -0.00000   0.00000
              -35.00   0.00297   0.00315  -0.00092  -0.00069  -0.00041   0.00000   0.00041   0.00069   0.00092  -0.00315  -0.00297
              -11.00  -0.01192  -0.01042  -0.00850  -0.00596  -0.00301   0.00000   0.00301   0.00596   0.00850   0.01042   0.01192
                4.00  -0.00833  -0.00732  -0.00607  -0.00441  -0.00232   0.00000   0.00232   0.00441   0.00607   0.00732   0.00833
               19.00  -0.01180  -0.01103  -0.00994  -0.00803  -0.00467   0.00000   0.00467   0.00803   0.00994   0.01103   0.01180
               42.00  -0.01200  -0.01129  -0.00988  -0.00748  -0.00403   0.00000   0.00403   0.00748   0.00988   0.01129   0.01200
              180.00   0.00000  -0.00000   0.00000   0.00000  -0.00000   0.00000  -0.00000   0.00000   0.00000  -0.00000   0.00000
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            </tableData>
          </table>
          </product>
        </function>
        <function name="aero/coefficient/Cn_rudder">
          <description>Cn increment from rudder (deg), over alpha</description>
          <product>
            <property>aero/qbar-psf</property>
            <property>metrics/Sw-sqft</property>
            <property>metrics/bw-ft</property>
            <property>aero/function/mach-rudder</property>
          <table>
            <independentVar lookup="row">aero/alpha-deg</independentVar>
            <independentVar lookup="column">fcs/rudder-pos-deg</independentVar>
            <tableData>
                        -20.00    -15.00    -10.00     -5.00      0.00      5.00     10.00     15.00     20.00
             -180.00  -0.01670  -0.01299  -0.01852  -0.01815   0.00000   0.01815   0.01852   0.01299   0.01670
              -35.00   0.00926   0.00596   0.00280   0.00007   0.00000  -0.00007  -0.00280  -0.00596  -0.00926
              -11.00   0.01831   0.01813   0.01221   0.00616   0.00000  -0.00616  -0.01221  -0.01813  -0.01831
                4.00   0.02407   0.01825   0.01223   0.00613   0.00000  -0.00613  -0.01223  -0.01825  -0.02407
               19.00   0.02069   0.01571   0.01057   0.00533   0.00000  -0.00533  -0.01057  -0.01571  -0.02069
               42.00   0.00887   0.00504   0.00037   0.00353   0.00000  -0.00353  -0.00037  -0.00504  -0.00887
              180.00  -0.01670  -0.01299  -0.01852  -0.01815   0.00000   0.01815   0.01852   0.01299   0.01670
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            </tableData>
          </table>
          </product>
        </function>
        <function name="aero/coefficient/Cnp">
          <description>Cn per p (non-dimensional), over alpha</description>
          <product>
            <property>aero/qbar-psf</property>
            <property>metrics/Sw-sqft</property>
            <property>metrics/bw-ft</property>
            <property>aero/bi2vel</property>
            <property>velocities/p-aero-rad_sec</property>
            <property>aero/function/mach-lift</property>
          <table>
            <independentVar lookup="row">aero/alpha-deg</independentVar>
            <tableData>
                 -180.00    0.00594
                 -165.00   -0.04249
                  -32.00    0.00022
                  -10.00    0.01019
                    5.00   -0.02419
                   20.00   -0.01107
                   46.00   -0.00703
                  180.00    0.00594
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            </tableData>
          </table>
          </product>
        </function>
        <function name="aero/coefficient/Cnr">
          <description>Cn per r (non-dimensional), over alpha</description>
          <product>
            <property>aero/qbar-psf</property>
            <property>metrics/Sw-sqft</property>
            <property>metrics/bw-ft</property>
            <property>aero/bi2vel</property>
            <property>velocities/r-aero-rad_sec</property>
            <property>aero/function/mach-lift</property>
          <table>
            <independentVar lookup="row">aero/alpha-deg</independentVar>
            <tableData>
                 -180.00   -0.22933
                 -165.00   -0.04940
                  -32.00   -0.22929
                  -10.00   -0.19716
                    5.00   -0.18746
                   20.00   -0.17467
                   46.00   -0.09378
                  180.00   -0.22933
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            </tableData>
          </table>
          </product>
        </function>
      </axis>
    </aerodynamics>
</fdm_config>
