<?xml version="1.0"?>
<?xml-stylesheet type="text/xsl" href="http://jsbsim.sourceforge.net/JSBSim.xsl"?>
<!-- Generated by hangar 0.1.0 from kc46a.toml on 2026-10-01. Edit the design and rebuild; changes
     made here are overwritten.  -->
<fdm_config name="kc46a" version="2.0" release="ALPHA"
            xmlns:xsi="http://www.w3.org/2001/XMLSchema-instance"
            xsi:noNamespaceSchemaLocation="http://jsbsim.sourceforge.net/JSBSim.xsd">
    <fileheader>
      <author>hangar</author>
      <filecreationdate>2026-10-01</filecreationdate>
      <version>0.1.0</version>
      <description>Boeing KC-46A Pegasus (hangar build)</description>
      <note>Aerodynamics: vortex lattice with viscous section polars, full-envelope
        strip model, slender-body fuselage (hangar). Mass: Raymer component
        weights on the geometry. Propeller: blade-element momentum theory.</note>
      <reference refID="fsim/applicability/aerobatic" author="the design" title="USAF KC-46 fact sheet: a tanker, not cleared for aerobatics" date="n/a"/>
      <reference refID="fsim/applicability/carrier" author="the design" title="USAF KC-46 fact sheet: a land-based tanker" date="n/a"/>
      <reference refID="fsim/applicability/drag_devices" author="the design" title="Boeing 767 data: flight and ground spoilers" date="n/a"/>
      <reference refID="fsim/applicability/flaps" author="the design" title="Boeing 767 data: trailing-edge flaps" date="n/a"/>
      <reference refID="fsim/applicability/ground_contact" author="the design" title="Boeing D6-58328: tricycle wheeled gear" date="n/a"/>
      <reference refID="fsim/applicability/releasable_stores" author="the design" title="USAF KC-46 fact sheet: an unarmed tanker" date="n/a"/>
      <reference refID="fsim/applicability/retractable_gear" author="the design" title="Boeing D6-58328: retractable gear" date="n/a"/>
      <reference refID="fsim/applicability/vertical_flight" author="the design" title="USAF KC-46 fact sheet and Boeing D6-58328 (767 airport planning): a conventional jet. Conventional take-off and landing: no rotors, lift fans or vectored lift to hover" date="n/a"/>
    </fileheader>
    <metrics>
      <wingarea unit="M2"> 283.3000 </wingarea>
      <wingspan unit="M"> 47.5700 </wingspan>
      <chord unit="M"> 6.8100 </chord>
      <htailarea unit="M2"> 78.2753 </htailarea>
      <htailarm unit="M"> 20.5012 </htailarm>
      <vtailarea unit="M2"> 44.8428 </vtailarea>
      <vtailarm unit="M"> 20.0409 </vtailarm>
      <location name="AERORP" unit="M">
        <x> 22.2000 </x>
        <y> 0.0000 </y>
        <z> 4.1000 </z>
      </location>
      <location name="EYEPOINT" unit="M">
        <x> 4.0000 </x>
        <y> 0.0000 </y>
        <z> 6.7000 </z>
      </location>
      <location name="VRP" unit="M">
        <x> 23.3000 </x>
        <y> -0.0000 </y>
        <z> 4.1000 </z>
      </location>
    </metrics>
    <mass_balance negated_crossproduct_inertia="false">
      <ixx unit="KG*M2"> 2912676.83 </ixx>
      <iyy unit="KG*M2"> 7190054.54 </iyy>
      <izz unit="KG*M2"> 10027285.20 </izz>
      <ixy unit="KG*M2"> -1.751 </ixy>
      <ixz unit="KG*M2"> 337084.888 </ixz>
      <iyz unit="KG*M2"> 2.259 </iyz>
      <emptywt unit="KG"> 82377.00 </emptywt>
      <location name="CG" unit="M">
        <x> 23.3000 </x>
        <y> -0.0000 </y>
        <z> 4.1000 </z>
      </location>
      <pointmass name="pilots">
        <weight unit="KG"> 200.00 </weight>
        <location unit="M">
          <x> 4.0000 </x>
          <y> 0.0000 </y>
          <z> 6.0000 </z>
        </location>
      </pointmass>
      <pointmass name="boom operator">
        <weight unit="KG"> 100.00 </weight>
        <location unit="M">
          <x> 7.0000 </x>
          <y> 0.8000 </y>
          <z> 5.3000 </z>
        </location>
      </pointmass>
    </mass_balance>
    <ground_reactions>
      <contact type="BOGEY" name="Nose Gear">
        <location unit="M">
          <x> 4.5500 </x>
          <y> 0.0000 </y>
          <z> -0.1500 </z>
        </location>
        <static_friction> 0.8 </static_friction>
        <dynamic_friction> 0.5 </dynamic_friction>
        <rolling_friction> 0.02 </rolling_friction>
        <spring_coeff unit="N/M"> 1209907 </spring_coeff>
        <damping_coeff unit="N/M/SEC"> 149636 </damping_coeff>
        <damping_coeff_rebound unit="N/M/SEC"> 299273 </damping_coeff_rebound>
        <max_steer unit="DEG"> 65.0 </max_steer>
        <brake_group> NONE </brake_group>
        <retractable> 1 </retractable>
      </contact>
      <contact type="BOGEY" name="Left Main Gear">
        <location unit="M">
          <x> 24.2400 </x>
          <y> -4.6500 </y>
          <z> -0.1500 </z>
        </location>
        <static_friction> 0.8 </static_friction>
        <dynamic_friction> 0.5 </dynamic_friction>
        <rolling_friction> 0.02 </rolling_friction>
        <spring_coeff unit="N/M"> 5245498 </spring_coeff>
        <damping_coeff unit="N/M/SEC"> 648742 </damping_coeff>
        <damping_coeff_rebound unit="N/M/SEC"> 1297484 </damping_coeff_rebound>
        <max_steer unit="DEG"> 0.0 </max_steer>
        <brake_group> LEFT </brake_group>
        <retractable> 1 </retractable>
      </contact>
      <contact type="BOGEY" name="Right Main Gear">
        <location unit="M">
          <x> 24.2400 </x>
          <y> 4.6500 </y>
          <z> -0.1500 </z>
        </location>
        <static_friction> 0.8 </static_friction>
        <dynamic_friction> 0.5 </dynamic_friction>
        <rolling_friction> 0.02 </rolling_friction>
        <spring_coeff unit="N/M"> 5245498 </spring_coeff>
        <damping_coeff unit="N/M/SEC"> 648742 </damping_coeff>
        <damping_coeff_rebound unit="N/M/SEC"> 1297484 </damping_coeff_rebound>
        <max_steer unit="DEG"> 0.0 </max_steer>
        <brake_group> RIGHT </brake_group>
        <retractable> 1 </retractable>
      </contact>
      <contact type="STRUCTURE" name="boom rear">
        <location unit="M">
          <x> 50.5000 </x>
          <y> 0.0000 </y>
          <z> 3.6220 </z>
        </location>
        <static_friction> 0.8 </static_friction>
        <dynamic_friction> 0.6 </dynamic_friction>
        <spring_coeff unit="N/M"> 7821409 </spring_coeff>
        <damping_coeff unit="N/M/SEC"> 260714 </damping_coeff>
        <damping_coeff_rebound unit="N/M/SEC"> 260714 </damping_coeff_rebound>
      </contact>
      <contact type="STRUCTURE" name="fin rear">
        <location unit="M">
          <x> 48.5300 </x>
          <y> 0.0000 </y>
          <z> 15.8300 </z>
        </location>
        <static_friction> 0.8 </static_friction>
        <dynamic_friction> 0.6 </dynamic_friction>
        <spring_coeff unit="N/M"> 7512001 </spring_coeff>
        <damping_coeff unit="N/M/SEC"> 250400 </damping_coeff>
        <damping_coeff_rebound unit="N/M/SEC"> 250400 </damping_coeff_rebound>
      </contact>
      <contact type="STRUCTURE" name="fuselage front">
        <location unit="M">
          <x> 0.0000 </x>
          <y> 0.0000 </y>
          <z> 4.2800 </z>
        </location>
        <static_friction> 0.8 </static_friction>
        <dynamic_friction> 0.6 </dynamic_friction>
        <spring_coeff unit="N/M"> 3422723 </spring_coeff>
        <damping_coeff unit="N/M/SEC"> 114091 </damping_coeff>
        <damping_coeff_rebound unit="N/M/SEC"> 114091 </damping_coeff_rebound>
      </contact>
      <contact type="STRUCTURE" name="fuselage front 2">
        <location unit="M">
          <x> 2.5000 </x>
          <y> 0.0000 </y>
          <z> 6.3595 </z>
        </location>
        <static_friction> 0.8 </static_friction>
        <dynamic_friction> 0.6 </dynamic_friction>
        <spring_coeff unit="N/M"> 4108388 </spring_coeff>
        <damping_coeff unit="N/M/SEC"> 136946 </damping_coeff>
        <damping_coeff_rebound unit="N/M/SEC"> 136946 </damping_coeff_rebound>
      </contact>
      <contact type="STRUCTURE" name="fuselage front 3">
        <location unit="M">
          <x> 3.5000 </x>
          <y> -0.0000 </y>
          <z> 2.3800 </z>
        </location>
        <static_friction> 0.8 </static_friction>
        <dynamic_friction> 0.6 </dynamic_friction>
        <spring_coeff unit="N/M"> 3354400 </spring_coeff>
        <damping_coeff unit="N/M/SEC"> 111813 </damping_coeff>
        <damping_coeff_rebound unit="N/M/SEC"> 111813 </damping_coeff_rebound>
      </contact>
      <contact type="STRUCTURE" name="htail left rear">
        <location unit="M">
          <x> 47.3000 </x>
          <y> -9.3100 </y>
          <z> 6.2627 </z>
        </location>
        <static_friction> 0.8 </static_friction>
        <dynamic_friction> 0.6 </dynamic_friction>
        <spring_coeff unit="N/M"> 7321383 </spring_coeff>
        <damping_coeff unit="N/M/SEC"> 244046 </damping_coeff>
        <damping_coeff_rebound unit="N/M/SEC"> 244046 </damping_coeff_rebound>
      </contact>
      <contact type="STRUCTURE" name="htail right rear">
        <location unit="M">
          <x> 47.3000 </x>
          <y> 9.3100 </y>
          <z> 6.2627 </z>
        </location>
        <static_friction> 0.8 </static_friction>
        <dynamic_friction> 0.6 </dynamic_friction>
        <spring_coeff unit="N/M"> 7321374 </spring_coeff>
        <damping_coeff unit="N/M/SEC"> 244046 </damping_coeff>
        <damping_coeff_rebound unit="N/M/SEC"> 244046 </damping_coeff_rebound>
      </contact>
      <contact type="STRUCTURE" name="nacelle left front">
        <location unit="M">
          <x> 15.8669 </x>
          <y> -8.2912 </y>
          <z> 1.0961 </z>
        </location>
        <static_friction> 0.8 </static_friction>
        <dynamic_friction> 0.6 </dynamic_friction>
        <spring_coeff unit="N/M"> 19524104 </spring_coeff>
        <damping_coeff unit="N/M/SEC"> 650803 </damping_coeff>
        <damping_coeff_rebound unit="N/M/SEC"> 650803 </damping_coeff_rebound>
      </contact>
      <contact type="STRUCTURE" name="nacelle right front">
        <location unit="M">
          <x> 15.8669 </x>
          <y> 8.2912 </y>
          <z> 1.0961 </z>
        </location>
        <static_friction> 0.8 </static_friction>
        <dynamic_friction> 0.6 </dynamic_friction>
        <spring_coeff unit="N/M"> 19524086 </spring_coeff>
        <damping_coeff unit="N/M/SEC"> 650803 </damping_coeff>
        <damping_coeff_rebound unit="N/M/SEC"> 650803 </damping_coeff_rebound>
      </contact>
      <contact type="STRUCTURE" name="wing left rear">
        <location unit="M">
          <x> 32.7758 </x>
          <y> -23.7878 </y>
          <z> 5.4730 </z>
        </location>
        <static_friction> 0.8 </static_friction>
        <dynamic_friction> 0.6 </dynamic_friction>
        <spring_coeff unit="N/M"> 2041694 </spring_coeff>
        <damping_coeff unit="N/M/SEC"> 68056 </damping_coeff>
        <damping_coeff_rebound unit="N/M/SEC"> 68056 </damping_coeff_rebound>
      </contact>
      <contact type="STRUCTURE" name="wing left rear 2">
        <location unit="M">
          <x> 30.7330 </x>
          <y> -23.7850 </y>
          <z> 5.5000 </z>
        </location>
        <static_friction> 0.8 </static_friction>
        <dynamic_friction> 0.6 </dynamic_friction>
        <spring_coeff unit="N/M"> 2087044 </spring_coeff>
        <damping_coeff unit="N/M/SEC"> 69568 </damping_coeff>
        <damping_coeff_rebound unit="N/M/SEC"> 69568 </damping_coeff_rebound>
      </contact>
      <contact type="STRUCTURE" name="wing right rear">
        <location unit="M">
          <x> 30.7330 </x>
          <y> 23.7850 </y>
          <z> 5.5000 </z>
        </location>
        <static_friction> 0.8 </static_friction>
        <dynamic_friction> 0.6 </dynamic_friction>
        <spring_coeff unit="N/M"> 2087041 </spring_coeff>
        <damping_coeff unit="N/M/SEC"> 69568 </damping_coeff>
        <damping_coeff_rebound unit="N/M/SEC"> 69568 </damping_coeff_rebound>
      </contact>
      <contact type="STRUCTURE" name="wing right rear 2">
        <location unit="M">
          <x> 32.7758 </x>
          <y> 23.7878 </y>
          <z> 5.4730 </z>
        </location>
        <static_friction> 0.8 </static_friction>
        <dynamic_friction> 0.6 </dynamic_friction>
        <spring_coeff unit="N/M"> 2041691 </spring_coeff>
        <damping_coeff unit="N/M/SEC"> 68056 </damping_coeff>
        <damping_coeff_rebound unit="N/M/SEC"> 68056 </damping_coeff_rebound>
      </contact>
    </ground_reactions>
    <propulsion>
      <engine file="kc46a_engine0">
        <location unit="M">
          <x> 18.1500 </x>
          <y> -7.9000 </y>
          <z> 2.3000 </z>
        </location>
        <feed>0</feed>
        <feed>1</feed>
        <feed>2</feed>
        <feed>3</feed>
        <feed>4</feed>
        <thruster file="kc46a_nozzle0">
          <location unit="M">
            <x> 22.1000 </x>
            <y> -7.9000 </y>
            <z> 2.3000 </z>
          </location>
          <orient unit="DEG"> <roll>0.00</roll> <pitch>0.00</pitch> <yaw>0.00</yaw> </orient>

        </thruster>
      </engine>
      <engine file="kc46a_engine0">
        <location unit="M">
          <x> 18.1500 </x>
          <y> 7.9000 </y>
          <z> 2.3000 </z>
        </location>
        <feed>0</feed>
        <feed>1</feed>
        <feed>2</feed>
        <feed>3</feed>
        <feed>4</feed>
        <thruster file="kc46a_nozzle0">
          <location unit="M">
            <x> 22.1000 </x>
            <y> 7.9000 </y>
            <z> 2.3000 </z>
          </location>
          <orient unit="DEG"> <roll>0.00</roll> <pitch>0.00</pitch> <yaw>0.00</yaw> </orient>

        </thruster>
      </engine>
      <tank type="FUEL">
        <location unit="M">
          <x> 19.3000 </x>
          <y> 0.0000 </y>
          <z> 2.9000 </z>
        </location>
        <capacity unit="KG"> 30000.00 </capacity>
        <contents unit="KG"> 30000.00 </contents>
      </tank>
      <tank type="FUEL">
        <location unit="M">
          <x> 22.9000 </x>
          <y> -8.5000 </y>
          <z> 3.7000 </z>
        </location>
        <capacity unit="KG"> 21680.00 </capacity>
        <contents unit="KG"> 21680.00 </contents>
      </tank>
      <tank type="FUEL">
        <location unit="M">
          <x> 22.9000 </x>
          <y> 8.5000 </y>
          <z> 3.7000 </z>
        </location>
        <capacity unit="KG"> 21680.00 </capacity>
        <contents unit="KG"> 21680.00 </contents>
      </tank>
      <tank type="FUEL">
        <location unit="M">
          <x> 12.0000 </x>
          <y> 0.0000 </y>
          <z> 2.8000 </z>
        </location>
        <capacity unit="KG"> 11500.00 </capacity>
        <contents unit="KG"> 11500.00 </contents>
      </tank>
      <tank type="FUEL">
        <location unit="M">
          <x> 30.0000 </x>
          <y> 0.0000 </y>
          <z> 2.8000 </z>
        </location>
        <capacity unit="KG"> 11437.00 </capacity>
        <contents unit="KG"> 11437.00 </contents>
      </tank>
    </propulsion>
    <flight_control name="kc46a">
      <!-- the aircraft's profile for the platform (docs/control-architecture.md, section 7): what
           hangar knows of it - its design, its flight tests, its identified responses -->
      <property value="1">fsim/identity/version</property>
      <property value="1">fsim/identity/provenance</property>
      <property value="5">fsim/identity/class</property>
      <property value="1">fsim/identity/family</property>
      <property value="1">fsim/effectors/version</property>
      <property value="1">fsim/effectors/provenance</property>
      <property value="1">fsim/effectors/flaps</property>
      <property value="8">fsim/effectors/flaps_transit_s</property>
      <property value="0.0">fsim/effectors/neutral</property>
      <property value="0.0">fsim/effectors/pitch</property>
      <property value="1">fsim/effectors/pitch_trim</property>
      <property value="1">fsim/effectors/retractable_gear</property>
      <property value="0.0">fsim/effectors/roll</property>
      <property value="1">fsim/effectors/speedbrake</property>
      <property value="1">fsim/effectors/wheel_brakes</property>
      <property value="0.0">fsim/effectors/yaw</property>
      <property value="1">fsim/envelope/version</property>
      <property value="1">fsim/envelope/provenance</property>
      <property value="12.0585">fsim/envelope/clean/alpha_max_deg</property>
      <property value="83.0027">fsim/envelope/clean/cas_min_ms</property>
      <property value="20.58">fsim/envelope/crosswind_max_ms</property>
      <property value="87.46">fsim/envelope/flaps/cas_max_ms</property>
      <property value="0.833">fsim/envelope/flaps_threshold</property>
      <property value="138.9">fsim/envelope/gear_cas_max_ms</property>
      <property value="7.85">fsim/envelope/ground_pitch_max_deg</property>
      <property value="10.16">fsim/envelope/ground_turn_radius_m</property>
      <property value="0.0452">fsim/envelope/ground_yaw_accel_rad_s2</property>
      <property value="1">fsim/propulsion/version</property>
      <property value="1">fsim/propulsion/provenance</property>
      <property value="0.0">fsim/propulsion/afterburner</property>
      <property value="2">fsim/propulsion/engines</property>
      <property value="0.255785">fsim/propulsion/spool_s</property>
      <property value="2">fsim/propulsion/type</property>
      <property value="1">fsim/plant/version</property>
      <property value="1">fsim/plant/provenance</property>
      <property value="-5.77857">fsim/plant/alpha_zero_lift_deg</property>
      <property value="3000">fsim/plant/altitude_m</property>
      <property value="172.198">fsim/plant/eas_ms</property>
      <property value="0.0773949">fsim/plant/elevator_trim</property>
      <property value="-0.196606">fsim/plant/elevator_trim_lift</property>
      <property value="3.79908">fsim/plant/pitch/gain</property>
      <property value="0.47395">fsim/plant/pitch/tau_s</property>
      <property value="0.900462">fsim/plant/roll/gain</property>
      <property value="0.408021">fsim/plant/roll/tau_s</property>
      <property value="2.55413">fsim/plant/speed/gain</property>
      <property value="0.255785">fsim/plant/speed/tau_s</property>
      <property value="197.319">fsim/plant/tas_ms</property>
      <property value="0.677739">fsim/plant/throttle_trim</property>
      <property value="0.628779">fsim/plant/yaw/gain</property>
      <property value="1">fsim/performance/version</property>
      <property value="1">fsim/performance/provenance</property>
      <property value="8997.3">fsim/performance/ceiling_m</property>
      <property value="291.039">fsim/performance/max_tas_ms</property>
      <property value="83.0027">fsim/performance/stall_cas_ms</property>
      <property value="69.167">fsim/performance/stall_flaps_cas_ms</property>
      <property value="1">fsim/applicability/version</property>
      <property value="1">fsim/applicability/provenance</property>
      <property value="0.0">fsim/applicability/aerobatic</property>
      <property value="1">fsim/applicability/carrier</property>
      <property value="2">fsim/applicability/drag_devices</property>
      <property value="1">fsim/applicability/flaps</property>
      <property value="1">fsim/applicability/ground_contact</property>
      <property value="1">fsim/applicability/releasable_stores</property>
      <property value="1">fsim/applicability/retractable_gear</property>
      <property value="0.0">fsim/applicability/vertical_flight</property>
      <property value="1">fsim/tables/version</property>
      <property value="1">fsim/tables/provenance</property>
      <property value="100">fsim/tables/altitude_m/h0</property>
      <property value="1800">fsim/tables/altitude_m/h1</property>
      <property value="3600">fsim/tables/altitude_m/h2</property>
      <property value="5400">fsim/tables/altitude_m/h3</property>
      <property value="6750">fsim/tables/altitude_m/h4</property>
      <property value="7650">fsim/tables/altitude_m/h5</property>
      <property value="8550">fsim/tables/altitude_m/h6</property>
      <property value="0.90343">fsim/tables/best_endurance_fuel_kg_s/h0/w0</property>
      <property value="1.1983">fsim/tables/best_endurance_fuel_kg_s/h0/w1</property>
      <property value="1.47127">fsim/tables/best_endurance_fuel_kg_s/h0/w2</property>
      <property value="0.838352">fsim/tables/best_endurance_fuel_kg_s/h1/w0</property>
      <property value="1.11384">fsim/tables/best_endurance_fuel_kg_s/h1/w1</property>
      <property value="1.37084">fsim/tables/best_endurance_fuel_kg_s/h1/w2</property>
      <property value="0.769046">fsim/tables/best_endurance_fuel_kg_s/h2/w0</property>
      <property value="1.02764">fsim/tables/best_endurance_fuel_kg_s/h2/w1</property>
      <property value="1.26933">fsim/tables/best_endurance_fuel_kg_s/h2/w2</property>
      <property value="0.707302">fsim/tables/best_endurance_fuel_kg_s/h3/w0</property>
      <property value="0.947014">fsim/tables/best_endurance_fuel_kg_s/h3/w1</property>
      <property value="1.18048">fsim/tables/best_endurance_fuel_kg_s/h3/w2</property>
      <property value="0.662353">fsim/tables/best_endurance_fuel_kg_s/h4/w0</property>
      <property value="0.890079">fsim/tables/best_endurance_fuel_kg_s/h4/w1</property>
      <property value="1.1258">fsim/tables/best_endurance_fuel_kg_s/h4/w2</property>
      <property value="0.633258">fsim/tables/best_endurance_fuel_kg_s/h5/w0</property>
      <property value="0.85634">fsim/tables/best_endurance_fuel_kg_s/h5/w1</property>
      <property value="1.09461">fsim/tables/best_endurance_fuel_kg_s/h5/w2</property>
      <property value="0.606133">fsim/tables/best_endurance_fuel_kg_s/h6/w0</property>
      <property value="0.825055">fsim/tables/best_endurance_fuel_kg_s/h6/w1</property>
      <property value="1.07532">fsim/tables/best_endurance_fuel_kg_s/h6/w2</property>
      <property value="96.7804">fsim/tables/best_endurance_tas_ms/h0/w0</property>
      <property value="126.665">fsim/tables/best_endurance_tas_ms/h0/w1</property>
      <property value="145.83">fsim/tables/best_endurance_tas_ms/h0/w2</property>
      <property value="112.934">fsim/tables/best_endurance_tas_ms/h1/w0</property>
      <property value="135.608">fsim/tables/best_endurance_tas_ms/h1/w1</property>
      <property value="158.424">fsim/tables/best_endurance_tas_ms/h1/w2</property>
      <property value="123.907">fsim/tables/best_endurance_tas_ms/h2/w0</property>
      <property value="148.211">fsim/tables/best_endurance_tas_ms/h2/w1</property>
      <property value="173.285">fsim/tables/best_endurance_tas_ms/h2/w2</property>
      <property value="134.163">fsim/tables/best_endurance_tas_ms/h3/w0</property>
      <property value="162.87">fsim/tables/best_endurance_tas_ms/h3/w1</property>
      <property value="188.962">fsim/tables/best_endurance_tas_ms/h3/w2</property>
      <property value="144.252">fsim/tables/best_endurance_tas_ms/h4/w0</property>
      <property value="174.435">fsim/tables/best_endurance_tas_ms/h4/w1</property>
      <property value="203.148">fsim/tables/best_endurance_tas_ms/h4/w2</property>
      <property value="152.081">fsim/tables/best_endurance_tas_ms/h5/w0</property>
      <property value="183.806">fsim/tables/best_endurance_tas_ms/h5/w1</property>
      <property value="212.083">fsim/tables/best_endurance_tas_ms/h5/w2</property>
      <property value="160.001">fsim/tables/best_endurance_tas_ms/h6/w0</property>
      <property value="193.557">fsim/tables/best_endurance_tas_ms/h6/w1</property>
      <property value="219.792">fsim/tables/best_endurance_tas_ms/h6/w2</property>
      <property value="1.12658">fsim/tables/best_range_fuel_kg_s/h0/w0</property>
      <property value="1.49936">fsim/tables/best_range_fuel_kg_s/h0/w1</property>
      <property value="1.83509">fsim/tables/best_range_fuel_kg_s/h0/w2</property>
      <property value="1.04949">fsim/tables/best_range_fuel_kg_s/h1/w0</property>
      <property value="1.38235">fsim/tables/best_range_fuel_kg_s/h1/w1</property>
      <property value="1.67506">fsim/tables/best_range_fuel_kg_s/h1/w2</property>
      <property value="0.957215">fsim/tables/best_range_fuel_kg_s/h2/w0</property>
      <property value="1.26585">fsim/tables/best_range_fuel_kg_s/h2/w1</property>
      <property value="1.47991">fsim/tables/best_range_fuel_kg_s/h2/w2</property>
      <property value="0.862943">fsim/tables/best_range_fuel_kg_s/h3/w0</property>
      <property value="1.11779">fsim/tables/best_range_fuel_kg_s/h3/w1</property>
      <property value="1.30785">fsim/tables/best_range_fuel_kg_s/h3/w2</property>
      <property value="0.80717">fsim/tables/best_range_fuel_kg_s/h4/w0</property>
      <property value="0.990374">fsim/tables/best_range_fuel_kg_s/h4/w1</property>
      <property value="1.22338">fsim/tables/best_range_fuel_kg_s/h4/w2</property>
      <property value="0.75544">fsim/tables/best_range_fuel_kg_s/h5/w0</property>
      <property value="0.946942">fsim/tables/best_range_fuel_kg_s/h5/w1</property>
      <property value="1.16221">fsim/tables/best_range_fuel_kg_s/h5/w2</property>
      <property value="0.70363">fsim/tables/best_range_fuel_kg_s/h6/w0</property>
      <property value="0.908005">fsim/tables/best_range_fuel_kg_s/h6/w1</property>
      <property value="1.10246">fsim/tables/best_range_fuel_kg_s/h6/w2</property>
      <property value="155.312">fsim/tables/best_range_tas_ms/h0/w0</property>
      <property value="188.944">fsim/tables/best_range_tas_ms/h0/w1</property>
      <property value="216.656">fsim/tables/best_range_tas_ms/h0/w2</property>
      <property value="168.645">fsim/tables/best_range_tas_ms/h1/w0</property>
      <property value="202.05">fsim/tables/best_range_tas_ms/h1/w1</property>
      <property value="227.461">fsim/tables/best_range_tas_ms/h1/w2</property>
      <property value="182.785">fsim/tables/best_range_tas_ms/h2/w0</property>
      <property value="217.018">fsim/tables/best_range_tas_ms/h2/w1</property>
      <property value="231.413">fsim/tables/best_range_tas_ms/h2/w2</property>
      <property value="196.333">fsim/tables/best_range_tas_ms/h3/w0</property>
      <property value="225.375">fsim/tables/best_range_tas_ms/h3/w1</property>
      <property value="236.295">fsim/tables/best_range_tas_ms/h3/w2</property>
      <property value="210.028">fsim/tables/best_range_tas_ms/h4/w0</property>
      <property value="224.334">fsim/tables/best_range_tas_ms/h4/w1</property>
      <property value="244.496">fsim/tables/best_range_tas_ms/h4/w2</property>
      <property value="214.631">fsim/tables/best_range_tas_ms/h5/w0</property>
      <property value="230.807">fsim/tables/best_range_tas_ms/h5/w1</property>
      <property value="245.112">fsim/tables/best_range_tas_ms/h5/w2</property>
      <property value="217.824">fsim/tables/best_range_tas_ms/h6/w0</property>
      <property value="237.741">fsim/tables/best_range_tas_ms/h6/w1</property>
      <property value="243.082">fsim/tables/best_range_tas_ms/h6/w2</property>
      <property value="196.122">fsim/tables/climb_tas_ms/h0/w0</property>
      <property value="199.531">fsim/tables/climb_tas_ms/h0/w1</property>
      <property value="203.169">fsim/tables/climb_tas_ms/h0/w2</property>
      <property value="210.351">fsim/tables/climb_tas_ms/h1/w0</property>
      <property value="209.37">fsim/tables/climb_tas_ms/h1/w1</property>
      <property value="219.899">fsim/tables/climb_tas_ms/h1/w2</property>
      <property value="230.35">fsim/tables/climb_tas_ms/h2/w0</property>
      <property value="228.989">fsim/tables/climb_tas_ms/h2/w1</property>
      <property value="235.769">fsim/tables/climb_tas_ms/h2/w2</property>
      <property value="225.116">fsim/tables/climb_tas_ms/h3/w0</property>
      <property value="232.754">fsim/tables/climb_tas_ms/h3/w1</property>
      <property value="231.12">fsim/tables/climb_tas_ms/h3/w2</property>
      <property value="220.333">fsim/tables/climb_tas_ms/h4/w0</property>
      <property value="220.58">fsim/tables/climb_tas_ms/h4/w1</property>
      <property value="233.657">fsim/tables/climb_tas_ms/h4/w2</property>
      <property value="219.84">fsim/tables/climb_tas_ms/h5/w0</property>
      <property value="226.183">fsim/tables/climb_tas_ms/h5/w1</property>
      <property value="229.928">fsim/tables/climb_tas_ms/h5/w2</property>
      <property value="221.888">fsim/tables/climb_tas_ms/h6/w0</property>
      <property value="232.544">fsim/tables/climb_tas_ms/h6/w1</property>
      <property value="239.356">fsim/tables/climb_tas_ms/h6/w2</property>
      <property value="96297">fsim/tables/fuel_capacity_kg</property>
      <property value="0.90343">fsim/tables/fuel_kg_s/h0/w0/v0</property>
      <property value="0.903883">fsim/tables/fuel_kg_s/h0/w0/v1</property>
      <property value="1.72748">fsim/tables/fuel_kg_s/h0/w0/v10</property>
      <property value="1.85748">fsim/tables/fuel_kg_s/h0/w0/v11</property>
      <property value="2.00457">fsim/tables/fuel_kg_s/h0/w0/v12</property>
      <property value="2.16667">fsim/tables/fuel_kg_s/h0/w0/v13</property>
      <property value="2.34005">fsim/tables/fuel_kg_s/h0/w0/v14</property>
      <property value="2.744">fsim/tables/fuel_kg_s/h0/w0/v15</property>
      <property value="0.935946">fsim/tables/fuel_kg_s/h0/w0/v2</property>
      <property value="0.989921">fsim/tables/fuel_kg_s/h0/w0/v3</property>
      <property value="1.06559">fsim/tables/fuel_kg_s/h0/w0/v4</property>
      <property value="1.15278">fsim/tables/fuel_kg_s/h0/w0/v5</property>
      <property value="1.25774">fsim/tables/fuel_kg_s/h0/w0/v6</property>
      <property value="1.3651">fsim/tables/fuel_kg_s/h0/w0/v7</property>
      <property value="1.47543">fsim/tables/fuel_kg_s/h0/w0/v8</property>
      <property value="1.60105">fsim/tables/fuel_kg_s/h0/w0/v9</property>
      <property value="1.27328">fsim/tables/fuel_kg_s/h0/w1/v0</property>
      <property value="1.2132">fsim/tables/fuel_kg_s/h0/w1/v1</property>
      <property value="1.80124">fsim/tables/fuel_kg_s/h0/w1/v10</property>
      <property value="1.91148">fsim/tables/fuel_kg_s/h0/w1/v11</property>
      <property value="2.05373">fsim/tables/fuel_kg_s/h0/w1/v12</property>
      <property value="2.21246">fsim/tables/fuel_kg_s/h0/w1/v13</property>
      <property value="2.38253">fsim/tables/fuel_kg_s/h0/w1/v14</property>
      <property value="2.77475">fsim/tables/fuel_kg_s/h0/w1/v15</property>
      <property value="1.19842">fsim/tables/fuel_kg_s/h0/w1/v2</property>
      <property value="1.2189">fsim/tables/fuel_kg_s/h0/w1/v3</property>
      <property value="1.26573">fsim/tables/fuel_kg_s/h0/w1/v4</property>
      <property value="1.32611">fsim/tables/fuel_kg_s/h0/w1/v5</property>
      <property value="1.40467">fsim/tables/fuel_kg_s/h0/w1/v6</property>
      <property value="1.48596">fsim/tables/fuel_kg_s/h0/w1/v7</property>
      <property value="1.58975">fsim/tables/fuel_kg_s/h0/w1/v8</property>
      <property value="1.69456">fsim/tables/fuel_kg_s/h0/w1/v9</property>
      <property value="1.64164">fsim/tables/fuel_kg_s/h0/w2/v0</property>
      <property value="1.54626">fsim/tables/fuel_kg_s/h0/w2/v1</property>
      <property value="1.91501">fsim/tables/fuel_kg_s/h0/w2/v10</property>
      <property value="2.02171">fsim/tables/fuel_kg_s/h0/w2/v11</property>
      <property value="2.14987">fsim/tables/fuel_kg_s/h0/w2/v12</property>
      <property value="2.28823">fsim/tables/fuel_kg_s/h0/w2/v13</property>
      <property value="2.43869">fsim/tables/fuel_kg_s/h0/w2/v14</property>
      <property value="2.81655">fsim/tables/fuel_kg_s/h0/w2/v15</property>
      <property value="1.49196">fsim/tables/fuel_kg_s/h0/w2/v2</property>
      <property value="1.47128">fsim/tables/fuel_kg_s/h0/w2/v3</property>
      <property value="1.49007">fsim/tables/fuel_kg_s/h0/w2/v4</property>
      <property value="1.52808">fsim/tables/fuel_kg_s/h0/w2/v5</property>
      <property value="1.57957">fsim/tables/fuel_kg_s/h0/w2/v6</property>
      <property value="1.65133">fsim/tables/fuel_kg_s/h0/w2/v7</property>
      <property value="1.73145">fsim/tables/fuel_kg_s/h0/w2/v8</property>
      <property value="1.81154">fsim/tables/fuel_kg_s/h0/w2/v9</property>
      <property value="0.860265">fsim/tables/fuel_kg_s/h1/w0/v0</property>
      <property value="0.839135">fsim/tables/fuel_kg_s/h1/w0/v1</property>
      <property value="1.43261">fsim/tables/fuel_kg_s/h1/w0/v10</property>
      <property value="1.54227">fsim/tables/fuel_kg_s/h1/w0/v11</property>
      <property value="1.66918">fsim/tables/fuel_kg_s/h1/w0/v12</property>
      <property value="1.80479">fsim/tables/fuel_kg_s/h1/w0/v13</property>
      <property value="1.97198">fsim/tables/fuel_kg_s/h1/w0/v14</property>
      <property value="2.31149">fsim/tables/fuel_kg_s/h1/w0/v15</property>
      <property value="0.846822">fsim/tables/fuel_kg_s/h1/w0/v2</property>
      <property value="0.878265">fsim/tables/fuel_kg_s/h1/w0/v3</property>
      <property value="0.927824">fsim/tables/fuel_kg_s/h1/w0/v4</property>
      <property value="0.991222">fsim/tables/fuel_kg_s/h1/w0/v5</property>
      <property value="1.06341">fsim/tables/fuel_kg_s/h1/w0/v6</property>
      <property value="1.14845">fsim/tables/fuel_kg_s/h1/w0/v7</property>
      <property value="1.23828">fsim/tables/fuel_kg_s/h1/w0/v8</property>
      <property value="1.3304">fsim/tables/fuel_kg_s/h1/w0/v9</property>
      <property value="1.21939">fsim/tables/fuel_kg_s/h1/w1/v0</property>
      <property value="1.15073">fsim/tables/fuel_kg_s/h1/w1/v1</property>
      <property value="1.53599">fsim/tables/fuel_kg_s/h1/w1/v10</property>
      <property value="1.62894">fsim/tables/fuel_kg_s/h1/w1/v11</property>
      <property value="1.74054">fsim/tables/fuel_kg_s/h1/w1/v12</property>
      <property value="1.86112">fsim/tables/fuel_kg_s/h1/w1/v13</property>
      <property value="2.02344">fsim/tables/fuel_kg_s/h1/w1/v14</property>
      <property value="2.34657">fsim/tables/fuel_kg_s/h1/w1/v15</property>
      <property value="1.11738">fsim/tables/fuel_kg_s/h1/w1/v2</property>
      <property value="1.11916">fsim/tables/fuel_kg_s/h1/w1/v3</property>
      <property value="1.13894">fsim/tables/fuel_kg_s/h1/w1/v4</property>
      <property value="1.18137">fsim/tables/fuel_kg_s/h1/w1/v5</property>
      <property value="1.23152">fsim/tables/fuel_kg_s/h1/w1/v6</property>
      <property value="1.29656">fsim/tables/fuel_kg_s/h1/w1/v7</property>
      <property value="1.36319">fsim/tables/fuel_kg_s/h1/w1/v8</property>
      <property value="1.44672">fsim/tables/fuel_kg_s/h1/w1/v9</property>
      <property value="1.56776">fsim/tables/fuel_kg_s/h1/w2/v0</property>
      <property value="1.47129">fsim/tables/fuel_kg_s/h1/w2/v1</property>
      <property value="1.6572">fsim/tables/fuel_kg_s/h1/w2/v10</property>
      <property value="1.74203">fsim/tables/fuel_kg_s/h1/w2/v11</property>
      <property value="1.84925">fsim/tables/fuel_kg_s/h1/w2/v12</property>
      <property value="1.96251">fsim/tables/fuel_kg_s/h1/w2/v13</property>
      <property value="2.10695">fsim/tables/fuel_kg_s/h1/w2/v14</property>
      <property value="2.39965">fsim/tables/fuel_kg_s/h1/w2/v15</property>
      <property value="1.41108">fsim/tables/fuel_kg_s/h1/w2/v2</property>
      <property value="1.38116">fsim/tables/fuel_kg_s/h1/w2/v3</property>
      <property value="1.37127">fsim/tables/fuel_kg_s/h1/w2/v4</property>
      <property value="1.39135">fsim/tables/fuel_kg_s/h1/w2/v5</property>
      <property value="1.42402">fsim/tables/fuel_kg_s/h1/w2/v6</property>
      <property value="1.46657">fsim/tables/fuel_kg_s/h1/w2/v7</property>
      <property value="1.52282">fsim/tables/fuel_kg_s/h1/w2/v8</property>
      <property value="1.58921">fsim/tables/fuel_kg_s/h1/w2/v9</property>
      <property value="0.814978">fsim/tables/fuel_kg_s/h2/w0/v0</property>
      <property value="0.77995">fsim/tables/fuel_kg_s/h2/w0/v1</property>
      <property value="1.17574">fsim/tables/fuel_kg_s/h2/w0/v10</property>
      <property value="1.25625">fsim/tables/fuel_kg_s/h2/w0/v11</property>
      <property value="1.36148">fsim/tables/fuel_kg_s/h2/w0/v12</property>
      <property value="1.47264">fsim/tables/fuel_kg_s/h2/w0/v13</property>
      <property value="1.63421">fsim/tables/fuel_kg_s/h2/w0/v14</property>
      <property value="1.9031">fsim/tables/fuel_kg_s/h2/w0/v15</property>
      <property value="0.76905">fsim/tables/fuel_kg_s/h2/w0/v2</property>
      <property value="0.780837">fsim/tables/fuel_kg_s/h2/w0/v3</property>
      <property value="0.810563">fsim/tables/fuel_kg_s/h2/w0/v4</property>
      <property value="0.850935">fsim/tables/fuel_kg_s/h2/w0/v5</property>
      <property value="0.902317">fsim/tables/fuel_kg_s/h2/w0/v6</property>
      <property value="0.957572">fsim/tables/fuel_kg_s/h2/w0/v7</property>
      <property value="1.02636">fsim/tables/fuel_kg_s/h2/w0/v8</property>
      <property value="1.09961">fsim/tables/fuel_kg_s/h2/w0/v9</property>
      <property value="1.15273">fsim/tables/fuel_kg_s/h2/w1/v0</property>
      <property value="1.08407">fsim/tables/fuel_kg_s/h2/w1/v1</property>
      <property value="1.29227">fsim/tables/fuel_kg_s/h2/w1/v10</property>
      <property value="1.37118">fsim/tables/fuel_kg_s/h2/w1/v11</property>
      <property value="1.46097">fsim/tables/fuel_kg_s/h2/w1/v12</property>
      <property value="1.55562">fsim/tables/fuel_kg_s/h2/w1/v13</property>
      <property value="1.70038">fsim/tables/fuel_kg_s/h2/w1/v14</property>
      <property value="1.94122">fsim/tables/fuel_kg_s/h2/w1/v15</property>
      <property value="1.04432">fsim/tables/fuel_kg_s/h2/w1/v2</property>
      <property value="1.02831">fsim/tables/fuel_kg_s/h2/w1/v3</property>
      <property value="1.03363">fsim/tables/fuel_kg_s/h2/w1/v4</property>
      <property value="1.0497">fsim/tables/fuel_kg_s/h2/w1/v5</property>
      <property value="1.0837">fsim/tables/fuel_kg_s/h2/w1/v6</property>
      <property value="1.12065">fsim/tables/fuel_kg_s/h2/w1/v7</property>
      <property value="1.17396">fsim/tables/fuel_kg_s/h2/w1/v8</property>
      <property value="1.22998">fsim/tables/fuel_kg_s/h2/w1/v9</property>
      <property value="1.48806">fsim/tables/fuel_kg_s/h2/w2/v0</property>
      <property value="1.39159">fsim/tables/fuel_kg_s/h2/w2/v1</property>
      <property value="1.43852">fsim/tables/fuel_kg_s/h2/w2/v10</property>
      <property value="1.50171">fsim/tables/fuel_kg_s/h2/w2/v11</property>
      <property value="1.57135">fsim/tables/fuel_kg_s/h2/w2/v12</property>
      <property value="1.65683">fsim/tables/fuel_kg_s/h2/w2/v13</property>
      <property value="1.79358">fsim/tables/fuel_kg_s/h2/w2/v14</property>
      <property value="2.01567">fsim/tables/fuel_kg_s/h2/w2/v15</property>
      <property value="1.3352">fsim/tables/fuel_kg_s/h2/w2/v2</property>
      <property value="1.29861">fsim/tables/fuel_kg_s/h2/w2/v3</property>
      <property value="1.27836">fsim/tables/fuel_kg_s/h2/w2/v4</property>
      <property value="1.26957">fsim/tables/fuel_kg_s/h2/w2/v5</property>
      <property value="1.28529">fsim/tables/fuel_kg_s/h2/w2/v6</property>
      <property value="1.3081">fsim/tables/fuel_kg_s/h2/w2/v7</property>
      <property value="1.34417">fsim/tables/fuel_kg_s/h2/w2/v8</property>
      <property value="1.38307">fsim/tables/fuel_kg_s/h2/w2/v9</property>
      <property value="0.771104">fsim/tables/fuel_kg_s/h3/w0/v0</property>
      <property value="0.72884">fsim/tables/fuel_kg_s/h3/w0/v1</property>
      <property value="0.959999">fsim/tables/fuel_kg_s/h3/w0/v10</property>
      <property value="1.02206">fsim/tables/fuel_kg_s/h3/w0/v11</property>
      <property value="1.0934">fsim/tables/fuel_kg_s/h3/w0/v12</property>
      <property value="1.16886">fsim/tables/fuel_kg_s/h3/w0/v13</property>
      <property value="1.30163">fsim/tables/fuel_kg_s/h3/w0/v14</property>
      <property value="1.51391">fsim/tables/fuel_kg_s/h3/w0/v15</property>
      <property value="0.709317">fsim/tables/fuel_kg_s/h3/w0/v2</property>
      <property value="0.708202">fsim/tables/fuel_kg_s/h3/w0/v3</property>
      <property value="0.718305">fsim/tables/fuel_kg_s/h3/w0/v4</property>
      <property value="0.741783">fsim/tables/fuel_kg_s/h3/w0/v5</property>
      <property value="0.770642">fsim/tables/fuel_kg_s/h3/w0/v6</property>
      <property value="0.810213">fsim/tables/fuel_kg_s/h3/w0/v7</property>
      <property value="0.851369">fsim/tables/fuel_kg_s/h3/w0/v8</property>
      <property value="0.903049">fsim/tables/fuel_kg_s/h3/w0/v9</property>
      <property value="1.08625">fsim/tables/fuel_kg_s/h3/w1/v0</property>
      <property value="1.02499">fsim/tables/fuel_kg_s/h3/w1/v1</property>
      <property value="1.09211">fsim/tables/fuel_kg_s/h3/w1/v10</property>
      <property value="1.14145">fsim/tables/fuel_kg_s/h3/w1/v11</property>
      <property value="1.20041">fsim/tables/fuel_kg_s/h3/w1/v12</property>
      <property value="1.27016">fsim/tables/fuel_kg_s/h3/w1/v13</property>
      <property value="1.38802">fsim/tables/fuel_kg_s/h3/w1/v14</property>
      <property value="1.56719">fsim/tables/fuel_kg_s/h3/w1/v15</property>
      <property value="0.983383">fsim/tables/fuel_kg_s/h3/w1/v2</property>
      <property value="0.95769">fsim/tables/fuel_kg_s/h3/w1/v3</property>
      <property value="0.947468">fsim/tables/fuel_kg_s/h3/w1/v4</property>
      <property value="0.950701">fsim/tables/fuel_kg_s/h3/w1/v5</property>
      <property value="0.96167">fsim/tables/fuel_kg_s/h3/w1/v6</property>
      <property value="0.985181">fsim/tables/fuel_kg_s/h3/w1/v7</property>
      <property value="1.01237">fsim/tables/fuel_kg_s/h3/w1/v8</property>
      <property value="1.04936">fsim/tables/fuel_kg_s/h3/w1/v9</property>
      <property value="1.41851">fsim/tables/fuel_kg_s/h3/w2/v0</property>
      <property value="1.33444">fsim/tables/fuel_kg_s/h3/w2/v1</property>
      <property value="1.25077">fsim/tables/fuel_kg_s/h3/w2/v10</property>
      <property value="1.28757">fsim/tables/fuel_kg_s/h3/w2/v11</property>
      <property value="1.33863">fsim/tables/fuel_kg_s/h3/w2/v12</property>
      <property value="1.39189">fsim/tables/fuel_kg_s/h3/w2/v13</property>
      <property value="1.48732">fsim/tables/fuel_kg_s/h3/w2/v14</property>
      <property value="1.63977">fsim/tables/fuel_kg_s/h3/w2/v15</property>
      <property value="1.27492">fsim/tables/fuel_kg_s/h3/w2/v2</property>
      <property value="1.23405">fsim/tables/fuel_kg_s/h3/w2/v3</property>
      <property value="1.20646">fsim/tables/fuel_kg_s/h3/w2/v4</property>
      <property value="1.18926">fsim/tables/fuel_kg_s/h3/w2/v5</property>
      <property value="1.18056">fsim/tables/fuel_kg_s/h3/w2/v6</property>
      <property value="1.18616">fsim/tables/fuel_kg_s/h3/w2/v7</property>
      <property value="1.19793">fsim/tables/fuel_kg_s/h3/w2/v8</property>
      <property value="1.22311">fsim/tables/fuel_kg_s/h3/w2/v9</property>
      <property value="0.73476">fsim/tables/fuel_kg_s/h4/w0/v0</property>
      <property value="0.693129">fsim/tables/fuel_kg_s/h4/w0/v1</property>
      <property value="0.824009">fsim/tables/fuel_kg_s/h4/w0/v10</property>
      <property value="0.874444">fsim/tables/fuel_kg_s/h4/w0/v11</property>
      <property value="0.930857">fsim/tables/fuel_kg_s/h4/w0/v12</property>
      <property value="0.990398">fsim/tables/fuel_kg_s/h4/w0/v13</property>
      <property value="1.09536">fsim/tables/fuel_kg_s/h4/w0/v14</property>
      <property value="1.26372">fsim/tables/fuel_kg_s/h4/w0/v15</property>
      <property value="0.671002">fsim/tables/fuel_kg_s/h4/w0/v2</property>
      <property value="0.662731">fsim/tables/fuel_kg_s/h4/w0/v3</property>
      <property value="0.665283">fsim/tables/fuel_kg_s/h4/w0/v4</property>
      <property value="0.674908">fsim/tables/fuel_kg_s/h4/w0/v5</property>
      <property value="0.693826">fsim/tables/fuel_kg_s/h4/w0/v6</property>
      <property value="0.717002">fsim/tables/fuel_kg_s/h4/w0/v7</property>
      <property value="0.750007">fsim/tables/fuel_kg_s/h4/w0/v8</property>
      <property value="0.784671">fsim/tables/fuel_kg_s/h4/w0/v9</property>
      <property value="1.041">fsim/tables/fuel_kg_s/h4/w1/v0</property>
      <property value="0.983953">fsim/tables/fuel_kg_s/h4/w1/v1</property>
      <property value="0.96713">fsim/tables/fuel_kg_s/h4/w1/v10</property>
      <property value="1.00748">fsim/tables/fuel_kg_s/h4/w1/v11</property>
      <property value="1.04987">fsim/tables/fuel_kg_s/h4/w1/v12</property>
      <property value="1.09432">fsim/tables/fuel_kg_s/h4/w1/v13</property>
      <property value="1.18523">fsim/tables/fuel_kg_s/h4/w1/v14</property>
      <property value="1.32465">fsim/tables/fuel_kg_s/h4/w1/v15</property>
      <property value="0.943263">fsim/tables/fuel_kg_s/h4/w1/v2</property>
      <property value="0.914974">fsim/tables/fuel_kg_s/h4/w1/v3</property>
      <property value="0.896013">fsim/tables/fuel_kg_s/h4/w1/v4</property>
      <property value="0.890165">fsim/tables/fuel_kg_s/h4/w1/v5</property>
      <property value="0.893502">fsim/tables/fuel_kg_s/h4/w1/v6</property>
      <property value="0.902402">fsim/tables/fuel_kg_s/h4/w1/v7</property>
      <property value="0.920634">fsim/tables/fuel_kg_s/h4/w1/v8</property>
      <property value="0.942601">fsim/tables/fuel_kg_s/h4/w1/v9</property>
      <property value="1.39335">fsim/tables/fuel_kg_s/h4/w2/v0</property>
      <property value="1.30573">fsim/tables/fuel_kg_s/h4/w2/v1</property>
      <property value="1.14658">fsim/tables/fuel_kg_s/h4/w2/v10</property>
      <property value="1.17341">fsim/tables/fuel_kg_s/h4/w2/v11</property>
      <property value="1.20103">fsim/tables/fuel_kg_s/h4/w2/v12</property>
      <property value="1.23224">fsim/tables/fuel_kg_s/h4/w2/v13</property>
      <property value="1.30598">fsim/tables/fuel_kg_s/h4/w2/v14</property>
      <property value="1.41885">fsim/tables/fuel_kg_s/h4/w2/v15</property>
      <property value="1.24477">fsim/tables/fuel_kg_s/h4/w2/v2</property>
      <property value="1.20098">fsim/tables/fuel_kg_s/h4/w2/v3</property>
      <property value="1.16889">fsim/tables/fuel_kg_s/h4/w2/v4</property>
      <property value="1.14866">fsim/tables/fuel_kg_s/h4/w2/v5</property>
      <property value="1.13392">fsim/tables/fuel_kg_s/h4/w2/v6</property>
      <property value="1.12668">fsim/tables/fuel_kg_s/h4/w2/v7</property>
      <property value="1.12649">fsim/tables/fuel_kg_s/h4/w2/v8</property>
      <property value="1.13258">fsim/tables/fuel_kg_s/h4/w2/v9</property>
      <property value="0.710605">fsim/tables/fuel_kg_s/h5/w0/v0</property>
      <property value="0.671698">fsim/tables/fuel_kg_s/h5/w0/v1</property>
      <property value="0.751284">fsim/tables/fuel_kg_s/h5/w0/v10</property>
      <property value="0.789574">fsim/tables/fuel_kg_s/h5/w0/v11</property>
      <property value="0.837339">fsim/tables/fuel_kg_s/h5/w0/v12</property>
      <property value="0.887635">fsim/tables/fuel_kg_s/h5/w0/v13</property>
      <property value="0.978681">fsim/tables/fuel_kg_s/h5/w0/v14</property>
      <property value="1.11465">fsim/tables/fuel_kg_s/h5/w0/v15</property>
      <property value="0.648118">fsim/tables/fuel_kg_s/h5/w0/v2</property>
      <property value="0.636517">fsim/tables/fuel_kg_s/h5/w0/v3</property>
      <property value="0.633422">fsim/tables/fuel_kg_s/h5/w0/v4</property>
      <property value="0.64009">fsim/tables/fuel_kg_s/h5/w0/v5</property>
      <property value="0.651074">fsim/tables/fuel_kg_s/h5/w0/v6</property>
      <property value="0.668438">fsim/tables/fuel_kg_s/h5/w0/v7</property>
      <property value="0.691601">fsim/tables/fuel_kg_s/h5/w0/v8</property>
      <property value="0.721015">fsim/tables/fuel_kg_s/h5/w0/v9</property>
      <property value="1.01663">fsim/tables/fuel_kg_s/h5/w1/v0</property>
      <property value="0.962295">fsim/tables/fuel_kg_s/h5/w1/v1</property>
      <property value="0.906314">fsim/tables/fuel_kg_s/h5/w1/v10</property>
      <property value="0.930696">fsim/tables/fuel_kg_s/h5/w1/v11</property>
      <property value="0.966314">fsim/tables/fuel_kg_s/h5/w1/v12</property>
      <property value="1.00347">fsim/tables/fuel_kg_s/h5/w1/v13</property>
      <property value="1.07527">fsim/tables/fuel_kg_s/h5/w1/v14</property>
      <property value="1.1817">fsim/tables/fuel_kg_s/h5/w1/v15</property>
      <property value="0.923823">fsim/tables/fuel_kg_s/h5/w1/v2</property>
      <property value="0.894432">fsim/tables/fuel_kg_s/h5/w1/v3</property>
      <property value="0.874503">fsim/tables/fuel_kg_s/h5/w1/v4</property>
      <property value="0.861651">fsim/tables/fuel_kg_s/h5/w1/v5</property>
      <property value="0.856348">fsim/tables/fuel_kg_s/h5/w1/v6</property>
      <property value="0.862509">fsim/tables/fuel_kg_s/h5/w1/v7</property>
      <property value="0.870193">fsim/tables/fuel_kg_s/h5/w1/v8</property>
      <property value="0.886758">fsim/tables/fuel_kg_s/h5/w1/v9</property>
      <property value="1.20393">fsim/tables/fuel_kg_s/h5/w2/v0</property>
      <property value="1.17327">fsim/tables/fuel_kg_s/h5/w2/v1</property>
      <property value="1.11064">fsim/tables/fuel_kg_s/h5/w2/v10</property>
      <property value="1.128">fsim/tables/fuel_kg_s/h5/w2/v11</property>
      <property value="1.14722">fsim/tables/fuel_kg_s/h5/w2/v12</property>
      <property value="1.16687">fsim/tables/fuel_kg_s/h5/w2/v13</property>
      <property value="1.21944">fsim/tables/fuel_kg_s/h5/w2/v14</property>
      <property value="1.29086">fsim/tables/fuel_kg_s/h5/w2/v15</property>
      <property value="1.14958">fsim/tables/fuel_kg_s/h5/w2/v2</property>
      <property value="1.13134">fsim/tables/fuel_kg_s/h5/w2/v3</property>
      <property value="1.11651">fsim/tables/fuel_kg_s/h5/w2/v4</property>
      <property value="1.10671">fsim/tables/fuel_kg_s/h5/w2/v5</property>
      <property value="1.10113">fsim/tables/fuel_kg_s/h5/w2/v6</property>
      <property value="1.09474">fsim/tables/fuel_kg_s/h5/w2/v7</property>
      <property value="1.09798">fsim/tables/fuel_kg_s/h5/w2/v8</property>
      <property value="1.10349">fsim/tables/fuel_kg_s/h5/w2/v9</property>
      <property value="0.685032">fsim/tables/fuel_kg_s/h6/w0/v0</property>
      <property value="0.651206">fsim/tables/fuel_kg_s/h6/w0/v1</property>
      <property value="0.68607">fsim/tables/fuel_kg_s/h6/w0/v10</property>
      <property value="0.716084">fsim/tables/fuel_kg_s/h6/w0/v11</property>
      <property value="0.749907">fsim/tables/fuel_kg_s/h6/w0/v12</property>
      <property value="0.791849">fsim/tables/fuel_kg_s/h6/w0/v13</property>
      <property value="0.867038">fsim/tables/fuel_kg_s/h6/w0/v14</property>
      <property value="0.97671">fsim/tables/fuel_kg_s/h6/w0/v15</property>
      <property value="0.626063">fsim/tables/fuel_kg_s/h6/w0/v2</property>
      <property value="0.612206">fsim/tables/fuel_kg_s/h6/w0/v3</property>
      <property value="0.606673">fsim/tables/fuel_kg_s/h6/w0/v4</property>
      <property value="0.607124">fsim/tables/fuel_kg_s/h6/w0/v5</property>
      <property value="0.612492">fsim/tables/fuel_kg_s/h6/w0/v6</property>
      <property value="0.624205">fsim/tables/fuel_kg_s/h6/w0/v7</property>
      <property value="0.639962">fsim/tables/fuel_kg_s/h6/w0/v8</property>
      <property value="0.660752">fsim/tables/fuel_kg_s/h6/w0/v9</property>
      <property value="0.996818">fsim/tables/fuel_kg_s/h6/w1/v0</property>
      <property value="0.943809">fsim/tables/fuel_kg_s/h6/w1/v1</property>
      <property value="0.85147">fsim/tables/fuel_kg_s/h6/w1/v10</property>
      <property value="0.871248">fsim/tables/fuel_kg_s/h6/w1/v11</property>
      <property value="0.89171">fsim/tables/fuel_kg_s/h6/w1/v12</property>
      <property value="0.919128">fsim/tables/fuel_kg_s/h6/w1/v13</property>
      <property value="0.975758">fsim/tables/fuel_kg_s/h6/w1/v14</property>
      <property value="1.06132">fsim/tables/fuel_kg_s/h6/w1/v15</property>
      <property value="0.907321">fsim/tables/fuel_kg_s/h6/w1/v2</property>
      <property value="0.877303">fsim/tables/fuel_kg_s/h6/w1/v3</property>
      <property value="0.854241">fsim/tables/fuel_kg_s/h6/w1/v4</property>
      <property value="0.839024">fsim/tables/fuel_kg_s/h6/w1/v5</property>
      <property value="0.830556">fsim/tables/fuel_kg_s/h6/w1/v6</property>
      <property value="0.825061">fsim/tables/fuel_kg_s/h6/w1/v7</property>
      <property value="0.831327">fsim/tables/fuel_kg_s/h6/w1/v8</property>
      <property value="0.837508">fsim/tables/fuel_kg_s/h6/w1/v9</property>
      <property value="1.1097">fsim/tables/fuel_kg_s/h6/w2/v0</property>
      <property value="1.09938">fsim/tables/fuel_kg_s/h6/w2/v1</property>
      <property value="1.08599">fsim/tables/fuel_kg_s/h6/w2/v10</property>
      <property value="1.0891">fsim/tables/fuel_kg_s/h6/w2/v11</property>
      <property value="1.09347">fsim/tables/fuel_kg_s/h6/w2/v12</property>
      <property value="1.10395">fsim/tables/fuel_kg_s/h6/w2/v13</property>
      <property value="1.13014">fsim/tables/fuel_kg_s/h6/w2/v14</property>
      <property value="1.16408">fsim/tables/fuel_kg_s/h6/w2/v15</property>
      <property value="1.08931">fsim/tables/fuel_kg_s/h6/w2/v2</property>
      <property value="1.08549">fsim/tables/fuel_kg_s/h6/w2/v3</property>
      <property value="1.08185">fsim/tables/fuel_kg_s/h6/w2/v4</property>
      <property value="1.07836">fsim/tables/fuel_kg_s/h6/w2/v5</property>
      <property value="1.07545">fsim/tables/fuel_kg_s/h6/w2/v6</property>
      <property value="1.07638">fsim/tables/fuel_kg_s/h6/w2/v7</property>
      <property value="1.07965">fsim/tables/fuel_kg_s/h6/w2/v8</property>
      <property value="1.08284">fsim/tables/fuel_kg_s/h6/w2/v9</property>
      <property value="60.3794">fsim/tables/max_climb_ms/h0/w0</property>
      <property value="39.6549">fsim/tables/max_climb_ms/h0/w1</property>
      <property value="28.449">fsim/tables/max_climb_ms/h0/w2</property>
      <property value="50.5479">fsim/tables/max_climb_ms/h1/w0</property>
      <property value="32.7107">fsim/tables/max_climb_ms/h1/w1</property>
      <property value="22.9718">fsim/tables/max_climb_ms/h1/w2</property>
      <property value="41.8786">fsim/tables/max_climb_ms/h2/w0</property>
      <property value="26.4709">fsim/tables/max_climb_ms/h2/w1</property>
      <property value="18.0099">fsim/tables/max_climb_ms/h2/w2</property>
      <property value="31.3118">fsim/tables/max_climb_ms/h3/w0</property>
      <property value="18.9281">fsim/tables/max_climb_ms/h3/w1</property>
      <property value="11.9423">fsim/tables/max_climb_ms/h3/w2</property>
      <property value="24.4642">fsim/tables/max_climb_ms/h4/w0</property>
      <property value="13.8277">fsim/tables/max_climb_ms/h4/w1</property>
      <property value="7.61987">fsim/tables/max_climb_ms/h4/w2</property>
      <property value="20.7944">fsim/tables/max_climb_ms/h5/w0</property>
      <property value="11.0395">fsim/tables/max_climb_ms/h5/w1</property>
      <property value="5.24314">fsim/tables/max_climb_ms/h5/w2</property>
      <property value="16.7289">fsim/tables/max_climb_ms/h6/w0</property>
      <property value="7.92538">fsim/tables/max_climb_ms/h6/w1</property>
      <property value="2.61133">fsim/tables/max_climb_ms/h6/w2</property>
      <property value="292.423">fsim/tables/max_tas_ms/h0/w0</property>
      <property value="291.798">fsim/tables/max_tas_ms/h0/w1</property>
      <property value="291.305">fsim/tables/max_tas_ms/h0/w2</property>
      <property value="289.305">fsim/tables/max_tas_ms/h1/w0</property>
      <property value="288.545">fsim/tables/max_tas_ms/h1/w1</property>
      <property value="287.926">fsim/tables/max_tas_ms/h1/w2</property>
      <property value="285.393">fsim/tables/max_tas_ms/h2/w0</property>
      <property value="284.568">fsim/tables/max_tas_ms/h2/w1</property>
      <property value="283.494">fsim/tables/max_tas_ms/h2/w2</property>
      <property value="279.629">fsim/tables/max_tas_ms/h3/w0</property>
      <property value="278.456">fsim/tables/max_tas_ms/h3/w1</property>
      <property value="276.842">fsim/tables/max_tas_ms/h3/w2</property>
      <property value="274.884">fsim/tables/max_tas_ms/h4/w0</property>
      <property value="273.114">fsim/tables/max_tas_ms/h4/w1</property>
      <property value="270.824">fsim/tables/max_tas_ms/h4/w2</property>
      <property value="271.408">fsim/tables/max_tas_ms/h5/w0</property>
      <property value="269.202">fsim/tables/max_tas_ms/h5/w1</property>
      <property value="266.29">fsim/tables/max_tas_ms/h5/w2</property>
      <property value="267.283">fsim/tables/max_tas_ms/h6/w0</property>
      <property value="264.564">fsim/tables/max_tas_ms/h6/w1</property>
      <property value="258.377">fsim/tables/max_tas_ms/h6/w2</property>
      <property value="96.7804">fsim/tables/min_tas_ms/h0/w0</property>
      <property value="103.731">fsim/tables/min_tas_ms/h0/w1</property>
      <property value="111.312">fsim/tables/min_tas_ms/h0/w2</property>
      <property value="97.9242">fsim/tables/min_tas_ms/h1/w0</property>
      <property value="107.459">fsim/tables/min_tas_ms/h1/w1</property>
      <property value="116.987">fsim/tables/min_tas_ms/h1/w2</property>
      <property value="100.653">fsim/tables/min_tas_ms/h2/w0</property>
      <property value="112.849">fsim/tables/min_tas_ms/h2/w1</property>
      <property value="124.561">fsim/tables/min_tas_ms/h2/w2</property>
      <property value="105.432">fsim/tables/min_tas_ms/h3/w0</property>
      <property value="120.338">fsim/tables/min_tas_ms/h3/w1</property>
      <property value="134.29">fsim/tables/min_tas_ms/h3/w2</property>
      <property value="110.211">fsim/tables/min_tas_ms/h4/w0</property>
      <property value="127.303">fsim/tables/min_tas_ms/h4/w1</property>
      <property value="143.109">fsim/tables/min_tas_ms/h4/w2</property>
      <property value="114.126">fsim/tables/min_tas_ms/h5/w0</property>
      <property value="132.779">fsim/tables/min_tas_ms/h5/w1</property>
      <property value="169.814">fsim/tables/min_tas_ms/h5/w2</property>
      <property value="118.461">fsim/tables/min_tas_ms/h6/w0</property>
      <property value="138.833">fsim/tables/min_tas_ms/h6/w1</property>
      <property value="197.709">fsim/tables/min_tas_ms/h6/w2</property>
      <property value="40.0724">fsim/tables/ps_full_ms/h0/w0/v0</property>
      <property value="44.4291">fsim/tables/ps_full_ms/h0/w0/v1</property>
      <property value="57.978">fsim/tables/ps_full_ms/h0/w0/v10</property>
      <property value="55.4085">fsim/tables/ps_full_ms/h0/w0/v11</property>
      <property value="51.5824">fsim/tables/ps_full_ms/h0/w0/v12</property>
      <property value="46.4882">fsim/tables/ps_full_ms/h0/w0/v13</property>
      <property value="39.876">fsim/tables/ps_full_ms/h0/w0/v14</property>
      <property value="23.5486">fsim/tables/ps_full_ms/h0/w0/v15</property>
      <property value="47.9653">fsim/tables/ps_full_ms/h0/w0/v2</property>
      <property value="51.1383">fsim/tables/ps_full_ms/h0/w0/v3</property>
      <property value="54.0423">fsim/tables/ps_full_ms/h0/w0/v4</property>
      <property value="56.5781">fsim/tables/ps_full_ms/h0/w0/v5</property>
      <property value="58.4993">fsim/tables/ps_full_ms/h0/w0/v6</property>
      <property value="59.8186">fsim/tables/ps_full_ms/h0/w0/v7</property>
      <property value="60.3794">fsim/tables/ps_full_ms/h0/w0/v8</property>
      <property value="59.745">fsim/tables/ps_full_ms/h0/w0/v9</property>
      <property value="25.9511">fsim/tables/ps_full_ms/h0/w1/v0</property>
      <property value="28.7562">fsim/tables/ps_full_ms/h0/w1/v1</property>
      <property value="38.2195">fsim/tables/ps_full_ms/h0/w1/v10</property>
      <property value="36.7282">fsim/tables/ps_full_ms/h0/w1/v11</property>
      <property value="34.0967">fsim/tables/ps_full_ms/h0/w1/v12</property>
      <property value="30.6087">fsim/tables/ps_full_ms/h0/w1/v13</property>
      <property value="26.268">fsim/tables/ps_full_ms/h0/w1/v14</property>
      <property value="15.3289">fsim/tables/ps_full_ms/h0/w1/v15</property>
      <property value="31.3353">fsim/tables/ps_full_ms/h0/w1/v2</property>
      <property value="33.7025">fsim/tables/ps_full_ms/h0/w1/v3</property>
      <property value="35.7387">fsim/tables/ps_full_ms/h0/w1/v4</property>
      <property value="37.3683">fsim/tables/ps_full_ms/h0/w1/v5</property>
      <property value="38.5468">fsim/tables/ps_full_ms/h0/w1/v6</property>
      <property value="39.3988">fsim/tables/ps_full_ms/h0/w1/v7</property>
      <property value="39.6543">fsim/tables/ps_full_ms/h0/w1/v8</property>
      <property value="39.241">fsim/tables/ps_full_ms/h0/w1/v9</property>
      <property value="18.1564">fsim/tables/ps_full_ms/h0/w2/v0</property>
      <property value="20.3876">fsim/tables/ps_full_ms/h0/w2/v1</property>
      <property value="27.2554">fsim/tables/ps_full_ms/h0/w2/v10</property>
      <property value="26.0125">fsim/tables/ps_full_ms/h0/w2/v11</property>
      <property value="24.1288">fsim/tables/ps_full_ms/h0/w2/v12</property>
      <property value="21.7693">fsim/tables/ps_full_ms/h0/w2/v13</property>
      <property value="18.8466">fsim/tables/ps_full_ms/h0/w2/v14</property>
      <property value="10.834">fsim/tables/ps_full_ms/h0/w2/v15</property>
      <property value="22.3562">fsim/tables/ps_full_ms/h0/w2/v2</property>
      <property value="24.1612">fsim/tables/ps_full_ms/h0/w2/v3</property>
      <property value="25.6597">fsim/tables/ps_full_ms/h0/w2/v4</property>
      <property value="26.8051">fsim/tables/ps_full_ms/h0/w2/v5</property>
      <property value="27.7123">fsim/tables/ps_full_ms/h0/w2/v6</property>
      <property value="28.222">fsim/tables/ps_full_ms/h0/w2/v7</property>
      <property value="28.4473">fsim/tables/ps_full_ms/h0/w2/v8</property>
      <property value="28.1591">fsim/tables/ps_full_ms/h0/w2/v9</property>
      <property value="32.0538">fsim/tables/ps_full_ms/h1/w0/v0</property>
      <property value="35.7376">fsim/tables/ps_full_ms/h1/w0/v1</property>
      <property value="50.2863">fsim/tables/ps_full_ms/h1/w0/v10</property>
      <property value="49.4136">fsim/tables/ps_full_ms/h1/w0/v11</property>
      <property value="47.5683">fsim/tables/ps_full_ms/h1/w0/v12</property>
      <property value="44.9084">fsim/tables/ps_full_ms/h1/w0/v13</property>
      <property value="40.119">fsim/tables/ps_full_ms/h1/w0/v14</property>
      <property value="26.7491">fsim/tables/ps_full_ms/h1/w0/v15</property>
      <property value="38.5342">fsim/tables/ps_full_ms/h1/w0/v2</property>
      <property value="41.1646">fsim/tables/ps_full_ms/h1/w0/v3</property>
      <property value="43.9057">fsim/tables/ps_full_ms/h1/w0/v4</property>
      <property value="46.2079">fsim/tables/ps_full_ms/h1/w0/v5</property>
      <property value="48.1102">fsim/tables/ps_full_ms/h1/w0/v6</property>
      <property value="49.3924">fsim/tables/ps_full_ms/h1/w0/v7</property>
      <property value="50.164">fsim/tables/ps_full_ms/h1/w0/v8</property>
      <property value="50.5344">fsim/tables/ps_full_ms/h1/w0/v9</property>
      <property value="20.2678">fsim/tables/ps_full_ms/h1/w1/v0</property>
      <property value="22.6512">fsim/tables/ps_full_ms/h1/w1/v1</property>
      <property value="32.5464">fsim/tables/ps_full_ms/h1/w1/v10</property>
      <property value="32.0667">fsim/tables/ps_full_ms/h1/w1/v11</property>
      <property value="30.94">fsim/tables/ps_full_ms/h1/w1/v12</property>
      <property value="29.3144">fsim/tables/ps_full_ms/h1/w1/v13</property>
      <property value="26.1235">fsim/tables/ps_full_ms/h1/w1/v14</property>
      <property value="17.2903">fsim/tables/ps_full_ms/h1/w1/v15</property>
      <property value="24.7535">fsim/tables/ps_full_ms/h1/w1/v2</property>
      <property value="26.7754">fsim/tables/ps_full_ms/h1/w1/v3</property>
      <property value="28.5592">fsim/tables/ps_full_ms/h1/w1/v4</property>
      <property value="29.9939">fsim/tables/ps_full_ms/h1/w1/v5</property>
      <property value="31.162">fsim/tables/ps_full_ms/h1/w1/v6</property>
      <property value="31.9588">fsim/tables/ps_full_ms/h1/w1/v7</property>
      <property value="32.5536">fsim/tables/ps_full_ms/h1/w1/v8</property>
      <property value="32.7092">fsim/tables/ps_full_ms/h1/w1/v9</property>
      <property value="13.5636">fsim/tables/ps_full_ms/h1/w2/v0</property>
      <property value="15.3845">fsim/tables/ps_full_ms/h1/w2/v1</property>
      <property value="22.9547">fsim/tables/ps_full_ms/h1/w2/v10</property>
      <property value="22.539">fsim/tables/ps_full_ms/h1/w2/v11</property>
      <property value="21.5766">fsim/tables/ps_full_ms/h1/w2/v12</property>
      <property value="20.3308">fsim/tables/ps_full_ms/h1/w2/v13</property>
      <property value="18.156">fsim/tables/ps_full_ms/h1/w2/v14</property>
      <property value="12.0584">fsim/tables/ps_full_ms/h1/w2/v15</property>
      <property value="17.0419">fsim/tables/ps_full_ms/h1/w2/v2</property>
      <property value="18.6577">fsim/tables/ps_full_ms/h1/w2/v3</property>
      <property value="19.9856">fsim/tables/ps_full_ms/h1/w2/v4</property>
      <property value="21.0292">fsim/tables/ps_full_ms/h1/w2/v5</property>
      <property value="21.8346">fsim/tables/ps_full_ms/h1/w2/v6</property>
      <property value="22.4642">fsim/tables/ps_full_ms/h1/w2/v7</property>
      <property value="22.8131">fsim/tables/ps_full_ms/h1/w2/v8</property>
      <property value="22.9522">fsim/tables/ps_full_ms/h1/w2/v9</property>
      <property value="24.1565">fsim/tables/ps_full_ms/h2/w0/v0</property>
      <property value="27.1679">fsim/tables/ps_full_ms/h2/w0/v1</property>
      <property value="41.3919">fsim/tables/ps_full_ms/h2/w0/v10</property>
      <property value="41.8783">fsim/tables/ps_full_ms/h2/w0/v11</property>
      <property value="41.4446">fsim/tables/ps_full_ms/h2/w0/v12</property>
      <property value="40.502">fsim/tables/ps_full_ms/h2/w0/v13</property>
      <property value="36.5956">fsim/tables/ps_full_ms/h2/w0/v14</property>
      <property value="25.8853">fsim/tables/ps_full_ms/h2/w0/v15</property>
      <property value="29.2586">fsim/tables/ps_full_ms/h2/w0/v2</property>
      <property value="31.4458">fsim/tables/ps_full_ms/h2/w0/v3</property>
      <property value="33.8126">fsim/tables/ps_full_ms/h2/w0/v4</property>
      <property value="35.8538">fsim/tables/ps_full_ms/h2/w0/v5</property>
      <property value="37.45">fsim/tables/ps_full_ms/h2/w0/v6</property>
      <property value="38.8148">fsim/tables/ps_full_ms/h2/w0/v7</property>
      <property value="39.6023">fsim/tables/ps_full_ms/h2/w0/v8</property>
      <property value="40.5659">fsim/tables/ps_full_ms/h2/w0/v9</property>
      <property value="14.4824">fsim/tables/ps_full_ms/h2/w1/v0</property>
      <property value="16.3556">fsim/tables/ps_full_ms/h2/w1/v1</property>
      <property value="26.3401">fsim/tables/ps_full_ms/h2/w1/v10</property>
      <property value="26.4412">fsim/tables/ps_full_ms/h2/w1/v11</property>
      <property value="26.1599">fsim/tables/ps_full_ms/h2/w1/v12</property>
      <property value="25.6226">fsim/tables/ps_full_ms/h2/w1/v13</property>
      <property value="23.1468">fsim/tables/ps_full_ms/h2/w1/v14</property>
      <property value="17.0109">fsim/tables/ps_full_ms/h2/w1/v15</property>
      <property value="18.1295">fsim/tables/ps_full_ms/h2/w1/v2</property>
      <property value="19.8383">fsim/tables/ps_full_ms/h2/w1/v3</property>
      <property value="21.2976">fsim/tables/ps_full_ms/h2/w1/v4</property>
      <property value="22.5688">fsim/tables/ps_full_ms/h2/w1/v5</property>
      <property value="23.5511">fsim/tables/ps_full_ms/h2/w1/v6</property>
      <property value="24.3886">fsim/tables/ps_full_ms/h2/w1/v7</property>
      <property value="25.0189">fsim/tables/ps_full_ms/h2/w1/v8</property>
      <property value="25.7837">fsim/tables/ps_full_ms/h2/w1/v9</property>
      <property value="8.65824">fsim/tables/ps_full_ms/h2/w2/v0</property>
      <property value="10.2147">fsim/tables/ps_full_ms/h2/w2/v1</property>
      <property value="17.8898">fsim/tables/ps_full_ms/h2/w2/v10</property>
      <property value="18.0097">fsim/tables/ps_full_ms/h2/w2/v11</property>
      <property value="17.9579">fsim/tables/ps_full_ms/h2/w2/v12</property>
      <property value="17.526">fsim/tables/ps_full_ms/h2/w2/v13</property>
      <property value="15.6554">fsim/tables/ps_full_ms/h2/w2/v14</property>
      <property value="11.3775">fsim/tables/ps_full_ms/h2/w2/v15</property>
      <property value="11.631">fsim/tables/ps_full_ms/h2/w2/v2</property>
      <property value="12.9412">fsim/tables/ps_full_ms/h2/w2/v3</property>
      <property value="14.0792">fsim/tables/ps_full_ms/h2/w2/v4</property>
      <property value="15.0583">fsim/tables/ps_full_ms/h2/w2/v5</property>
      <property value="15.7702">fsim/tables/ps_full_ms/h2/w2/v6</property>
      <property value="16.3491">fsim/tables/ps_full_ms/h2/w2/v7</property>
      <property value="16.9868">fsim/tables/ps_full_ms/h2/w2/v8</property>
      <property value="17.5848">fsim/tables/ps_full_ms/h2/w2/v9</property>
      <property value="17.8531">fsim/tables/ps_full_ms/h3/w0/v0</property>
      <property value="20.1195">fsim/tables/ps_full_ms/h3/w0/v1</property>
      <property value="31.0821">fsim/tables/ps_full_ms/h3/w0/v10</property>
      <property value="31.3035">fsim/tables/ps_full_ms/h3/w0/v11</property>
      <property value="31.0489">fsim/tables/ps_full_ms/h3/w0/v12</property>
      <property value="30.4586">fsim/tables/ps_full_ms/h3/w0/v13</property>
      <property value="27.4459">fsim/tables/ps_full_ms/h3/w0/v14</property>
      <property value="20.2841">fsim/tables/ps_full_ms/h3/w0/v15</property>
      <property value="21.812">fsim/tables/ps_full_ms/h3/w0/v2</property>
      <property value="23.6348">fsim/tables/ps_full_ms/h3/w0/v3</property>
      <property value="25.454">fsim/tables/ps_full_ms/h3/w0/v4</property>
      <property value="26.943">fsim/tables/ps_full_ms/h3/w0/v5</property>
      <property value="28.1061">fsim/tables/ps_full_ms/h3/w0/v6</property>
      <property value="29.0196">fsim/tables/ps_full_ms/h3/w0/v7</property>
      <property value="29.8445">fsim/tables/ps_full_ms/h3/w0/v8</property>
      <property value="30.5752">fsim/tables/ps_full_ms/h3/w0/v9</property>
      <property value="9.60124">fsim/tables/ps_full_ms/h3/w1/v0</property>
      <property value="11.073">fsim/tables/ps_full_ms/h3/w1/v1</property>
      <property value="18.779">fsim/tables/ps_full_ms/h3/w1/v10</property>
      <property value="18.9237">fsim/tables/ps_full_ms/h3/w1/v11</property>
      <property value="18.7672">fsim/tables/ps_full_ms/h3/w1/v12</property>
      <property value="18.2613">fsim/tables/ps_full_ms/h3/w1/v13</property>
      <property value="16.3653">fsim/tables/ps_full_ms/h3/w1/v14</property>
      <property value="12.6225">fsim/tables/ps_full_ms/h3/w1/v15</property>
      <property value="12.5646">fsim/tables/ps_full_ms/h3/w1/v2</property>
      <property value="13.902">fsim/tables/ps_full_ms/h3/w1/v3</property>
      <property value="14.9953">fsim/tables/ps_full_ms/h3/w1/v4</property>
      <property value="15.9074">fsim/tables/ps_full_ms/h3/w1/v5</property>
      <property value="16.6955">fsim/tables/ps_full_ms/h3/w1/v6</property>
      <property value="17.2211">fsim/tables/ps_full_ms/h3/w1/v7</property>
      <property value="17.9242">fsim/tables/ps_full_ms/h3/w1/v8</property>
      <property value="18.4291">fsim/tables/ps_full_ms/h3/w1/v9</property>
      <property value="4.49564">fsim/tables/ps_full_ms/h3/w2/v0</property>
      <property value="5.76775">fsim/tables/ps_full_ms/h3/w2/v1</property>
      <property value="11.8073">fsim/tables/ps_full_ms/h3/w2/v10</property>
      <property value="11.9265">fsim/tables/ps_full_ms/h3/w2/v11</property>
      <property value="11.7607">fsim/tables/ps_full_ms/h3/w2/v12</property>
      <property value="11.5121">fsim/tables/ps_full_ms/h3/w2/v13</property>
      <property value="10.3713">fsim/tables/ps_full_ms/h3/w2/v14</property>
      <property value="7.98891">fsim/tables/ps_full_ms/h3/w2/v15</property>
      <property value="6.86413">fsim/tables/ps_full_ms/h3/w2/v2</property>
      <property value="7.82635">fsim/tables/ps_full_ms/h3/w2/v3</property>
      <property value="8.66312">fsim/tables/ps_full_ms/h3/w2/v4</property>
      <property value="9.39809">fsim/tables/ps_full_ms/h3/w2/v5</property>
      <property value="10.0436">fsim/tables/ps_full_ms/h3/w2/v6</property>
      <property value="10.5827">fsim/tables/ps_full_ms/h3/w2/v7</property>
      <property value="11.1531">fsim/tables/ps_full_ms/h3/w2/v8</property>
      <property value="11.5026">fsim/tables/ps_full_ms/h3/w2/v9</property>
      <property value="13.6319">fsim/tables/ps_full_ms/h4/w0/v0</property>
      <property value="15.3252">fsim/tables/ps_full_ms/h4/w0/v1</property>
      <property value="24.3847">fsim/tables/ps_full_ms/h4/w0/v10</property>
      <property value="24.4076">fsim/tables/ps_full_ms/h4/w0/v11</property>
      <property value="24.1051">fsim/tables/ps_full_ms/h4/w0/v12</property>
      <property value="23.559">fsim/tables/ps_full_ms/h4/w0/v13</property>
      <property value="21.3823">fsim/tables/ps_full_ms/h4/w0/v14</property>
      <property value="16.3981">fsim/tables/ps_full_ms/h4/w0/v15</property>
      <property value="16.9396">fsim/tables/ps_full_ms/h4/w0/v2</property>
      <property value="18.388">fsim/tables/ps_full_ms/h4/w0/v3</property>
      <property value="19.8016">fsim/tables/ps_full_ms/h4/w0/v4</property>
      <property value="21.0051">fsim/tables/ps_full_ms/h4/w0/v5</property>
      <property value="21.8796">fsim/tables/ps_full_ms/h4/w0/v6</property>
      <property value="22.6136">fsim/tables/ps_full_ms/h4/w0/v7</property>
      <property value="23.2647">fsim/tables/ps_full_ms/h4/w0/v8</property>
      <property value="23.9272">fsim/tables/ps_full_ms/h4/w0/v9</property>
      <property value="6.15607">fsim/tables/ps_full_ms/h4/w1/v0</property>
      <property value="7.501">fsim/tables/ps_full_ms/h4/w1/v1</property>
      <property value="13.82">fsim/tables/ps_full_ms/h4/w1/v10</property>
      <property value="13.7898">fsim/tables/ps_full_ms/h4/w1/v11</property>
      <property value="13.661">fsim/tables/ps_full_ms/h4/w1/v12</property>
      <property value="13.4303">fsim/tables/ps_full_ms/h4/w1/v13</property>
      <property value="12.0932">fsim/tables/ps_full_ms/h4/w1/v14</property>
      <property value="9.51205">fsim/tables/ps_full_ms/h4/w1/v15</property>
      <property value="8.67019">fsim/tables/ps_full_ms/h4/w1/v2</property>
      <property value="9.72434">fsim/tables/ps_full_ms/h4/w1/v3</property>
      <property value="10.6604">fsim/tables/ps_full_ms/h4/w1/v4</property>
      <property value="11.382">fsim/tables/ps_full_ms/h4/w1/v5</property>
      <property value="11.9489">fsim/tables/ps_full_ms/h4/w1/v6</property>
      <property value="12.5169">fsim/tables/ps_full_ms/h4/w1/v7</property>
      <property value="13.0311">fsim/tables/ps_full_ms/h4/w1/v8</property>
      <property value="13.4679">fsim/tables/ps_full_ms/h4/w1/v9</property>
      <property value="1.55733">fsim/tables/ps_full_ms/h4/w2/v0</property>
      <property value="2.55898">fsim/tables/ps_full_ms/h4/w2/v1</property>
      <property value="7.5928">fsim/tables/ps_full_ms/h4/w2/v10</property>
      <property value="7.61797">fsim/tables/ps_full_ms/h4/w2/v11</property>
      <property value="7.61318">fsim/tables/ps_full_ms/h4/w2/v12</property>
      <property value="7.51745">fsim/tables/ps_full_ms/h4/w2/v13</property>
      <property value="6.68679">fsim/tables/ps_full_ms/h4/w2/v14</property>
      <property value="5.14436">fsim/tables/ps_full_ms/h4/w2/v15</property>
      <property value="3.44029">fsim/tables/ps_full_ms/h4/w2/v2</property>
      <property value="4.19829">fsim/tables/ps_full_ms/h4/w2/v3</property>
      <property value="4.86678">fsim/tables/ps_full_ms/h4/w2/v4</property>
      <property value="5.40324">fsim/tables/ps_full_ms/h4/w2/v5</property>
      <property value="5.94453">fsim/tables/ps_full_ms/h4/w2/v6</property>
      <property value="6.51149">fsim/tables/ps_full_ms/h4/w2/v7</property>
      <property value="6.98023">fsim/tables/ps_full_ms/h4/w2/v8</property>
      <property value="7.34516">fsim/tables/ps_full_ms/h4/w2/v9</property>
      <property value="11.1885">fsim/tables/ps_full_ms/h5/w0/v0</property>
      <property value="12.6369">fsim/tables/ps_full_ms/h5/w0/v1</property>
      <property value="20.6361">fsim/tables/ps_full_ms/h5/w0/v10</property>
      <property value="20.7398">fsim/tables/ps_full_ms/h5/w0/v11</property>
      <property value="20.4368">fsim/tables/ps_full_ms/h5/w0/v12</property>
      <property value="19.9345">fsim/tables/ps_full_ms/h5/w0/v13</property>
      <property value="17.9872">fsim/tables/ps_full_ms/h5/w0/v14</property>
      <property value="13.9719">fsim/tables/ps_full_ms/h5/w0/v15</property>
      <property value="14.1964">fsim/tables/ps_full_ms/h5/w0/v2</property>
      <property value="15.4253">fsim/tables/ps_full_ms/h5/w0/v3</property>
      <property value="16.6493">fsim/tables/ps_full_ms/h5/w0/v4</property>
      <property value="17.6396">fsim/tables/ps_full_ms/h5/w0/v5</property>
      <property value="18.4159">fsim/tables/ps_full_ms/h5/w0/v6</property>
      <property value="18.9924">fsim/tables/ps_full_ms/h5/w0/v7</property>
      <property value="19.7042">fsim/tables/ps_full_ms/h5/w0/v8</property>
      <property value="20.2021">fsim/tables/ps_full_ms/h5/w0/v9</property>
      <property value="4.21159">fsim/tables/ps_full_ms/h5/w1/v0</property>
      <property value="5.37839">fsim/tables/ps_full_ms/h5/w1/v1</property>
      <property value="10.9081">fsim/tables/ps_full_ms/h5/w1/v10</property>
      <property value="11.0346">fsim/tables/ps_full_ms/h5/w1/v11</property>
      <property value="10.8708">fsim/tables/ps_full_ms/h5/w1/v12</property>
      <property value="10.6298">fsim/tables/ps_full_ms/h5/w1/v13</property>
      <property value="9.59364">fsim/tables/ps_full_ms/h5/w1/v14</property>
      <property value="7.67947">fsim/tables/ps_full_ms/h5/w1/v15</property>
      <property value="6.37533">fsim/tables/ps_full_ms/h5/w1/v2</property>
      <property value="7.27004">fsim/tables/ps_full_ms/h5/w1/v3</property>
      <property value="8.04774">fsim/tables/ps_full_ms/h5/w1/v4</property>
      <property value="8.73246">fsim/tables/ps_full_ms/h5/w1/v5</property>
      <property value="9.27614">fsim/tables/ps_full_ms/h5/w1/v6</property>
      <property value="9.77863">fsim/tables/ps_full_ms/h5/w1/v7</property>
      <property value="10.3118">fsim/tables/ps_full_ms/h5/w1/v8</property>
      <property value="10.6429">fsim/tables/ps_full_ms/h5/w1/v9</property>
      <property value="1.80921">fsim/tables/ps_full_ms/h5/w2/v0</property>
      <property value="2.24844">fsim/tables/ps_full_ms/h5/w2/v1</property>
      <property value="5.22126">fsim/tables/ps_full_ms/h5/w2/v10</property>
      <property value="5.20319">fsim/tables/ps_full_ms/h5/w2/v11</property>
      <property value="5.1398">fsim/tables/ps_full_ms/h5/w2/v12</property>
      <property value="5.05942">fsim/tables/ps_full_ms/h5/w2/v13</property>
      <property value="4.45068">fsim/tables/ps_full_ms/h5/w2/v14</property>
      <property value="3.47769">fsim/tables/ps_full_ms/h5/w2/v15</property>
      <property value="2.68767">fsim/tables/ps_full_ms/h5/w2/v2</property>
      <property value="3.12689">fsim/tables/ps_full_ms/h5/w2/v3</property>
      <property value="3.52962">fsim/tables/ps_full_ms/h5/w2/v4</property>
      <property value="3.9164">fsim/tables/ps_full_ms/h5/w2/v5</property>
      <property value="4.30318">fsim/tables/ps_full_ms/h5/w2/v6</property>
      <property value="4.62096">fsim/tables/ps_full_ms/h5/w2/v7</property>
      <property value="4.84697">fsim/tables/ps_full_ms/h5/w2/v8</property>
      <property value="5.07298">fsim/tables/ps_full_ms/h5/w2/v9</property>
      <property value="8.58031">fsim/tables/ps_full_ms/h6/w0/v0</property>
      <property value="9.91616">fsim/tables/ps_full_ms/h6/w0/v1</property>
      <property value="16.6459">fsim/tables/ps_full_ms/h6/w0/v10</property>
      <property value="16.7288">fsim/tables/ps_full_ms/h6/w0/v11</property>
      <property value="16.6149">fsim/tables/ps_full_ms/h6/w0/v12</property>
      <property value="16.1361">fsim/tables/ps_full_ms/h6/w0/v13</property>
      <property value="14.487">fsim/tables/ps_full_ms/h6/w0/v14</property>
      <property value="11.4579">fsim/tables/ps_full_ms/h6/w0/v15</property>
      <property value="11.2858">fsim/tables/ps_full_ms/h6/w0/v2</property>
      <property value="12.2934">fsim/tables/ps_full_ms/h6/w0/v3</property>
      <property value="13.295">fsim/tables/ps_full_ms/h6/w0/v4</property>
      <property value="14.1193">fsim/tables/ps_full_ms/h6/w0/v5</property>
      <property value="14.8106">fsim/tables/ps_full_ms/h6/w0/v6</property>
      <property value="15.2578">fsim/tables/ps_full_ms/h6/w0/v7</property>
      <property value="15.9304">fsim/tables/ps_full_ms/h6/w0/v8</property>
      <property value="16.3676">fsim/tables/ps_full_ms/h6/w0/v9</property>
      <property value="2.11043">fsim/tables/ps_full_ms/h6/w1/v0</property>
      <property value="3.0965">fsim/tables/ps_full_ms/h6/w1/v1</property>
      <property value="7.86237">fsim/tables/ps_full_ms/h6/w1/v10</property>
      <property value="7.91006">fsim/tables/ps_full_ms/h6/w1/v11</property>
      <property value="7.92533">fsim/tables/ps_full_ms/h6/w1/v12</property>
      <property value="7.74192">fsim/tables/ps_full_ms/h6/w1/v13</property>
      <property value="6.89874">fsim/tables/ps_full_ms/h6/w1/v14</property>
      <property value="5.35416">fsim/tables/ps_full_ms/h6/w1/v15</property>
      <property value="3.90771">fsim/tables/ps_full_ms/h6/w1/v2</property>
      <property value="4.65497">fsim/tables/ps_full_ms/h6/w1/v3</property>
      <property value="5.3223">fsim/tables/ps_full_ms/h6/w1/v4</property>
      <property value="5.88932">fsim/tables/ps_full_ms/h6/w1/v5</property>
      <property value="6.39335">fsim/tables/ps_full_ms/h6/w1/v6</property>
      <property value="6.95718">fsim/tables/ps_full_ms/h6/w1/v7</property>
      <property value="7.3109">fsim/tables/ps_full_ms/h6/w1/v8</property>
      <property value="7.67843">fsim/tables/ps_full_ms/h6/w1/v9</property>
      <property value="1.13584">fsim/tables/ps_full_ms/h6/w2/v0</property>
      <property value="1.32032">fsim/tables/ps_full_ms/h6/w2/v1</property>
      <property value="2.51226">fsim/tables/ps_full_ms/h6/w2/v10</property>
      <property value="2.58552">fsim/tables/ps_full_ms/h6/w2/v11</property>
      <property value="2.60303">fsim/tables/ps_full_ms/h6/w2/v12</property>
      <property value="2.52411">fsim/tables/ps_full_ms/h6/w2/v13</property>
      <property value="2.21296">fsim/tables/ps_full_ms/h6/w2/v14</property>
      <property value="1.77195">fsim/tables/ps_full_ms/h6/w2/v15</property>
      <property value="1.5048">fsim/tables/ps_full_ms/h6/w2/v2</property>
      <property value="1.68928">fsim/tables/ps_full_ms/h6/w2/v3</property>
      <property value="1.87377">fsim/tables/ps_full_ms/h6/w2/v4</property>
      <property value="2.05825">fsim/tables/ps_full_ms/h6/w2/v5</property>
      <property value="2.21922">fsim/tables/ps_full_ms/h6/w2/v6</property>
      <property value="2.29248">fsim/tables/ps_full_ms/h6/w2/v7</property>
      <property value="2.36574">fsim/tables/ps_full_ms/h6/w2/v8</property>
      <property value="2.439">fsim/tables/ps_full_ms/h6/w2/v9</property>
      <property value="-5.49803">fsim/tables/ps_idle_ms/h0/w0/v0</property>
      <property value="-6.44129">fsim/tables/ps_idle_ms/h0/w0/v1</property>
      <property value="-40.5587">fsim/tables/ps_idle_ms/h0/w0/v10</property>
      <property value="-47.7382">fsim/tables/ps_idle_ms/h0/w0/v11</property>
      <property value="-56.0941">fsim/tables/ps_idle_ms/h0/w0/v12</property>
      <property value="-65.5927">fsim/tables/ps_idle_ms/h0/w0/v13</property>
      <property value="-77.1374">fsim/tables/ps_idle_ms/h0/w0/v14</property>
      <property value="-92.6029">fsim/tables/ps_idle_ms/h0/w0/v15</property>
      <property value="-7.90098">fsim/tables/ps_idle_ms/h0/w0/v2</property>
      <property value="-9.83611">fsim/tables/ps_idle_ms/h0/w0/v3</property>
      <property value="-12.3496">fsim/tables/ps_idle_ms/h0/w0/v4</property>
      <property value="-15.3916">fsim/tables/ps_idle_ms/h0/w0/v5</property>
      <property value="-19.1178">fsim/tables/ps_idle_ms/h0/w0/v6</property>
      <property value="-23.4152">fsim/tables/ps_idle_ms/h0/w0/v7</property>
      <property value="-28.2933">fsim/tables/ps_idle_ms/h0/w0/v8</property>
      <property value="-34.0833">fsim/tables/ps_idle_ms/h0/w0/v9</property>
      <property value="-7.16174">fsim/tables/ps_idle_ms/h0/w1/v0</property>
      <property value="-7.56986">fsim/tables/ps_idle_ms/h0/w1/v1</property>
      <property value="-29.5423">fsim/tables/ps_idle_ms/h0/w1/v10</property>
      <property value="-34.041">fsim/tables/ps_idle_ms/h0/w1/v11</property>
      <property value="-39.6291">fsim/tables/ps_idle_ms/h0/w1/v12</property>
      <property value="-45.9898">fsim/tables/ps_idle_ms/h0/w1/v13</property>
      <property value="-53.3791">fsim/tables/ps_idle_ms/h0/w1/v14</property>
      <property value="-66.3608">fsim/tables/ps_idle_ms/h0/w1/v15</property>
      <property value="-8.37055">fsim/tables/ps_idle_ms/h0/w1/v2</property>
      <property value="-9.60492">fsim/tables/ps_idle_ms/h0/w1/v3</property>
      <property value="-11.2482">fsim/tables/ps_idle_ms/h0/w1/v4</property>
      <property value="-13.2233">fsim/tables/ps_idle_ms/h0/w1/v5</property>
      <property value="-15.6577">fsim/tables/ps_idle_ms/h0/w1/v6</property>
      <property value="-18.3754">fsim/tables/ps_idle_ms/h0/w1/v7</property>
      <property value="-21.7254">fsim/tables/ps_idle_ms/h0/w1/v8</property>
      <property value="-25.4439">fsim/tables/ps_idle_ms/h0/w1/v9</property>
      <property value="-8.69957">fsim/tables/ps_idle_ms/h0/w2/v0</property>
      <property value="-8.88061">fsim/tables/ps_idle_ms/h0/w2/v1</property>
      <property value="-24.5288">fsim/tables/ps_idle_ms/h0/w2/v10</property>
      <property value="-27.9384">fsim/tables/ps_idle_ms/h0/w2/v11</property>
      <property value="-31.9466">fsim/tables/ps_idle_ms/h0/w2/v12</property>
      <property value="-36.3889">fsim/tables/ps_idle_ms/h0/w2/v13</property>
      <property value="-41.476">fsim/tables/ps_idle_ms/h0/w2/v14</property>
      <property value="-51.045">fsim/tables/ps_idle_ms/h0/w2/v15</property>
      <property value="-9.36156">fsim/tables/ps_idle_ms/h0/w2/v2</property>
      <property value="-10.1134">fsim/tables/ps_idle_ms/h0/w2/v3</property>
      <property value="-11.2427">fsim/tables/ps_idle_ms/h0/w2/v4</property>
      <property value="-12.6824">fsim/tables/ps_idle_ms/h0/w2/v5</property>
      <property value="-14.3823">fsim/tables/ps_idle_ms/h0/w2/v6</property>
      <property value="-16.4672">fsim/tables/ps_idle_ms/h0/w2/v7</property>
      <property value="-18.8265">fsim/tables/ps_idle_ms/h0/w2/v8</property>
      <property value="-21.4045">fsim/tables/ps_idle_ms/h0/w2/v9</property>
      <property value="-6.06128">fsim/tables/ps_idle_ms/h1/w0/v0</property>
      <property value="-6.74466">fsim/tables/ps_idle_ms/h1/w0/v1</property>
      <property value="-33.9247">fsim/tables/ps_idle_ms/h1/w0/v10</property>
      <property value="-39.8077">fsim/tables/ps_idle_ms/h1/w0/v11</property>
      <property value="-46.7261">fsim/tables/ps_idle_ms/h1/w0/v12</property>
      <property value="-54.506">fsim/tables/ps_idle_ms/h1/w0/v13</property>
      <property value="-64.6606">fsim/tables/ps_idle_ms/h1/w0/v14</property>
      <property value="-80.285">fsim/tables/ps_idle_ms/h1/w0/v15</property>
      <property value="-7.85147">fsim/tables/ps_idle_ms/h1/w0/v2</property>
      <property value="-9.39883">fsim/tables/ps_idle_ms/h1/w0/v3</property>
      <property value="-11.3811">fsim/tables/ps_idle_ms/h1/w0/v4</property>
      <property value="-13.8521">fsim/tables/ps_idle_ms/h1/w0/v5</property>
      <property value="-16.773">fsim/tables/ps_idle_ms/h1/w0/v6</property>
      <property value="-20.3126">fsim/tables/ps_idle_ms/h1/w0/v7</property>
      <property value="-24.2892">fsim/tables/ps_idle_ms/h1/w0/v8</property>
      <property value="-28.7458">fsim/tables/ps_idle_ms/h1/w0/v9</property>
      <property value="-8.00629">fsim/tables/ps_idle_ms/h1/w1/v0</property>
      <property value="-8.26108">fsim/tables/ps_idle_ms/h1/w1/v1</property>
      <property value="-25.7164">fsim/tables/ps_idle_ms/h1/w1/v10</property>
      <property value="-29.4281">fsim/tables/ps_idle_ms/h1/w1/v11</property>
      <property value="-33.8176">fsim/tables/ps_idle_ms/h1/w1/v12</property>
      <property value="-38.7242">fsim/tables/ps_idle_ms/h1/w1/v13</property>
      <property value="-45.1752">fsim/tables/ps_idle_ms/h1/w1/v14</property>
      <property value="-56.5486">fsim/tables/ps_idle_ms/h1/w1/v15</property>
      <property value="-8.81939">fsim/tables/ps_idle_ms/h1/w1/v2</property>
      <property value="-9.75998">fsim/tables/ps_idle_ms/h1/w1/v3</property>
      <property value="-11.0026">fsim/tables/ps_idle_ms/h1/w1/v4</property>
      <property value="-12.6377">fsim/tables/ps_idle_ms/h1/w1/v5</property>
      <property value="-14.5232">fsim/tables/ps_idle_ms/h1/w1/v6</property>
      <property value="-16.816">fsim/tables/ps_idle_ms/h1/w1/v7</property>
      <property value="-19.3184">fsim/tables/ps_idle_ms/h1/w1/v8</property>
      <property value="-22.3395">fsim/tables/ps_idle_ms/h1/w1/v9</property>
      <property value="-9.74649">fsim/tables/ps_idle_ms/h1/w2/v0</property>
      <property value="-9.76765">fsim/tables/ps_idle_ms/h1/w2/v1</property>
      <property value="-21.8028">fsim/tables/ps_idle_ms/h1/w2/v10</property>
      <property value="-24.5189">fsim/tables/ps_idle_ms/h1/w2/v11</property>
      <property value="-27.8057">fsim/tables/ps_idle_ms/h1/w2/v12</property>
      <property value="-31.3982">fsim/tables/ps_idle_ms/h1/w2/v13</property>
      <property value="-35.8315">fsim/tables/ps_idle_ms/h1/w2/v14</property>
      <property value="-43.5706">fsim/tables/ps_idle_ms/h1/w2/v15</property>
      <property value="-10.0877">fsim/tables/ps_idle_ms/h1/w2/v2</property>
      <property value="-10.6549">fsim/tables/ps_idle_ms/h1/w2/v3</property>
      <property value="-11.4339">fsim/tables/ps_idle_ms/h1/w2/v4</property>
      <property value="-12.5586">fsim/tables/ps_idle_ms/h1/w2/v5</property>
      <property value="-13.9252">fsim/tables/ps_idle_ms/h1/w2/v6</property>
      <property value="-15.5063">fsim/tables/ps_idle_ms/h1/w2/v7</property>
      <property value="-17.3735">fsim/tables/ps_idle_ms/h1/w2/v8</property>
      <property value="-19.5101">fsim/tables/ps_idle_ms/h1/w2/v9</property>
      <property value="-6.81384">fsim/tables/ps_idle_ms/h2/w0/v0</property>
      <property value="-7.30238">fsim/tables/ps_idle_ms/h2/w0/v1</property>
      <property value="-28.4558">fsim/tables/ps_idle_ms/h2/w0/v10</property>
      <property value="-32.8807">fsim/tables/ps_idle_ms/h2/w0/v11</property>
      <property value="-38.4359">fsim/tables/ps_idle_ms/h2/w0/v12</property>
      <property value="-44.6197">fsim/tables/ps_idle_ms/h2/w0/v13</property>
      <property value="-53.4048">fsim/tables/ps_idle_ms/h2/w0/v14</property>
      <property value="-69.1515">fsim/tables/ps_idle_ms/h2/w0/v15</property>
      <property value="-8.07649">fsim/tables/ps_idle_ms/h2/w0/v2</property>
      <property value="-9.28139">fsim/tables/ps_idle_ms/h2/w0/v3</property>
      <property value="-10.8262">fsim/tables/ps_idle_ms/h2/w0/v4</property>
      <property value="-12.7289">fsim/tables/ps_idle_ms/h2/w0/v5</property>
      <property value="-15.0567">fsim/tables/ps_idle_ms/h2/w0/v6</property>
      <property value="-17.6894">fsim/tables/ps_idle_ms/h2/w0/v7</property>
      <property value="-20.9195">fsim/tables/ps_idle_ms/h2/w0/v8</property>
      <property value="-24.5021">fsim/tables/ps_idle_ms/h2/w0/v9</property>
      <property value="-9.0377">fsim/tables/ps_idle_ms/h2/w1/v0</property>
      <property value="-9.17496">fsim/tables/ps_idle_ms/h2/w1/v1</property>
      <property value="-22.2629">fsim/tables/ps_idle_ms/h2/w1/v10</property>
      <property value="-25.2975">fsim/tables/ps_idle_ms/h2/w1/v11</property>
      <property value="-28.7911">fsim/tables/ps_idle_ms/h2/w1/v12</property>
      <property value="-32.6108">fsim/tables/ps_idle_ms/h2/w1/v13</property>
      <property value="-38.0241">fsim/tables/ps_idle_ms/h2/w1/v14</property>
      <property value="-47.3615">fsim/tables/ps_idle_ms/h2/w1/v15</property>
      <property value="-9.55857">fsim/tables/ps_idle_ms/h2/w1/v2</property>
      <property value="-10.1832">fsim/tables/ps_idle_ms/h2/w1/v3</property>
      <property value="-11.1307">fsim/tables/ps_idle_ms/h2/w1/v4</property>
      <property value="-12.2958">fsim/tables/ps_idle_ms/h2/w1/v5</property>
      <property value="-13.8094">fsim/tables/ps_idle_ms/h2/w1/v6</property>
      <property value="-15.4737">fsim/tables/ps_idle_ms/h2/w1/v7</property>
      <property value="-17.5407">fsim/tables/ps_idle_ms/h2/w1/v8</property>
      <property value="-19.7654">fsim/tables/ps_idle_ms/h2/w1/v9</property>
      <property value="-11.0033">fsim/tables/ps_idle_ms/h2/w2/v0</property>
      <property value="-10.8688">fsim/tables/ps_idle_ms/h2/w2/v1</property>
      <property value="-19.6504">fsim/tables/ps_idle_ms/h2/w2/v10</property>
      <property value="-21.7309">fsim/tables/ps_idle_ms/h2/w2/v11</property>
      <property value="-24.0341">fsim/tables/ps_idle_ms/h2/w2/v12</property>
      <property value="-26.7621">fsim/tables/ps_idle_ms/h2/w2/v13</property>
      <property value="-30.6632">fsim/tables/ps_idle_ms/h2/w2/v14</property>
      <property value="-36.7423">fsim/tables/ps_idle_ms/h2/w2/v15</property>
      <property value="-11.0722">fsim/tables/ps_idle_ms/h2/w2/v2</property>
      <property value="-11.4656">fsim/tables/ps_idle_ms/h2/w2/v3</property>
      <property value="-12.0258">fsim/tables/ps_idle_ms/h2/w2/v4</property>
      <property value="-12.7266">fsim/tables/ps_idle_ms/h2/w2/v5</property>
      <property value="-13.728">fsim/tables/ps_idle_ms/h2/w2/v6</property>
      <property value="-14.9043">fsim/tables/ps_idle_ms/h2/w2/v7</property>
      <property value="-16.302">fsim/tables/ps_idle_ms/h2/w2/v8</property>
      <property value="-17.8021">fsim/tables/ps_idle_ms/h2/w2/v9</property>
      <property value="-7.84611">fsim/tables/ps_idle_ms/h3/w0/v0</property>
      <property value="-8.05369">fsim/tables/ps_idle_ms/h3/w0/v1</property>
      <property value="-23.9401">fsim/tables/ps_idle_ms/h3/w0/v10</property>
      <property value="-27.4054">fsim/tables/ps_idle_ms/h3/w0/v11</property>
      <property value="-31.44">fsim/tables/ps_idle_ms/h3/w0/v12</property>
      <property value="-35.8792">fsim/tables/ps_idle_ms/h3/w0/v13</property>
      <property value="-42.8532">fsim/tables/ps_idle_ms/h3/w0/v14</property>
      <property value="-55.5452">fsim/tables/ps_idle_ms/h3/w0/v15</property>
      <property value="-8.61186">fsim/tables/ps_idle_ms/h3/w0/v2</property>
      <property value="-9.45162">fsim/tables/ps_idle_ms/h3/w0/v3</property>
      <property value="-10.5939">fsim/tables/ps_idle_ms/h3/w0/v4</property>
      <property value="-12.0739">fsim/tables/ps_idle_ms/h3/w0/v5</property>
      <property value="-13.7641">fsim/tables/ps_idle_ms/h3/w0/v6</property>
      <property value="-15.8623">fsim/tables/ps_idle_ms/h3/w0/v7</property>
      <property value="-18.148">fsim/tables/ps_idle_ms/h3/w0/v8</property>
      <property value="-20.8597">fsim/tables/ps_idle_ms/h3/w0/v9</property>
      <property value="-10.2473">fsim/tables/ps_idle_ms/h3/w1/v0</property>
      <property value="-10.2591">fsim/tables/ps_idle_ms/h3/w1/v1</property>
      <property value="-19.6245">fsim/tables/ps_idle_ms/h3/w1/v10</property>
      <property value="-21.7592">fsim/tables/ps_idle_ms/h3/w1/v11</property>
      <property value="-24.2412">fsim/tables/ps_idle_ms/h3/w1/v12</property>
      <property value="-27.1275">fsim/tables/ps_idle_ms/h3/w1/v13</property>
      <property value="-31.4218">fsim/tables/ps_idle_ms/h3/w1/v14</property>
      <property value="-38.2318">fsim/tables/ps_idle_ms/h3/w1/v15</property>
      <property value="-10.491">fsim/tables/ps_idle_ms/h3/w1/v2</property>
      <property value="-10.903">fsim/tables/ps_idle_ms/h3/w1/v3</property>
      <property value="-11.5114">fsim/tables/ps_idle_ms/h3/w1/v4</property>
      <property value="-12.3535">fsim/tables/ps_idle_ms/h3/w1/v5</property>
      <property value="-13.3796">fsim/tables/ps_idle_ms/h3/w1/v6</property>
      <property value="-14.6758">fsim/tables/ps_idle_ms/h3/w1/v7</property>
      <property value="-16.0757">fsim/tables/ps_idle_ms/h3/w1/v8</property>
      <property value="-17.7422">fsim/tables/ps_idle_ms/h3/w1/v9</property>
      <property value="-12.6244">fsim/tables/ps_idle_ms/h3/w2/v0</property>
      <property value="-12.2038">fsim/tables/ps_idle_ms/h3/w2/v1</property>
      <property value="-17.936">fsim/tables/ps_idle_ms/h3/w2/v10</property>
      <property value="-19.3624">fsim/tables/ps_idle_ms/h3/w2/v11</property>
      <property value="-21.1166">fsim/tables/ps_idle_ms/h3/w2/v12</property>
      <property value="-22.99">fsim/tables/ps_idle_ms/h3/w2/v13</property>
      <property value="-25.7428">fsim/tables/ps_idle_ms/h3/w2/v14</property>
      <property value="-29.843">fsim/tables/ps_idle_ms/h3/w2/v15</property>
      <property value="-12.2389">fsim/tables/ps_idle_ms/h3/w2/v2</property>
      <property value="-12.4739">fsim/tables/ps_idle_ms/h3/w2/v3</property>
      <property value="-12.8402">fsim/tables/ps_idle_ms/h3/w2/v4</property>
      <property value="-13.3239">fsim/tables/ps_idle_ms/h3/w2/v5</property>
      <property value="-13.9198">fsim/tables/ps_idle_ms/h3/w2/v6</property>
      <property value="-14.6942">fsim/tables/ps_idle_ms/h3/w2/v7</property>
      <property value="-15.5705">fsim/tables/ps_idle_ms/h3/w2/v8</property>
      <property value="-16.7094">fsim/tables/ps_idle_ms/h3/w2/v9</property>
      <property value="-8.67844">fsim/tables/ps_idle_ms/h4/w0/v0</property>
      <property value="-8.75713">fsim/tables/ps_idle_ms/h4/w0/v1</property>
      <property value="-21.1035">fsim/tables/ps_idle_ms/h4/w0/v10</property>
      <property value="-23.9709">fsim/tables/ps_idle_ms/h4/w0/v11</property>
      <property value="-27.2361">fsim/tables/ps_idle_ms/h4/w0/v12</property>
      <property value="-30.7948">fsim/tables/ps_idle_ms/h4/w0/v13</property>
      <property value="-36.3172">fsim/tables/ps_idle_ms/h4/w0/v14</property>
      <property value="-46.16">fsim/tables/ps_idle_ms/h4/w0/v15</property>
      <property value="-9.17567">fsim/tables/ps_idle_ms/h4/w0/v2</property>
      <property value="-9.81983">fsim/tables/ps_idle_ms/h4/w0/v3</property>
      <property value="-10.7364">fsim/tables/ps_idle_ms/h4/w0/v4</property>
      <property value="-11.8086">fsim/tables/ps_idle_ms/h4/w0/v5</property>
      <property value="-13.2138">fsim/tables/ps_idle_ms/h4/w0/v6</property>
      <property value="-14.7757">fsim/tables/ps_idle_ms/h4/w0/v7</property>
      <property value="-16.6968">fsim/tables/ps_idle_ms/h4/w0/v8</property>
      <property value="-18.7661">fsim/tables/ps_idle_ms/h4/w0/v9</property>
      <property value="-11.2845">fsim/tables/ps_idle_ms/h4/w1/v0</property>
      <property value="-11.1726">fsim/tables/ps_idle_ms/h4/w1/v1</property>
      <property value="-18.0036">fsim/tables/ps_idle_ms/h4/w1/v10</property>
      <property value="-19.7737">fsim/tables/ps_idle_ms/h4/w1/v11</property>
      <property value="-21.6833">fsim/tables/ps_idle_ms/h4/w1/v12</property>
      <property value="-23.7268">fsim/tables/ps_idle_ms/h4/w1/v13</property>
      <property value="-27.0452">fsim/tables/ps_idle_ms/h4/w1/v14</property>
      <property value="-32.0904">fsim/tables/ps_idle_ms/h4/w1/v15</property>
      <property value="-11.3196">fsim/tables/ps_idle_ms/h4/w1/v2</property>
      <property value="-11.604">fsim/tables/ps_idle_ms/h4/w1/v3</property>
      <property value="-12.0206">fsim/tables/ps_idle_ms/h4/w1/v4</property>
      <property value="-12.6188">fsim/tables/ps_idle_ms/h4/w1/v5</property>
      <property value="-13.3917">fsim/tables/ps_idle_ms/h4/w1/v6</property>
      <property value="-14.3089">fsim/tables/ps_idle_ms/h4/w1/v7</property>
      <property value="-15.4189">fsim/tables/ps_idle_ms/h4/w1/v8</property>
      <property value="-16.6601">fsim/tables/ps_idle_ms/h4/w1/v9</property>
      <property value="-13.9088">fsim/tables/ps_idle_ms/h4/w2/v0</property>
      <property value="-13.3256">fsim/tables/ps_idle_ms/h4/w2/v1</property>
      <property value="-17.0802">fsim/tables/ps_idle_ms/h4/w2/v10</property>
      <property value="-18.2096">fsim/tables/ps_idle_ms/h4/w2/v11</property>
      <property value="-19.3908">fsim/tables/ps_idle_ms/h4/w2/v12</property>
      <property value="-20.6765">fsim/tables/ps_idle_ms/h4/w2/v13</property>
      <property value="-22.7954">fsim/tables/ps_idle_ms/h4/w2/v14</property>
      <property value="-25.7916">fsim/tables/ps_idle_ms/h4/w2/v15</property>
      <property value="-13.2702">fsim/tables/ps_idle_ms/h4/w2/v2</property>
      <property value="-13.3753">fsim/tables/ps_idle_ms/h4/w2/v3</property>
      <property value="-13.6098">fsim/tables/ps_idle_ms/h4/w2/v4</property>
      <property value="-13.972">fsim/tables/ps_idle_ms/h4/w2/v5</property>
      <property value="-14.3887">fsim/tables/ps_idle_ms/h4/w2/v6</property>
      <property value="-14.9047">fsim/tables/ps_idle_ms/h4/w2/v7</property>
      <property value="-15.5142">fsim/tables/ps_idle_ms/h4/w2/v8</property>
      <property value="-16.2262">fsim/tables/ps_idle_ms/h4/w2/v9</property>
      <property value="-9.25764">fsim/tables/ps_idle_ms/h5/w0/v0</property>
      <property value="-9.23481">fsim/tables/ps_idle_ms/h5/w0/v1</property>
      <property value="-19.6289">fsim/tables/ps_idle_ms/h5/w0/v10</property>
      <property value="-21.9549">fsim/tables/ps_idle_ms/h5/w0/v11</property>
      <property value="-24.7647">fsim/tables/ps_idle_ms/h5/w0/v12</property>
      <property value="-27.8127">fsim/tables/ps_idle_ms/h5/w0/v13</property>
      <property value="-32.5982">fsim/tables/ps_idle_ms/h5/w0/v14</property>
      <property value="-40.6886">fsim/tables/ps_idle_ms/h5/w0/v15</property>
      <property value="-9.59661">fsim/tables/ps_idle_ms/h5/w0/v2</property>
      <property value="-10.1271">fsim/tables/ps_idle_ms/h5/w0/v3</property>
      <property value="-10.8394">fsim/tables/ps_idle_ms/h5/w0/v4</property>
      <property value="-11.8268">fsim/tables/ps_idle_ms/h5/w0/v5</property>
      <property value="-12.9664">fsim/tables/ps_idle_ms/h5/w0/v6</property>
      <property value="-14.3142">fsim/tables/ps_idle_ms/h5/w0/v7</property>
      <property value="-15.8587">fsim/tables/ps_idle_ms/h5/w0/v8</property>
      <property value="-17.6815">fsim/tables/ps_idle_ms/h5/w0/v9</property>
      <property value="-12.0753">fsim/tables/ps_idle_ms/h5/w1/v0</property>
      <property value="-11.8532">fsim/tables/ps_idle_ms/h5/w1/v1</property>
      <property value="-17.3087">fsim/tables/ps_idle_ms/h5/w1/v10</property>
      <property value="-18.618">fsim/tables/ps_idle_ms/h5/w1/v11</property>
      <property value="-20.2474">fsim/tables/ps_idle_ms/h5/w1/v12</property>
      <property value="-21.986">fsim/tables/ps_idle_ms/h5/w1/v13</property>
      <property value="-24.6624">fsim/tables/ps_idle_ms/h5/w1/v14</property>
      <property value="-28.5">fsim/tables/ps_idle_ms/h5/w1/v15</property>
      <property value="-11.9629">fsim/tables/ps_idle_ms/h5/w1/v2</property>
      <property value="-12.1738">fsim/tables/ps_idle_ms/h5/w1/v3</property>
      <property value="-12.5122">fsim/tables/ps_idle_ms/h5/w1/v4</property>
      <property value="-12.9487">fsim/tables/ps_idle_ms/h5/w1/v5</property>
      <property value="-13.5085">fsim/tables/ps_idle_ms/h5/w1/v6</property>
      <property value="-14.2755">fsim/tables/ps_idle_ms/h5/w1/v7</property>
      <property value="-15.1099">fsim/tables/ps_idle_ms/h5/w1/v8</property>
      <property value="-16.1556">fsim/tables/ps_idle_ms/h5/w1/v9</property>
      <property value="-14.0677">fsim/tables/ps_idle_ms/h5/w2/v0</property>
      <property value="-14.1634">fsim/tables/ps_idle_ms/h5/w2/v1</property>
      <property value="-17.527">fsim/tables/ps_idle_ms/h5/w2/v10</property>
      <property value="-18.2922">fsim/tables/ps_idle_ms/h5/w2/v11</property>
      <property value="-19.1412">fsim/tables/ps_idle_ms/h5/w2/v12</property>
      <property value="-20.0163">fsim/tables/ps_idle_ms/h5/w2/v13</property>
      <property value="-21.4829">fsim/tables/ps_idle_ms/h5/w2/v14</property>
      <property value="-23.4112">fsim/tables/ps_idle_ms/h5/w2/v15</property>
      <property value="-14.3395">fsim/tables/ps_idle_ms/h5/w2/v2</property>
      <property value="-14.5602">fsim/tables/ps_idle_ms/h5/w2/v3</property>
      <property value="-14.8214">fsim/tables/ps_idle_ms/h5/w2/v4</property>
      <property value="-15.1323">fsim/tables/ps_idle_ms/h5/w2/v5</property>
      <property value="-15.5146">fsim/tables/ps_idle_ms/h5/w2/v6</property>
      <property value="-15.8866">fsim/tables/ps_idle_ms/h5/w2/v7</property>
      <property value="-16.3914">fsim/tables/ps_idle_ms/h5/w2/v8</property>
      <property value="-16.9476">fsim/tables/ps_idle_ms/h5/w2/v9</property>
      <property value="-9.88507">fsim/tables/ps_idle_ms/h6/w0/v0</property>
      <property value="-9.88386">fsim/tables/ps_idle_ms/h6/w0/v1</property>
      <property value="-18.3448">fsim/tables/ps_idle_ms/h6/w0/v10</property>
      <property value="-20.2776">fsim/tables/ps_idle_ms/h6/w0/v11</property>
      <property value="-22.4437">fsim/tables/ps_idle_ms/h6/w0/v12</property>
      <property value="-25.0136">fsim/tables/ps_idle_ms/h6/w0/v13</property>
      <property value="-28.9914">fsim/tables/ps_idle_ms/h6/w0/v14</property>
      <property value="-35.2169">fsim/tables/ps_idle_ms/h6/w0/v15</property>
      <property value="-10.1218">fsim/tables/ps_idle_ms/h6/w0/v2</property>
      <property value="-10.5232">fsim/tables/ps_idle_ms/h6/w0/v3</property>
      <property value="-11.1086">fsim/tables/ps_idle_ms/h6/w0/v4</property>
      <property value="-11.9187">fsim/tables/ps_idle_ms/h6/w0/v5</property>
      <property value="-12.8021">fsim/tables/ps_idle_ms/h6/w0/v6</property>
      <property value="-13.9452">fsim/tables/ps_idle_ms/h6/w0/v7</property>
      <property value="-15.199">fsim/tables/ps_idle_ms/h6/w0/v8</property>
      <property value="-16.6592">fsim/tables/ps_idle_ms/h6/w0/v9</property>
      <property value="-12.9389">fsim/tables/ps_idle_ms/h6/w1/v0</property>
      <property value="-12.6005">fsim/tables/ps_idle_ms/h6/w1/v1</property>
      <property value="-16.6973">fsim/tables/ps_idle_ms/h6/w1/v10</property>
      <property value="-17.8065">fsim/tables/ps_idle_ms/h6/w1/v11</property>
      <property value="-18.9713">fsim/tables/ps_idle_ms/h6/w1/v12</property>
      <property value="-20.3381">fsim/tables/ps_idle_ms/h6/w1/v13</property>
      <property value="-22.4834">fsim/tables/ps_idle_ms/h6/w1/v14</property>
      <property value="-25.5261">fsim/tables/ps_idle_ms/h6/w1/v15</property>
      <property value="-12.6559">fsim/tables/ps_idle_ms/h6/w1/v2</property>
      <property value="-12.7969">fsim/tables/ps_idle_ms/h6/w1/v3</property>
      <property value="-13.0256">fsim/tables/ps_idle_ms/h6/w1/v4</property>
      <property value="-13.3796">fsim/tables/ps_idle_ms/h6/w1/v5</property>
      <property value="-13.8221">fsim/tables/ps_idle_ms/h6/w1/v6</property>
      <property value="-14.3103">fsim/tables/ps_idle_ms/h6/w1/v7</property>
      <property value="-15.0072">fsim/tables/ps_idle_ms/h6/w1/v8</property>
      <property value="-15.7593">fsim/tables/ps_idle_ms/h6/w1/v9</property>
      <property value="-15.4324">fsim/tables/ps_idle_ms/h6/w2/v0</property>
      <property value="-15.5859">fsim/tables/ps_idle_ms/h6/w2/v1</property>
      <property value="-17.9449">fsim/tables/ps_idle_ms/h6/w2/v10</property>
      <property value="-18.2867">fsim/tables/ps_idle_ms/h6/w2/v11</property>
      <property value="-18.6514">fsim/tables/ps_idle_ms/h6/w2/v12</property>
      <property value="-19.1039">fsim/tables/ps_idle_ms/h6/w2/v13</property>
      <property value="-19.8287">fsim/tables/ps_idle_ms/h6/w2/v14</property>
      <property value="-20.7695">fsim/tables/ps_idle_ms/h6/w2/v15</property>
      <property value="-15.7326">fsim/tables/ps_idle_ms/h6/w2/v2</property>
      <property value="-15.942">fsim/tables/ps_idle_ms/h6/w2/v3</property>
      <property value="-16.1703">fsim/tables/ps_idle_ms/h6/w2/v4</property>
      <property value="-16.3978">fsim/tables/ps_idle_ms/h6/w2/v5</property>
      <property value="-16.6328">fsim/tables/ps_idle_ms/h6/w2/v6</property>
      <property value="-16.9221">fsim/tables/ps_idle_ms/h6/w2/v7</property>
      <property value="-17.2615">fsim/tables/ps_idle_ms/h6/w2/v8</property>
      <property value="-17.6026">fsim/tables/ps_idle_ms/h6/w2/v9</property>
      <property value="292.423">fsim/tables/reach_tas_ms/h0/w0</property>
      <property value="291.798">fsim/tables/reach_tas_ms/h0/w1</property>
      <property value="291.305">fsim/tables/reach_tas_ms/h0/w2</property>
      <property value="289.305">fsim/tables/reach_tas_ms/h1/w0</property>
      <property value="288.545">fsim/tables/reach_tas_ms/h1/w1</property>
      <property value="287.926">fsim/tables/reach_tas_ms/h1/w2</property>
      <property value="285.393">fsim/tables/reach_tas_ms/h2/w0</property>
      <property value="284.568">fsim/tables/reach_tas_ms/h2/w1</property>
      <property value="283.494">fsim/tables/reach_tas_ms/h2/w2</property>
      <property value="279.629">fsim/tables/reach_tas_ms/h3/w0</property>
      <property value="278.456">fsim/tables/reach_tas_ms/h3/w1</property>
      <property value="276.842">fsim/tables/reach_tas_ms/h3/w2</property>
      <property value="274.884">fsim/tables/reach_tas_ms/h4/w0</property>
      <property value="273.114">fsim/tables/reach_tas_ms/h4/w1</property>
      <property value="270.824">fsim/tables/reach_tas_ms/h4/w2</property>
      <property value="271.408">fsim/tables/reach_tas_ms/h5/w0</property>
      <property value="269.202">fsim/tables/reach_tas_ms/h5/w1</property>
      <property value="266.29">fsim/tables/reach_tas_ms/h5/w2</property>
      <property value="267.283">fsim/tables/reach_tas_ms/h6/w0</property>
      <property value="264.564">fsim/tables/reach_tas_ms/h6/w1</property>
      <property value="258.377">fsim/tables/reach_tas_ms/h6/w2</property>
      <property value="0.0">fsim/tables/speed_fraction/v0</property>
      <property value="0.0666667">fsim/tables/speed_fraction/v1</property>
      <property value="0.666667">fsim/tables/speed_fraction/v10</property>
      <property value="0.733333">fsim/tables/speed_fraction/v11</property>
      <property value="0.8">fsim/tables/speed_fraction/v12</property>
      <property value="0.866667">fsim/tables/speed_fraction/v13</property>
      <property value="0.933333">fsim/tables/speed_fraction/v14</property>
      <property value="1">fsim/tables/speed_fraction/v15</property>
      <property value="0.133333">fsim/tables/speed_fraction/v2</property>
      <property value="0.2">fsim/tables/speed_fraction/v3</property>
      <property value="0.266667">fsim/tables/speed_fraction/v4</property>
      <property value="0.333333">fsim/tables/speed_fraction/v5</property>
      <property value="0.4">fsim/tables/speed_fraction/v6</property>
      <property value="0.466667">fsim/tables/speed_fraction/v7</property>
      <property value="0.533333">fsim/tables/speed_fraction/v8</property>
      <property value="0.6">fsim/tables/speed_fraction/v9</property>
      <property value="59.3101">fsim/tables/stall_cas_ms/h0/w0</property>
      <property value="71.8962">fsim/tables/stall_cas_ms/h0/w1</property>
      <property value="82.5861">fsim/tables/stall_cas_ms/h0/w2</property>
      <property value="59.3505">fsim/tables/stall_cas_ms/h1/w0</property>
      <property value="71.9453">fsim/tables/stall_cas_ms/h1/w1</property>
      <property value="82.6424">fsim/tables/stall_cas_ms/h1/w2</property>
      <property value="59.74">fsim/tables/stall_cas_ms/h2/w0</property>
      <property value="72.4174">fsim/tables/stall_cas_ms/h2/w1</property>
      <property value="83.1847">fsim/tables/stall_cas_ms/h2/w2</property>
      <property value="59.7791">fsim/tables/stall_cas_ms/h3/w0</property>
      <property value="72.4649">fsim/tables/stall_cas_ms/h3/w1</property>
      <property value="83.2392">fsim/tables/stall_cas_ms/h3/w2</property>
      <property value="59.7017">fsim/tables/stall_cas_ms/h4/w0</property>
      <property value="72.371">fsim/tables/stall_cas_ms/h4/w1</property>
      <property value="83.1314">fsim/tables/stall_cas_ms/h4/w2</property>
      <property value="59.9772">fsim/tables/stall_cas_ms/h5/w0</property>
      <property value="72.705">fsim/tables/stall_cas_ms/h5/w1</property>
      <property value="83.5151">fsim/tables/stall_cas_ms/h5/w2</property>
      <property value="59.8506">fsim/tables/stall_cas_ms/h6/w0</property>
      <property value="72.5514">fsim/tables/stall_cas_ms/h6/w1</property>
      <property value="83.3387">fsim/tables/stall_cas_ms/h6/w2</property>
      <property value="92306.7">fsim/tables/weight_kg/w0</property>
      <property value="135640">fsim/tables/weight_kg/w1</property>
      <property value="178974">fsim/tables/weight_kg/w2</property>
      <channel name="Pitch">
        <summer name="fcs/pitch-trim-sum">
          <input>fcs/elevator-cmd-norm</input>
          <input>fcs/pitch-trim-cmd-norm</input>
          <clipto> <min>-1</min> <max>1</max> </clipto>
        </summer>
        <aerosurface_scale name="fcs/elevator-control">
          <input>fcs/pitch-trim-sum</input>
          <range> <min>-25.00</min> <max>20.00</max> </range>
          <gain>0.0174533</gain>
        </aerosurface_scale>
        <actuator name="fcs/elevator-actuator">
          <input>fcs/elevator-control</input>
          <rate_limit>2.0</rate_limit>
          <output>fcs/elevator-pos-rad</output>
        </actuator>
      </channel>
      <channel name="Roll">
        <summer name="fcs/roll-trim-sum">
          <input>fcs/aileron-cmd-norm</input>
          <input>fcs/roll-trim-cmd-norm</input>
          <clipto> <min>-1</min> <max>1</max> </clipto>
        </summer>
        <aerosurface_scale name="fcs/left-aileron-control">
          <input>fcs/roll-trim-sum</input>
          <range> <min>-20.00</min> <max>20.00</max> </range>
          <gain>0.0174533</gain>
        </aerosurface_scale>
        <actuator name="fcs/left-aileron-actuator">
          <input>fcs/left-aileron-control</input>
          <rate_limit>2.0</rate_limit>
          <output>fcs/left-aileron-pos-rad</output>
        </actuator>
        <pure_gain name="fcs/right-aileron">
          <input>fcs/left-aileron-pos-rad</input>
          <gain>-1</gain>
          <output>fcs/right-aileron-pos-rad</output>
        </pure_gain>
      </channel>
      <channel name="Yaw">
        <summer name="fcs/yaw-trim-sum">
          <input>fcs/rudder-cmd-norm</input>
          <input>fcs/yaw-trim-cmd-norm</input>
          <clipto> <min>-1</min> <max>1</max> </clipto>
        </summer>
        <aerosurface_scale name="fcs/rudder-control">
          <input>fcs/yaw-trim-sum</input>
          <range> <min>-26.00</min> <max>26.00</max> </range>
          <gain>0.0174533</gain>
        </aerosurface_scale>
        <!-- the yaw damper (hangar/fcs.py yaw_damper): the yaw rate, washed out so a
             steady turn's is left alone, against itself through the rudder - the
             dutch roll damped to 0.30 at 1 g across the speed range -->
        <washout_filter name="fcs/yaw-damper-washout">
          <input>velocities/r-rad_sec</input>
          <c1>0.500</c1>
        </washout_filter>
        <fcs_function name="fcs/yaw-damper">
          <function>
            <product>
              <value>-1</value>
              <table>
                <independentVar lookup="row">aero/qbar-psf</independentVar>
                <tableData>
                  10.0   -0.40000
                  20.0   -2.35000
                  40.0   -3.00000
                  80.0   -3.00000
                 150.0   -1.25000
                 300.0   -0.25307
                 600.0   -0.09215
                1200.0   -0.05562
                2400.0   -0.05985
                </tableData>
              </table>
              <property>fcs/yaw-damper-washout</property>
            </product>
          </function>
          <clipto> <min>-0.22689</min> <max>0.22689</max> </clipto>
        </fcs_function>
        <summer name="fcs/rudder-sum">
          <input>fcs/rudder-control</input>
          <input>fcs/yaw-damper</input>
          <clipto> <min>-0.45379</min> <max>0.45379</max> </clipto>
        </summer>
        <actuator name="fcs/rudder-actuator">
          <input>fcs/rudder-sum</input>
          <rate_limit>2.0</rate_limit>
          <output>fcs/rudder-pos-rad</output>
        </actuator>
        <!-- the nose or tail wheel steers with the rudder pedals (JSBSim steers from
             fcs/steer-cmd-norm, positive right; the rudder command is positive left) -->
        <pure_gain name="fcs/steer-from-rudder">
          <input>fcs/yaw-trim-sum</input>
          <gain>-1</gain>
          <output>fcs/steer-cmd-norm</output>
        </pure_gain>
      </channel>
      <channel name="Flaps">
        <kinematic name="fcs/flaps-control">
          <input>fcs/flap-cmd-norm</input>
          <traverse>
            <setting> <position>0.0</position> <time>0.0</time> </setting>
            <setting> <position>7.5</position> <time>2.0</time> </setting>
            <setting> <position>15.0</position> <time>2.0</time> </setting>
            <setting> <position>22.5</position> <time>2.0</time> </setting>
            <setting> <position>30.0</position> <time>2.0</time> </setting>
          </traverse>
          <output>fcs/flap-pos-deg</output>
        </kinematic>
        <pure_gain name="fcs/flaps-normalized">
          <input>fcs/flap-pos-deg</input>
          <gain>0.0333333</gain>
          <output>fcs/flap-pos-norm</output>
        </pure_gain>
      </channel>
      <channel name="Speedbrake">
        <kinematic name="fcs/speedbrake-control">
          <input>fcs/speedbrake-cmd-norm</input>
          <traverse>
            <setting> <position>0</position> <time>0</time> </setting>
            <setting> <position>1</position> <time>2.00</time> </setting>
          </traverse>
          <output>fcs/speedbrake-pos-norm</output>
        </kinematic>
      </channel>
      <channel name="Landing Gear">
        <kinematic name="fcs/gear-control">
          <input>gear/gear-cmd-norm</input>
          <traverse>
            <setting> <position>0</position> <time>0</time> </setting>
            <setting> <position>1</position> <time>5</time> </setting>
          </traverse>
          <output>gear/gear-pos-norm</output>
        </kinematic>
      </channel>
    </flight_control>
    <aerodynamics>
        <function name="aero/function/mach-lift">
          <description>lift, and damping, over its low-speed value (hangar: aero/mach.py)</description>
          <table>
            <independentVar lookup="row">velocities/mach</independentVar>
            <tableData>
                 0.000     1.000000
                 0.300     1.026251
                 0.500     1.080017
                 0.600     1.123836
                 0.700     1.185681
                 0.800     1.277230
                 0.850     1.341877
                 0.900     1.428135
                 0.950     1.448853
                 1.000     1.444470
                 1.050     1.423354
                 1.100     1.393871
                 1.200     1.343272
            </tableData>
          </table>
        </function>
        <function name="aero/function/mach-side">
          <description>side force, rolling and yawing moment over their low-speed values</description>
          <table>
            <independentVar lookup="row">velocities/mach</independentVar>
            <tableData>
                 0.000     1.000000
                 0.300     1.016120
                 0.500     1.048633
                 0.600     1.074734
                 0.700     1.111139
                 0.800     1.164466
                 0.850     1.201952
                 0.900     1.252160
                 0.950     1.257185
                 1.000     1.255934
                 1.050     1.250707
                 1.100     1.243801
                 1.200     1.234155
            </tableData>
          </table>
        </function>
        <function name="aero/function/mach-dCm-dCL">
          <description>pitching moment per unit low-speed lift: the neutral point's move</description>
          <table>
            <independentVar lookup="row">velocities/mach</independentVar>
            <tableData>
                 0.000     0.000000
                 0.300    -0.015909
                 0.500    -0.049224
                 0.600    -0.077149
                 0.700    -0.117821
                 0.800    -0.180867
                 0.850    -0.227373
                 0.900    -0.291353
                 0.950    -0.331107
                 1.000    -0.360687
                 1.050    -0.382313
                 1.100    -0.398883
                 1.200    -0.432412
            </tableData>
          </table>
        </function>
        <function name="aero/function/mach-dCD0">
          <description>zero-lift drag's change: friction and wave drag</description>
          <table>
            <independentVar lookup="row">velocities/mach</independentVar>
            <tableData>
                 0.000     0.000000
                 0.300    -0.000120
                 0.500    -0.000327
                 0.600    -0.000466
                 0.700    -0.000625
                 0.800    -0.000089
                 0.850     0.003057
                 0.900     0.018068
                 0.950     0.039958
                 1.000     0.059681
                 1.050     0.068191
                 1.100     0.068079
                 1.200     0.067846
            </tableData>
          </table>
        </function>
        <function name="aero/function/mach-dK">
          <description>induced-drag factor's change (per CL^2)</description>
          <table>
            <independentVar lookup="row">velocities/mach</independentVar>
            <tableData>
                 0.000     0.000000
                 0.300     0.003925
                 0.500     0.011089
                 0.600     0.016183
                 0.700     0.022434
                 0.800     0.030075
                 0.850     0.034555
                 0.900     0.039611
                 0.950     0.040693
                 1.000     0.040468
                 1.050     0.047335
                 1.100     0.065085
                 1.200     0.100309
            </tableData>
          </table>
        </function>
        <function name="aero/function/mach-aileron">
          <description>aileron power over its low-speed value</description>
          <table>
            <independentVar lookup="row">velocities/mach</independentVar>
            <tableData>
                 0.000     1.000000
                 0.300     1.026471
                 0.500     1.080546
                 0.600     1.124465
                 0.700     1.186188
                 0.800     1.276913
                 0.850     1.340475
                 0.900     1.424797
                 0.950     1.358482
                 1.000     1.234477
                 1.050     1.072012
                 1.100     0.890316
                 1.200     0.546155
            </tableData>
          </table>
        </function>
        <function name="aero/function/mach-elevator">
          <description>elevator power over its low-speed value</description>
          <table>
            <independentVar lookup="row">velocities/mach</independentVar>
            <tableData>
                 0.000     1.000000
                 0.300     1.027413
                 0.500     1.084226
                 0.600     1.131319
                 0.700     1.199274
                 0.800     1.304054
                 0.850     1.382126
                 0.900     1.494147
                 0.950     1.438830
                 1.000     1.319427
                 1.050     1.157298
                 1.100     0.973808
                 1.200     0.628189
            </tableData>
          </table>
        </function>
        <function name="aero/function/mach-flap">
          <description>flap power over its low-speed value</description>
          <table>
            <independentVar lookup="row">velocities/mach</independentVar>
            <tableData>
                 0.000     1.000000
                 0.300     1.031892
                 0.500     1.098421
                 0.600     1.153914
                 0.700     1.234329
                 0.800     1.358383
                 0.850     1.450154
                 0.900     1.579458
                 0.950     1.525369
                 1.000     1.401044
                 1.050     1.229896
                 1.100     1.035336
                 1.200     0.669628
            </tableData>
          </table>
        </function>
        <function name="aero/function/mach-rudder">
          <description>rudder power over its low-speed value</description>
          <table>
            <independentVar lookup="row">velocities/mach</independentVar>
            <tableData>
                 0.000     1.000000
                 0.300     1.019450
                 0.500     1.058738
                 0.600     1.090262
                 0.700     1.134074
                 0.800     1.197650
                 0.850     1.241778
                 0.900     1.300058
                 0.950     1.247899
                 1.000     1.153445
                 1.050     1.030794
                 1.100     0.894044
                 1.200     0.634643
            </tableData>
          </table>
        </function>
        <function name="aero/function/CL-base">
          <description>CL over alpha and beta at low speed</description>
          <table>
            <independentVar lookup="row">aero/alpha-deg</independentVar>
            <independentVar lookup="column">aero/beta-deg</independentVar>
            <tableData>
                        -90.00    -70.00    -50.00    -40.00    -30.00    -25.00    -20.00    -15.00    -10.00     -6.00     -3.00      0.00      3.00      6.00     10.00     15.00     20.00     25.00     30.00     40.00     50.00     70.00     90.00
             -180.00   0.00000   0.00706   0.00783   0.09380   0.17795   0.21135   0.23766   0.25742   0.27139   0.27851   0.28150   0.28249   0.28150   0.27851   0.27139   0.25742   0.23766   0.21135   0.17795   0.09380   0.00783   0.00706   0.00000
             -120.00  -0.00001   0.15456   0.40192   0.53389   0.65342   0.70465   0.74841   0.78361   0.80938   0.82357   0.83000   0.83028   0.83000   0.82357   0.80938   0.78361   0.74841   0.70465   0.65342   0.53389   0.40192   0.15456  -0.00001
              -70.00  -0.00001  -0.13533  -0.37175  -0.50034  -0.61843  -0.66942  -0.71316  -0.74845  -0.77436  -0.78821  -0.79239  -0.79183  -0.79239  -0.78821  -0.77436  -0.74845  -0.71316  -0.66942  -0.61843  -0.50034  -0.37175  -0.13533  -0.00001
              -46.00  -0.00000  -0.24081  -0.69706  -0.93510  -1.15710  -1.25230  -1.33371  -1.39970  -1.44644  -1.46426  -1.47193  -1.47449  -1.47193  -1.46426  -1.44644  -1.39970  -1.33371  -1.25230  -1.15710  -0.93510  -0.69706  -0.24081  -0.00000
              -32.00  -0.00000  -0.27157  -0.76823  -1.03254  -1.31351  -1.43448  -1.53853  -1.59365  -1.63272  -1.65593  -1.66760  -1.67205  -1.66760  -1.65593  -1.63272  -1.59365  -1.53853  -1.43448  -1.31351  -1.03254  -0.76823  -0.27157  -0.00000
              -22.00  -0.00000  -0.20125  -0.68382  -0.95263  -1.15404  -1.26149  -1.37053  -1.44342  -1.49633  -1.52358  -1.53509  -1.53893  -1.53509  -1.52358  -1.49633  -1.44342  -1.37053  -1.26149  -1.15404  -0.95263  -0.68382  -0.20125  -0.00000
              -17.00  -0.00000  -0.14693  -0.58913  -0.71399  -0.84214  -0.92472  -1.00492  -1.05924  -1.09807  -1.11778  -1.12602  -1.12875  -1.12602  -1.11778  -1.09807  -1.05924  -1.00492  -0.92472  -0.84214  -0.71399  -0.58913  -0.14693  -0.00000
              -13.00  -0.00000  -0.10008  -0.42844  -0.47979  -0.56834  -0.62549  -0.67892  -0.71656  -0.74297  -0.75607  -0.76144  -0.76320  -0.76144  -0.75607  -0.74297  -0.71656  -0.67892  -0.62549  -0.56834  -0.47979  -0.42844  -0.10008  -0.00000
               -9.00  -0.00000  -0.05258  -0.19904  -0.22093  -0.28545  -0.31531  -0.34457  -0.36566  -0.37988  -0.38649  -0.38900  -0.38978  -0.38900  -0.38649  -0.37988  -0.36566  -0.34457  -0.31531  -0.28545  -0.22093  -0.19904  -0.05258  -0.00000
               -5.00  -0.00000  -0.02081   0.00227   0.01300   0.00188  -0.00166  -0.00925  -0.01438  -0.01713  -0.01777  -0.01763  -0.01747  -0.01763  -0.01777  -0.01713  -0.01438  -0.00925  -0.00166   0.00188   0.01300   0.00227  -0.02081  -0.00000
               -1.00  -0.00000   0.00354   0.20120   0.25163   0.28972   0.31102   0.32304   0.33315   0.34094   0.34530   0.34734   0.34811   0.34734   0.34530   0.34094   0.33315   0.32304   0.31102   0.28972   0.25163   0.20120   0.00354  -0.00000
                3.00   0.00000   0.04984   0.41111   0.49279   0.57728   0.62106   0.65162   0.67651   0.69438   0.70333   0.70693   0.70807   0.70693   0.70333   0.69438   0.67651   0.65162   0.62106   0.57728   0.49279   0.41111   0.04984   0.00000
                7.00   0.00000   0.10034   0.59299   0.73710   0.85408   0.91718   0.96267   1.00138   1.02886   1.04249   1.04799   1.04974   1.04799   1.04249   1.02886   1.00138   0.96267   0.91718   0.85408   0.73710   0.59299   0.10034   0.00000
               11.00   0.00000   0.14932   0.62176   0.96042   1.13563   1.21909   1.27850   1.33205   1.37020   1.38947   1.39746   1.40009   1.39746   1.38947   1.37020   1.33205   1.27850   1.21909   1.13563   0.96042   0.62176   0.14932   0.00000
               15.00   0.00000   0.19554   0.71197   1.08649   1.38100   1.48867   1.56871   1.64576   1.70143   1.73001   1.74205   1.74606   1.74205   1.73001   1.70143   1.64576   1.56871   1.48867   1.38100   1.08649   0.71197   0.19554   0.00000
               19.00   0.00000   0.23826   0.79985   1.06770   1.41181   1.55877   1.64152   1.72826   1.79107   1.82346   1.83720   1.84177   1.83720   1.82346   1.79107   1.72826   1.64152   1.55877   1.41181   1.06770   0.79985   0.23826   0.00000
               23.00   0.00000   0.27693   0.75488   1.03642   1.26580   1.36958   1.45595   1.55098   1.63437   1.69908   1.73879   1.75427   1.73879   1.69908   1.63437   1.55098   1.45595   1.36958   1.26580   1.03642   0.75488   0.27693   0.00000
               27.00   0.00000   0.30462   0.73971   1.00259   1.23228   1.32283   1.40398   1.49332   1.55632   1.58339   1.58892   1.58833   1.58892   1.58339   1.55632   1.49332   1.40398   1.32283   1.23228   1.00259   0.73971   0.30462   0.00000
               32.00   0.00000   0.27853   0.73813   0.98582   1.18824   1.27772   1.35990   1.43493   1.49226   1.52188   1.53441   1.53860   1.53441   1.52188   1.49226   1.43493   1.35990   1.27772   1.18824   0.98582   0.73813   0.27853   0.00000
               46.00   0.00000   0.23347   0.67844   0.90587   1.11424   1.20188   1.27608   1.33759   1.37302   1.39123   1.39901   1.40155   1.39901   1.39123   1.37302   1.33759   1.27608   1.20188   1.11424   0.90587   0.67844   0.23347   0.00000
               70.00   0.00001   0.11876   0.31530   0.42143   0.51823   0.55991   0.59560   0.62437   0.64547   0.65681   0.65993   0.65901   0.65993   0.65681   0.64547   0.62437   0.59560   0.55991   0.51823   0.42143   0.31530   0.11876   0.00001
              120.00   0.00001  -0.16371  -0.43112  -0.57484  -0.70541  -0.76147  -0.80940  -0.84798  -0.87625  -0.89174  -0.89872  -0.89919  -0.89872  -0.89174  -0.87625  -0.84798  -0.80940  -0.76147  -0.70541  -0.57484  -0.43112  -0.16371   0.00001
              180.00   0.00000   0.00706   0.00783   0.09380   0.17795   0.21135   0.23766   0.25742   0.27139   0.27851   0.28150   0.28249   0.28150   0.27851   0.27139   0.25742   0.23766   0.21135   0.17795   0.09380   0.00783   0.00706   0.00000
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            </tableData>
          </table>
        </function>
      <axis name="DRAG">
        <function name="aero/coefficient/CD_base">
          <description>CD over alpha and beta (hangar)</description>
          <product>
            <property>aero/qbar-psf</property>
            <property>metrics/Sw-sqft</property>
          <table>
            <independentVar lookup="row">aero/alpha-deg</independentVar>
            <independentVar lookup="column">aero/beta-deg</independentVar>
            <tableData>
                        -90.00    -70.00    -50.00    -40.00    -30.00    -25.00    -20.00    -15.00    -10.00     -6.00     -3.00      0.00      3.00      6.00     10.00     15.00     20.00     25.00     30.00     40.00     50.00     70.00     90.00
             -180.00   0.66398   0.54301   0.30354   0.19053   0.10428   0.07336   0.05061   0.03536   0.02411   0.02191   0.02189   0.02195   0.02189   0.02191   0.02411   0.03536   0.05061   0.07336   0.10428   0.19053   0.30354   0.54301   0.66398
             -120.00   0.66398   0.66554   0.83269   1.00157   1.19923   1.29671   1.38605   1.46200   1.51994   1.55067   1.56403   1.56868   1.56403   1.55067   1.51994   1.46200   1.38605   1.29671   1.19923   1.00157   0.83269   0.66554   0.66398
              -70.00   0.66398   0.70194   0.93410   1.14188   1.37863   1.49389   1.59896   1.68801   1.75583   1.79194   1.80743   1.81280   1.80743   1.79194   1.75583   1.68801   1.59896   1.49389   1.37863   1.14188   0.93410   0.70194   0.66398
              -46.00   0.66398   0.65753   0.71378   0.76959   0.85879   0.90781   0.95486   0.99836   1.02938   1.03907   1.04309   1.04438   1.04309   1.03907   1.02938   0.99836   0.95486   0.90781   0.85879   0.76959   0.71378   0.65753   0.66398
              -32.00   0.66398   0.63298   0.54637   0.52481   0.55503   0.57729   0.59887   0.58221   0.57015   0.56282   0.55756   0.55415   0.55756   0.56282   0.57015   0.58221   0.59887   0.57729   0.55503   0.52481   0.54637   0.63298   0.66398
              -22.00   0.66398   0.61675   0.44291   0.35525   0.30018   0.29308   0.27014   0.24831   0.23173   0.22291   0.21913   0.21786   0.21913   0.22291   0.23173   0.24831   0.27014   0.29308   0.30018   0.35525   0.44291   0.61675   0.66398
              -17.00   0.66398   0.60753   0.40186   0.28760   0.23502   0.19974   0.17323   0.15113   0.13483   0.12634   0.12273   0.12153   0.12273   0.12634   0.13483   0.15113   0.17323   0.19974   0.23502   0.28760   0.40186   0.60753   0.66398
              -13.00   0.66398   0.60091   0.37530   0.25728   0.19495   0.14721   0.11866   0.09628   0.08009   0.07181   0.06834   0.06718   0.06834   0.07181   0.08009   0.09628   0.11866   0.14721   0.19495   0.25728   0.37530   0.60091   0.66398
               -9.00   0.66398   0.59504   0.37162   0.24321   0.16282   0.11481   0.08501   0.06220   0.04601   0.03791   0.03456   0.03346   0.03456   0.03791   0.04601   0.06220   0.08501   0.11481   0.16282   0.24321   0.37162   0.59504   0.66398
               -5.00   0.66398   0.59053   0.36296   0.23343   0.14800   0.10325   0.07260   0.04926   0.03295   0.02496   0.02174   0.02069   0.02174   0.02496   0.03295   0.04926   0.07260   0.10325   0.14800   0.23343   0.36296   0.59053   0.66398
               -1.00   0.66398   0.59014   0.36087   0.23610   0.15453   0.11236   0.08090   0.05698   0.04037   0.03230   0.02910   0.02810   0.02910   0.03230   0.04037   0.05698   0.08090   0.11236   0.15453   0.23610   0.36087   0.59014   0.66398
                3.00   0.66398   0.59169   0.36930   0.25773   0.18082   0.14198   0.10914   0.08483   0.06777   0.05932   0.05579   0.05464   0.05579   0.05932   0.06777   0.08483   0.10914   0.14198   0.18082   0.25773   0.36930   0.59169   0.66398
                7.00   0.66398   0.59473   0.39377   0.29563   0.23097   0.19716   0.16010   0.13714   0.11877   0.11062   0.10636   0.10134   0.10636   0.11062   0.11877   0.13714   0.16010   0.19716   0.23097   0.29563   0.39377   0.59473   0.66398
               11.00   0.66398   0.59942   0.44229   0.34058   0.29714   0.26717   0.22932   0.20260   0.18233   0.17386   0.16809   0.16557   0.16809   0.17386   0.18233   0.20260   0.22932   0.26717   0.29714   0.34058   0.44229   0.59942   0.66398
               15.00   0.66398   0.60546   0.50635   0.42681   0.38723   0.36292   0.32454   0.29098   0.26595   0.25257   0.24598   0.24352   0.24598   0.25257   0.26595   0.29098   0.32454   0.36292   0.38723   0.42681   0.50635   0.60546   0.66398
               19.00   0.66398   0.61246   0.50161   0.45678   0.51187   0.47135   0.41937   0.37189   0.33455   0.31266   0.30270   0.29941   0.30270   0.31266   0.33455   0.37189   0.41937   0.47135   0.51187   0.45678   0.50161   0.61246   0.66398
               23.00   0.66398   0.62021   0.50069   0.47097   0.47223   0.45365   0.43584   0.42242   0.41033   0.39685   0.38850   0.38716   0.38850   0.39685   0.41033   0.42242   0.43584   0.45365   0.47223   0.47097   0.50069   0.62021   0.66398
               27.00   0.66398   0.62845   0.53393   0.50742   0.51893   0.49352   0.48104   0.48689   0.49265   0.48565   0.47423   0.46695   0.47423   0.48565   0.49265   0.48689   0.48104   0.49352   0.51893   0.50742   0.53393   0.62845   0.66398
               32.00   0.66398   0.63789   0.59036   0.58310   0.59555   0.60486   0.60123   0.60738   0.61392   0.61742   0.61894   0.61949   0.61894   0.61742   0.61392   0.60738   0.60123   0.60486   0.59555   0.58310   0.59036   0.63789   0.66398
               46.00   0.66398   0.66404   0.75914   0.84765   0.96141   1.01736   1.06870   1.11408   1.13928   1.15260   1.15813   1.15978   1.15813   1.15260   1.13928   1.11408   1.06870   1.01736   0.96141   0.84765   0.75914   0.66404   0.66398
               70.00   0.66398   0.70578   0.95905   1.18445   1.43943   1.56332   1.67614   1.77166   1.84437   1.88306   1.89965   1.90538   1.89965   1.88306   1.84437   1.77166   1.67614   1.56332   1.43943   1.18445   0.95905   0.70578   0.66398
              120.00   0.66398   0.66034   0.80058   0.94770   1.12174   1.20803   1.28730   1.35483   1.40642   1.43378   1.44570   1.44987   1.44570   1.43378   1.40642   1.35483   1.28730   1.20803   1.12174   0.94770   0.80058   0.66034   0.66398
              180.00   0.66398   0.54301   0.30354   0.19053   0.10428   0.07336   0.05061   0.03536   0.02411   0.02191   0.02189   0.02195   0.02189   0.02191   0.02411   0.03536   0.05061   0.07336   0.10428   0.19053   0.30354   0.54301   0.66398
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            </tableData>
          </table>
          </product>
        </function>
        <function name="aero/coefficient/CD_mach">
          <description>zero-lift drag's change with Mach: friction, wave drag</description>
          <product>
            <property>aero/qbar-psf</property>
            <property>metrics/Sw-sqft</property>
            <property>aero/function/mach-dCD0</property>
          </product>
        </function>
        <function name="aero/coefficient/CD_induced_mach">
          <description>induced drag's change with Mach (leading-edge suction lost)</description>
          <product>
            <property>aero/qbar-psf</property>
            <property>metrics/Sw-sqft</property>
            <property>aero/cl-squared</property>
            <property>aero/function/mach-dK</property>
          </product>
        </function>
        <function name="aero/coefficient/CD_aileron">
          <description>CD increment from aileron (deg), over alpha</description>
          <product>
            <property>aero/qbar-psf</property>
            <property>metrics/Sw-sqft</property>
            <property>aero/function/mach-aileron</property>
          <table>
            <independentVar lookup="row">aero/alpha-deg</independentVar>
            <independentVar lookup="column">fcs/left-aileron-pos-deg</independentVar>
            <tableData>
                        -20.00    -15.00    -10.00     -5.00      0.00      5.00     10.00     15.00     20.00
             -180.00   0.00301   0.00173   0.00078   0.00020   0.00000   0.00020   0.00078   0.00173   0.00301
             -120.00   0.00298   0.00170   0.00077   0.00019   0.00000   0.00019   0.00077   0.00170   0.00298
              -70.00   0.00297   0.00170   0.00077   0.00019   0.00000   0.00019   0.00077   0.00170   0.00297
              -46.00   0.00773   0.00505   0.00258   0.00070   0.00000   0.00070   0.00258   0.00505   0.00773
              -32.00   0.01846   0.01414   0.00797   0.00228   0.00000   0.00228   0.00797   0.01414   0.01846
              -22.00   0.00580   0.00360   0.00174   0.00045   0.00000   0.00045   0.00174   0.00360   0.00580
              -17.00   0.00707   0.00455   0.00229   0.00062   0.00000   0.00062   0.00229   0.00455   0.00707
              -13.00   0.00756   0.00490   0.00248   0.00067   0.00000   0.00067   0.00248   0.00490   0.00756
               -9.00   0.00781   0.00508   0.00258   0.00070   0.00000   0.00070   0.00258   0.00508   0.00781
               -5.00   0.00786   0.00512   0.00260   0.00071   0.00000   0.00071   0.00260   0.00512   0.00786
               -1.00   0.00769   0.00501   0.00254   0.00069   0.00000   0.00069   0.00254   0.00501   0.00769
                3.00   0.00732   0.00475   0.00240   0.00065   0.00000   0.00065   0.00240   0.00475   0.00732
                7.00   0.00687   0.00444   0.00224   0.00061   0.00000   0.00061   0.00224   0.00444   0.00687
               11.00   0.00640   0.00407   0.00201   0.00054   0.00000   0.00054   0.00201   0.00407   0.00640
               15.00   0.02577   0.01511   0.00607   0.00137   0.00000   0.00137   0.00607   0.01511   0.02577
               19.00   0.06965   0.05525   0.03521   0.01173   0.00000   0.01173   0.03521   0.05525   0.06965
               23.00   0.03296   0.02088   0.01292   0.00356   0.00000   0.00356   0.01292   0.02088   0.03296
               27.00   0.05695   0.05353   0.04678   0.01914   0.00000   0.01914   0.04678   0.05353   0.05695
               32.00   0.02720   0.01851   0.00977   0.00272   0.00000   0.00272   0.00977   0.01851   0.02720
               46.00   0.00797   0.00535   0.00271   0.00074   0.00000   0.00074   0.00271   0.00535   0.00797
               70.00   0.00297   0.00170   0.00077   0.00019   0.00000   0.00019   0.00077   0.00170   0.00297
              120.00   0.00298   0.00170   0.00077   0.00019   0.00000   0.00019   0.00077   0.00170   0.00298
              180.00   0.00301   0.00173   0.00078   0.00020   0.00000   0.00020   0.00078   0.00173   0.00301
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            </tableData>
          </table>
          </product>
        </function>
        <function name="aero/coefficient/CD_elevator">
          <description>CD increment from elevator (deg), over alpha</description>
          <product>
            <property>aero/qbar-psf</property>
            <property>metrics/Sw-sqft</property>
            <property>aero/function/mach-elevator</property>
          <table>
            <independentVar lookup="row">aero/alpha-deg</independentVar>
            <independentVar lookup="column">fcs/elevator-pos-deg</independentVar>
            <tableData>
                        -25.00    -20.00    -15.00    -10.00     -5.00      0.00      5.00     10.00     15.00     20.00
             -180.00   0.00559   0.00366   0.00210   0.00094   0.00024   0.00000   0.00024   0.00094   0.00210   0.00366
             -120.00   0.00550   0.00360   0.00206   0.00093   0.00023   0.00000   0.00023   0.00093   0.00206   0.00360
              -70.00   0.00423   0.00253   0.00121   0.00035  -0.00004   0.00000   0.00043   0.00123   0.00242   0.00398
              -46.00  -0.01195  -0.01076  -0.00889  -0.00613  -0.00286   0.00000   0.00189   0.00289   0.00357   0.00448
              -32.00   0.01007   0.00856   0.00693   0.00497   0.00261   0.00000  -0.00273  -0.00526  -0.00694  -0.00744
              -22.00   0.02304   0.01976   0.01595   0.01118   0.00557   0.00000  -0.00494  -0.00891  -0.01137  -0.01227
              -17.00   0.02627   0.02249   0.01815   0.01272   0.00637   0.00000  -0.00564  -0.00993  -0.01232  -0.01297
              -13.00   0.02691   0.02284   0.01821   0.01256   0.00612   0.00000  -0.00490  -0.00803  -0.00922  -0.00887
               -9.00   0.02387   0.01981   0.01536   0.01019   0.00471   0.00000  -0.00317  -0.00452  -0.00423  -0.00284
               -5.00   0.01834   0.01467   0.01084   0.00672   0.00280   0.00000  -0.00113  -0.00061   0.00109   0.00339
               -1.00   0.01179   0.00865   0.00564   0.00282   0.00069   0.00000   0.00101   0.00343   0.00648   0.00965
                3.00   0.00504   0.00250   0.00037  -0.00112  -0.00140   0.00000   0.00309   0.00727   0.01158   0.01554
                7.00   0.00199  -0.00032  -0.00208  -0.00295  -0.00236   0.00000   0.00398   0.00886   0.01357   0.01770
               11.00  -0.00217  -0.00413  -0.00536  -0.00538  -0.00363   0.00000   0.00517   0.01098   0.01627   0.02068
               15.00  -0.01071  -0.01176  -0.01179  -0.01008  -0.00608   0.00000   0.00746   0.01517   0.02180   0.02709
               19.00  -0.01783  -0.01793  -0.01675  -0.01354  -0.00784   0.00000   0.00916   0.01835   0.02611   0.03222
               23.00  -0.01669  -0.01626  -0.01482  -0.01189  -0.00701   0.00000   0.00866   0.01753   0.02507   0.03106
               27.00  -0.00632  -0.00588  -0.00483  -0.00339  -0.00193   0.00000   0.00341   0.00829   0.01333   0.01780
               32.00  -0.00198  -0.00148  -0.00050   0.00056   0.00074   0.00000  -0.00038   0.00062   0.00269   0.00504
               46.00   0.01025   0.00928   0.00845   0.00729   0.00475   0.00000  -0.00663  -0.01348  -0.01864  -0.02178
               70.00   0.00548   0.00359   0.00206   0.00093   0.00023   0.00000   0.00023   0.00093   0.00206   0.00359
              120.00   0.00550   0.00360   0.00206   0.00093   0.00023   0.00000   0.00023   0.00093   0.00206   0.00360
              180.00   0.00559   0.00366   0.00210   0.00094   0.00024   0.00000   0.00024   0.00094   0.00210   0.00366
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            </tableData>
          </table>
          </product>
        </function>
        <function name="aero/coefficient/CD_flap">
          <description>CD increment from flap (deg), over alpha</description>
          <product>
            <property>aero/qbar-psf</property>
            <property>metrics/Sw-sqft</property>
            <property>aero/function/mach-flap</property>
          <table>
            <independentVar lookup="row">aero/alpha-deg</independentVar>
            <independentVar lookup="column">fcs/flap-pos-deg</independentVar>
            <tableData>
                          0.00      5.00     10.00     15.00     20.00     25.00     30.00
             -180.00   0.00000   0.00046   0.00183   0.00406   0.00709   0.01083   0.01516
             -120.00   0.00000   0.00046   0.00181   0.00401   0.00701   0.01070   0.01498
              -70.00   0.00000   0.00046   0.00181   0.00402   0.00702   0.01070   0.01497
              -46.00   0.00000   0.01350   0.03086   0.05117   0.07319   0.09602   0.11903
              -32.00   0.00000   0.01920   0.05051   0.09060   0.13414   0.17486   0.20894
              -22.00   0.00000  -0.02282  -0.03946  -0.04981  -0.05483  -0.05570  -0.05359
              -17.00   0.00000  -0.01469  -0.02395  -0.02781  -0.02709  -0.02299  -0.01651
              -13.00   0.00000  -0.00865  -0.01188  -0.01011  -0.00446   0.00382   0.01391
               -9.00   0.00000  -0.00221   0.00081   0.00826   0.01877   0.03111   0.04460
               -5.00   0.00000   0.00445   0.01379   0.02684   0.04203   0.05815   0.07474
               -1.00   0.00000   0.01099   0.02641   0.04474   0.06424   0.08377   0.10307
                3.00   0.00000   0.01717   0.03823   0.06133   0.08461   0.10705   0.12858
                7.00   0.00000   0.02360   0.05060   0.07887   0.10630   0.13178   0.15560
               11.00   0.00000   0.02874   0.06006   0.09172   0.12108   0.14478   0.16407
               15.00   0.00000   0.03169   0.06163   0.08727   0.11488   0.14525   0.17541
               19.00   0.00000   0.02243   0.06133   0.10567   0.14733   0.18280   0.21308
               23.00   0.00000   0.01588   0.05758   0.09134   0.12064   0.15026   0.17758
               27.00   0.00000  -0.00417   0.02200   0.07539   0.13175   0.18029   0.20952
               32.00   0.00000  -0.01971  -0.02612  -0.02137  -0.00874   0.01018   0.03588
               46.00   0.00000  -0.01445  -0.02464  -0.03101  -0.03442  -0.03574  -0.03561
               70.00   0.00000   0.00045   0.00180   0.00400   0.00699   0.01068   0.01494
              120.00   0.00000   0.00046   0.00181   0.00401   0.00701   0.01070   0.01498
              180.00   0.00000   0.00046   0.00183   0.00406   0.00709   0.01083   0.01516
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            </tableData>
          </table>
          </product>
        </function>
        <function name="aero/coefficient/CD_rudder">
          <description>CD increment from rudder (deg), over alpha</description>
          <product>
            <property>aero/qbar-psf</property>
            <property>metrics/Sw-sqft</property>
            <property>aero/function/mach-rudder</property>
          <table>
            <independentVar lookup="row">aero/alpha-deg</independentVar>
            <independentVar lookup="column">fcs/rudder-pos-deg</independentVar>
            <tableData>
                        -26.00    -25.00    -20.00    -15.00    -10.00     -5.00      0.00      5.00     10.00     15.00     20.00     25.00     26.00
             -180.00   0.00579   0.00538   0.00352   0.00202   0.00091   0.00023   0.00000   0.00023   0.00091   0.00202   0.00352   0.00538   0.00579
             -120.00   0.00072   0.00067   0.00044   0.00025   0.00011   0.00003   0.00000   0.00003   0.00011   0.00025   0.00044   0.00067   0.00072
              -70.00   0.00025   0.00023   0.00015   0.00009   0.00004   0.00001   0.00000   0.00001   0.00004   0.00009   0.00015   0.00023   0.00025
              -46.00   0.00912   0.00873   0.00681   0.00473   0.00250   0.00069   0.00000   0.00069   0.00250   0.00473   0.00681   0.00873   0.00912
              -32.00   0.01259   0.01203   0.00925   0.00636   0.00336   0.00093   0.00000   0.00093   0.00336   0.00636   0.00925   0.01203   0.01259
              -22.00   0.01385   0.01321   0.01005   0.00683   0.00359   0.00099   0.00000   0.00099   0.00359   0.00683   0.01005   0.01321   0.01385
              -17.00   0.01408   0.01342   0.01015   0.00686   0.00359   0.00099   0.00000   0.00099   0.00359   0.00686   0.01015   0.01342   0.01408
              -13.00   0.01425   0.01357   0.01022   0.00688   0.00359   0.00099   0.00000   0.00099   0.00359   0.00688   0.01022   0.01357   0.01425
               -9.00   0.01430   0.01361   0.01023   0.00686   0.00357   0.00098   0.00000   0.00098   0.00357   0.00686   0.01023   0.01361   0.01430
               -5.00   0.01423   0.01353   0.01014   0.00679   0.00353   0.00097   0.00000   0.00097   0.00353   0.00679   0.01014   0.01353   0.01423
               -1.00   0.01402   0.01332   0.00996   0.00665   0.00345   0.00095   0.00000   0.00095   0.00345   0.00665   0.00996   0.01332   0.01402
                3.00   0.01365   0.01297   0.00968   0.00645   0.00334   0.00092   0.00000   0.00092   0.00334   0.00645   0.00968   0.01297   0.01365
                7.00   0.01314   0.01248   0.00930   0.00618   0.00320   0.00088   0.00000   0.00088   0.00320   0.00618   0.00930   0.01248   0.01314
               11.00   0.01248   0.01186   0.00882   0.00586   0.00302   0.00083   0.00000   0.00083   0.00302   0.00586   0.00882   0.01186   0.01248
               15.00   0.01170   0.01111   0.00825   0.00547   0.00282   0.00077   0.00000   0.00077   0.00282   0.00547   0.00825   0.01111   0.01170
               19.00   0.01082   0.01027   0.00761   0.00504   0.00259   0.00071   0.00000   0.00071   0.00259   0.00504   0.00761   0.01027   0.01082
               23.00   0.00984   0.00934   0.00691   0.00457   0.00235   0.00064   0.00000   0.00064   0.00235   0.00457   0.00691   0.00934   0.00984
               27.00   0.00885   0.00839   0.00621   0.00410   0.00211   0.00058   0.00000   0.00058   0.00211   0.00410   0.00621   0.00839   0.00885
               32.00   0.00768   0.00729   0.00540   0.00357   0.00183   0.00050   0.00000   0.00050   0.00183   0.00357   0.00540   0.00729   0.00768
               46.00   0.00817   0.00781   0.00602   0.00415   0.00219   0.00060   0.00000   0.00060   0.00219   0.00415   0.00602   0.00781   0.00817
               70.00   0.00025   0.00023   0.00015   0.00009   0.00004   0.00001   0.00000   0.00001   0.00004   0.00009   0.00015   0.00023   0.00025
              120.00   0.00072   0.00067   0.00044   0.00025   0.00011   0.00003   0.00000   0.00003   0.00011   0.00025   0.00044   0.00067   0.00072
              180.00   0.00579   0.00538   0.00352   0.00202   0.00091   0.00023   0.00000   0.00023   0.00091   0.00202   0.00352   0.00538   0.00579
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            </tableData>
          </table>
          </product>
        </function>
        <function name="aero/coefficient/CD_ground">
          <description>Induced drag change in ground effect</description>
          <product>
            <property>aero/qbar-psf</property>
            <property>metrics/Sw-sqft</property>
            <property>aero/cl-squared</property>
            <value>0.04688</value>
          <table>
            <independentVar lookup="row">aero/h_b-mac-ft</independentVar>
            <tableData>
                    0.00   -1.00000
                    0.10   -0.28090
                    0.15   -0.14793
                    0.20   -0.08897
                    0.30   -0.04160
                    0.40   -0.02383
                    0.50   -0.01538
                    0.60   -0.01073
                    0.70   -0.00791
                    0.80   -0.00607
                    0.90   -0.00480
                    1.00   -0.00389
                    1.10   -0.00322
            </tableData>
          </table>
          </product>
        </function>
        <function name="aero/coefficient/CD_spoilers">
          <description>spoilers: drag of its spoiler panels, 24.3 m2 opened to 60 deg (hangar)</description>
          <product>
            <property>aero/qbar-psf</property>
            <property>metrics/Sw-sqft</property>
            <value>0.102793</value>
            <pow>
              <sin>
                <product>
                  <property>fcs/speedbrake-pos-norm</property>
                  <value>1.0472</value>
                </product>
              </sin>
              <value>2</value>
            </pow>
          </product>
        </function>
        <function name="aero/coefficient/CD_gear">
          <description>the gear extended: its wheels' and struts' drag by Raymer's components, 1.53 m2 (hangar)</description>
          <product>
            <property>aero/qbar-psf</property>
            <property>metrics/Sw-sqft</property>
            <value>0.00540999</value>
            <property>gear/gear-pos-norm</property>
          </product>
        </function>
      </axis>
      <axis name="SIDE">
        <function name="aero/coefficient/CY_base">
          <description>CY over alpha and beta (hangar)</description>
          <product>
            <property>aero/qbar-psf</property>
            <property>metrics/Sw-sqft</property>
            <property>aero/function/mach-side</property>
          <table>
            <independentVar lookup="row">aero/alpha-deg</independentVar>
            <independentVar lookup="column">aero/beta-deg</independentVar>
            <tableData>
                        -90.00    -70.00    -50.00    -40.00    -30.00    -25.00    -20.00    -15.00    -10.00     -6.00     -3.00      0.00      3.00      6.00     10.00     15.00     20.00     25.00     30.00     40.00     50.00     70.00     90.00
             -180.00  -0.00001   0.19541   0.27364   0.24421   0.18180   0.14501   0.10800   0.07321   0.07305   0.07976   0.04195  -0.00000  -0.04195  -0.07976  -0.07305  -0.07321  -0.10800  -0.14501  -0.18180  -0.24421  -0.27364  -0.19541   0.00001
             -120.00  -0.00000  -0.06072  -0.28195  -0.36531  -0.38290  -0.36126  -0.31909  -0.25811  -0.18150  -0.10925  -0.04222  -0.00000   0.04222   0.10925   0.18150   0.25811   0.31909   0.36126   0.38290   0.36531   0.28195   0.06072   0.00000
              -70.00   0.00000  -0.09317  -0.34642  -0.43525  -0.44860  -0.42066  -0.36933  -0.29623  -0.20407  -0.11699  -0.05123  -0.00000   0.05123   0.11699   0.20407   0.29623   0.36933   0.42066   0.44860   0.43525   0.34642   0.09317  -0.00000
              -46.00   0.00000   0.02530  -0.09994  -0.15279  -0.17304  -0.16278  -0.13679  -0.09068  -0.03170  -0.02128  -0.01095  -0.00000   0.01095   0.02128   0.03170   0.09068   0.13679   0.16278   0.17304   0.15279   0.09994  -0.02530  -0.00000
              -32.00   0.00001   0.10234   0.09271   0.05716   0.01622   0.01162   0.05202   0.03661   0.02024   0.01048   0.00476  -0.00000  -0.00476  -0.01048  -0.02024  -0.03661  -0.05202  -0.01162  -0.01622  -0.05716  -0.09271  -0.10234  -0.00001
              -22.00   0.00001   0.17125   0.21967   0.19506   0.15061   0.17122   0.14013   0.10345   0.06740   0.03981   0.01976  -0.00000  -0.01976  -0.03981  -0.06740  -0.10345  -0.14013  -0.17122  -0.15061  -0.19506  -0.21967  -0.17125  -0.00001
              -17.00   0.00001   0.20719   0.28227   0.24383   0.20823   0.21631   0.17775   0.13219   0.08669   0.05135   0.02551  -0.00000  -0.02551  -0.05135  -0.08669  -0.13219  -0.17775  -0.21631  -0.20823  -0.24383  -0.28227  -0.20719  -0.00001
              -13.00   0.00001   0.23478   0.30968   0.26932   0.25342   0.24232   0.19880   0.14790   0.09689   0.05728   0.02841  -0.00000  -0.02841  -0.05728  -0.09689  -0.14790  -0.19880  -0.24232  -0.25342  -0.26932  -0.30968  -0.23478  -0.00001
               -9.00   0.00001   0.26156   0.32761   0.28942   0.28465   0.25991   0.21265   0.15792   0.10303   0.06059   0.02994  -0.00000  -0.02994  -0.06059  -0.10303  -0.15792  -0.21265  -0.25991  -0.28465  -0.28942  -0.32761  -0.26156  -0.00001
               -5.00   0.00001   0.28011   0.33159   0.29688   0.29938   0.26940   0.21971   0.16272   0.10554   0.06154   0.03016  -0.00000  -0.03016  -0.06154  -0.10554  -0.16272  -0.21971  -0.26940  -0.29938  -0.29688  -0.33159  -0.28011  -0.00001
               -1.00   0.00001   0.26796   0.33049   0.29649   0.30261   0.27120   0.22055   0.16301   0.10528   0.06092   0.02953  -0.00000  -0.02953  -0.06092  -0.10528  -0.16301  -0.22055  -0.27120  -0.30261  -0.29649  -0.33049  -0.26796  -0.00001
                3.00   0.00001   0.25195   0.32272   0.28983   0.29657   0.26552   0.21559   0.15928   0.10290   0.05964   0.02899  -0.00000  -0.02899  -0.05964  -0.10290  -0.15928  -0.21559  -0.26552  -0.29657  -0.28983  -0.32272  -0.25195  -0.00001
                7.00   0.00001   0.23387   0.30980   0.27519   0.28308   0.25382   0.20635   0.15275   0.09921   0.05802   0.02852  -0.00000  -0.02852  -0.05802  -0.09921  -0.15275  -0.20635  -0.25382  -0.28308  -0.27519  -0.30980  -0.23387  -0.00001
               11.00   0.00001   0.21206   0.28097   0.25135   0.26243   0.23612   0.19300   0.14350   0.09397   0.05550   0.02750  -0.00000  -0.02750  -0.05550  -0.09397  -0.14350  -0.19300  -0.23612  -0.26243  -0.25135  -0.28097  -0.21206  -0.00001
               15.00   0.00001   0.18728   0.24002   0.21516   0.23238   0.21007   0.17343   0.12937   0.08520   0.05061   0.02522  -0.00000  -0.02522  -0.05061  -0.08520  -0.12937  -0.17343  -0.21007  -0.23238  -0.21516  -0.24002  -0.18728  -0.00001
               19.00   0.00001   0.16054   0.19259   0.16958   0.18544   0.17974   0.14962   0.11076   0.07258   0.04314   0.02172  -0.00000  -0.02172  -0.04314  -0.07258  -0.11076  -0.14962  -0.17974  -0.18544  -0.16958  -0.19259  -0.16054  -0.00001
               23.00   0.00001   0.13242   0.15726   0.12286   0.12455   0.12588   0.11835   0.08851   0.05577   0.03253   0.01678  -0.00000  -0.01678  -0.03253  -0.05577  -0.08851  -0.11835  -0.12588  -0.12455  -0.12286  -0.15726  -0.13242  -0.00001
               27.00   0.00001   0.10501   0.11541   0.08082   0.08021   0.07647   0.06243   0.04681   0.02683   0.01333   0.00602  -0.00000  -0.00602  -0.01333  -0.02683  -0.04681  -0.06243  -0.07647  -0.08021  -0.08082  -0.11541  -0.10501  -0.00001
               32.00   0.00001   0.08358   0.05204   0.01252   0.00806   0.03496   0.02201   0.01112   0.00252  -0.00012  -0.00062  -0.00000   0.00062   0.00012  -0.00252  -0.01112  -0.02201  -0.03496  -0.00806  -0.01252  -0.05204  -0.08358  -0.00001
               46.00   0.00000   0.00733  -0.14979  -0.20899  -0.22548  -0.20837  -0.17197  -0.10159  -0.07213  -0.04567  -0.02257  -0.00000   0.02257   0.04567   0.07213   0.10159   0.17197   0.20837   0.22548   0.20899   0.14979  -0.00733  -0.00000
               70.00   0.00000  -0.10326  -0.37315  -0.46759  -0.48080  -0.45048  -0.39528  -0.31698  -0.21854  -0.12586  -0.05571  -0.00000   0.05571   0.12586   0.21854   0.31698   0.39528   0.45048   0.48080   0.46759   0.37315   0.10326  -0.00000
              120.00  -0.00000  -0.04704  -0.24418  -0.32052  -0.33848  -0.32018  -0.28337  -0.22956  -0.16160  -0.09703  -0.03605  -0.00000   0.03605   0.09703   0.16160   0.22956   0.28337   0.32018   0.33848   0.32052   0.24418   0.04704   0.00000
              180.00  -0.00001   0.19541   0.27364   0.24421   0.18180   0.14501   0.10800   0.07321   0.07305   0.07976   0.04195  -0.00000  -0.04195  -0.07976  -0.07305  -0.07321  -0.10800  -0.14501  -0.18180  -0.24421  -0.27364  -0.19541   0.00001
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            </tableData>
          </table>
          </product>
        </function>
        <function name="aero/coefficient/CY_aileron">
          <description>CY increment from aileron (deg), over alpha</description>
          <product>
            <property>aero/qbar-psf</property>
            <property>metrics/Sw-sqft</property>
            <property>aero/function/mach-aileron</property>
          <table>
            <independentVar lookup="row">aero/alpha-deg</independentVar>
            <independentVar lookup="column">fcs/left-aileron-pos-deg</independentVar>
            <tableData>
                        -20.00    -15.00    -10.00     -5.00      0.00      5.00     10.00     15.00     20.00
             -180.00   0.00000   0.00000   0.00000   0.00000   0.00000   0.00000   0.00000   0.00000   0.00000
             -120.00   0.00113   0.00096   0.00071   0.00038   0.00000  -0.00038  -0.00071  -0.00096  -0.00113
              -70.00  -0.00048  -0.00040  -0.00030  -0.00016   0.00000   0.00016   0.00030   0.00040   0.00048
              -46.00  -0.00215  -0.00192  -0.00148  -0.00080   0.00000   0.00080   0.00148   0.00192   0.00215
              -32.00  -0.00428  -0.00373  -0.00283  -0.00154   0.00000   0.00154   0.00283   0.00373   0.00428
              -22.00  -0.00735  -0.00630  -0.00470  -0.00250   0.00000   0.00250   0.00470   0.00630   0.00735
              -17.00  -0.00834  -0.00716  -0.00534  -0.00285   0.00000   0.00285   0.00534   0.00716   0.00834
              -13.00  -0.00824  -0.00708  -0.00529  -0.00283   0.00000   0.00283   0.00529   0.00708   0.00824
               -9.00  -0.00805  -0.00692  -0.00517  -0.00276   0.00000   0.00276   0.00517   0.00692   0.00805
               -5.00  -0.00778  -0.00670  -0.00501  -0.00268   0.00000   0.00268   0.00501   0.00670   0.00778
               -1.00  -0.00746  -0.00643  -0.00481  -0.00257   0.00000   0.00257   0.00481   0.00643   0.00746
                3.00  -0.00713  -0.00615  -0.00461  -0.00246   0.00000   0.00246   0.00461   0.00615   0.00713
                7.00  -0.00685  -0.00591  -0.00442  -0.00237   0.00000   0.00237   0.00442   0.00591   0.00685
               11.00  -0.00711  -0.00612  -0.00458  -0.00245   0.00000   0.00245   0.00458   0.00612   0.00711
               15.00  -0.00820  -0.00709  -0.00543  -0.00301   0.00000   0.00301   0.00543   0.00709   0.00820
               19.00  -0.00983  -0.00807  -0.00558  -0.00268   0.00000   0.00268   0.00558   0.00807   0.00983
               23.00  -0.00265  -0.00353  -0.00340  -0.00221   0.00000   0.00221   0.00340   0.00353   0.00265
               27.00  -0.01774  -0.01560  -0.01214  -0.00700   0.00000   0.00700   0.01214   0.01560   0.01774
               32.00  -0.02491  -0.02103  -0.01564  -0.00838   0.00000   0.00838   0.01564   0.02103   0.02491
               46.00  -0.00461  -0.00395  -0.00297  -0.00159   0.00000   0.00159   0.00297   0.00395   0.00461
               70.00  -0.00037  -0.00031  -0.00023  -0.00012   0.00000   0.00012   0.00023   0.00031   0.00037
              120.00   0.00144   0.00122   0.00091   0.00048   0.00000  -0.00048  -0.00091  -0.00122  -0.00144
              180.00   0.00000   0.00000   0.00000   0.00000   0.00000   0.00000   0.00000   0.00000   0.00000
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            </tableData>
          </table>
          </product>
        </function>
        <function name="aero/coefficient/CY_rudder">
          <description>CY increment from rudder (deg), over alpha</description>
          <product>
            <property>aero/qbar-psf</property>
            <property>metrics/Sw-sqft</property>
            <property>aero/function/mach-rudder</property>
          <table>
            <independentVar lookup="row">aero/alpha-deg</independentVar>
            <independentVar lookup="column">fcs/rudder-pos-deg</independentVar>
            <tableData>
                        -26.00    -25.00    -20.00    -15.00    -10.00     -5.00      0.00      5.00     10.00     15.00     20.00     25.00     26.00
             -180.00   0.00000   0.00000   0.00000   0.00000   0.00000   0.00000   0.00000   0.00000   0.00000   0.00000   0.00000   0.00000   0.00000
             -120.00   0.00000   0.00000   0.00000   0.00000   0.00000   0.00000   0.00000   0.00000   0.00000   0.00000   0.00000   0.00000   0.00000
              -70.00  -0.02154  -0.02117  -0.01910  -0.01623  -0.01203  -0.00640   0.00000   0.00640   0.01203   0.01623   0.01910   0.02117   0.02154
              -46.00  -0.07044  -0.06927  -0.06258  -0.05324  -0.03920  -0.02077   0.00000   0.02077   0.03920   0.05324   0.06258   0.06927   0.07044
              -32.00  -0.07084  -0.06967  -0.06296  -0.05360  -0.03976  -0.02116   0.00000   0.02116   0.03976   0.05360   0.06296   0.06967   0.07084
              -22.00  -0.07984  -0.07851  -0.07093  -0.06037  -0.04480  -0.02384   0.00000   0.02384   0.04480   0.06037   0.07093   0.07851   0.07984
              -17.00  -0.08318  -0.08179  -0.07390  -0.06290  -0.04666  -0.02483   0.00000   0.02483   0.04666   0.06290   0.07390   0.08179   0.08318
              -13.00  -0.08501  -0.08360  -0.07553  -0.06429  -0.04769  -0.02538   0.00000   0.02538   0.04769   0.06429   0.07553   0.08360   0.08501
               -9.00  -0.08606  -0.08463  -0.07647  -0.06508  -0.04828  -0.02569   0.00000   0.02569   0.04828   0.06508   0.07647   0.08463   0.08606
               -5.00  -0.08624  -0.08480  -0.07662  -0.06522  -0.04838  -0.02575   0.00000   0.02575   0.04838   0.06522   0.07662   0.08480   0.08624
               -1.00  -0.08551  -0.08408  -0.07598  -0.06467  -0.04798  -0.02553   0.00000   0.02553   0.04798   0.06467   0.07598   0.08408   0.08551
                3.00  -0.08391  -0.08251  -0.07456  -0.06346  -0.04708  -0.02505   0.00000   0.02505   0.04708   0.06346   0.07456   0.08251   0.08391
                7.00  -0.08154  -0.08019  -0.07248  -0.06171  -0.04579  -0.02437   0.00000   0.02437   0.04579   0.06171   0.07248   0.08019   0.08154
               11.00  -0.07833  -0.07704  -0.06967  -0.05933  -0.04404  -0.02344   0.00000   0.02344   0.04404   0.05933   0.06967   0.07704   0.07833
               15.00  -0.07440  -0.07318  -0.06620  -0.05640  -0.04187  -0.02229   0.00000   0.02229   0.04187   0.05640   0.06620   0.07318   0.07440
               19.00  -0.06971  -0.06857  -0.06204  -0.05286  -0.03925  -0.02090   0.00000   0.02090   0.03925   0.05286   0.06204   0.06857   0.06971
               23.00  -0.06441  -0.06336  -0.05733  -0.04885  -0.03629  -0.01932   0.00000   0.01932   0.03629   0.04885   0.05733   0.06336   0.06441
               27.00  -0.05890  -0.05795  -0.05247  -0.04474  -0.03325  -0.01771   0.00000   0.01771   0.03325   0.04474   0.05247   0.05795   0.05890
               32.00  -0.05230  -0.05146  -0.04664  -0.03980  -0.02955  -0.01573   0.00000   0.01573   0.02955   0.03980   0.04664   0.05146   0.05230
               46.00  -0.06165  -0.06066  -0.05499  -0.04692  -0.03438  -0.01816   0.00000   0.01816   0.03438   0.04692   0.05499   0.06066   0.06165
               70.00  -0.02155  -0.02118  -0.01911  -0.01624  -0.01203  -0.00640   0.00000   0.00640   0.01203   0.01624   0.01911   0.02118   0.02155
              120.00   0.00000   0.00000   0.00000   0.00000   0.00000   0.00000   0.00000   0.00000   0.00000   0.00000   0.00000   0.00000   0.00000
              180.00   0.00000   0.00000   0.00000   0.00000   0.00000   0.00000   0.00000   0.00000   0.00000   0.00000   0.00000   0.00000   0.00000
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            </tableData>
          </table>
          </product>
        </function>
        <function name="aero/coefficient/CYp">
          <description>CY per p (non-dimensional), over alpha</description>
          <product>
            <property>aero/qbar-psf</property>
            <property>metrics/Sw-sqft</property>
            <property>aero/bi2vel</property>
            <property>velocities/p-aero-rad_sec</property>
            <property>aero/function/mach-lift</property>
          <table>
            <independentVar lookup="row">aero/alpha-deg</independentVar>
            <tableData>
                 -180.00   -0.44090
                 -165.00   -0.26474
                 -105.00   -0.17017
                  -60.00   -0.23333
                  -42.00   -0.21672
                  -30.00   -0.15374
                  -20.00   -0.23804
                  -16.00   -0.24565
                  -12.00   -0.24341
                   -8.00   -0.23941
                   -4.00   -0.23408
                    0.00   -0.22657
                    4.00   -0.21798
                    8.00   -0.21120
                   12.00   -0.20788
                   16.00   -0.24293
                   20.00   -0.36437
                   24.00   -0.48734
                   28.00    0.04267
                   35.00    0.02249
                   50.00   -0.19645
                   80.00   -0.16646
                  135.00   -0.23601
                  180.00   -0.44090
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            </tableData>
          </table>
          </product>
        </function>
        <function name="aero/coefficient/CYr">
          <description>CY per r (non-dimensional), over alpha</description>
          <product>
            <property>aero/qbar-psf</property>
            <property>metrics/Sw-sqft</property>
            <property>aero/bi2vel</property>
            <property>velocities/r-aero-rad_sec</property>
            <property>aero/function/mach-lift</property>
          <table>
            <independentVar lookup="row">aero/alpha-deg</independentVar>
            <tableData>
                 -180.00    0.71703
                 -165.00    0.67427
                 -105.00    0.15736
                  -60.00    0.28941
                  -42.00    0.28868
                  -30.00    0.23562
                  -20.00    0.32971
                  -16.00    0.36416
                  -12.00    0.39293
                   -8.00    0.41825
                   -4.00    0.43979
                    0.00    0.45331
                    4.00    0.45168
                    8.00    0.47356
                   12.00    0.46453
                   16.00    0.45766
                   20.00    0.38999
                   24.00    0.38928
                   28.00    0.55448
                   35.00    0.44342
                   50.00    0.39860
                   80.00    0.13357
                  135.00    0.43884
                  180.00    0.71703
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            </tableData>
          </table>
          </product>
        </function>
      </axis>
      <axis name="LIFT">
        <function name="aero/coefficient/CL_base">
          <description>CL over alpha and beta, ground effect, compressibility (hangar)</description>
          <product>
            <property>aero/qbar-psf</property>
            <property>metrics/Sw-sqft</property>
            <property>aero/function/CL-base</property>
            <property>aero/function/mach-lift</property>
          <table>
            <independentVar lookup="row">aero/h_b-mac-ft</independentVar>
            <tableData>
                    0.00    1.20000
                    0.10    1.08692
                    0.15    1.05730
                    0.20    1.03778
                    0.30    1.01642
                    0.40    1.00713
                    0.50    1.00310
                    0.60    1.00135
                    0.70    1.00059
                    0.80    1.00025
                    0.90    1.00011
                    1.00    1.00005
                    1.10    1.00000
            </tableData>
          </table>
          </product>
        </function>
        <function name="aero/coefficient/CL_elevator">
          <description>CL increment from elevator (deg), over alpha</description>
          <product>
            <property>aero/qbar-psf</property>
            <property>metrics/Sw-sqft</property>
            <property>aero/function/mach-elevator</property>
          <table>
            <independentVar lookup="row">aero/alpha-deg</independentVar>
            <independentVar lookup="column">fcs/elevator-pos-deg</independentVar>
            <tableData>
                        -25.00    -20.00    -15.00    -10.00     -5.00      0.00      5.00     10.00     15.00     20.00
             -180.00   0.00000   0.00000   0.00000   0.00000   0.00000   0.00000   0.00000   0.00000   0.00000   0.00000
             -120.00  -0.02858  -0.02577  -0.02190  -0.01622  -0.00863   0.00000   0.00862   0.01621   0.02187   0.02572
              -70.00  -0.01211  -0.01104  -0.00951  -0.00717  -0.00389   0.00000   0.00408   0.00783   0.01071   0.01272
              -46.00  -0.05263  -0.04840  -0.04185  -0.03144  -0.01686   0.00000   0.01696   0.03188   0.04298   0.05054
              -32.00  -0.07709  -0.07137  -0.06221  -0.04719  -0.02555   0.00000   0.02593   0.04881   0.06583   0.07734
              -22.00  -0.09423  -0.08741  -0.07639  -0.05816  -0.03169   0.00000   0.03326   0.06374   0.08685   0.10246
              -17.00  -0.11066  -0.10231  -0.08925  -0.06800  -0.03725   0.00000   0.03927   0.07486   0.10143   0.11907
              -13.00  -0.12665  -0.11657  -0.10116  -0.07658  -0.04151   0.00000   0.04251   0.08011   0.10782   0.12614
               -9.00  -0.13683  -0.12521  -0.10792  -0.08097  -0.04345   0.00000   0.04384   0.08243   0.11080   0.12950
               -5.00  -0.14112  -0.12879  -0.11068  -0.08277  -0.04430   0.00000   0.04453   0.08359   0.11221   0.13100
               -1.00  -0.14292  -0.13027  -0.11179  -0.08347  -0.04459   0.00000   0.04465   0.08367   0.11214   0.13076
                3.00  -0.14295  -0.13012  -0.11152  -0.08314  -0.04434   0.00000   0.04423   0.08274   0.11074   0.12896
                7.00  -0.14154  -0.12870  -0.11016  -0.08201  -0.04365   0.00000   0.04338   0.08100   0.10830   0.12594
               11.00  -0.13865  -0.12594  -0.10769  -0.08006  -0.04253   0.00000   0.04210   0.07849   0.10479   0.12167
               15.00  -0.13020  -0.11815  -0.10092  -0.07510  -0.03993   0.00000   0.03946   0.07343   0.09781   0.11342
               19.00  -0.11884  -0.10799  -0.09234  -0.06863  -0.03641   0.00000   0.03574   0.06637   0.08841   0.10275
               23.00  -0.11613  -0.10466  -0.08875  -0.06539  -0.03435   0.00000   0.03298   0.06070   0.08048   0.09347
               27.00  -0.11482  -0.10313  -0.08720  -0.06405  -0.03348   0.00000   0.03169   0.05806   0.07674   0.08896
               32.00  -0.10332  -0.09274  -0.07848  -0.05798  -0.03072   0.00000   0.02981   0.05483   0.07245   0.08371
               46.00  -0.07130  -0.06469  -0.05549  -0.04172  -0.02262   0.00000   0.02334   0.04391   0.05869   0.06811
               70.00  -0.01611  -0.01443  -0.01214  -0.00887  -0.00463   0.00000   0.00443   0.00818   0.01088   0.01267
              120.00  -0.02851  -0.02572  -0.02187  -0.01621  -0.00862   0.00000   0.00863   0.01622   0.02190   0.02577
              180.00   0.00000   0.00000   0.00000   0.00000   0.00000   0.00000   0.00000   0.00000   0.00000   0.00000
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            </tableData>
          </table>
          </product>
        </function>
        <function name="aero/coefficient/CL_flap">
          <description>CL increment from flap (deg), over alpha</description>
          <product>
            <property>aero/qbar-psf</property>
            <property>metrics/Sw-sqft</property>
            <property>aero/function/mach-flap</property>
          <table>
            <independentVar lookup="row">aero/alpha-deg</independentVar>
            <independentVar lookup="column">fcs/flap-pos-deg</independentVar>
            <tableData>
                          0.00      5.00     10.00     15.00     20.00     25.00     30.00
             -180.00   0.00000   0.00000   0.00000   0.00000   0.00000   0.00000   0.00000
             -120.00   0.00000   0.02312   0.04535   0.06554   0.08298   0.09774   0.11042
              -70.00   0.00000   0.01665   0.03355   0.04967   0.06423   0.07702   0.08840
              -46.00   0.00000   0.04909   0.09756   0.14196   0.17982   0.21074   0.23618
              -32.00   0.00000   0.08008   0.15901   0.23097   0.29228   0.34163   0.38258
              -22.00   0.00000   0.12062   0.24471   0.36148   0.46407   0.55160   0.62719
              -17.00   0.00000   0.13731   0.27059   0.39250   0.49832   0.58805   0.66542
              -13.00   0.00000   0.13910   0.27359   0.39622   0.50238   0.59214   0.66911
               -9.00   0.00000   0.14007   0.27507   0.39772   0.50349   0.59263   0.66887
               -5.00   0.00000   0.13986   0.27432   0.39618   0.50096   0.58902   0.66412
               -1.00   0.00000   0.13842   0.27121   0.39127   0.49424   0.58054   0.65394
                3.00   0.00000   0.13634   0.26681   0.38444   0.48503   0.56904   0.64025
                7.00   0.00000   0.13048   0.25500   0.36683   0.46182   0.54018   0.60524
               11.00   0.00000   0.12639   0.24479   0.34622   0.42687   0.48776   0.53398
               15.00   0.00000   0.10949   0.20402   0.27990   0.34009   0.38872   0.42953
               19.00   0.00000   0.10240   0.19768   0.28211   0.35279   0.41010   0.45649
               23.00   0.00000   0.17267   0.30627   0.39914   0.46597   0.51849   0.56035
               27.00   0.00000   0.12606   0.25870   0.38932   0.51352   0.61044   0.67048
               32.00   0.00000   0.08982   0.17788   0.25859   0.32904   0.39225   0.45125
               46.00   0.00000   0.04604   0.08959   0.12805   0.16004   0.18593   0.20717
               70.00   0.00000   0.01032   0.01977   0.02798   0.03477   0.04031   0.04492
              120.00   0.00000   0.03302   0.06479   0.09366   0.11860   0.13972   0.15789
              180.00   0.00000   0.00000   0.00000   0.00000   0.00000   0.00000   0.00000
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            </tableData>
          </table>
          <table>
            <independentVar lookup="row">aero/h_b-mac-ft</independentVar>
            <tableData>
                    0.00    1.20000
                    0.10    1.08692
                    0.20    1.03778
                    0.40    1.00713
                    0.60    1.00135
                    0.80    1.00025
                    1.00    1.00005
                    1.10    1.00000
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            </tableData>
          </table>
          </product>
        </function>
        <function name="aero/coefficient/CLq">
          <description>CL per q (non-dimensional), over alpha</description>
          <product>
            <property>aero/qbar-psf</property>
            <property>metrics/Sw-sqft</property>
            <property>aero/ci2vel</property>
            <property>velocities/q-aero-rad_sec</property>
            <property>aero/function/mach-lift</property>
          <table>
            <independentVar lookup="row">aero/alpha-deg</independentVar>
            <tableData>
                 -180.00   -3.96135
                 -165.00   -0.63960
                  -32.00    2.65641
                  -10.00   12.60514
                    5.00   12.88145
                   20.00    4.61538
                   46.00    2.88721
                  180.00   -3.96135
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            </tableData>
          </table>
          </product>
        </function>
        <function name="aero/coefficient/CLadot">
          <description>CL per alpha-dot (downwash lag at the tail)</description>
          <product>
            <property>aero/qbar-psf</property>
            <property>metrics/Sw-sqft</property>
            <property>aero/ci2vel</property>
            <property>aero/alphadot-rad_sec</property>
            <value>1.47080</value>
            <property>aero/function/mach-lift</property>
          </product>
        </function>
        <function name="aero/coefficient/CL_spoilers">
          <description>spoilers: the lift lost behind them, 202 m2 of wing, over alpha (hangar)</description>
          <product>
            <property>aero/qbar-psf</property>
            <property>metrics/Sw-sqft</property>
            <table>
              <independentVar lookup="row">aero/alpha-deg</independentVar>
              <tableData>
                   -180.00   -0.14116
                   -165.00   -0.24062
                    -32.00    0.83551
                    -10.00    0.24148
                      5.00   -0.44469
                     20.00   -0.91550
                     46.00   -0.70034
                    180.00   -0.14116
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              </tableData>
            </table>
            <min>
              <value>1</value>
              <product>
                <property>fcs/speedbrake-pos-norm</property>
                <value>1.33333</value>
              </product>
            </min>
          </product>
        </function>
      </axis>
      <axis name="ROLL">
        <function name="aero/coefficient/Cl_base">
          <description>Cl over alpha and beta (hangar)</description>
          <product>
            <property>aero/qbar-psf</property>
            <property>metrics/Sw-sqft</property>
            <property>metrics/bw-ft</property>
            <property>aero/function/mach-side</property>
          <table>
            <independentVar lookup="row">aero/alpha-deg</independentVar>
            <independentVar lookup="column">aero/beta-deg</independentVar>
            <tableData>
                        -90.00    -70.00    -50.00    -40.00    -30.00    -25.00    -20.00    -15.00    -10.00     -6.00     -3.00      0.00      3.00      6.00     10.00     15.00     20.00     25.00     30.00     40.00     50.00     70.00     90.00
             -180.00   0.02991   0.03439   0.05845   0.06496   0.05976   0.05331   0.04489   0.03495   0.02790   0.02218   0.01159  -0.00000  -0.01159  -0.02218  -0.02790  -0.03495  -0.04489  -0.05331  -0.05976  -0.06496  -0.05845  -0.03439  -0.02991
              -35.00   0.02991   0.03262   0.03199   0.02342   0.00589  -0.00063   0.00101   0.00256   0.00131   0.00067   0.00032  -0.00000  -0.00032  -0.00067  -0.00131  -0.00256  -0.00101   0.00063  -0.00589  -0.02342  -0.03199  -0.03262  -0.02991
              -11.00   0.02991   0.06000   0.07063   0.03976   0.02047   0.01843   0.01672   0.01328   0.00915   0.00558   0.00280  -0.00000  -0.00280  -0.00558  -0.00915  -0.01328  -0.01672  -0.01843  -0.02047  -0.03976  -0.07063  -0.06000  -0.02991
                4.00   0.02991   0.05357   0.06968   0.06245   0.07532   0.07662   0.06580   0.05150   0.03533   0.02149   0.01080  -0.00000  -0.01080  -0.02149  -0.03533  -0.05150  -0.06580  -0.07662  -0.07532  -0.06245  -0.06968  -0.05357  -0.02991
               19.00   0.02991   0.03541   0.00594   0.00543   0.04473   0.05943   0.05581   0.04369   0.02999   0.01827   0.00922  -0.00000  -0.00922  -0.01827  -0.02999  -0.04369  -0.05581  -0.05943  -0.04473  -0.00543  -0.00594  -0.03541  -0.02991
               42.00   0.02991   0.03539   0.03768   0.03267   0.02455   0.02101   0.02012   0.01739   0.01124   0.00662   0.00334  -0.00000  -0.00334  -0.00662  -0.01124  -0.01739  -0.02012  -0.02101  -0.02455  -0.03267  -0.03768  -0.03539  -0.02991
              180.00   0.02991   0.03439   0.05845   0.06496   0.05976   0.05331   0.04489   0.03495   0.02790   0.02218   0.01159  -0.00000  -0.01159  -0.02218  -0.02790  -0.03495  -0.04489  -0.05331  -0.05976  -0.06496  -0.05845  -0.03439  -0.02991
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            </tableData>
          </table>
          </product>
        </function>
        <function name="aero/coefficient/Cl_aileron">
          <description>Cl increment from aileron (deg), over alpha</description>
          <product>
            <property>aero/qbar-psf</property>
            <property>metrics/Sw-sqft</property>
            <property>metrics/bw-ft</property>
            <property>aero/function/mach-aileron</property>
          <table>
            <independentVar lookup="row">aero/alpha-deg</independentVar>
            <independentVar lookup="column">fcs/left-aileron-pos-deg</independentVar>
            <tableData>
                        -20.00    -15.00    -10.00     -5.00      0.00      5.00     10.00     15.00     20.00
             -180.00   0.00000   0.00000   0.00000   0.00000   0.00000   0.00000   0.00000   0.00000   0.00000
              -35.00  -0.01219  -0.01077  -0.00825  -0.00448   0.00000   0.00448   0.00825   0.01077   0.01219
              -11.00  -0.03571  -0.03043  -0.02259  -0.01203   0.00000   0.01203   0.02259   0.03043   0.03571
                4.00  -0.03422  -0.02923  -0.02174  -0.01159   0.00000   0.01159   0.02174   0.02923   0.03422
               19.00  -0.03722  -0.03249  -0.02519  -0.01419   0.00000   0.01419   0.02519   0.03249   0.03722
               42.00  -0.00813  -0.00733  -0.00564  -0.00309   0.00000   0.00309   0.00564   0.00733   0.00813
              180.00   0.00000   0.00000   0.00000   0.00000   0.00000   0.00000   0.00000   0.00000   0.00000
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            </tableData>
          </table>
          </product>
        </function>
        <function name="aero/coefficient/Cl_rudder">
          <description>Cl increment from rudder (deg), over alpha</description>
          <product>
            <property>aero/qbar-psf</property>
            <property>metrics/Sw-sqft</property>
            <property>metrics/bw-ft</property>
            <property>aero/function/mach-rudder</property>
          <table>
            <independentVar lookup="row">aero/alpha-deg</independentVar>
            <independentVar lookup="column">fcs/rudder-pos-deg</independentVar>
            <tableData>
                        -26.00    -25.00    -20.00    -15.00    -10.00     -5.00      0.00      5.00     10.00     15.00     20.00     25.00     26.00
             -180.00   0.00000   0.00000   0.00000   0.00000   0.00000   0.00000   0.00000   0.00000   0.00000   0.00000   0.00000   0.00000   0.00000
              -35.00  -0.00900  -0.00885  -0.00796  -0.00675  -0.00499  -0.00265   0.00000   0.00265   0.00499   0.00675   0.00796   0.00885   0.00900
              -11.00  -0.01108  -0.01088  -0.00979  -0.00829  -0.00613  -0.00326   0.00000   0.00326   0.00613   0.00829   0.00979   0.01088   0.01108
                4.00  -0.01135  -0.01115  -0.01003  -0.00850  -0.00629  -0.00334   0.00000   0.00334   0.00629   0.00850   0.01003   0.01115   0.01135
               19.00  -0.01027  -0.01009  -0.00910  -0.00772  -0.00572  -0.00304   0.00000   0.00304   0.00572   0.00772   0.00910   0.01009   0.01027
               42.00  -0.00824  -0.00810  -0.00730  -0.00620  -0.00453  -0.00240   0.00000   0.00240   0.00453   0.00620   0.00730   0.00810   0.00824
              180.00   0.00000   0.00000   0.00000   0.00000   0.00000   0.00000   0.00000   0.00000   0.00000   0.00000   0.00000   0.00000   0.00000
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            </tableData>
          </table>
          </product>
        </function>
        <function name="aero/coefficient/Clp">
          <description>Cl per p (non-dimensional), over alpha</description>
          <product>
            <property>aero/qbar-psf</property>
            <property>metrics/Sw-sqft</property>
            <property>metrics/bw-ft</property>
            <property>aero/bi2vel</property>
            <property>velocities/p-aero-rad_sec</property>
            <property>aero/function/mach-lift</property>
          <table>
            <independentVar lookup="row">aero/alpha-deg</independentVar>
            <tableData>
                 -180.00   -0.61730
                 -165.00   -0.19476
                  -32.00   -0.08660
                  -10.00   -0.44133
                    5.00   -0.42670
                   20.00    0.18354
                   46.00   -0.18903
                  180.00   -0.61730
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            </tableData>
          </table>
          </product>
        </function>
        <function name="aero/coefficient/Clr">
          <description>Cl per r (non-dimensional), over alpha</description>
          <product>
            <property>aero/qbar-psf</property>
            <property>metrics/Sw-sqft</property>
            <property>metrics/bw-ft</property>
            <property>aero/bi2vel</property>
            <property>velocities/r-aero-rad_sec</property>
            <property>aero/function/mach-lift</property>
          <table>
            <independentVar lookup="row">aero/alpha-deg</independentVar>
            <tableData>
                 -180.00    0.15631
                 -165.00    0.14337
                  -32.00   -0.18935
                  -10.00    0.05751
                    5.00    0.23421
                   20.00    0.48540
                   46.00    0.22317
                  180.00    0.15631
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            </tableData>
          </table>
          </product>
        </function>
      </axis>
      <axis name="PITCH">
        <function name="aero/coefficient/Cm_base">
          <description>Cm over alpha and beta (hangar)</description>
          <product>
            <property>aero/qbar-psf</property>
            <property>metrics/Sw-sqft</property>
            <property>metrics/cbarw-ft</property>
          <table>
            <independentVar lookup="row">aero/alpha-deg</independentVar>
            <independentVar lookup="column">aero/beta-deg</independentVar>
            <tableData>
                        -90.00    -70.00    -50.00    -40.00    -30.00    -25.00    -20.00    -15.00    -10.00     -6.00     -3.00      0.00      3.00      6.00     10.00     15.00     20.00     25.00     30.00     40.00     50.00     70.00     90.00
             -180.00  -0.00001   0.00280   0.00387   0.04838   0.08677   0.10137   0.11291   0.12166   0.13503   0.13758   0.13380   0.13235   0.13380   0.13758   0.13503   0.12166   0.11291   0.10137   0.08677   0.04838   0.00387   0.00280  -0.00001
              -35.00  -0.00001   0.13717   0.40764   0.53116   0.68610   0.75044   0.81029   0.81567   0.82759   0.83425   0.83737   0.83859   0.83737   0.83425   0.82759   0.81567   0.81029   0.75044   0.68610   0.53116   0.40764   0.13717  -0.00001
              -11.00  -0.00001   0.08619   0.13161   0.17162   0.23629   0.25801   0.30178   0.33666   0.36198   0.37507   0.38062   0.38247   0.38062   0.37507   0.36198   0.33666   0.30178   0.25801   0.23629   0.17162   0.13161   0.08619  -0.00001
                4.00  -0.00001  -0.02534   0.00946  -0.05884  -0.13565  -0.13789  -0.13267  -0.12818  -0.12581  -0.12537  -0.12552  -0.12562  -0.12552  -0.12537  -0.12581  -0.12818  -0.13267  -0.13789  -0.13565  -0.05884   0.00946  -0.02534  -0.00001
               19.00  -0.00001  -0.13836  -0.23918  -0.37285  -0.40327  -0.40307  -0.41557  -0.43325  -0.44482  -0.45078  -0.45339  -0.45430  -0.45339  -0.45078  -0.44482  -0.43325  -0.41557  -0.40307  -0.40327  -0.37285  -0.23918  -0.13836  -0.00001
               42.00  -0.00001  -0.12178  -0.54726  -0.70236  -0.86066  -0.92687  -0.99100  -1.01751  -1.03481  -1.04398  -1.04774  -1.04883  -1.04774  -1.04398  -1.03481  -1.01751  -0.99100  -0.92687  -0.86066  -0.70236  -0.54726  -0.12178  -0.00001
              180.00  -0.00001   0.00280   0.00387   0.04838   0.08677   0.10137   0.11291   0.12166   0.13503   0.13758   0.13380   0.13235   0.13380   0.13758   0.13503   0.12166   0.11291   0.10137   0.08677   0.04838   0.00387   0.00280  -0.00001
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            </tableData>
          </table>
          </product>
        </function>
        <function name="aero/coefficient/Cm_mach">
          <description>Cm from the neutral point's move with Mach</description>
          <product>
            <property>aero/qbar-psf</property>
            <property>metrics/Sw-sqft</property>
            <property>metrics/cbarw-ft</property>
            <property>aero/function/CL-base</property>
            <property>aero/function/mach-dCm-dCL</property>
          </product>
        </function>
        <function name="aero/coefficient/Cm_elevator">
          <description>Cm increment from elevator (deg), over alpha</description>
          <product>
            <property>aero/qbar-psf</property>
            <property>metrics/Sw-sqft</property>
            <property>metrics/cbarw-ft</property>
            <property>aero/function/mach-elevator</property>
          <table>
            <independentVar lookup="row">aero/alpha-deg</independentVar>
            <independentVar lookup="column">fcs/elevator-pos-deg</independentVar>
            <tableData>
                        -25.00    -20.00    -15.00    -10.00     -5.00      0.00      5.00     10.00     15.00     20.00
             -180.00  -0.00130  -0.00085  -0.00049  -0.00022  -0.00006   0.00000  -0.00006  -0.00022  -0.00049  -0.00085
              -35.00   0.19653   0.18009   0.15581   0.11776   0.06393   0.00000  -0.06636  -0.12621  -0.17059  -0.19946
              -11.00   0.41536   0.37872   0.32549   0.24382   0.13080   0.00000  -0.13132  -0.24625  -0.33032  -0.38538
                4.00   0.44150   0.40085   0.34272   0.25503   0.13582   0.00000  -0.13531  -0.25319  -0.33919  -0.39560
               19.00   0.37851   0.34459   0.29519   0.21990   0.11706   0.00000  -0.11606  -0.21671  -0.29037  -0.33947
               42.00   0.19484   0.17566   0.14858   0.10891   0.05693   0.00000  -0.05445  -0.10017  -0.13289  -0.15451
              180.00  -0.00130  -0.00085  -0.00049  -0.00022  -0.00006   0.00000  -0.00006  -0.00022  -0.00049  -0.00085
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            </tableData>
          </table>
          </product>
        </function>
        <function name="aero/coefficient/Cm_flap">
          <description>Cm increment from flap (deg), over alpha</description>
          <product>
            <property>aero/qbar-psf</property>
            <property>metrics/Sw-sqft</property>
            <property>metrics/cbarw-ft</property>
            <property>aero/function/mach-flap</property>
          <table>
            <independentVar lookup="row">aero/alpha-deg</independentVar>
            <independentVar lookup="column">fcs/flap-pos-deg</independentVar>
            <tableData>
                          0.00      5.00     10.00     15.00     20.00     25.00     30.00
             -180.00   0.00000   0.00003   0.00013   0.00030   0.00052   0.00079   0.00110
              -35.00   0.00000  -0.00295  -0.00812  -0.01520  -0.02346  -0.03229  -0.04156
              -11.00   0.00000  -0.01433  -0.02873  -0.04254  -0.05517  -0.06647  -0.07670
                4.00   0.00000  -0.01633  -0.03234  -0.04719  -0.06028  -0.07158  -0.08146
               19.00   0.00000  -0.01785  -0.03988  -0.06227  -0.08360  -0.10346  -0.12200
               42.00   0.00000   0.00488   0.00996   0.01500   0.01980   0.02428   0.02844
              180.00   0.00000   0.00003   0.00013   0.00030   0.00052   0.00079   0.00110
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            </tableData>
          </table>
          </product>
        </function>
        <function name="aero/coefficient/Cmq">
          <description>Cm per q (non-dimensional), over alpha</description>
          <product>
            <property>aero/qbar-psf</property>
            <property>metrics/Sw-sqft</property>
            <property>metrics/cbarw-ft</property>
            <property>aero/ci2vel</property>
            <property>velocities/q-aero-rad_sec</property>
            <property>aero/function/mach-lift</property>
          <table>
            <independentVar lookup="row">aero/alpha-deg</independentVar>
            <tableData>
                 -180.00  -12.87954
                 -165.00   -2.92288
                  -32.00  -20.41572
                  -10.00  -23.67047
                    5.00  -24.70305
                   20.00  -18.50092
                   46.00  -14.55381
                  180.00  -12.87954
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            </tableData>
          </table>
          </product>
        </function>
        <function name="aero/coefficient/Cmadot">
          <description>Cm per alpha-dot (downwash lag at the tail)</description>
          <product>
            <property>aero/qbar-psf</property>
            <property>metrics/Sw-sqft</property>
            <property>metrics/cbarw-ft</property>
            <property>aero/ci2vel</property>
            <property>aero/alphadot-rad_sec</property>
            <value>-4.42777</value>
            <property>aero/function/mach-lift</property>
          </product>
        </function>
        <function name="aero/coefficient/Cm_spoilers">
          <description>spoilers: its drag's pitching moment, -0.14 m from the reference point's height</description>
          <product>
            <property>aero/qbar-psf</property>
            <property>metrics/Sw-sqft</property>
            <property>metrics/cbarw-ft</property>
            <value>-0.00218653</value>
            <pow>
              <sin>
                <product>
                  <property>fcs/speedbrake-pos-norm</property>
                  <value>1.0472</value>
                </product>
              </sin>
              <value>2</value>
            </pow>
          </product>
        </function>
        <function name="aero/coefficient/Cm_spoilers_lift">
          <description>spoilers: the lift lost's pitching moment, 0.15 m from the reference point</description>
          <product>
            <property>aero/qbar-psf</property>
            <property>metrics/Sw-sqft</property>
            <property>metrics/cbarw-ft</property>
            <table>
              <independentVar lookup="row">aero/alpha-deg</independentVar>
              <tableData>
                   -180.00    0.00308
                   -165.00    0.00525
                    -32.00   -0.01824
                    -10.00   -0.00527
                      5.00    0.00971
                     20.00    0.01999
                     46.00    0.01529
                    180.00    0.00308
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              </tableData>
            </table>
            <min>
              <value>1</value>
              <product>
                <property>fcs/speedbrake-pos-norm</property>
                <value>1.33333</value>
              </product>
            </min>
          </product>
        </function>
        <function name="aero/coefficient/Cm_gear">
          <description>the gear's drag's pitching moment, -3.24 m from the reference point's height</description>
          <product>
            <property>aero/qbar-psf</property>
            <property>metrics/Sw-sqft</property>
            <property>metrics/cbarw-ft</property>
            <value>-0.00257067</value>
            <property>gear/gear-pos-norm</property>
          </product>
        </function>
      </axis>
      <axis name="YAW">
        <function name="aero/coefficient/Cn_base">
          <description>Cn over alpha and beta (hangar)</description>
          <product>
            <property>aero/qbar-psf</property>
            <property>metrics/Sw-sqft</property>
            <property>metrics/bw-ft</property>
            <property>aero/function/mach-side</property>
          <table>
            <independentVar lookup="row">aero/alpha-deg</independentVar>
            <independentVar lookup="column">aero/beta-deg</independentVar>
            <tableData>
                        -90.00    -70.00    -50.00    -40.00    -30.00    -25.00    -20.00    -15.00    -10.00     -6.00     -3.00      0.00      3.00      6.00     10.00     15.00     20.00     25.00     30.00     40.00     50.00     70.00     90.00
             -180.00  -0.06243  -0.08937  -0.10063  -0.09444  -0.08015  -0.07022  -0.05860  -0.04551  -0.04534  -0.04631  -0.02492  -0.00000   0.02492   0.04631   0.04534   0.04551   0.05860   0.07022   0.08015   0.09444   0.10063   0.08937   0.06243
              -35.00  -0.06243  -0.03604  -0.01273  -0.00118   0.00236  -0.00084  -0.01900  -0.02077  -0.01263  -0.00720  -0.00356  -0.00000   0.00356   0.00720   0.01263   0.02077   0.01900   0.00084  -0.00236   0.00118   0.01273   0.03604   0.06243
              -11.00  -0.06243  -0.03837  -0.01947  -0.00946  -0.02888  -0.03455  -0.03229  -0.02583  -0.01792  -0.01096  -0.00553  -0.00000   0.00553   0.01096   0.01792   0.02583   0.03229   0.03455   0.02888   0.00946   0.01947   0.03837   0.06243
                4.00  -0.06243  -0.03383   0.00616   0.00493  -0.02258  -0.02736  -0.02587  -0.02118  -0.01493  -0.00920  -0.00463  -0.00000   0.00463   0.00920   0.01493   0.02118   0.02587   0.02736   0.02258  -0.00493  -0.00616   0.03383   0.06243
               19.00  -0.06243  -0.03307  -0.02813  -0.01530  -0.01353  -0.01709  -0.01806  -0.01543  -0.01122  -0.00702  -0.00366  -0.00000   0.00366   0.00702   0.01122   0.01543   0.01806   0.01709   0.01353   0.01530   0.02813   0.03307   0.06243
               42.00  -0.06243  -0.03724  -0.01330  -0.00064   0.00492   0.00282  -0.00930  -0.01085  -0.00582  -0.00306  -0.00162  -0.00000   0.00162   0.00306   0.00582   0.01085   0.00930  -0.00282  -0.00492   0.00064   0.01330   0.03724   0.06243
              180.00  -0.06243  -0.08937  -0.10063  -0.09444  -0.08015  -0.07022  -0.05860  -0.04551  -0.04534  -0.04631  -0.02492  -0.00000   0.02492   0.04631   0.04534   0.04551   0.05860   0.07022   0.08015   0.09444   0.10063   0.08937   0.06243
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            </tableData>
          </table>
          </product>
        </function>
        <function name="aero/coefficient/Cn_aileron">
          <description>Cn increment from aileron (deg), over alpha</description>
          <product>
            <property>aero/qbar-psf</property>
            <property>metrics/Sw-sqft</property>
            <property>metrics/bw-ft</property>
            <property>aero/function/mach-aileron</property>
          <table>
            <independentVar lookup="row">aero/alpha-deg</independentVar>
            <independentVar lookup="column">fcs/left-aileron-pos-deg</independentVar>
            <tableData>
                        -20.00    -15.00    -10.00     -5.00      0.00      5.00     10.00     15.00     20.00
             -180.00  -0.00000  -0.00000  -0.00000  -0.00000   0.00000  -0.00000  -0.00000  -0.00000  -0.00000
              -35.00   0.01487   0.01258   0.00929   0.00494   0.00000  -0.00494  -0.00929  -0.01258  -0.01487
              -11.00   0.00441   0.00376   0.00279   0.00149   0.00000  -0.00149  -0.00279  -0.00376  -0.00441
                4.00   0.00078   0.00067   0.00051   0.00027   0.00000  -0.00027  -0.00051  -0.00067  -0.00078
               19.00  -0.01730  -0.01472  -0.01084  -0.00567   0.00000   0.00567   0.01084   0.01472   0.01730
               42.00  -0.01231  -0.01040  -0.00768  -0.00408   0.00000   0.00408   0.00768   0.01040   0.01231
              180.00  -0.00000  -0.00000  -0.00000  -0.00000   0.00000  -0.00000  -0.00000  -0.00000  -0.00000
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            </tableData>
          </table>
          </product>
        </function>
        <function name="aero/coefficient/Cn_rudder">
          <description>Cn increment from rudder (deg), over alpha</description>
          <product>
            <property>aero/qbar-psf</property>
            <property>metrics/Sw-sqft</property>
            <property>metrics/bw-ft</property>
            <property>aero/function/mach-rudder</property>
          <table>
            <independentVar lookup="row">aero/alpha-deg</independentVar>
            <independentVar lookup="column">fcs/rudder-pos-deg</independentVar>
            <tableData>
                        -26.00    -25.00    -20.00    -15.00    -10.00     -5.00      0.00      5.00     10.00     15.00     20.00     25.00     26.00
             -180.00  -0.00000  -0.00000  -0.00000  -0.00000  -0.00000  -0.00000   0.00000  -0.00000  -0.00000  -0.00000  -0.00000  -0.00000  -0.00000
              -35.00   0.03080   0.03028   0.02734   0.02326   0.01721   0.00914   0.00000  -0.00914  -0.01721  -0.02326  -0.02734  -0.03028  -0.03080
              -11.00   0.03851   0.03785   0.03416   0.02904   0.02152   0.01145   0.00000  -0.01145  -0.02152  -0.02904  -0.03416  -0.03785  -0.03851
                4.00   0.03936   0.03869   0.03492   0.02968   0.02200   0.01170   0.00000  -0.01170  -0.02200  -0.02968  -0.03492  -0.03869  -0.03936
               19.00   0.03316   0.03261   0.02944   0.02504   0.01857   0.00988   0.00000  -0.00988  -0.01857  -0.02504  -0.02944  -0.03261  -0.03316
               42.00   0.02733   0.02689   0.02434   0.02074   0.01520   0.00804   0.00000  -0.00804  -0.01520  -0.02074  -0.02434  -0.02689  -0.02733
              180.00  -0.00000  -0.00000  -0.00000  -0.00000  -0.00000  -0.00000   0.00000  -0.00000  -0.00000  -0.00000  -0.00000  -0.00000  -0.00000
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            </tableData>
          </table>
          </product>
        </function>
        <function name="aero/coefficient/Cnp">
          <description>Cn per p (non-dimensional), over alpha</description>
          <product>
            <property>aero/qbar-psf</property>
            <property>metrics/Sw-sqft</property>
            <property>metrics/bw-ft</property>
            <property>aero/bi2vel</property>
            <property>velocities/p-aero-rad_sec</property>
            <property>aero/function/mach-lift</property>
          <table>
            <independentVar lookup="row">aero/alpha-deg</independentVar>
            <tableData>
                 -180.00    0.12793
                 -165.00    0.11749
                  -32.00    0.07461
                  -10.00    0.14112
                    5.00   -0.04929
                   20.00    0.14345
                   46.00    0.03927
                  180.00    0.12793
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            </tableData>
          </table>
          </product>
        </function>
        <function name="aero/coefficient/Cnr">
          <description>Cn per r (non-dimensional), over alpha</description>
          <product>
            <property>aero/qbar-psf</property>
            <property>metrics/Sw-sqft</property>
            <property>metrics/bw-ft</property>
            <property>aero/bi2vel</property>
            <property>velocities/r-aero-rad_sec</property>
            <property>aero/function/mach-lift</property>
          <table>
            <independentVar lookup="row">aero/alpha-deg</independentVar>
            <tableData>
                 -180.00   -0.29883
                 -165.00   -0.29855
                  -32.00   -0.13922
                  -10.00   -0.23572
                    5.00   -0.22975
                   20.00   -0.11055
                   46.00   -0.17820
                  180.00   -0.29883
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            </tableData>
          </table>
          </product>
        </function>
      </axis>
    </aerodynamics>
</fdm_config>
