<?xml version="1.0"?>
<?xml-stylesheet type="text/xsl" href="http://jsbsim.sourceforge.net/JSBSim.xsl"?>
<!-- Generated by hangar 0.1.0 from mig29a.toml on 2026-10-01. Edit the design and rebuild; changes
     made here are overwritten.  -->
<fdm_config name="mig29a" version="2.0" release="ALPHA"
            xmlns:xsi="http://www.w3.org/2001/XMLSchema-instance"
            xsi:noNamespaceSchemaLocation="http://jsbsim.sourceforge.net/JSBSim.xsd">
    <fileheader>
      <author>hangar</author>
      <filecreationdate>2026-10-01</filecreationdate>
      <version>0.1.0</version>
      <description>Mikoyan MiG-29A Fulcrum-A (hangar build)</description>
      <note>Aerodynamics: vortex lattice with viscous section polars, full-envelope
        strip model, slender-body fuselage (hangar). Mass: Raymer component
        weights on the geometry. Propeller: blade-element momentum theory.</note>
      <reference refID="fsim/applicability/aerobatic" author="the design" title="Mikoyan data: +9 g (fsim/envelope/clean/n_max)" date="n/a"/>
      <reference refID="fsim/applicability/carrier" author="the design" title="Jane's: a land-based fighter (the MiG-29K is the naval type)" date="n/a"/>
      <reference refID="fsim/applicability/drag_devices" author="the design" title="Jane's: airbrakes between the engine nozzles" date="n/a"/>
      <reference refID="fsim/applicability/flaps" author="the design" title="Jane's: plain trailing-edge flaps" date="n/a"/>
      <reference refID="fsim/applicability/ground_contact" author="the design" title="Jane's: tricycle wheeled gear" date="n/a"/>
      <reference refID="fsim/applicability/releasable_stores" author="the design" title="Jane's: six underwing hardpoints" date="n/a"/>
      <reference refID="fsim/applicability/retractable_gear" author="the design" title="Jane's: retractable gear" date="n/a"/>
      <reference refID="fsim/applicability/vertical_flight" author="the design" title="Mikoyan data and Jane's: a conventional take-off and landing fighter. Conventional take-off and landing: no rotors, lift fans or vectored lift to hover" date="n/a"/>
    </fileheader>
    <metrics>
      <wingarea unit="M2"> 37.8387 </wingarea>
      <wingspan unit="M"> 11.3600 </wingspan>
      <chord unit="M"> 3.7757 </chord>
      <htailarea unit="M2"> 15.8725 </htailarea>
      <htailarm unit="M"> 3.7661 </htailarm>
      <vtailarea unit="M2"> 7.9833 </vtailarea>
      <vtailarm unit="M"> 3.6676 </vtailarm>
      <location name="AERORP" unit="M">
        <x> 9.4500 </x>
        <y> 0.0000 </y>
        <z> 0.0000 </z>
      </location>
      <location name="EYEPOINT" unit="M">
        <x> 4.7000 </x>
        <y> 0.0000 </y>
        <z> 1.3500 </z>
      </location>
      <location name="VRP" unit="M">
        <x> 9.2620 </x>
        <y> -0.0000 </y>
        <z> -0.3500 </z>
      </location>
    </metrics>
    <mass_balance negated_crossproduct_inertia="false">
      <ixx unit="KG*M2"> 23076.49 </ixx>
      <iyy unit="KG*M2"> 134376.81 </iyy>
      <izz unit="KG*M2"> 152271.51 </izz>
      <ixy unit="KG*M2"> -0.002 </ixy>
      <ixz unit="KG*M2"> 3656.856 </ixz>
      <iyz unit="KG*M2"> 0.072 </iyz>
      <emptywt unit="KG"> 11000.00 </emptywt>
      <location name="CG" unit="M">
        <x> 9.2620 </x>
        <y> -0.0000 </y>
        <z> -0.3500 </z>
      </location>
      <pointmass name="pilot">
        <weight unit="KG"> 100.00 </weight>
        <location unit="M">
          <x> 4.7000 </x>
          <y> 0.0000 </y>
          <z> 0.6500 </z>
        </location>
      </pointmass>
      <pointmass name="gun ammunition">
        <weight unit="KG"> 70.00 </weight>
        <location unit="M">
          <x> 6.7620 </x>
          <y> -1.2000 </y>
          <z> 0.0000 </z>
        </location>
      </pointmass>
    </mass_balance>
    <ground_reactions>
      <contact type="BOGEY" name="Nose Gear">
        <location unit="M">
          <x> 6.1600 </x>
          <y> 0.0000 </y>
          <z> -2.3200 </z>
        </location>
        <static_friction> 0.8 </static_friction>
        <dynamic_friction> 0.5 </dynamic_friction>
        <rolling_friction> 0.02 </rolling_friction>
        <spring_coeff unit="N/M"> 145677 </spring_coeff>
        <damping_coeff unit="N/M/SEC"> 17406 </damping_coeff>
        <damping_coeff_rebound unit="N/M/SEC"> 34812 </damping_coeff_rebound>
        <max_steer unit="DEG"> 30.0 </max_steer>
        <brake_group> NONE </brake_group>
        <retractable> 1 </retractable>
      </contact>
      <contact type="BOGEY" name="Left Main Gear">
        <location unit="M">
          <x> 9.7600 </x>
          <y> -1.5450 </y>
          <z> -2.3400 </z>
        </location>
        <static_friction> 0.8 </static_friction>
        <dynamic_friction> 0.5 </dynamic_friction>
        <rolling_friction> 0.02 </rolling_friction>
        <spring_coeff unit="N/M"> 385840 </spring_coeff>
        <damping_coeff unit="N/M/SEC"> 49284 </damping_coeff>
        <damping_coeff_rebound unit="N/M/SEC"> 98568 </damping_coeff_rebound>
        <max_steer unit="DEG"> 0.0 </max_steer>
        <brake_group> LEFT </brake_group>
        <retractable> 1 </retractable>
      </contact>
      <contact type="BOGEY" name="Right Main Gear">
        <location unit="M">
          <x> 9.7600 </x>
          <y> 1.5450 </y>
          <z> -2.3400 </z>
        </location>
        <static_friction> 0.8 </static_friction>
        <dynamic_friction> 0.5 </dynamic_friction>
        <rolling_friction> 0.02 </rolling_friction>
        <spring_coeff unit="N/M"> 385840 </spring_coeff>
        <damping_coeff unit="N/M/SEC"> 49284 </damping_coeff>
        <damping_coeff_rebound unit="N/M/SEC"> 98568 </damping_coeff_rebound>
        <max_steer unit="DEG"> 0.0 </max_steer>
        <brake_group> RIGHT </brake_group>
        <retractable> 1 </retractable>
      </contact>
      <contact type="STRUCTURE" name="canopy front">
        <location unit="M">
          <x> 4.0000 </x>
          <y> 0.0000 </y>
          <z> 1.1463 </z>
        </location>
        <static_friction> 0.8 </static_friction>
        <dynamic_friction> 0.6 </dynamic_friction>
        <spring_coeff unit="N/M"> 2323883 </spring_coeff>
        <damping_coeff unit="N/M/SEC"> 77463 </damping_coeff>
        <damping_coeff_rebound unit="N/M/SEC"> 77463 </damping_coeff_rebound>
      </contact>
      <contact type="STRUCTURE" name="fin left rear">
        <location unit="M">
          <x> 14.7700 </x>
          <y> -1.9501 </y>
          <z> 2.5500 </z>
        </location>
        <static_friction> 0.8 </static_friction>
        <dynamic_friction> 0.6 </dynamic_friction>
        <spring_coeff unit="N/M"> 1126867 </spring_coeff>
        <damping_coeff unit="N/M/SEC"> 37562 </damping_coeff>
        <damping_coeff_rebound unit="N/M/SEC"> 37562 </damping_coeff_rebound>
      </contact>
      <contact type="STRUCTURE" name="fin right rear">
        <location unit="M">
          <x> 14.7700 </x>
          <y> 1.9501 </y>
          <z> 2.5500 </z>
        </location>
        <static_friction> 0.8 </static_friction>
        <dynamic_friction> 0.6 </dynamic_friction>
        <spring_coeff unit="N/M"> 1126867 </spring_coeff>
        <damping_coeff unit="N/M/SEC"> 37562 </damping_coeff>
        <damping_coeff_rebound unit="N/M/SEC"> 37562 </damping_coeff_rebound>
      </contact>
      <contact type="STRUCTURE" name="htail left rear">
        <location unit="M">
          <x> 16.2200 </x>
          <y> -3.8100 </y>
          <z> -0.1851 </z>
        </location>
        <static_friction> 0.8 </static_friction>
        <dynamic_friction> 0.6 </dynamic_friction>
        <spring_coeff unit="N/M"> 830792 </spring_coeff>
        <damping_coeff unit="N/M/SEC"> 27693 </damping_coeff>
        <damping_coeff_rebound unit="N/M/SEC"> 27693 </damping_coeff_rebound>
      </contact>
      <contact type="STRUCTURE" name="htail right rear">
        <location unit="M">
          <x> 16.2200 </x>
          <y> 3.8100 </y>
          <z> -0.1851 </z>
        </location>
        <static_friction> 0.8 </static_friction>
        <dynamic_friction> 0.6 </dynamic_friction>
        <spring_coeff unit="N/M"> 830792 </spring_coeff>
        <damping_coeff unit="N/M/SEC"> 27693 </damping_coeff>
        <damping_coeff_rebound unit="N/M/SEC"> 27693 </damping_coeff_rebound>
      </contact>
      <contact type="STRUCTURE" name="nacelle left bottom">
        <location unit="M">
          <x> 6.6000 </x>
          <y> -1.1822 </y>
          <z> -1.1423 </z>
        </location>
        <static_friction> 0.8 </static_friction>
        <dynamic_friction> 0.6 </dynamic_friction>
        <spring_coeff unit="N/M"> 1990086 </spring_coeff>
        <damping_coeff unit="N/M/SEC"> 66336 </damping_coeff>
        <damping_coeff_rebound unit="N/M/SEC"> 66336 </damping_coeff_rebound>
      </contact>
      <contact type="STRUCTURE" name="nacelle left rear">
        <location unit="M">
          <x> 14.6000 </x>
          <y> -0.9300 </y>
          <z> -0.8500 </z>
        </location>
        <static_friction> 0.8 </static_friction>
        <dynamic_friction> 0.6 </dynamic_friction>
        <spring_coeff unit="N/M"> 2556683 </spring_coeff>
        <damping_coeff unit="N/M/SEC"> 85223 </damping_coeff>
        <damping_coeff_rebound unit="N/M/SEC"> 85223 </damping_coeff_rebound>
      </contact>
      <contact type="STRUCTURE" name="nacelle right rear">
        <location unit="M">
          <x> 14.6000 </x>
          <y> 0.9300 </y>
          <z> -0.8500 </z>
        </location>
        <static_friction> 0.8 </static_friction>
        <dynamic_friction> 0.6 </dynamic_friction>
        <spring_coeff unit="N/M"> 2556684 </spring_coeff>
        <damping_coeff unit="N/M/SEC"> 85223 </damping_coeff>
        <damping_coeff_rebound unit="N/M/SEC"> 85223 </damping_coeff_rebound>
      </contact>
      <contact type="STRUCTURE" name="nacelle right bottom">
        <location unit="M">
          <x> 6.6000 </x>
          <y> 1.1822 </y>
          <z> -1.1423 </z>
        </location>
        <static_friction> 0.8 </static_friction>
        <dynamic_friction> 0.6 </dynamic_friction>
        <spring_coeff unit="N/M"> 1990086 </spring_coeff>
        <damping_coeff unit="N/M/SEC"> 66336 </damping_coeff>
        <damping_coeff_rebound unit="N/M/SEC"> 66336 </damping_coeff_rebound>
      </contact>
      <contact type="STRUCTURE" name="probe front">
        <location unit="M">
          <x> -1.0400 </x>
          <y> 0.0000 </y>
          <z> -0.3100 </z>
        </location>
        <static_friction> 0.8 </static_friction>
        <dynamic_friction> 0.6 </dynamic_friction>
        <spring_coeff unit="N/M"> 1021887 </spring_coeff>
        <damping_coeff unit="N/M/SEC"> 34063 </damping_coeff>
        <damping_coeff_rebound unit="N/M/SEC"> 34063 </damping_coeff_rebound>
      </contact>
      <contact type="STRUCTURE" name="wing left rear">
        <location unit="M">
          <x> 11.4900 </x>
          <y> -5.6800 </y>
          <z> -0.1300 </z>
        </location>
        <static_friction> 0.8 </static_friction>
        <dynamic_friction> 0.6 </dynamic_friction>
        <spring_coeff unit="N/M"> 293455 </spring_coeff>
        <damping_coeff unit="N/M/SEC"> 9782 </damping_coeff>
        <damping_coeff_rebound unit="N/M/SEC"> 9782 </damping_coeff_rebound>
      </contact>
      <contact type="STRUCTURE" name="wing left rear 2">
        <location unit="M">
          <x> 12.7100 </x>
          <y> -5.6800 </y>
          <z> -0.1301 </z>
        </location>
        <static_friction> 0.8 </static_friction>
        <dynamic_friction> 0.6 </dynamic_friction>
        <spring_coeff unit="N/M"> 283977 </spring_coeff>
        <damping_coeff unit="N/M/SEC"> 9466 </damping_coeff>
        <damping_coeff_rebound unit="N/M/SEC"> 9466 </damping_coeff_rebound>
      </contact>
      <contact type="STRUCTURE" name="wing right rear">
        <location unit="M">
          <x> 12.7100 </x>
          <y> 5.6800 </y>
          <z> -0.1301 </z>
        </location>
        <static_friction> 0.8 </static_friction>
        <dynamic_friction> 0.6 </dynamic_friction>
        <spring_coeff unit="N/M"> 283977 </spring_coeff>
        <damping_coeff unit="N/M/SEC"> 9466 </damping_coeff>
        <damping_coeff_rebound unit="N/M/SEC"> 9466 </damping_coeff_rebound>
      </contact>
      <contact type="STRUCTURE" name="wing right rear 2">
        <location unit="M">
          <x> 11.4900 </x>
          <y> 5.6800 </y>
          <z> -0.1300 </z>
        </location>
        <static_friction> 0.8 </static_friction>
        <dynamic_friction> 0.6 </dynamic_friction>
        <spring_coeff unit="N/M"> 293455 </spring_coeff>
        <damping_coeff unit="N/M/SEC"> 9782 </damping_coeff>
        <damping_coeff_rebound unit="N/M/SEC"> 9782 </damping_coeff_rebound>
      </contact>
    </ground_reactions>
    <propulsion>
      <engine file="mig29a_engine0">
        <location unit="M">
          <x> 12.3000 </x>
          <y> -0.9300 </y>
          <z> -0.3800 </z>
        </location>
        <feed>0</feed>
        <feed>1</feed>
        <feed>2</feed>
        <thruster file="mig29a_nozzle0">
          <location unit="M">
            <x> 14.7300 </x>
            <y> -0.9300 </y>
            <z> -0.3800 </z>
          </location>
          <orient unit="DEG"> <roll>0.00</roll> <pitch>0.00</pitch> <yaw>0.00</yaw> </orient>

        </thruster>
      </engine>
      <engine file="mig29a_engine0">
        <location unit="M">
          <x> 12.3000 </x>
          <y> 0.9300 </y>
          <z> -0.3800 </z>
        </location>
        <feed>0</feed>
        <feed>1</feed>
        <feed>2</feed>
        <thruster file="mig29a_nozzle0">
          <location unit="M">
            <x> 14.7300 </x>
            <y> 0.9300 </y>
            <z> -0.3800 </z>
          </location>
          <orient unit="DEG"> <roll>0.00</roll> <pitch>0.00</pitch> <yaw>0.00</yaw> </orient>

        </thruster>
      </engine>
      <tank type="FUEL">
        <location unit="M">
          <x> 7.5620 </x>
          <y> 0.0000 </y>
          <z> -0.1000 </z>
        </location>
        <capacity unit="KG"> 1200.00 </capacity>
        <contents unit="KG"> 1200.00 </contents>
      </tank>
      <tank type="FUEL">
        <location unit="M">
          <x> 9.5620 </x>
          <y> 0.0000 </y>
          <z> -0.1000 </z>
        </location>
        <capacity unit="KG"> 1400.00 </capacity>
        <contents unit="KG"> 1400.00 </contents>
      </tank>
      <tank type="FUEL">
        <location unit="M">
          <x> 11.5620 </x>
          <y> 0.0000 </y>
          <z> -0.0500 </z>
        </location>
        <capacity unit="KG"> 900.00 </capacity>
        <contents unit="KG"> 900.00 </contents>
      </tank>
    </propulsion>
    <flight_control name="mig29a">
      <!-- the aircraft's profile for the platform (docs/control-architecture.md, section 7): what
           hangar knows of it - its design, its flight tests, its identified responses -->
      <property value="1">fsim/identity/version</property>
      <property value="1">fsim/identity/provenance</property>
      <property value="2">fsim/identity/class</property>
      <property value="2">fsim/identity/family</property>
      <property value="1">fsim/effectors/version</property>
      <property value="1">fsim/effectors/provenance</property>
      <property value="1">fsim/effectors/flaps</property>
      <property value="8">fsim/effectors/flaps_transit_s</property>
      <property value="1">fsim/effectors/neutral</property>
      <property value="1">fsim/effectors/pitch</property>
      <property value="0.0">fsim/effectors/pitch_trim</property>
      <property value="1">fsim/effectors/retractable_gear</property>
      <property value="1">fsim/effectors/roll</property>
      <property value="1">fsim/effectors/speedbrake</property>
      <property value="1">fsim/effectors/speedbrake_approach</property>
      <property value="1">fsim/effectors/wheel_brakes</property>
      <property value="0.0">fsim/effectors/yaw</property>
      <property value="1">fsim/envelope/version</property>
      <property value="1">fsim/envelope/provenance</property>
      <property value="26">fsim/envelope/clean/alpha_max_deg</property>
      <property value="60.6018">fsim/envelope/clean/cas_min_ms</property>
      <property value="9">fsim/envelope/clean/n_max</property>
      <property value="-3">fsim/envelope/clean/n_min</property>
      <property value="240">fsim/envelope/clean/roll_rate_max_deg_s</property>
      <property value="15.43">fsim/envelope/crosswind_max_ms</property>
      <property value="15.37">fsim/envelope/ground_pitch_max_deg</property>
      <property value="6.46">fsim/envelope/ground_turn_radius_m</property>
      <property value="0.3861">fsim/envelope/ground_yaw_accel_rad_s2</property>
      <property value="1">fsim/envelope/law_alpha</property>
      <property value="1">fsim/envelope/law_load_factor</property>
      <property value="1">fsim/envelope/law_roll_rate</property>
      <property value="1">fsim/propulsion/version</property>
      <property value="1">fsim/propulsion/provenance</property>
      <property value="1">fsim/propulsion/afterburner</property>
      <property value="2">fsim/propulsion/engines</property>
      <property value="0.178957">fsim/propulsion/spool_s</property>
      <property value="2">fsim/propulsion/type</property>
      <property value="1">fsim/plant/version</property>
      <property value="1">fsim/plant/provenance</property>
      <property value="-0.211941">fsim/plant/alpha_zero_lift_deg</property>
      <property value="3000">fsim/plant/altitude_m</property>
      <property value="135.026">fsim/plant/eas_ms</property>
      <property value="0.0">fsim/plant/elevator_trim</property>
      <property value="0.0">fsim/plant/elevator_trim_lift</property>
      <property value="9.77238">fsim/plant/pitch/gain</property>
      <property value="0.711822">fsim/plant/pitch/tau_s</property>
      <property value="3.34088">fsim/plant/roll/gain</property>
      <property value="0.189688">fsim/plant/roll/tau_s</property>
      <property value="6.65803">fsim/plant/speed/gain</property>
      <property value="0.178957">fsim/plant/speed/tau_s</property>
      <property value="154.577">fsim/plant/tas_ms</property>
      <property value="0.331744">fsim/plant/throttle_trim</property>
      <property value="0.132572">fsim/plant/yaw/gain</property>
      <property value="1">fsim/performance/version</property>
      <property value="1">fsim/performance/provenance</property>
      <property value="19119.7">fsim/performance/ceiling_m</property>
      <property value="325.305">fsim/performance/climb_ms</property>
      <property value="445.495">fsim/performance/max_tas_ms</property>
      <property value="1">fsim/applicability/version</property>
      <property value="1">fsim/applicability/provenance</property>
      <property value="1">fsim/applicability/aerobatic</property>
      <property value="1">fsim/applicability/carrier</property>
      <property value="2">fsim/applicability/drag_devices</property>
      <property value="1">fsim/applicability/flaps</property>
      <property value="1">fsim/applicability/ground_contact</property>
      <property value="2">fsim/applicability/releasable_stores</property>
      <property value="1">fsim/applicability/retractable_gear</property>
      <property value="0.0">fsim/applicability/vertical_flight</property>
      <property value="1">fsim/tables/version</property>
      <property value="1">fsim/tables/provenance</property>
      <property value="100">fsim/tables/altitude_m/h0</property>
      <property value="3820">fsim/tables/altitude_m/h1</property>
      <property value="7650">fsim/tables/altitude_m/h2</property>
      <property value="10972.8">fsim/tables/altitude_m/h3</property>
      <property value="11470">fsim/tables/altitude_m/h4</property>
      <property value="14340">fsim/tables/altitude_m/h5</property>
      <property value="16250">fsim/tables/altitude_m/h6</property>
      <property value="18160">fsim/tables/altitude_m/h7</property>
      <property value="0.474569">fsim/tables/best_endurance_fuel_kg_s/h0/w0</property>
      <property value="0.46905">fsim/tables/best_endurance_fuel_kg_s/h0/w1</property>
      <property value="0.486738">fsim/tables/best_endurance_fuel_kg_s/h0/w2</property>
      <property value="0.349712">fsim/tables/best_endurance_fuel_kg_s/h1/w0</property>
      <property value="0.378488">fsim/tables/best_endurance_fuel_kg_s/h1/w1</property>
      <property value="0.412785">fsim/tables/best_endurance_fuel_kg_s/h1/w2</property>
      <property value="0.294584">fsim/tables/best_endurance_fuel_kg_s/h2/w0</property>
      <property value="0.324492">fsim/tables/best_endurance_fuel_kg_s/h2/w1</property>
      <property value="0.354912">fsim/tables/best_endurance_fuel_kg_s/h2/w2</property>
      <property value="0.254646">fsim/tables/best_endurance_fuel_kg_s/h3/w0</property>
      <property value="0.280485">fsim/tables/best_endurance_fuel_kg_s/h3/w1</property>
      <property value="0.306378">fsim/tables/best_endurance_fuel_kg_s/h3/w2</property>
      <property value="0.250171">fsim/tables/best_endurance_fuel_kg_s/h4/w0</property>
      <property value="0.276063">fsim/tables/best_endurance_fuel_kg_s/h4/w1</property>
      <property value="0.292106">fsim/tables/best_endurance_fuel_kg_s/h4/w2</property>
      <property value="0.229351">fsim/tables/best_endurance_fuel_kg_s/h5/w0</property>
      <property value="0.139092">fsim/tables/best_endurance_fuel_kg_s/h5/w1</property>
      <property value="0.147411">fsim/tables/best_endurance_fuel_kg_s/h5/w2</property>
      <property value="0.133196">fsim/tables/best_endurance_fuel_kg_s/h6/w0</property>
      <property value="0.54915">fsim/tables/best_endurance_fuel_kg_s/h6/w1</property>
      <property value="1.00832">fsim/tables/best_endurance_fuel_kg_s/h6/w2</property>
      <property value="0.829811">fsim/tables/best_endurance_fuel_kg_s/h7/w0</property>
      <property value="1.03683">fsim/tables/best_endurance_fuel_kg_s/h7/w1</property>
      <property value="1.23425">fsim/tables/best_endurance_fuel_kg_s/h7/w2</property>
      <property value="170.281">fsim/tables/best_endurance_tas_ms/h0/w0</property>
      <property value="159.335">fsim/tables/best_endurance_tas_ms/h0/w1</property>
      <property value="155.34">fsim/tables/best_endurance_tas_ms/h0/w2</property>
      <property value="159.164">fsim/tables/best_endurance_tas_ms/h1/w0</property>
      <property value="150.864">fsim/tables/best_endurance_tas_ms/h1/w1</property>
      <property value="160.684">fsim/tables/best_endurance_tas_ms/h1/w2</property>
      <property value="179.154">fsim/tables/best_endurance_tas_ms/h2/w0</property>
      <property value="189.834">fsim/tables/best_endurance_tas_ms/h2/w1</property>
      <property value="199.903">fsim/tables/best_endurance_tas_ms/h2/w2</property>
      <property value="217.642">fsim/tables/best_endurance_tas_ms/h3/w0</property>
      <property value="229.533">fsim/tables/best_endurance_tas_ms/h3/w1</property>
      <property value="242.428">fsim/tables/best_endurance_tas_ms/h3/w2</property>
      <property value="224.887">fsim/tables/best_endurance_tas_ms/h4/w0</property>
      <property value="238.466">fsim/tables/best_endurance_tas_ms/h4/w1</property>
      <property value="245.904">fsim/tables/best_endurance_tas_ms/h4/w2</property>
      <property value="250.92">fsim/tables/best_endurance_tas_ms/h5/w0</property>
      <property value="257.806">fsim/tables/best_endurance_tas_ms/h5/w1</property>
      <property value="262.979">fsim/tables/best_endurance_tas_ms/h5/w2</property>
      <property value="260.495">fsim/tables/best_endurance_tas_ms/h6/w0</property>
      <property value="278.162">fsim/tables/best_endurance_tas_ms/h6/w1</property>
      <property value="273.913">fsim/tables/best_endurance_tas_ms/h6/w2</property>
      <property value="275.066">fsim/tables/best_endurance_tas_ms/h7/w0</property>
      <property value="280.069">fsim/tables/best_endurance_tas_ms/h7/w1</property>
      <property value="282.82">fsim/tables/best_endurance_tas_ms/h7/w2</property>
      <property value="0.501574">fsim/tables/best_range_fuel_kg_s/h0/w0</property>
      <property value="0.547957">fsim/tables/best_range_fuel_kg_s/h0/w1</property>
      <property value="0.604389">fsim/tables/best_range_fuel_kg_s/h0/w2</property>
      <property value="0.44065">fsim/tables/best_range_fuel_kg_s/h1/w0</property>
      <property value="0.486413">fsim/tables/best_range_fuel_kg_s/h1/w1</property>
      <property value="0.522057">fsim/tables/best_range_fuel_kg_s/h1/w2</property>
      <property value="0.361366">fsim/tables/best_range_fuel_kg_s/h2/w0</property>
      <property value="0.385021">fsim/tables/best_range_fuel_kg_s/h2/w1</property>
      <property value="0.410526">fsim/tables/best_range_fuel_kg_s/h2/w2</property>
      <property value="0.273876">fsim/tables/best_range_fuel_kg_s/h3/w0</property>
      <property value="0.288132">fsim/tables/best_range_fuel_kg_s/h3/w1</property>
      <property value="0.309615">fsim/tables/best_range_fuel_kg_s/h3/w2</property>
      <property value="0.265652">fsim/tables/best_range_fuel_kg_s/h4/w0</property>
      <property value="0.280124">fsim/tables/best_range_fuel_kg_s/h4/w1</property>
      <property value="0.303525">fsim/tables/best_range_fuel_kg_s/h4/w2</property>
      <property value="0.242173">fsim/tables/best_range_fuel_kg_s/h5/w0</property>
      <property value="0.265092">fsim/tables/best_range_fuel_kg_s/h5/w1</property>
      <property value="0.298233">fsim/tables/best_range_fuel_kg_s/h5/w2</property>
      <property value="0.239469">fsim/tables/best_range_fuel_kg_s/h6/w0</property>
      <property value="0.585071">fsim/tables/best_range_fuel_kg_s/h6/w1</property>
      <property value="1.04994">fsim/tables/best_range_fuel_kg_s/h6/w2</property>
      <property value="0.849832">fsim/tables/best_range_fuel_kg_s/h7/w0</property>
      <property value="1.0493">fsim/tables/best_range_fuel_kg_s/h7/w1</property>
      <property value="1.25705">fsim/tables/best_range_fuel_kg_s/h7/w2</property>
      <property value="180.086">fsim/tables/best_range_tas_ms/h0/w0</property>
      <property value="190.393">fsim/tables/best_range_tas_ms/h0/w1</property>
      <property value="204.08">fsim/tables/best_range_tas_ms/h0/w2</property>
      <property value="217.968">fsim/tables/best_range_tas_ms/h1/w0</property>
      <property value="232.888">fsim/tables/best_range_tas_ms/h1/w1</property>
      <property value="242.691">fsim/tables/best_range_tas_ms/h1/w2</property>
      <property value="255.726">fsim/tables/best_range_tas_ms/h2/w0</property>
      <property value="262.492">fsim/tables/best_range_tas_ms/h2/w1</property>
      <property value="268.72">fsim/tables/best_range_tas_ms/h2/w2</property>
      <property value="258.692">fsim/tables/best_range_tas_ms/h3/w0</property>
      <property value="255.148">fsim/tables/best_range_tas_ms/h3/w1</property>
      <property value="258.142">fsim/tables/best_range_tas_ms/h3/w2</property>
      <property value="261.34">fsim/tables/best_range_tas_ms/h4/w0</property>
      <property value="257.038">fsim/tables/best_range_tas_ms/h4/w1</property>
      <property value="259.88">fsim/tables/best_range_tas_ms/h4/w2</property>
      <property value="266.565">fsim/tables/best_range_tas_ms/h5/w0</property>
      <property value="262.517">fsim/tables/best_range_tas_ms/h5/w1</property>
      <property value="267.658">fsim/tables/best_range_tas_ms/h5/w2</property>
      <property value="265.531">fsim/tables/best_range_tas_ms/h6/w0</property>
      <property value="282.009">fsim/tables/best_range_tas_ms/h6/w1</property>
      <property value="280.448">fsim/tables/best_range_tas_ms/h6/w2</property>
      <property value="281.122">fsim/tables/best_range_tas_ms/h7/w0</property>
      <property value="286.027">fsim/tables/best_range_tas_ms/h7/w1</property>
      <property value="289.562">fsim/tables/best_range_tas_ms/h7/w2</property>
      <property value="305.501">fsim/tables/climb_tas_ms/h0/w0</property>
      <property value="307.323">fsim/tables/climb_tas_ms/h0/w1</property>
      <property value="313.034">fsim/tables/climb_tas_ms/h0/w2</property>
      <property value="302.232">fsim/tables/climb_tas_ms/h1/w0</property>
      <property value="303.455">fsim/tables/climb_tas_ms/h1/w1</property>
      <property value="304.066">fsim/tables/climb_tas_ms/h1/w2</property>
      <property value="290.398">fsim/tables/climb_tas_ms/h2/w0</property>
      <property value="292.21">fsim/tables/climb_tas_ms/h2/w1</property>
      <property value="292.876">fsim/tables/climb_tas_ms/h2/w2</property>
      <property value="281.971">fsim/tables/climb_tas_ms/h3/w0</property>
      <property value="282.042">fsim/tables/climb_tas_ms/h3/w1</property>
      <property value="284.316">fsim/tables/climb_tas_ms/h3/w2</property>
      <property value="282.327">fsim/tables/climb_tas_ms/h4/w0</property>
      <property value="282.147">fsim/tables/climb_tas_ms/h4/w1</property>
      <property value="283.694">fsim/tables/climb_tas_ms/h4/w2</property>
      <property value="283.229">fsim/tables/climb_tas_ms/h5/w0</property>
      <property value="283.603">fsim/tables/climb_tas_ms/h5/w1</property>
      <property value="282.6">fsim/tables/climb_tas_ms/h5/w2</property>
      <property value="282.801">fsim/tables/climb_tas_ms/h6/w0</property>
      <property value="282.327">fsim/tables/climb_tas_ms/h6/w1</property>
      <property value="282.647">fsim/tables/climb_tas_ms/h6/w2</property>
      <property value="282.453">fsim/tables/climb_tas_ms/h7/w0</property>
      <property value="293.269">fsim/tables/climb_tas_ms/h7/w1</property>
      <property value="271.873">fsim/tables/climb_tas_ms/h7/w2</property>
      <property value="3500">fsim/tables/fuel_capacity_kg</property>
      <property value="0.474547">fsim/tables/fuel_kg_s/h0/w0/v0</property>
      <property value="0.522734">fsim/tables/fuel_kg_s/h0/w0/v1</property>
      <property value="2.07008">fsim/tables/fuel_kg_s/h0/w0/v10</property>
      <property value="2.52924">fsim/tables/fuel_kg_s/h0/w0/v11</property>
      <property value="2.61629">fsim/tables/fuel_kg_s/h0/w0/v12</property>
      <property value="8.59157">fsim/tables/fuel_kg_s/h0/w0/v13</property>
      <property value="10.0703">fsim/tables/fuel_kg_s/h0/w0/v14</property>
      <property value="11.5199">fsim/tables/fuel_kg_s/h0/w0/v15</property>
      <property value="0.581302">fsim/tables/fuel_kg_s/h0/w0/v2</property>
      <property value="0.644321">fsim/tables/fuel_kg_s/h0/w0/v3</property>
      <property value="0.709777">fsim/tables/fuel_kg_s/h0/w0/v4</property>
      <property value="0.777427">fsim/tables/fuel_kg_s/h0/w0/v5</property>
      <property value="0.85244">fsim/tables/fuel_kg_s/h0/w0/v6</property>
      <property value="0.932974">fsim/tables/fuel_kg_s/h0/w0/v7</property>
      <property value="1.02931">fsim/tables/fuel_kg_s/h0/w0/v8</property>
      <property value="1.27785">fsim/tables/fuel_kg_s/h0/w0/v9</property>
      <property value="0.469026">fsim/tables/fuel_kg_s/h0/w1/v0</property>
      <property value="0.512102">fsim/tables/fuel_kg_s/h0/w1/v1</property>
      <property value="1.7923">fsim/tables/fuel_kg_s/h0/w1/v10</property>
      <property value="8.46777">fsim/tables/fuel_kg_s/h0/w1/v11</property>
      <property value="9.31651">fsim/tables/fuel_kg_s/h0/w1/v12</property>
      <property value="10.1998">fsim/tables/fuel_kg_s/h0/w1/v13</property>
      <property value="11.0964">fsim/tables/fuel_kg_s/h0/w1/v14</property>
      <property value="11.9743">fsim/tables/fuel_kg_s/h0/w1/v15</property>
      <property value="0.562725">fsim/tables/fuel_kg_s/h0/w1/v2</property>
      <property value="0.622756">fsim/tables/fuel_kg_s/h0/w1/v3</property>
      <property value="0.68924">fsim/tables/fuel_kg_s/h0/w1/v4</property>
      <property value="0.758214">fsim/tables/fuel_kg_s/h0/w1/v5</property>
      <property value="0.82969">fsim/tables/fuel_kg_s/h0/w1/v6</property>
      <property value="0.908389">fsim/tables/fuel_kg_s/h0/w1/v7</property>
      <property value="0.998443">fsim/tables/fuel_kg_s/h0/w1/v8</property>
      <property value="1.12857">fsim/tables/fuel_kg_s/h0/w1/v9</property>
      <property value="0.486717">fsim/tables/fuel_kg_s/h0/w2/v0</property>
      <property value="0.521251">fsim/tables/fuel_kg_s/h0/w2/v1</property>
      <property value="1.69424">fsim/tables/fuel_kg_s/h0/w2/v10</property>
      <property value="8.41595">fsim/tables/fuel_kg_s/h0/w2/v11</property>
      <property value="9.27422">fsim/tables/fuel_kg_s/h0/w2/v12</property>
      <property value="10.1677">fsim/tables/fuel_kg_s/h0/w2/v13</property>
      <property value="11.0786">fsim/tables/fuel_kg_s/h0/w2/v14</property>
      <property value="11.9674">fsim/tables/fuel_kg_s/h0/w2/v15</property>
      <property value="0.570106">fsim/tables/fuel_kg_s/h0/w2/v2</property>
      <property value="0.623036">fsim/tables/fuel_kg_s/h0/w2/v3</property>
      <property value="0.688313">fsim/tables/fuel_kg_s/h0/w2/v4</property>
      <property value="0.757436">fsim/tables/fuel_kg_s/h0/w2/v5</property>
      <property value="0.829112">fsim/tables/fuel_kg_s/h0/w2/v6</property>
      <property value="0.903853">fsim/tables/fuel_kg_s/h0/w2/v7</property>
      <property value="0.992227">fsim/tables/fuel_kg_s/h0/w2/v8</property>
      <property value="1.11653">fsim/tables/fuel_kg_s/h0/w2/v9</property>
      <property value="0.349701">fsim/tables/fuel_kg_s/h1/w0/v0</property>
      <property value="0.374316">fsim/tables/fuel_kg_s/h1/w0/v1</property>
      <property value="6.43772">fsim/tables/fuel_kg_s/h1/w0/v10</property>
      <property value="7.14718">fsim/tables/fuel_kg_s/h1/w0/v11</property>
      <property value="7.84785">fsim/tables/fuel_kg_s/h1/w0/v12</property>
      <property value="7.19757">fsim/tables/fuel_kg_s/h1/w0/v13</property>
      <property value="8.44847">fsim/tables/fuel_kg_s/h1/w0/v14</property>
      <property value="9.76707">fsim/tables/fuel_kg_s/h1/w0/v15</property>
      <property value="0.411288">fsim/tables/fuel_kg_s/h1/w0/v2</property>
      <property value="0.45368">fsim/tables/fuel_kg_s/h1/w0/v3</property>
      <property value="0.506624">fsim/tables/fuel_kg_s/h1/w0/v4</property>
      <property value="0.562556">fsim/tables/fuel_kg_s/h1/w0/v5</property>
      <property value="0.624489">fsim/tables/fuel_kg_s/h1/w0/v6</property>
      <property value="0.766004">fsim/tables/fuel_kg_s/h1/w0/v7</property>
      <property value="1.43859">fsim/tables/fuel_kg_s/h1/w0/v8</property>
      <property value="5.74001">fsim/tables/fuel_kg_s/h1/w0/v9</property>
      <property value="0.378483">fsim/tables/fuel_kg_s/h1/w1/v0</property>
      <property value="0.387314">fsim/tables/fuel_kg_s/h1/w1/v1</property>
      <property value="6.34728">fsim/tables/fuel_kg_s/h1/w1/v10</property>
      <property value="7.07791">fsim/tables/fuel_kg_s/h1/w1/v11</property>
      <property value="7.79317">fsim/tables/fuel_kg_s/h1/w1/v12</property>
      <property value="8.53238">fsim/tables/fuel_kg_s/h1/w1/v13</property>
      <property value="9.30615">fsim/tables/fuel_kg_s/h1/w1/v14</property>
      <property value="10.1282">fsim/tables/fuel_kg_s/h1/w1/v15</property>
      <property value="0.415458">fsim/tables/fuel_kg_s/h1/w1/v2</property>
      <property value="0.456155">fsim/tables/fuel_kg_s/h1/w1/v3</property>
      <property value="0.501131">fsim/tables/fuel_kg_s/h1/w1/v4</property>
      <property value="0.557229">fsim/tables/fuel_kg_s/h1/w1/v5</property>
      <property value="0.618271">fsim/tables/fuel_kg_s/h1/w1/v6</property>
      <property value="0.704607">fsim/tables/fuel_kg_s/h1/w1/v7</property>
      <property value="1.24145">fsim/tables/fuel_kg_s/h1/w1/v8</property>
      <property value="5.6375">fsim/tables/fuel_kg_s/h1/w1/v9</property>
      <property value="0.415862">fsim/tables/fuel_kg_s/h1/w2/v0</property>
      <property value="0.414914">fsim/tables/fuel_kg_s/h1/w2/v1</property>
      <property value="6.32087">fsim/tables/fuel_kg_s/h1/w2/v10</property>
      <property value="7.05805">fsim/tables/fuel_kg_s/h1/w2/v11</property>
      <property value="7.77615">fsim/tables/fuel_kg_s/h1/w2/v12</property>
      <property value="8.51844">fsim/tables/fuel_kg_s/h1/w2/v13</property>
      <property value="9.29376">fsim/tables/fuel_kg_s/h1/w2/v14</property>
      <property value="10.1187">fsim/tables/fuel_kg_s/h1/w2/v15</property>
      <property value="0.434618">fsim/tables/fuel_kg_s/h1/w2/v2</property>
      <property value="0.468216">fsim/tables/fuel_kg_s/h1/w2/v3</property>
      <property value="0.511904">fsim/tables/fuel_kg_s/h1/w2/v4</property>
      <property value="0.562448">fsim/tables/fuel_kg_s/h1/w2/v5</property>
      <property value="0.622879">fsim/tables/fuel_kg_s/h1/w2/v6</property>
      <property value="0.706478">fsim/tables/fuel_kg_s/h1/w2/v7</property>
      <property value="1.18081">fsim/tables/fuel_kg_s/h1/w2/v8</property>
      <property value="5.60869">fsim/tables/fuel_kg_s/h1/w2/v9</property>
      <property value="0.324385">fsim/tables/fuel_kg_s/h2/w0/v0</property>
      <property value="0.296929">fsim/tables/fuel_kg_s/h2/w0/v1</property>
      <property value="5.13189">fsim/tables/fuel_kg_s/h2/w0/v10</property>
      <property value="5.74746">fsim/tables/fuel_kg_s/h2/w0/v11</property>
      <property value="6.40314">fsim/tables/fuel_kg_s/h2/w0/v12</property>
      <property value="7.0891">fsim/tables/fuel_kg_s/h2/w0/v13</property>
      <property value="7.01859">fsim/tables/fuel_kg_s/h2/w0/v14</property>
      <property value="8.18176">fsim/tables/fuel_kg_s/h2/w0/v15</property>
      <property value="0.300324">fsim/tables/fuel_kg_s/h2/w0/v2</property>
      <property value="0.322172">fsim/tables/fuel_kg_s/h2/w0/v3</property>
      <property value="0.355897">fsim/tables/fuel_kg_s/h2/w0/v4</property>
      <property value="0.399704">fsim/tables/fuel_kg_s/h2/w0/v5</property>
      <property value="0.615022">fsim/tables/fuel_kg_s/h2/w0/v6</property>
      <property value="3.44592">fsim/tables/fuel_kg_s/h2/w0/v7</property>
      <property value="4.00378">fsim/tables/fuel_kg_s/h2/w0/v8</property>
      <property value="4.5599">fsim/tables/fuel_kg_s/h2/w0/v9</property>
      <property value="0.352871">fsim/tables/fuel_kg_s/h2/w1/v0</property>
      <property value="0.326907">fsim/tables/fuel_kg_s/h2/w1/v1</property>
      <property value="5.23116">fsim/tables/fuel_kg_s/h2/w1/v10</property>
      <property value="5.82536">fsim/tables/fuel_kg_s/h2/w1/v11</property>
      <property value="6.45958">fsim/tables/fuel_kg_s/h2/w1/v12</property>
      <property value="7.12691">fsim/tables/fuel_kg_s/h2/w1/v13</property>
      <property value="7.82359">fsim/tables/fuel_kg_s/h2/w1/v14</property>
      <property value="8.54637">fsim/tables/fuel_kg_s/h2/w1/v15</property>
      <property value="0.329413">fsim/tables/fuel_kg_s/h2/w1/v2</property>
      <property value="0.349418">fsim/tables/fuel_kg_s/h2/w1/v3</property>
      <property value="0.381003">fsim/tables/fuel_kg_s/h2/w1/v4</property>
      <property value="0.427913">fsim/tables/fuel_kg_s/h2/w1/v5</property>
      <property value="0.767617">fsim/tables/fuel_kg_s/h2/w1/v6</property>
      <property value="3.58548">fsim/tables/fuel_kg_s/h2/w1/v7</property>
      <property value="4.13667">fsim/tables/fuel_kg_s/h2/w1/v8</property>
      <property value="4.67476">fsim/tables/fuel_kg_s/h2/w1/v9</property>
      <property value="0.40476">fsim/tables/fuel_kg_s/h2/w2/v0</property>
      <property value="0.361219">fsim/tables/fuel_kg_s/h2/w2/v1</property>
      <property value="5.25428">fsim/tables/fuel_kg_s/h2/w2/v10</property>
      <property value="5.84737">fsim/tables/fuel_kg_s/h2/w2/v11</property>
      <property value="6.47855">fsim/tables/fuel_kg_s/h2/w2/v12</property>
      <property value="7.13804">fsim/tables/fuel_kg_s/h2/w2/v13</property>
      <property value="7.82371">fsim/tables/fuel_kg_s/h2/w2/v14</property>
      <property value="8.5428">fsim/tables/fuel_kg_s/h2/w2/v15</property>
      <property value="0.3553">fsim/tables/fuel_kg_s/h2/w2/v2</property>
      <property value="0.36902">fsim/tables/fuel_kg_s/h2/w2/v3</property>
      <property value="0.39541">fsim/tables/fuel_kg_s/h2/w2/v4</property>
      <property value="0.440207">fsim/tables/fuel_kg_s/h2/w2/v5</property>
      <property value="0.759303">fsim/tables/fuel_kg_s/h2/w2/v6</property>
      <property value="3.60525">fsim/tables/fuel_kg_s/h2/w2/v7</property>
      <property value="4.1577">fsim/tables/fuel_kg_s/h2/w2/v8</property>
      <property value="4.69756">fsim/tables/fuel_kg_s/h2/w2/v9</property>
      <property value="0.367879">fsim/tables/fuel_kg_s/h3/w0/v0</property>
      <property value="0.279013">fsim/tables/fuel_kg_s/h3/w0/v1</property>
      <property value="4.34568">fsim/tables/fuel_kg_s/h3/w0/v10</property>
      <property value="4.89346">fsim/tables/fuel_kg_s/h3/w0/v11</property>
      <property value="5.46892">fsim/tables/fuel_kg_s/h3/w0/v12</property>
      <property value="6.06964">fsim/tables/fuel_kg_s/h3/w0/v13</property>
      <property value="6.69541">fsim/tables/fuel_kg_s/h3/w0/v14</property>
      <property value="6.79207">fsim/tables/fuel_kg_s/h3/w0/v15</property>
      <property value="0.256441">fsim/tables/fuel_kg_s/h3/w0/v2</property>
      <property value="0.259731">fsim/tables/fuel_kg_s/h3/w0/v3</property>
      <property value="0.283918">fsim/tables/fuel_kg_s/h3/w0/v4</property>
      <property value="0.591498">fsim/tables/fuel_kg_s/h3/w0/v5</property>
      <property value="2.45048">fsim/tables/fuel_kg_s/h3/w0/v6</property>
      <property value="2.88906">fsim/tables/fuel_kg_s/h3/w0/v7</property>
      <property value="3.33747">fsim/tables/fuel_kg_s/h3/w0/v8</property>
      <property value="3.82474">fsim/tables/fuel_kg_s/h3/w0/v9</property>
      <property value="0.354788">fsim/tables/fuel_kg_s/h3/w1/v0</property>
      <property value="0.295433">fsim/tables/fuel_kg_s/h3/w1/v1</property>
      <property value="4.49522">fsim/tables/fuel_kg_s/h3/w1/v10</property>
      <property value="5.02279">fsim/tables/fuel_kg_s/h3/w1/v11</property>
      <property value="5.57509">fsim/tables/fuel_kg_s/h3/w1/v12</property>
      <property value="6.15052">fsim/tables/fuel_kg_s/h3/w1/v13</property>
      <property value="6.74844">fsim/tables/fuel_kg_s/h3/w1/v14</property>
      <property value="7.36836">fsim/tables/fuel_kg_s/h3/w1/v15</property>
      <property value="0.280749">fsim/tables/fuel_kg_s/h3/w1/v2</property>
      <property value="0.28854">fsim/tables/fuel_kg_s/h3/w1/v3</property>
      <property value="0.371195">fsim/tables/fuel_kg_s/h3/w1/v4</property>
      <property value="2.26464">fsim/tables/fuel_kg_s/h3/w1/v5</property>
      <property value="2.67411">fsim/tables/fuel_kg_s/h3/w1/v6</property>
      <property value="3.0792">fsim/tables/fuel_kg_s/h3/w1/v7</property>
      <property value="3.51707">fsim/tables/fuel_kg_s/h3/w1/v8</property>
      <property value="3.99215">fsim/tables/fuel_kg_s/h3/w1/v9</property>
      <property value="0.408446">fsim/tables/fuel_kg_s/h3/w2/v0</property>
      <property value="0.33269">fsim/tables/fuel_kg_s/h3/w2/v1</property>
      <property value="4.5416">fsim/tables/fuel_kg_s/h3/w2/v10</property>
      <property value="5.0651">fsim/tables/fuel_kg_s/h3/w2/v11</property>
      <property value="5.61315">fsim/tables/fuel_kg_s/h3/w2/v12</property>
      <property value="6.18292">fsim/tables/fuel_kg_s/h3/w2/v13</property>
      <property value="6.77581">fsim/tables/fuel_kg_s/h3/w2/v14</property>
      <property value="7.39034">fsim/tables/fuel_kg_s/h3/w2/v15</property>
      <property value="0.309143">fsim/tables/fuel_kg_s/h3/w2/v2</property>
      <property value="0.309629">fsim/tables/fuel_kg_s/h3/w2/v3</property>
      <property value="0.402891">fsim/tables/fuel_kg_s/h3/w2/v4</property>
      <property value="2.33576">fsim/tables/fuel_kg_s/h3/w2/v5</property>
      <property value="2.74664">fsim/tables/fuel_kg_s/h3/w2/v6</property>
      <property value="3.14596">fsim/tables/fuel_kg_s/h3/w2/v7</property>
      <property value="3.57033">fsim/tables/fuel_kg_s/h3/w2/v8</property>
      <property value="4.04201">fsim/tables/fuel_kg_s/h3/w2/v9</property>
      <property value="0.371799">fsim/tables/fuel_kg_s/h4/w0/v0</property>
      <property value="0.279553">fsim/tables/fuel_kg_s/h4/w0/v1</property>
      <property value="4.06736">fsim/tables/fuel_kg_s/h4/w0/v10</property>
      <property value="4.57327">fsim/tables/fuel_kg_s/h4/w0/v11</property>
      <property value="5.10451">fsim/tables/fuel_kg_s/h4/w0/v12</property>
      <property value="5.6589">fsim/tables/fuel_kg_s/h4/w0/v13</property>
      <property value="6.23611">fsim/tables/fuel_kg_s/h4/w0/v14</property>
      <property value="6.83545">fsim/tables/fuel_kg_s/h4/w0/v15</property>
      <property value="0.252967">fsim/tables/fuel_kg_s/h4/w0/v2</property>
      <property value="0.25285">fsim/tables/fuel_kg_s/h4/w0/v3</property>
      <property value="0.274622">fsim/tables/fuel_kg_s/h4/w0/v4</property>
      <property value="0.598994">fsim/tables/fuel_kg_s/h4/w0/v5</property>
      <property value="2.32273">fsim/tables/fuel_kg_s/h4/w0/v6</property>
      <property value="2.71948">fsim/tables/fuel_kg_s/h4/w0/v7</property>
      <property value="3.13465">fsim/tables/fuel_kg_s/h4/w0/v8</property>
      <property value="3.58592">fsim/tables/fuel_kg_s/h4/w0/v9</property>
      <property value="0.3631">fsim/tables/fuel_kg_s/h4/w1/v0</property>
      <property value="0.29715">fsim/tables/fuel_kg_s/h4/w1/v1</property>
      <property value="4.20118">fsim/tables/fuel_kg_s/h4/w1/v10</property>
      <property value="4.68939">fsim/tables/fuel_kg_s/h4/w1/v11</property>
      <property value="5.20036">fsim/tables/fuel_kg_s/h4/w1/v12</property>
      <property value="5.7327">fsim/tables/fuel_kg_s/h4/w1/v13</property>
      <property value="6.28562">fsim/tables/fuel_kg_s/h4/w1/v14</property>
      <property value="6.85888">fsim/tables/fuel_kg_s/h4/w1/v15</property>
      <property value="0.277692">fsim/tables/fuel_kg_s/h4/w1/v2</property>
      <property value="0.280219">fsim/tables/fuel_kg_s/h4/w1/v3</property>
      <property value="0.364453">fsim/tables/fuel_kg_s/h4/w1/v4</property>
      <property value="2.14291">fsim/tables/fuel_kg_s/h4/w1/v5</property>
      <property value="2.52422">fsim/tables/fuel_kg_s/h4/w1/v6</property>
      <property value="2.89557">fsim/tables/fuel_kg_s/h4/w1/v7</property>
      <property value="3.29575">fsim/tables/fuel_kg_s/h4/w1/v8</property>
      <property value="3.73554">fsim/tables/fuel_kg_s/h4/w1/v9</property>
      <property value="0.417681">fsim/tables/fuel_kg_s/h4/w2/v0</property>
      <property value="0.333002">fsim/tables/fuel_kg_s/h4/w2/v1</property>
      <property value="4.24987">fsim/tables/fuel_kg_s/h4/w2/v10</property>
      <property value="4.73338">fsim/tables/fuel_kg_s/h4/w2/v11</property>
      <property value="5.23937">fsim/tables/fuel_kg_s/h4/w2/v12</property>
      <property value="5.76631">fsim/tables/fuel_kg_s/h4/w2/v13</property>
      <property value="6.31341">fsim/tables/fuel_kg_s/h4/w2/v14</property>
      <property value="6.88047">fsim/tables/fuel_kg_s/h4/w2/v15</property>
      <property value="0.305525">fsim/tables/fuel_kg_s/h4/w2/v2</property>
      <property value="0.303443">fsim/tables/fuel_kg_s/h4/w2/v3</property>
      <property value="0.400224">fsim/tables/fuel_kg_s/h4/w2/v4</property>
      <property value="2.21862">fsim/tables/fuel_kg_s/h4/w2/v5</property>
      <property value="2.6">fsim/tables/fuel_kg_s/h4/w2/v6</property>
      <property value="2.9708">fsim/tables/fuel_kg_s/h4/w2/v7</property>
      <property value="3.3623">fsim/tables/fuel_kg_s/h4/w2/v8</property>
      <property value="3.78865">fsim/tables/fuel_kg_s/h4/w2/v9</property>
      <property value="1.30356">fsim/tables/fuel_kg_s/h5/w0/v0</property>
      <property value="0.292052">fsim/tables/fuel_kg_s/h5/w0/v1</property>
      <property value="2.79649">fsim/tables/fuel_kg_s/h5/w0/v10</property>
      <property value="3.10088">fsim/tables/fuel_kg_s/h5/w0/v11</property>
      <property value="3.41918">fsim/tables/fuel_kg_s/h5/w0/v12</property>
      <property value="3.74965">fsim/tables/fuel_kg_s/h5/w0/v13</property>
      <property value="4.10065">fsim/tables/fuel_kg_s/h5/w0/v14</property>
      <property value="4.46675">fsim/tables/fuel_kg_s/h5/w0/v15</property>
      <property value="0.24633">fsim/tables/fuel_kg_s/h5/w0/v2</property>
      <property value="0.231397">fsim/tables/fuel_kg_s/h5/w0/v3</property>
      <property value="0.278082">fsim/tables/fuel_kg_s/h5/w0/v4</property>
      <property value="1.5009">fsim/tables/fuel_kg_s/h5/w0/v5</property>
      <property value="1.73849">fsim/tables/fuel_kg_s/h5/w0/v6</property>
      <property value="1.97219">fsim/tables/fuel_kg_s/h5/w0/v7</property>
      <property value="2.22735">fsim/tables/fuel_kg_s/h5/w0/v8</property>
      <property value="2.50342">fsim/tables/fuel_kg_s/h5/w0/v9</property>
      <property value="1.34738">fsim/tables/fuel_kg_s/h5/w1/v0</property>
      <property value="0.318982">fsim/tables/fuel_kg_s/h5/w1/v1</property>
      <property value="2.90478">fsim/tables/fuel_kg_s/h5/w1/v10</property>
      <property value="3.20014">fsim/tables/fuel_kg_s/h5/w1/v11</property>
      <property value="3.5076">fsim/tables/fuel_kg_s/h5/w1/v12</property>
      <property value="3.82687">fsim/tables/fuel_kg_s/h5/w1/v13</property>
      <property value="4.1559">fsim/tables/fuel_kg_s/h5/w1/v14</property>
      <property value="4.49596">fsim/tables/fuel_kg_s/h5/w1/v15</property>
      <property value="0.273388">fsim/tables/fuel_kg_s/h5/w1/v2</property>
      <property value="0.260924">fsim/tables/fuel_kg_s/h5/w1/v3</property>
      <property value="1.27359">fsim/tables/fuel_kg_s/h5/w1/v4</property>
      <property value="1.65766">fsim/tables/fuel_kg_s/h5/w1/v5</property>
      <property value="1.88375">fsim/tables/fuel_kg_s/h5/w1/v6</property>
      <property value="2.10937">fsim/tables/fuel_kg_s/h5/w1/v7</property>
      <property value="2.35109">fsim/tables/fuel_kg_s/h5/w1/v8</property>
      <property value="2.62103">fsim/tables/fuel_kg_s/h5/w1/v9</property>
      <property value="1.55428">fsim/tables/fuel_kg_s/h5/w2/v0</property>
      <property value="1.16112">fsim/tables/fuel_kg_s/h5/w2/v1</property>
      <property value="2.9713">fsim/tables/fuel_kg_s/h5/w2/v10</property>
      <property value="3.26097">fsim/tables/fuel_kg_s/h5/w2/v11</property>
      <property value="3.56265">fsim/tables/fuel_kg_s/h5/w2/v12</property>
      <property value="3.87541">fsim/tables/fuel_kg_s/h5/w2/v13</property>
      <property value="4.19802">fsim/tables/fuel_kg_s/h5/w2/v14</property>
      <property value="4.53063">fsim/tables/fuel_kg_s/h5/w2/v15</property>
      <property value="0.310736">fsim/tables/fuel_kg_s/h5/w2/v2</property>
      <property value="0.292103">fsim/tables/fuel_kg_s/h5/w2/v3</property>
      <property value="1.50649">fsim/tables/fuel_kg_s/h5/w2/v4</property>
      <property value="1.78394">fsim/tables/fuel_kg_s/h5/w2/v5</property>
      <property value="1.99302">fsim/tables/fuel_kg_s/h5/w2/v6</property>
      <property value="2.20975">fsim/tables/fuel_kg_s/h5/w2/v7</property>
      <property value="2.44232">fsim/tables/fuel_kg_s/h5/w2/v8</property>
      <property value="2.70018">fsim/tables/fuel_kg_s/h5/w2/v9</property>
      <property value="0.981117">fsim/tables/fuel_kg_s/h6/w0/v1</property>
      <property value="2.22255">fsim/tables/fuel_kg_s/h6/w0/v10</property>
      <property value="2.42291">fsim/tables/fuel_kg_s/h6/w0/v11</property>
      <property value="2.63772">fsim/tables/fuel_kg_s/h6/w0/v12</property>
      <property value="2.86532">fsim/tables/fuel_kg_s/h6/w0/v13</property>
      <property value="3.10298">fsim/tables/fuel_kg_s/h6/w0/v14</property>
      <property value="3.34671">fsim/tables/fuel_kg_s/h6/w0/v15</property>
      <property value="0.254051">fsim/tables/fuel_kg_s/h6/w0/v2</property>
      <property value="0.233008">fsim/tables/fuel_kg_s/h6/w0/v3</property>
      <property value="1.0943">fsim/tables/fuel_kg_s/h6/w0/v4</property>
      <property value="1.35705">fsim/tables/fuel_kg_s/h6/w0/v5</property>
      <property value="1.51362">fsim/tables/fuel_kg_s/h6/w0/v6</property>
      <property value="1.66665">fsim/tables/fuel_kg_s/h6/w0/v7</property>
      <property value="1.83662">fsim/tables/fuel_kg_s/h6/w0/v8</property>
      <property value="2.0238">fsim/tables/fuel_kg_s/h6/w0/v9</property>
      <property value="1.11679">fsim/tables/fuel_kg_s/h6/w1/v1</property>
      <property value="2.28838">fsim/tables/fuel_kg_s/h6/w1/v10</property>
      <property value="2.47259">fsim/tables/fuel_kg_s/h6/w1/v11</property>
      <property value="2.67057">fsim/tables/fuel_kg_s/h6/w1/v12</property>
      <property value="2.86743">fsim/tables/fuel_kg_s/h6/w1/v13</property>
      <property value="3.07655">fsim/tables/fuel_kg_s/h6/w1/v14</property>
      <property value="3.28293">fsim/tables/fuel_kg_s/h6/w1/v15</property>
      <property value="0.931901">fsim/tables/fuel_kg_s/h6/w1/v2</property>
      <property value="0.568611">fsim/tables/fuel_kg_s/h6/w1/v3</property>
      <property value="1.35507">fsim/tables/fuel_kg_s/h6/w1/v4</property>
      <property value="1.49612">fsim/tables/fuel_kg_s/h6/w1/v5</property>
      <property value="1.63848">fsim/tables/fuel_kg_s/h6/w1/v6</property>
      <property value="1.77968">fsim/tables/fuel_kg_s/h6/w1/v7</property>
      <property value="1.92766">fsim/tables/fuel_kg_s/h6/w1/v8</property>
      <property value="2.1007">fsim/tables/fuel_kg_s/h6/w1/v9</property>
      <property value="1.30286">fsim/tables/fuel_kg_s/h6/w2/v1</property>
      <property value="2.26323">fsim/tables/fuel_kg_s/h6/w2/v10</property>
      <property value="2.42201">fsim/tables/fuel_kg_s/h6/w2/v11</property>
      <property value="2.58679">fsim/tables/fuel_kg_s/h6/w2/v12</property>
      <property value="2.76588">fsim/tables/fuel_kg_s/h6/w2/v13</property>
      <property value="2.94089">fsim/tables/fuel_kg_s/h6/w2/v14</property>
      <property value="3.10978">fsim/tables/fuel_kg_s/h6/w2/v15</property>
      <property value="1.09253">fsim/tables/fuel_kg_s/h6/w2/v2</property>
      <property value="1.04359">fsim/tables/fuel_kg_s/h6/w2/v3</property>
      <property value="1.45011">fsim/tables/fuel_kg_s/h6/w2/v4</property>
      <property value="1.58901">fsim/tables/fuel_kg_s/h6/w2/v5</property>
      <property value="1.72092">fsim/tables/fuel_kg_s/h6/w2/v6</property>
      <property value="1.83675">fsim/tables/fuel_kg_s/h6/w2/v7</property>
      <property value="1.97078">fsim/tables/fuel_kg_s/h6/w2/v8</property>
      <property value="2.10925">fsim/tables/fuel_kg_s/h6/w2/v9</property>
      <property value="1.05696">fsim/tables/fuel_kg_s/h7/w0/v1</property>
      <property value="1.60414">fsim/tables/fuel_kg_s/h7/w0/v10</property>
      <property value="1.70033">fsim/tables/fuel_kg_s/h7/w0/v11</property>
      <property value="1.80638">fsim/tables/fuel_kg_s/h7/w0/v12</property>
      <property value="1.90255">fsim/tables/fuel_kg_s/h7/w0/v13</property>
      <property value="1.99766">fsim/tables/fuel_kg_s/h7/w0/v14</property>
      <property value="2.17247">fsim/tables/fuel_kg_s/h7/w0/v15</property>
      <property value="0.908921">fsim/tables/fuel_kg_s/h7/w0/v2</property>
      <property value="0.834325">fsim/tables/fuel_kg_s/h7/w0/v3</property>
      <property value="1.00195">fsim/tables/fuel_kg_s/h7/w0/v4</property>
      <property value="1.20428">fsim/tables/fuel_kg_s/h7/w0/v5</property>
      <property value="1.28061">fsim/tables/fuel_kg_s/h7/w0/v6</property>
      <property value="1.35882">fsim/tables/fuel_kg_s/h7/w0/v7</property>
      <property value="1.4355">fsim/tables/fuel_kg_s/h7/w0/v8</property>
      <property value="1.51549">fsim/tables/fuel_kg_s/h7/w0/v9</property>
      <property value="1.11601">fsim/tables/fuel_kg_s/h7/w1/v0</property>
      <property value="1.04366">fsim/tables/fuel_kg_s/h7/w1/v1</property>
      <property value="1.62449">fsim/tables/fuel_kg_s/h7/w1/v10</property>
      <property value="1.67756">fsim/tables/fuel_kg_s/h7/w1/v11</property>
      <property value="1.72718">fsim/tables/fuel_kg_s/h7/w1/v12</property>
      <property value="1.77738">fsim/tables/fuel_kg_s/h7/w1/v13</property>
      <property value="1.88293">fsim/tables/fuel_kg_s/h7/w1/v14</property>
      <property value="1.9723">fsim/tables/fuel_kg_s/h7/w1/v15</property>
      <property value="1.05033">fsim/tables/fuel_kg_s/h7/w1/v2</property>
      <property value="1.19507">fsim/tables/fuel_kg_s/h7/w1/v3</property>
      <property value="1.34094">fsim/tables/fuel_kg_s/h7/w1/v4</property>
      <property value="1.38427">fsim/tables/fuel_kg_s/h7/w1/v5</property>
      <property value="1.42931">fsim/tables/fuel_kg_s/h7/w1/v6</property>
      <property value="1.48182">fsim/tables/fuel_kg_s/h7/w1/v7</property>
      <property value="1.52585">fsim/tables/fuel_kg_s/h7/w1/v8</property>
      <property value="1.57077">fsim/tables/fuel_kg_s/h7/w1/v9</property>
      <property value="1.23425">fsim/tables/fuel_kg_s/h7/w2/v1</property>
      <property value="1.74425">fsim/tables/fuel_kg_s/h7/w2/v10</property>
      <property value="1.76845">fsim/tables/fuel_kg_s/h7/w2/v11</property>
      <property value="1.79251">fsim/tables/fuel_kg_s/h7/w2/v12</property>
      <property value="1.81631">fsim/tables/fuel_kg_s/h7/w2/v13</property>
      <property value="1.8425">fsim/tables/fuel_kg_s/h7/w2/v14</property>
      <property value="1.86989">fsim/tables/fuel_kg_s/h7/w2/v15</property>
      <property value="1.27082">fsim/tables/fuel_kg_s/h7/w2/v2</property>
      <property value="1.4041">fsim/tables/fuel_kg_s/h7/w2/v3</property>
      <property value="1.61078">fsim/tables/fuel_kg_s/h7/w2/v4</property>
      <property value="1.63225">fsim/tables/fuel_kg_s/h7/w2/v5</property>
      <property value="1.65316">fsim/tables/fuel_kg_s/h7/w2/v6</property>
      <property value="1.67352">fsim/tables/fuel_kg_s/h7/w2/v7</property>
      <property value="1.69494">fsim/tables/fuel_kg_s/h7/w2/v8</property>
      <property value="1.71986">fsim/tables/fuel_kg_s/h7/w2/v9</property>
      <property value="392.543">fsim/tables/max_climb_ms/h0/w0</property>
      <property value="347.725">fsim/tables/max_climb_ms/h0/w1</property>
      <property value="311.891">fsim/tables/max_climb_ms/h0/w2</property>
      <property value="307.589">fsim/tables/max_climb_ms/h1/w0</property>
      <property value="271.548">fsim/tables/max_climb_ms/h1/w1</property>
      <property value="242.852">fsim/tables/max_climb_ms/h1/w2</property>
      <property value="230.089">fsim/tables/max_climb_ms/h2/w0</property>
      <property value="200.856">fsim/tables/max_climb_ms/h2/w1</property>
      <property value="178.754">fsim/tables/max_climb_ms/h2/w2</property>
      <property value="168.744">fsim/tables/max_climb_ms/h3/w0</property>
      <property value="145.218">fsim/tables/max_climb_ms/h3/w1</property>
      <property value="127.961">fsim/tables/max_climb_ms/h3/w2</property>
      <property value="156.024">fsim/tables/max_climb_ms/h4/w0</property>
      <property value="133.962">fsim/tables/max_climb_ms/h4/w1</property>
      <property value="117.68">fsim/tables/max_climb_ms/h4/w2</property>
      <property value="93.437">fsim/tables/max_climb_ms/h5/w0</property>
      <property value="78.8609">fsim/tables/max_climb_ms/h5/w1</property>
      <property value="66.8354">fsim/tables/max_climb_ms/h5/w2</property>
      <property value="60.6602">fsim/tables/max_climb_ms/h6/w0</property>
      <property value="48.305">fsim/tables/max_climb_ms/h6/w1</property>
      <property value="37.9866">fsim/tables/max_climb_ms/h6/w2</property>
      <property value="31.2007">fsim/tables/max_climb_ms/h7/w0</property>
      <property value="22.149">fsim/tables/max_climb_ms/h7/w1</property>
      <property value="11.1085">fsim/tables/max_climb_ms/h7/w2</property>
      <property value="446.052">fsim/tables/max_tas_ms/h0/w0</property>
      <property value="445.442">fsim/tables/max_tas_ms/h0/w1</property>
      <property value="444.813">fsim/tables/max_tas_ms/h0/w2</property>
      <property value="501.785">fsim/tables/max_tas_ms/h1/w0</property>
      <property value="500.86">fsim/tables/max_tas_ms/h1/w1</property>
      <property value="499.927">fsim/tables/max_tas_ms/h1/w2</property>
      <property value="577.448">fsim/tables/max_tas_ms/h2/w0</property>
      <property value="576.297">fsim/tables/max_tas_ms/h2/w1</property>
      <property value="575.229">fsim/tables/max_tas_ms/h2/w2</property>
      <property value="665.114">fsim/tables/max_tas_ms/h3/w0</property>
      <property value="663.597">fsim/tables/max_tas_ms/h3/w1</property>
      <property value="662.144">fsim/tables/max_tas_ms/h3/w2</property>
      <property value="665.4">fsim/tables/max_tas_ms/h4/w0</property>
      <property value="663.812">fsim/tables/max_tas_ms/h4/w1</property>
      <property value="662.253">fsim/tables/max_tas_ms/h4/w2</property>
      <property value="663.091">fsim/tables/max_tas_ms/h5/w0</property>
      <property value="660.843">fsim/tables/max_tas_ms/h5/w1</property>
      <property value="657.277">fsim/tables/max_tas_ms/h5/w2</property>
      <property value="651.459">fsim/tables/max_tas_ms/h6/w0</property>
      <property value="635.359">fsim/tables/max_tas_ms/h6/w1</property>
      <property value="599.714">fsim/tables/max_tas_ms/h6/w2</property>
      <property value="550.629">fsim/tables/max_tas_ms/h7/w0</property>
      <property value="483.022">fsim/tables/max_tas_ms/h7/w1</property>
      <property value="448.039">fsim/tables/max_tas_ms/h7/w2</property>
      <property value="170.281">fsim/tables/min_tas_ms/h0/w0</property>
      <property value="159.335">fsim/tables/min_tas_ms/h0/w1</property>
      <property value="155.34">fsim/tables/min_tas_ms/h0/w2</property>
      <property value="159.164">fsim/tables/min_tas_ms/h1/w0</property>
      <property value="150.864">fsim/tables/min_tas_ms/h1/w1</property>
      <property value="148.448">fsim/tables/min_tas_ms/h1/w2</property>
      <property value="140.252">fsim/tables/min_tas_ms/h2/w0</property>
      <property value="151.477">fsim/tables/min_tas_ms/h2/w1</property>
      <property value="151.036">fsim/tables/min_tas_ms/h2/w2</property>
      <property value="137.307">fsim/tables/min_tas_ms/h3/w0</property>
      <property value="160.112">fsim/tables/min_tas_ms/h3/w1</property>
      <property value="163.227">fsim/tables/min_tas_ms/h3/w2</property>
      <property value="140.558">fsim/tables/min_tas_ms/h4/w0</property>
      <property value="161.81">fsim/tables/min_tas_ms/h4/w1</property>
      <property value="165.8">fsim/tables/min_tas_ms/h4/w2</property>
      <property value="163.167">fsim/tables/min_tas_ms/h5/w0</property>
      <property value="180.728">fsim/tables/min_tas_ms/h5/w1</property>
      <property value="187.538">fsim/tables/min_tas_ms/h5/w2</property>
      <property value="185.385">fsim/tables/min_tas_ms/h6/w0</property>
      <property value="200.009">fsim/tables/min_tas_ms/h6/w1</property>
      <property value="209.116">fsim/tables/min_tas_ms/h6/w2</property>
      <property value="215.368">fsim/tables/min_tas_ms/h7/w0</property>
      <property value="260.373">fsim/tables/min_tas_ms/h7/w1</property>
      <property value="271.873">fsim/tables/min_tas_ms/h7/w2</property>
      <property value="234.298">fsim/tables/ps_full_ms/h0/w0/v0</property>
      <property value="256.897">fsim/tables/ps_full_ms/h0/w0/v1</property>
      <property value="296.162">fsim/tables/ps_full_ms/h0/w0/v10</property>
      <property value="172.03">fsim/tables/ps_full_ms/h0/w0/v11</property>
      <property value="134.936">fsim/tables/ps_full_ms/h0/w0/v12</property>
      <property value="102.694">fsim/tables/ps_full_ms/h0/w0/v13</property>
      <property value="67.1893">fsim/tables/ps_full_ms/h0/w0/v14</property>
      <property value="30.8575">fsim/tables/ps_full_ms/h0/w0/v15</property>
      <property value="279.077">fsim/tables/ps_full_ms/h0/w0/v2</property>
      <property value="300.893">fsim/tables/ps_full_ms/h0/w0/v3</property>
      <property value="322.629">fsim/tables/ps_full_ms/h0/w0/v4</property>
      <property value="344.382">fsim/tables/ps_full_ms/h0/w0/v5</property>
      <property value="365.852">fsim/tables/ps_full_ms/h0/w0/v6</property>
      <property value="385.292">fsim/tables/ps_full_ms/h0/w0/v7</property>
      <property value="391.823">fsim/tables/ps_full_ms/h0/w0/v8</property>
      <property value="368.137">fsim/tables/ps_full_ms/h0/w0/v9</property>
      <property value="192.78">fsim/tables/ps_full_ms/h0/w1/v0</property>
      <property value="213.736">fsim/tables/ps_full_ms/h0/w1/v1</property>
      <property value="281.702">fsim/tables/ps_full_ms/h0/w1/v10</property>
      <property value="163.39">fsim/tables/ps_full_ms/h0/w1/v11</property>
      <property value="121.788">fsim/tables/ps_full_ms/h0/w1/v12</property>
      <property value="92.7807">fsim/tables/ps_full_ms/h0/w1/v13</property>
      <property value="60.1287">fsim/tables/ps_full_ms/h0/w1/v14</property>
      <property value="27.0533">fsim/tables/ps_full_ms/h0/w1/v15</property>
      <property value="234.199">fsim/tables/ps_full_ms/h0/w1/v2</property>
      <property value="254.233">fsim/tables/ps_full_ms/h0/w1/v3</property>
      <property value="274.126">fsim/tables/ps_full_ms/h0/w1/v4</property>
      <property value="294.059">fsim/tables/ps_full_ms/h0/w1/v5</property>
      <property value="314.013">fsim/tables/ps_full_ms/h0/w1/v6</property>
      <property value="333.26">fsim/tables/ps_full_ms/h0/w1/v7</property>
      <property value="346.857">fsim/tables/ps_full_ms/h0/w1/v8</property>
      <property value="337.81">fsim/tables/ps_full_ms/h0/w1/v9</property>
      <property value="166.899">fsim/tables/ps_full_ms/h0/w2/v0</property>
      <property value="186.054">fsim/tables/ps_full_ms/h0/w2/v1</property>
      <property value="260.629">fsim/tables/ps_full_ms/h0/w2/v10</property>
      <property value="150.563">fsim/tables/ps_full_ms/h0/w2/v11</property>
      <property value="109.512">fsim/tables/ps_full_ms/h0/w2/v12</property>
      <property value="83.5837">fsim/tables/ps_full_ms/h0/w2/v13</property>
      <property value="53.7981">fsim/tables/ps_full_ms/h0/w2/v14</property>
      <property value="24.0324">fsim/tables/ps_full_ms/h0/w2/v15</property>
      <property value="204.645">fsim/tables/ps_full_ms/h0/w2/v2</property>
      <property value="222.854">fsim/tables/ps_full_ms/h0/w2/v3</property>
      <property value="240.925">fsim/tables/ps_full_ms/h0/w2/v4</property>
      <property value="258.991">fsim/tables/ps_full_ms/h0/w2/v5</property>
      <property value="277.118">fsim/tables/ps_full_ms/h0/w2/v6</property>
      <property value="294.898">fsim/tables/ps_full_ms/h0/w2/v7</property>
      <property value="309.798">fsim/tables/ps_full_ms/h0/w2/v8</property>
      <property value="306.736">fsim/tables/ps_full_ms/h0/w2/v9</property>
      <property value="169.149">fsim/tables/ps_full_ms/h1/w0/v0</property>
      <property value="192.047">fsim/tables/ps_full_ms/h1/w0/v1</property>
      <property value="159.391">fsim/tables/ps_full_ms/h1/w0/v10</property>
      <property value="139.467">fsim/tables/ps_full_ms/h1/w0/v11</property>
      <property value="118.598">fsim/tables/ps_full_ms/h1/w0/v12</property>
      <property value="92.6524">fsim/tables/ps_full_ms/h1/w0/v13</property>
      <property value="62.521">fsim/tables/ps_full_ms/h1/w0/v14</property>
      <property value="27.3101">fsim/tables/ps_full_ms/h1/w0/v15</property>
      <property value="214.794">fsim/tables/ps_full_ms/h1/w0/v2</property>
      <property value="237.485">fsim/tables/ps_full_ms/h1/w0/v3</property>
      <property value="260.248">fsim/tables/ps_full_ms/h1/w0/v4</property>
      <property value="283.365">fsim/tables/ps_full_ms/h1/w0/v5</property>
      <property value="303.899">fsim/tables/ps_full_ms/h1/w0/v6</property>
      <property value="301.001">fsim/tables/ps_full_ms/h1/w0/v7</property>
      <property value="242.119">fsim/tables/ps_full_ms/h1/w0/v8</property>
      <property value="176.835">fsim/tables/ps_full_ms/h1/w0/v9</property>
      <property value="140.207">fsim/tables/ps_full_ms/h1/w1/v0</property>
      <property value="160.902">fsim/tables/ps_full_ms/h1/w1/v1</property>
      <property value="141.865">fsim/tables/ps_full_ms/h1/w1/v10</property>
      <property value="123.896">fsim/tables/ps_full_ms/h1/w1/v11</property>
      <property value="105.345">fsim/tables/ps_full_ms/h1/w1/v12</property>
      <property value="82.3664">fsim/tables/ps_full_ms/h1/w1/v13</property>
      <property value="55.4027">fsim/tables/ps_full_ms/h1/w1/v14</property>
      <property value="23.9094">fsim/tables/ps_full_ms/h1/w1/v15</property>
      <property value="181.326">fsim/tables/ps_full_ms/h1/w1/v2</property>
      <property value="201.629">fsim/tables/ps_full_ms/h1/w1/v3</property>
      <property value="222.025">fsim/tables/ps_full_ms/h1/w1/v4</property>
      <property value="242.818">fsim/tables/ps_full_ms/h1/w1/v5</property>
      <property value="263.249">fsim/tables/ps_full_ms/h1/w1/v6</property>
      <property value="270.291">fsim/tables/ps_full_ms/h1/w1/v7</property>
      <property value="227.478">fsim/tables/ps_full_ms/h1/w1/v8</property>
      <property value="157.439">fsim/tables/ps_full_ms/h1/w1/v9</property>
      <property value="121.428">fsim/tables/ps_full_ms/h1/w2/v0</property>
      <property value="140.296">fsim/tables/ps_full_ms/h1/w2/v1</property>
      <property value="126.765">fsim/tables/ps_full_ms/h1/w2/v10</property>
      <property value="110.56">fsim/tables/ps_full_ms/h1/w2/v11</property>
      <property value="93.8923">fsim/tables/ps_full_ms/h1/w2/v12</property>
      <property value="73.4763">fsim/tables/ps_full_ms/h1/w2/v13</property>
      <property value="49.3421">fsim/tables/ps_full_ms/h1/w2/v14</property>
      <property value="21.2218">fsim/tables/ps_full_ms/h1/w2/v15</property>
      <property value="158.725">fsim/tables/ps_full_ms/h1/w2/v2</property>
      <property value="177.023">fsim/tables/ps_full_ms/h1/w2/v3</property>
      <property value="195.446">fsim/tables/ps_full_ms/h1/w2/v4</property>
      <property value="214.319">fsim/tables/ps_full_ms/h1/w2/v5</property>
      <property value="232.961">fsim/tables/ps_full_ms/h1/w2/v6</property>
      <property value="242.483">fsim/tables/ps_full_ms/h1/w2/v7</property>
      <property value="207.907">fsim/tables/ps_full_ms/h1/w2/v8</property>
      <property value="140.547">fsim/tables/ps_full_ms/h1/w2/v9</property>
      <property value="113.787">fsim/tables/ps_full_ms/h2/w0/v0</property>
      <property value="126.212">fsim/tables/ps_full_ms/h2/w0/v1</property>
      <property value="145.402">fsim/tables/ps_full_ms/h2/w0/v10</property>
      <property value="131.919">fsim/tables/ps_full_ms/h2/w0/v11</property>
      <property value="113.803">fsim/tables/ps_full_ms/h2/w0/v12</property>
      <property value="91.3883">fsim/tables/ps_full_ms/h2/w0/v13</property>
      <property value="65.2152">fsim/tables/ps_full_ms/h2/w0/v14</property>
      <property value="31.9078">fsim/tables/ps_full_ms/h2/w0/v15</property>
      <property value="143.945">fsim/tables/ps_full_ms/h2/w0/v2</property>
      <property value="175.409">fsim/tables/ps_full_ms/h2/w0/v3</property>
      <property value="203.007">fsim/tables/ps_full_ms/h2/w0/v4</property>
      <property value="226.37">fsim/tables/ps_full_ms/h2/w0/v5</property>
      <property value="216.67">fsim/tables/ps_full_ms/h2/w0/v6</property>
      <property value="166.857">fsim/tables/ps_full_ms/h2/w0/v7</property>
      <property value="161.481">fsim/tables/ps_full_ms/h2/w0/v8</property>
      <property value="155.055">fsim/tables/ps_full_ms/h2/w0/v9</property>
      <property value="101.651">fsim/tables/ps_full_ms/h2/w1/v0</property>
      <property value="121.365">fsim/tables/ps_full_ms/h2/w1/v1</property>
      <property value="124.831">fsim/tables/ps_full_ms/h2/w1/v10</property>
      <property value="113.342">fsim/tables/ps_full_ms/h2/w1/v11</property>
      <property value="97.6145">fsim/tables/ps_full_ms/h2/w1/v12</property>
      <property value="78.2012">fsim/tables/ps_full_ms/h2/w1/v13</property>
      <property value="55.7264">fsim/tables/ps_full_ms/h2/w1/v14</property>
      <property value="27.8213">fsim/tables/ps_full_ms/h2/w1/v15</property>
      <property value="141.091">fsim/tables/ps_full_ms/h2/w1/v2</property>
      <property value="161.043">fsim/tables/ps_full_ms/h2/w1/v3</property>
      <property value="181.986">fsim/tables/ps_full_ms/h2/w1/v4</property>
      <property value="199.996">fsim/tables/ps_full_ms/h2/w1/v5</property>
      <property value="177.845">fsim/tables/ps_full_ms/h2/w1/v6</property>
      <property value="144.074">fsim/tables/ps_full_ms/h2/w1/v7</property>
      <property value="138.727">fsim/tables/ps_full_ms/h2/w1/v8</property>
      <property value="133.431">fsim/tables/ps_full_ms/h2/w1/v9</property>
      <property value="88.125">fsim/tables/ps_full_ms/h2/w2/v0</property>
      <property value="106.063">fsim/tables/ps_full_ms/h2/w2/v1</property>
      <property value="109.717">fsim/tables/ps_full_ms/h2/w2/v10</property>
      <property value="99.3752">fsim/tables/ps_full_ms/h2/w2/v11</property>
      <property value="85.4957">fsim/tables/ps_full_ms/h2/w2/v12</property>
      <property value="68.4814">fsim/tables/ps_full_ms/h2/w2/v13</property>
      <property value="49.0443">fsim/tables/ps_full_ms/h2/w2/v14</property>
      <property value="24.6964">fsim/tables/ps_full_ms/h2/w2/v15</property>
      <property value="123.73">fsim/tables/ps_full_ms/h2/w2/v2</property>
      <property value="141.683">fsim/tables/ps_full_ms/h2/w2/v3</property>
      <property value="160.654">fsim/tables/ps_full_ms/h2/w2/v4</property>
      <property value="177.633">fsim/tables/ps_full_ms/h2/w2/v5</property>
      <property value="159.1">fsim/tables/ps_full_ms/h2/w2/v6</property>
      <property value="127.227">fsim/tables/ps_full_ms/h2/w2/v7</property>
      <property value="122.454">fsim/tables/ps_full_ms/h2/w2/v8</property>
      <property value="117.472">fsim/tables/ps_full_ms/h2/w2/v9</property>
      <property value="66.8415">fsim/tables/ps_full_ms/h3/w0/v0</property>
      <property value="95.6763">fsim/tables/ps_full_ms/h3/w0/v1</property>
      <property value="131.724">fsim/tables/ps_full_ms/h3/w0/v10</property>
      <property value="123.093">fsim/tables/ps_full_ms/h3/w0/v11</property>
      <property value="110.897">fsim/tables/ps_full_ms/h3/w0/v12</property>
      <property value="95.9808">fsim/tables/ps_full_ms/h3/w0/v13</property>
      <property value="77.9529">fsim/tables/ps_full_ms/h3/w0/v14</property>
      <property value="55.9682">fsim/tables/ps_full_ms/h3/w0/v15</property>
      <property value="104.235">fsim/tables/ps_full_ms/h3/w0/v2</property>
      <property value="142.045">fsim/tables/ps_full_ms/h3/w0/v3</property>
      <property value="166.291">fsim/tables/ps_full_ms/h3/w0/v4</property>
      <property value="147.152">fsim/tables/ps_full_ms/h3/w0/v5</property>
      <property value="138.634">fsim/tables/ps_full_ms/h3/w0/v6</property>
      <property value="141.109">fsim/tables/ps_full_ms/h3/w0/v7</property>
      <property value="140.988">fsim/tables/ps_full_ms/h3/w0/v8</property>
      <property value="138.302">fsim/tables/ps_full_ms/h3/w0/v9</property>
      <property value="74.8394">fsim/tables/ps_full_ms/h3/w1/v0</property>
      <property value="94.0991">fsim/tables/ps_full_ms/h3/w1/v1</property>
      <property value="111.907">fsim/tables/ps_full_ms/h3/w1/v10</property>
      <property value="103.7">fsim/tables/ps_full_ms/h3/w1/v11</property>
      <property value="93.0062">fsim/tables/ps_full_ms/h3/w1/v12</property>
      <property value="79.8878">fsim/tables/ps_full_ms/h3/w1/v13</property>
      <property value="64.318">fsim/tables/ps_full_ms/h3/w1/v14</property>
      <property value="45.6091">fsim/tables/ps_full_ms/h3/w1/v15</property>
      <property value="113.171">fsim/tables/ps_full_ms/h3/w1/v2</property>
      <property value="133.33">fsim/tables/ps_full_ms/h3/w1/v3</property>
      <property value="143.94">fsim/tables/ps_full_ms/h3/w1/v4</property>
      <property value="118.746">fsim/tables/ps_full_ms/h3/w1/v5</property>
      <property value="120.691">fsim/tables/ps_full_ms/h3/w1/v6</property>
      <property value="122.482">fsim/tables/ps_full_ms/h3/w1/v7</property>
      <property value="121.378">fsim/tables/ps_full_ms/h3/w1/v8</property>
      <property value="118.084">fsim/tables/ps_full_ms/h3/w1/v9</property>
      <property value="64.8">fsim/tables/ps_full_ms/h3/w2/v0</property>
      <property value="82.6195">fsim/tables/ps_full_ms/h3/w2/v1</property>
      <property value="97.3587">fsim/tables/ps_full_ms/h3/w2/v10</property>
      <property value="89.8903">fsim/tables/ps_full_ms/h3/w2/v11</property>
      <property value="80.2016">fsim/tables/ps_full_ms/h3/w2/v12</property>
      <property value="68.4229">fsim/tables/ps_full_ms/h3/w2/v13</property>
      <property value="54.4436">fsim/tables/ps_full_ms/h3/w2/v14</property>
      <property value="37.7724">fsim/tables/ps_full_ms/h3/w2/v15</property>
      <property value="99.7603">fsim/tables/ps_full_ms/h3/w2/v2</property>
      <property value="118.129">fsim/tables/ps_full_ms/h3/w2/v3</property>
      <property value="126.104">fsim/tables/ps_full_ms/h3/w2/v4</property>
      <property value="104.082">fsim/tables/ps_full_ms/h3/w2/v5</property>
      <property value="105.506">fsim/tables/ps_full_ms/h3/w2/v6</property>
      <property value="107.001">fsim/tables/ps_full_ms/h3/w2/v7</property>
      <property value="106.206">fsim/tables/ps_full_ms/h3/w2/v8</property>
      <property value="103.041">fsim/tables/ps_full_ms/h3/w2/v9</property>
      <property value="63.6799">fsim/tables/ps_full_ms/h4/w0/v0</property>
      <property value="87.7563">fsim/tables/ps_full_ms/h4/w0/v1</property>
      <property value="121.808">fsim/tables/ps_full_ms/h4/w0/v10</property>
      <property value="113.833">fsim/tables/ps_full_ms/h4/w0/v11</property>
      <property value="102.682">fsim/tables/ps_full_ms/h4/w0/v12</property>
      <property value="88.9563">fsim/tables/ps_full_ms/h4/w0/v13</property>
      <property value="72.8581">fsim/tables/ps_full_ms/h4/w0/v14</property>
      <property value="53.4296">fsim/tables/ps_full_ms/h4/w0/v15</property>
      <property value="98.8436">fsim/tables/ps_full_ms/h4/w0/v2</property>
      <property value="133.224">fsim/tables/ps_full_ms/h4/w0/v3</property>
      <property value="154.789">fsim/tables/ps_full_ms/h4/w0/v4</property>
      <property value="132.236">fsim/tables/ps_full_ms/h4/w0/v5</property>
      <property value="128.042">fsim/tables/ps_full_ms/h4/w0/v6</property>
      <property value="130.77">fsim/tables/ps_full_ms/h4/w0/v7</property>
      <property value="130.369">fsim/tables/ps_full_ms/h4/w0/v8</property>
      <property value="127.953">fsim/tables/ps_full_ms/h4/w0/v9</property>
      <property value="68.0491">fsim/tables/ps_full_ms/h4/w1/v0</property>
      <property value="86.2922">fsim/tables/ps_full_ms/h4/w1/v1</property>
      <property value="103.668">fsim/tables/ps_full_ms/h4/w1/v10</property>
      <property value="96.0599">fsim/tables/ps_full_ms/h4/w1/v11</property>
      <property value="86.2365">fsim/tables/ps_full_ms/h4/w1/v12</property>
      <property value="74.1121">fsim/tables/ps_full_ms/h4/w1/v13</property>
      <property value="60.2345">fsim/tables/ps_full_ms/h4/w1/v14</property>
      <property value="43.6479">fsim/tables/ps_full_ms/h4/w1/v15</property>
      <property value="104.3">fsim/tables/ps_full_ms/h4/w1/v2</property>
      <property value="123.457">fsim/tables/ps_full_ms/h4/w1/v3</property>
      <property value="132.219">fsim/tables/ps_full_ms/h4/w1/v4</property>
      <property value="109.639">fsim/tables/ps_full_ms/h4/w1/v5</property>
      <property value="111.374">fsim/tables/ps_full_ms/h4/w1/v6</property>
      <property value="113.251">fsim/tables/ps_full_ms/h4/w1/v7</property>
      <property value="112.39">fsim/tables/ps_full_ms/h4/w1/v8</property>
      <property value="109.327">fsim/tables/ps_full_ms/h4/w1/v9</property>
      <property value="58.7209">fsim/tables/ps_full_ms/h4/w2/v0</property>
      <property value="75.7392">fsim/tables/ps_full_ms/h4/w2/v1</property>
      <property value="89.9331">fsim/tables/ps_full_ms/h4/w2/v10</property>
      <property value="82.9983">fsim/tables/ps_full_ms/h4/w2/v11</property>
      <property value="74.0997">fsim/tables/ps_full_ms/h4/w2/v12</property>
      <property value="63.2156">fsim/tables/ps_full_ms/h4/w2/v13</property>
      <property value="50.7426">fsim/tables/ps_full_ms/h4/w2/v14</property>
      <property value="35.9729">fsim/tables/ps_full_ms/h4/w2/v15</property>
      <property value="91.9637">fsim/tables/ps_full_ms/h4/w2/v2</property>
      <property value="109.447">fsim/tables/ps_full_ms/h4/w2/v3</property>
      <property value="114.755">fsim/tables/ps_full_ms/h4/w2/v4</property>
      <property value="95.9557">fsim/tables/ps_full_ms/h4/w2/v5</property>
      <property value="97.1497">fsim/tables/ps_full_ms/h4/w2/v6</property>
      <property value="98.3552">fsim/tables/ps_full_ms/h4/w2/v7</property>
      <property value="97.7784">fsim/tables/ps_full_ms/h4/w2/v8</property>
      <property value="95.1475">fsim/tables/ps_full_ms/h4/w2/v9</property>
      <property value="39.1995">fsim/tables/ps_full_ms/h5/w0/v0</property>
      <property value="49.899">fsim/tables/ps_full_ms/h5/w0/v1</property>
      <property value="71.7773">fsim/tables/ps_full_ms/h5/w0/v10</property>
      <property value="66.7594">fsim/tables/ps_full_ms/h5/w0/v11</property>
      <property value="60.2939">fsim/tables/ps_full_ms/h5/w0/v12</property>
      <property value="52.4136">fsim/tables/ps_full_ms/h5/w0/v13</property>
      <property value="42.5925">fsim/tables/ps_full_ms/h5/w0/v14</property>
      <property value="30.7793">fsim/tables/ps_full_ms/h5/w0/v15</property>
      <property value="68.5143">fsim/tables/ps_full_ms/h5/w0/v2</property>
      <property value="85.1068">fsim/tables/ps_full_ms/h5/w0/v3</property>
      <property value="91.9926">fsim/tables/ps_full_ms/h5/w0/v4</property>
      <property value="75.9331">fsim/tables/ps_full_ms/h5/w0/v5</property>
      <property value="77.2922">fsim/tables/ps_full_ms/h5/w0/v6</property>
      <property value="78.4555">fsim/tables/ps_full_ms/h5/w0/v7</property>
      <property value="77.7971">fsim/tables/ps_full_ms/h5/w0/v8</property>
      <property value="75.7088">fsim/tables/ps_full_ms/h5/w0/v9</property>
      <property value="35.4414">fsim/tables/ps_full_ms/h5/w1/v0</property>
      <property value="49.701">fsim/tables/ps_full_ms/h5/w1/v1</property>
      <property value="58.3266">fsim/tables/ps_full_ms/h5/w1/v10</property>
      <property value="53.4763">fsim/tables/ps_full_ms/h5/w1/v11</property>
      <property value="47.6187">fsim/tables/ps_full_ms/h5/w1/v12</property>
      <property value="40.4836">fsim/tables/ps_full_ms/h5/w1/v13</property>
      <property value="32.6094">fsim/tables/ps_full_ms/h5/w1/v14</property>
      <property value="23.3721">fsim/tables/ps_full_ms/h5/w1/v15</property>
      <property value="63.0077">fsim/tables/ps_full_ms/h5/w1/v2</property>
      <property value="76.6488">fsim/tables/ps_full_ms/h5/w1/v3</property>
      <property value="69.2226">fsim/tables/ps_full_ms/h5/w1/v4</property>
      <property value="64.1918">fsim/tables/ps_full_ms/h5/w1/v5</property>
      <property value="64.8153">fsim/tables/ps_full_ms/h5/w1/v6</property>
      <property value="65.328">fsim/tables/ps_full_ms/h5/w1/v7</property>
      <property value="64.5453">fsim/tables/ps_full_ms/h5/w1/v8</property>
      <property value="62.0394">fsim/tables/ps_full_ms/h5/w1/v9</property>
      <property value="28.4971">fsim/tables/ps_full_ms/h5/w2/v0</property>
      <property value="41.584">fsim/tables/ps_full_ms/h5/w2/v1</property>
      <property value="48.142">fsim/tables/ps_full_ms/h5/w2/v10</property>
      <property value="43.6374">fsim/tables/ps_full_ms/h5/w2/v11</property>
      <property value="38.2086">fsim/tables/ps_full_ms/h5/w2/v12</property>
      <property value="31.7485">fsim/tables/ps_full_ms/h5/w2/v13</property>
      <property value="24.5199">fsim/tables/ps_full_ms/h5/w2/v14</property>
      <property value="16.2782">fsim/tables/ps_full_ms/h5/w2/v15</property>
      <property value="54.4122">fsim/tables/ps_full_ms/h5/w2/v2</property>
      <property value="66.201">fsim/tables/ps_full_ms/h5/w2/v3</property>
      <property value="54.9872">fsim/tables/ps_full_ms/h5/w2/v4</property>
      <property value="53.4804">fsim/tables/ps_full_ms/h5/w2/v5</property>
      <property value="54.1558">fsim/tables/ps_full_ms/h5/w2/v6</property>
      <property value="54.4378">fsim/tables/ps_full_ms/h5/w2/v7</property>
      <property value="53.5574">fsim/tables/ps_full_ms/h5/w2/v8</property>
      <property value="51.3918">fsim/tables/ps_full_ms/h5/w2/v9</property>
      <property value="30.4046">fsim/tables/ps_full_ms/h6/w0/v0</property>
      <property value="32.674">fsim/tables/ps_full_ms/h6/w0/v1</property>
      <property value="41.802">fsim/tables/ps_full_ms/h6/w0/v10</property>
      <property value="38.3774">fsim/tables/ps_full_ms/h6/w0/v11</property>
      <property value="33.4483">fsim/tables/ps_full_ms/h6/w0/v12</property>
      <property value="27.4043">fsim/tables/ps_full_ms/h6/w0/v13</property>
      <property value="20.2822">fsim/tables/ps_full_ms/h6/w0/v14</property>
      <property value="12.5383">fsim/tables/ps_full_ms/h6/w0/v15</property>
      <property value="47.64">fsim/tables/ps_full_ms/h6/w0/v2</property>
      <property value="59.2201">fsim/tables/ps_full_ms/h6/w0/v3</property>
      <property value="51.5477">fsim/tables/ps_full_ms/h6/w0/v4</property>
      <property value="47.337">fsim/tables/ps_full_ms/h6/w0/v5</property>
      <property value="47.6562">fsim/tables/ps_full_ms/h6/w0/v6</property>
      <property value="47.9518">fsim/tables/ps_full_ms/h6/w0/v7</property>
      <property value="47.0534">fsim/tables/ps_full_ms/h6/w0/v8</property>
      <property value="45.0074">fsim/tables/ps_full_ms/h6/w0/v9</property>
      <property value="16.7992">fsim/tables/ps_full_ms/h6/w1/v0</property>
      <property value="27.8095">fsim/tables/ps_full_ms/h6/w1/v1</property>
      <property value="30.7603">fsim/tables/ps_full_ms/h6/w1/v10</property>
      <property value="27.8841">fsim/tables/ps_full_ms/h6/w1/v11</property>
      <property value="23.5892">fsim/tables/ps_full_ms/h6/w1/v12</property>
      <property value="19.7238">fsim/tables/ps_full_ms/h6/w1/v13</property>
      <property value="14.3692">fsim/tables/ps_full_ms/h6/w1/v14</property>
      <property value="8.93165">fsim/tables/ps_full_ms/h6/w1/v15</property>
      <property value="40.3436">fsim/tables/ps_full_ms/h6/w1/v2</property>
      <property value="48.2896">fsim/tables/ps_full_ms/h6/w1/v3</property>
      <property value="36.4918">fsim/tables/ps_full_ms/h6/w1/v4</property>
      <property value="36.6206">fsim/tables/ps_full_ms/h6/w1/v5</property>
      <property value="36.5256">fsim/tables/ps_full_ms/h6/w1/v6</property>
      <property value="36.55">fsim/tables/ps_full_ms/h6/w1/v7</property>
      <property value="35.8695">fsim/tables/ps_full_ms/h6/w1/v8</property>
      <property value="33.9558">fsim/tables/ps_full_ms/h6/w1/v9</property>
      <property value="12.0658">fsim/tables/ps_full_ms/h6/w2/v0</property>
      <property value="20.701">fsim/tables/ps_full_ms/h6/w2/v1</property>
      <property value="23.574">fsim/tables/ps_full_ms/h6/w2/v10</property>
      <property value="21.2207">fsim/tables/ps_full_ms/h6/w2/v11</property>
      <property value="18.4762">fsim/tables/ps_full_ms/h6/w2/v12</property>
      <property value="14.5956">fsim/tables/ps_full_ms/h6/w2/v13</property>
      <property value="11.2761">fsim/tables/ps_full_ms/h6/w2/v14</property>
      <property value="6.84954">fsim/tables/ps_full_ms/h6/w2/v15</property>
      <property value="31.3297">fsim/tables/ps_full_ms/h6/w2/v2</property>
      <property value="37.9662">fsim/tables/ps_full_ms/h6/w2/v3</property>
      <property value="28.4554">fsim/tables/ps_full_ms/h6/w2/v4</property>
      <property value="27.769">fsim/tables/ps_full_ms/h6/w2/v5</property>
      <property value="27.2038">fsim/tables/ps_full_ms/h6/w2/v6</property>
      <property value="27.3383">fsim/tables/ps_full_ms/h6/w2/v7</property>
      <property value="26.4783">fsim/tables/ps_full_ms/h6/w2/v8</property>
      <property value="25.5318">fsim/tables/ps_full_ms/h6/w2/v9</property>
      <property value="4.79918">fsim/tables/ps_full_ms/h7/w0/v0</property>
      <property value="15.8911">fsim/tables/ps_full_ms/h7/w0/v1</property>
      <property value="17.7589">fsim/tables/ps_full_ms/h7/w0/v10</property>
      <property value="15.961">fsim/tables/ps_full_ms/h7/w0/v11</property>
      <property value="13.1996">fsim/tables/ps_full_ms/h7/w0/v12</property>
      <property value="11.3395">fsim/tables/ps_full_ms/h7/w0/v13</property>
      <property value="8.87545">fsim/tables/ps_full_ms/h7/w0/v14</property>
      <property value="5.4552">fsim/tables/ps_full_ms/h7/w0/v15</property>
      <property value="24.1211">fsim/tables/ps_full_ms/h7/w0/v2</property>
      <property value="30.8434">fsim/tables/ps_full_ms/h7/w0/v3</property>
      <property value="27.2552">fsim/tables/ps_full_ms/h7/w0/v4</property>
      <property value="21.1561">fsim/tables/ps_full_ms/h7/w0/v5</property>
      <property value="20.8487">fsim/tables/ps_full_ms/h7/w0/v6</property>
      <property value="20.2273">fsim/tables/ps_full_ms/h7/w0/v7</property>
      <property value="19.8593">fsim/tables/ps_full_ms/h7/w0/v8</property>
      <property value="18.9661">fsim/tables/ps_full_ms/h7/w0/v9</property>
      <property value="17.1412">fsim/tables/ps_full_ms/h7/w1/v0</property>
      <property value="19.2537">fsim/tables/ps_full_ms/h7/w1/v1</property>
      <property value="9.54581">fsim/tables/ps_full_ms/h7/w1/v10</property>
      <property value="8.65492">fsim/tables/ps_full_ms/h7/w1/v11</property>
      <property value="8.0232">fsim/tables/ps_full_ms/h7/w1/v12</property>
      <property value="7.05861">fsim/tables/ps_full_ms/h7/w1/v13</property>
      <property value="5.71812">fsim/tables/ps_full_ms/h7/w1/v14</property>
      <property value="3.84841">fsim/tables/ps_full_ms/h7/w1/v15</property>
      <property value="21.3663">fsim/tables/ps_full_ms/h7/w1/v2</property>
      <property value="19.1514">fsim/tables/ps_full_ms/h7/w1/v3</property>
      <property value="14.3894">fsim/tables/ps_full_ms/h7/w1/v4</property>
      <property value="13.0185">fsim/tables/ps_full_ms/h7/w1/v5</property>
      <property value="11.9842">fsim/tables/ps_full_ms/h7/w1/v6</property>
      <property value="10.6474">fsim/tables/ps_full_ms/h7/w1/v7</property>
      <property value="10.5911">fsim/tables/ps_full_ms/h7/w1/v8</property>
      <property value="10.2813">fsim/tables/ps_full_ms/h7/w1/v9</property>
      <property value="11.1085">fsim/tables/ps_full_ms/h7/w2/v0</property>
      <property value="10.6658">fsim/tables/ps_full_ms/h7/w2/v1</property>
      <property value="1.96148">fsim/tables/ps_full_ms/h7/w2/v10</property>
      <property value="1.6524">fsim/tables/ps_full_ms/h7/w2/v11</property>
      <property value="2.63279">fsim/tables/ps_full_ms/h7/w2/v12</property>
      <property value="2.88192">fsim/tables/ps_full_ms/h7/w2/v13</property>
      <property value="1.99217">fsim/tables/ps_full_ms/h7/w2/v14</property>
      <property value="1.10241">fsim/tables/ps_full_ms/h7/w2/v15</property>
      <property value="10.2231">fsim/tables/ps_full_ms/h7/w2/v2</property>
      <property value="9.61089">fsim/tables/ps_full_ms/h7/w2/v3</property>
      <property value="8.15418">fsim/tables/ps_full_ms/h7/w2/v4</property>
      <property value="6.69746">fsim/tables/ps_full_ms/h7/w2/v5</property>
      <property value="5.40829">fsim/tables/ps_full_ms/h7/w2/v6</property>
      <property value="4.24057">fsim/tables/ps_full_ms/h7/w2/v7</property>
      <property value="3.07284">fsim/tables/ps_full_ms/h7/w2/v8</property>
      <property value="2.35681">fsim/tables/ps_full_ms/h7/w2/v9</property>
      <property value="-21.7297">fsim/tables/ps_idle_ms/h0/w0/v0</property>
      <property value="-28.0368">fsim/tables/ps_idle_ms/h0/w0/v1</property>
      <property value="-333.436">fsim/tables/ps_idle_ms/h0/w0/v10</property>
      <property value="-459.86">fsim/tables/ps_idle_ms/h0/w0/v11</property>
      <property value="-562.956">fsim/tables/ps_idle_ms/h0/w0/v12</property>
      <property value="-635.065">fsim/tables/ps_idle_ms/h0/w0/v13</property>
      <property value="-670.231">fsim/tables/ps_idle_ms/h0/w0/v14</property>
      <property value="-703.379">fsim/tables/ps_idle_ms/h0/w0/v15</property>
      <property value="-35.9964">fsim/tables/ps_idle_ms/h0/w0/v2</property>
      <property value="-45.4131">fsim/tables/ps_idle_ms/h0/w0/v3</property>
      <property value="-56.2379">fsim/tables/ps_idle_ms/h0/w0/v4</property>
      <property value="-68.5474">fsim/tables/ps_idle_ms/h0/w0/v5</property>
      <property value="-83.0015">fsim/tables/ps_idle_ms/h0/w0/v6</property>
      <property value="-99.5478">fsim/tables/ps_idle_ms/h0/w0/v7</property>
      <property value="-120.024">fsim/tables/ps_idle_ms/h0/w0/v8</property>
      <property value="-177.196">fsim/tables/ps_idle_ms/h0/w0/v9</property>
      <property value="-17.2691">fsim/tables/ps_idle_ms/h0/w1/v0</property>
      <property value="-22.3327">fsim/tables/ps_idle_ms/h0/w1/v1</property>
      <property value="-257.278">fsim/tables/ps_idle_ms/h0/w1/v10</property>
      <property value="-388.211">fsim/tables/ps_idle_ms/h0/w1/v11</property>
      <property value="-485.399">fsim/tables/ps_idle_ms/h0/w1/v12</property>
      <property value="-561.92">fsim/tables/ps_idle_ms/h0/w1/v13</property>
      <property value="-599.229">fsim/tables/ps_idle_ms/h0/w1/v14</property>
      <property value="-630.349">fsim/tables/ps_idle_ms/h0/w1/v15</property>
      <property value="-28.6195">fsim/tables/ps_idle_ms/h0/w1/v2</property>
      <property value="-36.398">fsim/tables/ps_idle_ms/h0/w1/v3</property>
      <property value="-45.7305">fsim/tables/ps_idle_ms/h0/w1/v4</property>
      <property value="-56.428">fsim/tables/ps_idle_ms/h0/w1/v5</property>
      <property value="-68.5874">fsim/tables/ps_idle_ms/h0/w1/v6</property>
      <property value="-82.7807">fsim/tables/ps_idle_ms/h0/w1/v7</property>
      <property value="-99.8287">fsim/tables/ps_idle_ms/h0/w1/v8</property>
      <property value="-132.882">fsim/tables/ps_idle_ms/h0/w1/v9</property>
      <property value="-15.6924">fsim/tables/ps_idle_ms/h0/w2/v0</property>
      <property value="-19.8764">fsim/tables/ps_idle_ms/h0/w2/v1</property>
      <property value="-212.859">fsim/tables/ps_idle_ms/h0/w2/v10</property>
      <property value="-340.634">fsim/tables/ps_idle_ms/h0/w2/v11</property>
      <property value="-429.843">fsim/tables/ps_idle_ms/h0/w2/v12</property>
      <property value="-500.629">fsim/tables/ps_idle_ms/h0/w2/v13</property>
      <property value="-542.035">fsim/tables/ps_idle_ms/h0/w2/v14</property>
      <property value="-570.776">fsim/tables/ps_idle_ms/h0/w2/v15</property>
      <property value="-25.389">fsim/tables/ps_idle_ms/h0/w2/v2</property>
      <property value="-31.9104">fsim/tables/ps_idle_ms/h0/w2/v3</property>
      <property value="-40.0889">fsim/tables/ps_idle_ms/h0/w2/v4</property>
      <property value="-49.6219">fsim/tables/ps_idle_ms/h0/w2/v5</property>
      <property value="-60.4579">fsim/tables/ps_idle_ms/h0/w2/v6</property>
      <property value="-72.7454">fsim/tables/ps_idle_ms/h0/w2/v7</property>
      <property value="-87.579">fsim/tables/ps_idle_ms/h0/w2/v8</property>
      <property value="-112.249">fsim/tables/ps_idle_ms/h0/w2/v9</property>
      <property value="-16.256">fsim/tables/ps_idle_ms/h1/w0/v0</property>
      <property value="-20.8249">fsim/tables/ps_idle_ms/h1/w0/v1</property>
      <property value="-382.35">fsim/tables/ps_idle_ms/h1/w0/v10</property>
      <property value="-449.309">fsim/tables/ps_idle_ms/h1/w0/v11</property>
      <property value="-521.967">fsim/tables/ps_idle_ms/h1/w0/v12</property>
      <property value="-601.059">fsim/tables/ps_idle_ms/h1/w0/v13</property>
      <property value="-659.875">fsim/tables/ps_idle_ms/h1/w0/v14</property>
      <property value="-694.854">fsim/tables/ps_idle_ms/h1/w0/v15</property>
      <property value="-27.0172">fsim/tables/ps_idle_ms/h1/w0/v2</property>
      <property value="-34.6111">fsim/tables/ps_idle_ms/h1/w0/v3</property>
      <property value="-44.314">fsim/tables/ps_idle_ms/h1/w0/v4</property>
      <property value="-55.7098">fsim/tables/ps_idle_ms/h1/w0/v5</property>
      <property value="-69.3102">fsim/tables/ps_idle_ms/h1/w0/v6</property>
      <property value="-99.1848">fsim/tables/ps_idle_ms/h1/w0/v7</property>
      <property value="-220.132">fsim/tables/ps_idle_ms/h1/w0/v8</property>
      <property value="-317.171">fsim/tables/ps_idle_ms/h1/w0/v9</property>
      <property value="-14.9328">fsim/tables/ps_idle_ms/h1/w1/v0</property>
      <property value="-18.1737">fsim/tables/ps_idle_ms/h1/w1/v1</property>
      <property value="-328.155">fsim/tables/ps_idle_ms/h1/w1/v10</property>
      <property value="-387.677">fsim/tables/ps_idle_ms/h1/w1/v11</property>
      <property value="-452.245">fsim/tables/ps_idle_ms/h1/w1/v12</property>
      <property value="-522.957">fsim/tables/ps_idle_ms/h1/w1/v13</property>
      <property value="-587.107">fsim/tables/ps_idle_ms/h1/w1/v14</property>
      <property value="-619.412">fsim/tables/ps_idle_ms/h1/w1/v15</property>
      <property value="-23.0591">fsim/tables/ps_idle_ms/h1/w1/v2</property>
      <property value="-29.5459">fsim/tables/ps_idle_ms/h1/w1/v3</property>
      <property value="-37.3265">fsim/tables/ps_idle_ms/h1/w1/v4</property>
      <property value="-47.2403">fsim/tables/ps_idle_ms/h1/w1/v5</property>
      <property value="-58.9355">fsim/tables/ps_idle_ms/h1/w1/v6</property>
      <property value="-76.9475">fsim/tables/ps_idle_ms/h1/w1/v7</property>
      <property value="-168.897">fsim/tables/ps_idle_ms/h1/w1/v8</property>
      <property value="-269.199">fsim/tables/ps_idle_ms/h1/w1/v9</property>
      <property value="-14.9155">fsim/tables/ps_idle_ms/h1/w2/v0</property>
      <property value="-17.4866">fsim/tables/ps_idle_ms/h1/w2/v1</property>
      <property value="-290.27">fsim/tables/ps_idle_ms/h1/w2/v10</property>
      <property value="-343.377">fsim/tables/ps_idle_ms/h1/w2/v11</property>
      <property value="-400.88">fsim/tables/ps_idle_ms/h1/w2/v12</property>
      <property value="-464.056">fsim/tables/ps_idle_ms/h1/w2/v13</property>
      <property value="-528.47">fsim/tables/ps_idle_ms/h1/w2/v14</property>
      <property value="-558.403">fsim/tables/ps_idle_ms/h1/w2/v15</property>
      <property value="-21.5228">fsim/tables/ps_idle_ms/h1/w2/v2</property>
      <property value="-26.9517">fsim/tables/ps_idle_ms/h1/w2/v3</property>
      <property value="-33.8982">fsim/tables/ps_idle_ms/h1/w2/v4</property>
      <property value="-42.3078">fsim/tables/ps_idle_ms/h1/w2/v5</property>
      <property value="-52.72">fsim/tables/ps_idle_ms/h1/w2/v6</property>
      <property value="-67.3939">fsim/tables/ps_idle_ms/h1/w2/v7</property>
      <property value="-141.686">fsim/tables/ps_idle_ms/h1/w2/v8</property>
      <property value="-237.852">fsim/tables/ps_idle_ms/h1/w2/v9</property>
      <property value="-16.1631">fsim/tables/ps_idle_ms/h2/w0/v0</property>
      <property value="-17.4203">fsim/tables/ps_idle_ms/h2/w0/v1</property>
      <property value="-338.342">fsim/tables/ps_idle_ms/h2/w0/v10</property>
      <property value="-404.216">fsim/tables/ps_idle_ms/h2/w0/v11</property>
      <property value="-478.745">fsim/tables/ps_idle_ms/h2/w0/v12</property>
      <property value="-561.587">fsim/tables/ps_idle_ms/h2/w0/v13</property>
      <property value="-652.066">fsim/tables/ps_idle_ms/h2/w0/v14</property>
      <property value="-696.769">fsim/tables/ps_idle_ms/h2/w0/v15</property>
      <property value="-21.0869">fsim/tables/ps_idle_ms/h2/w0/v2</property>
      <property value="-26.8527">fsim/tables/ps_idle_ms/h2/w0/v3</property>
      <property value="-34.7586">fsim/tables/ps_idle_ms/h2/w0/v4</property>
      <property value="-45.1311">fsim/tables/ps_idle_ms/h2/w0/v5</property>
      <property value="-87.9052">fsim/tables/ps_idle_ms/h2/w0/v6</property>
      <property value="-181.149">fsim/tables/ps_idle_ms/h2/w0/v7</property>
      <property value="-228.638">fsim/tables/ps_idle_ms/h2/w0/v8</property>
      <property value="-280.548">fsim/tables/ps_idle_ms/h2/w0/v9</property>
      <property value="-17.3007">fsim/tables/ps_idle_ms/h2/w1/v0</property>
      <property value="-18.6338">fsim/tables/ps_idle_ms/h2/w1/v1</property>
      <property value="-305.486">fsim/tables/ps_idle_ms/h2/w1/v10</property>
      <property value="-361.924">fsim/tables/ps_idle_ms/h2/w1/v11</property>
      <property value="-425.71">fsim/tables/ps_idle_ms/h2/w1/v12</property>
      <property value="-496.591">fsim/tables/ps_idle_ms/h2/w1/v13</property>
      <property value="-574.633">fsim/tables/ps_idle_ms/h2/w1/v14</property>
      <property value="-618.679">fsim/tables/ps_idle_ms/h2/w1/v15</property>
      <property value="-22.0617">fsim/tables/ps_idle_ms/h2/w1/v2</property>
      <property value="-27.3417">fsim/tables/ps_idle_ms/h2/w1/v3</property>
      <property value="-34.4659">fsim/tables/ps_idle_ms/h2/w1/v4</property>
      <property value="-44.3678">fsim/tables/ps_idle_ms/h2/w1/v5</property>
      <property value="-101.014">fsim/tables/ps_idle_ms/h2/w1/v6</property>
      <property value="-168.914">fsim/tables/ps_idle_ms/h2/w1/v7</property>
      <property value="-210.24">fsim/tables/ps_idle_ms/h2/w1/v8</property>
      <property value="-255.365">fsim/tables/ps_idle_ms/h2/w1/v9</property>
      <property value="-18.6168">fsim/tables/ps_idle_ms/h2/w2/v0</property>
      <property value="-18.9668">fsim/tables/ps_idle_ms/h2/w2/v1</property>
      <property value="-273.247">fsim/tables/ps_idle_ms/h2/w2/v10</property>
      <property value="-323.436">fsim/tables/ps_idle_ms/h2/w2/v11</property>
      <property value="-380.188">fsim/tables/ps_idle_ms/h2/w2/v12</property>
      <property value="-443.071">fsim/tables/ps_idle_ms/h2/w2/v13</property>
      <property value="-512.505">fsim/tables/ps_idle_ms/h2/w2/v14</property>
      <property value="-556.75">fsim/tables/ps_idle_ms/h2/w2/v15</property>
      <property value="-21.6442">fsim/tables/ps_idle_ms/h2/w2/v2</property>
      <property value="-26.084">fsim/tables/ps_idle_ms/h2/w2/v3</property>
      <property value="-32.1467">fsim/tables/ps_idle_ms/h2/w2/v4</property>
      <property value="-40.9548">fsim/tables/ps_idle_ms/h2/w2/v5</property>
      <property value="-88.4754">fsim/tables/ps_idle_ms/h2/w2/v6</property>
      <property value="-151.229">fsim/tables/ps_idle_ms/h2/w2/v7</property>
      <property value="-188.188">fsim/tables/ps_idle_ms/h2/w2/v8</property>
      <property value="-228.505">fsim/tables/ps_idle_ms/h2/w2/v9</property>
      <property value="-23.9306">fsim/tables/ps_idle_ms/h3/w0/v0</property>
      <property value="-20.2667">fsim/tables/ps_idle_ms/h3/w0/v1</property>
      <property value="-323.788">fsim/tables/ps_idle_ms/h3/w0/v10</property>
      <property value="-390.558">fsim/tables/ps_idle_ms/h3/w0/v11</property>
      <property value="-465.408">fsim/tables/ps_idle_ms/h3/w0/v12</property>
      <property value="-548.668">fsim/tables/ps_idle_ms/h3/w0/v13</property>
      <property value="-640.917">fsim/tables/ps_idle_ms/h3/w0/v14</property>
      <property value="-707.653">fsim/tables/ps_idle_ms/h3/w0/v15</property>
      <property value="-21.8132">fsim/tables/ps_idle_ms/h3/w0/v2</property>
      <property value="-26.0888">fsim/tables/ps_idle_ms/h3/w0/v3</property>
      <property value="-33.6121">fsim/tables/ps_idle_ms/h3/w0/v4</property>
      <property value="-89.2717">fsim/tables/ps_idle_ms/h3/w0/v5</property>
      <property value="-130.735">fsim/tables/ps_idle_ms/h3/w0/v6</property>
      <property value="-169.255">fsim/tables/ps_idle_ms/h3/w0/v7</property>
      <property value="-213.278">fsim/tables/ps_idle_ms/h3/w0/v8</property>
      <property value="-264.689">fsim/tables/ps_idle_ms/h3/w0/v9</property>
      <property value="-22.9868">fsim/tables/ps_idle_ms/h3/w1/v0</property>
      <property value="-21.6518">fsim/tables/ps_idle_ms/h3/w1/v1</property>
      <property value="-298.595">fsim/tables/ps_idle_ms/h3/w1/v10</property>
      <property value="-355.942">fsim/tables/ps_idle_ms/h3/w1/v11</property>
      <property value="-419.708">fsim/tables/ps_idle_ms/h3/w1/v12</property>
      <property value="-490.292">fsim/tables/ps_idle_ms/h3/w1/v13</property>
      <property value="-568.211">fsim/tables/ps_idle_ms/h3/w1/v14</property>
      <property value="-628.666">fsim/tables/ps_idle_ms/h3/w1/v15</property>
      <property value="-23.7816">fsim/tables/ps_idle_ms/h3/w1/v2</property>
      <property value="-28.3277">fsim/tables/ps_idle_ms/h3/w1/v3</property>
      <property value="-43.8663">fsim/tables/ps_idle_ms/h3/w1/v4</property>
      <property value="-100.203">fsim/tables/ps_idle_ms/h3/w1/v5</property>
      <property value="-130.158">fsim/tables/ps_idle_ms/h3/w1/v6</property>
      <property value="-163.535">fsim/tables/ps_idle_ms/h3/w1/v7</property>
      <property value="-202.4">fsim/tables/ps_idle_ms/h3/w1/v8</property>
      <property value="-247.476">fsim/tables/ps_idle_ms/h3/w1/v9</property>
      <property value="-25.094">fsim/tables/ps_idle_ms/h3/w2/v0</property>
      <property value="-22.8308">fsim/tables/ps_idle_ms/h3/w2/v1</property>
      <property value="-269.219">fsim/tables/ps_idle_ms/h3/w2/v10</property>
      <property value="-320.136">fsim/tables/ps_idle_ms/h3/w2/v11</property>
      <property value="-376.659">fsim/tables/ps_idle_ms/h3/w2/v12</property>
      <property value="-439.181">fsim/tables/ps_idle_ms/h3/w2/v13</property>
      <property value="-508.201">fsim/tables/ps_idle_ms/h3/w2/v14</property>
      <property value="-565.689">fsim/tables/ps_idle_ms/h3/w2/v15</property>
      <property value="-24.2607">fsim/tables/ps_idle_ms/h3/w2/v2</property>
      <property value="-27.9008">fsim/tables/ps_idle_ms/h3/w2/v3</property>
      <property value="-43.5497">fsim/tables/ps_idle_ms/h3/w2/v4</property>
      <property value="-92.6794">fsim/tables/ps_idle_ms/h3/w2/v5</property>
      <property value="-119.709">fsim/tables/ps_idle_ms/h3/w2/v6</property>
      <property value="-149.598">fsim/tables/ps_idle_ms/h3/w2/v7</property>
      <property value="-183.713">fsim/tables/ps_idle_ms/h3/w2/v8</property>
      <property value="-223.748">fsim/tables/ps_idle_ms/h3/w2/v9</property>
      <property value="-25.3728">fsim/tables/ps_idle_ms/h4/w0/v0</property>
      <property value="-21.1999">fsim/tables/ps_idle_ms/h4/w0/v1</property>
      <property value="-303.774">fsim/tables/ps_idle_ms/h4/w0/v10</property>
      <property value="-365.653">fsim/tables/ps_idle_ms/h4/w0/v11</property>
      <property value="-434.959">fsim/tables/ps_idle_ms/h4/w0/v12</property>
      <property value="-511.975">fsim/tables/ps_idle_ms/h4/w0/v13</property>
      <property value="-597.187">fsim/tables/ps_idle_ms/h4/w0/v14</property>
      <property value="-662.185">fsim/tables/ps_idle_ms/h4/w0/v15</property>
      <property value="-22.234">fsim/tables/ps_idle_ms/h4/w0/v2</property>
      <property value="-26.093">fsim/tables/ps_idle_ms/h4/w0/v3</property>
      <property value="-33.2173">fsim/tables/ps_idle_ms/h4/w0/v4</property>
      <property value="-89.2363">fsim/tables/ps_idle_ms/h4/w0/v5</property>
      <property value="-124.662">fsim/tables/ps_idle_ms/h4/w0/v6</property>
      <property value="-160.09">fsim/tables/ps_idle_ms/h4/w0/v7</property>
      <property value="-201.119">fsim/tables/ps_idle_ms/h4/w0/v8</property>
      <property value="-248.93">fsim/tables/ps_idle_ms/h4/w0/v9</property>
      <property value="-24.4871">fsim/tables/ps_idle_ms/h4/w1/v0</property>
      <property value="-22.4723">fsim/tables/ps_idle_ms/h4/w1/v1</property>
      <property value="-279.391">fsim/tables/ps_idle_ms/h4/w1/v10</property>
      <property value="-332.609">fsim/tables/ps_idle_ms/h4/w1/v11</property>
      <property value="-391.75">fsim/tables/ps_idle_ms/h4/w1/v12</property>
      <property value="-457.176">fsim/tables/ps_idle_ms/h4/w1/v13</property>
      <property value="-529.313">fsim/tables/ps_idle_ms/h4/w1/v14</property>
      <property value="-588.061">fsim/tables/ps_idle_ms/h4/w1/v15</property>
      <property value="-24.1089">fsim/tables/ps_idle_ms/h4/w1/v2</property>
      <property value="-28.0063">fsim/tables/ps_idle_ms/h4/w1/v3</property>
      <property value="-43.8658">fsim/tables/ps_idle_ms/h4/w1/v4</property>
      <property value="-95.1587">fsim/tables/ps_idle_ms/h4/w1/v5</property>
      <property value="-123.216">fsim/tables/ps_idle_ms/h4/w1/v6</property>
      <property value="-154.243">fsim/tables/ps_idle_ms/h4/w1/v7</property>
      <property value="-190.024">fsim/tables/ps_idle_ms/h4/w1/v8</property>
      <property value="-231.92">fsim/tables/ps_idle_ms/h4/w1/v9</property>
      <property value="-26.6911">fsim/tables/ps_idle_ms/h4/w2/v0</property>
      <property value="-23.7491">fsim/tables/ps_idle_ms/h4/w2/v1</property>
      <property value="-252.401">fsim/tables/ps_idle_ms/h4/w2/v10</property>
      <property value="-299.581">fsim/tables/ps_idle_ms/h4/w2/v11</property>
      <property value="-351.932">fsim/tables/ps_idle_ms/h4/w2/v12</property>
      <property value="-409.78">fsim/tables/ps_idle_ms/h4/w2/v13</property>
      <property value="-473.566">fsim/tables/ps_idle_ms/h4/w2/v14</property>
      <property value="-528.875">fsim/tables/ps_idle_ms/h4/w2/v15</property>
      <property value="-24.6933">fsim/tables/ps_idle_ms/h4/w2/v2</property>
      <property value="-28.0058">fsim/tables/ps_idle_ms/h4/w2/v3</property>
      <property value="-44.3484">fsim/tables/ps_idle_ms/h4/w2/v4</property>
      <property value="-88.6315">fsim/tables/ps_idle_ms/h4/w2/v5</property>
      <property value="-113.873">fsim/tables/ps_idle_ms/h4/w2/v6</property>
      <property value="-141.759">fsim/tables/ps_idle_ms/h4/w2/v7</property>
      <property value="-173.657">fsim/tables/ps_idle_ms/h4/w2/v8</property>
      <property value="-210.543">fsim/tables/ps_idle_ms/h4/w2/v9</property>
      <property value="-34.9487">fsim/tables/ps_idle_ms/h5/w0/v0</property>
      <property value="-28.0663">fsim/tables/ps_idle_ms/h5/w0/v1</property>
      <property value="-211.283">fsim/tables/ps_idle_ms/h5/w0/v10</property>
      <property value="-249.905">fsim/tables/ps_idle_ms/h5/w0/v11</property>
      <property value="-292.545">fsim/tables/ps_idle_ms/h5/w0/v12</property>
      <property value="-339.497">fsim/tables/ps_idle_ms/h5/w0/v13</property>
      <property value="-391.353">fsim/tables/ps_idle_ms/h5/w0/v14</property>
      <property value="-441.139">fsim/tables/ps_idle_ms/h5/w0/v15</property>
      <property value="-26.4751">fsim/tables/ps_idle_ms/h5/w0/v2</property>
      <property value="-27.989">fsim/tables/ps_idle_ms/h5/w0/v3</property>
      <property value="-39.2506">fsim/tables/ps_idle_ms/h5/w0/v4</property>
      <property value="-75.8983">fsim/tables/ps_idle_ms/h5/w0/v5</property>
      <property value="-96.5577">fsim/tables/ps_idle_ms/h5/w0/v6</property>
      <property value="-119.384">fsim/tables/ps_idle_ms/h5/w0/v7</property>
      <property value="-145.982">fsim/tables/ps_idle_ms/h5/w0/v8</property>
      <property value="-176.624">fsim/tables/ps_idle_ms/h5/w0/v9</property>
      <property value="-34.9618">fsim/tables/ps_idle_ms/h5/w1/v0</property>
      <property value="-29.3123">fsim/tables/ps_idle_ms/h5/w1/v1</property>
      <property value="-194.7">fsim/tables/ps_idle_ms/h5/w1/v10</property>
      <property value="-228.122">fsim/tables/ps_idle_ms/h5/w1/v11</property>
      <property value="-264.696">fsim/tables/ps_idle_ms/h5/w1/v12</property>
      <property value="-304.817">fsim/tables/ps_idle_ms/h5/w1/v13</property>
      <property value="-348.646">fsim/tables/ps_idle_ms/h5/w1/v14</property>
      <property value="-391.908">fsim/tables/ps_idle_ms/h5/w1/v15</property>
      <property value="-28.1174">fsim/tables/ps_idle_ms/h5/w1/v2</property>
      <property value="-29.9555">fsim/tables/ps_idle_ms/h5/w1/v3</property>
      <property value="-53.4408">fsim/tables/ps_idle_ms/h5/w1/v4</property>
      <property value="-76.4208">fsim/tables/ps_idle_ms/h5/w1/v5</property>
      <property value="-94.7677">fsim/tables/ps_idle_ms/h5/w1/v6</property>
      <property value="-114.783">fsim/tables/ps_idle_ms/h5/w1/v7</property>
      <property value="-137.774">fsim/tables/ps_idle_ms/h5/w1/v8</property>
      <property value="-164.637">fsim/tables/ps_idle_ms/h5/w1/v9</property>
      <property value="-37.5186">fsim/tables/ps_idle_ms/h5/w2/v0</property>
      <property value="-31.442">fsim/tables/ps_idle_ms/h5/w2/v1</property>
      <property value="-178.212">fsim/tables/ps_idle_ms/h5/w2/v10</property>
      <property value="-207.184">fsim/tables/ps_idle_ms/h5/w2/v11</property>
      <property value="-239.285">fsim/tables/ps_idle_ms/h5/w2/v12</property>
      <property value="-274.403">fsim/tables/ps_idle_ms/h5/w2/v13</property>
      <property value="-312.789">fsim/tables/ps_idle_ms/h5/w2/v14</property>
      <property value="-352.425">fsim/tables/ps_idle_ms/h5/w2/v15</property>
      <property value="-29.7248">fsim/tables/ps_idle_ms/h5/w2/v2</property>
      <property value="-31.0199">fsim/tables/ps_idle_ms/h5/w2/v3</property>
      <property value="-56.9784">fsim/tables/ps_idle_ms/h5/w2/v4</property>
      <property value="-74.1402">fsim/tables/ps_idle_ms/h5/w2/v5</property>
      <property value="-90.1887">fsim/tables/ps_idle_ms/h5/w2/v6</property>
      <property value="-108.205">fsim/tables/ps_idle_ms/h5/w2/v7</property>
      <property value="-128.592">fsim/tables/ps_idle_ms/h5/w2/v8</property>
      <property value="-152.175">fsim/tables/ps_idle_ms/h5/w2/v9</property>
      <property value="-40.7576">fsim/tables/ps_idle_ms/h6/w0/v0</property>
      <property value="-33.9177">fsim/tables/ps_idle_ms/h6/w0/v1</property>
      <property value="-168.032">fsim/tables/ps_idle_ms/h6/w0/v10</property>
      <property value="-194.579">fsim/tables/ps_idle_ms/h6/w0/v11</property>
      <property value="-223.714">fsim/tables/ps_idle_ms/h6/w0/v12</property>
      <property value="-255.698">fsim/tables/ps_idle_ms/h6/w0/v13</property>
      <property value="-291.268">fsim/tables/ps_idle_ms/h6/w0/v14</property>
      <property value="-329.414">fsim/tables/ps_idle_ms/h6/w0/v15</property>
      <property value="-30.9441">fsim/tables/ps_idle_ms/h6/w0/v2</property>
      <property value="-31.4955">fsim/tables/ps_idle_ms/h6/w0/v3</property>
      <property value="-52.3909">fsim/tables/ps_idle_ms/h6/w0/v4</property>
      <property value="-70.9156">fsim/tables/ps_idle_ms/h6/w0/v5</property>
      <property value="-86.2351">fsim/tables/ps_idle_ms/h6/w0/v6</property>
      <property value="-102.651">fsim/tables/ps_idle_ms/h6/w0/v7</property>
      <property value="-121.687">fsim/tables/ps_idle_ms/h6/w0/v8</property>
      <property value="-143.556">fsim/tables/ps_idle_ms/h6/w0/v9</property>
      <property value="-42.8942">fsim/tables/ps_idle_ms/h6/w1/v0</property>
      <property value="-36.0177">fsim/tables/ps_idle_ms/h6/w1/v1</property>
      <property value="-150.412">fsim/tables/ps_idle_ms/h6/w1/v10</property>
      <property value="-172.058">fsim/tables/ps_idle_ms/h6/w1/v11</property>
      <property value="-195.847">fsim/tables/ps_idle_ms/h6/w1/v12</property>
      <property value="-220.842">fsim/tables/ps_idle_ms/h6/w1/v13</property>
      <property value="-248.715">fsim/tables/ps_idle_ms/h6/w1/v14</property>
      <property value="-279.379">fsim/tables/ps_idle_ms/h6/w1/v15</property>
      <property value="-33.055">fsim/tables/ps_idle_ms/h6/w1/v2</property>
      <property value="-34.8288">fsim/tables/ps_idle_ms/h6/w1/v3</property>
      <property value="-57.5836">fsim/tables/ps_idle_ms/h6/w1/v4</property>
      <property value="-69.7563">fsim/tables/ps_idle_ms/h6/w1/v5</property>
      <property value="-82.6278">fsim/tables/ps_idle_ms/h6/w1/v6</property>
      <property value="-96.6342">fsim/tables/ps_idle_ms/h6/w1/v7</property>
      <property value="-112.078">fsim/tables/ps_idle_ms/h6/w1/v8</property>
      <property value="-129.985">fsim/tables/ps_idle_ms/h6/w1/v9</property>
      <property value="-45.587">fsim/tables/ps_idle_ms/h6/w2/v0</property>
      <property value="-39.0494">fsim/tables/ps_idle_ms/h6/w2/v1</property>
      <property value="-127.566">fsim/tables/ps_idle_ms/h6/w2/v10</property>
      <property value="-144.005">fsim/tables/ps_idle_ms/h6/w2/v11</property>
      <property value="-161.151">fsim/tables/ps_idle_ms/h6/w2/v12</property>
      <property value="-180.189">fsim/tables/ps_idle_ms/h6/w2/v13</property>
      <property value="-200.671">fsim/tables/ps_idle_ms/h6/w2/v14</property>
      <property value="-224.678">fsim/tables/ps_idle_ms/h6/w2/v15</property>
      <property value="-35.4874">fsim/tables/ps_idle_ms/h6/w2/v2</property>
      <property value="-36.7761">fsim/tables/ps_idle_ms/h6/w2/v3</property>
      <property value="-54.8327">fsim/tables/ps_idle_ms/h6/w2/v4</property>
      <property value="-65.3124">fsim/tables/ps_idle_ms/h6/w2/v5</property>
      <property value="-75.8418">fsim/tables/ps_idle_ms/h6/w2/v6</property>
      <property value="-86.6263">fsim/tables/ps_idle_ms/h6/w2/v7</property>
      <property value="-98.8074">fsim/tables/ps_idle_ms/h6/w2/v8</property>
      <property value="-112.264">fsim/tables/ps_idle_ms/h6/w2/v9</property>
      <property value="-46.8703">fsim/tables/ps_idle_ms/h7/w0/v0</property>
      <property value="-41.3474">fsim/tables/ps_idle_ms/h7/w0/v1</property>
      <property value="-107.283">fsim/tables/ps_idle_ms/h7/w0/v10</property>
      <property value="-119.429">fsim/tables/ps_idle_ms/h7/w0/v11</property>
      <property value="-132.566">fsim/tables/ps_idle_ms/h7/w0/v12</property>
      <property value="-145.216">fsim/tables/ps_idle_ms/h7/w0/v13</property>
      <property value="-159.781">fsim/tables/ps_idle_ms/h7/w0/v14</property>
      <property value="-177.447">fsim/tables/ps_idle_ms/h7/w0/v15</property>
      <property value="-37.638">fsim/tables/ps_idle_ms/h7/w0/v2</property>
      <property value="-37.2282">fsim/tables/ps_idle_ms/h7/w0/v3</property>
      <property value="-47.5503">fsim/tables/ps_idle_ms/h7/w0/v4</property>
      <property value="-60.7776">fsim/tables/ps_idle_ms/h7/w0/v5</property>
      <property value="-68.7882">fsim/tables/ps_idle_ms/h7/w0/v6</property>
      <property value="-77.3822">fsim/tables/ps_idle_ms/h7/w0/v7</property>
      <property value="-86.5279">fsim/tables/ps_idle_ms/h7/w0/v8</property>
      <property value="-96.2924">fsim/tables/ps_idle_ms/h7/w0/v9</property>
      <property value="-41.5657">fsim/tables/ps_idle_ms/h7/w1/v0</property>
      <property value="-40.5994">fsim/tables/ps_idle_ms/h7/w1/v1</property>
      <property value="-89.4603">fsim/tables/ps_idle_ms/h7/w1/v10</property>
      <property value="-95.31">fsim/tables/ps_idle_ms/h7/w1/v11</property>
      <property value="-100.951">fsim/tables/ps_idle_ms/h7/w1/v12</property>
      <property value="-107.253">fsim/tables/ps_idle_ms/h7/w1/v13</property>
      <property value="-115.324">fsim/tables/ps_idle_ms/h7/w1/v14</property>
      <property value="-125.605">fsim/tables/ps_idle_ms/h7/w1/v15</property>
      <property value="-42.6638">fsim/tables/ps_idle_ms/h7/w1/v2</property>
      <property value="-50.4695">fsim/tables/ps_idle_ms/h7/w1/v3</property>
      <property value="-58.8924">fsim/tables/ps_idle_ms/h7/w1/v4</property>
      <property value="-63.257">fsim/tables/ps_idle_ms/h7/w1/v5</property>
      <property value="-67.921">fsim/tables/ps_idle_ms/h7/w1/v6</property>
      <property value="-73.1093">fsim/tables/ps_idle_ms/h7/w1/v7</property>
      <property value="-78.2803">fsim/tables/ps_idle_ms/h7/w1/v8</property>
      <property value="-83.6766">fsim/tables/ps_idle_ms/h7/w1/v9</property>
      <property value="-44.8667">fsim/tables/ps_idle_ms/h7/w2/v0</property>
      <property value="-44.9046">fsim/tables/ps_idle_ms/h7/w2/v1</property>
      <property value="-80.2224">fsim/tables/ps_idle_ms/h7/w2/v10</property>
      <property value="-83.6336">fsim/tables/ps_idle_ms/h7/w2/v11</property>
      <property value="-87.032">fsim/tables/ps_idle_ms/h7/w2/v12</property>
      <property value="-91.2587">fsim/tables/ps_idle_ms/h7/w2/v13</property>
      <property value="-96.9319">fsim/tables/ps_idle_ms/h7/w2/v14</property>
      <property value="-104.149">fsim/tables/ps_idle_ms/h7/w2/v15</property>
      <property value="-47.5856">fsim/tables/ps_idle_ms/h7/w2/v2</property>
      <property value="-54.3466">fsim/tables/ps_idle_ms/h7/w2/v3</property>
      <property value="-59.808">fsim/tables/ps_idle_ms/h7/w2/v4</property>
      <property value="-62.9174">fsim/tables/ps_idle_ms/h7/w2/v5</property>
      <property value="-66.151">fsim/tables/ps_idle_ms/h7/w2/v6</property>
      <property value="-69.8158">fsim/tables/ps_idle_ms/h7/w2/v7</property>
      <property value="-73.4994">fsim/tables/ps_idle_ms/h7/w2/v8</property>
      <property value="-76.812">fsim/tables/ps_idle_ms/h7/w2/v9</property>
      <property value="446.052">fsim/tables/reach_tas_ms/h0/w0</property>
      <property value="445.442">fsim/tables/reach_tas_ms/h0/w1</property>
      <property value="444.813">fsim/tables/reach_tas_ms/h0/w2</property>
      <property value="501.785">fsim/tables/reach_tas_ms/h1/w0</property>
      <property value="500.86">fsim/tables/reach_tas_ms/h1/w1</property>
      <property value="499.927">fsim/tables/reach_tas_ms/h1/w2</property>
      <property value="577.448">fsim/tables/reach_tas_ms/h2/w0</property>
      <property value="576.297">fsim/tables/reach_tas_ms/h2/w1</property>
      <property value="575.229">fsim/tables/reach_tas_ms/h2/w2</property>
      <property value="665.114">fsim/tables/reach_tas_ms/h3/w0</property>
      <property value="663.597">fsim/tables/reach_tas_ms/h3/w1</property>
      <property value="662.144">fsim/tables/reach_tas_ms/h3/w2</property>
      <property value="665.4">fsim/tables/reach_tas_ms/h4/w0</property>
      <property value="663.812">fsim/tables/reach_tas_ms/h4/w1</property>
      <property value="662.253">fsim/tables/reach_tas_ms/h4/w2</property>
      <property value="663.091">fsim/tables/reach_tas_ms/h5/w0</property>
      <property value="660.843">fsim/tables/reach_tas_ms/h5/w1</property>
      <property value="657.277">fsim/tables/reach_tas_ms/h5/w2</property>
      <property value="651.459">fsim/tables/reach_tas_ms/h6/w0</property>
      <property value="635.359">fsim/tables/reach_tas_ms/h6/w1</property>
      <property value="599.714">fsim/tables/reach_tas_ms/h6/w2</property>
      <property value="550.629">fsim/tables/reach_tas_ms/h7/w0</property>
      <property value="483.022">fsim/tables/reach_tas_ms/h7/w1</property>
      <property value="389.988">fsim/tables/reach_tas_ms/h7/w2</property>
      <property value="0.0">fsim/tables/speed_fraction/v0</property>
      <property value="0.0666667">fsim/tables/speed_fraction/v1</property>
      <property value="0.666667">fsim/tables/speed_fraction/v10</property>
      <property value="0.733333">fsim/tables/speed_fraction/v11</property>
      <property value="0.8">fsim/tables/speed_fraction/v12</property>
      <property value="0.866667">fsim/tables/speed_fraction/v13</property>
      <property value="0.933333">fsim/tables/speed_fraction/v14</property>
      <property value="1">fsim/tables/speed_fraction/v15</property>
      <property value="0.133333">fsim/tables/speed_fraction/v2</property>
      <property value="0.2">fsim/tables/speed_fraction/v3</property>
      <property value="0.266667">fsim/tables/speed_fraction/v4</property>
      <property value="0.333333">fsim/tables/speed_fraction/v5</property>
      <property value="0.4">fsim/tables/speed_fraction/v6</property>
      <property value="0.466667">fsim/tables/speed_fraction/v7</property>
      <property value="0.533333">fsim/tables/speed_fraction/v8</property>
      <property value="0.6">fsim/tables/speed_fraction/v9</property>
      <property value="53.7028">fsim/tables/stall_cas_ms/h0/w0</property>
      <property value="57.2563">fsim/tables/stall_cas_ms/h0/w1</property>
      <property value="60.6018">fsim/tables/stall_cas_ms/h0/w2</property>
      <property value="55.163">fsim/tables/stall_cas_ms/h1/w0</property>
      <property value="58.8131">fsim/tables/stall_cas_ms/h1/w1</property>
      <property value="62.2496">fsim/tables/stall_cas_ms/h1/w2</property>
      <property value="56.7313">fsim/tables/stall_cas_ms/h2/w0</property>
      <property value="60.4853">fsim/tables/stall_cas_ms/h2/w1</property>
      <property value="64.0194">fsim/tables/stall_cas_ms/h2/w2</property>
      <property value="58.382">fsim/tables/stall_cas_ms/h3/w0</property>
      <property value="62.2451">fsim/tables/stall_cas_ms/h3/w1</property>
      <property value="65.8822">fsim/tables/stall_cas_ms/h3/w2</property>
      <property value="58.6389">fsim/tables/stall_cas_ms/h4/w0</property>
      <property value="62.519">fsim/tables/stall_cas_ms/h4/w1</property>
      <property value="66.172">fsim/tables/stall_cas_ms/h4/w2</property>
      <property value="59.6386">fsim/tables/stall_cas_ms/h5/w0</property>
      <property value="63.5849">fsim/tables/stall_cas_ms/h5/w1</property>
      <property value="67.3002">fsim/tables/stall_cas_ms/h5/w2</property>
      <property value="60.1567">fsim/tables/stall_cas_ms/h6/w0</property>
      <property value="64.1372">fsim/tables/stall_cas_ms/h6/w1</property>
      <property value="67.8848">fsim/tables/stall_cas_ms/h6/w2</property>
      <property value="60.6372">fsim/tables/stall_cas_ms/h7/w0</property>
      <property value="64.6496">fsim/tables/stall_cas_ms/h7/w1</property>
      <property value="68.4271">fsim/tables/stall_cas_ms/h7/w2</property>
      <property value="11520">fsim/tables/weight_kg/w0</property>
      <property value="13095">fsim/tables/weight_kg/w1</property>
      <property value="14670">fsim/tables/weight_kg/w2</property>
      <channel name="Pitch (fly-by-wire)">
        <!-- hangar: load factor command, alpha and pitch-rate inner loop (hangar/fcs.py) -->
        <summer name="fcs/pitch-trim-sum">
          <input>fcs/elevator-cmd-norm</input>
          <input>fcs/pitch-trim-cmd-norm</input>
          <clipto> <min>-1</min> <max>1</max> </clipto>
        </summer>
        <!-- the integrators are reset below 60 kt and while a wheel carries weight
             (on the ground, taking off and landing) -->
        <switch name="fcs/fbw/reset">
          <default value="0"/>
          <test logic="OR" value="-1">
            velocities/vc-kts lt 60
            gear/wow gt 0
          </test>
        </switch>
        <fcs_function name="fcs/fbw/k-alpha">
          <function>
            <table>
              <independentVar lookup="row">aero/qbar-psf</independentVar>
              <independentVar lookup="column">velocities/mach</independentVar>
              <tableData>
                       0.150     0.400     0.700     0.900     1.100     1.400     2.000
              10.0  -6.00000  -6.00000  -6.00000  -6.00000  -6.00000  -6.00000  -6.00000
              20.0  -4.13784  -4.47717  -4.13383  -3.41288  -2.54209  -2.82687  -5.72392
              40.0  -1.50159  -1.86513  -1.72459  -1.18182  -0.53396  -0.72730  -2.05941
              80.0  -0.59430  -1.04066  -1.11286  -0.93855  -0.24852  -0.03470  -0.02914
             150.0  -0.46796  -0.96976  -1.06141  -0.87648  -0.20660  -0.00785  -0.09861
             300.0  -0.34129  -0.78895  -0.93260  -0.77224  -0.14001   0.04086  -0.06290
             600.0  -0.51435  -0.60027  -0.79419  -0.54938   0.05486   0.10612  -0.02254
            1200.0  -1.90663  -0.02501   0.00909   0.26229   0.80389   0.92851   0.42200
            2400.0  -6.00000  -0.15622   0.28230   0.55682   1.12568   1.33686   1.18035
              </tableData>
            </table>
          </function>
        </fcs_function>
        <fcs_function name="fcs/fbw/k-q">
          <function>
            <table>
              <independentVar lookup="row">aero/qbar-psf</independentVar>
              <independentVar lookup="column">velocities/mach</independentVar>
              <tableData>
                       0.150     0.400     0.700     0.900     1.100     1.400     2.000
              10.0  -3.00000  -3.00000  -3.00000  -3.00000  -3.00000  -3.00000  -3.00000
              20.0  -3.00000  -3.00000  -3.00000  -3.00000  -3.00000  -3.00000  -3.00000
              40.0  -1.99898  -2.46240  -2.38620  -1.98064  -1.75021  -2.16089  -3.00000
              80.0  -0.71539  -1.16539  -1.23947  -1.19195  -1.07612  -1.17484  -1.63233
             150.0  -0.36469  -0.79978  -0.87552  -0.84191  -0.76637  -0.84916  -1.23761
             300.0  -0.05174  -0.48147  -0.56679  -0.55327  -0.51135  -0.57498  -0.85630
             600.0   0.19086  -0.25983  -0.35443  -0.34112  -0.32279  -0.38753  -0.58588
            1200.0   0.52385  -0.01835  -0.11122  -0.11483  -0.12310  -0.16670  -0.34926
            2400.0   0.96496   0.12939   0.01850  -0.00163  -0.02370  -0.05372  -0.15024
              </tableData>
            </table>
          </function>
        </fcs_function>
        <fcs_function name="fcs/fbw/k-ff">
          <function>
            <table>
              <independentVar lookup="row">aero/qbar-psf</independentVar>
              <independentVar lookup="column">velocities/mach</independentVar>
              <tableData>
                       0.150     0.400     0.700     0.900     1.100     1.400     2.000
              10.0  -0.30000  -0.30000  -0.30000  -0.30000  -0.30000  -0.30000  -0.30000
              20.0  -0.30000  -0.30000  -0.30000  -0.30000  -0.30000  -0.30000  -0.30000
              40.0  -0.30000  -0.30000  -0.30000  -0.30000  -0.30000  -0.30000  -0.30000
              80.0  -0.30000  -0.30000  -0.30000  -0.30000  -0.30000  -0.30000  -0.30000
             150.0  -0.26056  -0.25504  -0.23914  -0.21748  -0.21548  -0.25605  -0.30000
             300.0  -0.13079  -0.12783  -0.11936  -0.10794  -0.10704  -0.12800  -0.22184
             600.0  -0.06455  -0.06311  -0.05897  -0.04975  -0.04900  -0.06325  -0.11008
            1200.0  -0.01857  -0.01769  -0.01526  -0.01215  -0.01197  -0.01592  -0.04269
            2400.0  -0.00458  -0.00436  -0.00377  -0.00300  -0.00296  -0.00393  -0.01047
              </tableData>
            </table>
          </function>
        </fcs_function>
        <fcs_function name="fcs/fbw/k-i">
          <function>
            <table>
              <independentVar lookup="row">aero/qbar-psf</independentVar>
              <independentVar lookup="column">velocities/mach</independentVar>
              <tableData>
                       0.150     0.400     0.700     0.900     1.100     1.400     2.000
              10.0  -0.60000  -0.60000  -0.60000  -0.60000  -0.60000  -0.60000  -0.60000
              20.0  -0.60000  -0.60000  -0.60000  -0.60000  -0.60000  -0.60000  -0.60000
              40.0  -0.60000  -0.60000  -0.60000  -0.60000  -0.60000  -0.60000  -0.60000
              80.0  -0.47029  -0.46149  -0.43559  -0.39901  -0.39368  -0.46247  -0.60000
             150.0  -0.26056  -0.25504  -0.23914  -0.21748  -0.21548  -0.25605  -0.42937
             300.0  -0.13079  -0.12783  -0.11936  -0.10794  -0.10704  -0.12800  -0.22184
             600.0  -0.06455  -0.06311  -0.05897  -0.04975  -0.04900  -0.06325  -0.11008
            1200.0  -0.01857  -0.01769  -0.01526  -0.01215  -0.01197  -0.01592  -0.04269
            2400.0  -0.00458  -0.00436  -0.00377  -0.00300  -0.00296  -0.00393  -0.01047
              </tableData>
            </table>
          </function>
        </fcs_function>
        <fcs_function name="fcs/fbw/n-alpha">
          <function>
            <table>
              <independentVar lookup="row">aero/qbar-psf</independentVar>
              <independentVar lookup="column">velocities/mach</independentVar>
              <tableData>
                       0.150     0.400     0.700     0.900     1.100     1.400     2.000
              10.0   1.00000   1.00000   1.00000   1.00000   1.00000   1.00000   1.00000
              20.0   1.00000   1.00000   1.00000   1.00000   1.00000   1.00000   1.00000
              40.0   1.19916   1.23037   1.33229   1.70205   1.73850   1.36930   1.00000
              80.0   3.81605   3.93982   4.33297   4.99316   5.02890   4.47062   2.50599
             150.0   7.46478   7.65326   8.26885   9.35628   9.41648   8.49234   5.57305
             300.0  14.79810  15.19349  16.48491  18.76678  18.89310  16.95388  11.03568
             600.0  30.36047  31.18530  33.87934  38.63956  38.90308  34.85766  22.38106
            1200.0  62.06286  63.71485  69.11059  78.64457  79.17236  71.07002  45.96062
            2400.0 125.54685 128.85083 139.64232 158.71028 159.76584 143.56117  93.30750
              </tableData>
            </table>
          </function>
        </fcs_function>
        <!-- the pitching moment's departures from a straight line through the
             angle-of-attack envelope (-0.187 per rad about the CG), cancelled by the
             elevator: the gains are designed on the line -->
        <fcs_function name="fcs/fbw/moment-comp">
          <function>
            <table>
              <independentVar lookup="row">aero/alpha-rad</independentVar>
              <independentVar lookup="column">velocities/mach</independentVar>
              <tableData>
                       0.150     0.400     0.700     0.900     1.100     1.400     2.000
          -0.17453   0.00302   0.00294   0.00271   0.00237   0.00208   0.00236   0.00412
          -0.15708   0.00984   0.00958   0.00882   0.00771   0.00678   0.00768   0.01340
          -0.13963   0.01442   0.01404   0.01293   0.01129   0.00993   0.01126   0.01964
          -0.12217   0.02552   0.02484   0.02287   0.01998   0.01757   0.01991   0.03475
          -0.10472   0.03191   0.03106   0.02859   0.02498   0.02196   0.02490   0.04345
          -0.08727   0.04084   0.03976   0.03661   0.03198   0.02812   0.03187   0.05562
          -0.06981   0.04209   0.04098   0.03773   0.03296   0.02898   0.03285   0.05732
          -0.05236   0.02900   0.02823   0.02599   0.02271   0.01996   0.02263   0.03949
          -0.03491   0.01372   0.01336   0.01230   0.01074   0.00945   0.01071   0.01869
          -0.01745  -0.01001  -0.00975  -0.00897  -0.00784  -0.00689  -0.00781  -0.01364
           0.00000  -0.02531  -0.02464  -0.02269  -0.01982  -0.01743  -0.01975  -0.03447
           0.01745  -0.03320  -0.03232  -0.02975  -0.02599  -0.02285  -0.02591  -0.04521
           0.03491  -0.03448  -0.03357  -0.03090  -0.02700  -0.02374  -0.02691  -0.04695
           0.05236  -0.03378  -0.03289  -0.03028  -0.02645  -0.02326  -0.02636  -0.04600
           0.06981  -0.02893  -0.02816  -0.02592  -0.02265  -0.01991  -0.02257  -0.03939
           0.08727  -0.02606  -0.02537  -0.02335  -0.02040  -0.01794  -0.02033  -0.03548
           0.10472  -0.02142  -0.02085  -0.01919  -0.01677  -0.01474  -0.01671  -0.02917
           0.12217  -0.01971  -0.01919  -0.01766  -0.01543  -0.01357  -0.01538  -0.02684
           0.13963  -0.01759  -0.01712  -0.01576  -0.01377  -0.01211  -0.01373  -0.02395
           0.15708  -0.01699  -0.01654  -0.01523  -0.01331  -0.01170  -0.01326  -0.02314
           0.17453  -0.01635  -0.01591  -0.01465  -0.01280  -0.01125  -0.01276  -0.02226
           0.19199  -0.01555  -0.01514  -0.01394  -0.01218  -0.01071  -0.01214  -0.02118
           0.20944  -0.01452  -0.01413  -0.01301  -0.01137  -0.01000  -0.01133  -0.01977
           0.22689  -0.01281  -0.01247  -0.01148  -0.01003  -0.00882  -0.00999  -0.01744
           0.24435  -0.01070  -0.01042  -0.00959  -0.00838  -0.00737  -0.00835  -0.01457
           0.26180  -0.00809  -0.00788  -0.00725  -0.00634  -0.00557  -0.00632  -0.01102
           0.27925  -0.00510  -0.00497  -0.00457  -0.00400  -0.00351  -0.00398  -0.00695
           0.29671  -0.00198  -0.00192  -0.00177  -0.00155  -0.00136  -0.00154  -0.00269
           0.31416   0.00149   0.00145   0.00133   0.00117   0.00103   0.00116   0.00203
           0.33161   0.00465   0.00452   0.00417   0.00364   0.00320   0.00363   0.00633
           0.34907   0.00818   0.00796   0.00733   0.00641   0.00563   0.00638   0.01114
           0.36652   0.01143   0.01113   0.01024   0.00895   0.00787   0.00892   0.01556
           0.38397   0.01501   0.01461   0.01345   0.01175   0.01033   0.01172   0.02044
           0.40143   0.01938   0.01887   0.01737   0.01518   0.01334   0.01513   0.02640
           0.41888   0.02495   0.02428   0.02236   0.01953   0.01717   0.01947   0.03397
           0.43633   0.03228   0.03142   0.02893   0.02527   0.02222   0.02519   0.04396
           0.45379   0.04093   0.03985   0.03668   0.03205   0.02818   0.03194   0.05574
              </tableData>
            </table>
          </function>
        </fcs_function>
        <!-- the gravity reference: the load factor that holds the flight path -->
        <fcs_function name="fcs/fbw/g-ref">
          <function>
            <product>
              <cos><property>attitude/theta-rad</property></cos>
              <cos><property>attitude/phi-rad</property></cos>
            </product>
          </function>
        </fcs_function>
        <!-- stick to load factor beyond the gravity reference, aft (negative) to n_max,
             no more than the lift at the angle-of-attack limits gives - beyond the
             gravity reference of the moment, so that full aft stick still reaches
             the limit in a steep climb or inverted - through a 0.2 s prefilter and
             a 12 g/s onset limit (a full pull at once pitches an agile airframe
             faster than its nose-down control can stop at the angle-of-attack
             limit) -->
        <fcs_function name="fcs/fbw/dn-stick">
          <function>
            <max>
              <min>
                <table>
                  <independentVar lookup="row">fcs/pitch-trim-sum</independentVar>
                  <tableData>
                    -1.0  8.000
                     0.0  0.0
                     1.0  -4.000
                  </tableData>
                </table>
                <difference><product><property>fcs/fbw/n-alpha</property><value>0.45379</value></product><property>fcs/fbw/g-ref</property></difference>
              </min>
              <difference><product><property>fcs/fbw/n-alpha</property><value>-0.17453</value></product><property>fcs/fbw/g-ref</property></difference>
            </max>
          </function>
        </fcs_function>
        <lag_filter name="fcs/fbw/dn-lag">
          <input>fcs/fbw/dn-stick</input>
          <c1>5.0</c1>
        </lag_filter>
        <actuator name="fcs/fbw/dn-cmd">
          <input>fcs/fbw/dn-lag</input>
          <rate_limit>12.0</rate_limit>
        </actuator>
        <!-- the response the command should produce (the short period's rise): the
             integrator trims away what differs from it, not the rise itself -->
        <lag_filter name="fcs/fbw/dn-model">
          <input>fcs/fbw/dn-cmd</input>
          <c1>2.5</c1>
        </lag_filter>
        <fcs_function name="fcs/fbw/dn">
          <function>
            <difference><property>accelerations/Nz</property><property>fcs/fbw/g-ref</property></difference>
          </function>
        </fcs_function>
        <!-- the angle of attack with its rise over the next 0.35 s counted as spent
             (the rise, not the pitch rate: in a steady pull the nose turns with the
             flight path and the angle of attack holds), and the load factor the
             angle of attack left to each limit gives -->
        <fcs_function name="fcs/fbw/alpha-ahead">
          <function>
            <sum>
              <property>aero/alpha-rad</property>
              <product><value>0.35</value><property>aero/alphadot-rad_sec</property></product>
            </sum>
          </function>
        </fcs_function>
        <fcs_function name="fcs/fbw/dn-room-up">
          <function>
            <product><property>fcs/fbw/n-alpha</property>
              <difference><value>0.45379</value><property>fcs/fbw/alpha-ahead</property></difference></product>
          </function>
        </fcs_function>
        <fcs_function name="fcs/fbw/dn-room-down">
          <function>
            <product><property>fcs/fbw/n-alpha</property>
              <difference><value>-0.17453</value><property>fcs/fbw/alpha-ahead</property></difference></product>
          </function>
        </fcs_function>
        <!-- the command limited to the load factor the aircraft pulls now plus what
             the angle of attack left gives: at a limit the feedforward asks for the
             load factor the airframe gives there, whatever elevator holds it - a
             steady pull on a stable airframe, a push on an unstable one (a
             feedforward faded out past the limit instead took about 10 deg of
             elevator per deg of alpha, on one side of it only: the actuator's rate
             limit could not follow, and the MiG-29A cycled between 24 and 29 deg) -->
        <fcs_function name="fcs/fbw/dn-limited">
          <function>
            <max>
              <min>
                <property>fcs/fbw/dn-cmd</property>
                <sum><property>fcs/fbw/dn</property><property>fcs/fbw/dn-room-up</property></sum>
              </min>
              <sum><property>fcs/fbw/dn</property><property>fcs/fbw/dn-room-down</property></sum>
            </max>
          </function>
        </fcs_function>
        <!-- the integrator's error: the load factor's departure from the model
             response, and at a limit the angle of attack left, counted five times -
             it trims what the airframe needs there beyond the linear design (vortex
             lift, the tail's power at high alpha) in a fraction of a second, not
             over the pull -->
        <fcs_function name="fcs/fbw/pitch-error">
          <function>
            <max>
              <min>
                <difference><property>fcs/fbw/dn-model</property><property>fcs/fbw/dn</property></difference>
                <product><value>5.0</value><property>fcs/fbw/dn-room-up</property></product>
              </min>
              <product><value>5.0</value><property>fcs/fbw/dn-room-down</property></product>
            </max>
          </function>
        </fcs_function>
        <fcs_function name="fcs/fbw/pitch-error-rate">
          <function><product><property>fcs/fbw/k-i</property><property>fcs/fbw/pitch-error</property></product></function>
        </fcs_function>
        <!-- the integrator: reset below 60 kt and on the wheels, held while the
             elevator is at a stop it would push further into (anti-windup) -->
        <switch name="fcs/fbw/pitch-hold">
          <default value="0"/>
          <test logic="OR" value="-1">
            velocities/vc-kts lt 60
            gear/wow gt 0
          </test>
          <test logic="AND" value="1">
            fcs/fbw/elevator-raw gt 0.26180
            fcs/fbw/pitch-error-rate gt 0
          </test>
          <test logic="AND" value="1">
            fcs/fbw/elevator-raw lt -0.61087
            fcs/fbw/pitch-error-rate lt 0
          </test>
        </switch>
        <integrator name="fcs/fbw/pitch-integral">
          <input>fcs/fbw/pitch-error-rate</input>
          <c1>1.0</c1>
          <trigger>fcs/fbw/pitch-hold</trigger>
          <clipto> <min>-0.5</min> <max>0.5</max> </clipto>
        </integrator>
        <!-- past an angle-of-attack limit (the next 0.35 s counted) a push back
             in proportion, all the travel 4 deg beyond: an unstable airframe
             pitching up fast needs it at once, not when an integrator winds -->
        <fcs_function name="fcs/fbw/alpha-push">
          <function>
            <difference>
              <product><value>3.75000</value>
                <max><value>0</value><difference><property>fcs/fbw/alpha-ahead</property><value>0.45379</value></difference></max></product>
              <product><value>8.75000</value>
                <max><value>0</value><difference><value>-0.17453</value><property>fcs/fbw/alpha-ahead</property></difference></max></product>
            </difference>
          </function>
        </fcs_function>
        <lag_filter name="fcs/fbw/ground">
          <input>gear/wow</input>
          <c1>2.0</c1>
        </lag_filter>
        <fcs_function name="fcs/fbw/ground-direct">
          <function>
            <product>
              <property>fcs/fbw/ground</property>
              <table>
                <independentVar lookup="row">fcs/pitch-trim-sum</independentVar>
                <tableData>
                  -1.0  -0.61087
                   0.0  0.0
                   1.0  0.26180
                </tableData>
              </table>
            </product>
          </function>
        </fcs_function>
        <!-- the elevator: the push, the moment compensation, angle-of-attack and
             pitch-rate feedback, the feedforward of the limited command, the
             integrator, the ground mode's direct stick -->
        <fcs_function name="fcs/fbw/elevator-raw">
          <function>
            <sum>
              <property>fcs/fbw/alpha-push</property>
              <property>fcs/fbw/moment-comp</property>
              <product><value>-1</value><property>fcs/fbw/k-alpha</property><property>aero/alpha-rad</property></product>
              <product><value>-1</value><property>fcs/fbw/k-q</property><property>velocities/q-rad_sec</property></product>
              <product><property>fcs/fbw/k-ff</property><property>fcs/fbw/dn-limited</property></product>
              <property>fcs/fbw/pitch-integral</property>
              <property>fcs/fbw/ground-direct</property>
            </sum>
          </function>
        </fcs_function>
        <pure_gain name="fcs/fbw/elevator">
          <input>fcs/fbw/elevator-raw</input>
          <gain>1.0</gain>
          <clipto> <min>-0.61087</min> <max>0.26180</max> </clipto>
        </pure_gain>
        <!-- full travel in 0.83 s: 60 deg/s for a +-25 deg tail, faster for a
             canard's longer throw -->
        <actuator name="fcs/elevator-actuator">
          <input>fcs/fbw/elevator</input>
          <lag>40</lag>
          <rate_limit>1.051</rate_limit>
          <output>fcs/elevator-pos-rad</output>
        </actuator>
      </channel>
      <channel name="Roll (fly-by-wire)">
        <!-- hangar: roll-rate command about the flight path, limited to what the rudder can
             coordinate; bank hold at neutral stick -->
        <summer name="fcs/roll-trim-sum">
          <input>fcs/aileron-cmd-norm</input>
          <input>fcs/roll-trim-cmd-norm</input>
          <clipto> <min>-1</min> <max>1</max> </clipto>
        </summer>
        <fcs_function name="fcs/fbw/k-roll">
          <function>
            <table>
              <independentVar lookup="row">aero/qbar-psf</independentVar>
              <independentVar lookup="column">velocities/mach</independentVar>
              <tableData>
                       0.150     0.400     0.700     0.900     1.100     1.400     2.000
              10.0   1.50000   1.50000   1.50000   1.50000   1.50000   1.50000   1.50000
              20.0   1.50000   1.50000   1.50000   1.50000   1.50000   1.50000   1.50000
              40.0   0.85718   1.04063   1.00719   0.85352   1.50000   1.50000   1.50000
              80.0   0.22581   0.38883   0.39382   0.34815   0.63410   1.09159   1.50000
             150.0   0.01487   0.15809   0.17709   0.16003   0.29733   0.52169   0.94672
             300.0   0.00000   0.03513   0.06218   0.05934   0.11756   0.22195   0.42805
             600.0   0.00000   0.00000   0.00637   0.01050   0.03048   0.07724   0.18547
            1200.0   0.00000   0.00000   0.00000   0.00000   0.00000   0.00613   0.06764
            2400.0   0.00000   0.00000   0.00000   0.00000   0.00000   0.00000   0.00949
              </tableData>
            </table>
          </function>
        </fcs_function>
        <fcs_function name="fcs/fbw/k-roll-ff">
          <function>
            <table>
              <independentVar lookup="row">aero/qbar-psf</independentVar>
              <independentVar lookup="column">velocities/mach</independentVar>
              <tableData>
                       0.150     0.400     0.700     0.900     1.100     1.400     2.000
              10.0   0.34171   0.12818   0.07332   0.05686   0.08348   0.09760   0.07332
              20.0   0.34171   0.12818   0.07332   0.05686   0.08348   0.09760   0.07332
              40.0   0.34171   0.12818   0.07332   0.05480   0.08006   0.09760   0.07332
              80.0   0.28238   0.10526   0.05898   0.04414   0.06468   0.07792   0.06533
             150.0   0.23950   0.08943   0.05049   0.03857   0.05659   0.06698   0.05521
             300.0   0.22639   0.08488   0.04850   0.03755   0.05512   0.06453   0.04912
             600.0   0.22489   0.08436   0.04826   0.03743   0.05496   0.06425   0.04833
            1200.0   0.22504   0.08441   0.04829   0.03745   0.05498   0.06428   0.04827
            2400.0   0.22504   0.08441   0.04829   0.03745   0.05498   0.06428   0.04828
              </tableData>
            </table>
          </function>
        </fcs_function>
        <fcs_function name="fcs/fbw/k-roll-i">
          <function>
            <table>
              <independentVar lookup="row">aero/qbar-psf</independentVar>
              <independentVar lookup="column">velocities/mach</independentVar>
              <tableData>
                       0.150     0.400     0.700     0.900     1.100     1.400     2.000
              10.0   0.42627   0.41558   0.38418   0.33747   0.60156   0.99521   1.00000
              20.0   0.21314   0.20779   0.19209   0.16873   0.30078   0.49760   0.81723
              40.0   0.10657   0.10389   0.09604   0.08074   0.14310   0.24880   0.40862
              80.0   0.04517   0.04392   0.04025   0.03487   0.06211   0.10396   0.18039
             150.0   0.02261   0.02200   0.02023   0.01765   0.03146   0.05233   0.08906
             300.0   0.01095   0.01067   0.00984   0.00861   0.01535   0.02547   0.04242
             600.0   0.00539   0.00526   0.00486   0.00426   0.00759   0.01258   0.02078
            1200.0   0.00268   0.00261   0.00242   0.00212   0.00378   0.00626   0.01030
            2400.0   0.00134   0.00130   0.00121   0.00106   0.00189   0.00312   0.00513
              </tableData>
            </table>
          </function>
        </fcs_function>
        <fcs_function name="fcs/fbw/p-max">
          <function>
            <table>
              <independentVar lookup="row">aero/qbar-psf</independentVar>
              <independentVar lookup="column">velocities/mach</independentVar>
              <tableData>
                       0.150     0.400     0.700     0.900     1.100     1.400     2.000
              10.0   0.81722   2.17866   3.80873   4.18879   3.34516   2.86108   3.80894
              20.0   0.81722   2.17866   3.80873   4.18879   3.34516   2.86108   3.80894
              40.0   0.81722   2.17866   3.80873   4.18879   3.48825   2.86108   3.80894
              80.0   0.98893   2.65302   4.18879   4.18879   4.18879   3.58394   4.18879
             150.0   1.16599   3.12260   4.18879   4.18879   4.18879   4.16913   4.18879
             300.0   1.23352   3.28983   4.18879   4.18879   4.18879   4.18879   4.18879
             600.0   1.24174   3.31029   4.18879   4.18879   4.18879   4.18879   4.18879
            1200.0   1.24093   3.30822   4.18879   4.18879   4.18879   4.18879   4.18879
            2400.0   1.24090   3.30816   4.18879   4.18879   4.18879   4.18879   4.18879
              </tableData>
            </table>
          </function>
        </fcs_function>
        <!-- the stick's rate halves towards alpha_max -->
        <fcs_function name="fcs/fbw/p-stick">
          <function>
            <product>
              <property>fcs/roll-trim-sum</property>
              <property>fcs/fbw/p-max</property>
              <table>
                <independentVar lookup="row">aero/alpha-rad</independentVar>
                <tableData>
                  0.18151 1.0
                  0.45379 0.5
                </tableData>
              </table>
            </product>
          </function>
        </fcs_function>
        <!-- the rudder's yaw acceleration at full travel (1/s^2), and the yaw damping (1/s) -->
        <fcs_function name="fcs/fbw/yaw-accel">
          <function>
            <table>
              <independentVar lookup="row">aero/qbar-psf</independentVar>
              <independentVar lookup="column">velocities/mach</independentVar>
              <tableData>
                       0.150     0.400     0.700     0.900     1.100     1.400     2.000
              10.0   0.03991   0.04066   0.04307   0.04721   0.02744   0.01686   0.01420
              20.0   0.07982   0.08132   0.08614   0.09442   0.05487   0.03371   0.02839
              40.0   0.15964   0.16264   0.17229   0.19382   0.11296   0.06743   0.05679
              80.0   0.35811   0.36615   0.39201   0.43563   0.25331   0.15393   0.12175
             150.0   0.70399   0.71724   0.75975   0.83228   0.48365   0.29730   0.24778
             300.0   1.40181   1.42789   1.51160   1.65537   0.96195   0.59147   0.49989
             600.0   2.79086   2.84284   3.00977   3.29646   1.91562   1.17772   0.99445
            1200.0   5.56198   5.66614   6.00058   6.57488   3.82083   2.34825   1.98083
            2400.0  11.10589  11.31435  11.98361  13.13282   7.63187   4.68981   3.95270
              </tableData>
            </table>
          </function>
        </fcs_function>
        <fcs_function name="fcs/fbw/yaw-damping">
          <function>
            <table>
              <independentVar lookup="row">aero/qbar-psf</independentVar>
              <independentVar lookup="column">velocities/mach</independentVar>
              <tableData>
                       0.150     0.400     0.700     0.900     1.100     1.400     2.000
              10.0   0.02643   0.01017   0.00629   0.00556   0.00458   0.00323   0.00148
              20.0   0.05286   0.02034   0.01258   0.01111   0.00915   0.00647   0.00296
              40.0   0.10571   0.04067   0.02517   0.02231   0.01838   0.01293   0.00592
              80.0   0.21440   0.08261   0.05132   0.04568   0.03764   0.02641   0.01189
             150.0   0.41468   0.15938   0.09830   0.08630   0.07106   0.05045   0.02299
             300.0   0.79816   0.30662   0.18886   0.16564   0.13637   0.09691   0.04543
             600.0   1.55065   0.59619   0.36810   0.32399   0.26679   0.18903   0.08759
            1200.0   3.05805   1.17644   0.72764   0.64205   0.52876   0.37387   0.17187
            2400.0   6.09886   2.34642   1.45157   1.28122   1.05517   0.74590   0.34160
              </tableData>
            </table>
          </function>
        </fcs_function>
        <!-- the rudder's share of the yaw a roll about the flight path needs, per unit of
             its roll acceleration: sin(alpha), less the ailerons' own yaw and what a
             principal axis inclined to the body axis gives -->
        <fcs_function name="fcs/fbw/roll-yaw-share">
          <function>
            <table>
              <independentVar lookup="row">aero/alpha-rad</independentVar>
              <tableData>
                   -0.34907  -0.36421
                   -0.26180  -0.28082
                   -0.17453  -0.20294
                   -0.08727  -0.12201
                    0.00000  -0.03275
                    0.08727   0.05787
                    0.17453   0.13565
                    0.26180   0.20972
                    0.34907   0.29418
                    0.43633   0.38084
                    0.52360   0.46509
                    0.61087   0.54523
                    0.69813   0.61943
                    0.78540   0.68681
                    0.87266   0.74423
              </tableData>
            </table>
          </function>
        </fcs_function>
        <!-- the yaw acceleration each rad/s of roll rate needs while the aircraft pitches
             under it: the pitch rate's inertia coupling, the angle of attack rising, and
             the yaw damping the roll's yaw rate meets -->
        <fcs_function name="fcs/fbw/p-yaw-need">
          <function>
            <abs>
              <sum>
                <product>
                  <sum>
                    <property>aero/alphadot-rad_sec</property>
                    <product><value>0.74779</value><property>velocities/q-rad_sec</property></product>
                  </sum>
                  <cos><property>aero/alpha-rad</property></cos>
                </product>
                <product><property>fcs/fbw/yaw-damping</property><sin><property>aero/alpha-rad</property></sin></product>
              </sum>
            </abs>
          </function>
        </fcs_function>
        <!-- no more roll rate than 0.5 of the rudder's yaw holds: a roll the rudder cannot
             follow turns the angle of attack into sideslip -->
        <fcs_function name="fcs/fbw/p-yaw-max">
          <function>
            <quotient>
              <product><value>0.5</value><property>fcs/fbw/yaw-accel</property></product>
              <max><value>0.001</value><property>fcs/fbw/p-yaw-need</property></max>
            </quotient>
          </function>
        </fcs_function>
        <fcs_function name="fcs/fbw/p-limited">
          <function>
            <max>
              <min><property>fcs/fbw/p-stick</property><property>fcs/fbw/p-yaw-max</property></min>
              <product><value>-1</value><property>fcs/fbw/p-yaw-max</property></product>
            </max>
          </function>
        </fcs_function>
        <!-- and while the rate grows, no faster roll acceleration than all of it
             coordinates, unless the roll asked for could not leave 2.0 deg of sideslip
             even uncoordinated: at worst c^2 p^2 / (8 Y), c the rudder's share, Y its yaw
             acceleration, p the rate asked for -->
        <fcs_function name="fcs/fbw/p-accel">
          <function>
            <product>
              <quotient>
                <property>fcs/fbw/yaw-accel</property>
                <max><value>0.01</value><abs><property>fcs/fbw/roll-yaw-share</property></abs></max>
              </quotient>
              <max>
                <value>1</value>
                <quotient>
                  <product><value>0.27925</value><property>fcs/fbw/yaw-accel</property></product>
                  <sum>
                    <value>1e-9</value>
                    <product>
                      <property>fcs/fbw/roll-yaw-share</property><property>fcs/fbw/roll-yaw-share</property>
                      <property>fcs/fbw/p-limited</property><property>fcs/fbw/p-limited</property>
                    </product>
                  </sum>
                </quotient>
              </max>
            </product>
          </function>
        </fcs_function>
        <!-- a roll is stopped as fast as the ailerons can -->
        <fcs_function name="fcs/fbw/p-accel-up">
          <function>
            <sum><property>fcs/fbw/p-accel</property>
              <product><value>1000</value><lt><property>fcs/fbw/p-cmd</property><value>0</value></lt></product></sum>
          </function>
        </fcs_function>
        <fcs_function name="fcs/fbw/p-accel-down">
          <function>
            <sum><property>fcs/fbw/p-accel</property>
              <product><value>1000</value><gt><property>fcs/fbw/p-cmd</property><value>0</value></gt></product></sum>
          </function>
        </fcs_function>
        <actuator name="fcs/fbw/p-cmd">
          <input>fcs/fbw/p-limited</input>
          <rate_limit sense="incr">fcs/fbw/p-accel-up</rate_limit>
          <rate_limit sense="decr">fcs/fbw/p-accel-down</rate_limit>
        </actuator>
        <fcs_function name="fcs/fbw/p-stability">
          <function>
            <sum>
              <product><property>velocities/p-rad_sec</property><cos><property>aero/alpha-rad</property></cos></product>
              <product><property>velocities/r-rad_sec</property><sin><property>aero/alpha-rad</property></sin></product>
            </sum>
          </function>
        </fcs_function>
        <fcs_function name="fcs/fbw/roll-error-rate">
          <function>
            <product><property>fcs/fbw/k-roll-i</property>
              <difference><property>fcs/fbw/p-cmd</property><property>fcs/fbw/p-stability</property></difference></product>
          </function>
        </fcs_function>
        <integrator name="fcs/fbw/roll-integral">
          <input>fcs/fbw/roll-error-rate</input>
          <c1>1.0</c1>
          <trigger>fcs/fbw/reset</trigger>
          <clipto> <min>-0.17453</min> <max>0.17453</max> </clipto>
        </integrator>
        <fcs_function name="fcs/fbw/aileron">
          <function>
            <sum>
              <product><property>fcs/fbw/k-roll-ff</property><property>fcs/fbw/p-cmd</property></product>
              <product><property>fcs/fbw/k-roll</property>
                <difference><property>fcs/fbw/p-cmd</property><property>fcs/fbw/p-stability</property></difference></product>
              <property>fcs/fbw/roll-integral</property>
            </sum>
          </function>
          <clipto> <min>-0.34907</min> <max>0.34907</max> </clipto>
        </fcs_function>
        <actuator name="fcs/left-aileron-actuator">
          <input>fcs/fbw/aileron</input>
          <lag>40</lag>
          <rate_limit>1.4</rate_limit>
          <output>fcs/left-aileron-pos-rad</output>
        </actuator>
        <pure_gain name="fcs/right-aileron">
          <input>fcs/left-aileron-pos-rad</input>
          <gain>-1</gain>
          <output>fcs/right-aileron-pos-rad</output>
        </pure_gain>
      </channel>
      <channel name="Yaw (fly-by-wire)">
        <!-- hangar: yaw damper, sideslip feedback, pedals command sideslip -->
        <summer name="fcs/yaw-trim-sum">
          <input>fcs/rudder-cmd-norm</input>
          <input>fcs/yaw-trim-cmd-norm</input>
          <clipto> <min>-1</min> <max>1</max> </clipto>
        </summer>
        <fcs_function name="fcs/fbw/k-yaw-r">
          <function>
            <table>
              <independentVar lookup="row">aero/qbar-psf</independentVar>
              <independentVar lookup="column">velocities/mach</independentVar>
              <tableData>
                       0.150     0.400     0.700     0.900     1.100     1.400     2.000
              10.0  -3.00000  -3.00000  -3.00000  -3.00000  -3.00000  -3.00000  -3.00000
              20.0  -3.00000  -3.00000  -3.00000  -3.00000  -3.00000  -3.00000  -3.00000
              40.0  -3.00000  -3.00000  -3.00000  -3.00000  -3.00000  -3.00000  -3.00000
              80.0  -2.10213  -2.23203  -2.01826  -1.66837  -2.82924  -3.00000  -3.00000
             150.0  -0.76302  -0.97048  -0.94086  -0.82667  -1.41517  -2.24501  -3.00000
             300.0  -0.26075  -0.48244  -0.50302  -0.45971  -0.79591  -1.24758  -1.57754
             600.0  -0.03549  -0.25909  -0.29699  -0.28024  -0.49240  -0.77375  -0.93436
            1200.0   0.00000  -0.13306  -0.17845  -0.17394  -0.31244  -0.49958  -0.60288
            2400.0   0.00000  -0.05162  -0.10126  -0.10366  -0.19343  -0.32071  -0.40028
              </tableData>
            </table>
          </function>
        </fcs_function>
        <fcs_function name="fcs/fbw/k-yaw-beta">
          <function>
            <table>
              <independentVar lookup="row">aero/qbar-psf</independentVar>
              <independentVar lookup="column">velocities/mach</independentVar>
              <tableData>
                       0.150     0.400     0.700     0.900     1.100     1.400     2.000
              10.0   3.00000   3.00000   3.00000   3.00000   3.00000   3.00000   3.00000
              20.0   0.00000   0.00000   0.00000   0.00000   0.00000   3.00000   3.00000
              40.0   0.00000   0.00000   0.00000   0.00000   0.00000   0.00000   0.00000
              80.0   0.00000   0.00000   0.00000   0.00000   0.00000   0.00000   0.00000
             150.0   0.00000   0.00000   0.00000   0.00000   0.00000   0.00000   0.00000
             300.0   0.00000   0.00000   0.00000   0.00000   0.00000   0.00000   0.00000
             600.0   0.00000   0.00000   0.00000   0.00000   0.00000   0.00000   0.00000
            1200.0   0.00000   0.00000   0.00000   0.00000   0.00000   0.00000   0.00000
            2400.0   0.00000   0.00000   0.00000   0.00000   0.00000   0.00000   0.00000
              </tableData>
            </table>
          </function>
        </fcs_function>
        <fcs_function name="fcs/fbw/k-pedal">
          <function>
            <table>
              <independentVar lookup="row">aero/qbar-psf</independentVar>
              <independentVar lookup="column">velocities/mach</independentVar>
              <tableData>
                       0.150     0.400     0.700     0.900     1.100     1.400     2.000
              10.0   0.14372   0.14205   0.13654   0.12574   0.20966   0.28777   0.28777
              20.0   0.14372   0.14205   0.13654   0.12574   0.20966   0.28777   0.28777
              40.0   0.14372   0.14205   0.13654   0.12743   0.21287   0.28777   0.28777
              80.0   0.15438   0.15270   0.14664   0.13598   0.22681   0.30956   0.30485
             150.0   0.16100   0.15941   0.15403   0.14311   0.23873   0.32529   0.31400
             300.0   0.16515   0.16313   0.15652   0.14376   0.23969   0.32968   0.32921
             600.0   0.16304   0.16104   0.15449   0.14188   0.23654   0.32540   0.32803
            1200.0   0.16104   0.15915   0.15293   0.14078   0.23474   0.32229   0.32367
            2400.0   0.16075   0.15887   0.15268   0.14058   0.23441   0.32179   0.32205
              </tableData>
            </table>
          </function>
        </fcs_function>
        <!-- the yaw damper damps the sideslip's rate, the stability-axis yaw rate less
             the one that coordinates the bank and the side force: in the dutch roll the
             yaw rate itself, and zero in a steady coordinated turn, in a roll about the
             flight path and in a steady sideslip - it coordinates those as long as they
             last (a damper on the washed-out yaw rate stopped coordinating a sustained
             roll, and at low speed the roll turned the angle of attack into sideslip) -->
        <!-- on the wheels (the pitch's ground mode, fcs/fbw/ground) the pedals move the rudder
             directly over its travel, a ground law: the sideslip feedback, there the
             crosswind's, turned the nose into it, and as the C-17A's nose wheel unloaded
             towards its rotation it ran 8.6 m off its line across 10 m/s -->
        <fcs_function name="fcs/fbw/rudder">
          <function>
            <sum>
              <product>
                <difference><value>1</value><property>fcs/fbw/ground</property></difference>
                <sum>
                  <product><property>fcs/fbw/k-pedal</property><property>fcs/yaw-trim-sum</property></product>
                  <product><value>-1</value><property>fcs/fbw/k-yaw-beta</property>
                    <difference><property>aero/beta-rad</property>
                      <product><value>0.17453</value><property>fcs/yaw-trim-sum</property></product></difference></product>
                  <product><property>fcs/fbw/k-yaw-r</property><property>aero/betadot-rad_sec</property></product>
                </sum>
              </product>
              <product><property>fcs/fbw/ground</property><value>0.43633</value><property>fcs/yaw-trim-sum</property></product>
            </sum>
          </function>
          <clipto> <min>-0.43633</min> <max>0.43633</max> </clipto>
        </fcs_function>
        <actuator name="fcs/rudder-actuator">
          <input>fcs/fbw/rudder</input>
          <lag>40</lag>
          <rate_limit>1.4</rate_limit>
          <output>fcs/rudder-pos-rad</output>
        </actuator>
        <!-- the nose wheel steers with the pedals (JSBSim steers from fcs/steer-cmd-norm,
             positive right; the rudder command is positive left) -->
        <pure_gain name="fcs/steer-from-rudder">
          <input>fcs/yaw-trim-sum</input>
          <gain>-1</gain>
          <output>fcs/steer-cmd-norm</output>
        </pure_gain>
      </channel>
      <channel name="Flaps">
        <kinematic name="fcs/flaps-control">
          <input>fcs/flap-cmd-norm</input>
          <traverse>
            <setting> <position>0.0</position> <time>0.0</time> </setting>
            <setting> <position>6.2</position> <time>2.0</time> </setting>
            <setting> <position>12.5</position> <time>2.0</time> </setting>
            <setting> <position>18.8</position> <time>2.0</time> </setting>
            <setting> <position>25.0</position> <time>2.0</time> </setting>
          </traverse>
          <output>fcs/flap-pos-deg</output>
        </kinematic>
        <pure_gain name="fcs/flaps-normalized">
          <input>fcs/flap-pos-deg</input>
          <gain>0.04</gain>
          <output>fcs/flap-pos-norm</output>
        </pure_gain>
      </channel>
      <channel name="Speedbrake">
        <kinematic name="fcs/speedbrake-control">
          <input>fcs/speedbrake-cmd-norm</input>
          <traverse>
            <setting> <position>0</position> <time>0</time> </setting>
            <setting> <position>1</position> <time>2.00</time> </setting>
          </traverse>
          <output>fcs/speedbrake-pos-norm</output>
        </kinematic>
      </channel>
      <channel name="Leading-Edge Flaps">
        <fcs_function name="fcs/lef-schedule">
          <function>
            <sum>
              <product> <value>1.38</value> <property>aero/alpha-deg</property> </product>
              <product> <value>-9.05</value>
                <quotient> <property>aero/qbar-psf</property> <property>atmosphere/P-psf</property> </quotient>
              </product>
              <value>1.45</value>
            </sum>
          </function>
          <clipto> <min>-2</min> <max>20</max> </clipto>
        </fcs_function>
        <actuator name="fcs/lef-actuator">
          <input>fcs/lef-schedule</input>
          <lag>7.35</lag>
          <rate_limit>25</rate_limit>
          <output>fcs/lef-pos-deg</output>
        </actuator>
      </channel>
      <channel name="Throttle 0">
        <fcs_function name="fcs/throttle-lever-0">
          <function>
            <table>
              <independentVar lookup="row">fcs/throttle-cmd-norm[0]</independentVar>
              <tableData>
                0.0  0.0
                0.8  1.0
                1.0  2.0
              </tableData>
            </table>
          </function>
          <output>fcs/throttle-pos-norm[0]</output>
        </fcs_function>
      </channel>
      <channel name="Throttle 1">
        <fcs_function name="fcs/throttle-lever-1">
          <function>
            <table>
              <independentVar lookup="row">fcs/throttle-cmd-norm[1]</independentVar>
              <tableData>
                0.0  0.0
                0.8  1.0
                1.0  2.0
              </tableData>
            </table>
          </function>
          <output>fcs/throttle-pos-norm[1]</output>
        </fcs_function>
      </channel>
      <channel name="Landing Gear">
        <kinematic name="fcs/gear-control">
          <input>gear/gear-cmd-norm</input>
          <traverse>
            <setting> <position>0</position> <time>0</time> </setting>
            <setting> <position>1</position> <time>5</time> </setting>
          </traverse>
          <output>gear/gear-pos-norm</output>
        </kinematic>
      </channel>
    </flight_control>
    <aerodynamics>
        <function name="aero/function/mach-lift">
          <description>lift, and damping, over its low-speed value (hangar: aero/mach.py)</description>
          <table>
            <independentVar lookup="row">velocities/mach</independentVar>
            <tableData>
                 0.000     1.000000
                 0.300     1.017345
                 0.500     1.052496
                 0.600     1.080874
                 0.700     1.120651
                 0.800     1.178974
                 0.850     1.219496
                 0.900     1.272133
                 0.950     1.275113
                 1.000     1.277623
                 1.050     1.279484
                 1.100     1.280519
                 1.200     1.279400
                 1.400     1.151784
                 1.600     0.963247
                 1.800     0.842365
                 2.000     0.752553
                 2.300     0.652387
                 2.600     0.577894
            </tableData>
          </table>
        </function>
        <function name="aero/function/mach-side">
          <description>side force, rolling and yawing moment over their low-speed values</description>
          <table>
            <independentVar lookup="row">velocities/mach</independentVar>
            <tableData>
                 0.000     1.000000
                 0.300     1.004929
                 0.500     1.013965
                 0.600     1.020319
                 0.700     1.027770
                 0.800     1.035411
                 0.850     1.038090
                 0.900     1.037420
                 0.950     1.033964
                 1.000     1.027504
                 1.050     1.017967
                 1.100     1.005275
                 1.200     0.970128
                 1.400     0.847757
                 1.600     0.930139
                 1.800     0.805913
                 2.000     0.713972
                 2.300     0.612364
                 2.600     0.537721
            </tableData>
          </table>
        </function>
        <function name="aero/function/mach-dCm-dCL">
          <description>pitching moment per unit low-speed lift: the neutral point's move</description>
          <table>
            <independentVar lookup="row">velocities/mach</independentVar>
            <tableData>
                 0.000     0.000000
                 0.300    -0.002776
                 0.500    -0.008733
                 0.600    -0.014027
                 0.700    -0.022494
                 0.800    -0.037631
                 0.850    -0.050082
                 0.900    -0.068086
                 0.950    -0.095613
                 1.000    -0.129973
                 1.050    -0.166524
                 1.100    -0.200565
                 1.200    -0.242200
                 1.400    -0.227679
                 1.600    -0.187691
                 1.800    -0.165298
                 2.000    -0.147466
                 2.300    -0.126851
                 2.600    -0.111312
            </tableData>
          </table>
        </function>
        <function name="aero/function/mach-dCD0">
          <description>zero-lift drag's change: friction and wave drag</description>
          <table>
            <independentVar lookup="row">velocities/mach</independentVar>
            <tableData>
                 0.000     0.000000
                 0.300    -0.000130
                 0.500    -0.000354
                 0.600    -0.000503
                 0.700    -0.000675
                 0.800    -0.000867
                 0.850    -0.000970
                 0.900    -0.000921
                 0.950    -0.000165
                 1.000     0.009897
                 1.050     0.029925
                 1.100     0.029803
                 1.200     0.029552
                 1.400     0.027934
                 1.600     0.026856
                 1.800     0.025878
                 2.000     0.024960
                 2.300     0.023673
                 2.600     0.022483
            </tableData>
          </table>
        </function>
        <function name="aero/function/mach-dK">
          <description>induced-drag factor's change (per CL^2)</description>
          <table>
            <independentVar lookup="row">velocities/mach</independentVar>
            <tableData>
                 0.000     0.000000
                 0.300     0.005016
                 0.500     0.014430
                 0.600     0.021371
                 0.700     0.030225
                 0.800     0.041624
                 0.850     0.048600
                 0.900     0.056684
                 0.950     0.057112
                 1.000     0.057471
                 1.050     0.060216
                 1.100     0.066760
                 1.200     0.085244
                 1.400     0.105234
                 1.600     0.099658
                 1.800     0.087720
                 2.000     0.070259
                 2.300     0.034650
                 2.600    -0.011609
            </tableData>
          </table>
        </function>
        <function name="aero/function/mach-aileron">
          <description>aileron power over its low-speed value</description>
          <table>
            <independentVar lookup="row">velocities/mach</independentVar>
            <tableData>
                 0.000     1.000000
                 0.300     1.017173
                 0.500     1.051923
                 0.600     1.079916
                 0.700     1.119095
                 0.800     1.176896
                 0.850     1.217990
                 0.900     1.274008
                 0.950     1.195959
                 1.000     1.056567
                 1.050     0.886070
                 1.100     0.714701
                 1.200     0.490294
                 1.400     0.432004
                 1.600     0.351736
                 1.800     0.299988
                 2.000     0.263042
                 2.300     0.223296
                 2.600     0.194717
            </tableData>
          </table>
        </function>
        <function name="aero/function/mach-elevator">
          <description>elevator power over its low-speed value</description>
          <table>
            <independentVar lookup="row">velocities/mach</independentVar>
            <tableData>
                 0.000     1.000000
                 0.300     1.018178
                 0.500     1.054939
                 0.600     1.084494
                 0.700     1.125918
                 0.800     1.186901
                 0.850     1.230134
                 0.900     1.288747
                 0.950     1.336831
                 1.000     1.385596
                 1.050     1.430200
                 1.100     1.465804
                 1.200     1.490650
                 1.400     1.293083
                 1.600     0.993728
                 1.800     0.846043
                 2.000     0.740987
                 2.300     0.628284
                 2.600     0.547433
            </tableData>
          </table>
        </function>
        <function name="aero/function/mach-flap">
          <description>flap power over its low-speed value</description>
          <table>
            <independentVar lookup="row">velocities/mach</independentVar>
            <tableData>
                 0.000     1.000000
                 0.300     1.030960
                 0.500     1.096395
                 0.600     1.151965
                 0.700     1.234165
                 0.800     1.365151
                 0.850     1.465655
                 0.900     1.613326
                 0.950     1.541131
                 1.000     1.372075
                 1.050     1.150838
                 1.100     0.922105
                 1.200     0.620879
                 1.400     0.547063
                 1.600     0.445417
                 1.800     0.379886
                 2.000     0.333100
                 2.300     0.282768
                 2.600     0.246578
            </tableData>
          </table>
        </function>
        <function name="aero/function/mach-rudder">
          <description>rudder power over its low-speed value</description>
          <table>
            <independentVar lookup="row">velocities/mach</independentVar>
            <tableData>
                 0.000     1.000000
                 0.300     1.012574
                 0.500     1.037861
                 0.600     1.058055
                 0.700     1.085993
                 0.800     1.126278
                 0.850     1.154039
                 0.900     1.190345
                 0.950     1.116452
                 1.000     0.992259
                 1.050     0.842461
                 1.100     0.691750
                 1.200     0.486373
                 1.400     0.425022
                 1.600     0.466324
                 1.800     0.404044
                 2.000     0.357949
                 2.300     0.307008
                 2.600     0.269586
            </tableData>
          </table>
        </function>
        <function name="aero/function/CL-base">
          <description>CL over alpha and beta at low speed</description>
          <table>
            <independentVar lookup="row">aero/alpha-deg</independentVar>
            <independentVar lookup="column">aero/beta-deg</independentVar>
            <tableData>
                        -90.00    -70.00    -50.00    -40.00    -30.00    -25.00    -20.00    -15.00    -10.00     -6.00     -3.00      0.00      3.00      6.00     10.00     15.00     20.00     25.00     30.00     40.00     50.00     70.00     90.00
             -180.00  -0.00000   0.00000   0.00000   0.00000   0.00000   0.00000   0.00000   0.00000   0.00000   0.00000   0.00000   0.00000   0.00000   0.00000   0.00000   0.00000   0.00000   0.00000   0.00000   0.00000   0.00000   0.00000  -0.00000
             -120.00   0.00000   0.13631   0.40403   0.55226   0.68770   0.74577   0.79523   0.83482   0.86459   0.87836   0.88593   0.88926   0.88593   0.87836   0.86459   0.83482   0.79523   0.74577   0.68770   0.55226   0.40403   0.13631   0.00000
              -70.00  -0.00000  -0.10718  -0.32096  -0.44021  -0.54958  -0.59661  -0.63675  -0.66895  -0.69237  -0.70409  -0.71049  -0.71152  -0.71049  -0.70409  -0.69237  -0.66895  -0.63675  -0.59661  -0.54958  -0.44021  -0.32096  -0.10718  -0.00000
              -46.00  -0.00000  -0.38154  -0.76569  -1.01609  -1.28827  -1.40741  -1.51069  -1.59478  -1.64928  -1.67307  -1.68320  -1.68558  -1.68320  -1.67307  -1.64928  -1.59478  -1.51069  -1.40741  -1.28827  -1.01609  -0.76569  -0.38154  -0.00000
              -32.00  -0.00000  -0.49493  -0.78473  -1.04870  -1.31757  -1.44232  -1.56290  -1.68058  -1.77185  -1.81766  -1.83653  -1.84187  -1.83653  -1.81766  -1.77185  -1.68058  -1.56290  -1.44232  -1.31757  -1.04870  -0.78473  -0.49493  -0.00000
              -22.00  -0.00000  -0.40685  -0.62381  -0.84345  -1.09371  -1.20445  -1.28904  -1.36221  -1.41282  -1.43907  -1.45023  -1.45397  -1.45023  -1.43907  -1.41282  -1.36221  -1.28904  -1.20445  -1.09371  -0.84345  -0.62381  -0.40685  -0.00000
              -17.00  -0.00000  -0.33369  -0.50343  -0.69064  -0.89281  -0.97484  -1.03689  -1.09232  -1.13143  -1.15183  -1.16049  -1.16338  -1.16049  -1.15183  -1.13143  -1.09232  -1.03689  -0.97484  -0.89281  -0.69064  -0.50343  -0.33369  -0.00000
              -13.00  -0.00000  -0.26573  -0.39645  -0.54192  -0.69364  -0.75571  -0.80637  -0.84788  -0.87836  -0.89439  -0.90123  -0.90349  -0.90123  -0.89439  -0.87836  -0.84788  -0.80637  -0.75571  -0.69364  -0.54192  -0.39645  -0.26573  -0.00000
               -9.00  -0.00000  -0.19287  -0.28006  -0.38037  -0.48619  -0.52841  -0.56467  -0.59352  -0.61494  -0.62640  -0.63140  -0.63303  -0.63140  -0.62640  -0.61494  -0.59352  -0.56467  -0.52841  -0.48619  -0.38037  -0.28006  -0.19287  -0.00000
               -5.00  -0.00000  -0.11342  -0.16548  -0.22533  -0.28970  -0.31364  -0.33555  -0.35208  -0.36460  -0.37154  -0.37475  -0.37589  -0.37475  -0.37154  -0.36460  -0.35208  -0.33555  -0.31364  -0.28970  -0.22533  -0.16548  -0.11342  -0.00000
               -1.00  -0.00000  -0.02526  -0.03340  -0.04455  -0.05876  -0.06480  -0.07073  -0.07176  -0.07255  -0.07311  -0.07348  -0.07374  -0.07348  -0.07311  -0.07255  -0.07176  -0.07073  -0.06480  -0.05876  -0.04455  -0.03340  -0.02526  -0.00000
                3.00   0.00000   0.06649   0.08668   0.11263   0.14366   0.15438   0.16788   0.18288   0.19471   0.20141   0.20447   0.20550   0.20447   0.20141   0.19471   0.18288   0.16788   0.15438   0.14366   0.11263   0.08668   0.06649   0.00000
                7.00   0.00000   0.15770   0.19786   0.26126   0.33656   0.36859   0.40220   0.43254   0.45576   0.46808   0.47336   0.47514   0.47336   0.46808   0.45576   0.43254   0.40220   0.36859   0.33656   0.26126   0.19786   0.15770   0.00000
               11.00   0.00000   0.24374   0.31794   0.41913   0.53963   0.59267   0.64715   0.69056   0.72342   0.74067   0.74807   0.75056   0.74807   0.74067   0.72342   0.69056   0.64715   0.59267   0.53963   0.41913   0.31794   0.24374   0.00000
               15.00   0.00000   0.31907   0.43351   0.57461   0.74117   0.81705   0.88672   0.94324   0.98507   1.00696   1.01633   1.01945   1.01633   1.00696   0.98507   0.94324   0.88672   0.81705   0.74117   0.57461   0.43351   0.31907   0.00000
               19.00   0.00000   0.38410   0.53538   0.71387   0.92510   1.02234   1.11075   1.17861   1.22862   1.25474   1.26588   1.26958   1.26588   1.25474   1.22862   1.17861   1.11075   1.02234   0.92510   0.71387   0.53538   0.38410   0.00000
               23.00   0.00000   0.43808   0.62583   0.83493   1.08875   1.20893   1.31606   1.39294   1.44762   1.47613   1.48826   1.49229   1.48826   1.47613   1.44762   1.39294   1.31606   1.20893   1.08875   0.83493   0.62583   0.43808   0.00000
               27.00   0.00000   0.48134   0.70188   0.93578   1.21106   1.34638   1.47283   1.56212   1.62479   1.65471   1.66740   1.67169   1.66740   1.65471   1.62479   1.56212   1.47283   1.34638   1.21106   0.93578   0.70188   0.48134   0.00000
               32.00   0.00000   0.51824   0.76883   1.02690   1.31530   1.44658   1.57010   1.67336   1.75139   1.79249   1.81005   1.81556   1.81005   1.79249   1.75139   1.67336   1.57010   1.44658   1.31530   1.02690   0.76883   0.51824   0.00000
               46.00   0.00000   0.36226   0.76898   1.01981   1.29292   1.41198   1.51522   1.59807   1.64788   1.66145   1.66059   1.65962   1.66059   1.66145   1.64788   1.59807   1.51522   1.41198   1.29292   1.01981   0.76898   0.36226   0.00000
               70.00   0.00000   0.10736   0.32133   0.44075   0.55027   0.59737   0.63757   0.66981   0.69328   0.70506   0.71167   0.71255   0.71167   0.70506   0.69328   0.66981   0.63757   0.59737   0.55027   0.44075   0.32133   0.10736   0.00000
              120.00  -0.00000  -0.13631  -0.40403  -0.55226  -0.68770  -0.74577  -0.79523  -0.83482  -0.86459  -0.87836  -0.88593  -0.88926  -0.88593  -0.87836  -0.86459  -0.83482  -0.79523  -0.74577  -0.68770  -0.55226  -0.40403  -0.13631  -0.00000
              180.00   0.00000   0.00000   0.00000   0.00000   0.00000   0.00000   0.00000   0.00000   0.00000   0.00000   0.00000   0.00000   0.00000   0.00000   0.00000   0.00000   0.00000   0.00000   0.00000   0.00000   0.00000   0.00000   0.00000
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            </tableData>
          </table>
        </function>
      <axis name="DRAG">
        <function name="aero/coefficient/CD_base">
          <description>CD over alpha and beta (hangar)</description>
          <product>
            <property>aero/qbar-psf</property>
            <property>metrics/Sw-sqft</property>
          <table>
            <independentVar lookup="row">aero/alpha-deg</independentVar>
            <independentVar lookup="column">aero/beta-deg</independentVar>
            <tableData>
                        -90.00    -70.00    -50.00    -40.00    -30.00    -25.00    -20.00    -15.00    -10.00     -6.00     -3.00      0.00      3.00      6.00     10.00     15.00     20.00     25.00     30.00     40.00     50.00     70.00     90.00
             -180.00   0.51045   0.38932   0.20901   0.13086   0.07420   0.05459   0.04045   0.03115   0.02228   0.02235   0.02318   0.02348   0.02318   0.02235   0.02228   0.03115   0.04045   0.05459   0.07420   0.13086   0.20901   0.38932   0.51045
             -120.00   0.51045   0.49484   0.68674   0.88483   1.11626   1.22998   1.33384   1.42177   1.48831   1.52402   1.53912   1.54382   1.53912   1.52402   1.48831   1.42177   1.33384   1.22998   1.11626   0.88483   0.68674   0.49484   0.51045
              -70.00   0.51045   0.55479   0.84625   1.10654   1.40033   1.54262   1.67183   1.78082   1.86342   1.90726   1.92598   1.93229   1.92598   1.90726   1.86342   1.78082   1.67183   1.54262   1.40033   1.10654   0.84625   0.55479   0.51045
              -46.00   0.51045   0.59947   0.80080   0.98113   1.21581   1.33294   1.44164   1.53603   1.59966   1.62758   1.63776   1.64110   1.63776   1.62758   1.59966   1.53603   1.44164   1.33294   1.21581   0.98113   0.80080   0.59947   0.51045
              -32.00   0.51045   0.58176   0.61203   0.67243   0.77493   0.83890   0.89982   0.96382   1.01703   1.04348   1.05443   1.05749   1.05443   1.04348   1.01703   0.96382   0.89982   0.83890   0.77493   0.67243   0.61203   0.58176   0.51045
              -22.00   0.51045   0.53982   0.45735   0.43263   0.45576   0.47728   0.48674   0.49911   0.50488   0.50824   0.50976   0.51028   0.50976   0.50824   0.50488   0.49911   0.48674   0.47728   0.45576   0.43263   0.45735   0.53982   0.51045
              -17.00   0.51045   0.52090   0.39605   0.33938   0.31893   0.31703   0.30761   0.30397   0.29860   0.29621   0.29529   0.29500   0.29529   0.29621   0.29860   0.30397   0.30761   0.31703   0.31893   0.33938   0.39605   0.52090   0.51045
              -13.00   0.51045   0.50823   0.35939   0.28061   0.23137   0.21722   0.20232   0.18607   0.17453   0.16899   0.16676   0.16602   0.16676   0.16899   0.17453   0.18607   0.20232   0.21722   0.23137   0.28061   0.35939   0.50823   0.51045
               -9.00   0.51045   0.49929   0.33443   0.23997   0.17251   0.15076   0.12967   0.10779   0.09232   0.08478   0.08175   0.08075   0.08175   0.08478   0.09232   0.10779   0.12967   0.15076   0.17251   0.23997   0.33443   0.49929   0.51045
               -5.00   0.51045   0.49406   0.32004   0.21781   0.14136   0.11603   0.09178   0.06718   0.04982   0.04134   0.03794   0.03685   0.03794   0.04134   0.04982   0.06718   0.09178   0.11603   0.14136   0.21781   0.32004   0.49406   0.51045
               -1.00   0.51045   0.49213   0.31480   0.20952   0.12931   0.10270   0.07684   0.05112   0.03296   0.02406   0.02049   0.01936   0.02049   0.02406   0.03296   0.05112   0.07684   0.10270   0.12931   0.20952   0.31480   0.49213   0.51045
                3.00   0.51045   0.49253   0.31819   0.21271   0.13257   0.10594   0.08076   0.05559   0.03786   0.02919   0.02570   0.02457   0.02570   0.02919   0.03786   0.05559   0.08076   0.10594   0.13257   0.21271   0.31819   0.49253   0.51045
                7.00   0.51045   0.49625   0.32327   0.22258   0.14829   0.12449   0.10203   0.07966   0.06378   0.05591   0.05267   0.05161   0.05267   0.05591   0.06378   0.07966   0.10203   0.12449   0.14829   0.22258   0.32327   0.49625   0.51045
               11.00   0.51045   0.50408   0.34050   0.24911   0.18592   0.17037   0.15082   0.13370   0.12119   0.11500   0.11246   0.11163   0.11246   0.11500   0.12119   0.13370   0.15082   0.17037   0.18592   0.24911   0.34050   0.50408   0.51045
               15.00   0.51045   0.51602   0.37091   0.29561   0.25196   0.24301   0.23739   0.22733   0.22053   0.21734   0.21609   0.21568   0.21609   0.21734   0.22053   0.22733   0.23739   0.24301   0.25196   0.29561   0.37091   0.51602   0.51045
               19.00   0.51045   0.53094   0.41235   0.35948   0.34405   0.35073   0.35769   0.35874   0.36000   0.36103   0.36158   0.36176   0.36158   0.36103   0.36000   0.35874   0.35769   0.35073   0.34405   0.35948   0.41235   0.53094   0.51045
               23.00   0.51045   0.54760   0.46401   0.43903   0.45953   0.48214   0.51142   0.52546   0.53572   0.54148   0.54405   0.54490   0.54405   0.54148   0.53572   0.52546   0.51142   0.48214   0.45953   0.43903   0.46401   0.54760   0.51045
               27.00   0.51045   0.56563   0.52365   0.53226   0.58957   0.63208   0.68430   0.71479   0.73707   0.74780   0.75247   0.75408   0.75247   0.74780   0.73707   0.71479   0.68430   0.63208   0.58957   0.53226   0.52365   0.56563   0.51045
               32.00   0.51045   0.58931   0.60391   0.66076   0.76713   0.82762   0.89263   0.95134   0.99370   1.01602   1.02553   1.02867   1.02553   1.01602   0.99370   0.95134   0.89263   0.82762   0.76713   0.66076   0.60391   0.58931   0.51045
               46.00   0.51045   0.59461   0.80159   0.98184   1.21496   1.33039   1.43731   1.52798   1.58612   1.60372   1.60463   1.60472   1.60463   1.60372   1.58612   1.52798   1.43731   1.33039   1.21496   0.98184   0.80159   0.59461   0.51045
               70.00   0.51045   0.55482   0.84623   1.10653   1.40033   1.54262   1.67183   1.78082   1.86342   1.90726   1.92597   1.93229   1.92597   1.90726   1.86342   1.78082   1.67183   1.54262   1.40033   1.10653   0.84623   0.55482   0.51045
              120.00   0.51045   0.49484   0.68674   0.88483   1.11626   1.22998   1.33384   1.42177   1.48831   1.52402   1.53912   1.54382   1.53912   1.52402   1.48831   1.42177   1.33384   1.22998   1.11626   0.88483   0.68674   0.49484   0.51045
              180.00   0.51045   0.38932   0.20901   0.13086   0.07420   0.05459   0.04045   0.03115   0.02228   0.02235   0.02318   0.02348   0.02318   0.02235   0.02228   0.03115   0.04045   0.05459   0.07420   0.13086   0.20901   0.38932   0.51045
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            </tableData>
          </table>
          </product>
        </function>
        <function name="aero/coefficient/CD_mach">
          <description>zero-lift drag's change with Mach: friction, wave drag</description>
          <product>
            <property>aero/qbar-psf</property>
            <property>metrics/Sw-sqft</property>
            <property>aero/function/mach-dCD0</property>
          </product>
        </function>
        <function name="aero/coefficient/CD_induced_mach">
          <description>induced drag's change with Mach (leading-edge suction lost)</description>
          <product>
            <property>aero/qbar-psf</property>
            <property>metrics/Sw-sqft</property>
            <property>aero/cl-squared</property>
            <property>aero/function/mach-dK</property>
          </product>
        </function>
        <function name="aero/coefficient/CD_aileron">
          <description>CD increment from aileron (deg), over alpha</description>
          <product>
            <property>aero/qbar-psf</property>
            <property>metrics/Sw-sqft</property>
            <property>aero/function/mach-aileron</property>
          <table>
            <independentVar lookup="row">aero/alpha-deg</independentVar>
            <independentVar lookup="column">fcs/left-aileron-pos-deg</independentVar>
            <tableData>
                        -20.00    -15.00    -10.00     -5.00      0.00      5.00     10.00     15.00     20.00
             -180.00   0.00374   0.00215   0.00099   0.00025   0.00000   0.00025   0.00099   0.00215   0.00374
             -120.00   0.00100   0.00059   0.00027   0.00007   0.00000   0.00007   0.00027   0.00059   0.00100
              -70.00   0.00001   0.00003   0.00002   0.00001   0.00000   0.00001   0.00002   0.00003   0.00001
              -46.00   0.00081   0.00034   0.00010   0.00002   0.00000   0.00002   0.00010   0.00034   0.00081
              -32.00   0.00517   0.00297   0.00137   0.00034   0.00000   0.00034   0.00137   0.00297   0.00517
              -22.00   0.00658   0.00366   0.00160   0.00040   0.00000   0.00040   0.00160   0.00366   0.00658
              -17.00   0.00954   0.00534   0.00225   0.00052   0.00000   0.00052   0.00225   0.00534   0.00954
              -13.00   0.01274   0.00767   0.00357   0.00089   0.00000   0.00089   0.00357   0.00767   0.01274
               -9.00   0.01465   0.00935   0.00474   0.00130   0.00000   0.00130   0.00474   0.00935   0.01465
               -5.00   0.01424   0.00882   0.00433   0.00116   0.00000   0.00116   0.00433   0.00882   0.01424
               -1.00   0.01346   0.00842   0.00416   0.00112   0.00000   0.00112   0.00416   0.00842   0.01346
                3.00   0.01342   0.00842   0.00417   0.00112   0.00000   0.00112   0.00417   0.00842   0.01342
                7.00   0.01485   0.00985   0.00522   0.00147   0.00000   0.00147   0.00522   0.00985   0.01485
               11.00   0.01650   0.01120   0.00623   0.00192   0.00000   0.00192   0.00623   0.01120   0.01650
               15.00   0.01308   0.00798   0.00369   0.00088   0.00000   0.00088   0.00369   0.00798   0.01308
               19.00   0.00818   0.00419   0.00138   0.00017   0.00000   0.00017   0.00138   0.00419   0.00818
               23.00   0.00311   0.00078  -0.00022  -0.00018   0.00000  -0.00018  -0.00022   0.00078   0.00311
               27.00   0.00049  -0.00099  -0.00109  -0.00039   0.00000  -0.00039  -0.00109  -0.00099   0.00049
               32.00   0.00155   0.00030  -0.00019  -0.00011   0.00000  -0.00011  -0.00019   0.00030   0.00155
               46.00  -0.00204  -0.00167  -0.00098  -0.00029   0.00000  -0.00029  -0.00098  -0.00167  -0.00204
               70.00   0.00001   0.00003   0.00002   0.00001   0.00000   0.00001   0.00002   0.00003   0.00001
              120.00   0.00100   0.00059   0.00027   0.00007   0.00000   0.00007   0.00027   0.00059   0.00100
              180.00   0.00374   0.00215   0.00099   0.00025   0.00000   0.00025   0.00099   0.00215   0.00374
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            </tableData>
          </table>
          </product>
        </function>
        <function name="aero/coefficient/CD_elevator">
          <description>CD increment from elevator (deg), over alpha</description>
          <product>
            <property>aero/qbar-psf</property>
            <property>metrics/Sw-sqft</property>
            <property>aero/function/mach-elevator</property>
          <table>
            <independentVar lookup="row">aero/alpha-deg</independentVar>
            <independentVar lookup="column">fcs/elevator-pos-deg</independentVar>
            <tableData>
                        -35.00    -30.00    -25.00    -20.00    -15.00    -10.00     -5.00      0.00      5.00     10.00     15.00
             -180.00   0.06255   0.04742   0.03375   0.02195   0.01237   0.00251   0.00039   0.00000   0.00039   0.00251   0.01237
             -120.00  -0.10943  -0.09576  -0.08063  -0.06451  -0.04788  -0.03125  -0.01513   0.00000   0.01367   0.02548   0.03505
              -70.00   0.00957   0.01663   0.02095   0.02240   0.02095   0.01663   0.00957   0.00000  -0.01180  -0.02548  -0.04060
              -46.00   0.16037   0.14358   0.12447   0.10309   0.07960   0.05425   0.02757   0.00000  -0.02826  -0.05650  -0.08296
              -32.00   0.22205   0.19097   0.15885   0.12602   0.09293   0.06019   0.02860   0.00000  -0.02453  -0.04815  -0.06844
              -22.00   0.22334   0.18528   0.14816   0.11245   0.07891   0.04881   0.02303   0.00000  -0.01858  -0.03308  -0.04454
              -17.00   0.22617   0.18248   0.14152   0.10395   0.07053   0.04198   0.01819   0.00000  -0.01318  -0.02306  -0.02983
              -13.00   0.22203   0.17453   0.13144   0.09329   0.06052   0.03375   0.01360   0.00000  -0.00933  -0.01543  -0.01823
               -9.00   0.20753   0.15864   0.11551   0.07848   0.04804   0.02484   0.00939   0.00000  -0.00556  -0.00783  -0.00647
               -5.00   0.18669   0.13898   0.09785   0.06362   0.03662   0.01739   0.00591   0.00000  -0.00224  -0.00112   0.00405
               -1.00   0.15238   0.10845   0.07182   0.04277   0.02169   0.00881   0.00242   0.00000   0.00088   0.00530   0.01504
                3.00   0.12123   0.08130   0.04934   0.02551   0.01007   0.00227  -0.00058   0.00000   0.00388   0.01188   0.02654
                7.00   0.09341   0.05729   0.02967   0.01061   0.00007  -0.00376  -0.00352   0.00000   0.00688   0.01868   0.03791
               11.00   0.05766   0.02752   0.00612  -0.00661  -0.01140  -0.01098  -0.00709   0.00000   0.01083   0.02776   0.05210
               15.00   0.01746  -0.00474  -0.01849  -0.02410  -0.02337  -0.01878  -0.01100   0.00000   0.01564   0.03768   0.06534
               19.00  -0.02076  -0.03493  -0.04124  -0.04049  -0.03525  -0.02677  -0.01523   0.00000   0.02064   0.04542   0.07476
               23.00  -0.05596  -0.06287  -0.06242  -0.05671  -0.04760  -0.03542  -0.02002   0.00000   0.02344   0.04984   0.08049
               27.00  -0.08725  -0.08746  -0.08154  -0.07189  -0.05914  -0.04334  -0.02349   0.00000   0.02513   0.05454   0.08691
               32.00  -0.11822  -0.11117  -0.10023  -0.08620  -0.06918  -0.04846  -0.02484   0.00000   0.02927   0.06110   0.09395
               46.00  -0.17430  -0.15666  -0.13568  -0.11392  -0.08817  -0.05895  -0.02935   0.00000   0.02837   0.05564   0.08135
               70.00   0.07938   0.13295   0.11457   0.01454  -0.04060  -0.02548  -0.01180   0.00000   0.00957   0.01663   0.02095
              120.00   0.04643   0.04788   0.04643   0.04210   0.03505   0.02548   0.01367   0.00000  -0.01513  -0.03125  -0.04788
              180.00   0.06255   0.04742   0.03375   0.02195   0.01237   0.00251   0.00039   0.00000   0.00039   0.00251   0.01237
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            </tableData>
          </table>
          </product>
        </function>
        <function name="aero/coefficient/CD_flap">
          <description>CD increment from flap (deg), over alpha</description>
          <product>
            <property>aero/qbar-psf</property>
            <property>metrics/Sw-sqft</property>
            <property>aero/function/mach-flap</property>
          <table>
            <independentVar lookup="row">aero/alpha-deg</independentVar>
            <independentVar lookup="column">fcs/flap-pos-deg</independentVar>
            <tableData>
                          0.00      5.00     10.00     15.00     20.00     25.00
             -180.00   0.00000   0.00032   0.00127   0.00283   0.00494   0.00754
             -120.00   0.00000   0.00032   0.00127   0.00283   0.00494   0.00754
              -70.00   0.00000   0.00032   0.00127   0.00283   0.00494   0.00754
              -46.00   0.00000  -0.00894  -0.01653  -0.02158  -0.02412  -0.02499
              -32.00   0.00000  -0.01267  -0.02362  -0.03121  -0.03550  -0.03766
              -22.00   0.00000  -0.00895  -0.01655  -0.02171  -0.02437  -0.02534
              -17.00   0.00000  -0.00692  -0.01206  -0.01517  -0.01636  -0.01624
              -13.00   0.00000  -0.00619  -0.00976  -0.01135  -0.01141  -0.01043
               -9.00   0.00000  -0.00561  -0.00834  -0.00895  -0.00813  -0.00636
               -5.00   0.00000  -0.00341  -0.00437  -0.00327  -0.00081   0.00247
               -1.00   0.00000   0.00023   0.00252   0.00595   0.00980   0.01392
                3.00   0.00000   0.00344   0.00842   0.01373   0.01875   0.02360
                7.00   0.00000   0.00621   0.01394   0.02139   0.02784   0.03367
               11.00   0.00000   0.00797   0.01877   0.02883   0.03702   0.04404
               15.00   0.00000   0.00585   0.01677   0.02805   0.03733   0.04514
               19.00   0.00000   0.00287   0.01104   0.02130   0.03039   0.03822
               23.00   0.00000   0.00158   0.00630   0.01378   0.02130   0.02819
               27.00   0.00000   0.00244   0.00537   0.01010   0.01549   0.02084
               32.00   0.00000   0.00362   0.00618   0.00904   0.01242   0.01608
               46.00   0.00000   0.00270   0.00423   0.00500   0.00559   0.00641
               70.00   0.00000   0.00032   0.00127   0.00283   0.00494   0.00754
              120.00   0.00000   0.00032   0.00127   0.00283   0.00494   0.00754
              180.00   0.00000   0.00032   0.00127   0.00283   0.00494   0.00754
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            </tableData>
          </table>
          </product>
        </function>
        <function name="aero/coefficient/CD_rudder">
          <description>CD increment from rudder (deg), over alpha</description>
          <product>
            <property>aero/qbar-psf</property>
            <property>metrics/Sw-sqft</property>
            <property>aero/function/mach-rudder</property>
          <table>
            <independentVar lookup="row">aero/alpha-deg</independentVar>
            <independentVar lookup="column">fcs/rudder-pos-deg</independentVar>
            <tableData>
                        -25.00    -20.00    -15.00    -10.00     -5.00      0.00      5.00     10.00     15.00     20.00     25.00
             -180.00   0.00418   0.00274   0.00157   0.00071   0.00018   0.00000   0.00018   0.00071   0.00157   0.00274   0.00418
             -120.00   0.00055   0.00036   0.00021   0.00009   0.00002   0.00000   0.00002   0.00009   0.00021   0.00036   0.00055
              -70.00   0.00012   0.00011   0.00007   0.00003   0.00001   0.00000   0.00001   0.00003   0.00007   0.00011   0.00012
              -46.00   0.00320   0.00245   0.00167   0.00088   0.00025   0.00000   0.00025   0.00088   0.00167   0.00245   0.00320
              -32.00   0.00634   0.00473   0.00310   0.00159   0.00044   0.00000   0.00044   0.00159   0.00310   0.00473   0.00634
              -22.00   0.00815   0.00604   0.00399   0.00205   0.00056   0.00000   0.00056   0.00205   0.00399   0.00604   0.00815
              -17.00   0.00892   0.00661   0.00437   0.00224   0.00061   0.00000   0.00061   0.00224   0.00437   0.00661   0.00892
              -13.00   0.00940   0.00697   0.00460   0.00236   0.00064   0.00000   0.00064   0.00236   0.00460   0.00697   0.00940
               -9.00   0.00978   0.00724   0.00479   0.00246   0.00067   0.00000   0.00067   0.00246   0.00479   0.00724   0.00978
               -5.00   0.01002   0.00743   0.00491   0.00252   0.00069   0.00000   0.00069   0.00252   0.00491   0.00743   0.01002
               -1.00   0.01012   0.00750   0.00496   0.00254   0.00069   0.00000   0.00069   0.00254   0.00496   0.00750   0.01012
                3.00   0.01007   0.00746   0.00493   0.00253   0.00069   0.00000   0.00069   0.00253   0.00493   0.00746   0.01007
                7.00   0.00987   0.00731   0.00483   0.00248   0.00068   0.00000   0.00068   0.00248   0.00483   0.00731   0.00987
               11.00   0.00953   0.00706   0.00466   0.00239   0.00065   0.00000   0.00065   0.00239   0.00466   0.00706   0.00953
               15.00   0.00907   0.00672   0.00444   0.00228   0.00062   0.00000   0.00062   0.00228   0.00444   0.00672   0.00907
               19.00   0.00850   0.00630   0.00416   0.00214   0.00059   0.00000   0.00059   0.00214   0.00416   0.00630   0.00850
               23.00   0.00779   0.00577   0.00381   0.00196   0.00054   0.00000   0.00054   0.00196   0.00381   0.00577   0.00779
               27.00   0.00701   0.00518   0.00342   0.00175   0.00047   0.00000   0.00047   0.00175   0.00342   0.00518   0.00701
               32.00   0.00649   0.00480   0.00315   0.00158   0.00042   0.00000   0.00042   0.00158   0.00315   0.00480   0.00649
               46.00   0.00511   0.00459   0.00310   0.00006  -0.00029   0.00000  -0.00029   0.00006   0.00310   0.00459   0.00511
               70.00   0.00019   0.00013   0.00007   0.00003   0.00001   0.00000   0.00001   0.00003   0.00007   0.00013   0.00019
              120.00   0.00055   0.00036   0.00021   0.00009   0.00002   0.00000   0.00002   0.00009   0.00021   0.00036   0.00055
              180.00   0.00418   0.00274   0.00157   0.00071   0.00018   0.00000   0.00018   0.00071   0.00157   0.00274   0.00418
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            </tableData>
          </table>
          </product>
        </function>
        <function name="aero/coefficient/CD_ground">
          <description>Induced drag change in ground effect</description>
          <product>
            <property>aero/qbar-psf</property>
            <property>metrics/Sw-sqft</property>
            <property>aero/cl-squared</property>
            <value>0.10980</value>
          <table>
            <independentVar lookup="row">aero/h_b-mac-ft</independentVar>
            <tableData>
                    0.00   -1.00000
                    0.10   -0.28090
                    0.15   -0.14793
                    0.20   -0.08897
                    0.30   -0.04160
                    0.40   -0.02383
                    0.50   -0.01538
                    0.60   -0.01073
                    0.70   -0.00791
                    0.80   -0.00607
                    0.90   -0.00480
                    1.00   -0.00389
                    1.10   -0.00322
            </tableData>
          </table>
          </product>
        </function>
        <function name="aero/coefficient/CD_airbrakes">
          <description>airbrakes: drag of its airbrake plates, 1.96 m2 opened to 50 deg (hangar)</description>
          <product>
            <property>aero/qbar-psf</property>
            <property>metrics/Sw-sqft</property>
            <value>0.0621586</value>
            <pow>
              <sin>
                <product>
                  <property>fcs/speedbrake-pos-norm</property>
                  <value>0.872665</value>
                </product>
              </sin>
              <value>2</value>
            </pow>
          </product>
        </function>
      </axis>
      <axis name="SIDE">
        <function name="aero/coefficient/CY_base">
          <description>CY over alpha and beta (hangar)</description>
          <product>
            <property>aero/qbar-psf</property>
            <property>metrics/Sw-sqft</property>
            <property>aero/function/mach-side</property>
          <table>
            <independentVar lookup="row">aero/alpha-deg</independentVar>
            <independentVar lookup="column">aero/beta-deg</independentVar>
            <tableData>
                        -90.00    -70.00    -50.00    -40.00    -30.00    -25.00    -20.00    -15.00    -10.00     -6.00     -3.00      0.00      3.00      6.00     10.00     15.00     20.00     25.00     30.00     40.00     50.00     70.00     90.00
             -180.00   0.00000   0.14170   0.16644   0.14289   0.10296   0.08029   0.05834   0.03850   0.06746   0.08319   0.04408  -0.00000  -0.04408  -0.08319  -0.06746  -0.03850  -0.05834  -0.08029  -0.10296  -0.14289  -0.16644  -0.14170  -0.00000
             -120.00   0.00000  -0.07258  -0.34212  -0.44142  -0.46132  -0.43479  -0.38372  -0.31021  -0.21051  -0.13290  -0.07601  -0.00000   0.07601   0.13290   0.21051   0.31021   0.38372   0.43479   0.46132   0.44142   0.34212   0.07258  -0.00000
              -70.00   0.00000  -0.10901  -0.42919  -0.54241  -0.56051  -0.52633  -0.46308  -0.37303  -0.25971  -0.16130  -0.08678  -0.00000   0.08678   0.16130   0.25971   0.37303   0.46308   0.52633   0.56051   0.54241   0.42919   0.10901  -0.00000
              -46.00   0.00000  -0.18922  -0.30598  -0.37167  -0.40377  -0.38453  -0.34000  -0.25561  -0.18000  -0.11905  -0.05084  -0.00000   0.05084   0.11905   0.18000   0.25561   0.34000   0.38453   0.40377   0.37167   0.30598   0.18922  -0.00000
              -32.00   0.00000  -0.10311  -0.07194  -0.12612  -0.15337  -0.13245  -0.12729  -0.11138  -0.06868  -0.04361  -0.02227  -0.00000   0.02227   0.04361   0.06868   0.11138   0.12729   0.13245   0.15337   0.12612   0.07194   0.10311  -0.00000
              -22.00   0.00000   0.03503   0.10268   0.06643   0.03698   0.04219   0.03090   0.03681   0.02278   0.01293   0.00638  -0.00000  -0.00638  -0.01293  -0.02278  -0.03681  -0.03090  -0.04219  -0.03698  -0.06643  -0.10268  -0.03503  -0.00000
              -17.00   0.00000   0.09409   0.17179   0.14275   0.11378   0.11514   0.09657   0.08684   0.05684   0.03352   0.01671  -0.00000  -0.01671  -0.03352  -0.05684  -0.08684  -0.09657  -0.11514  -0.11378  -0.14275  -0.17179  -0.09409  -0.00000
              -13.00   0.00000   0.13224   0.21346   0.18971   0.16103   0.16004   0.15108   0.11604   0.07653   0.04531   0.02255  -0.00000  -0.02255  -0.04531  -0.07653  -0.11604  -0.15108  -0.16004  -0.16103  -0.18971  -0.21346  -0.13224  -0.00000
               -9.00   0.00000   0.15940   0.24179   0.22140   0.19169   0.18920   0.17615   0.13450   0.08878   0.05250   0.02603  -0.00000  -0.02603  -0.05250  -0.08878  -0.13450  -0.17615  -0.18920  -0.19169  -0.22140  -0.24179  -0.15940  -0.00000
               -5.00   0.00000   0.17547   0.25602   0.23715   0.20619   0.20299   0.18777   0.14279   0.09403   0.05534   0.02725  -0.00000  -0.02725  -0.05534  -0.09403  -0.14279  -0.18777  -0.20299  -0.20619  -0.23715  -0.25602  -0.17547  -0.00000
               -1.00   0.00000   0.18136   0.26155   0.24331   0.21147   0.20874   0.19160   0.14528   0.09543   0.05587   0.02724  -0.00000  -0.02724  -0.05587  -0.09543  -0.14528  -0.19160  -0.20874  -0.21147  -0.24331  -0.26155  -0.18136  -0.00000
                3.00   0.00000   0.17998   0.26174   0.24245   0.20917   0.20565   0.18973   0.14412   0.09491   0.05592   0.02759  -0.00000  -0.02759  -0.05592  -0.09491  -0.14412  -0.18973  -0.20565  -0.20917  -0.24245  -0.26174  -0.17998  -0.00000
                7.00   0.00000   0.16889   0.25147   0.23115   0.19802   0.19392   0.18014   0.13896   0.09261   0.05524   0.02750  -0.00000  -0.02750  -0.05524  -0.09261  -0.13896  -0.18014  -0.19392  -0.19802  -0.23115  -0.25147  -0.16889  -0.00000
               11.00   0.00000   0.14583   0.23126   0.21026   0.17681   0.18332   0.15976   0.12618   0.08471   0.05061   0.02521  -0.00000  -0.02521  -0.05061  -0.08471  -0.12618  -0.15976  -0.18332  -0.17681  -0.21026  -0.23126  -0.14583  -0.00000
               15.00   0.00000   0.11098   0.19800   0.17420   0.13906   0.13630   0.13338   0.10228   0.06824   0.04058   0.02020  -0.00000  -0.02020  -0.04058  -0.06824  -0.10228  -0.13338  -0.13630  -0.13906  -0.17420  -0.19800  -0.11098  -0.00000
               19.00   0.00000   0.06711   0.15267   0.12407   0.08584   0.08703   0.08815   0.06764   0.04373   0.02558   0.01268  -0.00000  -0.01268  -0.02558  -0.04373  -0.06764  -0.08815  -0.08703  -0.08584  -0.12407  -0.15267  -0.06711  -0.00000
               23.00   0.00000   0.01641   0.09607   0.06169   0.01946   0.01181   0.03129   0.02175   0.01225   0.00636   0.00306  -0.00000  -0.00306  -0.00636  -0.01225  -0.02175  -0.03129  -0.01181  -0.01946  -0.06169  -0.09607  -0.01641  -0.00000
               27.00   0.00000  -0.03983   0.03040  -0.01015  -0.05185  -0.05948  -0.02915  -0.02812  -0.02305  -0.01532  -0.00793  -0.00000   0.00793   0.01532   0.02305   0.02812   0.02915   0.05948   0.05185   0.01015  -0.03040   0.03983  -0.00000
               32.00   0.00000  -0.11431  -0.05964  -0.10857  -0.14576  -0.14459  -0.12050  -0.07652  -0.05589  -0.03755  -0.02123  -0.00000   0.02123   0.03755   0.05589   0.07652   0.12050   0.14459   0.14576   0.10857   0.05964   0.11431  -0.00000
               46.00   0.00000  -0.16832  -0.30311  -0.36556  -0.39641  -0.37724  -0.33371  -0.26558  -0.16031  -0.08188  -0.03701  -0.00000   0.03701   0.08188   0.16031   0.26558   0.33371   0.37724   0.39641   0.36556   0.30311   0.16832  -0.00000
               70.00   0.00000  -0.10919  -0.42919  -0.54242  -0.56052  -0.52635  -0.46311  -0.37309  -0.25990  -0.16122  -0.08760  -0.00000   0.08760   0.16122   0.25990   0.37309   0.46311   0.52635   0.56052   0.54242   0.42919   0.10919  -0.00000
              120.00   0.00000  -0.07258  -0.34212  -0.44142  -0.46132  -0.43479  -0.38372  -0.31021  -0.21051  -0.13290  -0.07601  -0.00000   0.07601   0.13290   0.21051   0.31021   0.38372   0.43479   0.46132   0.44142   0.34212   0.07258  -0.00000
              180.00   0.00000   0.14170   0.16644   0.14289   0.10296   0.08029   0.05834   0.03850   0.06746   0.08319   0.04408  -0.00000  -0.04408  -0.08319  -0.06746  -0.03850  -0.05834  -0.08029  -0.10296  -0.14289  -0.16644  -0.14170  -0.00000
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            </tableData>
          </table>
          </product>
        </function>
        <function name="aero/coefficient/CY_aileron">
          <description>CY increment from aileron (deg), over alpha</description>
          <product>
            <property>aero/qbar-psf</property>
            <property>metrics/Sw-sqft</property>
            <property>aero/function/mach-aileron</property>
          <table>
            <independentVar lookup="row">aero/alpha-deg</independentVar>
            <independentVar lookup="column">fcs/left-aileron-pos-deg</independentVar>
            <tableData>
                        -20.00    -15.00    -10.00     -5.00      0.00      5.00     10.00     15.00     20.00
             -180.00  -0.00000  -0.00000  -0.00000  -0.00000   0.00000  -0.00000  -0.00000  -0.00000  -0.00000
              -35.00   0.00660   0.00545   0.00395   0.00208   0.00000  -0.00208  -0.00395  -0.00545  -0.00660
              -11.00   0.01160   0.00946   0.00679   0.00355   0.00000  -0.00355  -0.00679  -0.00946  -0.01160
                4.00   0.01252   0.01016   0.00726   0.00378   0.00000  -0.00378  -0.00726  -0.01016  -0.01252
               19.00   0.00979   0.00779   0.00547   0.00282   0.00000  -0.00282  -0.00547  -0.00779  -0.00979
               42.00   0.00182   0.00088   0.00028   0.00005   0.00000  -0.00005  -0.00028  -0.00088  -0.00182
              180.00   0.00000   0.00000   0.00000   0.00000   0.00000   0.00000   0.00000   0.00000   0.00000
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            </tableData>
          </table>
          </product>
        </function>
        <function name="aero/coefficient/CY_rudder">
          <description>CY increment from rudder (deg), over alpha</description>
          <product>
            <property>aero/qbar-psf</property>
            <property>metrics/Sw-sqft</property>
            <property>aero/function/mach-rudder</property>
          <table>
            <independentVar lookup="row">aero/alpha-deg</independentVar>
            <independentVar lookup="column">fcs/rudder-pos-deg</independentVar>
            <tableData>
                        -25.00    -20.00    -15.00    -10.00     -5.00      0.00      5.00     10.00     15.00     20.00     25.00
             -180.00  -0.00000   0.00000  -0.00000  -0.00000   0.00000   0.00000   0.00000  -0.00000  -0.00000   0.00000  -0.00000
              -35.00  -0.04542  -0.03495  -0.02850  -0.02071  -0.01092   0.00000   0.01092   0.02071   0.02850   0.03495   0.04542
              -11.00  -0.05525  -0.04916  -0.04124  -0.03026  -0.01601   0.00000   0.01601   0.03026   0.04124   0.04916   0.05525
                4.00  -0.05795  -0.05152  -0.04320  -0.03168  -0.01676   0.00000   0.01676   0.03168   0.04320   0.05152   0.05795
               19.00  -0.05210  -0.04645  -0.03905  -0.02871  -0.01525   0.00000   0.01525   0.02871   0.03905   0.04645   0.05210
               42.00  -0.05083  -0.04950  -0.04935  -0.04647  -0.02538   0.00000   0.02538   0.04647   0.04935   0.04950   0.05083
              180.00   0.00000   0.00000   0.00000  -0.00000   0.00000   0.00000   0.00000  -0.00000   0.00000   0.00000   0.00000
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            </tableData>
          </table>
          </product>
        </function>
        <function name="aero/coefficient/CYp">
          <description>CY per p (non-dimensional), over alpha</description>
          <product>
            <property>aero/qbar-psf</property>
            <property>metrics/Sw-sqft</property>
            <property>aero/bi2vel</property>
            <property>velocities/p-aero-rad_sec</property>
            <property>aero/function/mach-lift</property>
          <table>
            <independentVar lookup="row">aero/alpha-deg</independentVar>
            <tableData>
                 -180.00   -0.22327
                 -165.00   -0.24815
                  -32.00    0.00030
                  -10.00    0.00148
                    5.00   -0.00993
                   20.00   -0.03814
                   46.00   -0.28618
                  180.00   -0.22327
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            </tableData>
          </table>
          </product>
        </function>
        <function name="aero/coefficient/CYr">
          <description>CY per r (non-dimensional), over alpha</description>
          <product>
            <property>aero/qbar-psf</property>
            <property>metrics/Sw-sqft</property>
            <property>aero/bi2vel</property>
            <property>velocities/r-aero-rad_sec</property>
            <property>aero/function/mach-lift</property>
          <table>
            <independentVar lookup="row">aero/alpha-deg</independentVar>
            <tableData>
                 -180.00    0.67259
                 -165.00    0.63486
                  -32.00    0.21150
                  -10.00    0.27117
                    5.00    0.30220
                   20.00    0.28267
                   46.00    0.56582
                  180.00    0.67259
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            </tableData>
          </table>
          </product>
        </function>
      </axis>
      <axis name="LIFT">
        <function name="aero/coefficient/CL_base">
          <description>CL over alpha and beta, ground effect, compressibility (hangar)</description>
          <product>
            <property>aero/qbar-psf</property>
            <property>metrics/Sw-sqft</property>
            <property>aero/function/CL-base</property>
            <property>aero/function/mach-lift</property>
          <table>
            <independentVar lookup="row">aero/h_b-mac-ft</independentVar>
            <tableData>
                    0.00    1.20000
                    0.10    1.08692
                    0.20    1.03778
                    0.40    1.00713
                    0.60    1.00135
                    0.80    1.00025
                    1.00    1.00005
                    1.10    1.00000
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            </tableData>
          </table>
          </product>
        </function>
        <function name="aero/coefficient/CL_elevator">
          <description>CL increment from elevator (deg), over alpha</description>
          <product>
            <property>aero/qbar-psf</property>
            <property>metrics/Sw-sqft</property>
            <property>aero/function/mach-elevator</property>
          <table>
            <independentVar lookup="row">aero/alpha-deg</independentVar>
            <independentVar lookup="column">fcs/elevator-pos-deg</independentVar>
            <tableData>
                        -35.00    -30.00    -25.00    -20.00    -15.00    -10.00     -5.00      0.00      5.00     10.00     15.00
             -180.00  -0.09041  -0.08333  -0.07371  -0.06185  -0.04811  -0.06752  -0.06568   0.00000   0.06568   0.06752   0.04811
              -35.00  -0.04354  -0.05221  -0.05611  -0.05506  -0.04889  -0.03752  -0.02098   0.00000   0.02259   0.04739   0.08250
              -11.00  -0.29436  -0.26596  -0.23136  -0.19139  -0.14695  -0.09897  -0.04918   0.00000   0.04924   0.09934   0.15094
                4.00  -0.36089  -0.31159  -0.25914  -0.20480  -0.15031  -0.09831  -0.04885   0.00000   0.04838   0.09758   0.14848
               19.00  -0.35087  -0.29882  -0.24397  -0.19014  -0.13971  -0.09141  -0.04477   0.00000   0.04266   0.07939   0.11221
               42.00  -0.17277  -0.13603  -0.10105  -0.07154  -0.05286  -0.03360  -0.01462   0.00000   0.00994   0.01512   0.01575
              180.00  -0.09041  -0.08333  -0.07371  -0.06185  -0.04811  -0.06752  -0.06568   0.00000   0.06568   0.06752   0.04811
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            </tableData>
          </table>
          </product>
        </function>
        <function name="aero/coefficient/CL_flap">
          <description>CL increment from flap (deg), over alpha</description>
          <product>
            <property>aero/qbar-psf</property>
            <property>metrics/Sw-sqft</property>
            <property>aero/function/mach-flap</property>
          <table>
            <independentVar lookup="row">aero/alpha-deg</independentVar>
            <independentVar lookup="column">fcs/flap-pos-deg</independentVar>
            <tableData>
                          0.00      5.00     10.00     15.00     20.00     25.00
             -180.00   0.00000   0.00000   0.00000  -0.00000  -0.00000  -0.00000
              -35.00   0.00000   0.02627   0.04934   0.06651   0.07826   0.08683
              -11.00   0.00000   0.03961   0.07488   0.10106   0.11857   0.13089
                4.00   0.00000   0.03347   0.06106   0.07983   0.09097   0.09765
               19.00   0.00000   0.02964   0.05261   0.06722   0.07547   0.08020
               42.00   0.00000   0.01966   0.03735   0.05045   0.05881   0.06419
              180.00   0.00000   0.00000   0.00000   0.00000   0.00000   0.00000
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            </tableData>
          </table>
          <table>
            <independentVar lookup="row">aero/h_b-mac-ft</independentVar>
            <tableData>
                    0.00    1.20000
                    0.10    1.08692
                    0.20    1.03778
                    0.40    1.00713
                    0.60    1.00135
                    0.80    1.00025
                    1.00    1.00005
                    1.10    1.00000
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            </tableData>
          </table>
          </product>
        </function>
        <function name="aero/coefficient/CLq">
          <description>CL per q (non-dimensional), over alpha</description>
          <product>
            <property>aero/qbar-psf</property>
            <property>metrics/Sw-sqft</property>
            <property>aero/ci2vel</property>
            <property>velocities/q-aero-rad_sec</property>
            <property>aero/function/mach-lift</property>
          <table>
            <independentVar lookup="row">aero/alpha-deg</independentVar>
            <tableData>
                 -180.00   -1.17661
                 -165.00   -0.28054
                  -32.00    3.88596
                  -10.00    6.15406
                    5.00    5.92513
                   20.00    5.31834
                   46.00    2.69310
                  180.00   -1.17661
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            </tableData>
          </table>
          </product>
        </function>
        <function name="aero/coefficient/CLadot">
          <description>CL per alpha-dot (downwash lag at the tail)</description>
          <product>
            <property>aero/qbar-psf</property>
            <property>metrics/Sw-sqft</property>
            <property>aero/ci2vel</property>
            <property>aero/alphadot-rad_sec</property>
            <value>0.52302</value>
            <property>aero/function/mach-lift</property>
          </product>
        </function>
      </axis>
      <axis name="ROLL">
        <function name="aero/coefficient/Cl_base">
          <description>Cl over alpha and beta (hangar)</description>
          <product>
            <property>aero/qbar-psf</property>
            <property>metrics/Sw-sqft</property>
            <property>metrics/bw-ft</property>
            <property>aero/function/mach-side</property>
          <table>
            <independentVar lookup="row">aero/alpha-deg</independentVar>
            <independentVar lookup="column">aero/beta-deg</independentVar>
            <tableData>
                        -90.00    -70.00    -50.00    -40.00    -30.00    -25.00    -20.00    -15.00    -10.00     -6.00     -3.00      0.00      3.00      6.00     10.00     15.00     20.00     25.00     30.00     40.00     50.00     70.00     90.00
             -180.00   0.03430   0.02584   0.01597   0.01192   0.00836   0.00669   0.00514   0.00371   0.00828   0.01085   0.00587  -0.00000  -0.00587  -0.01085  -0.00828  -0.00371  -0.00514  -0.00669  -0.00836  -0.01192  -0.01597  -0.02584  -0.03430
              -35.00   0.03430   0.03396   0.03132   0.02572   0.01005   0.00474   0.00415   0.00315   0.00226  -0.00007  -0.00056  -0.00000   0.00056   0.00007  -0.00226  -0.00315  -0.00415  -0.00474  -0.01005  -0.02572  -0.03132  -0.03396  -0.03430
              -11.00   0.03430   0.02425   0.01417  -0.01241  -0.04369  -0.04622  -0.03734  -0.02831  -0.01933  -0.01176  -0.00592  -0.00000   0.00592   0.01176   0.01933   0.02831   0.03734   0.04622   0.04369   0.01241  -0.01417  -0.02425  -0.03430
                4.00   0.03430   0.02175   0.01490   0.01228   0.01941   0.02210   0.02054   0.01647   0.01132   0.00692   0.00349  -0.00000  -0.00349  -0.00692  -0.01132  -0.01647  -0.02054  -0.02210  -0.01941  -0.01228  -0.01490  -0.02175  -0.03430
               19.00   0.03430   0.01547   0.01069   0.02587   0.07762   0.08717   0.07950   0.06303   0.04318   0.02626   0.01321  -0.00000  -0.01321  -0.02626  -0.04318  -0.06303  -0.07950  -0.08717  -0.07762  -0.02587  -0.01069  -0.01547  -0.03430
               42.00   0.03430   0.01524   0.00236  -0.00750  -0.01753  -0.02108  -0.02403  -0.02548  -0.02318  -0.01710  -0.00890  -0.00000   0.00890   0.01710   0.02318   0.02548   0.02403   0.02108   0.01753   0.00750  -0.00236  -0.01524  -0.03430
              180.00   0.03430   0.02584   0.01597   0.01192   0.00836   0.00669   0.00514   0.00371   0.00828   0.01085   0.00587  -0.00000  -0.00587  -0.01085  -0.00828  -0.00371  -0.00514  -0.00669  -0.00836  -0.01192  -0.01597  -0.02584  -0.03430
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            </tableData>
          </table>
          </product>
        </function>
        <function name="aero/coefficient/Cl_aileron">
          <description>Cl increment from aileron (deg), over alpha</description>
          <product>
            <property>aero/qbar-psf</property>
            <property>metrics/Sw-sqft</property>
            <property>metrics/bw-ft</property>
            <property>aero/function/mach-aileron</property>
          <table>
            <independentVar lookup="row">aero/alpha-deg</independentVar>
            <independentVar lookup="column">fcs/left-aileron-pos-deg</independentVar>
            <tableData>
                        -20.00    -15.00    -10.00     -5.00      0.00      5.00     10.00     15.00     20.00
             -180.00   0.01971   0.01822   0.01286   0.00652   0.00000  -0.00652  -0.01286  -0.01822  -0.01971
              -35.00  -0.03013  -0.02471  -0.01781  -0.00932   0.00000   0.00932   0.01781   0.02471   0.03013
              -11.00  -0.04339  -0.03518  -0.02512  -0.01309   0.00000   0.01309   0.02512   0.03518   0.04339
                4.00  -0.04392  -0.03567  -0.02553  -0.01332   0.00000   0.01332   0.02553   0.03567   0.04392
               19.00  -0.03862  -0.03144  -0.02251  -0.01173   0.00000   0.01173   0.02251   0.03144   0.03862
               42.00  -0.02257  -0.01842  -0.01323  -0.00692   0.00000   0.00692   0.01323   0.01842   0.02257
              180.00   0.01971   0.01822   0.01286   0.00652   0.00000  -0.00652  -0.01286  -0.01822  -0.01971
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            </tableData>
          </table>
          </product>
        </function>
        <function name="aero/coefficient/Cl_rudder">
          <description>Cl increment from rudder (deg), over alpha</description>
          <product>
            <property>aero/qbar-psf</property>
            <property>metrics/Sw-sqft</property>
            <property>metrics/bw-ft</property>
            <property>aero/function/mach-rudder</property>
          <table>
            <independentVar lookup="row">aero/alpha-deg</independentVar>
            <independentVar lookup="column">fcs/rudder-pos-deg</independentVar>
            <tableData>
                        -25.00    -20.00    -15.00    -10.00     -5.00      0.00      5.00     10.00     15.00     20.00     25.00
             -180.00  -0.00000  -0.00000  -0.00000  -0.00000  -0.00000   0.00000  -0.00000  -0.00000  -0.00000  -0.00000  -0.00000
              -35.00  -0.00437  -0.00310  -0.00244  -0.00173  -0.00090   0.00000   0.00090   0.00173   0.00244   0.00310   0.00437
              -11.00  -0.00536  -0.00470  -0.00389  -0.00282  -0.00148   0.00000   0.00148   0.00282   0.00389   0.00470   0.00536
                4.00  -0.00612  -0.00538  -0.00447  -0.00325  -0.00171   0.00000   0.00171   0.00325   0.00447   0.00538   0.00612
               19.00  -0.00569  -0.00499  -0.00413  -0.00300  -0.00158   0.00000   0.00158   0.00300   0.00413   0.00499   0.00569
               42.00  -0.00608  -0.00592  -0.00591  -0.00545  -0.00278   0.00000   0.00278   0.00545   0.00591   0.00592   0.00608
              180.00  -0.00000  -0.00000   0.00000   0.00000  -0.00000   0.00000  -0.00000   0.00000   0.00000  -0.00000  -0.00000
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            </tableData>
          </table>
          </product>
        </function>
        <function name="aero/coefficient/Clp">
          <description>Cl per p (non-dimensional), over alpha</description>
          <product>
            <property>aero/qbar-psf</property>
            <property>metrics/Sw-sqft</property>
            <property>metrics/bw-ft</property>
            <property>aero/bi2vel</property>
            <property>velocities/p-aero-rad_sec</property>
            <property>aero/function/mach-lift</property>
          <table>
            <independentVar lookup="row">aero/alpha-deg</independentVar>
            <tableData>
                 -180.00   -0.70722
                 -165.00   -0.19548
                  -32.00   -0.35105
                  -10.00   -0.31816
                    5.00   -0.29255
                   20.00   -0.34356
                   46.00   -0.12501
                  180.00   -0.70722
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            </tableData>
          </table>
          </product>
        </function>
        <function name="aero/coefficient/Clr">
          <description>Cl per r (non-dimensional), over alpha</description>
          <product>
            <property>aero/qbar-psf</property>
            <property>metrics/Sw-sqft</property>
            <property>metrics/bw-ft</property>
            <property>aero/bi2vel</property>
            <property>velocities/r-aero-rad_sec</property>
            <property>aero/function/mach-lift</property>
          <table>
            <independentVar lookup="row">aero/alpha-deg</independentVar>
            <tableData>
                 -180.00    0.08649
                 -165.00    0.12424
                  -32.00   -0.22853
                  -10.00   -0.06272
                    5.00    0.08115
                   20.00    0.21117
                   46.00    0.54885
                  180.00    0.08649
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            </tableData>
          </table>
          </product>
        </function>
      </axis>
      <axis name="PITCH">
        <function name="aero/coefficient/Cm_base">
          <description>Cm over alpha and beta (hangar)</description>
          <product>
            <property>aero/qbar-psf</property>
            <property>metrics/Sw-sqft</property>
            <property>metrics/cbarw-ft</property>
          <table>
            <independentVar lookup="row">aero/alpha-deg</independentVar>
            <independentVar lookup="column">aero/beta-deg</independentVar>
            <tableData>
                        -90.00    -70.00    -50.00    -40.00    -30.00    -25.00    -20.00    -15.00    -10.00     -6.00     -3.00      0.00      3.00      6.00     10.00     15.00     20.00     25.00     30.00     40.00     50.00     70.00     90.00
             -180.00  -0.00000   0.00001  -0.00001  -0.00021  -0.00021  -0.00016  -0.00011  -0.00007   0.00390   0.00303   0.00065  -0.00022   0.00065   0.00303   0.00390  -0.00007  -0.00011  -0.00016  -0.00021  -0.00021  -0.00001   0.00001  -0.00000
              -35.00  -0.00000   0.02822  -0.02214  -0.03669  -0.02525  -0.02345  -0.03025  -0.04370  -0.05744  -0.06214  -0.06314  -0.06352  -0.06314  -0.06214  -0.05744  -0.04370  -0.03025  -0.02345  -0.02525  -0.03669  -0.02214   0.02822  -0.00000
              -11.00  -0.00000   0.02347  -0.00332  -0.01241  -0.01096  -0.00816  -0.00378   0.00136   0.00627   0.00936   0.01083   0.01131   0.01083   0.00936   0.00627   0.00136  -0.00378  -0.00816  -0.01096  -0.01241  -0.00332   0.02347  -0.00000
                4.00   0.00000  -0.00291   0.00973   0.00762   0.00314   0.00605   0.00962   0.00709   0.00418   0.00181   0.00045  -0.00009   0.00045   0.00181   0.00418   0.00709   0.00962   0.00605   0.00314   0.00762   0.00973  -0.00291   0.00000
               19.00   0.00000  -0.01594   0.03061   0.03768   0.03278   0.03359   0.03426   0.03063   0.02795   0.02632   0.02553   0.02527   0.02553   0.02632   0.02795   0.03063   0.03426   0.03359   0.03278   0.03768   0.03061  -0.01594   0.00000
               42.00   0.00000  -0.03211   0.04160   0.05959   0.06635   0.06968   0.07012   0.06923   0.07047   0.07644   0.08021   0.08249   0.08021   0.07644   0.07047   0.06923   0.07012   0.06968   0.06635   0.05959   0.04160  -0.03211   0.00000
              180.00  -0.00000   0.00001  -0.00001  -0.00021  -0.00021  -0.00016  -0.00011  -0.00007   0.00390   0.00303   0.00065  -0.00022   0.00065   0.00303   0.00390  -0.00007  -0.00011  -0.00016  -0.00021  -0.00021  -0.00001   0.00001  -0.00000
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            </tableData>
          </table>
          </product>
        </function>
        <function name="aero/coefficient/Cm_mach">
          <description>Cm from the neutral point's move with Mach</description>
          <product>
            <property>aero/qbar-psf</property>
            <property>metrics/Sw-sqft</property>
            <property>metrics/cbarw-ft</property>
            <property>aero/function/CL-base</property>
            <property>aero/function/mach-dCm-dCL</property>
          </product>
        </function>
        <function name="aero/coefficient/Cm_elevator">
          <description>Cm increment from elevator (deg), over alpha</description>
          <product>
            <property>aero/qbar-psf</property>
            <property>metrics/Sw-sqft</property>
            <property>metrics/cbarw-ft</property>
            <property>aero/function/mach-elevator</property>
          <table>
            <independentVar lookup="row">aero/alpha-deg</independentVar>
            <independentVar lookup="column">fcs/elevator-pos-deg</independentVar>
            <tableData>
                        -35.00    -30.00    -25.00    -20.00    -15.00    -10.00     -5.00      0.00      5.00     10.00     15.00
             -180.00  -0.13683  -0.12643  -0.11215  -0.09438  -0.07364  -0.10388  -0.10124   0.00000   0.10127   0.10413   0.07485
              -35.00   0.13016   0.12642   0.11759   0.10361   0.08450   0.06045   0.03182   0.00000  -0.03102  -0.06058  -0.09951
              -11.00   0.30445   0.27313   0.23559   0.19290   0.14631   0.09712   0.04739   0.00000  -0.04650  -0.09331  -0.14132
                4.00   0.33255   0.29072   0.24397   0.19380   0.14231   0.09297   0.04632   0.00000  -0.04630  -0.09443  -0.14586
               19.00   0.31588   0.27671   0.23065   0.18231   0.13583   0.09029   0.04507   0.00000  -0.04542  -0.08594  -0.12519
               42.00   0.22216   0.18914   0.15421   0.12009   0.09409   0.06377   0.03061   0.00000  -0.02710  -0.05001  -0.06849
              180.00  -0.13683  -0.12643  -0.11215  -0.09438  -0.07364  -0.10388  -0.10124   0.00000   0.10127   0.10413   0.07485
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            </tableData>
          </table>
          </product>
        </function>
        <function name="aero/coefficient/Cm_flap">
          <description>Cm increment from flap (deg), over alpha</description>
          <product>
            <property>aero/qbar-psf</property>
            <property>metrics/Sw-sqft</property>
            <property>metrics/cbarw-ft</property>
            <property>aero/function/mach-flap</property>
          <table>
            <independentVar lookup="row">aero/alpha-deg</independentVar>
            <independentVar lookup="column">fcs/flap-pos-deg</independentVar>
            <tableData>
                          0.00      5.00     10.00     15.00     20.00     25.00
             -180.00   0.00000   0.00000   0.00002   0.00004   0.00008   0.00012
              -35.00   0.00000  -0.00458  -0.00901  -0.01275  -0.01573  -0.01822
              -11.00   0.00000  -0.00161  -0.00304  -0.00392  -0.00427  -0.00427
                4.00   0.00000   0.00558   0.01191   0.01794   0.02320   0.02798
               19.00   0.00000   0.00202   0.00422   0.00616   0.00772   0.00904
               42.00   0.00000  -0.00289  -0.00509  -0.00679  -0.00815  -0.00934
              180.00   0.00000   0.00000   0.00002   0.00004   0.00008   0.00012
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            </tableData>
          </table>
          </product>
        </function>
        <function name="aero/coefficient/Cmq">
          <description>Cm per q (non-dimensional), over alpha</description>
          <product>
            <property>aero/qbar-psf</property>
            <property>metrics/Sw-sqft</property>
            <property>metrics/cbarw-ft</property>
            <property>aero/ci2vel</property>
            <property>velocities/q-aero-rad_sec</property>
            <property>aero/function/mach-lift</property>
          <table>
            <independentVar lookup="row">aero/alpha-deg</independentVar>
            <tableData>
                 -180.00   -6.80847
                 -165.00   -0.60594
                  -32.00   -3.97151
                  -10.00   -4.13693
                    5.00   -3.69456
                   20.00   -4.12878
                   46.00   -3.26606
                  180.00   -6.80847
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            </tableData>
          </table>
          </product>
        </function>
        <function name="aero/coefficient/Cmadot">
          <description>Cm per alpha-dot (downwash lag at the tail)</description>
          <product>
            <property>aero/qbar-psf</property>
            <property>metrics/Sw-sqft</property>
            <property>metrics/cbarw-ft</property>
            <property>aero/ci2vel</property>
            <property>aero/alphadot-rad_sec</property>
            <value>-0.52170</value>
            <property>aero/function/mach-lift</property>
          </product>
        </function>
      </axis>
      <axis name="YAW">
        <function name="aero/coefficient/Cn_base">
          <description>Cn over alpha and beta (hangar)</description>
          <product>
            <property>aero/qbar-psf</property>
            <property>metrics/Sw-sqft</property>
            <property>metrics/bw-ft</property>
            <property>aero/function/mach-side</property>
          <table>
            <independentVar lookup="row">aero/alpha-deg</independentVar>
            <independentVar lookup="column">aero/beta-deg</independentVar>
            <tableData>
                        -90.00    -70.00    -50.00    -40.00    -30.00    -25.00    -20.00    -15.00    -10.00     -6.00     -3.00      0.00      3.00      6.00     10.00     15.00     20.00     25.00     30.00     40.00     50.00     70.00     90.00
             -180.00  -0.08142  -0.09229  -0.08930  -0.08139  -0.06793  -0.05896  -0.04877  -0.03756  -0.04426  -0.04562  -0.02430  -0.00000   0.02430   0.04562   0.04426   0.03756   0.04877   0.05896   0.06793   0.08139   0.08930   0.09229   0.08142
              -35.00  -0.08142  -0.06288  -0.03626  -0.01876  -0.00742  -0.00533  -0.00763  -0.00491  -0.00886  -0.00498  -0.00245  -0.00000   0.00245   0.00498   0.00886   0.00491   0.00763   0.00533   0.00742   0.01876   0.03626   0.06288   0.08142
              -11.00  -0.08142  -0.06351  -0.03254  -0.01561  -0.00940  -0.01443  -0.01957  -0.01602  -0.01065  -0.00631  -0.00314  -0.00000   0.00314   0.00631   0.01065   0.01602   0.01957   0.01443   0.00940   0.01561   0.03254   0.06351   0.08142
                4.00  -0.08142  -0.06423  -0.03342  -0.01862  -0.01517  -0.02093  -0.02541  -0.02030  -0.01376  -0.00834  -0.00420  -0.00000   0.00420   0.00834   0.01376   0.02030   0.02541   0.02093   0.01517   0.01862   0.03342   0.06423   0.08142
               19.00  -0.08142  -0.06325  -0.03444  -0.01819  -0.01127  -0.01513  -0.02013  -0.01762  -0.01195  -0.00715  -0.00358  -0.00000   0.00358   0.00715   0.01195   0.01762   0.02013   0.01513   0.01127   0.01819   0.03444   0.06325   0.08142
               42.00  -0.08142  -0.06294  -0.03857  -0.02464  -0.01169  -0.00773  -0.00570  -0.00703  -0.01236  -0.00928  -0.00611  -0.00000   0.00611   0.00928   0.01236   0.00703   0.00570   0.00773   0.01169   0.02464   0.03857   0.06294   0.08142
              180.00  -0.08142  -0.09229  -0.08930  -0.08139  -0.06793  -0.05896  -0.04877  -0.03756  -0.04426  -0.04562  -0.02430  -0.00000   0.02430   0.04562   0.04426   0.03756   0.04877   0.05896   0.06793   0.08139   0.08930   0.09229   0.08142
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            </tableData>
          </table>
          </product>
        </function>
        <function name="aero/coefficient/Cn_aileron">
          <description>Cn increment from aileron (deg), over alpha</description>
          <product>
            <property>aero/qbar-psf</property>
            <property>metrics/Sw-sqft</property>
            <property>metrics/bw-ft</property>
            <property>aero/function/mach-aileron</property>
          <table>
            <independentVar lookup="row">aero/alpha-deg</independentVar>
            <independentVar lookup="column">fcs/left-aileron-pos-deg</independentVar>
            <tableData>
                        -20.00    -15.00    -10.00     -5.00      0.00      5.00     10.00     15.00     20.00
             -180.00  -0.00000  -0.00000  -0.00000  -0.00000   0.00000   0.00000   0.00000   0.00000   0.00000
              -35.00  -0.00361  -0.00256  -0.00162  -0.00078   0.00000   0.00078   0.00162   0.00256   0.00361
              -11.00  -0.00369  -0.00262  -0.00154  -0.00063   0.00000   0.00063   0.00154   0.00262   0.00369
                4.00  -0.00299  -0.00239  -0.00169  -0.00088   0.00000   0.00088   0.00169   0.00239   0.00299
               19.00  -0.00603  -0.00563  -0.00463  -0.00266   0.00000   0.00266   0.00463   0.00563   0.00603
               42.00  -0.00043  -0.00073  -0.00075  -0.00046   0.00000   0.00046   0.00075   0.00073   0.00043
              180.00  -0.00000  -0.00000  -0.00000  -0.00000   0.00000   0.00000   0.00000   0.00000   0.00000
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            </tableData>
          </table>
          </product>
        </function>
        <function name="aero/coefficient/Cn_rudder">
          <description>Cn increment from rudder (deg), over alpha</description>
          <product>
            <property>aero/qbar-psf</property>
            <property>metrics/Sw-sqft</property>
            <property>metrics/bw-ft</property>
            <property>aero/function/mach-rudder</property>
          <table>
            <independentVar lookup="row">aero/alpha-deg</independentVar>
            <independentVar lookup="column">fcs/rudder-pos-deg</independentVar>
            <tableData>
                        -25.00    -20.00    -15.00    -10.00     -5.00      0.00      5.00     10.00     15.00     20.00     25.00
             -180.00  -0.00000  -0.00000  -0.00000  -0.00000  -0.00000   0.00000  -0.00000  -0.00000  -0.00000  -0.00000  -0.00000
              -35.00   0.01860   0.01475   0.01211   0.00882   0.00466   0.00000  -0.00466  -0.00882  -0.01211  -0.01475  -0.01860
              -11.00   0.02353   0.02097   0.01761   0.01294   0.00685   0.00000  -0.00685  -0.01294  -0.01761  -0.02097  -0.02353
                4.00   0.02530   0.02255   0.01895   0.01392   0.00737   0.00000  -0.00737  -0.01392  -0.01895  -0.02255  -0.02530
               19.00   0.02316   0.02067   0.01739   0.01279   0.00679   0.00000  -0.00679  -0.01279  -0.01739  -0.02067  -0.02316
               42.00   0.02060   0.01959   0.01861   0.01619   0.00859   0.00000  -0.00859  -0.01619  -0.01861  -0.01959  -0.02060
              180.00  -0.00000  -0.00000  -0.00000  -0.00000  -0.00000   0.00000  -0.00000  -0.00000  -0.00000  -0.00000  -0.00000
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            </tableData>
          </table>
          </product>
        </function>
        <function name="aero/coefficient/Cnp">
          <description>Cn per p (non-dimensional), over alpha</description>
          <product>
            <property>aero/qbar-psf</property>
            <property>metrics/Sw-sqft</property>
            <property>metrics/bw-ft</property>
            <property>aero/bi2vel</property>
            <property>velocities/p-aero-rad_sec</property>
            <property>aero/function/mach-lift</property>
          <table>
            <independentVar lookup="row">aero/alpha-deg</independentVar>
            <tableData>
                 -180.00    0.10556
                 -165.00    0.11104
                  -32.00    0.01848
                  -10.00    0.03555
                    5.00   -0.00968
                   20.00    0.01474
                   46.00    0.07957
                  180.00    0.10556
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            </tableData>
          </table>
          </product>
        </function>
        <function name="aero/coefficient/Cnr">
          <description>Cn per r (non-dimensional), over alpha</description>
          <product>
            <property>aero/qbar-psf</property>
            <property>metrics/Sw-sqft</property>
            <property>metrics/bw-ft</property>
            <property>aero/bi2vel</property>
            <property>velocities/r-aero-rad_sec</property>
            <property>aero/function/mach-lift</property>
          <table>
            <independentVar lookup="row">aero/alpha-deg</independentVar>
            <tableData>
                 -180.00   -0.22072
                 -165.00   -0.22855
                  -32.00   -0.17724
                  -10.00   -0.17401
                    5.00   -0.17942
                   20.00   -0.17642
                   46.00   -0.28900
                  180.00   -0.22072
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            </tableData>
          </table>
          </product>
        </function>
      </axis>
    </aerodynamics>
</fdm_config>
