<?xml version="1.0"?>
<?xml-stylesheet type="text/xsl" href="http://jsbsim.sourceforge.net/JSBSim.xsl"?>
<!-- Generated by hangar 0.1.0 from mirage2000.toml on 2026-10-01. Edit the design and rebuild; changes
     made here are overwritten.  -->
<fdm_config name="mirage2000" version="2.0" release="ALPHA"
            xmlns:xsi="http://www.w3.org/2001/XMLSchema-instance"
            xsi:noNamespaceSchemaLocation="http://jsbsim.sourceforge.net/JSBSim.xsd">
    <fileheader>
      <author>hangar</author>
      <filecreationdate>2026-10-01</filecreationdate>
      <version>0.1.0</version>
      <description>Dassault Mirage 2000C (hangar build)</description>
      <note>Aerodynamics: vortex lattice with viscous section polars, full-envelope
        strip model, slender-body fuselage (hangar). Mass: Raymer component
        weights on the geometry. Propeller: blade-element momentum theory.</note>
      <reference refID="fsim/applicability/aerobatic" author="the design" title="Dassault Aviation: +9 g (fsim/envelope/clean/n_max)" date="n/a"/>
      <reference refID="fsim/applicability/carrier" author="the design" title="Dassault Aviation: a land-based fighter" date="n/a"/>
      <reference refID="fsim/applicability/drag_devices" author="the design" title="Jane's: airbrakes above and below the wings" date="n/a"/>
      <reference refID="fsim/applicability/flaps" author="the design" title="Dassault Aviation: a tailless delta whose elevons trim and control pitch, with no flap function" date="n/a"/>
      <reference refID="fsim/applicability/ground_contact" author="the design" title="Dassault Aviation: tricycle wheeled gear" date="n/a"/>
      <reference refID="fsim/applicability/releasable_stores" author="the design" title="Dassault Aviation: nine hardpoints" date="n/a"/>
      <reference refID="fsim/applicability/retractable_gear" author="the design" title="Dassault Aviation: retractable gear" date="n/a"/>
      <reference refID="fsim/applicability/vertical_flight" author="the design" title="Dassault Aviation and Jane's: a conventional take-off and landing fighter. Conventional take-off and landing: no rotors, lift fans or vectored lift to hover" date="n/a"/>
    </fileheader>
    <metrics>
      <wingarea unit="M2"> 41.6234 </wingarea>
      <wingspan unit="M"> 9.3400 </wingspan>
      <chord unit="M"> 5.5901 </chord>
      <htailarea unit="M2"> 0.0000 </htailarea>
      <htailarm unit="M"> 0.0000 </htailarm>
      <vtailarea unit="M2"> 5.3165 </vtailarea>
      <vtailarm unit="M"> 3.4904 </vtailarm>
      <location name="AERORP" unit="M">
        <x> 8.3350 </x>
        <y> 0.0000 </y>
        <z> 0.0000 </z>
      </location>
      <location name="EYEPOINT" unit="M">
        <x> 4.2000 </x>
        <y> 0.0000 </y>
        <z> 1.6000 </z>
      </location>
      <location name="VRP" unit="M">
        <x> 8.4310 </x>
        <y> 0.0000 </y>
        <z> 0.3000 </z>
      </location>
    </metrics>
    <mass_balance negated_crossproduct_inertia="false">
      <ixx unit="KG*M2"> 9421.44 </ixx>
      <iyy unit="KG*M2"> 61347.00 </iyy>
      <izz unit="KG*M2"> 65490.19 </izz>
      <ixy unit="KG*M2"> 0.049 </ixy>
      <ixz unit="KG*M2"> 3291.189 </ixz>
      <iyz unit="KG*M2"> 0.062 </iyz>
      <emptywt unit="KG"> 7500.00 </emptywt>
      <location name="CG" unit="M">
        <x> 8.4310 </x>
        <y> 0.0000 </y>
        <z> 0.3000 </z>
      </location>
      <pointmass name="pilot">
        <weight unit="KG"> 100.00 </weight>
        <location unit="M">
          <x> 4.2000 </x>
          <y> 0.0000 </y>
          <z> 0.9000 </z>
        </location>
      </pointmass>
      <pointmass name="gun ammunition">
        <weight unit="KG"> 125.00 </weight>
        <location unit="M">
          <x> 6.8400 </x>
          <y> 0.0000 </y>
          <z> -0.1000 </z>
        </location>
      </pointmass>
    </mass_balance>
    <ground_reactions>
      <contact type="BOGEY" name="Nose Gear">
        <location unit="M">
          <x> 3.9050 </x>
          <y> 0.0000 </y>
          <z> -1.5700 </z>
        </location>
        <static_friction> 0.8 </static_friction>
        <dynamic_friction> 0.5 </dynamic_friction>
        <rolling_friction> 0.02 </rolling_friction>
        <spring_coeff unit="N/M"> 109902 </spring_coeff>
        <damping_coeff unit="N/M/SEC"> 12157 </damping_coeff>
        <damping_coeff_rebound unit="N/M/SEC"> 24315 </damping_coeff_rebound>
        <max_steer unit="DEG"> 45.0 </max_steer>
        <brake_group> NONE </brake_group>
        <retractable> 1 </retractable>
      </contact>
      <contact type="BOGEY" name="Left Main Gear">
        <location unit="M">
          <x> 8.9600 </x>
          <y> -1.7000 </y>
          <z> -1.6100 </z>
        </location>
        <static_friction> 0.8 </static_friction>
        <dynamic_friction> 0.5 </dynamic_friction>
        <rolling_friction> 0.02 </rolling_friction>
        <spring_coeff unit="N/M"> 292366 </spring_coeff>
        <damping_coeff unit="N/M/SEC"> 37344 </damping_coeff>
        <damping_coeff_rebound unit="N/M/SEC"> 74689 </damping_coeff_rebound>
        <max_steer unit="DEG"> 0.0 </max_steer>
        <brake_group> LEFT </brake_group>
        <retractable> 1 </retractable>
      </contact>
      <contact type="BOGEY" name="Right Main Gear">
        <location unit="M">
          <x> 8.9600 </x>
          <y> 1.7000 </y>
          <z> -1.6100 </z>
        </location>
        <static_friction> 0.8 </static_friction>
        <dynamic_friction> 0.5 </dynamic_friction>
        <rolling_friction> 0.02 </rolling_friction>
        <spring_coeff unit="N/M"> 292366 </spring_coeff>
        <damping_coeff unit="N/M/SEC"> 37344 </damping_coeff>
        <damping_coeff_rebound unit="N/M/SEC"> 74689 </damping_coeff_rebound>
        <max_steer unit="DEG"> 0.0 </max_steer>
        <brake_group> RIGHT </brake_group>
        <retractable> 1 </retractable>
      </contact>
      <contact type="STRUCTURE" name="canopy front">
        <location unit="M">
          <x> 3.7488 </x>
          <y> 0.0000 </y>
          <z> 1.2408 </z>
        </location>
        <static_friction> 0.8 </static_friction>
        <dynamic_friction> 0.6 </dynamic_friction>
        <spring_coeff unit="N/M"> 1457460 </spring_coeff>
        <damping_coeff unit="N/M/SEC"> 48582 </damping_coeff>
        <damping_coeff_rebound unit="N/M/SEC"> 48582 </damping_coeff_rebound>
      </contact>
      <contact type="STRUCTURE" name="fin rear">
        <location unit="M">
          <x> 13.9800 </x>
          <y> 0.0000 </y>
          <z> 3.6000 </z>
        </location>
        <static_friction> 0.8 </static_friction>
        <dynamic_friction> 0.6 </dynamic_friction>
        <spring_coeff unit="N/M"> 566184 </spring_coeff>
        <damping_coeff unit="N/M/SEC"> 18873 </damping_coeff>
        <damping_coeff_rebound unit="N/M/SEC"> 18873 </damping_coeff_rebound>
      </contact>
      <contact type="STRUCTURE" name="fuselage front">
        <location unit="M">
          <x> 0.0000 </x>
          <y> 0.0000 </y>
          <z> 0.0600 </z>
        </location>
        <static_friction> 0.8 </static_friction>
        <dynamic_friction> 0.6 </dynamic_friction>
        <spring_coeff unit="N/M"> 696079 </spring_coeff>
        <damping_coeff unit="N/M/SEC"> 23203 </damping_coeff>
        <damping_coeff_rebound unit="N/M/SEC"> 23203 </damping_coeff_rebound>
      </contact>
      <contact type="STRUCTURE" name="fuselage rear">
        <location unit="M">
          <x> 14.3000 </x>
          <y> 0.0000 </y>
          <z> 0.1624 </z>
        </location>
        <static_friction> 0.8 </static_friction>
        <dynamic_friction> 0.6 </dynamic_friction>
        <spring_coeff unit="N/M"> 1294735 </spring_coeff>
        <damping_coeff unit="N/M/SEC"> 43158 </damping_coeff>
        <damping_coeff_rebound unit="N/M/SEC"> 43158 </damping_coeff_rebound>
      </contact>
      <contact type="STRUCTURE" name="wing left rear">
        <location unit="M">
          <x> 11.9900 </x>
          <y> -4.6700 </y>
          <z> -0.1200 </z>
        </location>
        <static_friction> 0.8 </static_friction>
        <dynamic_friction> 0.6 </dynamic_friction>
        <spring_coeff unit="N/M"> 328255 </spring_coeff>
        <damping_coeff unit="N/M/SEC"> 10942 </damping_coeff>
        <damping_coeff_rebound unit="N/M/SEC"> 10942 </damping_coeff_rebound>
      </contact>
      <contact type="STRUCTURE" name="wing right rear">
        <location unit="M">
          <x> 11.9900 </x>
          <y> 4.6700 </y>
          <z> -0.1200 </z>
        </location>
        <static_friction> 0.8 </static_friction>
        <dynamic_friction> 0.6 </dynamic_friction>
        <spring_coeff unit="N/M"> 328257 </spring_coeff>
        <damping_coeff unit="N/M/SEC"> 10942 </damping_coeff>
        <damping_coeff_rebound unit="N/M/SEC"> 10942 </damping_coeff_rebound>
      </contact>
    </ground_reactions>
    <propulsion>
      <engine file="mirage2000_engine0">
        <location unit="M">
          <x> 11.2000 </x>
          <y> 0.0000 </y>
          <z> 0.6200 </z>
        </location>
        <feed>0</feed>
        <feed>1</feed>
        <feed>2</feed>
        <feed>3</feed>
        <thruster file="mirage2000_nozzle0">
          <location unit="M">
            <x> 14.3600 </x>
            <y> 0.0000 </y>
            <z> 0.6200 </z>
          </location>
          <orient unit="DEG"> <roll>0.00</roll> <pitch>0.00</pitch> <yaw>0.00</yaw> </orient>

        </thruster>
      </engine>
      <tank type="FUEL">
        <location unit="M">
          <x> 7.0400 </x>
          <y> 0.0000 </y>
          <z> 0.3000 </z>
        </location>
        <capacity unit="KG"> 1100.00 </capacity>
        <contents unit="KG"> 1100.00 </contents>
      </tank>
      <tank type="FUEL">
        <location unit="M">
          <x> 8.9400 </x>
          <y> 0.0000 </y>
          <z> 0.3000 </z>
        </location>
        <capacity unit="KG"> 1000.00 </capacity>
        <contents unit="KG"> 1000.00 </contents>
      </tank>
      <tank type="FUEL">
        <location unit="M">
          <x> 9.0000 </x>
          <y> -2.0000 </y>
          <z> 0.0000 </z>
        </location>
        <capacity unit="KG"> 530.00 </capacity>
        <contents unit="KG"> 530.00 </contents>
      </tank>
      <tank type="FUEL">
        <location unit="M">
          <x> 9.0000 </x>
          <y> 2.0000 </y>
          <z> 0.0000 </z>
        </location>
        <capacity unit="KG"> 530.00 </capacity>
        <contents unit="KG"> 530.00 </contents>
      </tank>
    </propulsion>
    <flight_control name="mirage2000">
      <!-- the aircraft's profile for the platform (docs/control-architecture.md, section 7): what
           hangar knows of it - its design, its flight tests, its identified responses -->
      <property value="1">fsim/identity/version</property>
      <property value="1">fsim/identity/provenance</property>
      <property value="2">fsim/identity/class</property>
      <property value="2">fsim/identity/family</property>
      <property value="1">fsim/effectors/version</property>
      <property value="1">fsim/effectors/provenance</property>
      <property value="0.0">fsim/effectors/flaps</property>
      <property value="1">fsim/effectors/neutral</property>
      <property value="1">fsim/effectors/pitch</property>
      <property value="0.0">fsim/effectors/pitch_trim</property>
      <property value="1">fsim/effectors/retractable_gear</property>
      <property value="1">fsim/effectors/roll</property>
      <property value="1">fsim/effectors/speedbrake</property>
      <property value="1">fsim/effectors/speedbrake_approach</property>
      <property value="1">fsim/effectors/wheel_brakes</property>
      <property value="0.0">fsim/effectors/yaw</property>
      <property value="1">fsim/envelope/version</property>
      <property value="1">fsim/envelope/provenance</property>
      <property value="29">fsim/envelope/clean/alpha_max_deg</property>
      <property value="58.4138">fsim/envelope/clean/cas_min_ms</property>
      <property value="9">fsim/envelope/clean/n_max</property>
      <property value="-3.2">fsim/envelope/clean/n_min</property>
      <property value="270">fsim/envelope/clean/roll_rate_max_deg_s</property>
      <property value="15.43">fsim/envelope/crosswind_max_ms</property>
      <property value="133.76">fsim/envelope/gear_cas_max_ms</property>
      <property value="16.8">fsim/envelope/ground_pitch_max_deg</property>
      <property value="5.38">fsim/envelope/ground_turn_radius_m</property>
      <property value="0.4943">fsim/envelope/ground_yaw_accel_rad_s2</property>
      <property value="1">fsim/envelope/law_alpha</property>
      <property value="1">fsim/envelope/law_load_factor</property>
      <property value="1">fsim/envelope/law_roll_rate</property>
      <property value="1">fsim/propulsion/version</property>
      <property value="1">fsim/propulsion/provenance</property>
      <property value="1">fsim/propulsion/afterburner</property>
      <property value="1">fsim/propulsion/engines</property>
      <property value="0.168615">fsim/propulsion/spool_s</property>
      <property value="2">fsim/propulsion/type</property>
      <property value="1">fsim/plant/version</property>
      <property value="1">fsim/plant/provenance</property>
      <property value="-0.738806">fsim/plant/alpha_zero_lift_deg</property>
      <property value="3000">fsim/plant/altitude_m</property>
      <property value="111.043">fsim/plant/eas_ms</property>
      <property value="0.0">fsim/plant/elevator_trim</property>
      <property value="0.0">fsim/plant/elevator_trim_lift</property>
      <property value="11.7419">fsim/plant/pitch/gain</property>
      <property value="1.5025">fsim/plant/pitch/tau_s</property>
      <property value="4.65791">fsim/plant/roll/gain</property>
      <property value="0.209934">fsim/plant/roll/tau_s</property>
      <property value="5.68185">fsim/plant/speed/gain</property>
      <property value="0.168615">fsim/plant/speed/tau_s</property>
      <property value="126.953">fsim/plant/tas_ms</property>
      <property value="0.32817">fsim/plant/throttle_trim</property>
      <property value="0.105033">fsim/plant/yaw/gain</property>
      <property value="1">fsim/performance/version</property>
      <property value="1">fsim/performance/provenance</property>
      <property value="17871.9">fsim/performance/ceiling_m</property>
      <property value="273.908">fsim/performance/climb_ms</property>
      <property value="435.047">fsim/performance/max_tas_ms</property>
      <property value="1">fsim/applicability/version</property>
      <property value="1">fsim/applicability/provenance</property>
      <property value="1">fsim/applicability/aerobatic</property>
      <property value="1">fsim/applicability/carrier</property>
      <property value="2">fsim/applicability/drag_devices</property>
      <property value="0.0">fsim/applicability/flaps</property>
      <property value="1">fsim/applicability/ground_contact</property>
      <property value="2">fsim/applicability/releasable_stores</property>
      <property value="1">fsim/applicability/retractable_gear</property>
      <property value="0.0">fsim/applicability/vertical_flight</property>
      <property value="1">fsim/tables/version</property>
      <property value="1">fsim/tables/provenance</property>
      <property value="100">fsim/tables/altitude_m/h0</property>
      <property value="3570">fsim/tables/altitude_m/h1</property>
      <property value="7150">fsim/tables/altitude_m/h2</property>
      <property value="10720">fsim/tables/altitude_m/h3</property>
      <property value="13400">fsim/tables/altitude_m/h4</property>
      <property value="15190">fsim/tables/altitude_m/h5</property>
      <property value="16980">fsim/tables/altitude_m/h6</property>
      <property value="0.518831">fsim/tables/best_endurance_fuel_kg_s/h0/w0</property>
      <property value="0.410434">fsim/tables/best_endurance_fuel_kg_s/h0/w1</property>
      <property value="0.430249">fsim/tables/best_endurance_fuel_kg_s/h0/w2</property>
      <property value="0.280951">fsim/tables/best_endurance_fuel_kg_s/h1/w0</property>
      <property value="0.31745">fsim/tables/best_endurance_fuel_kg_s/h1/w1</property>
      <property value="0.356334">fsim/tables/best_endurance_fuel_kg_s/h1/w2</property>
      <property value="0.243256">fsim/tables/best_endurance_fuel_kg_s/h2/w0</property>
      <property value="0.274784">fsim/tables/best_endurance_fuel_kg_s/h2/w1</property>
      <property value="0.308046">fsim/tables/best_endurance_fuel_kg_s/h2/w2</property>
      <property value="0.206753">fsim/tables/best_endurance_fuel_kg_s/h3/w0</property>
      <property value="0.235407">fsim/tables/best_endurance_fuel_kg_s/h3/w1</property>
      <property value="0.26168">fsim/tables/best_endurance_fuel_kg_s/h3/w2</property>
      <property value="0.188393">fsim/tables/best_endurance_fuel_kg_s/h4/w0</property>
      <property value="1.28273">fsim/tables/best_endurance_fuel_kg_s/h4/w1</property>
      <property value="231.105">fsim/tables/best_endurance_tas_ms/h0/w0</property>
      <property value="179.304">fsim/tables/best_endurance_tas_ms/h0/w1</property>
      <property value="176.895">fsim/tables/best_endurance_tas_ms/h0/w2</property>
      <property value="149.277">fsim/tables/best_endurance_tas_ms/h1/w0</property>
      <property value="159.859">fsim/tables/best_endurance_tas_ms/h1/w1</property>
      <property value="170.115">fsim/tables/best_endurance_tas_ms/h1/w2</property>
      <property value="179.094">fsim/tables/best_endurance_tas_ms/h2/w0</property>
      <property value="192.348">fsim/tables/best_endurance_tas_ms/h2/w1</property>
      <property value="203.278">fsim/tables/best_endurance_tas_ms/h2/w2</property>
      <property value="218.418">fsim/tables/best_endurance_tas_ms/h3/w0</property>
      <property value="234.003">fsim/tables/best_endurance_tas_ms/h3/w1</property>
      <property value="251.053">fsim/tables/best_endurance_tas_ms/h3/w2</property>
      <property value="252.031">fsim/tables/best_endurance_tas_ms/h4/w0</property>
      <property value="337.64">fsim/tables/best_endurance_tas_ms/h4/w1</property>
      <property value="0.518831">fsim/tables/best_range_fuel_kg_s/h0/w0</property>
      <property value="0.454892">fsim/tables/best_range_fuel_kg_s/h0/w1</property>
      <property value="0.510431">fsim/tables/best_range_fuel_kg_s/h0/w2</property>
      <property value="0.356013">fsim/tables/best_range_fuel_kg_s/h1/w0</property>
      <property value="0.404454">fsim/tables/best_range_fuel_kg_s/h1/w1</property>
      <property value="0.452095">fsim/tables/best_range_fuel_kg_s/h1/w2</property>
      <property value="0.306603">fsim/tables/best_range_fuel_kg_s/h2/w0</property>
      <property value="0.346772">fsim/tables/best_range_fuel_kg_s/h2/w1</property>
      <property value="0.376516">fsim/tables/best_range_fuel_kg_s/h2/w2</property>
      <property value="0.234026">fsim/tables/best_range_fuel_kg_s/h3/w0</property>
      <property value="0.251717">fsim/tables/best_range_fuel_kg_s/h3/w1</property>
      <property value="0.270619">fsim/tables/best_range_fuel_kg_s/h3/w2</property>
      <property value="0.188576">fsim/tables/best_range_fuel_kg_s/h4/w0</property>
      <property value="1.28273">fsim/tables/best_range_fuel_kg_s/h4/w1</property>
      <property value="231.105">fsim/tables/best_range_tas_ms/h0/w0</property>
      <property value="201.015">fsim/tables/best_range_tas_ms/h0/w1</property>
      <property value="216.891">fsim/tables/best_range_tas_ms/h0/w2</property>
      <property value="221.975">fsim/tables/best_range_tas_ms/h1/w0</property>
      <property value="241.106">fsim/tables/best_range_tas_ms/h1/w1</property>
      <property value="258.708">fsim/tables/best_range_tas_ms/h1/w2</property>
      <property value="267.038">fsim/tables/best_range_tas_ms/h2/w0</property>
      <property value="287.86">fsim/tables/best_range_tas_ms/h2/w1</property>
      <property value="298.415">fsim/tables/best_range_tas_ms/h2/w2</property>
      <property value="287.042">fsim/tables/best_range_tas_ms/h3/w0</property>
      <property value="286.854">fsim/tables/best_range_tas_ms/h3/w1</property>
      <property value="287.545">fsim/tables/best_range_tas_ms/h3/w2</property>
      <property value="281.788">fsim/tables/best_range_tas_ms/h4/w0</property>
      <property value="337.64">fsim/tables/best_range_tas_ms/h4/w1</property>
      <property value="336.016">fsim/tables/climb_tas_ms/h0/w0</property>
      <property value="338.664">fsim/tables/climb_tas_ms/h0/w1</property>
      <property value="338.758">fsim/tables/climb_tas_ms/h0/w2</property>
      <property value="326.147">fsim/tables/climb_tas_ms/h1/w0</property>
      <property value="328.245">fsim/tables/climb_tas_ms/h1/w1</property>
      <property value="329.473">fsim/tables/climb_tas_ms/h1/w2</property>
      <property value="315.461">fsim/tables/climb_tas_ms/h2/w0</property>
      <property value="316.528">fsim/tables/climb_tas_ms/h2/w1</property>
      <property value="319.876">fsim/tables/climb_tas_ms/h2/w2</property>
      <property value="303.208">fsim/tables/climb_tas_ms/h3/w0</property>
      <property value="304.452">fsim/tables/climb_tas_ms/h3/w1</property>
      <property value="306.324">fsim/tables/climb_tas_ms/h3/w2</property>
      <property value="304.973">fsim/tables/climb_tas_ms/h4/w0</property>
      <property value="305.871">fsim/tables/climb_tas_ms/h4/w1</property>
      <property value="313.276">fsim/tables/climb_tas_ms/h4/w2</property>
      <property value="305.72">fsim/tables/climb_tas_ms/h5/w0</property>
      <property value="307.317">fsim/tables/climb_tas_ms/h5/w1</property>
      <property value="310.101">fsim/tables/climb_tas_ms/h5/w2</property>
      <property value="406.28">fsim/tables/climb_tas_ms/h6/w0</property>
      <property value="304.051">fsim/tables/climb_tas_ms/h6/w1</property>
      <property value="296.228">fsim/tables/climb_tas_ms/h6/w2</property>
      <property value="3160">fsim/tables/fuel_capacity_kg</property>
      <property value="0.518831">fsim/tables/fuel_kg_s/h0/w0/v0</property>
      <property value="0.555029">fsim/tables/fuel_kg_s/h0/w0/v1</property>
      <property value="1.11447">fsim/tables/fuel_kg_s/h0/w0/v10</property>
      <property value="5.16506">fsim/tables/fuel_kg_s/h0/w0/v11</property>
      <property value="0.592276">fsim/tables/fuel_kg_s/h0/w0/v2</property>
      <property value="0.631789">fsim/tables/fuel_kg_s/h0/w0/v3</property>
      <property value="0.675445">fsim/tables/fuel_kg_s/h0/w0/v4</property>
      <property value="0.720413">fsim/tables/fuel_kg_s/h0/w0/v5</property>
      <property value="0.766628">fsim/tables/fuel_kg_s/h0/w0/v6</property>
      <property value="0.813519">fsim/tables/fuel_kg_s/h0/w0/v7</property>
      <property value="0.862817">fsim/tables/fuel_kg_s/h0/w0/v8</property>
      <property value="0.914459">fsim/tables/fuel_kg_s/h0/w0/v9</property>
      <property value="0.410394">fsim/tables/fuel_kg_s/h0/w1/v0</property>
      <property value="0.442061">fsim/tables/fuel_kg_s/h0/w1/v1</property>
      <property value="0.899606">fsim/tables/fuel_kg_s/h0/w1/v10</property>
      <property value="1.02177">fsim/tables/fuel_kg_s/h0/w1/v11</property>
      <property value="5.61301">fsim/tables/fuel_kg_s/h0/w1/v12</property>
      <property value="0.479867">fsim/tables/fuel_kg_s/h0/w1/v2</property>
      <property value="0.52363">fsim/tables/fuel_kg_s/h0/w1/v3</property>
      <property value="0.568834">fsim/tables/fuel_kg_s/h0/w1/v4</property>
      <property value="0.61581">fsim/tables/fuel_kg_s/h0/w1/v5</property>
      <property value="0.664797">fsim/tables/fuel_kg_s/h0/w1/v6</property>
      <property value="0.717846">fsim/tables/fuel_kg_s/h0/w1/v7</property>
      <property value="0.776296">fsim/tables/fuel_kg_s/h0/w1/v8</property>
      <property value="0.835788">fsim/tables/fuel_kg_s/h0/w1/v9</property>
      <property value="0.430199">fsim/tables/fuel_kg_s/h0/w2/v0</property>
      <property value="0.459508">fsim/tables/fuel_kg_s/h0/w2/v1</property>
      <property value="0.898984">fsim/tables/fuel_kg_s/h0/w2/v10</property>
      <property value="0.967495">fsim/tables/fuel_kg_s/h0/w2/v11</property>
      <property value="5.39097">fsim/tables/fuel_kg_s/h0/w2/v12</property>
      <property value="0.493">fsim/tables/fuel_kg_s/h0/w2/v2</property>
      <property value="0.53173">fsim/tables/fuel_kg_s/h0/w2/v3</property>
      <property value="0.576489">fsim/tables/fuel_kg_s/h0/w2/v4</property>
      <property value="0.623095">fsim/tables/fuel_kg_s/h0/w2/v5</property>
      <property value="0.671791">fsim/tables/fuel_kg_s/h0/w2/v6</property>
      <property value="0.723104">fsim/tables/fuel_kg_s/h0/w2/v7</property>
      <property value="0.776898">fsim/tables/fuel_kg_s/h0/w2/v8</property>
      <property value="0.835332">fsim/tables/fuel_kg_s/h0/w2/v9</property>
      <property value="0.284491">fsim/tables/fuel_kg_s/h1/w0/v0</property>
      <property value="0.282407">fsim/tables/fuel_kg_s/h1/w0/v1</property>
      <property value="3.52083">fsim/tables/fuel_kg_s/h1/w0/v10</property>
      <property value="5.51646">fsim/tables/fuel_kg_s/h1/w0/v14</property>
      <property value="6.02509">fsim/tables/fuel_kg_s/h1/w0/v15</property>
      <property value="0.299391">fsim/tables/fuel_kg_s/h1/w0/v2</property>
      <property value="0.327452">fsim/tables/fuel_kg_s/h1/w0/v3</property>
      <property value="0.359839">fsim/tables/fuel_kg_s/h1/w0/v4</property>
      <property value="0.401774">fsim/tables/fuel_kg_s/h1/w0/v5</property>
      <property value="0.445991">fsim/tables/fuel_kg_s/h1/w0/v6</property>
      <property value="0.492653">fsim/tables/fuel_kg_s/h1/w0/v7</property>
      <property value="0.543479">fsim/tables/fuel_kg_s/h1/w0/v8</property>
      <property value="0.600633">fsim/tables/fuel_kg_s/h1/w0/v9</property>
      <property value="0.339036">fsim/tables/fuel_kg_s/h1/w1/v0</property>
      <property value="0.318389">fsim/tables/fuel_kg_s/h1/w1/v1</property>
      <property value="1.30461">fsim/tables/fuel_kg_s/h1/w1/v10</property>
      <property value="6.0316">fsim/tables/fuel_kg_s/h1/w1/v15</property>
      <property value="0.324779">fsim/tables/fuel_kg_s/h1/w1/v2</property>
      <property value="0.343056">fsim/tables/fuel_kg_s/h1/w1/v3</property>
      <property value="0.374195">fsim/tables/fuel_kg_s/h1/w1/v4</property>
      <property value="0.408535">fsim/tables/fuel_kg_s/h1/w1/v5</property>
      <property value="0.45263">fsim/tables/fuel_kg_s/h1/w1/v6</property>
      <property value="0.499152">fsim/tables/fuel_kg_s/h1/w1/v7</property>
      <property value="0.549144">fsim/tables/fuel_kg_s/h1/w1/v8</property>
      <property value="0.606273">fsim/tables/fuel_kg_s/h1/w1/v9</property>
      <property value="0.402113">fsim/tables/fuel_kg_s/h1/w2/v0</property>
      <property value="0.361823">fsim/tables/fuel_kg_s/h1/w2/v1</property>
      <property value="1.19957">fsim/tables/fuel_kg_s/h1/w2/v10</property>
      <property value="6.02045">fsim/tables/fuel_kg_s/h1/w2/v15</property>
      <property value="0.356654">fsim/tables/fuel_kg_s/h1/w2/v2</property>
      <property value="0.368401">fsim/tables/fuel_kg_s/h1/w2/v3</property>
      <property value="0.391143">fsim/tables/fuel_kg_s/h1/w2/v4</property>
      <property value="0.424037">fsim/tables/fuel_kg_s/h1/w2/v5</property>
      <property value="0.461327">fsim/tables/fuel_kg_s/h1/w2/v6</property>
      <property value="0.507185">fsim/tables/fuel_kg_s/h1/w2/v7</property>
      <property value="0.555774">fsim/tables/fuel_kg_s/h1/w2/v8</property>
      <property value="0.611708">fsim/tables/fuel_kg_s/h1/w2/v9</property>
      <property value="0.270139">fsim/tables/fuel_kg_s/h2/w0/v0</property>
      <property value="0.246097">fsim/tables/fuel_kg_s/h2/w0/v1</property>
      <property value="3.13745">fsim/tables/fuel_kg_s/h2/w0/v10</property>
      <property value="3.49595">fsim/tables/fuel_kg_s/h2/w0/v11</property>
      <property value="3.87868">fsim/tables/fuel_kg_s/h2/w0/v12</property>
      <property value="4.28065">fsim/tables/fuel_kg_s/h2/w0/v13</property>
      <property value="4.70703">fsim/tables/fuel_kg_s/h2/w0/v14</property>
      <property value="5.15465">fsim/tables/fuel_kg_s/h2/w0/v15</property>
      <property value="0.244496">fsim/tables/fuel_kg_s/h2/w0/v2</property>
      <property value="0.258558">fsim/tables/fuel_kg_s/h2/w0/v3</property>
      <property value="0.281525">fsim/tables/fuel_kg_s/h2/w0/v4</property>
      <property value="0.308335">fsim/tables/fuel_kg_s/h2/w0/v5</property>
      <property value="0.344081">fsim/tables/fuel_kg_s/h2/w0/v6</property>
      <property value="0.385437">fsim/tables/fuel_kg_s/h2/w0/v7</property>
      <property value="2.39407">fsim/tables/fuel_kg_s/h2/w0/v8</property>
      <property value="2.79753">fsim/tables/fuel_kg_s/h2/w0/v9</property>
      <property value="0.334687">fsim/tables/fuel_kg_s/h2/w1/v0</property>
      <property value="0.289048">fsim/tables/fuel_kg_s/h2/w1/v1</property>
      <property value="3.14581">fsim/tables/fuel_kg_s/h2/w1/v10</property>
      <property value="3.50122">fsim/tables/fuel_kg_s/h2/w1/v11</property>
      <property value="3.8804">fsim/tables/fuel_kg_s/h2/w1/v12</property>
      <property value="4.279">fsim/tables/fuel_kg_s/h2/w1/v13</property>
      <property value="4.69522">fsim/tables/fuel_kg_s/h2/w1/v14</property>
      <property value="5.12789">fsim/tables/fuel_kg_s/h2/w1/v15</property>
      <property value="0.27511">fsim/tables/fuel_kg_s/h2/w1/v2</property>
      <property value="0.281729">fsim/tables/fuel_kg_s/h2/w1/v3</property>
      <property value="0.29706">fsim/tables/fuel_kg_s/h2/w1/v4</property>
      <property value="0.322927">fsim/tables/fuel_kg_s/h2/w1/v5</property>
      <property value="0.351623">fsim/tables/fuel_kg_s/h2/w1/v6</property>
      <property value="0.389792">fsim/tables/fuel_kg_s/h2/w1/v7</property>
      <property value="2.37255">fsim/tables/fuel_kg_s/h2/w1/v8</property>
      <property value="2.78795">fsim/tables/fuel_kg_s/h2/w1/v9</property>
      <property value="0.335653">fsim/tables/fuel_kg_s/h2/w2/v1</property>
      <property value="3.14633">fsim/tables/fuel_kg_s/h2/w2/v10</property>
      <property value="3.4882">fsim/tables/fuel_kg_s/h2/w2/v11</property>
      <property value="3.85751">fsim/tables/fuel_kg_s/h2/w2/v12</property>
      <property value="4.24842">fsim/tables/fuel_kg_s/h2/w2/v13</property>
      <property value="4.65513">fsim/tables/fuel_kg_s/h2/w2/v14</property>
      <property value="5.0777">fsim/tables/fuel_kg_s/h2/w2/v15</property>
      <property value="0.310288">fsim/tables/fuel_kg_s/h2/w2/v2</property>
      <property value="0.308955">fsim/tables/fuel_kg_s/h2/w2/v3</property>
      <property value="0.319633">fsim/tables/fuel_kg_s/h2/w2/v4</property>
      <property value="0.338417">fsim/tables/fuel_kg_s/h2/w2/v5</property>
      <property value="0.365551">fsim/tables/fuel_kg_s/h2/w2/v6</property>
      <property value="0.399076">fsim/tables/fuel_kg_s/h2/w2/v7</property>
      <property value="0.849051">fsim/tables/fuel_kg_s/h2/w2/v8</property>
      <property value="2.78382">fsim/tables/fuel_kg_s/h2/w2/v9</property>
      <property value="0.220652">fsim/tables/fuel_kg_s/h3/w0/v1</property>
      <property value="2.68095">fsim/tables/fuel_kg_s/h3/w0/v10</property>
      <property value="3.00349">fsim/tables/fuel_kg_s/h3/w0/v11</property>
      <property value="3.34127">fsim/tables/fuel_kg_s/h3/w0/v12</property>
      <property value="3.69448">fsim/tables/fuel_kg_s/h3/w0/v13</property>
      <property value="4.06076">fsim/tables/fuel_kg_s/h3/w0/v14</property>
      <property value="4.4448">fsim/tables/fuel_kg_s/h3/w0/v15</property>
      <property value="0.207625">fsim/tables/fuel_kg_s/h3/w0/v2</property>
      <property value="0.210215">fsim/tables/fuel_kg_s/h3/w0/v3</property>
      <property value="0.222911">fsim/tables/fuel_kg_s/h3/w0/v4</property>
      <property value="0.24422">fsim/tables/fuel_kg_s/h3/w0/v5</property>
      <property value="1.53665">fsim/tables/fuel_kg_s/h3/w0/v6</property>
      <property value="1.8547">fsim/tables/fuel_kg_s/h3/w0/v7</property>
      <property value="2.11113">fsim/tables/fuel_kg_s/h3/w0/v8</property>
      <property value="2.38478">fsim/tables/fuel_kg_s/h3/w0/v9</property>
      <property value="2.69966">fsim/tables/fuel_kg_s/h3/w1/v10</property>
      <property value="3.00317">fsim/tables/fuel_kg_s/h3/w1/v11</property>
      <property value="3.31879">fsim/tables/fuel_kg_s/h3/w1/v12</property>
      <property value="3.66085">fsim/tables/fuel_kg_s/h3/w1/v13</property>
      <property value="4.01682">fsim/tables/fuel_kg_s/h3/w1/v14</property>
      <property value="4.38757">fsim/tables/fuel_kg_s/h3/w1/v15</property>
      <property value="0.239398">fsim/tables/fuel_kg_s/h3/w1/v2</property>
      <property value="0.235593">fsim/tables/fuel_kg_s/h3/w1/v3</property>
      <property value="0.243588">fsim/tables/fuel_kg_s/h3/w1/v4</property>
      <property value="0.258237">fsim/tables/fuel_kg_s/h3/w1/v5</property>
      <property value="1.57578">fsim/tables/fuel_kg_s/h3/w1/v6</property>
      <property value="1.92939">fsim/tables/fuel_kg_s/h3/w1/v7</property>
      <property value="2.15817">fsim/tables/fuel_kg_s/h3/w1/v8</property>
      <property value="2.40971">fsim/tables/fuel_kg_s/h3/w1/v9</property>
      <property value="2.73589">fsim/tables/fuel_kg_s/h3/w2/v10</property>
      <property value="3.02004">fsim/tables/fuel_kg_s/h3/w2/v11</property>
      <property value="3.32955">fsim/tables/fuel_kg_s/h3/w2/v12</property>
      <property value="3.6524">fsim/tables/fuel_kg_s/h3/w2/v13</property>
      <property value="3.98472">fsim/tables/fuel_kg_s/h3/w2/v14</property>
      <property value="4.33113">fsim/tables/fuel_kg_s/h3/w2/v15</property>
      <property value="0.274918">fsim/tables/fuel_kg_s/h3/w2/v2</property>
      <property value="0.26253">fsim/tables/fuel_kg_s/h3/w2/v3</property>
      <property value="0.264898">fsim/tables/fuel_kg_s/h3/w2/v4</property>
      <property value="0.274872">fsim/tables/fuel_kg_s/h3/w2/v5</property>
      <property value="1.62967">fsim/tables/fuel_kg_s/h3/w2/v6</property>
      <property value="2.03047">fsim/tables/fuel_kg_s/h3/w2/v7</property>
      <property value="2.24302">fsim/tables/fuel_kg_s/h3/w2/v8</property>
      <property value="2.47013">fsim/tables/fuel_kg_s/h3/w2/v9</property>
      <property value="1.98574">fsim/tables/fuel_kg_s/h4/w0/v10</property>
      <property value="2.18586">fsim/tables/fuel_kg_s/h4/w0/v11</property>
      <property value="2.40586">fsim/tables/fuel_kg_s/h4/w0/v12</property>
      <property value="2.63514">fsim/tables/fuel_kg_s/h4/w0/v13</property>
      <property value="2.8745">fsim/tables/fuel_kg_s/h4/w0/v14</property>
      <property value="3.12522">fsim/tables/fuel_kg_s/h4/w0/v15</property>
      <property value="0.188393">fsim/tables/fuel_kg_s/h4/w0/v3</property>
      <property value="0.188582">fsim/tables/fuel_kg_s/h4/w0/v4</property>
      <property value="0.239018">fsim/tables/fuel_kg_s/h4/w0/v5</property>
      <property value="1.25187">fsim/tables/fuel_kg_s/h4/w0/v6</property>
      <property value="1.46939">fsim/tables/fuel_kg_s/h4/w0/v7</property>
      <property value="1.62148">fsim/tables/fuel_kg_s/h4/w0/v8</property>
      <property value="1.79275">fsim/tables/fuel_kg_s/h4/w0/v9</property>
      <property value="2.00328">fsim/tables/fuel_kg_s/h4/w1/v10</property>
      <property value="2.1838">fsim/tables/fuel_kg_s/h4/w1/v11</property>
      <property value="2.3663">fsim/tables/fuel_kg_s/h4/w1/v12</property>
      <property value="2.56944">fsim/tables/fuel_kg_s/h4/w1/v13</property>
      <property value="2.7778">fsim/tables/fuel_kg_s/h4/w1/v14</property>
      <property value="1.28273">fsim/tables/fuel_kg_s/h4/w1/v6</property>
      <property value="1.7099">fsim/tables/fuel_kg_s/h4/w1/v8</property>
      <property value="1.84089">fsim/tables/fuel_kg_s/h4/w1/v9</property>
      <property value="2.11132">fsim/tables/fuel_kg_s/h4/w2/v10</property>
      <property value="2.26714">fsim/tables/fuel_kg_s/h4/w2/v11</property>
      <property value="1.32769">fsim/tables/fuel_kg_s/h5/w1/v0</property>
      <property value="1.04338">fsim/tables/fuel_kg_s/h6/w0/v1</property>
      <property value="1.08046">fsim/tables/fuel_kg_s/h6/w1/v0</property>
      <property value="1.12265">fsim/tables/fuel_kg_s/h6/w2/v8</property>
      <property value="344.518">fsim/tables/max_climb_ms/h0/w0</property>
      <property value="294.899">fsim/tables/max_climb_ms/h0/w1</property>
      <property value="257.664">fsim/tables/max_climb_ms/h0/w2</property>
      <property value="276.756">fsim/tables/max_climb_ms/h1/w0</property>
      <property value="236.276">fsim/tables/max_climb_ms/h1/w1</property>
      <property value="205.705">fsim/tables/max_climb_ms/h1/w2</property>
      <property value="212.6">fsim/tables/max_climb_ms/h2/w0</property>
      <property value="180.394">fsim/tables/max_climb_ms/h2/w1</property>
      <property value="156.021">fsim/tables/max_climb_ms/h2/w2</property>
      <property value="153.703">fsim/tables/max_climb_ms/h3/w0</property>
      <property value="128.674">fsim/tables/max_climb_ms/h3/w1</property>
      <property value="110.081">fsim/tables/max_climb_ms/h3/w2</property>
      <property value="100.663">fsim/tables/max_climb_ms/h4/w0</property>
      <property value="81.9255">fsim/tables/max_climb_ms/h4/w1</property>
      <property value="62.6228">fsim/tables/max_climb_ms/h4/w2</property>
      <property value="66.9147">fsim/tables/max_climb_ms/h5/w0</property>
      <property value="50.7511">fsim/tables/max_climb_ms/h5/w1</property>
      <property value="38.3867">fsim/tables/max_climb_ms/h5/w2</property>
      <property value="44.9273">fsim/tables/max_climb_ms/h6/w0</property>
      <property value="27.8893">fsim/tables/max_climb_ms/h6/w1</property>
      <property value="13.3771">fsim/tables/max_climb_ms/h6/w2</property>
      <property value="436.179">fsim/tables/max_tas_ms/h0/w0</property>
      <property value="435.65">fsim/tables/max_tas_ms/h0/w1</property>
      <property value="434.87">fsim/tables/max_tas_ms/h0/w2</property>
      <property value="483.341">fsim/tables/max_tas_ms/h1/w0</property>
      <property value="482.735">fsim/tables/max_tas_ms/h1/w1</property>
      <property value="480.597">fsim/tables/max_tas_ms/h1/w2</property>
      <property value="548.935">fsim/tables/max_tas_ms/h2/w0</property>
      <property value="543.803">fsim/tables/max_tas_ms/h2/w1</property>
      <property value="536.447">fsim/tables/max_tas_ms/h2/w2</property>
      <property value="634.673">fsim/tables/max_tas_ms/h3/w0</property>
      <property value="624.101">fsim/tables/max_tas_ms/h3/w1</property>
      <property value="614.158">fsim/tables/max_tas_ms/h3/w2</property>
      <property value="641.466">fsim/tables/max_tas_ms/h4/w0</property>
      <property value="614.039">fsim/tables/max_tas_ms/h4/w1</property>
      <property value="600.369">fsim/tables/max_tas_ms/h4/w2</property>
      <property value="564.876">fsim/tables/max_tas_ms/h5/w0</property>
      <property value="529.842">fsim/tables/max_tas_ms/h5/w1</property>
      <property value="420.383">fsim/tables/max_tas_ms/h5/w2</property>
      <property value="460.54">fsim/tables/max_tas_ms/h6/w0</property>
      <property value="392.201">fsim/tables/max_tas_ms/h6/w1</property>
      <property value="358.667">fsim/tables/max_tas_ms/h6/w2</property>
      <property value="231.105">fsim/tables/min_tas_ms/h0/w0</property>
      <property value="179.304">fsim/tables/min_tas_ms/h0/w1</property>
      <property value="176.895">fsim/tables/min_tas_ms/h0/w2</property>
      <property value="135.795">fsim/tables/min_tas_ms/h1/w0</property>
      <property value="131.545">fsim/tables/min_tas_ms/h1/w1</property>
      <property value="129.661">fsim/tables/min_tas_ms/h1/w2</property>
      <property value="136.884">fsim/tables/min_tas_ms/h2/w0</property>
      <property value="135.473">fsim/tables/min_tas_ms/h2/w1</property>
      <property value="136.514">fsim/tables/min_tas_ms/h2/w2</property>
      <property value="145.261">fsim/tables/min_tas_ms/h3/w0</property>
      <property value="147.974">fsim/tables/min_tas_ms/h3/w1</property>
      <property value="152.387">fsim/tables/min_tas_ms/h3/w2</property>
      <property value="159.52">fsim/tables/min_tas_ms/h4/w0</property>
      <property value="165.638">fsim/tables/min_tas_ms/h4/w1</property>
      <property value="172.231">fsim/tables/min_tas_ms/h4/w2</property>
      <property value="171.936">fsim/tables/min_tas_ms/h5/w0</property>
      <property value="183.57">fsim/tables/min_tas_ms/h5/w1</property>
      <property value="221.643">fsim/tables/min_tas_ms/h5/w2</property>
      <property value="186.719">fsim/tables/min_tas_ms/h6/w0</property>
      <property value="234.385">fsim/tables/min_tas_ms/h6/w1</property>
      <property value="283.238">fsim/tables/min_tas_ms/h6/w2</property>
      <property value="255.647">fsim/tables/ps_full_ms/h0/w0/v0</property>
      <property value="268.388">fsim/tables/ps_full_ms/h0/w0/v1</property>
      <property value="284.22">fsim/tables/ps_full_ms/h0/w0/v10</property>
      <property value="180.769">fsim/tables/ps_full_ms/h0/w0/v11</property>
      <property value="93.0296">fsim/tables/ps_full_ms/h0/w0/v12</property>
      <property value="71.4149">fsim/tables/ps_full_ms/h0/w0/v13</property>
      <property value="48.5076">fsim/tables/ps_full_ms/h0/w0/v14</property>
      <property value="26.1768">fsim/tables/ps_full_ms/h0/w0/v15</property>
      <property value="280.77">fsim/tables/ps_full_ms/h0/w0/v2</property>
      <property value="292.802">fsim/tables/ps_full_ms/h0/w0/v3</property>
      <property value="304.489">fsim/tables/ps_full_ms/h0/w0/v4</property>
      <property value="315.816">fsim/tables/ps_full_ms/h0/w0/v5</property>
      <property value="326.779">fsim/tables/ps_full_ms/h0/w0/v6</property>
      <property value="337.354">fsim/tables/ps_full_ms/h0/w0/v7</property>
      <property value="344.481">fsim/tables/ps_full_ms/h0/w0/v8</property>
      <property value="331.016">fsim/tables/ps_full_ms/h0/w0/v9</property>
      <property value="170.802">fsim/tables/ps_full_ms/h0/w1/v0</property>
      <property value="185.741">fsim/tables/ps_full_ms/h0/w1/v1</property>
      <property value="293.097">fsim/tables/ps_full_ms/h0/w1/v10</property>
      <property value="254.224">fsim/tables/ps_full_ms/h0/w1/v11</property>
      <property value="124.355">fsim/tables/ps_full_ms/h0/w1/v12</property>
      <property value="70.709">fsim/tables/ps_full_ms/h0/w1/v13</property>
      <property value="46.5094">fsim/tables/ps_full_ms/h0/w1/v14</property>
      <property value="21.7716">fsim/tables/ps_full_ms/h0/w1/v15</property>
      <property value="200.051">fsim/tables/ps_full_ms/h0/w1/v2</property>
      <property value="213.936">fsim/tables/ps_full_ms/h0/w1/v3</property>
      <property value="227.366">fsim/tables/ps_full_ms/h0/w1/v4</property>
      <property value="240.366">fsim/tables/ps_full_ms/h0/w1/v5</property>
      <property value="253.192">fsim/tables/ps_full_ms/h0/w1/v6</property>
      <property value="265.785">fsim/tables/ps_full_ms/h0/w1/v7</property>
      <property value="277.831">fsim/tables/ps_full_ms/h0/w1/v8</property>
      <property value="289.2">fsim/tables/ps_full_ms/h0/w1/v9</property>
      <property value="145.28">fsim/tables/ps_full_ms/h0/w2/v0</property>
      <property value="158.66">fsim/tables/ps_full_ms/h0/w2/v1</property>
      <property value="257.473">fsim/tables/ps_full_ms/h0/w2/v10</property>
      <property value="230.225">fsim/tables/ps_full_ms/h0/w2/v11</property>
      <property value="112.641">fsim/tables/ps_full_ms/h0/w2/v12</property>
      <property value="62.2246">fsim/tables/ps_full_ms/h0/w2/v13</property>
      <property value="41.5813">fsim/tables/ps_full_ms/h0/w2/v14</property>
      <property value="19.1293">fsim/tables/ps_full_ms/h0/w2/v15</property>
      <property value="171.365">fsim/tables/ps_full_ms/h0/w2/v2</property>
      <property value="183.622">fsim/tables/ps_full_ms/h0/w2/v3</property>
      <property value="195.337">fsim/tables/ps_full_ms/h0/w2/v4</property>
      <property value="206.602">fsim/tables/ps_full_ms/h0/w2/v5</property>
      <property value="217.725">fsim/tables/ps_full_ms/h0/w2/v6</property>
      <property value="228.715">fsim/tables/ps_full_ms/h0/w2/v7</property>
      <property value="239.231">fsim/tables/ps_full_ms/h0/w2/v8</property>
      <property value="249.532">fsim/tables/ps_full_ms/h0/w2/v9</property>
      <property value="120.016">fsim/tables/ps_full_ms/h1/w0/v0</property>
      <property value="140.93">fsim/tables/ps_full_ms/h1/w0/v1</property>
      <property value="177.599">fsim/tables/ps_full_ms/h1/w0/v10</property>
      <property value="120.739">fsim/tables/ps_full_ms/h1/w0/v11</property>
      <property value="101.221">fsim/tables/ps_full_ms/h1/w0/v12</property>
      <property value="80.6412">fsim/tables/ps_full_ms/h1/w0/v13</property>
      <property value="53.6943">fsim/tables/ps_full_ms/h1/w0/v14</property>
      <property value="22.7486">fsim/tables/ps_full_ms/h1/w0/v15</property>
      <property value="160.446">fsim/tables/ps_full_ms/h1/w0/v2</property>
      <property value="179.685">fsim/tables/ps_full_ms/h1/w0/v3</property>
      <property value="198.57">fsim/tables/ps_full_ms/h1/w0/v4</property>
      <property value="216.833">fsim/tables/ps_full_ms/h1/w0/v5</property>
      <property value="235.051">fsim/tables/ps_full_ms/h1/w0/v6</property>
      <property value="253.017">fsim/tables/ps_full_ms/h1/w0/v7</property>
      <property value="270.288">fsim/tables/ps_full_ms/h1/w0/v8</property>
      <property value="268.446">fsim/tables/ps_full_ms/h1/w0/v9</property>
      <property value="96.0288">fsim/tables/ps_full_ms/h1/w1/v0</property>
      <property value="114.951">fsim/tables/ps_full_ms/h1/w1/v1</property>
      <property value="156.861">fsim/tables/ps_full_ms/h1/w1/v10</property>
      <property value="102.485">fsim/tables/ps_full_ms/h1/w1/v11</property>
      <property value="84.4458">fsim/tables/ps_full_ms/h1/w1/v12</property>
      <property value="68.1907">fsim/tables/ps_full_ms/h1/w1/v13</property>
      <property value="44.2592">fsim/tables/ps_full_ms/h1/w1/v14</property>
      <property value="18.5742">fsim/tables/ps_full_ms/h1/w1/v15</property>
      <property value="131.959">fsim/tables/ps_full_ms/h1/w1/v2</property>
      <property value="148.493">fsim/tables/ps_full_ms/h1/w1/v3</property>
      <property value="164.731">fsim/tables/ps_full_ms/h1/w1/v4</property>
      <property value="180.679">fsim/tables/ps_full_ms/h1/w1/v5</property>
      <property value="196.361">fsim/tables/ps_full_ms/h1/w1/v6</property>
      <property value="211.67">fsim/tables/ps_full_ms/h1/w1/v7</property>
      <property value="226.688">fsim/tables/ps_full_ms/h1/w1/v8</property>
      <property value="233.88">fsim/tables/ps_full_ms/h1/w1/v9</property>
      <property value="79.1961">fsim/tables/ps_full_ms/h1/w2/v0</property>
      <property value="96.7314">fsim/tables/ps_full_ms/h1/w2/v1</property>
      <property value="144.627">fsim/tables/ps_full_ms/h1/w2/v10</property>
      <property value="89.183">fsim/tables/ps_full_ms/h1/w2/v11</property>
      <property value="71.0761">fsim/tables/ps_full_ms/h1/w2/v12</property>
      <property value="58.1745">fsim/tables/ps_full_ms/h1/w2/v13</property>
      <property value="38.6657">fsim/tables/ps_full_ms/h1/w2/v14</property>
      <property value="16.2132">fsim/tables/ps_full_ms/h1/w2/v15</property>
      <property value="111.75">fsim/tables/ps_full_ms/h1/w2/v2</property>
      <property value="126.191">fsim/tables/ps_full_ms/h1/w2/v3</property>
      <property value="140.4">fsim/tables/ps_full_ms/h1/w2/v4</property>
      <property value="154.139">fsim/tables/ps_full_ms/h1/w2/v5</property>
      <property value="167.827">fsim/tables/ps_full_ms/h1/w2/v6</property>
      <property value="181.509">fsim/tables/ps_full_ms/h1/w2/v7</property>
      <property value="194.841">fsim/tables/ps_full_ms/h1/w2/v8</property>
      <property value="205.489">fsim/tables/ps_full_ms/h1/w2/v9</property>
      <property value="87.9185">fsim/tables/ps_full_ms/h2/w0/v0</property>
      <property value="108.676">fsim/tables/ps_full_ms/h2/w0/v1</property>
      <property value="114.83">fsim/tables/ps_full_ms/h2/w0/v10</property>
      <property value="103.8">fsim/tables/ps_full_ms/h2/w0/v11</property>
      <property value="87.0604">fsim/tables/ps_full_ms/h2/w0/v12</property>
      <property value="70.2006">fsim/tables/ps_full_ms/h2/w0/v13</property>
      <property value="47.3862">fsim/tables/ps_full_ms/h2/w0/v14</property>
      <property value="21.3418">fsim/tables/ps_full_ms/h2/w0/v15</property>
      <property value="127.391">fsim/tables/ps_full_ms/h2/w0/v2</property>
      <property value="145.805">fsim/tables/ps_full_ms/h2/w0/v3</property>
      <property value="164.078">fsim/tables/ps_full_ms/h2/w0/v4</property>
      <property value="182.778">fsim/tables/ps_full_ms/h2/w0/v5</property>
      <property value="200.997">fsim/tables/ps_full_ms/h2/w0/v6</property>
      <property value="209.858">fsim/tables/ps_full_ms/h2/w0/v7</property>
      <property value="138.748">fsim/tables/ps_full_ms/h2/w0/v8</property>
      <property value="122.247">fsim/tables/ps_full_ms/h2/w0/v9</property>
      <property value="69.6588">fsim/tables/ps_full_ms/h2/w1/v0</property>
      <property value="88.5809">fsim/tables/ps_full_ms/h2/w1/v1</property>
      <property value="95.7619">fsim/tables/ps_full_ms/h2/w1/v10</property>
      <property value="84.5219">fsim/tables/ps_full_ms/h2/w1/v11</property>
      <property value="71.4554">fsim/tables/ps_full_ms/h2/w1/v12</property>
      <property value="57.3968">fsim/tables/ps_full_ms/h2/w1/v13</property>
      <property value="38.2218">fsim/tables/ps_full_ms/h2/w1/v14</property>
      <property value="17.5627">fsim/tables/ps_full_ms/h2/w1/v15</property>
      <property value="104.579">fsim/tables/ps_full_ms/h2/w1/v2</property>
      <property value="120.151">fsim/tables/ps_full_ms/h2/w1/v3</property>
      <property value="135.811">fsim/tables/ps_full_ms/h2/w1/v4</property>
      <property value="151.49">fsim/tables/ps_full_ms/h2/w1/v5</property>
      <property value="166.798">fsim/tables/ps_full_ms/h2/w1/v6</property>
      <property value="180.29">fsim/tables/ps_full_ms/h2/w1/v7</property>
      <property value="120.554">fsim/tables/ps_full_ms/h2/w1/v8</property>
      <property value="102.568">fsim/tables/ps_full_ms/h2/w1/v9</property>
      <property value="56.7134">fsim/tables/ps_full_ms/h2/w2/v0</property>
      <property value="74.2977">fsim/tables/ps_full_ms/h2/w2/v1</property>
      <property value="80.8593">fsim/tables/ps_full_ms/h2/w2/v10</property>
      <property value="71.5261">fsim/tables/ps_full_ms/h2/w2/v11</property>
      <property value="61.3901">fsim/tables/ps_full_ms/h2/w2/v12</property>
      <property value="48.3214">fsim/tables/ps_full_ms/h2/w2/v13</property>
      <property value="32.6319">fsim/tables/ps_full_ms/h2/w2/v14</property>
      <property value="15.0928">fsim/tables/ps_full_ms/h2/w2/v15</property>
      <property value="88.1609">fsim/tables/ps_full_ms/h2/w2/v2</property>
      <property value="101.596">fsim/tables/ps_full_ms/h2/w2/v3</property>
      <property value="115.134">fsim/tables/ps_full_ms/h2/w2/v4</property>
      <property value="128.751">fsim/tables/ps_full_ms/h2/w2/v5</property>
      <property value="141.911">fsim/tables/ps_full_ms/h2/w2/v6</property>
      <property value="155.377">fsim/tables/ps_full_ms/h2/w2/v7</property>
      <property value="110.205">fsim/tables/ps_full_ms/h2/w2/v8</property>
      <property value="88.0902">fsim/tables/ps_full_ms/h2/w2/v9</property>
      <property value="61.5236">fsim/tables/ps_full_ms/h3/w0/v0</property>
      <property value="82.0888">fsim/tables/ps_full_ms/h3/w0/v1</property>
      <property value="96.4606">fsim/tables/ps_full_ms/h3/w0/v10</property>
      <property value="87.6589">fsim/tables/ps_full_ms/h3/w0/v11</property>
      <property value="75.2015">fsim/tables/ps_full_ms/h3/w0/v12</property>
      <property value="61.4874">fsim/tables/ps_full_ms/h3/w0/v13</property>
      <property value="44.5938">fsim/tables/ps_full_ms/h3/w0/v14</property>
      <property value="20.928">fsim/tables/ps_full_ms/h3/w0/v15</property>
      <property value="100.072">fsim/tables/ps_full_ms/h3/w0/v2</property>
      <property value="117.789">fsim/tables/ps_full_ms/h3/w0/v3</property>
      <property value="136.193">fsim/tables/ps_full_ms/h3/w0/v4</property>
      <property value="153.467">fsim/tables/ps_full_ms/h3/w0/v5</property>
      <property value="110.591">fsim/tables/ps_full_ms/h3/w0/v6</property>
      <property value="105.416">fsim/tables/ps_full_ms/h3/w0/v7</property>
      <property value="107.436">fsim/tables/ps_full_ms/h3/w0/v8</property>
      <property value="101.144">fsim/tables/ps_full_ms/h3/w0/v9</property>
      <property value="47.51">fsim/tables/ps_full_ms/h3/w1/v0</property>
      <property value="66.2241">fsim/tables/ps_full_ms/h3/w1/v1</property>
      <property value="77.7704">fsim/tables/ps_full_ms/h3/w1/v10</property>
      <property value="69.4936">fsim/tables/ps_full_ms/h3/w1/v11</property>
      <property value="61.6574">fsim/tables/ps_full_ms/h3/w1/v12</property>
      <property value="49.4883">fsim/tables/ps_full_ms/h3/w1/v13</property>
      <property value="35.7807">fsim/tables/ps_full_ms/h3/w1/v14</property>
      <property value="17.62">fsim/tables/ps_full_ms/h3/w1/v15</property>
      <property value="81.6373">fsim/tables/ps_full_ms/h3/w1/v2</property>
      <property value="96.7618">fsim/tables/ps_full_ms/h3/w1/v3</property>
      <property value="112.271">fsim/tables/ps_full_ms/h3/w1/v4</property>
      <property value="127.524">fsim/tables/ps_full_ms/h3/w1/v5</property>
      <property value="90.5762">fsim/tables/ps_full_ms/h3/w1/v6</property>
      <property value="83.3705">fsim/tables/ps_full_ms/h3/w1/v7</property>
      <property value="85.2155">fsim/tables/ps_full_ms/h3/w1/v8</property>
      <property value="80.4109">fsim/tables/ps_full_ms/h3/w1/v9</property>
      <property value="37.2834">fsim/tables/ps_full_ms/h3/w2/v0</property>
      <property value="54.375">fsim/tables/ps_full_ms/h3/w2/v1</property>
      <property value="62.0571">fsim/tables/ps_full_ms/h3/w2/v10</property>
      <property value="56.2879">fsim/tables/ps_full_ms/h3/w2/v11</property>
      <property value="48.701">fsim/tables/ps_full_ms/h3/w2/v12</property>
      <property value="39.1964">fsim/tables/ps_full_ms/h3/w2/v13</property>
      <property value="28.9559">fsim/tables/ps_full_ms/h3/w2/v14</property>
      <property value="15.221">fsim/tables/ps_full_ms/h3/w2/v15</property>
      <property value="67.9695">fsim/tables/ps_full_ms/h3/w2/v2</property>
      <property value="81.5245">fsim/tables/ps_full_ms/h3/w2/v3</property>
      <property value="94.7299">fsim/tables/ps_full_ms/h3/w2/v4</property>
      <property value="108.433">fsim/tables/ps_full_ms/h3/w2/v5</property>
      <property value="75.8137">fsim/tables/ps_full_ms/h3/w2/v6</property>
      <property value="65.9223">fsim/tables/ps_full_ms/h3/w2/v7</property>
      <property value="67.5874">fsim/tables/ps_full_ms/h3/w2/v8</property>
      <property value="64.7791">fsim/tables/ps_full_ms/h3/w2/v9</property>
      <property value="34.6494">fsim/tables/ps_full_ms/h4/w0/v0</property>
      <property value="50.5376">fsim/tables/ps_full_ms/h4/w0/v1</property>
      <property value="55.987">fsim/tables/ps_full_ms/h4/w0/v10</property>
      <property value="51.448">fsim/tables/ps_full_ms/h4/w0/v11</property>
      <property value="43.9929">fsim/tables/ps_full_ms/h4/w0/v12</property>
      <property value="35.4111">fsim/tables/ps_full_ms/h4/w0/v13</property>
      <property value="24.5794">fsim/tables/ps_full_ms/h4/w0/v14</property>
      <property value="12.7999">fsim/tables/ps_full_ms/h4/w0/v15</property>
      <property value="64.3117">fsim/tables/ps_full_ms/h4/w0/v2</property>
      <property value="78.4398">fsim/tables/ps_full_ms/h4/w0/v3</property>
      <property value="91.7264">fsim/tables/ps_full_ms/h4/w0/v4</property>
      <property value="94.4567">fsim/tables/ps_full_ms/h4/w0/v5</property>
      <property value="66.5772">fsim/tables/ps_full_ms/h4/w0/v6</property>
      <property value="63.258">fsim/tables/ps_full_ms/h4/w0/v7</property>
      <property value="60.6882">fsim/tables/ps_full_ms/h4/w0/v8</property>
      <property value="60.8416">fsim/tables/ps_full_ms/h4/w0/v9</property>
      <property value="22.865">fsim/tables/ps_full_ms/h4/w1/v0</property>
      <property value="37.2152">fsim/tables/ps_full_ms/h4/w1/v1</property>
      <property value="40.5037">fsim/tables/ps_full_ms/h4/w1/v10</property>
      <property value="36.6221">fsim/tables/ps_full_ms/h4/w1/v11</property>
      <property value="32.2433">fsim/tables/ps_full_ms/h4/w1/v12</property>
      <property value="25.8493">fsim/tables/ps_full_ms/h4/w1/v13</property>
      <property value="19.0071">fsim/tables/ps_full_ms/h4/w1/v14</property>
      <property value="10.2055">fsim/tables/ps_full_ms/h4/w1/v15</property>
      <property value="49.4913">fsim/tables/ps_full_ms/h4/w1/v2</property>
      <property value="61.5593">fsim/tables/ps_full_ms/h4/w1/v3</property>
      <property value="72.7179">fsim/tables/ps_full_ms/h4/w1/v4</property>
      <property value="80.9569">fsim/tables/ps_full_ms/h4/w1/v5</property>
      <property value="51.8031">fsim/tables/ps_full_ms/h4/w1/v6</property>
      <property value="41.3309">fsim/tables/ps_full_ms/h4/w1/v7</property>
      <property value="41.1924">fsim/tables/ps_full_ms/h4/w1/v8</property>
      <property value="42.2984">fsim/tables/ps_full_ms/h4/w1/v9</property>
      <property value="15.9013">fsim/tables/ps_full_ms/h4/w2/v0</property>
      <property value="29.022">fsim/tables/ps_full_ms/h4/w2/v1</property>
      <property value="28.0539">fsim/tables/ps_full_ms/h4/w2/v10</property>
      <property value="26.7446">fsim/tables/ps_full_ms/h4/w2/v11</property>
      <property value="22.5005">fsim/tables/ps_full_ms/h4/w2/v12</property>
      <property value="17.9114">fsim/tables/ps_full_ms/h4/w2/v13</property>
      <property value="11.7516">fsim/tables/ps_full_ms/h4/w2/v14</property>
      <property value="5.32797">fsim/tables/ps_full_ms/h4/w2/v15</property>
      <property value="40.7192">fsim/tables/ps_full_ms/h4/w2/v2</property>
      <property value="51.4475">fsim/tables/ps_full_ms/h4/w2/v3</property>
      <property value="61.3497">fsim/tables/ps_full_ms/h4/w2/v4</property>
      <property value="62.5031">fsim/tables/ps_full_ms/h4/w2/v5</property>
      <property value="39.5957">fsim/tables/ps_full_ms/h4/w2/v6</property>
      <property value="31.9818">fsim/tables/ps_full_ms/h4/w2/v7</property>
      <property value="30.6725">fsim/tables/ps_full_ms/h4/w2/v8</property>
      <property value="29.3632">fsim/tables/ps_full_ms/h4/w2/v9</property>
      <property value="15.9704">fsim/tables/ps_full_ms/h5/w0/v0</property>
      <property value="26.0384">fsim/tables/ps_full_ms/h5/w0/v1</property>
      <property value="22.8148">fsim/tables/ps_full_ms/h5/w0/v10</property>
      <property value="22.4225">fsim/tables/ps_full_ms/h5/w0/v11</property>
      <property value="21.551">fsim/tables/ps_full_ms/h5/w0/v12</property>
      <property value="17.7231">fsim/tables/ps_full_ms/h5/w0/v13</property>
      <property value="12.802">fsim/tables/ps_full_ms/h5/w0/v14</property>
      <property value="7.69806">fsim/tables/ps_full_ms/h5/w0/v15</property>
      <property value="36.8431">fsim/tables/ps_full_ms/h5/w0/v2</property>
      <property value="46.3197">fsim/tables/ps_full_ms/h5/w0/v3</property>
      <property value="56.1317">fsim/tables/ps_full_ms/h5/w0/v4</property>
      <property value="65.1532">fsim/tables/ps_full_ms/h5/w0/v5</property>
      <property value="46.4697">fsim/tables/ps_full_ms/h5/w0/v6</property>
      <property value="31.5229">fsim/tables/ps_full_ms/h5/w0/v7</property>
      <property value="27.4504">fsim/tables/ps_full_ms/h5/w0/v8</property>
      <property value="43.7989">fsim/tables/ps_full_ms/h5/w0/v9</property>
      <property value="7.10224">fsim/tables/ps_full_ms/h5/w1/v0</property>
      <property value="16.0579">fsim/tables/ps_full_ms/h5/w1/v1</property>
      <property value="18.5196">fsim/tables/ps_full_ms/h5/w1/v10</property>
      <property value="7.41707">fsim/tables/ps_full_ms/h5/w1/v11</property>
      <property value="18.6316">fsim/tables/ps_full_ms/h5/w1/v12</property>
      <property value="9.92373">fsim/tables/ps_full_ms/h5/w1/v13</property>
      <property value="6.39496">fsim/tables/ps_full_ms/h5/w1/v14</property>
      <property value="2.86618">fsim/tables/ps_full_ms/h5/w1/v15</property>
      <property value="24.6933">fsim/tables/ps_full_ms/h5/w1/v2</property>
      <property value="33.962">fsim/tables/ps_full_ms/h5/w1/v3</property>
      <property value="41.5949">fsim/tables/ps_full_ms/h5/w1/v4</property>
      <property value="48.3271">fsim/tables/ps_full_ms/h5/w1/v5</property>
      <property value="43.8044">fsim/tables/ps_full_ms/h5/w1/v6</property>
      <property value="22.5891">fsim/tables/ps_full_ms/h5/w1/v7</property>
      <property value="26.3819">fsim/tables/ps_full_ms/h5/w1/v8</property>
      <property value="24.8946">fsim/tables/ps_full_ms/h5/w1/v9</property>
      <property value="12.6992">fsim/tables/ps_full_ms/h5/w2/v0</property>
      <property value="17.4309">fsim/tables/ps_full_ms/h5/w2/v1</property>
      <property value="13.5431">fsim/tables/ps_full_ms/h5/w2/v10</property>
      <property value="11.2921">fsim/tables/ps_full_ms/h5/w2/v11</property>
      <property value="9.04101">fsim/tables/ps_full_ms/h5/w2/v12</property>
      <property value="6.78996">fsim/tables/ps_full_ms/h5/w2/v13</property>
      <property value="4.53891">fsim/tables/ps_full_ms/h5/w2/v14</property>
      <property value="2.28786">fsim/tables/ps_full_ms/h5/w2/v15</property>
      <property value="22.1625">fsim/tables/ps_full_ms/h5/w2/v2</property>
      <property value="26.6276">fsim/tables/ps_full_ms/h5/w2/v3</property>
      <property value="30.6891">fsim/tables/ps_full_ms/h5/w2/v4</property>
      <property value="34.7221">fsim/tables/ps_full_ms/h5/w2/v5</property>
      <property value="36.4435">fsim/tables/ps_full_ms/h5/w2/v6</property>
      <property value="38.165">fsim/tables/ps_full_ms/h5/w2/v7</property>
      <property value="26.4253">fsim/tables/ps_full_ms/h5/w2/v8</property>
      <property value="15.7942">fsim/tables/ps_full_ms/h5/w2/v9</property>
      <property value="2.35153">fsim/tables/ps_full_ms/h6/w0/v0</property>
      <property value="9.15536">fsim/tables/ps_full_ms/h6/w0/v1</property>
      <property value="25.3668">fsim/tables/ps_full_ms/h6/w0/v10</property>
      <property value="23.0483">fsim/tables/ps_full_ms/h6/w0/v11</property>
      <property value="19.0608">fsim/tables/ps_full_ms/h6/w0/v12</property>
      <property value="13.7437">fsim/tables/ps_full_ms/h6/w0/v13</property>
      <property value="8.03035">fsim/tables/ps_full_ms/h6/w0/v14</property>
      <property value="2.05223">fsim/tables/ps_full_ms/h6/w0/v15</property>
      <property value="15.9592">fsim/tables/ps_full_ms/h6/w0/v2</property>
      <property value="22.6458">fsim/tables/ps_full_ms/h6/w0/v3</property>
      <property value="29.1981">fsim/tables/ps_full_ms/h6/w0/v4</property>
      <property value="35.0172">fsim/tables/ps_full_ms/h6/w0/v5</property>
      <property value="39.2586">fsim/tables/ps_full_ms/h6/w0/v6</property>
      <property value="43.0966">fsim/tables/ps_full_ms/h6/w0/v7</property>
      <property value="21.1291">fsim/tables/ps_full_ms/h6/w0/v8</property>
      <property value="18.4627">fsim/tables/ps_full_ms/h6/w0/v9</property>
      <property value="6.70856">fsim/tables/ps_full_ms/h6/w1/v0</property>
      <property value="10.372">fsim/tables/ps_full_ms/h6/w1/v1</property>
      <property value="12.652">fsim/tables/ps_full_ms/h6/w1/v10</property>
      <property value="10.6141">fsim/tables/ps_full_ms/h6/w1/v11</property>
      <property value="8.57626">fsim/tables/ps_full_ms/h6/w1/v12</property>
      <property value="6.53838">fsim/tables/ps_full_ms/h6/w1/v13</property>
      <property value="4.5005">fsim/tables/ps_full_ms/h6/w1/v14</property>
      <property value="2.46262">fsim/tables/ps_full_ms/h6/w1/v15</property>
      <property value="14.0354">fsim/tables/ps_full_ms/h6/w1/v2</property>
      <property value="17.6988">fsim/tables/ps_full_ms/h6/w1/v3</property>
      <property value="20.7624">fsim/tables/ps_full_ms/h6/w1/v4</property>
      <property value="23.1414">fsim/tables/ps_full_ms/h6/w1/v5</property>
      <property value="25.5204">fsim/tables/ps_full_ms/h6/w1/v6</property>
      <property value="27.6406">fsim/tables/ps_full_ms/h6/w1/v7</property>
      <property value="21.465">fsim/tables/ps_full_ms/h6/w1/v8</property>
      <property value="14.6899">fsim/tables/ps_full_ms/h6/w1/v9</property>
      <property value="11.0651">fsim/tables/ps_full_ms/h6/w2/v0</property>
      <property value="11.8324">fsim/tables/ps_full_ms/h6/w2/v1</property>
      <property value="8.3851">fsim/tables/ps_full_ms/h6/w2/v10</property>
      <property value="7.26646">fsim/tables/ps_full_ms/h6/w2/v11</property>
      <property value="6.14782">fsim/tables/ps_full_ms/h6/w2/v12</property>
      <property value="5.02917">fsim/tables/ps_full_ms/h6/w2/v13</property>
      <property value="3.91053">fsim/tables/ps_full_ms/h6/w2/v14</property>
      <property value="2.79189">fsim/tables/ps_full_ms/h6/w2/v15</property>
      <property value="12.5997">fsim/tables/ps_full_ms/h6/w2/v2</property>
      <property value="13.367">fsim/tables/ps_full_ms/h6/w2/v3</property>
      <property value="13.0143">fsim/tables/ps_full_ms/h6/w2/v4</property>
      <property value="12.6467">fsim/tables/ps_full_ms/h6/w2/v5</property>
      <property value="12.279">fsim/tables/ps_full_ms/h6/w2/v6</property>
      <property value="11.741">fsim/tables/ps_full_ms/h6/w2/v7</property>
      <property value="10.6224">fsim/tables/ps_full_ms/h6/w2/v8</property>
      <property value="9.50374">fsim/tables/ps_full_ms/h6/w2/v9</property>
      <property value="-46.7755">fsim/tables/ps_idle_ms/h0/w0/v0</property>
      <property value="-54.1296">fsim/tables/ps_idle_ms/h0/w0/v1</property>
      <property value="-253.27">fsim/tables/ps_idle_ms/h0/w0/v10</property>
      <property value="-379.71">fsim/tables/ps_idle_ms/h0/w0/v11</property>
      <property value="-467.807">fsim/tables/ps_idle_ms/h0/w0/v12</property>
      <property value="-521.247">fsim/tables/ps_idle_ms/h0/w0/v13</property>
      <property value="-551.408">fsim/tables/ps_idle_ms/h0/w0/v14</property>
      <property value="-572.516">fsim/tables/ps_idle_ms/h0/w0/v15</property>
      <property value="-62.6416">fsim/tables/ps_idle_ms/h0/w0/v2</property>
      <property value="-72.542">fsim/tables/ps_idle_ms/h0/w0/v3</property>
      <property value="-83.5122">fsim/tables/ps_idle_ms/h0/w0/v4</property>
      <property value="-95.5628">fsim/tables/ps_idle_ms/h0/w0/v5</property>
      <property value="-108.247">fsim/tables/ps_idle_ms/h0/w0/v6</property>
      <property value="-121.185">fsim/tables/ps_idle_ms/h0/w0/v7</property>
      <property value="-134.682">fsim/tables/ps_idle_ms/h0/w0/v8</property>
      <property value="-150.041">fsim/tables/ps_idle_ms/h0/w0/v9</property>
      <property value="-21.3118">fsim/tables/ps_idle_ms/h0/w1/v0</property>
      <property value="-26.1822">fsim/tables/ps_idle_ms/h0/w1/v1</property>
      <property value="-123.268">fsim/tables/ps_idle_ms/h0/w1/v10</property>
      <property value="-192.128">fsim/tables/ps_idle_ms/h0/w1/v11</property>
      <property value="-339.064">fsim/tables/ps_idle_ms/h0/w1/v12</property>
      <property value="-431.4">fsim/tables/ps_idle_ms/h0/w1/v13</property>
      <property value="-472.69">fsim/tables/ps_idle_ms/h0/w1/v14</property>
      <property value="-495.656">fsim/tables/ps_idle_ms/h0/w1/v15</property>
      <property value="-32.3237">fsim/tables/ps_idle_ms/h0/w1/v2</property>
      <property value="-39.7327">fsim/tables/ps_idle_ms/h0/w1/v3</property>
      <property value="-47.6094">fsim/tables/ps_idle_ms/h0/w1/v4</property>
      <property value="-56.5173">fsim/tables/ps_idle_ms/h0/w1/v5</property>
      <property value="-67.1672">fsim/tables/ps_idle_ms/h0/w1/v6</property>
      <property value="-79.7626">fsim/tables/ps_idle_ms/h0/w1/v7</property>
      <property value="-93.7997">fsim/tables/ps_idle_ms/h0/w1/v8</property>
      <property value="-108.456">fsim/tables/ps_idle_ms/h0/w1/v9</property>
      <property value="-19.2632">fsim/tables/ps_idle_ms/h0/w2/v0</property>
      <property value="-23.5836">fsim/tables/ps_idle_ms/h0/w2/v1</property>
      <property value="-107.311">fsim/tables/ps_idle_ms/h0/w2/v10</property>
      <property value="-149.59">fsim/tables/ps_idle_ms/h0/w2/v11</property>
      <property value="-291.243">fsim/tables/ps_idle_ms/h0/w2/v12</property>
      <property value="-374.29">fsim/tables/ps_idle_ms/h0/w2/v13</property>
      <property value="-415.361">fsim/tables/ps_idle_ms/h0/w2/v14</property>
      <property value="-435.668">fsim/tables/ps_idle_ms/h0/w2/v15</property>
      <property value="-28.4653">fsim/tables/ps_idle_ms/h0/w2/v2</property>
      <property value="-34.6308">fsim/tables/ps_idle_ms/h0/w2/v3</property>
      <property value="-41.9348">fsim/tables/ps_idle_ms/h0/w2/v4</property>
      <property value="-49.4379">fsim/tables/ps_idle_ms/h0/w2/v5</property>
      <property value="-58.2901">fsim/tables/ps_idle_ms/h0/w2/v6</property>
      <property value="-68.9628">fsim/tables/ps_idle_ms/h0/w2/v7</property>
      <property value="-81.1576">fsim/tables/ps_idle_ms/h0/w2/v8</property>
      <property value="-94.5212">fsim/tables/ps_idle_ms/h0/w2/v9</property>
      <property value="-13.1201">fsim/tables/ps_idle_ms/h1/w0/v0</property>
      <property value="-15.6576">fsim/tables/ps_idle_ms/h1/w0/v1</property>
      <property value="-250.127">fsim/tables/ps_idle_ms/h1/w0/v10</property>
      <property value="-341.801">fsim/tables/ps_idle_ms/h1/w0/v11</property>
      <property value="-401.185">fsim/tables/ps_idle_ms/h1/w0/v12</property>
      <property value="-466.045">fsim/tables/ps_idle_ms/h1/w0/v13</property>
      <property value="-529.035">fsim/tables/ps_idle_ms/h1/w0/v14</property>
      <property value="-559.726">fsim/tables/ps_idle_ms/h1/w0/v15</property>
      <property value="-19.8431">fsim/tables/ps_idle_ms/h1/w0/v2</property>
      <property value="-25.778">fsim/tables/ps_idle_ms/h1/w0/v3</property>
      <property value="-33.1072">fsim/tables/ps_idle_ms/h1/w0/v4</property>
      <property value="-42.548">fsim/tables/ps_idle_ms/h1/w0/v5</property>
      <property value="-53.3063">fsim/tables/ps_idle_ms/h1/w0/v6</property>
      <property value="-66.5518">fsim/tables/ps_idle_ms/h1/w0/v7</property>
      <property value="-81.9705">fsim/tables/ps_idle_ms/h1/w0/v8</property>
      <property value="-99.2644">fsim/tables/ps_idle_ms/h1/w0/v9</property>
      <property value="-13.7764">fsim/tables/ps_idle_ms/h1/w1/v0</property>
      <property value="-15.1846">fsim/tables/ps_idle_ms/h1/w1/v1</property>
      <property value="-206.553">fsim/tables/ps_idle_ms/h1/w1/v10</property>
      <property value="-289.685">fsim/tables/ps_idle_ms/h1/w1/v11</property>
      <property value="-338.881">fsim/tables/ps_idle_ms/h1/w1/v12</property>
      <property value="-393.473">fsim/tables/ps_idle_ms/h1/w1/v13</property>
      <property value="-453.432">fsim/tables/ps_idle_ms/h1/w1/v14</property>
      <property value="-483.064">fsim/tables/ps_idle_ms/h1/w1/v15</property>
      <property value="-18.2889">fsim/tables/ps_idle_ms/h1/w1/v2</property>
      <property value="-22.7551">fsim/tables/ps_idle_ms/h1/w1/v3</property>
      <property value="-28.8552">fsim/tables/ps_idle_ms/h1/w1/v4</property>
      <property value="-36.3604">fsim/tables/ps_idle_ms/h1/w1/v5</property>
      <property value="-45.5212">fsim/tables/ps_idle_ms/h1/w1/v6</property>
      <property value="-56.5978">fsim/tables/ps_idle_ms/h1/w1/v7</property>
      <property value="-70.0579">fsim/tables/ps_idle_ms/h1/w1/v8</property>
      <property value="-83.9131">fsim/tables/ps_idle_ms/h1/w1/v9</property>
      <property value="-15.0205">fsim/tables/ps_idle_ms/h1/w2/v0</property>
      <property value="-15.5291">fsim/tables/ps_idle_ms/h1/w2/v1</property>
      <property value="-171.036">fsim/tables/ps_idle_ms/h1/w2/v10</property>
      <property value="-250.236">fsim/tables/ps_idle_ms/h1/w2/v11</property>
      <property value="-292.557">fsim/tables/ps_idle_ms/h1/w2/v12</property>
      <property value="-338.359">fsim/tables/ps_idle_ms/h1/w2/v13</property>
      <property value="-390.865">fsim/tables/ps_idle_ms/h1/w2/v14</property>
      <property value="-421.196">fsim/tables/ps_idle_ms/h1/w2/v15</property>
      <property value="-17.7406">fsim/tables/ps_idle_ms/h1/w2/v2</property>
      <property value="-21.3479">fsim/tables/ps_idle_ms/h1/w2/v3</property>
      <property value="-26.239">fsim/tables/ps_idle_ms/h1/w2/v4</property>
      <property value="-32.606">fsim/tables/ps_idle_ms/h1/w2/v5</property>
      <property value="-40.2233">fsim/tables/ps_idle_ms/h1/w2/v6</property>
      <property value="-49.5513">fsim/tables/ps_idle_ms/h1/w2/v7</property>
      <property value="-61.3402">fsim/tables/ps_idle_ms/h1/w2/v8</property>
      <property value="-73.4634">fsim/tables/ps_idle_ms/h1/w2/v9</property>
      <property value="-15.9151">fsim/tables/ps_idle_ms/h2/w0/v0</property>
      <property value="-16.8099">fsim/tables/ps_idle_ms/h2/w0/v1</property>
      <property value="-271.919">fsim/tables/ps_idle_ms/h2/w0/v10</property>
      <property value="-323.202">fsim/tables/ps_idle_ms/h2/w0/v11</property>
      <property value="-380.715">fsim/tables/ps_idle_ms/h2/w0/v12</property>
      <property value="-444.719">fsim/tables/ps_idle_ms/h2/w0/v13</property>
      <property value="-516.447">fsim/tables/ps_idle_ms/h2/w0/v14</property>
      <property value="-558.797">fsim/tables/ps_idle_ms/h2/w0/v15</property>
      <property value="-19.7323">fsim/tables/ps_idle_ms/h2/w0/v2</property>
      <property value="-24.4816">fsim/tables/ps_idle_ms/h2/w0/v3</property>
      <property value="-31.3071">fsim/tables/ps_idle_ms/h2/w0/v4</property>
      <property value="-39.3065">fsim/tables/ps_idle_ms/h2/w0/v5</property>
      <property value="-50.5769">fsim/tables/ps_idle_ms/h2/w0/v6</property>
      <property value="-62.7437">fsim/tables/ps_idle_ms/h2/w0/v7</property>
      <property value="-176.021">fsim/tables/ps_idle_ms/h2/w0/v8</property>
      <property value="-225.844">fsim/tables/ps_idle_ms/h2/w0/v9</property>
      <property value="-18.0042">fsim/tables/ps_idle_ms/h2/w1/v0</property>
      <property value="-17.6482">fsim/tables/ps_idle_ms/h2/w1/v1</property>
      <property value="-229.21">fsim/tables/ps_idle_ms/h2/w1/v10</property>
      <property value="-270.846">fsim/tables/ps_idle_ms/h2/w1/v11</property>
      <property value="-317.956">fsim/tables/ps_idle_ms/h2/w1/v12</property>
      <property value="-370.861">fsim/tables/ps_idle_ms/h2/w1/v13</property>
      <property value="-429.114">fsim/tables/ps_idle_ms/h2/w1/v14</property>
      <property value="-470.764">fsim/tables/ps_idle_ms/h2/w1/v15</property>
      <property value="-19.4572">fsim/tables/ps_idle_ms/h2/w1/v2</property>
      <property value="-23.0539">fsim/tables/ps_idle_ms/h2/w1/v3</property>
      <property value="-28.118">fsim/tables/ps_idle_ms/h2/w1/v4</property>
      <property value="-34.8391">fsim/tables/ps_idle_ms/h2/w1/v5</property>
      <property value="-43.4064">fsim/tables/ps_idle_ms/h2/w1/v6</property>
      <property value="-53.7994">fsim/tables/ps_idle_ms/h2/w1/v7</property>
      <property value="-143.215">fsim/tables/ps_idle_ms/h2/w1/v8</property>
      <property value="-189.927">fsim/tables/ps_idle_ms/h2/w1/v9</property>
      <property value="-20.2742">fsim/tables/ps_idle_ms/h2/w2/v0</property>
      <property value="-18.9644">fsim/tables/ps_idle_ms/h2/w2/v1</property>
      <property value="-196.629">fsim/tables/ps_idle_ms/h2/w2/v10</property>
      <property value="-232.354">fsim/tables/ps_idle_ms/h2/w2/v11</property>
      <property value="-271.167">fsim/tables/ps_idle_ms/h2/w2/v12</property>
      <property value="-313.718">fsim/tables/ps_idle_ms/h2/w2/v13</property>
      <property value="-361.936">fsim/tables/ps_idle_ms/h2/w2/v14</property>
      <property value="-401.409">fsim/tables/ps_idle_ms/h2/w2/v15</property>
      <property value="-19.9014">fsim/tables/ps_idle_ms/h2/w2/v2</property>
      <property value="-22.5053">fsim/tables/ps_idle_ms/h2/w2/v3</property>
      <property value="-26.5701">fsim/tables/ps_idle_ms/h2/w2/v4</property>
      <property value="-32.0791">fsim/tables/ps_idle_ms/h2/w2/v5</property>
      <property value="-38.9473">fsim/tables/ps_idle_ms/h2/w2/v6</property>
      <property value="-48.2469">fsim/tables/ps_idle_ms/h2/w2/v7</property>
      <property value="-116.994">fsim/tables/ps_idle_ms/h2/w2/v8</property>
      <property value="-163.327">fsim/tables/ps_idle_ms/h2/w2/v9</property>
      <property value="-21.6962">fsim/tables/ps_idle_ms/h3/w0/v0</property>
      <property value="-20.3366">fsim/tables/ps_idle_ms/h3/w0/v1</property>
      <property value="-265.855">fsim/tables/ps_idle_ms/h3/w0/v10</property>
      <property value="-317.721">fsim/tables/ps_idle_ms/h3/w0/v11</property>
      <property value="-373.971">fsim/tables/ps_idle_ms/h3/w0/v12</property>
      <property value="-435.933">fsim/tables/ps_idle_ms/h3/w0/v13</property>
      <property value="-505.748">fsim/tables/ps_idle_ms/h3/w0/v14</property>
      <property value="-562.987">fsim/tables/ps_idle_ms/h3/w0/v15</property>
      <property value="-21.9576">fsim/tables/ps_idle_ms/h3/w0/v2</property>
      <property value="-25.8779">fsim/tables/ps_idle_ms/h3/w0/v3</property>
      <property value="-31.4956">fsim/tables/ps_idle_ms/h3/w0/v4</property>
      <property value="-40.3635">fsim/tables/ps_idle_ms/h3/w0/v5</property>
      <property value="-109.932">fsim/tables/ps_idle_ms/h3/w0/v6</property>
      <property value="-145.079">fsim/tables/ps_idle_ms/h3/w0/v7</property>
      <property value="-179.286">fsim/tables/ps_idle_ms/h3/w0/v8</property>
      <property value="-219.206">fsim/tables/ps_idle_ms/h3/w0/v9</property>
      <property value="-24.9319">fsim/tables/ps_idle_ms/h3/w1/v0</property>
      <property value="-22.3896">fsim/tables/ps_idle_ms/h3/w1/v1</property>
      <property value="-223.46">fsim/tables/ps_idle_ms/h3/w1/v10</property>
      <property value="-265.48">fsim/tables/ps_idle_ms/h3/w1/v11</property>
      <property value="-311.865">fsim/tables/ps_idle_ms/h3/w1/v12</property>
      <property value="-361.481">fsim/tables/ps_idle_ms/h3/w1/v13</property>
      <property value="-415.703">fsim/tables/ps_idle_ms/h3/w1/v14</property>
      <property value="-466.829">fsim/tables/ps_idle_ms/h3/w1/v15</property>
      <property value="-22.8176">fsim/tables/ps_idle_ms/h3/w1/v2</property>
      <property value="-25.5062">fsim/tables/ps_idle_ms/h3/w1/v3</property>
      <property value="-29.8882">fsim/tables/ps_idle_ms/h3/w1/v4</property>
      <property value="-36.8407">fsim/tables/ps_idle_ms/h3/w1/v5</property>
      <property value="-94.0471">fsim/tables/ps_idle_ms/h3/w1/v6</property>
      <property value="-124.662">fsim/tables/ps_idle_ms/h3/w1/v7</property>
      <property value="-152.989">fsim/tables/ps_idle_ms/h3/w1/v8</property>
      <property value="-185.689">fsim/tables/ps_idle_ms/h3/w1/v9</property>
      <property value="-27.9133">fsim/tables/ps_idle_ms/h3/w2/v0</property>
      <property value="-24.5964">fsim/tables/ps_idle_ms/h3/w2/v1</property>
      <property value="-193.679">fsim/tables/ps_idle_ms/h3/w2/v10</property>
      <property value="-229.392">fsim/tables/ps_idle_ms/h3/w2/v11</property>
      <property value="-267.986">fsim/tables/ps_idle_ms/h3/w2/v12</property>
      <property value="-308.292">fsim/tables/ps_idle_ms/h3/w2/v13</property>
      <property value="-352.652">fsim/tables/ps_idle_ms/h3/w2/v14</property>
      <property value="-397.453">fsim/tables/ps_idle_ms/h3/w2/v15</property>
      <property value="-24.1638">fsim/tables/ps_idle_ms/h3/w2/v2</property>
      <property value="-25.7395">fsim/tables/ps_idle_ms/h3/w2/v3</property>
      <property value="-29.0649">fsim/tables/ps_idle_ms/h3/w2/v4</property>
      <property value="-34.9195">fsim/tables/ps_idle_ms/h3/w2/v5</property>
      <property value="-83.8823">fsim/tables/ps_idle_ms/h3/w2/v6</property>
      <property value="-113.058">fsim/tables/ps_idle_ms/h3/w2/v7</property>
      <property value="-135.053">fsim/tables/ps_idle_ms/h3/w2/v8</property>
      <property value="-161.741">fsim/tables/ps_idle_ms/h3/w2/v9</property>
      <property value="-29.6695">fsim/tables/ps_idle_ms/h4/w0/v0</property>
      <property value="-26.016">fsim/tables/ps_idle_ms/h4/w0/v1</property>
      <property value="-198.861">fsim/tables/ps_idle_ms/h4/w0/v10</property>
      <property value="-234.805">fsim/tables/ps_idle_ms/h4/w0/v11</property>
      <property value="-273.983">fsim/tables/ps_idle_ms/h4/w0/v12</property>
      <property value="-315.674">fsim/tables/ps_idle_ms/h4/w0/v13</property>
      <property value="-361.317">fsim/tables/ps_idle_ms/h4/w0/v14</property>
      <property value="-407.477">fsim/tables/ps_idle_ms/h4/w0/v15</property>
      <property value="-25.4697">fsim/tables/ps_idle_ms/h4/w0/v2</property>
      <property value="-27.0573">fsim/tables/ps_idle_ms/h4/w0/v3</property>
      <property value="-30.3493">fsim/tables/ps_idle_ms/h4/w0/v4</property>
      <property value="-44.538">fsim/tables/ps_idle_ms/h4/w0/v5</property>
      <property value="-93.5808">fsim/tables/ps_idle_ms/h4/w0/v6</property>
      <property value="-116.886">fsim/tables/ps_idle_ms/h4/w0/v7</property>
      <property value="-139.718">fsim/tables/ps_idle_ms/h4/w0/v8</property>
      <property value="-166.414">fsim/tables/ps_idle_ms/h4/w0/v9</property>
      <property value="-33.7841">fsim/tables/ps_idle_ms/h4/w1/v0</property>
      <property value="-29.4286">fsim/tables/ps_idle_ms/h4/w1/v1</property>
      <property value="-163.22">fsim/tables/ps_idle_ms/h4/w1/v10</property>
      <property value="-188.843">fsim/tables/ps_idle_ms/h4/w1/v11</property>
      <property value="-217.771">fsim/tables/ps_idle_ms/h4/w1/v12</property>
      <property value="-250.058">fsim/tables/ps_idle_ms/h4/w1/v13</property>
      <property value="-284.1">fsim/tables/ps_idle_ms/h4/w1/v14</property>
      <property value="-319.434">fsim/tables/ps_idle_ms/h4/w1/v15</property>
      <property value="-27.7494">fsim/tables/ps_idle_ms/h4/w1/v2</property>
      <property value="-28.0832">fsim/tables/ps_idle_ms/h4/w1/v3</property>
      <property value="-29.6613">fsim/tables/ps_idle_ms/h4/w1/v4</property>
      <property value="-34.9148">fsim/tables/ps_idle_ms/h4/w1/v5</property>
      <property value="-78.4897">fsim/tables/ps_idle_ms/h4/w1/v6</property>
      <property value="-102.845">fsim/tables/ps_idle_ms/h4/w1/v7</property>
      <property value="-119.125">fsim/tables/ps_idle_ms/h4/w1/v8</property>
      <property value="-139.85">fsim/tables/ps_idle_ms/h4/w1/v9</property>
      <property value="-37.3898">fsim/tables/ps_idle_ms/h4/w2/v0</property>
      <property value="-32.7833">fsim/tables/ps_idle_ms/h4/w2/v1</property>
      <property value="-145.062">fsim/tables/ps_idle_ms/h4/w2/v10</property>
      <property value="-167.056">fsim/tables/ps_idle_ms/h4/w2/v11</property>
      <property value="-190.293">fsim/tables/ps_idle_ms/h4/w2/v12</property>
      <property value="-214.838">fsim/tables/ps_idle_ms/h4/w2/v13</property>
      <property value="-241.031">fsim/tables/ps_idle_ms/h4/w2/v14</property>
      <property value="-270.38">fsim/tables/ps_idle_ms/h4/w2/v15</property>
      <property value="-30.2798">fsim/tables/ps_idle_ms/h4/w2/v2</property>
      <property value="-29.9519">fsim/tables/ps_idle_ms/h4/w2/v3</property>
      <property value="-30.2962">fsim/tables/ps_idle_ms/h4/w2/v4</property>
      <property value="-36.0273">fsim/tables/ps_idle_ms/h4/w2/v5</property>
      <property value="-73.2701">fsim/tables/ps_idle_ms/h4/w2/v6</property>
      <property value="-98.5343">fsim/tables/ps_idle_ms/h4/w2/v7</property>
      <property value="-111.331">fsim/tables/ps_idle_ms/h4/w2/v8</property>
      <property value="-126.707">fsim/tables/ps_idle_ms/h4/w2/v9</property>
      <property value="-36.5034">fsim/tables/ps_idle_ms/h5/w0/v0</property>
      <property value="-32.2246">fsim/tables/ps_idle_ms/h5/w0/v1</property>
      <property value="-129.903">fsim/tables/ps_idle_ms/h5/w0/v10</property>
      <property value="-148.301">fsim/tables/ps_idle_ms/h5/w0/v11</property>
      <property value="-168.33">fsim/tables/ps_idle_ms/h5/w0/v12</property>
      <property value="-189.36">fsim/tables/ps_idle_ms/h5/w0/v13</property>
      <property value="-211.485">fsim/tables/ps_idle_ms/h5/w0/v14</property>
      <property value="-236.563">fsim/tables/ps_idle_ms/h5/w0/v15</property>
      <property value="-29.964">fsim/tables/ps_idle_ms/h5/w0/v2</property>
      <property value="-29.3084">fsim/tables/ps_idle_ms/h5/w0/v3</property>
      <property value="-29.975">fsim/tables/ps_idle_ms/h5/w0/v4</property>
      <property value="-32.2399">fsim/tables/ps_idle_ms/h5/w0/v5</property>
      <property value="-59.4071">fsim/tables/ps_idle_ms/h5/w0/v6</property>
      <property value="-88.919">fsim/tables/ps_idle_ms/h5/w0/v7</property>
      <property value="-101.811">fsim/tables/ps_idle_ms/h5/w0/v8</property>
      <property value="-115.224">fsim/tables/ps_idle_ms/h5/w0/v9</property>
      <property value="-40.8026">fsim/tables/ps_idle_ms/h5/w1/v0</property>
      <property value="-36.4223">fsim/tables/ps_idle_ms/h5/w1/v1</property>
      <property value="-114.49">fsim/tables/ps_idle_ms/h5/w1/v10</property>
      <property value="-125.014">fsim/tables/ps_idle_ms/h5/w1/v11</property>
      <property value="-137.897">fsim/tables/ps_idle_ms/h5/w1/v12</property>
      <property value="-151.507">fsim/tables/ps_idle_ms/h5/w1/v13</property>
      <property value="-166.992">fsim/tables/ps_idle_ms/h5/w1/v14</property>
      <property value="-183.486">fsim/tables/ps_idle_ms/h5/w1/v15</property>
      <property value="-33.0848">fsim/tables/ps_idle_ms/h5/w1/v2</property>
      <property value="-32.7871">fsim/tables/ps_idle_ms/h5/w1/v3</property>
      <property value="-33.2372">fsim/tables/ps_idle_ms/h5/w1/v4</property>
      <property value="-23.9241">fsim/tables/ps_idle_ms/h5/w1/v5</property>
      <property value="-89.3546">fsim/tables/ps_idle_ms/h5/w1/v6</property>
      <property value="-90.4362">fsim/tables/ps_idle_ms/h5/w1/v7</property>
      <property value="-85.8786">fsim/tables/ps_idle_ms/h5/w1/v8</property>
      <property value="-100.638">fsim/tables/ps_idle_ms/h5/w1/v9</property>
      <property value="-94.8519">fsim/tables/ps_idle_ms/h5/w2/v10</property>
      <property value="-90.0887">fsim/tables/ps_idle_ms/h5/w2/v11</property>
      <property value="-94.4956">fsim/tables/ps_idle_ms/h5/w2/v12</property>
      <property value="-99.6548">fsim/tables/ps_idle_ms/h5/w2/v13</property>
      <property value="-105.446">fsim/tables/ps_idle_ms/h5/w2/v14</property>
      <property value="-111.753">fsim/tables/ps_idle_ms/h5/w2/v15</property>
      <property value="-20.6171">fsim/tables/ps_idle_ms/h5/w2/v2</property>
      <property value="-18.659">fsim/tables/ps_idle_ms/h5/w2/v3</property>
      <property value="-21.0945">fsim/tables/ps_idle_ms/h5/w2/v4</property>
      <property value="-33.9297">fsim/tables/ps_idle_ms/h5/w2/v5</property>
      <property value="-131.542">fsim/tables/ps_idle_ms/h5/w2/v6</property>
      <property value="-159.301">fsim/tables/ps_idle_ms/h5/w2/v7</property>
      <property value="-132.503">fsim/tables/ps_idle_ms/h5/w2/v8</property>
      <property value="-104.977">fsim/tables/ps_idle_ms/h5/w2/v9</property>
      <property value="-81.7158">fsim/tables/ps_idle_ms/h6/w0/v10</property>
      <property value="-90.4666">fsim/tables/ps_idle_ms/h6/w0/v11</property>
      <property value="-101.32">fsim/tables/ps_idle_ms/h6/w0/v12</property>
      <property value="-113.714">fsim/tables/ps_idle_ms/h6/w0/v13</property>
      <property value="-127.781">fsim/tables/ps_idle_ms/h6/w0/v14</property>
      <property value="-142.777">fsim/tables/ps_idle_ms/h6/w0/v15</property>
      <property value="-23.564">fsim/tables/ps_idle_ms/h6/w0/v3</property>
      <property value="-20.0264">fsim/tables/ps_idle_ms/h6/w0/v4</property>
      <property value="-23.6034">fsim/tables/ps_idle_ms/h6/w0/v5</property>
      <property value="-109.782">fsim/tables/ps_idle_ms/h6/w0/v6</property>
      <property value="-160.471">fsim/tables/ps_idle_ms/h6/w0/v7</property>
      <property value="-104.654">fsim/tables/ps_idle_ms/h6/w0/v8</property>
      <property value="-86.946">fsim/tables/ps_idle_ms/h6/w0/v9</property>
      <property value="-126.898">fsim/tables/ps_idle_ms/h6/w1/v10</property>
      <property value="-116.817">fsim/tables/ps_idle_ms/h6/w1/v11</property>
      <property value="-107.771">fsim/tables/ps_idle_ms/h6/w1/v12</property>
      <property value="-104.764">fsim/tables/ps_idle_ms/h6/w1/v13</property>
      <property value="-100.934">fsim/tables/ps_idle_ms/h6/w1/v14</property>
      <property value="-92.4414">fsim/tables/ps_idle_ms/h6/w1/v15</property>
      <property value="-19.7234">fsim/tables/ps_idle_ms/h6/w1/v3</property>
      <property value="-21.7471">fsim/tables/ps_idle_ms/h6/w1/v4</property>
      <property value="-28.9594">fsim/tables/ps_idle_ms/h6/w1/v5</property>
      <property value="-108.589">fsim/tables/ps_idle_ms/h6/w1/v6</property>
      <property value="-153.888">fsim/tables/ps_idle_ms/h6/w1/v7</property>
      <property value="-172.614">fsim/tables/ps_idle_ms/h6/w1/v8</property>
      <property value="-156.571">fsim/tables/ps_idle_ms/h6/w1/v9</property>
      <property value="-32.3245">fsim/tables/ps_idle_ms/h6/w2/v0</property>
      <property value="-61.3012">fsim/tables/ps_idle_ms/h6/w2/v1</property>
      <property value="-164.292">fsim/tables/ps_idle_ms/h6/w2/v10</property>
      <property value="-151.256">fsim/tables/ps_idle_ms/h6/w2/v11</property>
      <property value="-144.333">fsim/tables/ps_idle_ms/h6/w2/v12</property>
      <property value="-139.664">fsim/tables/ps_idle_ms/h6/w2/v13</property>
      <property value="-135.496">fsim/tables/ps_idle_ms/h6/w2/v14</property>
      <property value="-131.599">fsim/tables/ps_idle_ms/h6/w2/v15</property>
      <property value="-99.5791">fsim/tables/ps_idle_ms/h6/w2/v2</property>
      <property value="-126.184">fsim/tables/ps_idle_ms/h6/w2/v3</property>
      <property value="-147.202">fsim/tables/ps_idle_ms/h6/w2/v4</property>
      <property value="-160.317">fsim/tables/ps_idle_ms/h6/w2/v5</property>
      <property value="-170.842">fsim/tables/ps_idle_ms/h6/w2/v6</property>
      <property value="-179.342">fsim/tables/ps_idle_ms/h6/w2/v7</property>
      <property value="-183.555">fsim/tables/ps_idle_ms/h6/w2/v8</property>
      <property value="-179.477">fsim/tables/ps_idle_ms/h6/w2/v9</property>
      <property value="436.179">fsim/tables/reach_tas_ms/h0/w0</property>
      <property value="435.65">fsim/tables/reach_tas_ms/h0/w1</property>
      <property value="434.87">fsim/tables/reach_tas_ms/h0/w2</property>
      <property value="483.341">fsim/tables/reach_tas_ms/h1/w0</property>
      <property value="482.735">fsim/tables/reach_tas_ms/h1/w1</property>
      <property value="480.597">fsim/tables/reach_tas_ms/h1/w2</property>
      <property value="548.935">fsim/tables/reach_tas_ms/h2/w0</property>
      <property value="543.803">fsim/tables/reach_tas_ms/h2/w1</property>
      <property value="536.447">fsim/tables/reach_tas_ms/h2/w2</property>
      <property value="634.673">fsim/tables/reach_tas_ms/h3/w0</property>
      <property value="624.101">fsim/tables/reach_tas_ms/h3/w1</property>
      <property value="614.158">fsim/tables/reach_tas_ms/h3/w2</property>
      <property value="641.466">fsim/tables/reach_tas_ms/h4/w0</property>
      <property value="614.039">fsim/tables/reach_tas_ms/h4/w1</property>
      <property value="564.876">fsim/tables/reach_tas_ms/h5/w0</property>
      <property value="445.043">fsim/tables/reach_tas_ms/h5/w1</property>
      <property value="460.54">fsim/tables/reach_tas_ms/h6/w0</property>
      <property value="0.0">fsim/tables/speed_fraction/v0</property>
      <property value="0.0666667">fsim/tables/speed_fraction/v1</property>
      <property value="0.666667">fsim/tables/speed_fraction/v10</property>
      <property value="0.733333">fsim/tables/speed_fraction/v11</property>
      <property value="0.8">fsim/tables/speed_fraction/v12</property>
      <property value="0.866667">fsim/tables/speed_fraction/v13</property>
      <property value="0.933333">fsim/tables/speed_fraction/v14</property>
      <property value="1">fsim/tables/speed_fraction/v15</property>
      <property value="0.133333">fsim/tables/speed_fraction/v2</property>
      <property value="0.2">fsim/tables/speed_fraction/v3</property>
      <property value="0.266667">fsim/tables/speed_fraction/v4</property>
      <property value="0.333333">fsim/tables/speed_fraction/v5</property>
      <property value="0.4">fsim/tables/speed_fraction/v6</property>
      <property value="0.466667">fsim/tables/speed_fraction/v7</property>
      <property value="0.533333">fsim/tables/speed_fraction/v8</property>
      <property value="0.6">fsim/tables/speed_fraction/v9</property>
      <property value="50.2061">fsim/tables/stall_cas_ms/h0/w0</property>
      <property value="54.4647">fsim/tables/stall_cas_ms/h0/w1</property>
      <property value="58.4138">fsim/tables/stall_cas_ms/h0/w2</property>
      <property value="50.7165">fsim/tables/stall_cas_ms/h1/w0</property>
      <property value="55.0184">fsim/tables/stall_cas_ms/h1/w1</property>
      <property value="59.0076">fsim/tables/stall_cas_ms/h1/w2</property>
      <property value="51.0655">fsim/tables/stall_cas_ms/h2/w0</property>
      <property value="55.3971">fsim/tables/stall_cas_ms/h2/w1</property>
      <property value="59.4137">fsim/tables/stall_cas_ms/h2/w2</property>
      <property value="51.7759">fsim/tables/stall_cas_ms/h3/w0</property>
      <property value="56.1678">fsim/tables/stall_cas_ms/h3/w1</property>
      <property value="60.2403">fsim/tables/stall_cas_ms/h3/w2</property>
      <property value="52.7838">fsim/tables/stall_cas_ms/h4/w0</property>
      <property value="57.2612">fsim/tables/stall_cas_ms/h4/w1</property>
      <property value="61.413">fsim/tables/stall_cas_ms/h4/w2</property>
      <property value="57.0913">fsim/tables/stall_cas_ms/h5/w0</property>
      <property value="61.934">fsim/tables/stall_cas_ms/h5/w1</property>
      <property value="66.4246">fsim/tables/stall_cas_ms/h5/w2</property>
      <property value="89.4699">fsim/tables/stall_cas_ms/h6/w0</property>
      <property value="97.0591">fsim/tables/stall_cas_ms/h6/w1</property>
      <property value="104.096">fsim/tables/stall_cas_ms/h6/w2</property>
      <property value="8041">fsim/tables/weight_kg/w0</property>
      <property value="9463">fsim/tables/weight_kg/w1</property>
      <property value="10885">fsim/tables/weight_kg/w2</property>
      <channel name="Pitch (fly-by-wire)">
        <!-- hangar: load factor command, alpha and pitch-rate inner loop (hangar/fcs.py) -->
        <summer name="fcs/pitch-trim-sum">
          <input>fcs/elevator-cmd-norm</input>
          <input>fcs/pitch-trim-cmd-norm</input>
          <clipto> <min>-1</min> <max>1</max> </clipto>
        </summer>
        <!-- the integrators are reset below 60 kt and while a wheel carries weight
             (on the ground, taking off and landing) -->
        <switch name="fcs/fbw/reset">
          <default value="0"/>
          <test logic="OR" value="-1">
            velocities/vc-kts lt 60
            gear/wow gt 0
          </test>
        </switch>
        <fcs_function name="fcs/fbw/k-alpha">
          <function>
            <table>
              <independentVar lookup="row">aero/qbar-psf</independentVar>
              <independentVar lookup="column">velocities/mach</independentVar>
              <tableData>
                       0.150     0.400     0.700     0.900     1.100     1.400     2.000
              10.0  -3.56706  -3.66128  -3.67166  -3.58780  -6.00000  -6.00000  -6.00000
              20.0  -1.75967  -1.84983  -1.85781  -1.80063  -3.12742  -5.18105  -6.00000
              40.0  -0.86005  -0.94470  -0.95108  -0.82014  -0.56498  -2.40051  -3.30041
              80.0  -0.47258  -0.66040  -0.66751  -0.53680   0.32127   0.97954   0.87707
             150.0  -0.39316  -0.56392  -0.58103  -0.46878   0.30336   0.87843   0.80944
             300.0  -0.36474  -0.48550  -0.51976  -0.42013   0.34207   0.89329   0.76964
             600.0  -0.51386  -0.41534  -0.46027  -0.36734   0.40901   0.96164   0.80780
            1200.0  -1.75119  -0.22603  -0.17878  -0.02096   1.13328   1.93578   1.42489
            2400.0   6.00000  -0.27403  -0.04497   0.14094   1.49306   2.57018   2.26575
              </tableData>
            </table>
          </function>
        </fcs_function>
        <fcs_function name="fcs/fbw/k-q">
          <function>
            <table>
              <independentVar lookup="row">aero/qbar-psf</independentVar>
              <independentVar lookup="column">velocities/mach</independentVar>
              <tableData>
                       0.150     0.400     0.700     0.900     1.100     1.400     2.000
              10.0  -3.00000  -3.00000  -3.00000  -3.00000  -3.00000  -3.00000  -3.00000
              20.0  -1.74103  -1.85933  -1.89186  -1.87231  -3.00000  -3.00000  -3.00000
              40.0  -0.81555  -0.90808  -0.93302  -0.90795  -1.66291  -2.91506  -3.00000
              80.0  -0.35702  -0.51438  -0.57234  -0.59998  -1.16697  -1.88150  -2.15578
             150.0  -0.20543  -0.33740  -0.38302  -0.40430  -0.79307  -1.28128  -1.51398
             300.0  -0.09194  -0.21340  -0.25308  -0.27141  -0.53950  -0.87340  -1.01884
             600.0  -0.00129  -0.13025  -0.16595  -0.18125  -0.36686  -0.60031  -0.70564
            1200.0   0.15910  -0.04466  -0.07311  -0.07983  -0.16821  -0.30268  -0.41729
            2400.0  -1.40683   0.01381  -0.01731  -0.02477  -0.06507  -0.13039  -0.19376
              </tableData>
            </table>
          </function>
        </fcs_function>
        <fcs_function name="fcs/fbw/k-ff">
          <function>
            <table>
              <independentVar lookup="row">aero/qbar-psf</independentVar>
              <independentVar lookup="column">velocities/mach</independentVar>
              <tableData>
                       0.150     0.400     0.700     0.900     1.100     1.400     2.000
              10.0  -0.30000  -0.30000  -0.30000  -0.30000  -0.30000  -0.30000  -0.30000
              20.0  -0.30000  -0.30000  -0.30000  -0.30000  -0.30000  -0.30000  -0.30000
              40.0  -0.30000  -0.30000  -0.30000  -0.30000  -0.30000  -0.30000  -0.30000
              80.0  -0.17030  -0.17269  -0.18009  -0.19039  -0.30000  -0.30000  -0.30000
             150.0  -0.09210  -0.09327  -0.09699  -0.10232  -0.25620  -0.30000  -0.30000
             300.0  -0.04590  -0.04651  -0.04842  -0.05117  -0.12882  -0.23367  -0.29594
             600.0  -0.02297  -0.02327  -0.02423  -0.02560  -0.06453  -0.11720  -0.14883
            1200.0  -0.00738  -0.00732  -0.00717  -0.00691  -0.01674  -0.03387  -0.05547
            2400.0  -0.00185  -0.00183  -0.00179  -0.00173  -0.00419  -0.00847  -0.01388
              </tableData>
            </table>
          </function>
        </fcs_function>
        <fcs_function name="fcs/fbw/k-i">
          <function>
            <table>
              <independentVar lookup="row">aero/qbar-psf</independentVar>
              <independentVar lookup="column">velocities/mach</independentVar>
              <tableData>
                       0.150     0.400     0.700     0.900     1.100     1.400     2.000
              10.0  -0.60000  -0.60000  -0.60000  -0.60000  -0.60000  -0.60000  -0.60000
              20.0  -0.60000  -0.60000  -0.60000  -0.60000  -0.60000  -0.60000  -0.60000
              40.0  -0.60000  -0.60000  -0.60000  -0.60000  -0.60000  -0.60000  -0.60000
              80.0  -0.17030  -0.17269  -0.18009  -0.19039  -0.46393  -0.60000  -0.60000
             150.0  -0.09210  -0.09327  -0.09699  -0.10232  -0.25620  -0.46267  -0.57882
             300.0  -0.04590  -0.04651  -0.04842  -0.05117  -0.12882  -0.23367  -0.29594
             600.0  -0.02297  -0.02327  -0.02423  -0.02560  -0.06453  -0.11720  -0.14883
            1200.0  -0.00738  -0.00732  -0.00717  -0.00691  -0.01674  -0.03387  -0.05547
            2400.0  -0.00185  -0.00183  -0.00179  -0.00173  -0.00419  -0.00847  -0.01388
              </tableData>
            </table>
          </function>
        </fcs_function>
        <fcs_function name="fcs/fbw/n-alpha">
          <function>
            <table>
              <independentVar lookup="row">aero/qbar-psf</independentVar>
              <independentVar lookup="column">velocities/mach</independentVar>
              <tableData>
                       0.150     0.400     0.700     0.900     1.100     1.400     2.000
              10.0   1.00000   1.00000   1.00000   1.00000   1.00000   1.00000   1.00000
              20.0   1.00000   1.00000   1.00000   1.00000   1.00000   1.00000   1.00000
              40.0   1.00000   1.00000   1.00000   1.00000   1.34335   1.00000   1.00000
              80.0   4.26776   4.34934   4.59234   4.96277   5.13061   4.68971   3.64596
             150.0   7.28572   7.42038   7.84592   8.53754   8.86297   8.02329   6.41030
             300.0  14.07760  14.36615  15.26922  16.72939  17.40546  15.64567  12.18571
             600.0  28.04115  28.62454  30.43899  33.37250  34.73074  31.19528  24.21609
            1200.0  56.03700  57.20506  60.83423  66.70159  69.41822  62.34689  48.37858
            2400.0 112.03317 114.36942 121.62777 133.36250 138.79576 124.65310  96.71545
              </tableData>
            </table>
          </function>
        </fcs_function>
        <!-- the pitching moment's departures from a straight line through the
             angle-of-attack envelope (+0.039 per rad about the CG), cancelled by the
             elevator: the gains are designed on the line -->
        <fcs_function name="fcs/fbw/moment-comp">
          <function>
            <table>
              <independentVar lookup="row">aero/alpha-rad</independentVar>
              <independentVar lookup="column">velocities/mach</independentVar>
              <tableData>
                       0.150     0.400     0.700     0.900     1.100     1.400     2.000
          -0.17453   0.01611   0.01613   0.01615   0.01591   0.02977   0.04950   0.06381
          -0.15708   0.01396   0.01398   0.01399   0.01379   0.02581   0.04290   0.05530
          -0.13963   0.01197   0.01198   0.01200   0.01182   0.02213   0.03679   0.04742
          -0.12217   0.01025   0.01026   0.01027   0.01012   0.01894   0.03149   0.04060
          -0.10472   0.00878   0.00879   0.00880   0.00867   0.01622   0.02697   0.03476
          -0.08727   0.00751   0.00752   0.00753   0.00742   0.01389   0.02309   0.02976
          -0.06981   0.00634   0.00634   0.00635   0.00626   0.01171   0.01947   0.02509
          -0.05236   0.00516   0.00517   0.00517   0.00510   0.00954   0.01586   0.02045
          -0.03491   0.00391   0.00392   0.00392   0.00386   0.00723   0.01203   0.01550
          -0.01745   0.00257   0.00257   0.00257   0.00254   0.00475   0.00789   0.01017
           0.00000   0.00110   0.00111   0.00111   0.00109   0.00204   0.00339   0.00437
           0.01745  -0.00033  -0.00033  -0.00033  -0.00032  -0.00061  -0.00101  -0.00130
           0.03491  -0.00158  -0.00159  -0.00159  -0.00156  -0.00293  -0.00487  -0.00628
           0.05236  -0.00268  -0.00268  -0.00269  -0.00265  -0.00495  -0.00823  -0.01061
           0.06981  -0.00363  -0.00364  -0.00364  -0.00359  -0.00672  -0.01117  -0.01440
           0.08727  -0.00452  -0.00453  -0.00453  -0.00447  -0.00836  -0.01390  -0.01791
           0.10472  -0.00542  -0.00543  -0.00544  -0.00536  -0.01003  -0.01667  -0.02148
           0.12217  -0.00647  -0.00648  -0.00649  -0.00639  -0.01196  -0.01989  -0.02563
           0.13963  -0.00773  -0.00773  -0.00774  -0.00763  -0.01428  -0.02374  -0.03060
           0.15708  -0.00923  -0.00924  -0.00925  -0.00912  -0.01707  -0.02837  -0.03657
           0.17453  -0.01091  -0.01092  -0.01094  -0.01078  -0.02017  -0.03353  -0.04322
           0.19199  -0.01269  -0.01270  -0.01272  -0.01253  -0.02346  -0.03900  -0.05027
           0.20944  -0.01439  -0.01440  -0.01442  -0.01421  -0.02659  -0.04421  -0.05699
           0.22689  -0.01591  -0.01593  -0.01595  -0.01571  -0.02941  -0.04890  -0.06303
           0.24435  -0.01711  -0.01713  -0.01715  -0.01690  -0.03163  -0.05258  -0.06778
           0.26180  -0.01797  -0.01798  -0.01800  -0.01774  -0.03320  -0.05520  -0.07115
           0.27925  -0.01838  -0.01840  -0.01842  -0.01815  -0.03397  -0.05648  -0.07280
           0.29671  -0.01842  -0.01844  -0.01846  -0.01819  -0.03405  -0.05661  -0.07296
           0.31416  -0.01790  -0.01792  -0.01794  -0.01768  -0.03309  -0.05501  -0.07090
           0.33161  -0.01623  -0.01624  -0.01626  -0.01602  -0.02999  -0.04985  -0.06426
           0.34907  -0.01320  -0.01321  -0.01323  -0.01303  -0.02440  -0.04056  -0.05228
           0.36652  -0.00899  -0.00900  -0.00901  -0.00887  -0.01661  -0.02761  -0.03559
           0.38397  -0.00361  -0.00361  -0.00362  -0.00356  -0.00667  -0.01109  -0.01430
           0.40143   0.00269   0.00269   0.00269   0.00265   0.00497   0.00826   0.01065
           0.41888   0.00955   0.00956   0.00957   0.00943   0.01765   0.02934   0.03782
           0.43633   0.01632   0.01633   0.01635   0.01611   0.03015   0.05013   0.06462
           0.45379   0.02271   0.02273   0.02276   0.02242   0.04197   0.06978   0.08995
           0.47124   0.02843   0.02846   0.02849   0.02807   0.05254   0.08736   0.11260
           0.48869   0.03347   0.03350   0.03354   0.03305   0.06186   0.10284   0.13256
           0.50615   0.03801   0.03804   0.03809   0.03753   0.07024   0.11677   0.15052
              </tableData>
            </table>
          </function>
        </fcs_function>
        <!-- the gravity reference: the load factor that holds the flight path -->
        <fcs_function name="fcs/fbw/g-ref">
          <function>
            <product>
              <cos><property>attitude/theta-rad</property></cos>
              <cos><property>attitude/phi-rad</property></cos>
            </product>
          </function>
        </fcs_function>
        <!-- stick to load factor beyond the gravity reference, aft (negative) to n_max,
             no more than the lift at the angle-of-attack limits gives - beyond the
             gravity reference of the moment, so that full aft stick still reaches
             the limit in a steep climb or inverted - through a 0.2 s prefilter and
             a 12 g/s onset limit (a full pull at once pitches an agile airframe
             faster than its nose-down control can stop at the angle-of-attack
             limit) -->
        <fcs_function name="fcs/fbw/dn-stick">
          <function>
            <max>
              <min>
                <table>
                  <independentVar lookup="row">fcs/pitch-trim-sum</independentVar>
                  <tableData>
                    -1.0  8.000
                     0.0  0.0
                     1.0  -4.200
                  </tableData>
                </table>
                <difference><product><property>fcs/fbw/n-alpha</property><value>0.50615</value></product><property>fcs/fbw/g-ref</property></difference>
              </min>
              <difference><product><property>fcs/fbw/n-alpha</property><value>-0.17453</value></product><property>fcs/fbw/g-ref</property></difference>
            </max>
          </function>
        </fcs_function>
        <lag_filter name="fcs/fbw/dn-lag">
          <input>fcs/fbw/dn-stick</input>
          <c1>5.0</c1>
        </lag_filter>
        <actuator name="fcs/fbw/dn-cmd">
          <input>fcs/fbw/dn-lag</input>
          <rate_limit>12.0</rate_limit>
        </actuator>
        <!-- the response the command should produce (the short period's rise): the
             integrator trims away what differs from it, not the rise itself -->
        <lag_filter name="fcs/fbw/dn-model">
          <input>fcs/fbw/dn-cmd</input>
          <c1>2.5</c1>
        </lag_filter>
        <fcs_function name="fcs/fbw/dn">
          <function>
            <difference><property>accelerations/Nz</property><property>fcs/fbw/g-ref</property></difference>
          </function>
        </fcs_function>
        <!-- the angle of attack with its rise over the next 0.35 s counted as spent
             (the rise, not the pitch rate: in a steady pull the nose turns with the
             flight path and the angle of attack holds), and the load factor the
             angle of attack left to each limit gives -->
        <fcs_function name="fcs/fbw/alpha-ahead">
          <function>
            <sum>
              <property>aero/alpha-rad</property>
              <product><value>0.35</value><property>aero/alphadot-rad_sec</property></product>
            </sum>
          </function>
        </fcs_function>
        <fcs_function name="fcs/fbw/dn-room-up">
          <function>
            <product><property>fcs/fbw/n-alpha</property>
              <difference><value>0.50615</value><property>fcs/fbw/alpha-ahead</property></difference></product>
          </function>
        </fcs_function>
        <fcs_function name="fcs/fbw/dn-room-down">
          <function>
            <product><property>fcs/fbw/n-alpha</property>
              <difference><value>-0.17453</value><property>fcs/fbw/alpha-ahead</property></difference></product>
          </function>
        </fcs_function>
        <!-- the command limited to the load factor the aircraft pulls now plus what
             the angle of attack left gives: at a limit the feedforward asks for the
             load factor the airframe gives there, whatever elevator holds it - a
             steady pull on a stable airframe, a push on an unstable one (a
             feedforward faded out past the limit instead took about 10 deg of
             elevator per deg of alpha, on one side of it only: the actuator's rate
             limit could not follow, and the MiG-29A cycled between 24 and 29 deg) -->
        <fcs_function name="fcs/fbw/dn-limited">
          <function>
            <max>
              <min>
                <property>fcs/fbw/dn-cmd</property>
                <sum><property>fcs/fbw/dn</property><property>fcs/fbw/dn-room-up</property></sum>
              </min>
              <sum><property>fcs/fbw/dn</property><property>fcs/fbw/dn-room-down</property></sum>
            </max>
          </function>
        </fcs_function>
        <!-- the integrator's error: the load factor's departure from the model
             response, and at a limit the angle of attack left, counted five times -
             it trims what the airframe needs there beyond the linear design (vortex
             lift, the tail's power at high alpha) in a fraction of a second, not
             over the pull -->
        <fcs_function name="fcs/fbw/pitch-error">
          <function>
            <max>
              <min>
                <difference><property>fcs/fbw/dn-model</property><property>fcs/fbw/dn</property></difference>
                <product><value>5.0</value><property>fcs/fbw/dn-room-up</property></product>
              </min>
              <product><value>5.0</value><property>fcs/fbw/dn-room-down</property></product>
            </max>
          </function>
        </fcs_function>
        <fcs_function name="fcs/fbw/pitch-error-rate">
          <function><product><property>fcs/fbw/k-i</property><property>fcs/fbw/pitch-error</property></product></function>
        </fcs_function>
        <!-- the integrator: reset below 60 kt and on the wheels, held while the
             elevator is at a stop it would push further into (anti-windup) -->
        <switch name="fcs/fbw/pitch-hold">
          <default value="0"/>
          <test logic="OR" value="-1">
            velocities/vc-kts lt 60
            gear/wow gt 0
          </test>
          <test logic="AND" value="1">
            fcs/fbw/elevator-raw gt 0.43633
            fcs/fbw/pitch-error-rate gt 0
          </test>
          <test logic="AND" value="1">
            fcs/fbw/elevator-raw lt -0.43633
            fcs/fbw/pitch-error-rate lt 0
          </test>
        </switch>
        <integrator name="fcs/fbw/pitch-integral">
          <input>fcs/fbw/pitch-error-rate</input>
          <c1>1.0</c1>
          <trigger>fcs/fbw/pitch-hold</trigger>
          <clipto> <min>-0.5</min> <max>0.5</max> </clipto>
        </integrator>
        <!-- past an angle-of-attack limit (the next 0.35 s counted) a push back
             in proportion, all the travel 4 deg beyond: an unstable airframe
             pitching up fast needs it at once, not when an integrator winds -->
        <fcs_function name="fcs/fbw/alpha-push">
          <function>
            <difference>
              <product><value>6.25000</value>
                <max><value>0</value><difference><property>fcs/fbw/alpha-ahead</property><value>0.50615</value></difference></max></product>
              <product><value>6.25000</value>
                <max><value>0</value><difference><value>-0.17453</value><property>fcs/fbw/alpha-ahead</property></difference></max></product>
            </difference>
          </function>
        </fcs_function>
        <lag_filter name="fcs/fbw/ground">
          <input>gear/wow</input>
          <c1>2.0</c1>
        </lag_filter>
        <fcs_function name="fcs/fbw/ground-direct">
          <function>
            <product>
              <property>fcs/fbw/ground</property>
              <table>
                <independentVar lookup="row">fcs/pitch-trim-sum</independentVar>
                <tableData>
                  -1.0  -0.43633
                   0.0  0.0
                   1.0  0.43633
                </tableData>
              </table>
            </product>
          </function>
        </fcs_function>
        <!-- the elevator: the push, the moment compensation, angle-of-attack and
             pitch-rate feedback, the feedforward of the limited command, the
             integrator, the ground mode's direct stick -->
        <fcs_function name="fcs/fbw/elevator-raw">
          <function>
            <sum>
              <property>fcs/fbw/alpha-push</property>
              <property>fcs/fbw/moment-comp</property>
              <product><value>-1</value><property>fcs/fbw/k-alpha</property><property>aero/alpha-rad</property></product>
              <product><value>-1</value><property>fcs/fbw/k-q</property><property>velocities/q-rad_sec</property></product>
              <product><property>fcs/fbw/k-ff</property><property>fcs/fbw/dn-limited</property></product>
              <property>fcs/fbw/pitch-integral</property>
              <property>fcs/fbw/ground-direct</property>
            </sum>
          </function>
        </fcs_function>
        <pure_gain name="fcs/fbw/elevator">
          <input>fcs/fbw/elevator-raw</input>
          <gain>1.0</gain>
          <clipto> <min>-0.43633</min> <max>0.43633</max> </clipto>
        </pure_gain>
        <!-- full travel in 0.83 s: 60 deg/s for a +-25 deg tail, faster for a
             canard's longer throw -->
        <actuator name="fcs/elevator-actuator">
          <input>fcs/fbw/elevator</input>
          <lag>40</lag>
          <rate_limit>1.051</rate_limit>
          <output>fcs/elevator-pos-rad</output>
        </actuator>
      </channel>
      <channel name="Roll (fly-by-wire)">
        <!-- hangar: roll-rate command about the flight path, limited to what the rudder can
             coordinate; bank hold at neutral stick -->
        <summer name="fcs/roll-trim-sum">
          <input>fcs/aileron-cmd-norm</input>
          <input>fcs/roll-trim-cmd-norm</input>
          <clipto> <min>-1</min> <max>1</max> </clipto>
        </summer>
        <fcs_function name="fcs/fbw/k-roll">
          <function>
            <table>
              <independentVar lookup="row">aero/qbar-psf</independentVar>
              <independentVar lookup="column">velocities/mach</independentVar>
              <tableData>
                       0.150     0.400     0.700     0.900     1.100     1.400     2.000
              10.0   1.50000   1.50000   1.50000   1.50000   1.50000   1.50000   1.50000
              20.0   1.50000   1.50000   1.39955   1.19411   1.50000   1.50000   1.50000
              40.0   0.71807   0.74613   0.69141   0.53954   0.93835   1.50000   1.50000
              80.0   0.08883   0.21575   0.22310   0.19242   0.36556   0.64225   0.90981
             150.0   0.00988   0.09107   0.10129   0.08999   0.17379   0.30301   0.41669
             300.0   0.00000   0.02759   0.04020   0.03717   0.07423   0.13648   0.19437
             600.0   0.00000   0.00000   0.00870   0.01028   0.02385   0.05263   0.08619
            1200.0   0.00000   0.00000   0.00000   0.00000   0.00000   0.01077   0.03217
            2400.0   0.00000   0.00000   0.00000   0.00000   0.00000   0.00000   0.00522
              </tableData>
            </table>
          </function>
        </fcs_function>
        <fcs_function name="fcs/fbw/k-roll-ff">
          <function>
            <table>
              <independentVar lookup="row">aero/qbar-psf</independentVar>
              <independentVar lookup="column">velocities/mach</independentVar>
              <tableData>
                       0.150     0.400     0.700     0.900     1.100     1.400     2.000
              10.0   0.08114   0.03017   0.01672   0.01215   0.01936   0.02271   0.01590
              20.0   0.08114   0.03017   0.01672   0.01215   0.01936   0.02271   0.01590
              40.0   0.08114   0.03017   0.01672   0.01478   0.03136   0.02271   0.01590
              80.0   0.21642   0.07924   0.04190   0.02830   0.04368   0.05583   0.04673
             150.0   0.13527   0.04970   0.02673   0.01864   0.02930   0.03587   0.02916
             300.0   0.11288   0.04190   0.02317   0.01677   0.02669   0.03144   0.02242
             600.0   0.11105   0.04129   0.02288   0.01662   0.02648   0.03107   0.02179
            1200.0   0.11085   0.04122   0.02285   0.01660   0.02644   0.03103   0.02173
            2400.0   0.11081   0.04120   0.02284   0.01659   0.02644   0.03102   0.02172
              </tableData>
            </table>
          </function>
        </fcs_function>
        <fcs_function name="fcs/fbw/k-roll-i">
          <function>
            <table>
              <independentVar lookup="row">aero/qbar-psf</independentVar>
              <independentVar lookup="column">velocities/mach</independentVar>
              <tableData>
                       0.150     0.400     0.700     0.900     1.100     1.400     2.000
              10.0   0.28416   0.27602   0.25178   0.21445   0.40130   0.66729   0.86013
              20.0   0.14208   0.13801   0.12589   0.10722   0.20065   0.33365   0.43006
              40.0   0.07104   0.06900   0.06295   0.04927   0.08620   0.16682   0.21503
              80.0   0.02713   0.02622   0.02356   0.01962   0.03638   0.06205   0.08503
             150.0   0.01290   0.01251   0.01138   0.00966   0.01805   0.03012   0.03963
             300.0   0.00636   0.00618   0.00563   0.00479   0.00897   0.01493   0.01927
             600.0   0.00317   0.00308   0.00281   0.00239   0.00447   0.00744   0.00960
            1200.0   0.00158   0.00154   0.00140   0.00119   0.00223   0.00372   0.00479
            2400.0   0.00079   0.00077   0.00070   0.00060   0.00112   0.00186   0.00239
              </tableData>
            </table>
          </function>
        </fcs_function>
        <fcs_function name="fcs/fbw/p-max">
          <function>
            <table>
              <independentVar lookup="row">aero/qbar-psf</independentVar>
              <independentVar lookup="column">velocities/mach</independentVar>
              <tableData>
                       0.150     0.400     0.700     0.900     1.100     1.400     2.000
              10.0   4.30226   4.71239   4.71239   4.71239   4.71239   4.71239   4.71239
              20.0   4.30226   4.71239   4.71239   4.71239   4.71239   4.71239   4.71239
              40.0   4.30226   4.71239   4.71239   4.71239   4.71239   4.71239   4.71239
              80.0   1.61294   4.40521   4.71239   4.71239   4.71239   4.71239   4.71239
             150.0   2.58048   4.71239   4.71239   4.71239   4.71239   4.71239   4.71239
             300.0   3.09232   4.71239   4.71239   4.71239   4.71239   4.71239   4.71239
             600.0   3.14324   4.71239   4.71239   4.71239   4.71239   4.71239   4.71239
            1200.0   3.14911   4.71239   4.71239   4.71239   4.71239   4.71239   4.71239
            2400.0   3.15019   4.71239   4.71239   4.71239   4.71239   4.71239   4.71239
              </tableData>
            </table>
          </function>
        </fcs_function>
        <!-- the stick's rate halves towards alpha_max -->
        <fcs_function name="fcs/fbw/p-stick">
          <function>
            <product>
              <property>fcs/roll-trim-sum</property>
              <property>fcs/fbw/p-max</property>
              <table>
                <independentVar lookup="row">aero/alpha-rad</independentVar>
                <tableData>
                  0.20246 1.0
                  0.50615 0.5
                </tableData>
              </table>
            </product>
          </function>
        </fcs_function>
        <!-- the rudder's yaw acceleration at full travel (1/s^2), and the yaw damping (1/s) -->
        <fcs_function name="fcs/fbw/yaw-accel">
          <function>
            <table>
              <independentVar lookup="row">aero/qbar-psf</independentVar>
              <independentVar lookup="column">velocities/mach</independentVar>
              <tableData>
                       0.150     0.400     0.700     0.900     1.100     1.400     2.000
              10.0   0.06029   0.06159   0.06581   0.07341   0.04296   0.02697   0.02580
              20.0   0.12059   0.12318   0.13162   0.14681   0.08592   0.05393   0.05159
              40.0   0.24117   0.24637   0.26324   0.30826   0.18734   0.10786   0.10318
              80.0   0.59362   0.60796   0.65425   0.73655   0.43261   0.26878   0.24860
             150.0   1.16714   1.19326   1.27770   1.42919   0.83724   0.52396   0.49598
             300.0   2.36643   2.41780   2.58426   2.88376   1.68795   1.05901   1.01111
             600.0   4.74240   4.84464   5.17652   5.77391   3.37904   2.12106   2.02862
            1200.0   9.48410   9.68831  10.35167  11.54578   6.75676   4.24150   4.05778
            2400.0  18.96136  19.36952  20.69619  23.08429  13.50942   8.48013   8.11299
              </tableData>
            </table>
          </function>
        </fcs_function>
        <fcs_function name="fcs/fbw/yaw-damping">
          <function>
            <table>
              <independentVar lookup="row">aero/qbar-psf</independentVar>
              <independentVar lookup="column">velocities/mach</independentVar>
              <tableData>
                       0.150     0.400     0.700     0.900     1.100     1.400     2.000
              10.0   0.03642   0.01394   0.00847   0.00723   0.00615   0.00434   0.00236
              20.0   0.07284   0.02789   0.01695   0.01445   0.01231   0.00868   0.00472
              40.0   0.14569   0.05577   0.03389   0.02917   0.02508   0.01737   0.00943
              80.0   0.30639   0.11739   0.07151   0.06119   0.05218   0.03668   0.01972
             150.0   0.58634   0.22456   0.13658   0.11660   0.09930   0.07001   0.03782
             300.0   1.17114   0.44823   0.27213   0.23178   0.19726   0.13940   0.07596
             600.0   2.32266   0.88901   0.54001   0.46025   0.39181   0.27667   0.15059
            1200.0   4.62706   1.77120   1.07627   0.91777   0.78146   0.55150   0.29975
            2400.0   9.24616   3.53958   2.15093   1.83428   1.56190   1.10220   0.59869
              </tableData>
            </table>
          </function>
        </fcs_function>
        <!-- the rudder's share of the yaw a roll about the flight path needs, per unit of
             its roll acceleration: sin(alpha), less the ailerons' own yaw and what a
             principal axis inclined to the body axis gives -->
        <fcs_function name="fcs/fbw/roll-yaw-share">
          <function>
            <table>
              <independentVar lookup="row">aero/alpha-rad</independentVar>
              <tableData>
                   -0.34907  -0.38901
                   -0.26180  -0.31710
                   -0.17453  -0.24324
                   -0.08727  -0.15897
                    0.00000  -0.06666
                    0.08727   0.02574
                    0.17453   0.10793
                    0.26180   0.17519
                    0.34907   0.24297
                    0.43633   0.31395
                    0.52360   0.38412
                    0.61087   0.45754
                    0.69813   0.53524
                    0.78540   0.61031
                    0.87266   0.66575
              </tableData>
            </table>
          </function>
        </fcs_function>
        <!-- the yaw acceleration each rad/s of roll rate needs while the aircraft pitches
             under it: the pitch rate's inertia coupling, the angle of attack rising, and
             the yaw damping the roll's yaw rate meets -->
        <fcs_function name="fcs/fbw/p-yaw-need">
          <function>
            <abs>
              <sum>
                <product>
                  <sum>
                    <property>aero/alphadot-rad_sec</property>
                    <product><value>0.70397</value><property>velocities/q-rad_sec</property></product>
                  </sum>
                  <cos><property>aero/alpha-rad</property></cos>
                </product>
                <product><property>fcs/fbw/yaw-damping</property><sin><property>aero/alpha-rad</property></sin></product>
              </sum>
            </abs>
          </function>
        </fcs_function>
        <!-- no more roll rate than 0.5 of the rudder's yaw holds: a roll the rudder cannot
             follow turns the angle of attack into sideslip -->
        <fcs_function name="fcs/fbw/p-yaw-max">
          <function>
            <quotient>
              <product><value>0.5</value><property>fcs/fbw/yaw-accel</property></product>
              <max><value>0.001</value><property>fcs/fbw/p-yaw-need</property></max>
            </quotient>
          </function>
        </fcs_function>
        <fcs_function name="fcs/fbw/p-limited">
          <function>
            <max>
              <min><property>fcs/fbw/p-stick</property><property>fcs/fbw/p-yaw-max</property></min>
              <product><value>-1</value><property>fcs/fbw/p-yaw-max</property></product>
            </max>
          </function>
        </fcs_function>
        <!-- and while the rate grows, no faster roll acceleration than all of it
             coordinates, unless the roll asked for could not leave 2.0 deg of sideslip
             even uncoordinated: at worst c^2 p^2 / (8 Y), c the rudder's share, Y its yaw
             acceleration, p the rate asked for -->
        <fcs_function name="fcs/fbw/p-accel">
          <function>
            <product>
              <quotient>
                <property>fcs/fbw/yaw-accel</property>
                <max><value>0.01</value><abs><property>fcs/fbw/roll-yaw-share</property></abs></max>
              </quotient>
              <max>
                <value>1</value>
                <quotient>
                  <product><value>0.27925</value><property>fcs/fbw/yaw-accel</property></product>
                  <sum>
                    <value>1e-9</value>
                    <product>
                      <property>fcs/fbw/roll-yaw-share</property><property>fcs/fbw/roll-yaw-share</property>
                      <property>fcs/fbw/p-limited</property><property>fcs/fbw/p-limited</property>
                    </product>
                  </sum>
                </quotient>
              </max>
            </product>
          </function>
        </fcs_function>
        <!-- a roll is stopped as fast as the ailerons can -->
        <fcs_function name="fcs/fbw/p-accel-up">
          <function>
            <sum><property>fcs/fbw/p-accel</property>
              <product><value>1000</value><lt><property>fcs/fbw/p-cmd</property><value>0</value></lt></product></sum>
          </function>
        </fcs_function>
        <fcs_function name="fcs/fbw/p-accel-down">
          <function>
            <sum><property>fcs/fbw/p-accel</property>
              <product><value>1000</value><gt><property>fcs/fbw/p-cmd</property><value>0</value></gt></product></sum>
          </function>
        </fcs_function>
        <actuator name="fcs/fbw/p-cmd">
          <input>fcs/fbw/p-limited</input>
          <rate_limit sense="incr">fcs/fbw/p-accel-up</rate_limit>
          <rate_limit sense="decr">fcs/fbw/p-accel-down</rate_limit>
        </actuator>
        <fcs_function name="fcs/fbw/p-stability">
          <function>
            <sum>
              <product><property>velocities/p-rad_sec</property><cos><property>aero/alpha-rad</property></cos></product>
              <product><property>velocities/r-rad_sec</property><sin><property>aero/alpha-rad</property></sin></product>
            </sum>
          </function>
        </fcs_function>
        <fcs_function name="fcs/fbw/roll-error-rate">
          <function>
            <product><property>fcs/fbw/k-roll-i</property>
              <difference><property>fcs/fbw/p-cmd</property><property>fcs/fbw/p-stability</property></difference></product>
          </function>
        </fcs_function>
        <integrator name="fcs/fbw/roll-integral">
          <input>fcs/fbw/roll-error-rate</input>
          <c1>1.0</c1>
          <trigger>fcs/fbw/reset</trigger>
          <clipto> <min>-0.21817</min> <max>0.21817</max> </clipto>
        </integrator>
        <fcs_function name="fcs/fbw/aileron">
          <function>
            <sum>
              <product><property>fcs/fbw/k-roll-ff</property><property>fcs/fbw/p-cmd</property></product>
              <product><property>fcs/fbw/k-roll</property>
                <difference><property>fcs/fbw/p-cmd</property><property>fcs/fbw/p-stability</property></difference></product>
              <property>fcs/fbw/roll-integral</property>
            </sum>
          </function>
          <clipto> <min>-0.43633</min> <max>0.43633</max> </clipto>
        </fcs_function>
        <actuator name="fcs/left-aileron-actuator">
          <input>fcs/fbw/aileron</input>
          <lag>40</lag>
          <rate_limit>1.4</rate_limit>
          <output>fcs/left-aileron-pos-rad</output>
        </actuator>
        <pure_gain name="fcs/right-aileron">
          <input>fcs/left-aileron-pos-rad</input>
          <gain>-1</gain>
          <output>fcs/right-aileron-pos-rad</output>
        </pure_gain>
      </channel>
      <channel name="Yaw (fly-by-wire)">
        <!-- hangar: yaw damper, sideslip feedback, pedals command sideslip -->
        <summer name="fcs/yaw-trim-sum">
          <input>fcs/rudder-cmd-norm</input>
          <input>fcs/yaw-trim-cmd-norm</input>
          <clipto> <min>-1</min> <max>1</max> </clipto>
        </summer>
        <fcs_function name="fcs/fbw/k-yaw-r">
          <function>
            <table>
              <independentVar lookup="row">aero/qbar-psf</independentVar>
              <independentVar lookup="column">velocities/mach</independentVar>
              <tableData>
                       0.150     0.400     0.700     0.900     1.100     1.400     2.000
              10.0  -3.00000  -3.00000  -3.00000  -3.00000  -3.00000  -3.00000  -3.00000
              20.0  -3.00000  -3.00000  -3.00000  -3.00000  -3.00000  -3.00000  -3.00000
              40.0  -2.51050  -2.58027  -2.44257  -2.08783  -3.00000  -3.00000  -3.00000
              80.0  -1.44550  -1.55687  -1.43965  -1.23073  -2.02583  -3.00000  -3.00000
             150.0  -0.50621  -0.66407  -0.65243  -0.58266  -0.97968  -1.54544  -1.86093
             300.0  -0.14657  -0.31737  -0.33931  -0.31597  -0.54254  -0.84120  -0.94875
             600.0   0.00000  -0.16632  -0.19906  -0.19171  -0.33535  -0.52216  -0.57756
            1200.0   0.00000  -0.08036  -0.11784  -0.11798  -0.21124  -0.33621  -0.37771
            2400.0   0.00000  -0.02397  -0.06425  -0.06891  -0.12836  -0.21326  -0.24986
              </tableData>
            </table>
          </function>
        </fcs_function>
        <fcs_function name="fcs/fbw/k-yaw-beta">
          <function>
            <table>
              <independentVar lookup="row">aero/qbar-psf</independentVar>
              <independentVar lookup="column">velocities/mach</independentVar>
              <tableData>
                       0.150     0.400     0.700     0.900     1.100     1.400     2.000
              10.0   3.00000   3.00000   3.00000   3.00000   3.00000   3.00000   3.00000
              20.0   3.00000   3.00000   3.00000   3.00000   3.00000   3.00000   3.00000
              40.0   3.00000   3.00000   3.00000   1.83391   0.00000   3.00000   3.00000
              80.0   0.00000   0.00000   0.00000   0.00000   0.00000   0.00000   0.00000
             150.0   0.00000   0.00000   0.00000   0.00000   0.00000   0.00000   0.00000
             300.0   0.00000   0.00000   0.00000   0.00000   0.00000   0.00000   0.00000
             600.0   0.00000   0.00000   0.00000   0.00000   0.00000   0.00000   0.00000
            1200.0   0.00000   0.00000   0.00000   0.00000   0.00000   0.00000   0.00000
            2400.0   0.00000   0.00000   0.00000   0.00000   0.00000   0.00000   0.00000
              </tableData>
            </table>
          </function>
        </fcs_function>
        <fcs_function name="fcs/fbw/k-pedal">
          <function>
            <table>
              <independentVar lookup="row">aero/qbar-psf</independentVar>
              <independentVar lookup="column">velocities/mach</independentVar>
              <tableData>
                       0.150     0.400     0.700     0.900     1.100     1.400     2.000
              10.0   0.02349   0.02331   0.02270   0.02147   0.03601   0.04913   0.04913
              20.0   0.02349   0.02331   0.02270   0.02147   0.03601   0.04913   0.04913
              40.0   0.02349   0.02331   0.02270   0.02421   0.04495   0.04913   0.04913
              80.0   0.06695   0.06786   0.07007   0.07162   0.12382   0.15497   0.11761
             150.0   0.10214   0.10222   0.10194   0.09951   0.16894   0.22261   0.19949
             300.0   0.12156   0.12097   0.11861   0.11323   0.19061   0.25739   0.24868
             600.0   0.12807   0.12721   0.12410   0.11765   0.19750   0.26878   0.26599
            1200.0   0.13004   0.12909   0.12575   0.11898   0.19958   0.27222   0.27136
            2400.0   0.13044   0.12945   0.12608   0.11927   0.20004   0.27292   0.27272
              </tableData>
            </table>
          </function>
        </fcs_function>
        <!-- the yaw damper damps the sideslip's rate, the stability-axis yaw rate less
             the one that coordinates the bank and the side force: in the dutch roll the
             yaw rate itself, and zero in a steady coordinated turn, in a roll about the
             flight path and in a steady sideslip - it coordinates those as long as they
             last (a damper on the washed-out yaw rate stopped coordinating a sustained
             roll, and at low speed the roll turned the angle of attack into sideslip) -->
        <!-- on the wheels (the pitch's ground mode, fcs/fbw/ground) the pedals move the rudder
             directly over its travel, a ground law: the sideslip feedback, there the
             crosswind's, turned the nose into it, and as the C-17A's nose wheel unloaded
             towards its rotation it ran 8.6 m off its line across 10 m/s -->
        <fcs_function name="fcs/fbw/rudder">
          <function>
            <sum>
              <product>
                <difference><value>1</value><property>fcs/fbw/ground</property></difference>
                <sum>
                  <product><property>fcs/fbw/k-pedal</property><property>fcs/yaw-trim-sum</property></product>
                  <product><value>-1</value><property>fcs/fbw/k-yaw-beta</property>
                    <difference><property>aero/beta-rad</property>
                      <product><value>0.17453</value><property>fcs/yaw-trim-sum</property></product></difference></product>
                  <product><property>fcs/fbw/k-yaw-r</property><property>aero/betadot-rad_sec</property></product>
                </sum>
              </product>
              <product><property>fcs/fbw/ground</property><value>0.43633</value><property>fcs/yaw-trim-sum</property></product>
            </sum>
          </function>
          <clipto> <min>-0.43633</min> <max>0.43633</max> </clipto>
        </fcs_function>
        <actuator name="fcs/rudder-actuator">
          <input>fcs/fbw/rudder</input>
          <lag>40</lag>
          <rate_limit>1.4</rate_limit>
          <output>fcs/rudder-pos-rad</output>
        </actuator>
        <!-- the nose wheel steers with the pedals (JSBSim steers from fcs/steer-cmd-norm,
             positive right; the rudder command is positive left) -->
        <pure_gain name="fcs/steer-from-rudder">
          <input>fcs/yaw-trim-sum</input>
          <gain>-1</gain>
          <output>fcs/steer-cmd-norm</output>
        </pure_gain>
      </channel>
      <channel name="Speedbrake">
        <kinematic name="fcs/speedbrake-control">
          <input>fcs/speedbrake-cmd-norm</input>
          <traverse>
            <setting> <position>0</position> <time>0</time> </setting>
            <setting> <position>1</position> <time>2.00</time> </setting>
          </traverse>
          <output>fcs/speedbrake-pos-norm</output>
        </kinematic>
      </channel>
      <channel name="Leading-Edge Flaps">
        <fcs_function name="fcs/lef-schedule">
          <function>
            <sum>
              <product> <value>1.38</value> <property>aero/alpha-deg</property> </product>
              <product> <value>-9.05</value>
                <quotient> <property>aero/qbar-psf</property> <property>atmosphere/P-psf</property> </quotient>
              </product>
              <value>1.45</value>
            </sum>
          </function>
          <clipto> <min>-2</min> <max>25</max> </clipto>
        </fcs_function>
        <actuator name="fcs/lef-actuator">
          <input>fcs/lef-schedule</input>
          <lag>7.35</lag>
          <rate_limit>25</rate_limit>
          <output>fcs/lef-pos-deg</output>
        </actuator>
      </channel>
      <channel name="Throttle 0">
        <fcs_function name="fcs/throttle-lever-0">
          <function>
            <table>
              <independentVar lookup="row">fcs/throttle-cmd-norm[0]</independentVar>
              <tableData>
                0.0  0.0
                0.8  1.0
                1.0  2.0
              </tableData>
            </table>
          </function>
          <output>fcs/throttle-pos-norm[0]</output>
        </fcs_function>
      </channel>
      <channel name="Landing Gear">
        <kinematic name="fcs/gear-control">
          <input>gear/gear-cmd-norm</input>
          <traverse>
            <setting> <position>0</position> <time>0</time> </setting>
            <setting> <position>1</position> <time>5</time> </setting>
          </traverse>
          <output>gear/gear-pos-norm</output>
        </kinematic>
      </channel>
    </flight_control>
    <aerodynamics>
        <function name="aero/function/mach-lift">
          <description>lift, and damping, over its low-speed value (hangar: aero/mach.py)</description>
          <table>
            <independentVar lookup="row">velocities/mach</independentVar>
            <tableData>
                 0.000     1.000000
                 0.300     1.014119
                 0.500     1.042016
                 0.600     1.063822
                 0.700     1.093336
                 0.800     1.134727
                 0.850     1.162651
                 0.900     1.198857
                 0.950     1.216465
                 1.000     1.231083
                 1.050     1.241802
                 1.100     1.247714
                 1.200     1.241485
                 1.400     1.120540
                 1.600     1.025775
                 1.800     0.947273
                 2.000     0.869319
                 2.300     0.745963
                 2.600     0.655248
            </tableData>
          </table>
        </function>
        <function name="aero/function/mach-side">
          <description>side force, rolling and yawing moment over their low-speed values</description>
          <table>
            <independentVar lookup="row">velocities/mach</independentVar>
            <tableData>
                 0.000     1.000000
                 0.300     1.009387
                 0.500     1.027596
                 0.600     1.041491
                 0.700     1.059760
                 0.800     1.084140
                 0.850     1.099571
                 0.900     1.117949
                 0.950     1.119887
                 1.000     1.116762
                 1.050     1.109054
                 1.100     1.097245
                 1.200     1.063247
                 1.400     0.939888
                 1.600     0.847599
                 1.800     1.008189
                 2.000     0.899109
                 2.300     0.776195
                 2.600     0.684550
            </tableData>
          </table>
        </function>
        <function name="aero/function/mach-dCm-dCL">
          <description>pitching moment per unit low-speed lift: the neutral point's move</description>
          <table>
            <independentVar lookup="row">velocities/mach</independentVar>
            <tableData>
                 0.000     0.000000
                 0.300    -0.002986
                 0.500    -0.009230
                 0.600    -0.014439
                 0.700    -0.021961
                 0.800    -0.033429
                 0.850    -0.041747
                 0.900    -0.053147
                 0.950    -0.075779
                 1.000    -0.105940
                 1.050    -0.138550
                 1.100    -0.168201
                 1.200    -0.196497
                 1.400    -0.177771
                 1.600    -0.163098
                 1.800    -0.150943
                 2.000    -0.138873
                 2.300    -0.119773
                 2.600    -0.105727
            </tableData>
          </table>
        </function>
        <function name="aero/function/mach-dCD0">
          <description>zero-lift drag's change: friction and wave drag</description>
          <table>
            <independentVar lookup="row">velocities/mach</independentVar>
            <tableData>
                 0.000     0.000000
                 0.300    -0.000077
                 0.500    -0.000209
                 0.600    -0.000298
                 0.700    -0.000400
                 0.800    -0.000513
                 0.850    -0.000574
                 0.900    -0.000638
                 0.950    -0.000704
                 1.000    -0.000772
                 1.050    -0.000842
                 1.100     0.014965
                 1.200     0.014816
                 1.400     0.014144
                 1.600     0.013645
                 1.800     0.013176
                 2.000     0.012728
                 2.300     0.012091
                 2.600     0.011498
            </tableData>
          </table>
        </function>
        <function name="aero/function/mach-dK">
          <description>induced-drag factor's change (per CL^2)</description>
          <table>
            <independentVar lookup="row">velocities/mach</independentVar>
            <tableData>
                 0.000     0.000000
                 0.300     0.007178
                 0.500     0.020513
                 0.600     0.030214
                 0.700     0.042431
                 0.800     0.057985
                 0.850     0.067553
                 0.900     0.078978
                 0.950     0.084169
                 1.000     0.088310
                 1.050     0.091841
                 1.100     0.095048
                 1.200     0.099473
                 1.400     0.095041
                 1.600     0.112425
                 1.800     0.130816
                 2.000     0.119576
                 2.300     0.073152
                 2.600     0.009751
            </tableData>
          </table>
        </function>
        <function name="aero/function/mach-aileron">
          <description>aileron power over its low-speed value</description>
          <table>
            <independentVar lookup="row">velocities/mach</independentVar>
            <tableData>
                 0.000     1.000000
                 0.300     1.019497
                 0.500     1.059581
                 0.600     1.092511
                 0.700     1.139605
                 0.800     1.211283
                 0.850     1.263909
                 0.900     1.338017
                 0.950     1.254856
                 1.000     1.099085
                 1.050     0.907029
                 1.100     0.715014
                 1.200     0.476407
                 1.400     0.429996
                 1.600     0.393631
                 1.800     0.363506
                 2.000     0.333593
                 2.300     0.286256
                 2.600     0.251445
            </tableData>
          </table>
        </function>
        <function name="aero/function/mach-elevator">
          <description>elevator power over its low-speed value</description>
          <table>
            <independentVar lookup="row">velocities/mach</independentVar>
            <tableData>
                 0.000     1.000000
                 0.300     0.999266
                 0.500     0.998075
                 0.600     0.997503
                 0.700     0.997490
                 0.800     0.999737
                 0.850     1.003493
                 0.900     1.012404
                 0.950     0.949321
                 1.000     0.831413
                 1.050     0.686126
                 1.100     0.540909
                 1.200     0.360471
                 1.400     0.325355
                 1.600     0.297839
                 1.800     0.275045
                 2.000     0.252411
                 2.300     0.216594
                 2.600     0.190254
            </tableData>
          </table>
        </function>
        <function name="aero/function/mach-rudder">
          <description>rudder power over its low-speed value</description>
          <table>
            <independentVar lookup="row">velocities/mach</independentVar>
            <tableData>
                 0.000     1.000000
                 0.300     1.014348
                 0.500     1.043376
                 0.600     1.066737
                 0.700     1.099356
                 0.800     1.147163
                 0.850     1.180834
                 0.900     1.226246
                 0.950     1.153501
                 1.000     1.026892
                 1.050     0.872807
                 1.100     0.717634
                 1.200     0.509579
                 1.400     0.450458
                 1.600     0.406226
                 1.800     0.483192
                 2.000     0.430913
                 2.300     0.372005
                 2.600     0.328082
            </tableData>
          </table>
        </function>
        <function name="aero/function/CL-base">
          <description>CL over alpha and beta at low speed</description>
          <table>
            <independentVar lookup="row">aero/alpha-deg</independentVar>
            <independentVar lookup="column">aero/beta-deg</independentVar>
            <tableData>
                        -90.00    -70.00    -50.00    -40.00    -30.00    -25.00    -20.00    -15.00    -10.00     -6.00     -3.00      0.00      3.00      6.00     10.00     15.00     20.00     25.00     30.00     40.00     50.00     70.00     90.00
             -180.00  -0.00000   0.00000   0.00000   0.00000   0.00000   0.00000   0.00000   0.00000   0.00000   0.00000   0.00000   0.00000   0.00000   0.00000   0.00000   0.00000   0.00000   0.00000   0.00000   0.00000   0.00000   0.00000  -0.00000
             -120.00   0.00000   0.07766   0.23739   0.32746   0.41093   0.44718   0.47836   0.50358   0.52211   0.53258   0.53707   0.53718   0.53707   0.53258   0.52211   0.50358   0.47836   0.44718   0.41093   0.32746   0.23739   0.07766   0.00000
              -70.00  -0.00000  -0.06115  -0.18916  -0.26168  -0.32908  -0.35841  -0.38364  -0.40407  -0.41909  -0.42693  -0.43097  -0.43073  -0.43097  -0.42693  -0.41909  -0.40407  -0.38364  -0.35841  -0.32908  -0.26168  -0.18916  -0.06115  -0.00000
              -46.00  -0.00000  -0.32649  -0.64122  -0.84476  -1.03858  -1.08380  -1.09894  -1.10326  -1.12470  -1.14302  -1.14989  -1.15214  -1.14989  -1.14302  -1.12470  -1.10326  -1.09894  -1.08380  -1.03858  -0.84476  -0.64122  -0.32649  -0.00000
              -32.00  -0.00000  -0.38712  -0.60065  -0.79135  -0.96248  -1.03658  -1.10489  -1.16466  -1.18357  -1.17686  -1.16846  -1.16567  -1.16846  -1.17686  -1.18357  -1.16466  -1.10489  -1.03658  -0.96248  -0.79135  -0.60065  -0.38712  -0.00000
              -22.00  -0.00000  -0.28544  -0.44290  -0.59327  -0.72896  -0.78423  -0.82951  -0.88645  -0.94054  -0.97634  -0.99419  -1.00025  -0.99419  -0.97634  -0.94054  -0.88645  -0.82951  -0.78423  -0.72896  -0.59327  -0.44290  -0.28544  -0.00000
              -17.00  -0.00000  -0.22091  -0.34411  -0.46990  -0.58918  -0.63510  -0.67859  -0.72123  -0.75306  -0.76936  -0.77564  -0.77714  -0.77564  -0.76936  -0.75306  -0.72123  -0.67859  -0.63510  -0.58918  -0.46990  -0.34411  -0.22091  -0.00000
              -13.00  -0.00000  -0.16868  -0.26461  -0.36580  -0.46420  -0.50037  -0.53021  -0.55486  -0.57034  -0.57673  -0.57919  -0.57998  -0.57919  -0.57673  -0.57034  -0.55486  -0.53021  -0.50037  -0.46420  -0.36580  -0.26461  -0.16868  -0.00000
               -9.00  -0.00000  -0.11919  -0.18257  -0.25594  -0.32774  -0.35175  -0.36785  -0.37919  -0.38654  -0.39016  -0.39161  -0.39205  -0.39161  -0.39016  -0.38654  -0.37919  -0.36785  -0.35175  -0.32774  -0.25594  -0.18257  -0.11919  -0.00000
               -5.00  -0.00000  -0.06852  -0.10132  -0.14589  -0.18978  -0.20198  -0.20812  -0.21202  -0.21455  -0.21569  -0.21607  -0.21616  -0.21607  -0.21569  -0.21455  -0.21202  -0.20812  -0.20198  -0.18978  -0.14589  -0.10132  -0.06852  -0.00000
               -1.00  -0.00000  -0.01385  -0.02173  -0.03967  -0.05535  -0.05585  -0.05236  -0.04867  -0.04581  -0.04427  -0.04357  -0.04330  -0.04357  -0.04427  -0.04581  -0.04867  -0.05236  -0.05585  -0.05535  -0.03967  -0.02173  -0.01385  -0.00000
                3.00   0.00000   0.04220   0.06321   0.06776   0.07865   0.08988   0.10371   0.11524   0.12362   0.12787   0.12959   0.13012   0.12959   0.12787   0.12362   0.11524   0.10371   0.08988   0.07865   0.06776   0.06321   0.04220   0.00000
                7.00   0.00000   0.10270   0.14109   0.17264   0.21100   0.23423   0.25964   0.27920   0.29329   0.30046   0.30343   0.30439   0.30343   0.30046   0.29329   0.27920   0.25964   0.23423   0.21100   0.17264   0.14109   0.10270   0.00000
               11.00   0.00000   0.16650   0.22716   0.28285   0.34695   0.38223   0.42098   0.44994   0.47042   0.48080   0.48515   0.48658   0.48515   0.48080   0.47042   0.44994   0.42098   0.38223   0.34695   0.28285   0.22716   0.16650   0.00000
               15.00   0.00000   0.22664   0.31634   0.39476   0.48061   0.52724   0.58367   0.62675   0.65831   0.67419   0.68024   0.68216   0.68024   0.67419   0.65831   0.62675   0.58367   0.52724   0.48061   0.39476   0.31634   0.22664   0.00000
               19.00   0.00000   0.28139   0.40036   0.49975   0.60157   0.65907   0.72999   0.78876   0.83615   0.86348   0.87661   0.88165   0.87661   0.86348   0.83615   0.78876   0.72999   0.65907   0.60157   0.49975   0.40036   0.28139   0.00000
               23.00   0.00000   0.33084   0.47794   0.60521   0.72885   0.79558   0.86763   0.92786   0.98389   1.01942   1.03504   1.04031   1.03504   1.01942   0.98389   0.92786   0.86763   0.79558   0.72885   0.60521   0.47794   0.33084   0.00000
               27.00   0.00000   0.37811   0.54603   0.70265   0.85367   0.92822   1.00221   1.05842   1.09456   1.11390   1.12245   1.12534   1.12245   1.11390   1.09456   1.05842   1.00221   0.92822   0.85367   0.70265   0.54603   0.37811   0.00000
               32.00   0.00000   0.42620   0.61463   0.80152   0.98932   1.07220   1.14331   1.17925   1.18269   1.17073   1.15873   1.15425   1.15873   1.17073   1.18269   1.17925   1.14331   1.07220   0.98932   0.80152   0.61463   0.42620   0.00000
               46.00   0.00000   0.29196   0.66019   0.86487   1.03231   1.06542   1.07965   1.09744   1.13468   1.15215   1.15944   1.16181   1.15944   1.15215   1.13468   1.09744   1.07965   1.06542   1.03231   0.86487   0.66019   0.29196   0.00000
               70.00   0.00000   0.06122   0.18939   0.26201   0.32950   0.35886   0.38413   0.40459   0.41963   0.42747   0.43152   0.43128   0.43152   0.42747   0.41963   0.40459   0.38413   0.35886   0.32950   0.26201   0.18939   0.06122   0.00000
              120.00  -0.00000  -0.07766  -0.23739  -0.32746  -0.41093  -0.44718  -0.47836  -0.50358  -0.52211  -0.53258  -0.53707  -0.53718  -0.53707  -0.53258  -0.52211  -0.50358  -0.47836  -0.44718  -0.41093  -0.32746  -0.23739  -0.07766  -0.00000
              180.00   0.00000   0.00000   0.00000   0.00000   0.00000   0.00000   0.00000   0.00000   0.00000   0.00000   0.00000   0.00000   0.00000   0.00000   0.00000   0.00000   0.00000   0.00000   0.00000   0.00000   0.00000   0.00000   0.00000
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            </tableData>
          </table>
        </function>
      <axis name="DRAG">
        <function name="aero/coefficient/CD_base">
          <description>CD over alpha and beta (hangar)</description>
          <product>
            <property>aero/qbar-psf</property>
            <property>metrics/Sw-sqft</property>
          <table>
            <independentVar lookup="row">aero/alpha-deg</independentVar>
            <independentVar lookup="column">aero/beta-deg</independentVar>
            <tableData>
                        -90.00    -70.00    -50.00    -40.00    -30.00    -25.00    -20.00    -15.00    -10.00     -6.00     -3.00      0.00      3.00      6.00     10.00     15.00     20.00     25.00     30.00     40.00     50.00     70.00     90.00
             -180.00   0.29180   0.22578   0.12416   0.07943   0.04592   0.03397   0.02515   0.01916   0.01346   0.01321   0.01360   0.01374   0.01360   0.01321   0.01346   0.01916   0.02515   0.03397   0.04592   0.07943   0.12416   0.22578   0.29180
             -120.00   0.29180   0.28575   0.40639   0.52846   0.67080   0.74085   0.80498   0.85946   0.90099   0.92296   0.93256   0.93590   0.93256   0.92296   0.90099   0.85946   0.80498   0.74085   0.67080   0.52846   0.40639   0.28575   0.29180
              -70.00   0.29180   0.31768   0.49749   0.65813   0.83990   0.92824   1.00871   1.07685   1.12873   1.15638   1.16820   1.17226   1.16820   1.15638   1.12873   1.07685   1.00871   0.92824   0.83990   0.65813   0.49749   0.31768   0.29180
              -46.00   0.29180   0.37737   0.58228   0.75679   0.95341   1.01267   1.04291   1.05967   1.08961   1.11439   1.12455   1.12796   1.12455   1.11439   1.08961   1.05967   1.04291   1.01267   0.95341   0.75679   0.58228   0.37737   0.29180
              -32.00   0.29180   0.35118   0.40357   0.46783   0.54829   0.58894   0.62900   0.66776   0.67919   0.67490   0.66957   0.66779   0.66957   0.67490   0.67919   0.66776   0.62900   0.58894   0.54829   0.46783   0.40357   0.35118   0.29180
              -22.00   0.29180   0.31074   0.27973   0.27671   0.28983   0.29746   0.30645   0.32191   0.33655   0.34777   0.35377   0.35584   0.35377   0.34777   0.33655   0.32191   0.30645   0.29746   0.28983   0.27671   0.27973   0.31074   0.29180
              -17.00   0.29180   0.29543   0.23494   0.20774   0.19746   0.19445   0.19689   0.20018   0.20076   0.20119   0.20123   0.20105   0.20123   0.20119   0.20076   0.20018   0.19689   0.19445   0.19746   0.20774   0.23494   0.29543   0.29180
              -13.00   0.29180   0.28642   0.20994   0.16777   0.14224   0.13263   0.12763   0.12226   0.11559   0.11189   0.11032   0.10981   0.11032   0.11189   0.11559   0.12226   0.12763   0.13263   0.14224   0.16777   0.20994   0.28642   0.29180
               -9.00   0.29180   0.28066   0.19288   0.13984   0.10294   0.08848   0.08063   0.06897   0.05958   0.05486   0.05291   0.05227   0.05291   0.05486   0.05958   0.06897   0.08063   0.08848   0.10294   0.13984   0.19288   0.28066   0.29180
               -5.00   0.29180   0.27732   0.18335   0.12390   0.08045   0.06345   0.05375   0.04060   0.03038   0.02526   0.02316   0.02248   0.02316   0.02526   0.03038   0.04060   0.05375   0.06345   0.08045   0.12390   0.18335   0.27732   0.29180
               -1.00   0.29180   0.27566   0.17971   0.11764   0.07153   0.05365   0.04340   0.02986   0.01944   0.01424   0.01212   0.01144   0.01212   0.01424   0.01944   0.02986   0.04340   0.05365   0.07153   0.11764   0.17971   0.27566   0.29180
                3.00   0.29180   0.27619   0.18151   0.11892   0.07282   0.05542   0.04573   0.03280   0.02285   0.01788   0.01586   0.01520   0.01586   0.01788   0.02285   0.03280   0.04573   0.05542   0.07282   0.11892   0.18151   0.27619   0.29180
                7.00   0.29180   0.27921   0.18828   0.12775   0.08444   0.06898   0.06124   0.05011   0.04146   0.03713   0.03536   0.03478   0.03536   0.03713   0.04146   0.05011   0.06124   0.06898   0.08444   0.12775   0.18828   0.27921   0.29180
               11.00   0.29180   0.28503   0.20214   0.14703   0.11005   0.09855   0.09505   0.08768   0.08170   0.07872   0.07751   0.07711   0.07751   0.07872   0.08170   0.08768   0.09505   0.09855   0.11005   0.14703   0.20214   0.28503   0.29180
               15.00   0.29180   0.29444   0.22468   0.17932   0.15248   0.14716   0.15165   0.15155   0.15115   0.15100   0.15081   0.15073   0.15081   0.15100   0.15115   0.15155   0.15165   0.14716   0.15248   0.17932   0.22468   0.29444   0.29180
               19.00   0.29180   0.30677   0.25576   0.22451   0.21063   0.21360   0.22831   0.23917   0.24845   0.25455   0.25778   0.25911   0.25778   0.25455   0.24845   0.23917   0.22831   0.21360   0.21063   0.22451   0.25576   0.30677   0.29180
               23.00   0.29180   0.32161   0.29544   0.28556   0.29140   0.30486   0.32691   0.34702   0.36611   0.37921   0.38511   0.38712   0.38511   0.37921   0.36611   0.34702   0.32691   0.30486   0.29140   0.28556   0.29544   0.32161   0.29180
               27.00   0.29180   0.33922   0.34297   0.36174   0.39675   0.42292   0.45392   0.48177   0.49790   0.50657   0.51042   0.51173   0.51042   0.50657   0.49790   0.48177   0.45392   0.42292   0.39675   0.36174   0.34297   0.33922   0.29180
               32.00   0.29180   0.36393   0.41061   0.47196   0.55592   0.60092   0.64352   0.66926   0.67224   0.66512   0.65771   0.65492   0.65771   0.66512   0.67224   0.66926   0.64352   0.60092   0.55592   0.47196   0.41061   0.36393   0.29180
               46.00   0.29180   0.36945   0.59889   0.77716   0.94967   0.99474   1.02106   1.04933   1.09480   1.11914   1.12944   1.13288   1.12944   1.11914   1.09480   1.04933   1.02106   0.99474   0.94967   0.77716   0.59889   0.36945   0.29180
               70.00   0.29180   0.31768   0.49749   0.65813   0.83991   0.92824   1.00871   1.07685   1.12873   1.15638   1.16820   1.17226   1.16820   1.15638   1.12873   1.07685   1.00871   0.92824   0.83991   0.65813   0.49749   0.31768   0.29180
              120.00   0.29180   0.28575   0.40639   0.52846   0.67080   0.74085   0.80498   0.85946   0.90099   0.92296   0.93256   0.93590   0.93256   0.92296   0.90099   0.85946   0.80498   0.74085   0.67080   0.52846   0.40639   0.28575   0.29180
              180.00   0.29180   0.22578   0.12416   0.07943   0.04592   0.03397   0.02515   0.01916   0.01346   0.01321   0.01360   0.01374   0.01360   0.01321   0.01346   0.01916   0.02515   0.03397   0.04592   0.07943   0.12416   0.22578   0.29180
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            </tableData>
          </table>
          </product>
        </function>
        <function name="aero/coefficient/CD_mach">
          <description>zero-lift drag's change with Mach: friction, wave drag</description>
          <product>
            <property>aero/qbar-psf</property>
            <property>metrics/Sw-sqft</property>
            <property>aero/function/mach-dCD0</property>
          </product>
        </function>
        <function name="aero/coefficient/CD_induced_mach">
          <description>induced drag's change with Mach (leading-edge suction lost)</description>
          <product>
            <property>aero/qbar-psf</property>
            <property>metrics/Sw-sqft</property>
            <property>aero/cl-squared</property>
            <property>aero/function/mach-dK</property>
          </product>
        </function>
        <function name="aero/coefficient/CD_aileron">
          <description>CD increment from aileron (deg), over alpha</description>
          <product>
            <property>aero/qbar-psf</property>
            <property>metrics/Sw-sqft</property>
            <property>aero/function/mach-aileron</property>
          <table>
            <independentVar lookup="row">aero/alpha-deg</independentVar>
            <independentVar lookup="column">fcs/left-aileron-pos-deg</independentVar>
            <tableData>
                        -25.00    -20.00    -15.00    -10.00     -5.00      0.00      5.00     10.00     15.00     20.00     25.00
             -180.00   0.01219   0.00799   0.00457   0.00206   0.00052   0.00000   0.00052   0.00206   0.00457   0.00799   0.01219
             -120.00   0.01219   0.00798   0.00457   0.00206   0.00052   0.00000   0.00052   0.00206   0.00457   0.00798   0.01219
              -70.00   0.01218   0.00798   0.00457   0.00206   0.00052   0.00000   0.00052   0.00206   0.00457   0.00798   0.01218
              -46.00   0.00627   0.00373   0.00183   0.00067   0.00014   0.00000   0.00014   0.00067   0.00183   0.00373   0.00627
              -32.00   0.01136   0.00732   0.00396   0.00154   0.00031   0.00000   0.00031   0.00154   0.00396   0.00732   0.01136
              -22.00   0.02403   0.01813   0.01226   0.00645   0.00180   0.00000   0.00180   0.00645   0.01226   0.01813   0.02403
              -17.00   0.02918   0.02247   0.01556   0.00839   0.00237   0.00000   0.00237   0.00839   0.01556   0.02247   0.02918
              -13.00   0.03031   0.02323   0.01599   0.00855   0.00240   0.00000   0.00240   0.00855   0.01599   0.02323   0.03031
               -9.00   0.03094   0.02325   0.01570   0.00827   0.00230   0.00000   0.00230   0.00827   0.01570   0.02325   0.03094
               -5.00   0.03325   0.02488   0.01660   0.00857   0.00235   0.00000   0.00235   0.00857   0.01660   0.02488   0.03325
               -1.00   0.03322   0.02487   0.01662   0.00862   0.00236   0.00000   0.00236   0.00862   0.01662   0.02487   0.03322
                3.00   0.03346   0.02504   0.01672   0.00865   0.00237   0.00000   0.00237   0.00865   0.01672   0.02504   0.03346
                7.00   0.03303   0.02478   0.01687   0.00899   0.00253   0.00000   0.00253   0.00899   0.01687   0.02478   0.03303
               11.00   0.03681   0.02909   0.02069   0.01136   0.00323   0.00000   0.00323   0.01136   0.02069   0.02909   0.03681
               15.00   0.03769   0.03047   0.02244   0.01295   0.00385   0.00000   0.00385   0.01295   0.02244   0.03047   0.03769
               19.00   0.03230   0.02598   0.01917   0.01134   0.00354   0.00000   0.00354   0.01134   0.01917   0.02598   0.03230
               23.00   0.02473   0.01930   0.01374   0.00781   0.00241   0.00000   0.00241   0.00781   0.01374   0.01930   0.02473
               27.00   0.01826   0.01355   0.00902   0.00468   0.00129   0.00000   0.00129   0.00468   0.00902   0.01355   0.01826
               32.00   0.00880   0.00481   0.00159  -0.00030  -0.00039   0.00000  -0.00039  -0.00030   0.00159   0.00481   0.00880
               46.00  -0.00371  -0.00471  -0.00457  -0.00305  -0.00095   0.00000  -0.00095  -0.00305  -0.00457  -0.00471  -0.00371
               70.00   0.01218   0.00798   0.00457   0.00206   0.00052   0.00000   0.00052   0.00206   0.00457   0.00798   0.01218
              120.00   0.01219   0.00798   0.00457   0.00206   0.00052   0.00000   0.00052   0.00206   0.00457   0.00798   0.01219
              180.00   0.01219   0.00799   0.00457   0.00206   0.00052   0.00000   0.00052   0.00206   0.00457   0.00799   0.01219
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            </tableData>
          </table>
          </product>
        </function>
        <function name="aero/coefficient/CD_elevator">
          <description>CD increment from elevator (deg), over alpha</description>
          <product>
            <property>aero/qbar-psf</property>
            <property>metrics/Sw-sqft</property>
            <property>aero/function/mach-elevator</property>
          <table>
            <independentVar lookup="row">aero/alpha-deg</independentVar>
            <independentVar lookup="column">fcs/elevator-pos-deg</independentVar>
            <tableData>
                        -25.00    -20.00    -15.00    -10.00     -5.00      0.00      5.00     10.00     15.00     20.00     25.00
             -180.00   0.01219   0.00799   0.00457   0.00206   0.00052   0.00000   0.00052   0.00206   0.00457   0.00799   0.01219
             -120.00   0.01219   0.00798   0.00457   0.00206   0.00052   0.00000   0.00052   0.00206   0.00457   0.00798   0.01219
              -70.00   0.01218   0.00798   0.00457   0.00206   0.00052   0.00000   0.00052   0.00206   0.00457   0.00798   0.01218
              -46.00   0.09063   0.07974   0.06643   0.04866   0.02583   0.00000  -0.02605  -0.04916  -0.06629  -0.07750  -0.08494
              -32.00   0.10327   0.08972   0.07363   0.05307   0.02782   0.00000  -0.02799  -0.05305  -0.07184  -0.08430  -0.09273
              -22.00   0.10798   0.09240   0.07414   0.05160   0.02582   0.00000  -0.02408  -0.04503  -0.06081  -0.07136  -0.07846
              -17.00   0.10439   0.08893   0.07088   0.04874   0.02389   0.00000  -0.02096  -0.03810  -0.05034  -0.05807  -0.06284
              -13.00   0.09809   0.08325   0.06599   0.04497   0.02169   0.00000  -0.01806  -0.03185  -0.04084  -0.04572  -0.04790
               -9.00   0.08583   0.07224   0.05667   0.03800   0.01784   0.00000  -0.01342  -0.02191  -0.02548  -0.02516  -0.02225
               -5.00   0.06561   0.05407   0.04128   0.02656   0.01163   0.00000  -0.00642  -0.00750  -0.00467   0.00006   0.00581
               -1.00   0.04124   0.03214   0.02271   0.01290   0.00441   0.00000   0.00088   0.00626   0.01382   0.02179   0.02991
                3.00   0.01734   0.01061   0.00440  -0.00069  -0.00283   0.00000   0.00813   0.01997   0.03242   0.04376   0.05432
                7.00  -0.00736  -0.01192  -0.01489  -0.01451  -0.00982   0.00000   0.01505   0.03313   0.05029   0.06485   0.07775
               11.00  -0.02915  -0.02860  -0.02648  -0.02188  -0.01354   0.00000   0.01911   0.04131   0.06190   0.07897   0.09375
               15.00  -0.03639  -0.03362  -0.02923  -0.02280  -0.01368   0.00000   0.01952   0.04274   0.06463   0.08284   0.09855
               19.00  -0.04639  -0.04124  -0.03395  -0.02434  -0.01333   0.00000   0.01808   0.04001   0.06124   0.07922   0.09487
               23.00  -0.05800  -0.05120  -0.04174  -0.02903  -0.01470   0.00000   0.01741   0.03794   0.05797   0.07515   0.09024
               27.00  -0.06656  -0.05888  -0.04813  -0.03339  -0.01644   0.00000   0.01703   0.03613   0.05482   0.07095   0.08519
               32.00  -0.07202  -0.06416  -0.05300  -0.03724  -0.01835   0.00000   0.01665   0.03275   0.04809   0.06175   0.07425
               46.00  -0.07045  -0.06324  -0.05280  -0.03770  -0.01893   0.00000   0.01647   0.02957   0.03963   0.04775   0.05501
               70.00   0.01218   0.00798   0.00457   0.00206   0.00052   0.00000   0.00052   0.00206   0.00457   0.00798   0.01218
              120.00   0.01219   0.00798   0.00457   0.00206   0.00052   0.00000   0.00052   0.00206   0.00457   0.00798   0.01219
              180.00   0.01219   0.00799   0.00457   0.00206   0.00052   0.00000   0.00052   0.00206   0.00457   0.00799   0.01219
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            </tableData>
          </table>
          </product>
        </function>
        <function name="aero/coefficient/CD_rudder">
          <description>CD increment from rudder (deg), over alpha</description>
          <product>
            <property>aero/qbar-psf</property>
            <property>metrics/Sw-sqft</property>
            <property>aero/function/mach-rudder</property>
          <table>
            <independentVar lookup="row">aero/alpha-deg</independentVar>
            <independentVar lookup="column">fcs/rudder-pos-deg</independentVar>
            <tableData>
                        -25.00    -20.00    -15.00    -10.00     -5.00      0.00      5.00     10.00     15.00     20.00     25.00
             -180.00   0.00275   0.00180   0.00103   0.00046   0.00012   0.00000   0.00012   0.00046   0.00103   0.00180   0.00275
             -120.00   0.00034   0.00023   0.00013   0.00006   0.00001   0.00000   0.00001   0.00006   0.00013   0.00023   0.00034
              -70.00   0.00012   0.00008   0.00005   0.00002   0.00001   0.00000   0.00001   0.00002   0.00005   0.00008   0.00012
              -46.00   0.00236   0.00178   0.00119   0.00062   0.00017   0.00000   0.00017   0.00062   0.00119   0.00177   0.00236
              -32.00   0.00439   0.00329   0.00220   0.00114   0.00031   0.00000   0.00031   0.00114   0.00220   0.00329   0.00439
              -22.00   0.00567   0.00424   0.00283   0.00146   0.00040   0.00000   0.00040   0.00147   0.00283   0.00424   0.00567
              -17.00   0.00619   0.00463   0.00309   0.00160   0.00044   0.00000   0.00044   0.00160   0.00309   0.00463   0.00619
              -13.00   0.00653   0.00488   0.00326   0.00169   0.00046   0.00000   0.00046   0.00169   0.00326   0.00488   0.00653
               -9.00   0.00677   0.00506   0.00338   0.00175   0.00048   0.00000   0.00048   0.00175   0.00338   0.00506   0.00677
               -5.00   0.00692   0.00517   0.00345   0.00178   0.00049   0.00000   0.00049   0.00178   0.00345   0.00517   0.00692
               -1.00   0.00696   0.00520   0.00347   0.00179   0.00049   0.00000   0.00049   0.00179   0.00347   0.00520   0.00696
                3.00   0.00691   0.00516   0.00344   0.00178   0.00049   0.00000   0.00049   0.00178   0.00344   0.00516   0.00691
                7.00   0.00675   0.00504   0.00336   0.00174   0.00048   0.00000   0.00048   0.00174   0.00336   0.00504   0.00675
               11.00   0.00650   0.00485   0.00323   0.00167   0.00046   0.00000   0.00046   0.00167   0.00323   0.00485   0.00650
               15.00   0.00615   0.00459   0.00305   0.00158   0.00043   0.00000   0.00043   0.00158   0.00305   0.00459   0.00615
               19.00   0.00572   0.00426   0.00284   0.00146   0.00040   0.00000   0.00040   0.00146   0.00284   0.00427   0.00573
               23.00   0.00525   0.00391   0.00260   0.00134   0.00037   0.00000   0.00037   0.00134   0.00260   0.00391   0.00525
               27.00   0.00473   0.00352   0.00234   0.00121   0.00033   0.00000   0.00033   0.00121   0.00234   0.00352   0.00474
               32.00   0.00411   0.00306   0.00203   0.00105   0.00029   0.00000   0.00029   0.00105   0.00203   0.00306   0.00411
               46.00   0.00240   0.00181   0.00121   0.00063   0.00017   0.00000   0.00017   0.00063   0.00121   0.00180   0.00240
               70.00   0.00012   0.00008   0.00005   0.00002   0.00001   0.00000   0.00001   0.00002   0.00005   0.00008   0.00012
              120.00   0.00034   0.00023   0.00013   0.00006   0.00001   0.00000   0.00001   0.00006   0.00013   0.00023   0.00034
              180.00   0.00275   0.00180   0.00103   0.00046   0.00012   0.00000   0.00012   0.00046   0.00103   0.00180   0.00275
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            </tableData>
          </table>
          </product>
        </function>
        <function name="aero/coefficient/CD_ground">
          <description>Induced drag change in ground effect</description>
          <product>
            <property>aero/qbar-psf</property>
            <property>metrics/Sw-sqft</property>
            <property>aero/cl-squared</property>
            <value>0.17868</value>
          <table>
            <independentVar lookup="row">aero/h_b-mac-ft</independentVar>
            <tableData>
                    0.00   -1.00000
                    0.10   -0.28090
                    0.15   -0.14793
                    0.20   -0.08897
                    0.30   -0.04160
                    0.40   -0.02383
                    0.50   -0.01538
                    0.60   -0.01073
                    0.70   -0.00791
                    0.80   -0.00607
                    0.90   -0.00480
                    1.00   -0.00389
                    1.10   -0.00322
            </tableData>
          </table>
          </product>
        </function>
        <function name="aero/coefficient/CD_airbrakes">
          <description>airbrakes: drag of its airbrake plates, 2.16 m2 opened to 50 deg (hangar)</description>
          <product>
            <property>aero/qbar-psf</property>
            <property>metrics/Sw-sqft</property>
            <value>0.0621573</value>
            <pow>
              <sin>
                <product>
                  <property>fcs/speedbrake-pos-norm</property>
                  <value>0.872665</value>
                </product>
              </sin>
              <value>2</value>
            </pow>
          </product>
        </function>
        <function name="aero/coefficient/CD_gear">
          <description>the gear extended: its wheels' and struts' drag by Raymer's components, 0.265 m2 (hangar)</description>
          <product>
            <property>aero/qbar-psf</property>
            <property>metrics/Sw-sqft</property>
            <value>0.00635634</value>
            <property>gear/gear-pos-norm</property>
          </product>
        </function>
      </axis>
      <axis name="SIDE">
        <function name="aero/coefficient/CY_base">
          <description>CY over alpha and beta (hangar)</description>
          <product>
            <property>aero/qbar-psf</property>
            <property>metrics/Sw-sqft</property>
            <property>aero/function/mach-side</property>
          <table>
            <independentVar lookup="row">aero/alpha-deg</independentVar>
            <independentVar lookup="column">aero/beta-deg</independentVar>
            <tableData>
                        -90.00    -70.00    -50.00    -40.00    -30.00    -25.00    -20.00    -15.00    -10.00     -6.00     -3.00      0.00      3.00      6.00     10.00     15.00     20.00     25.00     30.00     40.00     50.00     70.00     90.00
             -180.00   0.00000   0.08287   0.09879   0.08395   0.06061   0.04781   0.03531   0.02381   0.04128   0.05166   0.02748  -0.00000  -0.02748  -0.05166  -0.04128  -0.02381  -0.03531  -0.04781  -0.06061  -0.08395  -0.09879  -0.08287  -0.00000
             -120.00   0.00000  -0.04025  -0.19911  -0.25783  -0.26991  -0.25452  -0.22472  -0.18172  -0.12776  -0.07605  -0.02872  -0.00000   0.02872   0.07605   0.12776   0.18172   0.22472   0.25452   0.26991   0.25783   0.19911   0.04025  -0.00000
              -70.00   0.00000  -0.06200  -0.25436  -0.32257  -0.33410  -0.31406  -0.27664  -0.22320  -0.15621  -0.09491  -0.04114  -0.00000   0.04114   0.09491   0.15621   0.22320   0.27664   0.31406   0.33410   0.32257   0.25436   0.06200  -0.00000
              -46.00   0.00000  -0.21429  -0.34158  -0.39703  -0.39704  -0.35042  -0.28389  -0.21026  -0.12981  -0.06952  -0.03477  -0.00000   0.03477   0.06952   0.12981   0.21026   0.28389   0.35042   0.39704   0.39703   0.34158   0.21429  -0.00000
              -32.00   0.00000  -0.12025  -0.11663  -0.15311  -0.15725  -0.14568  -0.12589  -0.07737  -0.05395  -0.03237  -0.01611  -0.00000   0.01611   0.03237   0.05395   0.07737   0.12589   0.14568   0.15725   0.15311   0.11663   0.12025  -0.00000
              -22.00   0.00000  -0.00119   0.03102   0.00821  -0.00057  -0.00052   0.01305   0.02192   0.01166   0.00551   0.00231  -0.00000  -0.00231  -0.00551  -0.01166  -0.02192  -0.01305   0.00052   0.00057  -0.00821  -0.03102   0.00119  -0.00000
              -17.00   0.00000   0.04379   0.08417   0.06554   0.05161   0.04688   0.05514   0.05469   0.03564   0.02094   0.01035  -0.00000  -0.01035  -0.02094  -0.03564  -0.05469  -0.05514  -0.04688  -0.05161  -0.06554  -0.08417  -0.04379  -0.00000
              -13.00   0.00000   0.07053   0.11380   0.09809   0.08186   0.07440   0.07993   0.07410   0.04938   0.02938   0.01457  -0.00000  -0.01457  -0.02938  -0.04938  -0.07410  -0.07993  -0.07440  -0.08186  -0.09809  -0.11380  -0.07053  -0.00000
               -9.00   0.00000   0.08790   0.13360   0.12005   0.10243   0.09295   0.10625   0.08629   0.05762   0.03429   0.01699  -0.00000  -0.01699  -0.03429  -0.05762  -0.08629  -0.10625  -0.09295  -0.10243  -0.12005  -0.13360  -0.08790  -0.00000
               -5.00   0.00000   0.09778   0.14455   0.13195   0.11319   0.10237   0.11410   0.09179   0.06119   0.03632   0.01795  -0.00000  -0.01795  -0.03632  -0.06119  -0.09179  -0.11410  -0.10237  -0.11319  -0.13195  -0.14455  -0.09778  -0.00000
               -1.00   0.00000   0.10246   0.14850   0.13591   0.11615   0.10471   0.11555   0.09270   0.06171   0.03651   0.01795  -0.00000  -0.01795  -0.03651  -0.06171  -0.09270  -0.11555  -0.10471  -0.11615  -0.13591  -0.14850  -0.10246  -0.00000
                3.00   0.00000   0.10106   0.14757   0.13407   0.11317   0.10162   0.11204   0.09003   0.05996   0.03551   0.01751  -0.00000  -0.01751  -0.03551  -0.05996  -0.09003  -0.11204  -0.10162  -0.11317  -0.13407  -0.14757  -0.10106  -0.00000
                7.00   0.00000   0.09295   0.14094   0.12596   0.10402   0.09287   0.10339   0.08355   0.05570   0.03307   0.01636  -0.00000  -0.01636  -0.03307  -0.05570  -0.08355  -0.10339  -0.09287  -0.10402  -0.12596  -0.14094  -0.09295  -0.00000
               11.00   0.00000   0.07704   0.12555   0.10917   0.08654   0.07637   0.08763   0.07145   0.04754   0.02821   0.01396  -0.00000  -0.01396  -0.02821  -0.04754  -0.07145  -0.08763  -0.07637  -0.08654  -0.10917  -0.12555  -0.07704  -0.00000
               15.00   0.00000   0.05137   0.09925   0.08162   0.05933   0.05080   0.06313   0.05206   0.03399   0.01991   0.00980  -0.00000  -0.00980  -0.01991  -0.03399  -0.05206  -0.06313  -0.05080  -0.05933  -0.08162  -0.09925  -0.05137  -0.00000
               19.00   0.00000   0.01771   0.06273   0.04403   0.02360   0.01705   0.03070   0.02647   0.01569   0.00841   0.00390  -0.00000  -0.00390  -0.00841  -0.01569  -0.02647  -0.03070  -0.01705  -0.02360  -0.04403  -0.06273  -0.01771  -0.00000
               23.00   0.00000  -0.02294   0.01616  -0.00558  -0.02373  -0.02715  -0.01459  -0.00363  -0.00521  -0.00450  -0.00257  -0.00000   0.00257   0.00450   0.00521   0.00363   0.01459   0.02715   0.02373   0.00558  -0.01616   0.02294  -0.00000
               27.00   0.00000  -0.07174  -0.03937  -0.06608  -0.08178  -0.08048  -0.06977  -0.03933  -0.02712  -0.01683  -0.00850  -0.00000   0.00850   0.01683   0.02712   0.03933   0.06977   0.08048   0.08178   0.06608   0.03937   0.07174  -0.00000
               32.00   0.00000  -0.14057  -0.11896  -0.15322  -0.16679  -0.15768  -0.13615  -0.08667  -0.05684  -0.03330  -0.01611  -0.00000   0.01611   0.03330   0.05684   0.08667   0.13615   0.15768   0.16679   0.15322   0.11896   0.14057  -0.00000
               46.00   0.00000  -0.17822  -0.35048  -0.40062  -0.38288  -0.33386  -0.27221  -0.20703  -0.12218  -0.07326  -0.03632  -0.00000   0.03632   0.07326   0.12218   0.20703   0.27221   0.33386   0.38288   0.40062   0.35048   0.17822  -0.00000
               70.00   0.00000  -0.06200  -0.25437  -0.32258  -0.33410  -0.31406  -0.27664  -0.22320  -0.15621  -0.09491  -0.04114  -0.00000   0.04114   0.09491   0.15621   0.22320   0.27664   0.31406   0.33410   0.32258   0.25437   0.06200  -0.00000
              120.00   0.00000  -0.04025  -0.19911  -0.25783  -0.26991  -0.25452  -0.22472  -0.18172  -0.12776  -0.07605  -0.02872  -0.00000   0.02872   0.07605   0.12776   0.18172   0.22472   0.25452   0.26991   0.25783   0.19911   0.04025  -0.00000
              180.00   0.00000   0.08287   0.09879   0.08395   0.06061   0.04781   0.03531   0.02381   0.04128   0.05166   0.02748  -0.00000  -0.02748  -0.05166  -0.04128  -0.02381  -0.03531  -0.04781  -0.06061  -0.08395  -0.09879  -0.08287  -0.00000
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            </tableData>
          </table>
          </product>
        </function>
        <function name="aero/coefficient/CY_aileron">
          <description>CY increment from aileron (deg), over alpha</description>
          <product>
            <property>aero/qbar-psf</property>
            <property>metrics/Sw-sqft</property>
            <property>aero/function/mach-aileron</property>
          <table>
            <independentVar lookup="row">aero/alpha-deg</independentVar>
            <independentVar lookup="column">fcs/left-aileron-pos-deg</independentVar>
            <tableData>
                        -25.00    -20.00    -15.00    -10.00     -5.00      0.00      5.00     10.00     15.00     20.00     25.00
             -180.00   0.00000   0.00000   0.00000   0.00000   0.00000   0.00000   0.00000   0.00000   0.00000   0.00000   0.00000
              -35.00   0.00960   0.00849   0.00706   0.00509   0.00263   0.00000  -0.00263  -0.00509  -0.00706  -0.00849  -0.00960
              -11.00   0.01907   0.01666   0.01372   0.00989   0.00515   0.00000  -0.00515  -0.00989  -0.01372  -0.01666  -0.01907
                4.00   0.02351   0.02043   0.01673   0.01198   0.00619   0.00000  -0.00620  -0.01198  -0.01673  -0.02043  -0.02351
               19.00   0.02510   0.02182   0.01787   0.01283   0.00667   0.00000  -0.00667  -0.01283  -0.01788  -0.02182  -0.02510
               42.00   0.01506   0.01314   0.01075   0.00759   0.00367   0.00000  -0.00367  -0.00759  -0.01075  -0.01314  -0.01506
              180.00   0.00000   0.00000   0.00000   0.00000   0.00000   0.00000   0.00000   0.00000   0.00000   0.00000   0.00000
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            </tableData>
          </table>
          </product>
        </function>
        <function name="aero/coefficient/CY_rudder">
          <description>CY increment from rudder (deg), over alpha</description>
          <product>
            <property>aero/qbar-psf</property>
            <property>metrics/Sw-sqft</property>
            <property>aero/function/mach-rudder</property>
          <table>
            <independentVar lookup="row">aero/alpha-deg</independentVar>
            <independentVar lookup="column">fcs/rudder-pos-deg</independentVar>
            <tableData>
                        -25.00    -20.00    -15.00    -10.00     -5.00      0.00      5.00     10.00     15.00     20.00     25.00
             -180.00   0.00000   0.00000   0.00000   0.00000   0.00000   0.00000   0.00000   0.00000   0.00000   0.00000   0.00000
              -35.00  -0.03320  -0.02968  -0.02501  -0.01841  -0.00975   0.00000   0.00975   0.01841   0.02501   0.02968   0.03320
              -11.00  -0.04225  -0.03769  -0.03170  -0.02331  -0.01234   0.00000   0.01234   0.02331   0.03170   0.03770   0.04226
                4.00  -0.04240  -0.03785  -0.03185  -0.02342  -0.01241   0.00000   0.01241   0.02343   0.03185   0.03785   0.04241
               19.00  -0.03628  -0.03245  -0.02737  -0.02016  -0.01070   0.00000   0.01070   0.02017   0.02737   0.03246   0.03629
               42.00  -0.03342  -0.03023  -0.02572  -0.01901  -0.01006   0.00000   0.01006   0.01900   0.02572   0.03022   0.03342
              180.00   0.00000   0.00000   0.00000   0.00000   0.00000   0.00000   0.00000   0.00000   0.00000   0.00000   0.00000
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            </tableData>
          </table>
          </product>
        </function>
        <function name="aero/coefficient/CYp">
          <description>CY per p (non-dimensional), over alpha</description>
          <product>
            <property>aero/qbar-psf</property>
            <property>metrics/Sw-sqft</property>
            <property>aero/bi2vel</property>
            <property>velocities/p-aero-rad_sec</property>
            <property>aero/function/mach-lift</property>
          <table>
            <independentVar lookup="row">aero/alpha-deg</independentVar>
            <tableData>
                 -180.00   -0.22531
                 -165.00   -0.25448
                  -32.00   -0.09987
                  -10.00   -0.07988
                    5.00   -0.07361
                   20.00   -0.04892
                   46.00   -0.14602
                  180.00   -0.22531
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            </tableData>
          </table>
          </product>
        </function>
        <function name="aero/coefficient/CYr">
          <description>CY per r (non-dimensional), over alpha</description>
          <product>
            <property>aero/qbar-psf</property>
            <property>metrics/Sw-sqft</property>
            <property>aero/bi2vel</property>
            <property>velocities/r-aero-rad_sec</property>
            <property>aero/function/mach-lift</property>
          <table>
            <independentVar lookup="row">aero/alpha-deg</independentVar>
            <tableData>
                 -180.00    0.52406
                 -165.00    0.49156
                  -32.00    0.15866
                  -10.00    0.19435
                    5.00    0.19001
                   20.00    0.13243
                   46.00    0.11539
                  180.00    0.52406
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            </tableData>
          </table>
          </product>
        </function>
      </axis>
      <axis name="LIFT">
        <function name="aero/coefficient/CL_base">
          <description>CL over alpha and beta, ground effect, compressibility (hangar)</description>
          <product>
            <property>aero/qbar-psf</property>
            <property>metrics/Sw-sqft</property>
            <property>aero/function/CL-base</property>
            <property>aero/function/mach-lift</property>
          <table>
            <independentVar lookup="row">aero/h_b-mac-ft</independentVar>
            <tableData>
                    0.00    1.20000
                    0.10    1.08692
                    0.20    1.03778
                    0.40    1.00713
                    0.60    1.00135
                    0.80    1.00025
                    1.00    1.00005
                    1.10    1.00000
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            </tableData>
          </table>
          </product>
        </function>
        <function name="aero/coefficient/CL_elevator">
          <description>CL increment from elevator (deg), over alpha</description>
          <product>
            <property>aero/qbar-psf</property>
            <property>metrics/Sw-sqft</property>
            <property>aero/function/mach-elevator</property>
          <table>
            <independentVar lookup="row">aero/alpha-deg</independentVar>
            <independentVar lookup="column">fcs/elevator-pos-deg</independentVar>
            <tableData>
                        -25.00    -20.00    -15.00    -10.00     -5.00      0.00      5.00     10.00     15.00     20.00     25.00
             -180.00  -0.00000  -0.00000  -0.00000  -0.00000   0.00000   0.00000   0.00000  -0.00000  -0.00000  -0.00000  -0.00000
              -35.00  -0.16984  -0.15445  -0.13237  -0.09904  -0.05323   0.00000   0.05440   0.10352   0.14156   0.16900   0.19020
              -11.00  -0.28991  -0.25977  -0.21982  -0.16311  -0.08753   0.00000   0.09050   0.17362   0.23903   0.28661   0.32322
                4.00  -0.32391  -0.28852  -0.24233  -0.17792  -0.09407   0.00000   0.09363   0.17645   0.23960   0.28450   0.31856
               19.00  -0.29051  -0.25428  -0.20876  -0.14846  -0.07527   0.00000   0.06899   0.12663   0.16938   0.19952   0.22232
               42.00  -0.15119  -0.13463  -0.11317  -0.08322  -0.04407   0.00000   0.04378   0.08152   0.10839   0.12554   0.13701
              180.00   0.00000   0.00000   0.00000   0.00000   0.00000   0.00000   0.00000   0.00000   0.00000   0.00000   0.00000
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            </tableData>
          </table>
          </product>
        </function>
        <function name="aero/coefficient/CLq">
          <description>CL per q (non-dimensional), over alpha</description>
          <product>
            <property>aero/qbar-psf</property>
            <property>metrics/Sw-sqft</property>
            <property>aero/ci2vel</property>
            <property>velocities/q-aero-rad_sec</property>
            <property>aero/function/mach-lift</property>
          <table>
            <independentVar lookup="row">aero/alpha-deg</independentVar>
            <tableData>
                 -180.00    0.51626
                 -165.00    0.08304
                  -32.00    1.55551
                  -10.00    2.42268
                    5.00    2.33676
                   20.00    2.38213
                   46.00    1.13707
                  180.00    0.51626
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            </tableData>
          </table>
          </product>
        </function>
        <function name="aero/coefficient/CLadot">
          <description>CL per alpha-dot (downwash lag at the tail)</description>
          <product>
            <property>aero/qbar-psf</property>
            <property>metrics/Sw-sqft</property>
            <property>aero/ci2vel</property>
            <property>aero/alphadot-rad_sec</property>
            <value>0.00000</value>
            <property>aero/function/mach-lift</property>
          </product>
        </function>
      </axis>
      <axis name="ROLL">
        <function name="aero/coefficient/Cl_base">
          <description>Cl over alpha and beta (hangar)</description>
          <product>
            <property>aero/qbar-psf</property>
            <property>metrics/Sw-sqft</property>
            <property>metrics/bw-ft</property>
            <property>aero/function/mach-side</property>
          <table>
            <independentVar lookup="row">aero/alpha-deg</independentVar>
            <independentVar lookup="column">aero/beta-deg</independentVar>
            <tableData>
                        -90.00    -70.00    -50.00    -40.00    -30.00    -25.00    -20.00    -15.00    -10.00     -6.00     -3.00      0.00      3.00      6.00     10.00     15.00     20.00     25.00     30.00     40.00     50.00     70.00     90.00
             -180.00   0.04057   0.02997   0.01763   0.01221   0.00770   0.00583   0.00421   0.00285   0.00775   0.01090   0.00591  -0.00000  -0.00591  -0.01090  -0.00775  -0.00285  -0.00421  -0.00583  -0.00770  -0.01221  -0.01763  -0.02997  -0.04057
              -35.00   0.04057   0.04592   0.04716   0.04376   0.02734   0.02295   0.02325   0.02618   0.01710   0.00817   0.00307  -0.00000  -0.00307  -0.00817  -0.01710  -0.02618  -0.02325  -0.02295  -0.02734  -0.04376  -0.04716  -0.04592  -0.04057
              -11.00   0.04057   0.03009   0.01438  -0.01603  -0.04756  -0.05026  -0.03809  -0.02779  -0.01906  -0.01158  -0.00582  -0.00000   0.00582   0.01158   0.01906   0.02779   0.03809   0.05026   0.04756   0.01603  -0.01438  -0.03009  -0.04057
                4.00   0.04057   0.02905   0.01458   0.00477   0.00936   0.01222   0.01614   0.01484   0.01019   0.00617   0.00309  -0.00000  -0.00309  -0.00617  -0.01019  -0.01484  -0.01614  -0.01222  -0.00936  -0.00477  -0.01458  -0.02905  -0.04057
               19.00   0.04057   0.01697   0.00441   0.01123   0.05385   0.06074   0.05734   0.04786   0.03390   0.02133   0.01094  -0.00000  -0.01094  -0.02133  -0.03390  -0.04786  -0.05734  -0.06074  -0.05385  -0.01123  -0.00441  -0.01697  -0.04057
               42.00   0.04057   0.00665  -0.02359  -0.04151  -0.05498  -0.04627  -0.02894  -0.00998   0.00444   0.00296   0.00160  -0.00000  -0.00160  -0.00296  -0.00444   0.00998   0.02894   0.04627   0.05498   0.04151   0.02359  -0.00665  -0.04057
              180.00   0.04057   0.02997   0.01763   0.01221   0.00770   0.00583   0.00421   0.00285   0.00775   0.01090   0.00591  -0.00000  -0.00591  -0.01090  -0.00775  -0.00285  -0.00421  -0.00583  -0.00770  -0.01221  -0.01763  -0.02997  -0.04057
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            </tableData>
          </table>
          </product>
        </function>
        <function name="aero/coefficient/Cl_aileron">
          <description>Cl increment from aileron (deg), over alpha</description>
          <product>
            <property>aero/qbar-psf</property>
            <property>metrics/Sw-sqft</property>
            <property>metrics/bw-ft</property>
            <property>aero/function/mach-aileron</property>
          <table>
            <independentVar lookup="row">aero/alpha-deg</independentVar>
            <independentVar lookup="column">fcs/left-aileron-pos-deg</independentVar>
            <tableData>
                        -25.00    -20.00    -15.00    -10.00     -5.00      0.00      5.00     10.00     15.00     20.00     25.00
             -180.00   0.00000   0.00000   0.00000   0.00000   0.00000   0.00000   0.00000   0.00000   0.00000   0.00000   0.00000
              -35.00  -0.03491  -0.03105  -0.02605  -0.01912  -0.01012   0.00000   0.01012   0.01912   0.02605   0.03105   0.03491
              -11.00  -0.05522  -0.04859  -0.04034  -0.02935  -0.01545   0.00000   0.01545   0.02935   0.04033   0.04859   0.05522
                4.00  -0.05303  -0.04673  -0.03885  -0.02832  -0.01493   0.00000   0.01493   0.02832   0.03885   0.04673   0.05303
               19.00  -0.04666  -0.04056  -0.03320  -0.02378  -0.01236   0.00000   0.01236   0.02378   0.03320   0.04056   0.04666
               42.00  -0.02323  -0.02066  -0.01734  -0.01276  -0.00682   0.00000   0.00682   0.01276   0.01734   0.02066   0.02323
              180.00   0.00000   0.00000   0.00000   0.00000   0.00000   0.00000   0.00000   0.00000   0.00000   0.00000   0.00000
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            </tableData>
          </table>
          </product>
        </function>
        <function name="aero/coefficient/Cl_rudder">
          <description>Cl increment from rudder (deg), over alpha</description>
          <product>
            <property>aero/qbar-psf</property>
            <property>metrics/Sw-sqft</property>
            <property>metrics/bw-ft</property>
            <property>aero/function/mach-rudder</property>
          <table>
            <independentVar lookup="row">aero/alpha-deg</independentVar>
            <independentVar lookup="column">fcs/rudder-pos-deg</independentVar>
            <tableData>
                        -25.00    -20.00    -15.00    -10.00     -5.00      0.00      5.00     10.00     15.00     20.00     25.00
             -180.00   0.00000   0.00000   0.00000   0.00000   0.00000   0.00000   0.00000   0.00000   0.00000   0.00000   0.00000
              -35.00  -0.00684  -0.00600  -0.00496  -0.00360  -0.00190   0.00000   0.00190   0.00360   0.00496   0.00600   0.00684
              -11.00  -0.00908  -0.00794  -0.00656  -0.00475  -0.00250   0.00000   0.00250   0.00475   0.00656   0.00794   0.00908
                4.00  -0.00956  -0.00840  -0.00696  -0.00505  -0.00266   0.00000   0.00266   0.00505   0.00696   0.00840   0.00956
               19.00  -0.00824  -0.00718  -0.00590  -0.00426  -0.00224   0.00000   0.00224   0.00427   0.00590   0.00718   0.00824
               42.00  -0.00767  -0.00680  -0.00568  -0.00414  -0.00219   0.00000   0.00219   0.00414   0.00568   0.00680   0.00767
              180.00   0.00000   0.00000   0.00000   0.00000   0.00000   0.00000   0.00000   0.00000   0.00000   0.00000   0.00000
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            </tableData>
          </table>
          </product>
        </function>
        <function name="aero/coefficient/Clp">
          <description>Cl per p (non-dimensional), over alpha</description>
          <product>
            <property>aero/qbar-psf</property>
            <property>metrics/Sw-sqft</property>
            <property>metrics/bw-ft</property>
            <property>aero/bi2vel</property>
            <property>velocities/p-aero-rad_sec</property>
            <property>aero/function/mach-lift</property>
          <table>
            <independentVar lookup="row">aero/alpha-deg</independentVar>
            <tableData>
                 -180.00   -0.51754
                 -165.00   -0.16855
                  -32.00   -0.11697
                  -10.00   -0.27035
                    5.00   -0.20253
                   20.00   -0.31185
                   46.00   -0.22235
                  180.00   -0.51754
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            </tableData>
          </table>
          </product>
        </function>
        <function name="aero/coefficient/Clr">
          <description>Cl per r (non-dimensional), over alpha</description>
          <product>
            <property>aero/qbar-psf</property>
            <property>metrics/Sw-sqft</property>
            <property>metrics/bw-ft</property>
            <property>aero/bi2vel</property>
            <property>velocities/r-aero-rad_sec</property>
            <property>aero/function/mach-lift</property>
          <table>
            <independentVar lookup="row">aero/alpha-deg</independentVar>
            <tableData>
                 -180.00    0.10854
                 -165.00    0.13328
                  -32.00   -0.16470
                  -10.00   -0.02166
                    5.00    0.08324
                   20.00    0.16479
                   46.00    0.29011
                  180.00    0.10854
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            </tableData>
          </table>
          </product>
        </function>
      </axis>
      <axis name="PITCH">
        <function name="aero/coefficient/Cm_base">
          <description>Cm over alpha and beta (hangar)</description>
          <product>
            <property>aero/qbar-psf</property>
            <property>metrics/Sw-sqft</property>
            <property>metrics/cbarw-ft</property>
          <table>
            <independentVar lookup="row">aero/alpha-deg</independentVar>
            <independentVar lookup="column">aero/beta-deg</independentVar>
            <tableData>
                        -90.00    -70.00    -50.00    -40.00    -30.00    -25.00    -20.00    -15.00    -10.00     -6.00     -3.00      0.00      3.00      6.00     10.00     15.00     20.00     25.00     30.00     40.00     50.00     70.00     90.00
             -180.00  -0.00000  -0.00006  -0.00018  -0.00027  -0.00036  -0.00040  -0.00044  -0.00047   0.00210   0.00156  -0.00005  -0.00064  -0.00005   0.00156   0.00210  -0.00047  -0.00044  -0.00040  -0.00036  -0.00027  -0.00018  -0.00006  -0.00000
              -35.00  -0.00000  -0.02865  -0.02503  -0.02727  -0.03016  -0.03103  -0.03165  -0.03442  -0.03507  -0.03588  -0.03650  -0.03683  -0.03650  -0.03588  -0.03507  -0.03442  -0.03165  -0.03103  -0.03016  -0.02727  -0.02503  -0.02865  -0.00000
              -11.00  -0.00000  -0.00790  -0.00783  -0.00753  -0.00680  -0.00592  -0.00555  -0.00350  -0.00151  -0.00049  -0.00006   0.00006  -0.00006  -0.00049  -0.00151  -0.00350  -0.00555  -0.00592  -0.00680  -0.00753  -0.00783  -0.00790  -0.00000
                4.00   0.00000   0.00265   0.00224   0.00186   0.00143   0.00115  -0.00032  -0.00000   0.00080   0.00114   0.00123   0.00125   0.00123   0.00114   0.00080  -0.00000  -0.00032   0.00115   0.00143   0.00186   0.00224   0.00265   0.00000
               19.00   0.00000   0.01687   0.01679   0.01826   0.02057   0.02056   0.01705   0.01342   0.01039   0.00814   0.00682   0.00624   0.00682   0.00814   0.01039   0.01342   0.01705   0.02056   0.02057   0.01826   0.01679   0.01687   0.00000
               42.00   0.00000   0.03332   0.03695   0.04136   0.04534   0.04816   0.05126   0.05386   0.05493   0.05646   0.05711   0.05735   0.05711   0.05646   0.05493   0.05386   0.05126   0.04816   0.04534   0.04136   0.03695   0.03332   0.00000
              180.00  -0.00000  -0.00006  -0.00018  -0.00027  -0.00036  -0.00040  -0.00044  -0.00047   0.00210   0.00156  -0.00005  -0.00064  -0.00005   0.00156   0.00210  -0.00047  -0.00044  -0.00040  -0.00036  -0.00027  -0.00018  -0.00006  -0.00000
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            </tableData>
          </table>
          </product>
        </function>
        <function name="aero/coefficient/Cm_mach">
          <description>Cm from the neutral point's move with Mach</description>
          <product>
            <property>aero/qbar-psf</property>
            <property>metrics/Sw-sqft</property>
            <property>metrics/cbarw-ft</property>
            <property>aero/function/CL-base</property>
            <property>aero/function/mach-dCm-dCL</property>
          </product>
        </function>
        <function name="aero/coefficient/Cm_elevator">
          <description>Cm increment from elevator (deg), over alpha</description>
          <product>
            <property>aero/qbar-psf</property>
            <property>metrics/Sw-sqft</property>
            <property>metrics/cbarw-ft</property>
            <property>aero/function/mach-elevator</property>
          <table>
            <independentVar lookup="row">aero/alpha-deg</independentVar>
            <independentVar lookup="column">fcs/elevator-pos-deg</independentVar>
            <tableData>
                        -25.00    -20.00    -15.00    -10.00     -5.00      0.00      5.00     10.00     15.00     20.00     25.00
             -180.00   0.00012   0.00008   0.00005   0.00002   0.00001   0.00000   0.00001   0.00002   0.00005   0.00008   0.00012
              -35.00   0.09117   0.08242   0.07026   0.05230   0.02799   0.00000  -0.02847  -0.05400  -0.07334  -0.08668  -0.09643
              -11.00   0.11509   0.10371   0.08813   0.06540   0.03491   0.00000  -0.03535  -0.06694  -0.09092  -0.10758  -0.11987
                4.00   0.12086   0.10869   0.09210   0.06807   0.03613   0.00000  -0.03611  -0.06802  -0.09203  -0.10863  -0.12082
               19.00   0.11995   0.10801   0.09161   0.06769   0.03581   0.00000  -0.03512  -0.06538  -0.08768  -0.10289  -0.11398
               42.00   0.08870   0.07971   0.06740   0.04957   0.02611   0.00000  -0.02564  -0.04792  -0.06443  -0.07567  -0.08384
              180.00   0.00012   0.00008   0.00005   0.00002   0.00001   0.00000   0.00001   0.00002   0.00005   0.00008   0.00012
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            </tableData>
          </table>
          </product>
        </function>
        <function name="aero/coefficient/Cmq">
          <description>Cm per q (non-dimensional), over alpha</description>
          <product>
            <property>aero/qbar-psf</property>
            <property>metrics/Sw-sqft</property>
            <property>metrics/cbarw-ft</property>
            <property>aero/ci2vel</property>
            <property>velocities/q-aero-rad_sec</property>
            <property>aero/function/mach-lift</property>
          <table>
            <independentVar lookup="row">aero/alpha-deg</independentVar>
            <tableData>
                 -180.00    0.20705
                 -165.00   -0.00882
                  -32.00   -0.31791
                  -10.00   -0.33307
                    5.00   -0.25870
                   20.00   -0.39374
                   46.00   -0.48537
                  180.00    0.20705
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            </tableData>
          </table>
          </product>
        </function>
        <function name="aero/coefficient/Cmadot">
          <description>Cm per alpha-dot (downwash lag at the tail)</description>
          <product>
            <property>aero/qbar-psf</property>
            <property>metrics/Sw-sqft</property>
            <property>metrics/cbarw-ft</property>
            <property>aero/ci2vel</property>
            <property>aero/alphadot-rad_sec</property>
            <value>0.00000</value>
            <property>aero/function/mach-lift</property>
          </product>
        </function>
        <function name="aero/coefficient/Cm_gear">
          <description>the gear's drag's pitching moment, -0.91 m from the reference point's height</description>
          <product>
            <property>aero/qbar-psf</property>
            <property>metrics/Sw-sqft</property>
            <property>metrics/cbarw-ft</property>
            <value>-0.00103265</value>
            <property>gear/gear-pos-norm</property>
          </product>
        </function>
      </axis>
      <axis name="YAW">
        <function name="aero/coefficient/Cn_base">
          <description>Cn over alpha and beta (hangar)</description>
          <product>
            <property>aero/qbar-psf</property>
            <property>metrics/Sw-sqft</property>
            <property>metrics/bw-ft</property>
            <property>aero/function/mach-side</property>
          <table>
            <independentVar lookup="row">aero/alpha-deg</independentVar>
            <independentVar lookup="column">aero/beta-deg</independentVar>
            <tableData>
                        -90.00    -70.00    -50.00    -40.00    -30.00    -25.00    -20.00    -15.00    -10.00     -6.00     -3.00      0.00      3.00      6.00     10.00     15.00     20.00     25.00     30.00     40.00     50.00     70.00     90.00
             -180.00  -0.03970  -0.05537  -0.06177  -0.05868  -0.05059  -0.04467  -0.03757  -0.02940  -0.03383  -0.03477  -0.01857  -0.00000   0.01857   0.03477   0.03383   0.02940   0.03757   0.04467   0.05059   0.05868   0.06177   0.05537   0.03970
              -35.00  -0.03970  -0.02358  -0.00798   0.00194   0.00722   0.00742   0.00601  -0.00596  -0.00452  -0.00257  -0.00129  -0.00000   0.00129   0.00257   0.00452   0.00596  -0.00601  -0.00742  -0.00722  -0.00194   0.00798   0.02358   0.03970
              -11.00  -0.03970  -0.02236  -0.00569   0.00387   0.00559   0.00375  -0.00848  -0.01011  -0.00698  -0.00417  -0.00205  -0.00000   0.00205   0.00417   0.00698   0.01011   0.00848  -0.00375  -0.00559  -0.00387   0.00569   0.02236   0.03970
                4.00  -0.03970  -0.02298  -0.00670   0.00266   0.00281   0.00059  -0.01069  -0.01187  -0.00846  -0.00523  -0.00263  -0.00000   0.00263   0.00523   0.00846   0.01187   0.01069  -0.00059  -0.00281  -0.00266   0.00670   0.02298   0.03970
               19.00  -0.03970  -0.02270  -0.00534   0.00654   0.01077   0.00928   0.00053  -0.00407  -0.00307  -0.00183  -0.00089  -0.00000   0.00089   0.00183   0.00307   0.00407  -0.00053  -0.00928  -0.01077  -0.00654   0.00534   0.02270   0.03970
               42.00  -0.03970  -0.02413  -0.00305   0.00495   0.00994   0.01016   0.00885   0.00590  -0.00212  -0.00136  -0.00084  -0.00000   0.00084   0.00136   0.00212  -0.00590  -0.00885  -0.01016  -0.00994  -0.00495   0.00305   0.02413   0.03970
              180.00  -0.03970  -0.05537  -0.06177  -0.05868  -0.05059  -0.04467  -0.03757  -0.02940  -0.03383  -0.03477  -0.01857  -0.00000   0.01857   0.03477   0.03383   0.02940   0.03757   0.04467   0.05059   0.05868   0.06177   0.05537   0.03970
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            </tableData>
          </table>
          </product>
        </function>
        <function name="aero/coefficient/Cn_aileron">
          <description>Cn increment from aileron (deg), over alpha</description>
          <product>
            <property>aero/qbar-psf</property>
            <property>metrics/Sw-sqft</property>
            <property>metrics/bw-ft</property>
            <property>aero/function/mach-aileron</property>
          <table>
            <independentVar lookup="row">aero/alpha-deg</independentVar>
            <independentVar lookup="column">fcs/left-aileron-pos-deg</independentVar>
            <tableData>
                        -25.00    -20.00    -15.00    -10.00     -5.00      0.00      5.00     10.00     15.00     20.00     25.00
             -180.00  -0.00000  -0.00000  -0.00000  -0.00000  -0.00000   0.00000  -0.00000  -0.00000  -0.00000  -0.00000  -0.00000
              -35.00   0.00064   0.00072   0.00074   0.00066   0.00040   0.00000  -0.00040  -0.00066  -0.00074  -0.00072  -0.00064
              -11.00  -0.00964  -0.00840  -0.00682  -0.00478  -0.00240   0.00000   0.00240   0.00478   0.00683   0.00840   0.00964
                4.00  -0.00780  -0.00666  -0.00536  -0.00377  -0.00192   0.00000   0.00192   0.00377   0.00536   0.00666   0.00780
               19.00  -0.01284  -0.01176  -0.01032  -0.00809  -0.00455   0.00000   0.00455   0.00809   0.01032   0.01176   0.01284
               42.00  -0.01511  -0.01367  -0.01167  -0.00866  -0.00453   0.00000   0.00453   0.00866   0.01167   0.01367   0.01511
              180.00  -0.00000  -0.00000  -0.00000  -0.00000  -0.00000   0.00000  -0.00000  -0.00000  -0.00000  -0.00000  -0.00000
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            </tableData>
          </table>
          </product>
        </function>
        <function name="aero/coefficient/Cn_rudder">
          <description>Cn increment from rudder (deg), over alpha</description>
          <product>
            <property>aero/qbar-psf</property>
            <property>metrics/Sw-sqft</property>
            <property>metrics/bw-ft</property>
            <property>aero/function/mach-rudder</property>
          <table>
            <independentVar lookup="row">aero/alpha-deg</independentVar>
            <independentVar lookup="column">fcs/rudder-pos-deg</independentVar>
            <tableData>
                        -25.00    -20.00    -15.00    -10.00     -5.00      0.00      5.00     10.00     15.00     20.00     25.00
             -180.00  -0.00000  -0.00000  -0.00000  -0.00000  -0.00000   0.00000  -0.00000  -0.00000  -0.00000  -0.00000  -0.00000
              -35.00   0.01529   0.01368   0.01154   0.00850   0.00450   0.00000  -0.00450  -0.00850  -0.01154  -0.01368  -0.01530
              -11.00   0.02048   0.01829   0.01540   0.01133   0.00600   0.00000  -0.00600  -0.01133  -0.01540  -0.01830  -0.02049
                4.00   0.02129   0.01904   0.01606   0.01183   0.00627   0.00000  -0.00627  -0.01183  -0.01606  -0.01904  -0.02129
               19.00   0.01895   0.01699   0.01435   0.01059   0.00562   0.00000  -0.00562  -0.01059  -0.01435  -0.01699  -0.01896
               42.00   0.01620   0.01463   0.01243   0.00918   0.00486   0.00000  -0.00486  -0.00918  -0.01243  -0.01463  -0.01620
              180.00  -0.00000  -0.00000  -0.00000  -0.00000  -0.00000   0.00000  -0.00000  -0.00000  -0.00000  -0.00000  -0.00000
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            </tableData>
          </table>
          </product>
        </function>
        <function name="aero/coefficient/Cnp">
          <description>Cn per p (non-dimensional), over alpha</description>
          <product>
            <property>aero/qbar-psf</property>
            <property>metrics/Sw-sqft</property>
            <property>metrics/bw-ft</property>
            <property>aero/bi2vel</property>
            <property>velocities/p-aero-rad_sec</property>
            <property>aero/function/mach-lift</property>
          <table>
            <independentVar lookup="row">aero/alpha-deg</independentVar>
            <tableData>
                 -180.00    0.13409
                 -165.00    0.14432
                  -32.00    0.03519
                  -10.00    0.03962
                    5.00    0.01354
                   20.00    0.01557
                   46.00    0.04519
                  180.00    0.13409
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            </tableData>
          </table>
          </product>
        </function>
        <function name="aero/coefficient/Cnr">
          <description>Cn per r (non-dimensional), over alpha</description>
          <product>
            <property>aero/qbar-psf</property>
            <property>metrics/Sw-sqft</property>
            <property>metrics/bw-ft</property>
            <property>aero/bi2vel</property>
            <property>velocities/r-aero-rad_sec</property>
            <property>aero/function/mach-lift</property>
          <table>
            <independentVar lookup="row">aero/alpha-deg</independentVar>
            <tableData>
                 -180.00   -0.19456
                 -165.00   -0.20918
                  -32.00   -0.17517
                  -10.00   -0.16316
                    5.00   -0.15982
                   20.00   -0.15393
                   46.00   -0.17581
                  180.00   -0.19456
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            </tableData>
          </table>
          </product>
        </function>
      </axis>
    </aerodynamics>
</fdm_config>
