<?xml version="1.0"?>
<?xml-stylesheet type="text/xsl" href="http://jsbsim.sourceforge.net/JSBSim.xsl"?>
<!-- Generated by hangar 0.1.0 from rafale.toml on 2026-10-01. Edit the design and rebuild; changes
     made here are overwritten.  -->
<fdm_config name="rafale" version="2.0" release="ALPHA"
            xmlns:xsi="http://www.w3.org/2001/XMLSchema-instance"
            xsi:noNamespaceSchemaLocation="http://jsbsim.sourceforge.net/JSBSim.xsd">
    <fileheader>
      <author>hangar</author>
      <filecreationdate>2026-10-01</filecreationdate>
      <version>0.1.0</version>
      <description>Dassault Rafale C (hangar build)</description>
      <note>Aerodynamics: vortex lattice with viscous section polars, full-envelope
        strip model, slender-body fuselage (hangar). Mass: Raymer component
        weights on the geometry. Propeller: blade-element momentum theory.</note>
      <reference refID="fsim/applicability/aerobatic" author="the design" title="Dassault Aviation: +9 g (fsim/envelope/clean/n_max)" date="n/a"/>
      <reference refID="fsim/applicability/carrier" author="the design" title="Dassault Aviation: the Rafale C is land-based (the Rafale M is the naval variant, with a catapult bar and a carrier hook)" date="n/a"/>
      <reference refID="fsim/applicability/drag_devices" author="the design" title="Dassault Aviation: no dedicated airbrake; the canards and elevons deflect as one" date="n/a"/>
      <reference refID="fsim/applicability/ground_contact" author="the design" title="Dassault Aviation: tricycle wheeled gear" date="n/a"/>
      <reference refID="fsim/applicability/releasable_stores" author="the design" title="Dassault Aviation: fourteen hardpoints" date="n/a"/>
      <reference refID="fsim/applicability/retractable_gear" author="the design" title="Dassault Aviation: retractable gear" date="n/a"/>
      <reference refID="fsim/applicability/vertical_flight" author="the design" title="Dassault Aviation and Jane's: a conventional take-off and landing fighter. Conventional take-off and landing: no rotors, lift fans or vectored lift to hover" date="n/a"/>
    </fileheader>
    <metrics>
      <wingarea unit="M2"> 45.6443 </wingarea>
      <wingspan unit="M"> 10.5000 </wingspan>
      <chord unit="M"> 4.9682 </chord>
      <htailarea unit="M2"> 0.0000 </htailarea>
      <htailarm unit="M"> 0.0000 </htailarm>
      <vtailarea unit="M2"> 4.8619 </vtailarea>
      <vtailarm unit="M"> 3.7397 </vtailarm>
      <location name="AERORP" unit="M">
        <x> 8.8160 </x>
        <y> 0.0000 </y>
        <z> 0.0000 </z>
      </location>
      <location name="EYEPOINT" unit="M">
        <x> 4.4000 </x>
        <y> 0.0000 </y>
        <z> 1.4500 </z>
      </location>
      <location name="VRP" unit="M">
        <x> 8.8360 </x>
        <y> 0.0001 </y>
        <z> -0.0000 </z>
      </location>
    </metrics>
    <mass_balance negated_crossproduct_inertia="false">
      <ixx unit="KG*M2"> 16968.16 </ixx>
      <iyy unit="KG*M2"> 91749.83 </iyy>
      <izz unit="KG*M2"> 106254.74 </izz>
      <ixy unit="KG*M2"> -3.898 </ixy>
      <ixz unit="KG*M2"> 1259.161 </ixz>
      <iyz unit="KG*M2"> 0.639 </iyz>
      <emptywt unit="KG"> 9850.00 </emptywt>
      <location name="CG" unit="M">
        <x> 8.8360 </x>
        <y> 0.0001 </y>
        <z> -0.0000 </z>
      </location>
      <pointmass name="pilot">
        <weight unit="KG"> 100.00 </weight>
        <location unit="M">
          <x> 4.4000 </x>
          <y> 0.0000 </y>
          <z> 0.7500 </z>
        </location>
      </pointmass>
      <pointmass name="gun ammunition">
        <weight unit="KG"> 60.00 </weight>
        <location unit="M">
          <x> 8.4320 </x>
          <y> 1.0000 </y>
          <z> -0.1000 </z>
        </location>
      </pointmass>
    </mass_balance>
    <ground_reactions>
      <contact type="BOGEY" name="Nose Gear">
        <location unit="M">
          <x> 4.8600 </x>
          <y> 0.0000 </y>
          <z> -1.9800 </z>
        </location>
        <static_friction> 0.8 </static_friction>
        <dynamic_friction> 0.5 </dynamic_friction>
        <rolling_friction> 0.02 </rolling_friction>
        <spring_coeff unit="N/M"> 200836 </spring_coeff>
        <damping_coeff unit="N/M/SEC"> 22216 </damping_coeff>
        <damping_coeff_rebound unit="N/M/SEC"> 44433 </damping_coeff_rebound>
        <max_steer unit="DEG"> 60.0 </max_steer>
        <brake_group> NONE </brake_group>
        <retractable> 1 </retractable>
      </contact>
      <contact type="BOGEY" name="Left Main Gear">
        <location unit="M">
          <x> 9.6100 </x>
          <y> -1.5230 </y>
          <z> -2.0200 </z>
        </location>
        <static_friction> 0.8 </static_friction>
        <dynamic_friction> 0.5 </dynamic_friction>
        <rolling_friction> 0.02 </rolling_friction>
        <spring_coeff unit="N/M"> 375486 </spring_coeff>
        <damping_coeff unit="N/M/SEC"> 47962 </damping_coeff>
        <damping_coeff_rebound unit="N/M/SEC"> 95923 </damping_coeff_rebound>
        <max_steer unit="DEG"> 0.0 </max_steer>
        <brake_group> LEFT </brake_group>
        <retractable> 1 </retractable>
      </contact>
      <contact type="BOGEY" name="Right Main Gear">
        <location unit="M">
          <x> 9.6100 </x>
          <y> 1.5230 </y>
          <z> -2.0200 </z>
        </location>
        <static_friction> 0.8 </static_friction>
        <dynamic_friction> 0.5 </dynamic_friction>
        <rolling_friction> 0.02 </rolling_friction>
        <spring_coeff unit="N/M"> 375486 </spring_coeff>
        <damping_coeff unit="N/M/SEC"> 47962 </damping_coeff>
        <damping_coeff_rebound unit="N/M/SEC"> 95923 </damping_coeff_rebound>
        <max_steer unit="DEG"> 0.0 </max_steer>
        <brake_group> RIGHT </brake_group>
        <retractable> 1 </retractable>
      </contact>
      <contact type="STRUCTURE" name="fin tip rear">
        <location unit="M">
          <x> 15.2600 </x>
          <y> 0.0000 </y>
          <z> 2.9600 </z>
        </location>
        <static_friction> 0.8 </static_friction>
        <dynamic_friction> 0.6 </dynamic_friction>
        <spring_coeff unit="N/M"> 458961 </spring_coeff>
        <damping_coeff unit="N/M/SEC"> 15299 </damping_coeff>
        <damping_coeff_rebound unit="N/M/SEC"> 15299 </damping_coeff_rebound>
      </contact>
      <contact type="STRUCTURE" name="fin tip blade rear">
        <location unit="M">
          <x> 14.4600 </x>
          <y> 0.0000 </y>
          <z> 3.3700 </z>
        </location>
        <static_friction> 0.8 </static_friction>
        <dynamic_friction> 0.6 </dynamic_friction>
        <spring_coeff unit="N/M"> 431506 </spring_coeff>
        <damping_coeff unit="N/M/SEC"> 14384 </damping_coeff>
        <damping_coeff_rebound unit="N/M/SEC"> 14384 </damping_coeff_rebound>
      </contact>
      <contact type="STRUCTURE" name="fuselage left rear">
        <location unit="M">
          <x> 13.7000 </x>
          <y> -0.5262 </y>
          <z> -0.4008 </z>
        </location>
        <static_friction> 0.8 </static_friction>
        <dynamic_friction> 0.6 </dynamic_friction>
        <spring_coeff unit="N/M"> 1181301 </spring_coeff>
        <damping_coeff unit="N/M/SEC"> 39377 </damping_coeff>
        <damping_coeff_rebound unit="N/M/SEC"> 39377 </damping_coeff_rebound>
      </contact>
      <contact type="STRUCTURE" name="fuselage front">
        <location unit="M">
          <x> 0.0000 </x>
          <y> 0.0000 </y>
          <z> -0.2500 </z>
        </location>
        <static_friction> 0.8 </static_friction>
        <dynamic_friction> 0.6 </dynamic_friction>
        <spring_coeff unit="N/M"> 944229 </spring_coeff>
        <damping_coeff unit="N/M/SEC"> 31474 </damping_coeff>
        <damping_coeff_rebound unit="N/M/SEC"> 31474 </damping_coeff_rebound>
      </contact>
      <contact type="STRUCTURE" name="refuelling probe right front">
        <location unit="M">
          <x> 1.6900 </x>
          <y> 1.1524 </y>
          <z> 1.0480 </z>
        </location>
        <static_friction> 0.8 </static_friction>
        <dynamic_friction> 0.6 </dynamic_friction>
        <spring_coeff unit="N/M"> 1146757 </spring_coeff>
        <damping_coeff unit="N/M/SEC"> 38225 </damping_coeff>
        <damping_coeff_rebound unit="N/M/SEC"> 38225 </damping_coeff_rebound>
      </contact>
      <contact type="STRUCTURE" name="tail cone rear">
        <location unit="M">
          <x> 14.4600 </x>
          <y> 0.0000 </y>
          <z> 0.6200 </z>
        </location>
        <static_friction> 0.8 </static_friction>
        <dynamic_friction> 0.6 </dynamic_friction>
        <spring_coeff unit="N/M"> 999007 </spring_coeff>
        <damping_coeff unit="N/M/SEC"> 33300 </damping_coeff>
        <damping_coeff_rebound unit="N/M/SEC"> 33300 </damping_coeff_rebound>
      </contact>
      <contact type="STRUCTURE" name="tip rail left rear">
        <location unit="M">
          <x> 10.5591 </x>
          <y> -5.3996 </y>
          <z> -0.2510 </z>
        </location>
        <static_friction> 0.8 </static_friction>
        <dynamic_friction> 0.6 </dynamic_friction>
        <spring_coeff unit="N/M"> 484325 </spring_coeff>
        <damping_coeff unit="N/M/SEC"> 16144 </damping_coeff>
        <damping_coeff_rebound unit="N/M/SEC"> 16144 </damping_coeff_rebound>
      </contact>
      <contact type="STRUCTURE" name="tip rail left rear 2">
        <location unit="M">
          <x> 12.9400 </x>
          <y> -5.3200 </y>
          <z> -0.3200 </z>
        </location>
        <static_friction> 0.8 </static_friction>
        <dynamic_friction> 0.6 </dynamic_friction>
        <spring_coeff unit="N/M"> 458574 </spring_coeff>
        <damping_coeff unit="N/M/SEC"> 15286 </damping_coeff>
        <damping_coeff_rebound unit="N/M/SEC"> 15286 </damping_coeff_rebound>
      </contact>
      <contact type="STRUCTURE" name="tip rail right rear">
        <location unit="M">
          <x> 12.9400 </x>
          <y> 5.3200 </y>
          <z> -0.3200 </z>
        </location>
        <static_friction> 0.8 </static_friction>
        <dynamic_friction> 0.6 </dynamic_friction>
        <spring_coeff unit="N/M"> 458541 </spring_coeff>
        <damping_coeff unit="N/M/SEC"> 15285 </damping_coeff>
        <damping_coeff_rebound unit="N/M/SEC"> 15285 </damping_coeff_rebound>
      </contact>
      <contact type="STRUCTURE" name="tip rail right rear 2">
        <location unit="M">
          <x> 10.5591 </x>
          <y> 5.4114 </y>
          <z> -0.2717 </z>
        </location>
        <static_friction> 0.8 </static_friction>
        <dynamic_friction> 0.6 </dynamic_friction>
        <spring_coeff unit="N/M"> 482187 </spring_coeff>
        <damping_coeff unit="N/M/SEC"> 16073 </damping_coeff>
        <damping_coeff_rebound unit="N/M/SEC"> 16073 </damping_coeff_rebound>
      </contact>
    </ground_reactions>
    <propulsion>
      <engine file="rafale_engine0">
        <location unit="M">
          <x> 12.0000 </x>
          <y> -0.7400 </y>
          <z> 0.0500 </z>
        </location>
        <feed>0</feed>
        <feed>1</feed>
        <feed>2</feed>
        <feed>3</feed>
        <thruster file="rafale_nozzle0">
          <location unit="M">
            <x> 14.2000 </x>
            <y> -0.7400 </y>
            <z> 0.0500 </z>
          </location>
          <orient unit="DEG"> <roll>0.00</roll> <pitch>0.00</pitch> <yaw>0.00</yaw> </orient>

        </thruster>
      </engine>
      <engine file="rafale_engine0">
        <location unit="M">
          <x> 12.0000 </x>
          <y> 0.7400 </y>
          <z> 0.0500 </z>
        </location>
        <feed>0</feed>
        <feed>1</feed>
        <feed>2</feed>
        <feed>3</feed>
        <thruster file="rafale_nozzle0">
          <location unit="M">
            <x> 14.2000 </x>
            <y> 0.7400 </y>
            <z> 0.0500 </z>
          </location>
          <orient unit="DEG"> <roll>0.00</roll> <pitch>0.00</pitch> <yaw>0.00</yaw> </orient>

        </thruster>
      </engine>
      <tank type="FUEL">
        <location unit="M">
          <x> 7.7320 </x>
          <y> 0.0000 </y>
          <z> 0.1000 </z>
        </location>
        <capacity unit="KG"> 1600.00 </capacity>
        <contents unit="KG"> 1600.00 </contents>
      </tank>
      <tank type="FUEL">
        <location unit="M">
          <x> 9.5320 </x>
          <y> 0.0000 </y>
          <z> 0.1000 </z>
        </location>
        <capacity unit="KG"> 1500.00 </capacity>
        <contents unit="KG"> 1500.00 </contents>
      </tank>
      <tank type="FUEL">
        <location unit="M">
          <x> 9.4000 </x>
          <y> -2.2000 </y>
          <z> -0.0500 </z>
        </location>
        <capacity unit="KG"> 800.00 </capacity>
        <contents unit="KG"> 800.00 </contents>
      </tank>
      <tank type="FUEL">
        <location unit="M">
          <x> 9.4000 </x>
          <y> 2.2000 </y>
          <z> -0.0500 </z>
        </location>
        <capacity unit="KG"> 800.00 </capacity>
        <contents unit="KG"> 800.00 </contents>
      </tank>
    </propulsion>
    <flight_control name="rafale">
      <!-- the aircraft's profile for the platform (docs/control-architecture.md, section 7): what
           hangar knows of it - its design, its flight tests, its identified responses -->
      <property value="1">fsim/identity/version</property>
      <property value="1">fsim/identity/provenance</property>
      <property value="2">fsim/identity/class</property>
      <property value="2">fsim/identity/family</property>
      <property value="1">fsim/effectors/version</property>
      <property value="1">fsim/effectors/provenance</property>
      <property value="0.0">fsim/effectors/flaps</property>
      <property value="1">fsim/effectors/neutral</property>
      <property value="1">fsim/effectors/pitch</property>
      <property value="0.0">fsim/effectors/pitch_trim</property>
      <property value="1">fsim/effectors/retractable_gear</property>
      <property value="1">fsim/effectors/roll</property>
      <property value="1">fsim/effectors/speedbrake</property>
      <property value="1">fsim/effectors/speedbrake_approach</property>
      <property value="1">fsim/effectors/wheel_brakes</property>
      <property value="0.0">fsim/effectors/yaw</property>
      <property value="1">fsim/envelope/version</property>
      <property value="1">fsim/envelope/provenance</property>
      <property value="29">fsim/envelope/clean/alpha_max_deg</property>
      <property value="60.9178">fsim/envelope/clean/cas_min_ms</property>
      <property value="9">fsim/envelope/clean/n_max</property>
      <property value="-3.6">fsim/envelope/clean/n_min</property>
      <property value="270">fsim/envelope/clean/roll_rate_max_deg_s</property>
      <property value="15.43">fsim/envelope/crosswind_max_ms</property>
      <property value="19.64">fsim/envelope/ground_pitch_max_deg</property>
      <property value="3.3">fsim/envelope/ground_turn_radius_m</property>
      <property value="0.2976">fsim/envelope/ground_yaw_accel_rad_s2</property>
      <property value="1">fsim/envelope/law_alpha</property>
      <property value="1">fsim/envelope/law_load_factor</property>
      <property value="1">fsim/envelope/law_roll_rate</property>
      <property value="1">fsim/propulsion/version</property>
      <property value="1">fsim/propulsion/provenance</property>
      <property value="1">fsim/propulsion/afterburner</property>
      <property value="2">fsim/propulsion/engines</property>
      <property value="0.168615">fsim/propulsion/spool_s</property>
      <property value="2">fsim/propulsion/type</property>
      <property value="1">fsim/plant/version</property>
      <property value="1">fsim/plant/provenance</property>
      <property value="-0.519472">fsim/plant/alpha_zero_lift_deg</property>
      <property value="3000">fsim/plant/altitude_m</property>
      <property value="123.241">fsim/plant/eas_ms</property>
      <property value="0.0">fsim/plant/elevator_trim</property>
      <property value="0.0">fsim/plant/elevator_trim_lift</property>
      <property value="10.5298">fsim/plant/pitch/gain</property>
      <property value="0.88862">fsim/plant/pitch/tau_s</property>
      <property value="4.77672">fsim/plant/roll/gain</property>
      <property value="0.189688">fsim/plant/roll/tau_s</property>
      <property value="6.35578">fsim/plant/speed/gain</property>
      <property value="0.168615">fsim/plant/speed/tau_s</property>
      <property value="140.932">fsim/plant/tas_ms</property>
      <property value="0.313513">fsim/plant/throttle_trim</property>
      <property value="0.120632">fsim/plant/yaw/gain</property>
      <property value="1">fsim/performance/version</property>
      <property value="1">fsim/performance/provenance</property>
      <property value="18893.6">fsim/performance/ceiling_m</property>
      <property value="306.808">fsim/performance/climb_ms</property>
      <property value="378.084">fsim/performance/max_tas_ms</property>
      <property value="1">fsim/applicability/version</property>
      <property value="1">fsim/applicability/provenance</property>
      <property value="1">fsim/applicability/aerobatic</property>
      <property value="1">fsim/applicability/carrier</property>
      <property value="3">fsim/applicability/drag_devices</property>
      <property value="1">fsim/applicability/ground_contact</property>
      <property value="2">fsim/applicability/releasable_stores</property>
      <property value="1">fsim/applicability/retractable_gear</property>
      <property value="0.0">fsim/applicability/vertical_flight</property>
      <property value="1">fsim/tables/version</property>
      <property value="1">fsim/tables/provenance</property>
      <property value="100">fsim/tables/altitude_m/h0</property>
      <property value="3780">fsim/tables/altitude_m/h1</property>
      <property value="7560">fsim/tables/altitude_m/h2</property>
      <property value="10972.8">fsim/tables/altitude_m/h3</property>
      <property value="11340">fsim/tables/altitude_m/h4</property>
      <property value="14170">fsim/tables/altitude_m/h5</property>
      <property value="16060">fsim/tables/altitude_m/h6</property>
      <property value="17950">fsim/tables/altitude_m/h7</property>
      <property value="0.426295">fsim/tables/best_endurance_fuel_kg_s/h0/w0</property>
      <property value="0.531152">fsim/tables/best_endurance_fuel_kg_s/h0/w1</property>
      <property value="0.473085">fsim/tables/best_endurance_fuel_kg_s/h0/w2</property>
      <property value="0.31653">fsim/tables/best_endurance_fuel_kg_s/h1/w0</property>
      <property value="0.400945">fsim/tables/best_endurance_fuel_kg_s/h1/w1</property>
      <property value="0.413249">fsim/tables/best_endurance_fuel_kg_s/h1/w2</property>
      <property value="0.288708">fsim/tables/best_endurance_fuel_kg_s/h2/w0</property>
      <property value="0.321905">fsim/tables/best_endurance_fuel_kg_s/h2/w1</property>
      <property value="0.358136">fsim/tables/best_endurance_fuel_kg_s/h2/w2</property>
      <property value="0.23817">fsim/tables/best_endurance_fuel_kg_s/h3/w0</property>
      <property value="0.273658">fsim/tables/best_endurance_fuel_kg_s/h3/w1</property>
      <property value="0.309035">fsim/tables/best_endurance_fuel_kg_s/h3/w2</property>
      <property value="0.234947">fsim/tables/best_endurance_fuel_kg_s/h4/w0</property>
      <property value="0.270198">fsim/tables/best_endurance_fuel_kg_s/h4/w1</property>
      <property value="0.304792">fsim/tables/best_endurance_fuel_kg_s/h4/w2</property>
      <property value="0.207934">fsim/tables/best_endurance_fuel_kg_s/h5/w0</property>
      <property value="0.255579">fsim/tables/best_endurance_fuel_kg_s/h5/w1</property>
      <property value="0.299146">fsim/tables/best_endurance_fuel_kg_s/h5/w2</property>
      <property value="0.20545">fsim/tables/best_endurance_fuel_kg_s/h6/w0</property>
      <property value="0.265281">fsim/tables/best_endurance_fuel_kg_s/h6/w1</property>
      <property value="0.830406">fsim/tables/best_endurance_fuel_kg_s/h6/w2</property>
      <property value="0.575216">fsim/tables/best_endurance_fuel_kg_s/h7/w0</property>
      <property value="0.760863">fsim/tables/best_endurance_fuel_kg_s/h7/w1</property>
      <property value="0.983951">fsim/tables/best_endurance_fuel_kg_s/h7/w2</property>
      <property value="168.04">fsim/tables/best_endurance_tas_ms/h0/w0</property>
      <property value="198.405">fsim/tables/best_endurance_tas_ms/h0/w1</property>
      <property value="148.228">fsim/tables/best_endurance_tas_ms/h0/w2</property>
      <property value="143.466">fsim/tables/best_endurance_tas_ms/h1/w0</property>
      <property value="200.025">fsim/tables/best_endurance_tas_ms/h1/w1</property>
      <property value="167.986">fsim/tables/best_endurance_tas_ms/h1/w2</property>
      <property value="209.835">fsim/tables/best_endurance_tas_ms/h2/w0</property>
      <property value="212.813">fsim/tables/best_endurance_tas_ms/h2/w1</property>
      <property value="209.413">fsim/tables/best_endurance_tas_ms/h2/w2</property>
      <property value="216.929">fsim/tables/best_endurance_tas_ms/h3/w0</property>
      <property value="237.495">fsim/tables/best_endurance_tas_ms/h3/w1</property>
      <property value="251.351">fsim/tables/best_endurance_tas_ms/h3/w2</property>
      <property value="224.429">fsim/tables/best_endurance_tas_ms/h4/w0</property>
      <property value="242.078">fsim/tables/best_endurance_tas_ms/h4/w1</property>
      <property value="253.175">fsim/tables/best_endurance_tas_ms/h4/w2</property>
      <property value="265.92">fsim/tables/best_endurance_tas_ms/h5/w0</property>
      <property value="263.1">fsim/tables/best_endurance_tas_ms/h5/w1</property>
      <property value="268.594">fsim/tables/best_endurance_tas_ms/h5/w2</property>
      <property value="272.562">fsim/tables/best_endurance_tas_ms/h6/w0</property>
      <property value="273.223">fsim/tables/best_endurance_tas_ms/h6/w1</property>
      <property value="278.197">fsim/tables/best_endurance_tas_ms/h6/w2</property>
      <property value="277.236">fsim/tables/best_endurance_tas_ms/h7/w0</property>
      <property value="280.988">fsim/tables/best_endurance_tas_ms/h7/w1</property>
      <property value="285.9">fsim/tables/best_endurance_tas_ms/h7/w2</property>
      <property value="0.426295">fsim/tables/best_range_fuel_kg_s/h0/w0</property>
      <property value="0.531152">fsim/tables/best_range_fuel_kg_s/h0/w1</property>
      <property value="0.584351">fsim/tables/best_range_fuel_kg_s/h0/w2</property>
      <property value="0.389029">fsim/tables/best_range_fuel_kg_s/h1/w0</property>
      <property value="0.45598">fsim/tables/best_range_fuel_kg_s/h1/w1</property>
      <property value="0.521442">fsim/tables/best_range_fuel_kg_s/h1/w2</property>
      <property value="0.337735">fsim/tables/best_range_fuel_kg_s/h2/w0</property>
      <property value="0.370716">fsim/tables/best_range_fuel_kg_s/h2/w1</property>
      <property value="0.40425">fsim/tables/best_range_fuel_kg_s/h2/w2</property>
      <property value="0.253168">fsim/tables/best_range_fuel_kg_s/h3/w0</property>
      <property value="0.28369">fsim/tables/best_range_fuel_kg_s/h3/w1</property>
      <property value="0.316162">fsim/tables/best_range_fuel_kg_s/h3/w2</property>
      <property value="0.247032">fsim/tables/best_range_fuel_kg_s/h4/w0</property>
      <property value="0.278129">fsim/tables/best_range_fuel_kg_s/h4/w1</property>
      <property value="0.31576">fsim/tables/best_range_fuel_kg_s/h4/w2</property>
      <property value="0.2158">fsim/tables/best_range_fuel_kg_s/h5/w0</property>
      <property value="0.263633">fsim/tables/best_range_fuel_kg_s/h5/w1</property>
      <property value="0.30932">fsim/tables/best_range_fuel_kg_s/h5/w2</property>
      <property value="0.210198">fsim/tables/best_range_fuel_kg_s/h6/w0</property>
      <property value="0.271993">fsim/tables/best_range_fuel_kg_s/h6/w1</property>
      <property value="0.848535">fsim/tables/best_range_fuel_kg_s/h6/w2</property>
      <property value="0.588758">fsim/tables/best_range_fuel_kg_s/h7/w0</property>
      <property value="0.772188">fsim/tables/best_range_fuel_kg_s/h7/w1</property>
      <property value="0.995549">fsim/tables/best_range_fuel_kg_s/h7/w2</property>
      <property value="168.04">fsim/tables/best_range_tas_ms/h0/w0</property>
      <property value="198.405">fsim/tables/best_range_tas_ms/h0/w1</property>
      <property value="209.351">fsim/tables/best_range_tas_ms/h0/w2</property>
      <property value="209.384">fsim/tables/best_range_tas_ms/h1/w0</property>
      <property value="233.686">fsim/tables/best_range_tas_ms/h1/w1</property>
      <property value="256.63">fsim/tables/best_range_tas_ms/h1/w2</property>
      <property value="260.17">fsim/tables/best_range_tas_ms/h2/w0</property>
      <property value="270.734">fsim/tables/best_range_tas_ms/h2/w1</property>
      <property value="278.584">fsim/tables/best_range_tas_ms/h2/w2</property>
      <property value="262.952">fsim/tables/best_range_tas_ms/h3/w0</property>
      <property value="268.393">fsim/tables/best_range_tas_ms/h3/w1</property>
      <property value="271.964">fsim/tables/best_range_tas_ms/h3/w2</property>
      <property value="263.829">fsim/tables/best_range_tas_ms/h4/w0</property>
      <property value="269.689">fsim/tables/best_range_tas_ms/h4/w1</property>
      <property value="272.482">fsim/tables/best_range_tas_ms/h4/w2</property>
      <property value="271.824">fsim/tables/best_range_tas_ms/h5/w0</property>
      <property value="275.865">fsim/tables/best_range_tas_ms/h5/w1</property>
      <property value="278.243">fsim/tables/best_range_tas_ms/h5/w2</property>
      <property value="277.318">fsim/tables/best_range_tas_ms/h6/w0</property>
      <property value="281.034">fsim/tables/best_range_tas_ms/h6/w1</property>
      <property value="284.238">fsim/tables/best_range_tas_ms/h6/w2</property>
      <property value="282.642">fsim/tables/best_range_tas_ms/h7/w0</property>
      <property value="285.181">fsim/tables/best_range_tas_ms/h7/w1</property>
      <property value="292.692">fsim/tables/best_range_tas_ms/h7/w2</property>
      <property value="308.945">fsim/tables/climb_tas_ms/h0/w0</property>
      <property value="311.912">fsim/tables/climb_tas_ms/h0/w1</property>
      <property value="313.089">fsim/tables/climb_tas_ms/h0/w2</property>
      <property value="302.404">fsim/tables/climb_tas_ms/h1/w0</property>
      <property value="302.724">fsim/tables/climb_tas_ms/h1/w1</property>
      <property value="303.413">fsim/tables/climb_tas_ms/h1/w2</property>
      <property value="291.69">fsim/tables/climb_tas_ms/h2/w0</property>
      <property value="293.526">fsim/tables/climb_tas_ms/h2/w1</property>
      <property value="295.283">fsim/tables/climb_tas_ms/h2/w2</property>
      <property value="283.224">fsim/tables/climb_tas_ms/h3/w0</property>
      <property value="282.121">fsim/tables/climb_tas_ms/h3/w1</property>
      <property value="283.493">fsim/tables/climb_tas_ms/h3/w2</property>
      <property value="281.721">fsim/tables/climb_tas_ms/h4/w0</property>
      <property value="282.292">fsim/tables/climb_tas_ms/h4/w1</property>
      <property value="285.296">fsim/tables/climb_tas_ms/h4/w2</property>
      <property value="283.796">fsim/tables/climb_tas_ms/h5/w0</property>
      <property value="285.262">fsim/tables/climb_tas_ms/h5/w1</property>
      <property value="284.197">fsim/tables/climb_tas_ms/h5/w2</property>
      <property value="290.223">fsim/tables/climb_tas_ms/h6/w0</property>
      <property value="284.531">fsim/tables/climb_tas_ms/h6/w1</property>
      <property value="287.707">fsim/tables/climb_tas_ms/h6/w2</property>
      <property value="284.502">fsim/tables/climb_tas_ms/h7/w0</property>
      <property value="290.487">fsim/tables/climb_tas_ms/h7/w1</property>
      <property value="295.703">fsim/tables/climb_tas_ms/h7/w2</property>
      <property value="4700">fsim/tables/fuel_capacity_kg</property>
      <property value="0.426278">fsim/tables/fuel_kg_s/h0/w0/v0</property>
      <property value="0.461348">fsim/tables/fuel_kg_s/h0/w0/v1</property>
      <property value="0.882813">fsim/tables/fuel_kg_s/h0/w0/v10</property>
      <property value="0.957266">fsim/tables/fuel_kg_s/h0/w0/v11</property>
      <property value="1.15646">fsim/tables/fuel_kg_s/h0/w0/v12</property>
      <property value="1.65059">fsim/tables/fuel_kg_s/h0/w0/v13</property>
      <property value="7.1777">fsim/tables/fuel_kg_s/h0/w0/v14</property>
      <property value="8.5533">fsim/tables/fuel_kg_s/h0/w0/v15</property>
      <property value="0.498566">fsim/tables/fuel_kg_s/h0/w0/v2</property>
      <property value="0.537746">fsim/tables/fuel_kg_s/h0/w0/v3</property>
      <property value="0.578742">fsim/tables/fuel_kg_s/h0/w0/v4</property>
      <property value="0.622019">fsim/tables/fuel_kg_s/h0/w0/v5</property>
      <property value="0.670695">fsim/tables/fuel_kg_s/h0/w0/v6</property>
      <property value="0.720745">fsim/tables/fuel_kg_s/h0/w0/v7</property>
      <property value="0.772221">fsim/tables/fuel_kg_s/h0/w0/v8</property>
      <property value="0.825227">fsim/tables/fuel_kg_s/h0/w0/v9</property>
      <property value="0.531151">fsim/tables/fuel_kg_s/h0/w1/v0</property>
      <property value="0.56355">fsim/tables/fuel_kg_s/h0/w1/v1</property>
      <property value="0.94296">fsim/tables/fuel_kg_s/h0/w1/v10</property>
      <property value="1.0149">fsim/tables/fuel_kg_s/h0/w1/v11</property>
      <property value="1.34232">fsim/tables/fuel_kg_s/h0/w1/v12</property>
      <property value="2.04294">fsim/tables/fuel_kg_s/h0/w1/v13</property>
      <property value="7.65354">fsim/tables/fuel_kg_s/h0/w1/v14</property>
      <property value="8.54478">fsim/tables/fuel_kg_s/h0/w1/v15</property>
      <property value="0.597352">fsim/tables/fuel_kg_s/h0/w1/v2</property>
      <property value="0.632466">fsim/tables/fuel_kg_s/h0/w1/v3</property>
      <property value="0.668604">fsim/tables/fuel_kg_s/h0/w1/v4</property>
      <property value="0.70623">fsim/tables/fuel_kg_s/h0/w1/v5</property>
      <property value="0.748562">fsim/tables/fuel_kg_s/h0/w1/v6</property>
      <property value="0.791989">fsim/tables/fuel_kg_s/h0/w1/v7</property>
      <property value="0.836521">fsim/tables/fuel_kg_s/h0/w1/v8</property>
      <property value="0.884801">fsim/tables/fuel_kg_s/h0/w1/v9</property>
      <property value="0.473078">fsim/tables/fuel_kg_s/h0/w2/v0</property>
      <property value="0.485289">fsim/tables/fuel_kg_s/h0/w2/v1</property>
      <property value="0.869223">fsim/tables/fuel_kg_s/h0/w2/v10</property>
      <property value="0.936691">fsim/tables/fuel_kg_s/h0/w2/v11</property>
      <property value="1.02951">fsim/tables/fuel_kg_s/h0/w2/v12</property>
      <property value="1.48741">fsim/tables/fuel_kg_s/h0/w2/v13</property>
      <property value="6.61739">fsim/tables/fuel_kg_s/h0/w2/v14</property>
      <property value="8.54418">fsim/tables/fuel_kg_s/h0/w2/v15</property>
      <property value="0.510499">fsim/tables/fuel_kg_s/h0/w2/v2</property>
      <property value="0.538633">fsim/tables/fuel_kg_s/h0/w2/v3</property>
      <property value="0.575969">fsim/tables/fuel_kg_s/h0/w2/v4</property>
      <property value="0.618216">fsim/tables/fuel_kg_s/h0/w2/v5</property>
      <property value="0.662851">fsim/tables/fuel_kg_s/h0/w2/v6</property>
      <property value="0.709189">fsim/tables/fuel_kg_s/h0/w2/v7</property>
      <property value="0.757355">fsim/tables/fuel_kg_s/h0/w2/v8</property>
      <property value="0.810421">fsim/tables/fuel_kg_s/h0/w2/v9</property>
      <property value="0.32793">fsim/tables/fuel_kg_s/h1/w0/v0</property>
      <property value="0.316621">fsim/tables/fuel_kg_s/h1/w0/v1</property>
      <property value="0.673653">fsim/tables/fuel_kg_s/h1/w0/v10</property>
      <property value="1.25234">fsim/tables/fuel_kg_s/h1/w0/v11</property>
      <property value="5.34628">fsim/tables/fuel_kg_s/h1/w0/v12</property>
      <property value="5.92781">fsim/tables/fuel_kg_s/h1/w0/v13</property>
      <property value="6.53738">fsim/tables/fuel_kg_s/h1/w0/v14</property>
      <property value="7.1339">fsim/tables/fuel_kg_s/h1/w0/v15</property>
      <property value="0.324226">fsim/tables/fuel_kg_s/h1/w0/v2</property>
      <property value="0.343753">fsim/tables/fuel_kg_s/h1/w0/v3</property>
      <property value="0.368131">fsim/tables/fuel_kg_s/h1/w0/v4</property>
      <property value="0.402832">fsim/tables/fuel_kg_s/h1/w0/v5</property>
      <property value="0.440281">fsim/tables/fuel_kg_s/h1/w0/v6</property>
      <property value="0.479772">fsim/tables/fuel_kg_s/h1/w0/v7</property>
      <property value="0.521352">fsim/tables/fuel_kg_s/h1/w0/v8</property>
      <property value="0.572121">fsim/tables/fuel_kg_s/h1/w0/v9</property>
      <property value="0.400945">fsim/tables/fuel_kg_s/h1/w1/v0</property>
      <property value="0.418946">fsim/tables/fuel_kg_s/h1/w1/v1</property>
      <property value="1.62281">fsim/tables/fuel_kg_s/h1/w1/v10</property>
      <property value="5.34836">fsim/tables/fuel_kg_s/h1/w1/v11</property>
      <property value="5.76238">fsim/tables/fuel_kg_s/h1/w1/v12</property>
      <property value="6.19068">fsim/tables/fuel_kg_s/h1/w1/v13</property>
      <property value="6.63375">fsim/tables/fuel_kg_s/h1/w1/v14</property>
      <property value="7.0587">fsim/tables/fuel_kg_s/h1/w1/v15</property>
      <property value="0.442849">fsim/tables/fuel_kg_s/h1/w1/v2</property>
      <property value="0.469125">fsim/tables/fuel_kg_s/h1/w1/v3</property>
      <property value="0.496616">fsim/tables/fuel_kg_s/h1/w1/v4</property>
      <property value="0.525276">fsim/tables/fuel_kg_s/h1/w1/v5</property>
      <property value="0.555679">fsim/tables/fuel_kg_s/h1/w1/v6</property>
      <property value="0.590238">fsim/tables/fuel_kg_s/h1/w1/v7</property>
      <property value="0.642238">fsim/tables/fuel_kg_s/h1/w1/v8</property>
      <property value="0.887589">fsim/tables/fuel_kg_s/h1/w1/v9</property>
      <property value="0.422897">fsim/tables/fuel_kg_s/h1/w2/v0</property>
      <property value="0.413477">fsim/tables/fuel_kg_s/h1/w2/v1</property>
      <property value="0.80951">fsim/tables/fuel_kg_s/h1/w2/v10</property>
      <property value="1.55534">fsim/tables/fuel_kg_s/h1/w2/v11</property>
      <property value="5.43702">fsim/tables/fuel_kg_s/h1/w2/v12</property>
      <property value="5.96246">fsim/tables/fuel_kg_s/h1/w2/v13</property>
      <property value="6.51104">fsim/tables/fuel_kg_s/h1/w2/v14</property>
      <property value="7.05223">fsim/tables/fuel_kg_s/h1/w2/v15</property>
      <property value="0.417879">fsim/tables/fuel_kg_s/h1/w2/v2</property>
      <property value="0.430337">fsim/tables/fuel_kg_s/h1/w2/v3</property>
      <property value="0.451124">fsim/tables/fuel_kg_s/h1/w2/v4</property>
      <property value="0.474144">fsim/tables/fuel_kg_s/h1/w2/v5</property>
      <property value="0.506528">fsim/tables/fuel_kg_s/h1/w2/v6</property>
      <property value="0.540978">fsim/tables/fuel_kg_s/h1/w2/v7</property>
      <property value="0.578308">fsim/tables/fuel_kg_s/h1/w2/v8</property>
      <property value="0.62671">fsim/tables/fuel_kg_s/h1/w2/v9</property>
      <property value="0.288708">fsim/tables/fuel_kg_s/h2/w0/v0</property>
      <property value="0.301528">fsim/tables/fuel_kg_s/h2/w0/v1</property>
      <property value="4.08992">fsim/tables/fuel_kg_s/h2/w0/v10</property>
      <property value="4.41324">fsim/tables/fuel_kg_s/h2/w0/v11</property>
      <property value="4.74574">fsim/tables/fuel_kg_s/h2/w0/v12</property>
      <property value="5.08728">fsim/tables/fuel_kg_s/h2/w0/v13</property>
      <property value="5.44533">fsim/tables/fuel_kg_s/h2/w0/v14</property>
      <property value="5.82309">fsim/tables/fuel_kg_s/h2/w0/v15</property>
      <property value="0.316228">fsim/tables/fuel_kg_s/h2/w0/v2</property>
      <property value="0.336353">fsim/tables/fuel_kg_s/h2/w0/v3</property>
      <property value="0.358765">fsim/tables/fuel_kg_s/h2/w0/v4</property>
      <property value="0.391722">fsim/tables/fuel_kg_s/h2/w0/v5</property>
      <property value="0.564446">fsim/tables/fuel_kg_s/h2/w0/v6</property>
      <property value="3.05351">fsim/tables/fuel_kg_s/h2/w0/v7</property>
      <property value="3.42478">fsim/tables/fuel_kg_s/h2/w0/v8</property>
      <property value="3.75199">fsim/tables/fuel_kg_s/h2/w0/v9</property>
      <property value="0.321905">fsim/tables/fuel_kg_s/h2/w1/v0</property>
      <property value="0.331708">fsim/tables/fuel_kg_s/h2/w1/v1</property>
      <property value="4.12647">fsim/tables/fuel_kg_s/h2/w1/v10</property>
      <property value="4.44575">fsim/tables/fuel_kg_s/h2/w1/v11</property>
      <property value="4.77388">fsim/tables/fuel_kg_s/h2/w1/v12</property>
      <property value="5.11073">fsim/tables/fuel_kg_s/h2/w1/v13</property>
      <property value="5.45803">fsim/tables/fuel_kg_s/h2/w1/v14</property>
      <property value="5.81976">fsim/tables/fuel_kg_s/h2/w1/v15</property>
      <property value="0.344366">fsim/tables/fuel_kg_s/h2/w1/v2</property>
      <property value="0.35819">fsim/tables/fuel_kg_s/h2/w1/v3</property>
      <property value="0.379396">fsim/tables/fuel_kg_s/h2/w1/v4</property>
      <property value="0.411379">fsim/tables/fuel_kg_s/h2/w1/v5</property>
      <property value="0.592096">fsim/tables/fuel_kg_s/h2/w1/v6</property>
      <property value="3.16049">fsim/tables/fuel_kg_s/h2/w1/v7</property>
      <property value="3.46913">fsim/tables/fuel_kg_s/h2/w1/v8</property>
      <property value="3.79258">fsim/tables/fuel_kg_s/h2/w1/v9</property>
      <property value="0.404235">fsim/tables/fuel_kg_s/h2/w2/v0</property>
      <property value="0.374279">fsim/tables/fuel_kg_s/h2/w2/v1</property>
      <property value="3.68628">fsim/tables/fuel_kg_s/h2/w2/v10</property>
      <property value="4.09702">fsim/tables/fuel_kg_s/h2/w2/v11</property>
      <property value="4.49234">fsim/tables/fuel_kg_s/h2/w2/v12</property>
      <property value="4.89866">fsim/tables/fuel_kg_s/h2/w2/v13</property>
      <property value="5.31808">fsim/tables/fuel_kg_s/h2/w2/v14</property>
      <property value="5.75509">fsim/tables/fuel_kg_s/h2/w2/v15</property>
      <property value="0.360443">fsim/tables/fuel_kg_s/h2/w2/v2</property>
      <property value="0.358217">fsim/tables/fuel_kg_s/h2/w2/v3</property>
      <property value="0.362507">fsim/tables/fuel_kg_s/h2/w2/v4</property>
      <property value="0.376826">fsim/tables/fuel_kg_s/h2/w2/v5</property>
      <property value="0.393655">fsim/tables/fuel_kg_s/h2/w2/v6</property>
      <property value="0.424817">fsim/tables/fuel_kg_s/h2/w2/v7</property>
      <property value="0.666664">fsim/tables/fuel_kg_s/h2/w2/v8</property>
      <property value="3.29805">fsim/tables/fuel_kg_s/h2/w2/v9</property>
      <property value="0.283219">fsim/tables/fuel_kg_s/h3/w0/v0</property>
      <property value="0.252406">fsim/tables/fuel_kg_s/h3/w0/v1</property>
      <property value="3.04574">fsim/tables/fuel_kg_s/h3/w0/v10</property>
      <property value="3.38183">fsim/tables/fuel_kg_s/h3/w0/v11</property>
      <property value="3.7336">fsim/tables/fuel_kg_s/h3/w0/v12</property>
      <property value="4.10101">fsim/tables/fuel_kg_s/h3/w0/v13</property>
      <property value="4.48848">fsim/tables/fuel_kg_s/h3/w0/v14</property>
      <property value="4.89291">fsim/tables/fuel_kg_s/h3/w0/v15</property>
      <property value="0.240023">fsim/tables/fuel_kg_s/h3/w0/v2</property>
      <property value="0.238457">fsim/tables/fuel_kg_s/h3/w0/v3</property>
      <property value="0.244081">fsim/tables/fuel_kg_s/h3/w0/v4</property>
      <property value="0.259467">fsim/tables/fuel_kg_s/h3/w0/v5</property>
      <property value="0.42099">fsim/tables/fuel_kg_s/h3/w0/v6</property>
      <property value="2.09111">fsim/tables/fuel_kg_s/h3/w0/v7</property>
      <property value="2.40649">fsim/tables/fuel_kg_s/h3/w0/v8</property>
      <property value="2.72333">fsim/tables/fuel_kg_s/h3/w0/v9</property>
      <property value="0.335066">fsim/tables/fuel_kg_s/h3/w1/v0</property>
      <property value="0.298631">fsim/tables/fuel_kg_s/h3/w1/v1</property>
      <property value="3.09046">fsim/tables/fuel_kg_s/h3/w1/v10</property>
      <property value="3.41381">fsim/tables/fuel_kg_s/h3/w1/v11</property>
      <property value="3.74814">fsim/tables/fuel_kg_s/h3/w1/v12</property>
      <property value="4.09728">fsim/tables/fuel_kg_s/h3/w1/v13</property>
      <property value="4.46468">fsim/tables/fuel_kg_s/h3/w1/v14</property>
      <property value="4.84901">fsim/tables/fuel_kg_s/h3/w1/v15</property>
      <property value="0.280406">fsim/tables/fuel_kg_s/h3/w1/v2</property>
      <property value="0.273969">fsim/tables/fuel_kg_s/h3/w1/v3</property>
      <property value="0.275854">fsim/tables/fuel_kg_s/h3/w1/v4</property>
      <property value="0.289177">fsim/tables/fuel_kg_s/h3/w1/v5</property>
      <property value="0.538669">fsim/tables/fuel_kg_s/h3/w1/v6</property>
      <property value="2.18161">fsim/tables/fuel_kg_s/h3/w1/v7</property>
      <property value="2.48402">fsim/tables/fuel_kg_s/h3/w1/v8</property>
      <property value="2.78406">fsim/tables/fuel_kg_s/h3/w1/v9</property>
      <property value="0.392446">fsim/tables/fuel_kg_s/h3/w2/v0</property>
      <property value="0.347841">fsim/tables/fuel_kg_s/h3/w2/v1</property>
      <property value="3.14707">fsim/tables/fuel_kg_s/h3/w2/v10</property>
      <property value="3.45648">fsim/tables/fuel_kg_s/h3/w2/v11</property>
      <property value="3.76157">fsim/tables/fuel_kg_s/h3/w2/v12</property>
      <property value="4.09173">fsim/tables/fuel_kg_s/h3/w2/v13</property>
      <property value="4.44226">fsim/tables/fuel_kg_s/h3/w2/v14</property>
      <property value="4.81005">fsim/tables/fuel_kg_s/h3/w2/v15</property>
      <property value="0.323921">fsim/tables/fuel_kg_s/h3/w2/v2</property>
      <property value="0.312217">fsim/tables/fuel_kg_s/h3/w2/v3</property>
      <property value="0.309676">fsim/tables/fuel_kg_s/h3/w2/v4</property>
      <property value="0.320493">fsim/tables/fuel_kg_s/h3/w2/v5</property>
      <property value="0.61781">fsim/tables/fuel_kg_s/h3/w2/v6</property>
      <property value="2.25736">fsim/tables/fuel_kg_s/h3/w2/v7</property>
      <property value="2.55335">fsim/tables/fuel_kg_s/h3/w2/v8</property>
      <property value="2.84717">fsim/tables/fuel_kg_s/h3/w2/v9</property>
      <property value="0.285976">fsim/tables/fuel_kg_s/h4/w0/v0</property>
      <property value="0.252549">fsim/tables/fuel_kg_s/h4/w0/v1</property>
      <property value="2.90173">fsim/tables/fuel_kg_s/h4/w0/v10</property>
      <property value="3.21997">fsim/tables/fuel_kg_s/h4/w0/v11</property>
      <property value="3.55235">fsim/tables/fuel_kg_s/h4/w0/v12</property>
      <property value="3.89956">fsim/tables/fuel_kg_s/h4/w0/v13</property>
      <property value="4.26612">fsim/tables/fuel_kg_s/h4/w0/v14</property>
      <property value="4.64863">fsim/tables/fuel_kg_s/h4/w0/v15</property>
      <property value="0.238309">fsim/tables/fuel_kg_s/h4/w0/v2</property>
      <property value="0.234948">fsim/tables/fuel_kg_s/h4/w0/v3</property>
      <property value="0.238533">fsim/tables/fuel_kg_s/h4/w0/v4</property>
      <property value="0.252966">fsim/tables/fuel_kg_s/h4/w0/v5</property>
      <property value="0.427022">fsim/tables/fuel_kg_s/h4/w0/v6</property>
      <property value="1.99991">fsim/tables/fuel_kg_s/h4/w0/v7</property>
      <property value="2.29661">fsim/tables/fuel_kg_s/h4/w0/v8</property>
      <property value="2.59608">fsim/tables/fuel_kg_s/h4/w0/v9</property>
      <property value="0.338002">fsim/tables/fuel_kg_s/h4/w1/v0</property>
      <property value="0.299468">fsim/tables/fuel_kg_s/h4/w1/v1</property>
      <property value="2.95309">fsim/tables/fuel_kg_s/h4/w1/v10</property>
      <property value="3.25182">fsim/tables/fuel_kg_s/h4/w1/v11</property>
      <property value="3.56585">fsim/tables/fuel_kg_s/h4/w1/v12</property>
      <property value="3.89475">fsim/tables/fuel_kg_s/h4/w1/v13</property>
      <property value="4.24116">fsim/tables/fuel_kg_s/h4/w1/v14</property>
      <property value="4.60355">fsim/tables/fuel_kg_s/h4/w1/v15</property>
      <property value="0.27928">fsim/tables/fuel_kg_s/h4/w1/v2</property>
      <property value="0.270993">fsim/tables/fuel_kg_s/h4/w1/v3</property>
      <property value="0.271712">fsim/tables/fuel_kg_s/h4/w1/v4</property>
      <property value="0.282427">fsim/tables/fuel_kg_s/h4/w1/v5</property>
      <property value="0.543472">fsim/tables/fuel_kg_s/h4/w1/v6</property>
      <property value="2.092">fsim/tables/fuel_kg_s/h4/w1/v7</property>
      <property value="2.37891">fsim/tables/fuel_kg_s/h4/w1/v8</property>
      <property value="2.66256">fsim/tables/fuel_kg_s/h4/w1/v9</property>
      <property value="0.394805">fsim/tables/fuel_kg_s/h4/w2/v0</property>
      <property value="0.348272">fsim/tables/fuel_kg_s/h4/w2/v1</property>
      <property value="3.0125">fsim/tables/fuel_kg_s/h4/w2/v10</property>
      <property value="3.30393">fsim/tables/fuel_kg_s/h4/w2/v11</property>
      <property value="3.59005">fsim/tables/fuel_kg_s/h4/w2/v12</property>
      <property value="3.89003">fsim/tables/fuel_kg_s/h4/w2/v13</property>
      <property value="4.21896">fsim/tables/fuel_kg_s/h4/w2/v14</property>
      <property value="4.56414">fsim/tables/fuel_kg_s/h4/w2/v15</property>
      <property value="0.323374">fsim/tables/fuel_kg_s/h4/w2/v2</property>
      <property value="0.310207">fsim/tables/fuel_kg_s/h4/w2/v3</property>
      <property value="0.30582">fsim/tables/fuel_kg_s/h4/w2/v4</property>
      <property value="0.323749">fsim/tables/fuel_kg_s/h4/w2/v5</property>
      <property value="0.632868">fsim/tables/fuel_kg_s/h4/w2/v6</property>
      <property value="2.17166">fsim/tables/fuel_kg_s/h4/w2/v7</property>
      <property value="2.4517">fsim/tables/fuel_kg_s/h4/w2/v8</property>
      <property value="2.72864">fsim/tables/fuel_kg_s/h4/w2/v9</property>
      <property value="0.233025">fsim/tables/fuel_kg_s/h5/w0/v0</property>
      <property value="0.221473">fsim/tables/fuel_kg_s/h5/w0/v1</property>
      <property value="2.1397">fsim/tables/fuel_kg_s/h5/w0/v10</property>
      <property value="2.29972">fsim/tables/fuel_kg_s/h5/w0/v11</property>
      <property value="2.46637">fsim/tables/fuel_kg_s/h5/w0/v12</property>
      <property value="2.64003">fsim/tables/fuel_kg_s/h5/w0/v13</property>
      <property value="2.82703">fsim/tables/fuel_kg_s/h5/w0/v14</property>
      <property value="3.02158">fsim/tables/fuel_kg_s/h5/w0/v15</property>
      <property value="0.215804">fsim/tables/fuel_kg_s/h5/w0/v2</property>
      <property value="0.215798">fsim/tables/fuel_kg_s/h5/w0/v3</property>
      <property value="0.278796">fsim/tables/fuel_kg_s/h5/w0/v4</property>
      <property value="1.3435">fsim/tables/fuel_kg_s/h5/w0/v5</property>
      <property value="1.49106">fsim/tables/fuel_kg_s/h5/w0/v6</property>
      <property value="1.65011">fsim/tables/fuel_kg_s/h5/w0/v7</property>
      <property value="1.80802">fsim/tables/fuel_kg_s/h5/w0/v8</property>
      <property value="1.97151">fsim/tables/fuel_kg_s/h5/w0/v9</property>
      <property value="0.373579">fsim/tables/fuel_kg_s/h5/w1/v0</property>
      <property value="0.320076">fsim/tables/fuel_kg_s/h5/w1/v1</property>
      <property value="2.0475">fsim/tables/fuel_kg_s/h5/w1/v10</property>
      <property value="2.22978">fsim/tables/fuel_kg_s/h5/w1/v11</property>
      <property value="2.39095">fsim/tables/fuel_kg_s/h5/w1/v12</property>
      <property value="2.56998">fsim/tables/fuel_kg_s/h5/w1/v13</property>
      <property value="2.75933">fsim/tables/fuel_kg_s/h5/w1/v14</property>
      <property value="2.96369">fsim/tables/fuel_kg_s/h5/w1/v15</property>
      <property value="0.286353">fsim/tables/fuel_kg_s/h5/w1/v2</property>
      <property value="0.267067">fsim/tables/fuel_kg_s/h5/w1/v3</property>
      <property value="0.255647">fsim/tables/fuel_kg_s/h5/w1/v4</property>
      <property value="0.270857">fsim/tables/fuel_kg_s/h5/w1/v5</property>
      <property value="1.27539">fsim/tables/fuel_kg_s/h5/w1/v6</property>
      <property value="1.52509">fsim/tables/fuel_kg_s/h5/w1/v7</property>
      <property value="1.69861">fsim/tables/fuel_kg_s/h5/w1/v8</property>
      <property value="1.87097">fsim/tables/fuel_kg_s/h5/w1/v9</property>
      <property value="1.09932">fsim/tables/fuel_kg_s/h5/w2/v0</property>
      <property value="0.375741">fsim/tables/fuel_kg_s/h5/w2/v1</property>
      <property value="2.11035">fsim/tables/fuel_kg_s/h5/w2/v10</property>
      <property value="2.28149">fsim/tables/fuel_kg_s/h5/w2/v11</property>
      <property value="2.43123">fsim/tables/fuel_kg_s/h5/w2/v12</property>
      <property value="2.57639">fsim/tables/fuel_kg_s/h5/w2/v13</property>
      <property value="2.72788">fsim/tables/fuel_kg_s/h5/w2/v14</property>
      <property value="2.89786">fsim/tables/fuel_kg_s/h5/w2/v15</property>
      <property value="0.338666">fsim/tables/fuel_kg_s/h5/w2/v2</property>
      <property value="0.31407">fsim/tables/fuel_kg_s/h5/w2/v3</property>
      <property value="0.299795">fsim/tables/fuel_kg_s/h5/w2/v4</property>
      <property value="0.329115">fsim/tables/fuel_kg_s/h5/w2/v5</property>
      <property value="1.49738">fsim/tables/fuel_kg_s/h5/w2/v6</property>
      <property value="1.63437">fsim/tables/fuel_kg_s/h5/w2/v7</property>
      <property value="1.79069">fsim/tables/fuel_kg_s/h5/w2/v8</property>
      <property value="1.9461">fsim/tables/fuel_kg_s/h5/w2/v9</property>
      <property value="0.242518">fsim/tables/fuel_kg_s/h6/w0/v0</property>
      <property value="0.226371">fsim/tables/fuel_kg_s/h6/w0/v1</property>
      <property value="1.61839">fsim/tables/fuel_kg_s/h6/w0/v10</property>
      <property value="1.72784">fsim/tables/fuel_kg_s/h6/w0/v11</property>
      <property value="1.82113">fsim/tables/fuel_kg_s/h6/w0/v12</property>
      <property value="1.91821">fsim/tables/fuel_kg_s/h6/w0/v13</property>
      <property value="2.02156">fsim/tables/fuel_kg_s/h6/w0/v14</property>
      <property value="2.13738">fsim/tables/fuel_kg_s/h6/w0/v15</property>
      <property value="0.215737">fsim/tables/fuel_kg_s/h6/w0/v2</property>
      <property value="0.209522">fsim/tables/fuel_kg_s/h6/w0/v3</property>
      <property value="0.257988">fsim/tables/fuel_kg_s/h6/w0/v4</property>
      <property value="1.10468">fsim/tables/fuel_kg_s/h6/w0/v5</property>
      <property value="1.1961">fsim/tables/fuel_kg_s/h6/w0/v6</property>
      <property value="1.29776">fsim/tables/fuel_kg_s/h6/w0/v7</property>
      <property value="1.40177">fsim/tables/fuel_kg_s/h6/w0/v8</property>
      <property value="1.50838">fsim/tables/fuel_kg_s/h6/w0/v9</property>
      <property value="0.963794">fsim/tables/fuel_kg_s/h6/w1/v0</property>
      <property value="0.85496">fsim/tables/fuel_kg_s/h6/w1/v1</property>
      <property value="1.57506">fsim/tables/fuel_kg_s/h6/w1/v10</property>
      <property value="1.68385">fsim/tables/fuel_kg_s/h6/w1/v11</property>
      <property value="1.79667">fsim/tables/fuel_kg_s/h6/w1/v12</property>
      <property value="1.88742">fsim/tables/fuel_kg_s/h6/w1/v13</property>
      <property value="1.97199">fsim/tables/fuel_kg_s/h6/w1/v14</property>
      <property value="2.0745">fsim/tables/fuel_kg_s/h6/w1/v15</property>
      <property value="0.777012">fsim/tables/fuel_kg_s/h6/w1/v2</property>
      <property value="0.281374">fsim/tables/fuel_kg_s/h6/w1/v3</property>
      <property value="0.265324">fsim/tables/fuel_kg_s/h6/w1/v4</property>
      <property value="0.278223">fsim/tables/fuel_kg_s/h6/w1/v5</property>
      <property value="1.07667">fsim/tables/fuel_kg_s/h6/w1/v6</property>
      <property value="1.26458">fsim/tables/fuel_kg_s/h6/w1/v7</property>
      <property value="1.36241">fsim/tables/fuel_kg_s/h6/w1/v8</property>
      <property value="1.46954">fsim/tables/fuel_kg_s/h6/w1/v9</property>
      <property value="1.14951">fsim/tables/fuel_kg_s/h6/w2/v0</property>
      <property value="1.0566">fsim/tables/fuel_kg_s/h6/w2/v1</property>
      <property value="1.49357">fsim/tables/fuel_kg_s/h6/w2/v10</property>
      <property value="1.57158">fsim/tables/fuel_kg_s/h6/w2/v11</property>
      <property value="1.64929">fsim/tables/fuel_kg_s/h6/w2/v12</property>
      <property value="1.72712">fsim/tables/fuel_kg_s/h6/w2/v13</property>
      <property value="1.80116">fsim/tables/fuel_kg_s/h6/w2/v14</property>
      <property value="1.93361">fsim/tables/fuel_kg_s/h6/w2/v15</property>
      <property value="0.979762">fsim/tables/fuel_kg_s/h6/w2/v2</property>
      <property value="0.917671">fsim/tables/fuel_kg_s/h6/w2/v3</property>
      <property value="0.868015">fsim/tables/fuel_kg_s/h6/w2/v4</property>
      <property value="0.830408">fsim/tables/fuel_kg_s/h6/w2/v5</property>
      <property value="0.866522">fsim/tables/fuel_kg_s/h6/w2/v6</property>
      <property value="1.10694">fsim/tables/fuel_kg_s/h6/w2/v7</property>
      <property value="1.35683">fsim/tables/fuel_kg_s/h6/w2/v8</property>
      <property value="1.4186">fsim/tables/fuel_kg_s/h6/w2/v9</property>
      <property value="1.10975">fsim/tables/fuel_kg_s/h7/w0/v10</property>
      <property value="1.1729">fsim/tables/fuel_kg_s/h7/w0/v11</property>
      <property value="1.23466">fsim/tables/fuel_kg_s/h7/w0/v12</property>
      <property value="1.29797">fsim/tables/fuel_kg_s/h7/w0/v13</property>
      <property value="1.35854">fsim/tables/fuel_kg_s/h7/w0/v14</property>
      <property value="1.4677">fsim/tables/fuel_kg_s/h7/w0/v15</property>
      <property value="0.691139">fsim/tables/fuel_kg_s/h7/w0/v2</property>
      <property value="0.642269">fsim/tables/fuel_kg_s/h7/w0/v3</property>
      <property value="0.606007">fsim/tables/fuel_kg_s/h7/w0/v4</property>
      <property value="0.575319">fsim/tables/fuel_kg_s/h7/w0/v5</property>
      <property value="0.614118">fsim/tables/fuel_kg_s/h7/w0/v6</property>
      <property value="0.839808">fsim/tables/fuel_kg_s/h7/w0/v7</property>
      <property value="0.992879">fsim/tables/fuel_kg_s/h7/w0/v8</property>
      <property value="1.04812">fsim/tables/fuel_kg_s/h7/w0/v9</property>
      <property value="1.13025">fsim/tables/fuel_kg_s/h7/w1/v10</property>
      <property value="1.15746">fsim/tables/fuel_kg_s/h7/w1/v11</property>
      <property value="1.18885">fsim/tables/fuel_kg_s/h7/w1/v12</property>
      <property value="1.22072">fsim/tables/fuel_kg_s/h7/w1/v13</property>
      <property value="1.32195">fsim/tables/fuel_kg_s/h7/w1/v14</property>
      <property value="1.3598">fsim/tables/fuel_kg_s/h7/w1/v15</property>
      <property value="0.892571">fsim/tables/fuel_kg_s/h7/w1/v2</property>
      <property value="0.85216">fsim/tables/fuel_kg_s/h7/w1/v3</property>
      <property value="0.818338">fsim/tables/fuel_kg_s/h7/w1/v4</property>
      <property value="0.78596">fsim/tables/fuel_kg_s/h7/w1/v5</property>
      <property value="0.760934">fsim/tables/fuel_kg_s/h7/w1/v6</property>
      <property value="0.780818">fsim/tables/fuel_kg_s/h7/w1/v7</property>
      <property value="0.839631">fsim/tables/fuel_kg_s/h7/w1/v8</property>
      <property value="1.013">fsim/tables/fuel_kg_s/h7/w1/v9</property>
      <property value="1.28342">fsim/tables/fuel_kg_s/h7/w2/v10</property>
      <property value="1.28475">fsim/tables/fuel_kg_s/h7/w2/v11</property>
      <property value="1.286">fsim/tables/fuel_kg_s/h7/w2/v12</property>
      <property value="1.28722">fsim/tables/fuel_kg_s/h7/w2/v13</property>
      <property value="1.28862">fsim/tables/fuel_kg_s/h7/w2/v14</property>
      <property value="0.983951">fsim/tables/fuel_kg_s/h7/w2/v2</property>
      <property value="0.987567">fsim/tables/fuel_kg_s/h7/w2/v3</property>
      <property value="0.991806">fsim/tables/fuel_kg_s/h7/w2/v4</property>
      <property value="0.996671">fsim/tables/fuel_kg_s/h7/w2/v5</property>
      <property value="1.01427">fsim/tables/fuel_kg_s/h7/w2/v6</property>
      <property value="1.06157">fsim/tables/fuel_kg_s/h7/w2/v7</property>
      <property value="1.10881">fsim/tables/fuel_kg_s/h7/w2/v8</property>
      <property value="1.15691">fsim/tables/fuel_kg_s/h7/w2/v9</property>
      <property value="405.458">fsim/tables/max_climb_ms/h0/w0</property>
      <property value="341.53">fsim/tables/max_climb_ms/h0/w1</property>
      <property value="294.84">fsim/tables/max_climb_ms/h0/w2</property>
      <property value="322.301">fsim/tables/max_climb_ms/h1/w0</property>
      <property value="266.742">fsim/tables/max_climb_ms/h1/w1</property>
      <property value="229.122">fsim/tables/max_climb_ms/h1/w2</property>
      <property value="237.423">fsim/tables/max_climb_ms/h2/w0</property>
      <property value="197.175">fsim/tables/max_climb_ms/h2/w1</property>
      <property value="168.331">fsim/tables/max_climb_ms/h2/w2</property>
      <property value="171">fsim/tables/max_climb_ms/h3/w0</property>
      <property value="141.299">fsim/tables/max_climb_ms/h3/w1</property>
      <property value="118.6">fsim/tables/max_climb_ms/h3/w2</property>
      <property value="162.017">fsim/tables/max_climb_ms/h4/w0</property>
      <property value="133.265">fsim/tables/max_climb_ms/h4/w1</property>
      <property value="111.395">fsim/tables/max_climb_ms/h4/w2</property>
      <property value="101.389">fsim/tables/max_climb_ms/h5/w0</property>
      <property value="79.2902">fsim/tables/max_climb_ms/h5/w1</property>
      <property value="63.0529">fsim/tables/max_climb_ms/h5/w2</property>
      <property value="66.5061">fsim/tables/max_climb_ms/h6/w0</property>
      <property value="48.8605">fsim/tables/max_climb_ms/h6/w1</property>
      <property value="35.2103">fsim/tables/max_climb_ms/h6/w2</property>
      <property value="38.3827">fsim/tables/max_climb_ms/h7/w0</property>
      <property value="22.9651">fsim/tables/max_climb_ms/h7/w1</property>
      <property value="12.6059">fsim/tables/max_climb_ms/h7/w2</property>
      <property value="378.74">fsim/tables/max_tas_ms/h0/w0</property>
      <property value="378.258">fsim/tables/max_tas_ms/h0/w1</property>
      <property value="377.939">fsim/tables/max_tas_ms/h0/w2</property>
      <property value="417.459">fsim/tables/max_tas_ms/h1/w0</property>
      <property value="414.416">fsim/tables/max_tas_ms/h1/w1</property>
      <property value="413.615">fsim/tables/max_tas_ms/h1/w2</property>
      <property value="470.518">fsim/tables/max_tas_ms/h2/w0</property>
      <property value="468.798">fsim/tables/max_tas_ms/h2/w1</property>
      <property value="463.673">fsim/tables/max_tas_ms/h2/w2</property>
      <property value="534.744">fsim/tables/max_tas_ms/h3/w0</property>
      <property value="528.891">fsim/tables/max_tas_ms/h3/w1</property>
      <property value="523.309">fsim/tables/max_tas_ms/h3/w2</property>
      <property value="535.4">fsim/tables/max_tas_ms/h4/w0</property>
      <property value="529.129">fsim/tables/max_tas_ms/h4/w1</property>
      <property value="523.191">fsim/tables/max_tas_ms/h4/w2</property>
      <property value="529.906">fsim/tables/max_tas_ms/h5/w0</property>
      <property value="515.498">fsim/tables/max_tas_ms/h5/w1</property>
      <property value="500.226">fsim/tables/max_tas_ms/h5/w2</property>
      <property value="499.916">fsim/tables/max_tas_ms/h6/w0</property>
      <property value="472.195">fsim/tables/max_tas_ms/h6/w1</property>
      <property value="412.779">fsim/tables/max_tas_ms/h6/w2</property>
      <property value="425.164">fsim/tables/max_tas_ms/h7/w0</property>
      <property value="365.64">fsim/tables/max_tas_ms/h7/w1</property>
      <property value="327.561">fsim/tables/max_tas_ms/h7/w2</property>
      <property value="168.04">fsim/tables/min_tas_ms/h0/w0</property>
      <property value="198.405">fsim/tables/min_tas_ms/h0/w1</property>
      <property value="148.228">fsim/tables/min_tas_ms/h0/w2</property>
      <property value="122.827">fsim/tables/min_tas_ms/h1/w0</property>
      <property value="200.022">fsim/tables/min_tas_ms/h1/w1</property>
      <property value="148.049">fsim/tables/min_tas_ms/h1/w2</property>
      <property value="209.831">fsim/tables/min_tas_ms/h2/w0</property>
      <property value="212.808">fsim/tables/min_tas_ms/h2/w1</property>
      <property value="153.235">fsim/tables/min_tas_ms/h2/w2</property>
      <property value="150.147">fsim/tables/min_tas_ms/h3/w0</property>
      <property value="160.573">fsim/tables/min_tas_ms/h3/w1</property>
      <property value="167.727">fsim/tables/min_tas_ms/h3/w2</property>
      <property value="151.19">fsim/tables/min_tas_ms/h4/w0</property>
      <property value="161.977">fsim/tables/min_tas_ms/h4/w1</property>
      <property value="169.994">fsim/tables/min_tas_ms/h4/w2</property>
      <property value="216.296">fsim/tables/min_tas_ms/h5/w0</property>
      <property value="179.025">fsim/tables/min_tas_ms/h5/w1</property>
      <property value="194.396">fsim/tables/min_tas_ms/h5/w2</property>
      <property value="227.761">fsim/tables/min_tas_ms/h6/w0</property>
      <property value="204.784">fsim/tables/min_tas_ms/h6/w1</property>
      <property value="216.856">fsim/tables/min_tas_ms/h6/w2</property>
      <property value="210.713">fsim/tables/min_tas_ms/h7/w0</property>
      <property value="230.973">fsim/tables/min_tas_ms/h7/w1</property>
      <property value="280.838">fsim/tables/min_tas_ms/h7/w2</property>
      <property value="237.127">fsim/tables/ps_full_ms/h0/w0/v0</property>
      <property value="255.125">fsim/tables/ps_full_ms/h0/w0/v1</property>
      <property value="404.148">fsim/tables/ps_full_ms/h0/w0/v10</property>
      <property value="401.327">fsim/tables/ps_full_ms/h0/w0/v11</property>
      <property value="373.025">fsim/tables/ps_full_ms/h0/w0/v12</property>
      <property value="310.294">fsim/tables/ps_full_ms/h0/w0/v13</property>
      <property value="156.835">fsim/tables/ps_full_ms/h0/w0/v14</property>
      <property value="29.2417">fsim/tables/ps_full_ms/h0/w0/v15</property>
      <property value="272.958">fsim/tables/ps_full_ms/h0/w0/v2</property>
      <property value="290.653">fsim/tables/ps_full_ms/h0/w0/v3</property>
      <property value="308.189">fsim/tables/ps_full_ms/h0/w0/v4</property>
      <property value="325.565">fsim/tables/ps_full_ms/h0/w0/v5</property>
      <property value="342.786">fsim/tables/ps_full_ms/h0/w0/v6</property>
      <property value="359.876">fsim/tables/ps_full_ms/h0/w0/v7</property>
      <property value="376.801">fsim/tables/ps_full_ms/h0/w0/v8</property>
      <property value="392.917">fsim/tables/ps_full_ms/h0/w0/v9</property>
      <property value="229.905">fsim/tables/ps_full_ms/h0/w1/v0</property>
      <property value="242.595">fsim/tables/ps_full_ms/h0/w1/v1</property>
      <property value="341.42">fsim/tables/ps_full_ms/h0/w1/v10</property>
      <property value="332.091">fsim/tables/ps_full_ms/h0/w1/v11</property>
      <property value="300.895">fsim/tables/ps_full_ms/h0/w1/v12</property>
      <property value="236.815">fsim/tables/ps_full_ms/h0/w1/v13</property>
      <property value="89.3141">fsim/tables/ps_full_ms/h0/w1/v14</property>
      <property value="25.8973">fsim/tables/ps_full_ms/h0/w1/v15</property>
      <property value="255.185">fsim/tables/ps_full_ms/h0/w1/v2</property>
      <property value="267.64">fsim/tables/ps_full_ms/h0/w1/v3</property>
      <property value="279.902">fsim/tables/ps_full_ms/h0/w1/v4</property>
      <property value="291.996">fsim/tables/ps_full_ms/h0/w1/v5</property>
      <property value="303.986">fsim/tables/ps_full_ms/h0/w1/v6</property>
      <property value="315.878">fsim/tables/ps_full_ms/h0/w1/v7</property>
      <property value="327.489">fsim/tables/ps_full_ms/h0/w1/v8</property>
      <property value="337.356">fsim/tables/ps_full_ms/h0/w1/v9</property>
      <property value="145.936">fsim/tables/ps_full_ms/h0/w2/v0</property>
      <property value="160.682">fsim/tables/ps_full_ms/h0/w2/v1</property>
      <property value="284.499">fsim/tables/ps_full_ms/h0/w2/v10</property>
      <property value="294.085">fsim/tables/ps_full_ms/h0/w2/v11</property>
      <property value="288.632">fsim/tables/ps_full_ms/h0/w2/v12</property>
      <property value="246.027">fsim/tables/ps_full_ms/h0/w2/v13</property>
      <property value="125.813">fsim/tables/ps_full_ms/h0/w2/v14</property>
      <property value="22.0326">fsim/tables/ps_full_ms/h0/w2/v15</property>
      <property value="175.107">fsim/tables/ps_full_ms/h0/w2/v2</property>
      <property value="189.082">fsim/tables/ps_full_ms/h0/w2/v3</property>
      <property value="202.832">fsim/tables/ps_full_ms/h0/w2/v4</property>
      <property value="216.539">fsim/tables/ps_full_ms/h0/w2/v5</property>
      <property value="230.223">fsim/tables/ps_full_ms/h0/w2/v6</property>
      <property value="243.838">fsim/tables/ps_full_ms/h0/w2/v7</property>
      <property value="257.521">fsim/tables/ps_full_ms/h0/w2/v8</property>
      <property value="271.232">fsim/tables/ps_full_ms/h0/w2/v9</property>
      <property value="119.31">fsim/tables/ps_full_ms/h1/w0/v0</property>
      <property value="141.082">fsim/tables/ps_full_ms/h1/w0/v1</property>
      <property value="314.397">fsim/tables/ps_full_ms/h1/w0/v10</property>
      <property value="250.384">fsim/tables/ps_full_ms/h1/w0/v11</property>
      <property value="110.282">fsim/tables/ps_full_ms/h1/w0/v12</property>
      <property value="83.6405">fsim/tables/ps_full_ms/h1/w0/v13</property>
      <property value="52.433">fsim/tables/ps_full_ms/h1/w0/v14</property>
      <property value="21.2967">fsim/tables/ps_full_ms/h1/w0/v15</property>
      <property value="162.913">fsim/tables/ps_full_ms/h1/w0/v2</property>
      <property value="187.082">fsim/tables/ps_full_ms/h1/w0/v3</property>
      <property value="211.873">fsim/tables/ps_full_ms/h1/w0/v4</property>
      <property value="236.028">fsim/tables/ps_full_ms/h1/w0/v5</property>
      <property value="258.937">fsim/tables/ps_full_ms/h1/w0/v6</property>
      <property value="280.754">fsim/tables/ps_full_ms/h1/w0/v7</property>
      <property value="301.959">fsim/tables/ps_full_ms/h1/w0/v8</property>
      <property value="319.713">fsim/tables/ps_full_ms/h1/w0/v9</property>
      <property value="180.124">fsim/tables/ps_full_ms/h1/w1/v0</property>
      <property value="192.722">fsim/tables/ps_full_ms/h1/w1/v1</property>
      <property value="175.932">fsim/tables/ps_full_ms/h1/w1/v10</property>
      <property value="90.9515">fsim/tables/ps_full_ms/h1/w1/v11</property>
      <property value="75.5661">fsim/tables/ps_full_ms/h1/w1/v12</property>
      <property value="58.1444">fsim/tables/ps_full_ms/h1/w1/v13</property>
      <property value="38.1202">fsim/tables/ps_full_ms/h1/w1/v14</property>
      <property value="18.9179">fsim/tables/ps_full_ms/h1/w1/v15</property>
      <property value="205.04">fsim/tables/ps_full_ms/h1/w1/v2</property>
      <property value="217.162">fsim/tables/ps_full_ms/h1/w1/v3</property>
      <property value="229.311">fsim/tables/ps_full_ms/h1/w1/v4</property>
      <property value="241.631">fsim/tables/ps_full_ms/h1/w1/v5</property>
      <property value="253.936">fsim/tables/ps_full_ms/h1/w1/v6</property>
      <property value="264.189">fsim/tables/ps_full_ms/h1/w1/v7</property>
      <property value="265.022">fsim/tables/ps_full_ms/h1/w1/v8</property>
      <property value="241.249">fsim/tables/ps_full_ms/h1/w1/v9</property>
      <property value="110.794">fsim/tables/ps_full_ms/h1/w2/v0</property>
      <property value="124.635">fsim/tables/ps_full_ms/h1/w2/v1</property>
      <property value="219.543">fsim/tables/ps_full_ms/h1/w2/v10</property>
      <property value="155.882">fsim/tables/ps_full_ms/h1/w2/v11</property>
      <property value="74.6765">fsim/tables/ps_full_ms/h1/w2/v12</property>
      <property value="57.5867">fsim/tables/ps_full_ms/h1/w2/v13</property>
      <property value="37.2356">fsim/tables/ps_full_ms/h1/w2/v14</property>
      <property value="16.107">fsim/tables/ps_full_ms/h1/w2/v15</property>
      <property value="137.738">fsim/tables/ps_full_ms/h1/w2/v2</property>
      <property value="150.74">fsim/tables/ps_full_ms/h1/w2/v3</property>
      <property value="163.75">fsim/tables/ps_full_ms/h1/w2/v4</property>
      <property value="176.809">fsim/tables/ps_full_ms/h1/w2/v5</property>
      <property value="190.053">fsim/tables/ps_full_ms/h1/w2/v6</property>
      <property value="203.709">fsim/tables/ps_full_ms/h1/w2/v7</property>
      <property value="217.566">fsim/tables/ps_full_ms/h1/w2/v8</property>
      <property value="228.362">fsim/tables/ps_full_ms/h1/w2/v9</property>
      <property value="172.012">fsim/tables/ps_full_ms/h2/w0/v0</property>
      <property value="186.786">fsim/tables/ps_full_ms/h2/w0/v1</property>
      <property value="100.858">fsim/tables/ps_full_ms/h2/w0/v10</property>
      <property value="88.9881">fsim/tables/ps_full_ms/h2/w0/v11</property>
      <property value="74.8995">fsim/tables/ps_full_ms/h2/w0/v12</property>
      <property value="58.9686">fsim/tables/ps_full_ms/h2/w0/v13</property>
      <property value="40.5934">fsim/tables/ps_full_ms/h2/w0/v14</property>
      <property value="19.858">fsim/tables/ps_full_ms/h2/w0/v15</property>
      <property value="201.374">fsim/tables/ps_full_ms/h2/w0/v2</property>
      <property value="216.015">fsim/tables/ps_full_ms/h2/w0/v3</property>
      <property value="230.232">fsim/tables/ps_full_ms/h2/w0/v4</property>
      <property value="237.313">fsim/tables/ps_full_ms/h2/w0/v5</property>
      <property value="216.728">fsim/tables/ps_full_ms/h2/w0/v6</property>
      <property value="153.108">fsim/tables/ps_full_ms/h2/w0/v7</property>
      <property value="123.046">fsim/tables/ps_full_ms/h2/w0/v8</property>
      <property value="113.186">fsim/tables/ps_full_ms/h2/w0/v9</property>
      <property value="142.875">fsim/tables/ps_full_ms/h2/w1/v0</property>
      <property value="155.11">fsim/tables/ps_full_ms/h2/w1/v1</property>
      <property value="81.4519">fsim/tables/ps_full_ms/h2/w1/v10</property>
      <property value="71.6779">fsim/tables/ps_full_ms/h2/w1/v11</property>
      <property value="60.0814">fsim/tables/ps_full_ms/h2/w1/v12</property>
      <property value="46.911">fsim/tables/ps_full_ms/h2/w1/v13</property>
      <property value="32.0273">fsim/tables/ps_full_ms/h2/w1/v14</property>
      <property value="15.7867">fsim/tables/ps_full_ms/h2/w1/v15</property>
      <property value="167.197">fsim/tables/ps_full_ms/h2/w1/v2</property>
      <property value="179.238">fsim/tables/ps_full_ms/h2/w1/v3</property>
      <property value="190.933">fsim/tables/ps_full_ms/h2/w1/v4</property>
      <property value="197.169">fsim/tables/ps_full_ms/h2/w1/v5</property>
      <property value="179.029">fsim/tables/ps_full_ms/h2/w1/v6</property>
      <property value="119.245">fsim/tables/ps_full_ms/h2/w1/v7</property>
      <property value="100.494">fsim/tables/ps_full_ms/h2/w1/v8</property>
      <property value="92.0661">fsim/tables/ps_full_ms/h2/w1/v9</property>
      <property value="81.5501">fsim/tables/ps_full_ms/h2/w2/v0</property>
      <property value="94.8282">fsim/tables/ps_full_ms/h2/w2/v1</property>
      <property value="80.3497">fsim/tables/ps_full_ms/h2/w2/v10</property>
      <property value="69.4701">fsim/tables/ps_full_ms/h2/w2/v11</property>
      <property value="58.9696">fsim/tables/ps_full_ms/h2/w2/v12</property>
      <property value="46.2953">fsim/tables/ps_full_ms/h2/w2/v13</property>
      <property value="31.4441">fsim/tables/ps_full_ms/h2/w2/v14</property>
      <property value="14.9522">fsim/tables/ps_full_ms/h2/w2/v15</property>
      <property value="106.742">fsim/tables/ps_full_ms/h2/w2/v2</property>
      <property value="118.594">fsim/tables/ps_full_ms/h2/w2/v3</property>
      <property value="130.893">fsim/tables/ps_full_ms/h2/w2/v4</property>
      <property value="143.969">fsim/tables/ps_full_ms/h2/w2/v5</property>
      <property value="157.688">fsim/tables/ps_full_ms/h2/w2/v6</property>
      <property value="168.051">fsim/tables/ps_full_ms/h2/w2/v7</property>
      <property value="149.863">fsim/tables/ps_full_ms/h2/w2/v8</property>
      <property value="88.8972">fsim/tables/ps_full_ms/h2/w2/v9</property>
      <property value="88.4018">fsim/tables/ps_full_ms/h3/w0/v0</property>
      <property value="103.873">fsim/tables/ps_full_ms/h3/w0/v1</property>
      <property value="96.3423">fsim/tables/ps_full_ms/h3/w0/v10</property>
      <property value="86.0869">fsim/tables/ps_full_ms/h3/w0/v11</property>
      <property value="73.7881">fsim/tables/ps_full_ms/h3/w0/v12</property>
      <property value="58.0702">fsim/tables/ps_full_ms/h3/w0/v13</property>
      <property value="40.0802">fsim/tables/ps_full_ms/h3/w0/v14</property>
      <property value="18.5184">fsim/tables/ps_full_ms/h3/w0/v15</property>
      <property value="117.877">fsim/tables/ps_full_ms/h3/w0/v2</property>
      <property value="133.501">fsim/tables/ps_full_ms/h3/w0/v3</property>
      <property value="150.59">fsim/tables/ps_full_ms/h3/w0/v4</property>
      <property value="167.873">fsim/tables/ps_full_ms/h3/w0/v5</property>
      <property value="157.366">fsim/tables/ps_full_ms/h3/w0/v6</property>
      <property value="115.481">fsim/tables/ps_full_ms/h3/w0/v7</property>
      <property value="110.693">fsim/tables/ps_full_ms/h3/w0/v8</property>
      <property value="104.326">fsim/tables/ps_full_ms/h3/w0/v9</property>
      <property value="70.5517">fsim/tables/ps_full_ms/h3/w1/v0</property>
      <property value="85.1885">fsim/tables/ps_full_ms/h3/w1/v1</property>
      <property value="77.1474">fsim/tables/ps_full_ms/h3/w1/v10</property>
      <property value="68.6861">fsim/tables/ps_full_ms/h3/w1/v11</property>
      <property value="58.9461">fsim/tables/ps_full_ms/h3/w1/v12</property>
      <property value="46.6262">fsim/tables/ps_full_ms/h3/w1/v13</property>
      <property value="32.4065">fsim/tables/ps_full_ms/h3/w1/v14</property>
      <property value="15.6436">fsim/tables/ps_full_ms/h3/w1/v15</property>
      <property value="98.5453">fsim/tables/ps_full_ms/h3/w1/v2</property>
      <property value="112.258">fsim/tables/ps_full_ms/h3/w1/v3</property>
      <property value="127.145">fsim/tables/ps_full_ms/h3/w1/v4</property>
      <property value="140.452">fsim/tables/ps_full_ms/h3/w1/v5</property>
      <property value="121.357">fsim/tables/ps_full_ms/h3/w1/v6</property>
      <property value="92.7817">fsim/tables/ps_full_ms/h3/w1/v7</property>
      <property value="88.5396">fsim/tables/ps_full_ms/h3/w1/v8</property>
      <property value="83.7125">fsim/tables/ps_full_ms/h3/w1/v9</property>
      <property value="60.0458">fsim/tables/ps_full_ms/h3/w2/v0</property>
      <property value="72.8926">fsim/tables/ps_full_ms/h3/w2/v1</property>
      <property value="62.3716">fsim/tables/ps_full_ms/h3/w2/v10</property>
      <property value="55.3334">fsim/tables/ps_full_ms/h3/w2/v11</property>
      <property value="48.2559">fsim/tables/ps_full_ms/h3/w2/v12</property>
      <property value="38.4939">fsim/tables/ps_full_ms/h3/w2/v13</property>
      <property value="26.8609">fsim/tables/ps_full_ms/h3/w2/v14</property>
      <property value="13.3631">fsim/tables/ps_full_ms/h3/w2/v15</property>
      <property value="83.6336">fsim/tables/ps_full_ms/h3/w2/v2</property>
      <property value="94.8086">fsim/tables/ps_full_ms/h3/w2/v3</property>
      <property value="107.481">fsim/tables/ps_full_ms/h3/w2/v4</property>
      <property value="118.328">fsim/tables/ps_full_ms/h3/w2/v5</property>
      <property value="96.6524">fsim/tables/ps_full_ms/h3/w2/v6</property>
      <property value="76.585">fsim/tables/ps_full_ms/h3/w2/v7</property>
      <property value="72.577">fsim/tables/ps_full_ms/h3/w2/v8</property>
      <property value="68.2356">fsim/tables/ps_full_ms/h3/w2/v9</property>
      <property value="83.3327">fsim/tables/ps_full_ms/h4/w0/v0</property>
      <property value="97.9903">fsim/tables/ps_full_ms/h4/w0/v1</property>
      <property value="91.1408">fsim/tables/ps_full_ms/h4/w0/v10</property>
      <property value="81.4391">fsim/tables/ps_full_ms/h4/w0/v11</property>
      <property value="69.7922">fsim/tables/ps_full_ms/h4/w0/v12</property>
      <property value="54.9734">fsim/tables/ps_full_ms/h4/w0/v13</property>
      <property value="38.0361">fsim/tables/ps_full_ms/h4/w0/v14</property>
      <property value="17.6411">fsim/tables/ps_full_ms/h4/w0/v15</property>
      <property value="110.98">fsim/tables/ps_full_ms/h4/w0/v2</property>
      <property value="125.95">fsim/tables/ps_full_ms/h4/w0/v3</property>
      <property value="142.467">fsim/tables/ps_full_ms/h4/w0/v4</property>
      <property value="159.369">fsim/tables/ps_full_ms/h4/w0/v5</property>
      <property value="147.015">fsim/tables/ps_full_ms/h4/w0/v6</property>
      <property value="109.463">fsim/tables/ps_full_ms/h4/w0/v7</property>
      <property value="104.657">fsim/tables/ps_full_ms/h4/w0/v8</property>
      <property value="98.6969">fsim/tables/ps_full_ms/h4/w0/v9</property>
      <property value="65.4714">fsim/tables/ps_full_ms/h4/w1/v0</property>
      <property value="79.9163">fsim/tables/ps_full_ms/h4/w1/v1</property>
      <property value="72.3238">fsim/tables/ps_full_ms/h4/w1/v10</property>
      <property value="64.7887">fsim/tables/ps_full_ms/h4/w1/v11</property>
      <property value="55.6536">fsim/tables/ps_full_ms/h4/w1/v12</property>
      <property value="44.0824">fsim/tables/ps_full_ms/h4/w1/v13</property>
      <property value="30.7497">fsim/tables/ps_full_ms/h4/w1/v14</property>
      <property value="14.9629">fsim/tables/ps_full_ms/h4/w1/v15</property>
      <property value="92.7633">fsim/tables/ps_full_ms/h4/w1/v2</property>
      <property value="105.995">fsim/tables/ps_full_ms/h4/w1/v3</property>
      <property value="120.254">fsim/tables/ps_full_ms/h4/w1/v4</property>
      <property value="132.708">fsim/tables/ps_full_ms/h4/w1/v5</property>
      <property value="111.781">fsim/tables/ps_full_ms/h4/w1/v6</property>
      <property value="87.3704">fsim/tables/ps_full_ms/h4/w1/v7</property>
      <property value="83.1933">fsim/tables/ps_full_ms/h4/w1/v8</property>
      <property value="78.6206">fsim/tables/ps_full_ms/h4/w1/v9</property>
      <property value="56.1485">fsim/tables/ps_full_ms/h4/w2/v0</property>
      <property value="68.4843">fsim/tables/ps_full_ms/h4/w2/v1</property>
      <property value="58.127">fsim/tables/ps_full_ms/h4/w2/v10</property>
      <property value="51.4404">fsim/tables/ps_full_ms/h4/w2/v11</property>
      <property value="44.7787">fsim/tables/ps_full_ms/h4/w2/v12</property>
      <property value="36.2494">fsim/tables/ps_full_ms/h4/w2/v13</property>
      <property value="25.3983">fsim/tables/ps_full_ms/h4/w2/v14</property>
      <property value="12.7676">fsim/tables/ps_full_ms/h4/w2/v15</property>
      <property value="78.598">fsim/tables/ps_full_ms/h4/w2/v2</property>
      <property value="89.4127">fsim/tables/ps_full_ms/h4/w2/v3</property>
      <property value="101.676">fsim/tables/ps_full_ms/h4/w2/v4</property>
      <property value="111.312">fsim/tables/ps_full_ms/h4/w2/v5</property>
      <property value="87.2748">fsim/tables/ps_full_ms/h4/w2/v6</property>
      <property value="71.8244">fsim/tables/ps_full_ms/h4/w2/v7</property>
      <property value="67.8783">fsim/tables/ps_full_ms/h4/w2/v8</property>
      <property value="63.76">fsim/tables/ps_full_ms/h4/w2/v9</property>
      <property value="71.6875">fsim/tables/ps_full_ms/h5/w0/v0</property>
      <property value="81.1469">fsim/tables/ps_full_ms/h5/w0/v1</property>
      <property value="48.318">fsim/tables/ps_full_ms/h5/w0/v10</property>
      <property value="43.5764">fsim/tables/ps_full_ms/h5/w0/v11</property>
      <property value="37.5845">fsim/tables/ps_full_ms/h5/w0/v12</property>
      <property value="30.3344">fsim/tables/ps_full_ms/h5/w0/v13</property>
      <property value="21.9419">fsim/tables/ps_full_ms/h5/w0/v14</property>
      <property value="11.9889">fsim/tables/ps_full_ms/h5/w0/v15</property>
      <property value="90.6062">fsim/tables/ps_full_ms/h5/w0/v2</property>
      <property value="100.094">fsim/tables/ps_full_ms/h5/w0/v3</property>
      <property value="95.6525">fsim/tables/ps_full_ms/h5/w0/v4</property>
      <property value="66.1924">fsim/tables/ps_full_ms/h5/w0/v5</property>
      <property value="64.7744">fsim/tables/ps_full_ms/h5/w0/v6</property>
      <property value="61.4053">fsim/tables/ps_full_ms/h5/w0/v7</property>
      <property value="58.2042">fsim/tables/ps_full_ms/h5/w0/v8</property>
      <property value="53.7475">fsim/tables/ps_full_ms/h5/w0/v9</property>
      <property value="34.7528">fsim/tables/ps_full_ms/h5/w1/v0</property>
      <property value="45.8671">fsim/tables/ps_full_ms/h5/w1/v1</property>
      <property value="39.4649">fsim/tables/ps_full_ms/h5/w1/v10</property>
      <property value="34.1741">fsim/tables/ps_full_ms/h5/w1/v11</property>
      <property value="30.3013">fsim/tables/ps_full_ms/h5/w1/v12</property>
      <property value="24.6384">fsim/tables/ps_full_ms/h5/w1/v13</property>
      <property value="17.7314">fsim/tables/ps_full_ms/h5/w1/v14</property>
      <property value="9.50998">fsim/tables/ps_full_ms/h5/w1/v15</property>
      <property value="53.983">fsim/tables/ps_full_ms/h5/w1/v2</property>
      <property value="63.3845">fsim/tables/ps_full_ms/h5/w1/v3</property>
      <property value="73.3292">fsim/tables/ps_full_ms/h5/w1/v4</property>
      <property value="79.2577">fsim/tables/ps_full_ms/h5/w1/v5</property>
      <property value="56.9387">fsim/tables/ps_full_ms/h5/w1/v6</property>
      <property value="50.1133">fsim/tables/ps_full_ms/h5/w1/v7</property>
      <property value="46.9393">fsim/tables/ps_full_ms/h5/w1/v8</property>
      <property value="43.7054">fsim/tables/ps_full_ms/h5/w1/v9</property>
      <property value="30.0776">fsim/tables/ps_full_ms/h5/w2/v0</property>
      <property value="38.5117">fsim/tables/ps_full_ms/h5/w2/v1</property>
      <property value="29.0055">fsim/tables/ps_full_ms/h5/w2/v10</property>
      <property value="24.3959">fsim/tables/ps_full_ms/h5/w2/v11</property>
      <property value="20.9745">fsim/tables/ps_full_ms/h5/w2/v12</property>
      <property value="17.6032">fsim/tables/ps_full_ms/h5/w2/v13</property>
      <property value="13.42">fsim/tables/ps_full_ms/h5/w2/v14</property>
      <property value="7.72003">fsim/tables/ps_full_ms/h5/w2/v15</property>
      <property value="44.3909">fsim/tables/ps_full_ms/h5/w2/v2</property>
      <property value="52.4372">fsim/tables/ps_full_ms/h5/w2/v3</property>
      <property value="60.4488">fsim/tables/ps_full_ms/h5/w2/v4</property>
      <property value="62.3889">fsim/tables/ps_full_ms/h5/w2/v5</property>
      <property value="40.127">fsim/tables/ps_full_ms/h5/w2/v6</property>
      <property value="38.1861">fsim/tables/ps_full_ms/h5/w2/v7</property>
      <property value="35.4677">fsim/tables/ps_full_ms/h5/w2/v8</property>
      <property value="32.6865">fsim/tables/ps_full_ms/h5/w2/v9</property>
      <property value="48.2829">fsim/tables/ps_full_ms/h6/w0/v0</property>
      <property value="54.9105">fsim/tables/ps_full_ms/h6/w0/v1</property>
      <property value="28.0881">fsim/tables/ps_full_ms/h6/w0/v10</property>
      <property value="23.9592">fsim/tables/ps_full_ms/h6/w0/v11</property>
      <property value="21.23">fsim/tables/ps_full_ms/h6/w0/v12</property>
      <property value="17.8641">fsim/tables/ps_full_ms/h6/w0/v13</property>
      <property value="13.4723">fsim/tables/ps_full_ms/h6/w0/v14</property>
      <property value="7.9762">fsim/tables/ps_full_ms/h6/w0/v15</property>
      <property value="60.3882">fsim/tables/ps_full_ms/h6/w0/v2</property>
      <property value="64.1108">fsim/tables/ps_full_ms/h6/w0/v3</property>
      <property value="63.7522">fsim/tables/ps_full_ms/h6/w0/v4</property>
      <property value="41.7632">fsim/tables/ps_full_ms/h6/w0/v5</property>
      <property value="39.9975">fsim/tables/ps_full_ms/h6/w0/v6</property>
      <property value="37.8742">fsim/tables/ps_full_ms/h6/w0/v7</property>
      <property value="35.1027">fsim/tables/ps_full_ms/h6/w0/v8</property>
      <property value="31.9002">fsim/tables/ps_full_ms/h6/w0/v9</property>
      <property value="22.4046">fsim/tables/ps_full_ms/h6/w1/v0</property>
      <property value="28.6578">fsim/tables/ps_full_ms/h6/w1/v1</property>
      <property value="20.6291">fsim/tables/ps_full_ms/h6/w1/v10</property>
      <property value="17.3318">fsim/tables/ps_full_ms/h6/w1/v11</property>
      <property value="13.3767">fsim/tables/ps_full_ms/h6/w1/v12</property>
      <property value="10.9022">fsim/tables/ps_full_ms/h6/w1/v13</property>
      <property value="8.48576">fsim/tables/ps_full_ms/h6/w1/v14</property>
      <property value="5.31066">fsim/tables/ps_full_ms/h6/w1/v15</property>
      <property value="33.5715">fsim/tables/ps_full_ms/h6/w1/v2</property>
      <property value="40.4569">fsim/tables/ps_full_ms/h6/w1/v3</property>
      <property value="46.5229">fsim/tables/ps_full_ms/h6/w1/v4</property>
      <property value="48.6952">fsim/tables/ps_full_ms/h6/w1/v5</property>
      <property value="34.4985">fsim/tables/ps_full_ms/h6/w1/v6</property>
      <property value="28.2374">fsim/tables/ps_full_ms/h6/w1/v7</property>
      <property value="26.1498">fsim/tables/ps_full_ms/h6/w1/v8</property>
      <property value="23.3605">fsim/tables/ps_full_ms/h6/w1/v9</property>
      <property value="14.0595">fsim/tables/ps_full_ms/h6/w2/v0</property>
      <property value="18.3956">fsim/tables/ps_full_ms/h6/w2/v1</property>
      <property value="15.8242">fsim/tables/ps_full_ms/h6/w2/v10</property>
      <property value="13.858">fsim/tables/ps_full_ms/h6/w2/v11</property>
      <property value="11.9136">fsim/tables/ps_full_ms/h6/w2/v12</property>
      <property value="9.87149">fsim/tables/ps_full_ms/h6/w2/v13</property>
      <property value="7.53253">fsim/tables/ps_full_ms/h6/w2/v14</property>
      <property value="4.8818">fsim/tables/ps_full_ms/h6/w2/v15</property>
      <property value="21.6306">fsim/tables/ps_full_ms/h6/w2/v2</property>
      <property value="26.6658">fsim/tables/ps_full_ms/h6/w2/v3</property>
      <property value="30.8055">fsim/tables/ps_full_ms/h6/w2/v4</property>
      <property value="34.2737">fsim/tables/ps_full_ms/h6/w2/v5</property>
      <property value="35.1924">fsim/tables/ps_full_ms/h6/w2/v6</property>
      <property value="27.5071">fsim/tables/ps_full_ms/h6/w2/v7</property>
      <property value="18.4265">fsim/tables/ps_full_ms/h6/w2/v8</property>
      <property value="17.4816">fsim/tables/ps_full_ms/h6/w2/v9</property>
      <property value="10.5961">fsim/tables/ps_full_ms/h7/w0/v0</property>
      <property value="11.2789">fsim/tables/ps_full_ms/h7/w0/v1</property>
      <property value="16.7464">fsim/tables/ps_full_ms/h7/w0/v10</property>
      <property value="14.5833">fsim/tables/ps_full_ms/h7/w0/v11</property>
      <property value="12.3827">fsim/tables/ps_full_ms/h7/w0/v12</property>
      <property value="9.8121">fsim/tables/ps_full_ms/h7/w0/v13</property>
      <property value="6.67549">fsim/tables/ps_full_ms/h7/w0/v14</property>
      <property value="3.12144">fsim/tables/ps_full_ms/h7/w0/v15</property>
      <property value="23.0849">fsim/tables/ps_full_ms/h7/w0/v2</property>
      <property value="28.0724">fsim/tables/ps_full_ms/h7/w0/v3</property>
      <property value="33.616">fsim/tables/ps_full_ms/h7/w0/v4</property>
      <property value="37.5942">fsim/tables/ps_full_ms/h7/w0/v5</property>
      <property value="38.2505">fsim/tables/ps_full_ms/h7/w0/v6</property>
      <property value="27.3309">fsim/tables/ps_full_ms/h7/w0/v7</property>
      <property value="20.0987">fsim/tables/ps_full_ms/h7/w0/v8</property>
      <property value="18.7512">fsim/tables/ps_full_ms/h7/w0/v9</property>
      <property value="8.31259">fsim/tables/ps_full_ms/h7/w1/v0</property>
      <property value="8.72182">fsim/tables/ps_full_ms/h7/w1/v1</property>
      <property value="8.56138">fsim/tables/ps_full_ms/h7/w1/v10</property>
      <property value="7.996">fsim/tables/ps_full_ms/h7/w1/v11</property>
      <property value="7.04795">fsim/tables/ps_full_ms/h7/w1/v12</property>
      <property value="5.85971">fsim/tables/ps_full_ms/h7/w1/v13</property>
      <property value="4.53516">fsim/tables/ps_full_ms/h7/w1/v14</property>
      <property value="3.0938">fsim/tables/ps_full_ms/h7/w1/v15</property>
      <property value="12.355">fsim/tables/ps_full_ms/h7/w1/v2</property>
      <property value="14.9968">fsim/tables/ps_full_ms/h7/w1/v3</property>
      <property value="17.7505">fsim/tables/ps_full_ms/h7/w1/v4</property>
      <property value="20.293">fsim/tables/ps_full_ms/h7/w1/v5</property>
      <property value="22.5759">fsim/tables/ps_full_ms/h7/w1/v6</property>
      <property value="22.957">fsim/tables/ps_full_ms/h7/w1/v7</property>
      <property value="21.4242">fsim/tables/ps_full_ms/h7/w1/v8</property>
      <property value="13.8119">fsim/tables/ps_full_ms/h7/w1/v9</property>
      <property value="12.5718">fsim/tables/ps_full_ms/h7/w2/v0</property>
      <property value="12.5775">fsim/tables/ps_full_ms/h7/w2/v1</property>
      <property value="4.89197">fsim/tables/ps_full_ms/h7/w2/v10</property>
      <property value="3.63609">fsim/tables/ps_full_ms/h7/w2/v11</property>
      <property value="3.1813">fsim/tables/ps_full_ms/h7/w2/v12</property>
      <property value="2.7265">fsim/tables/ps_full_ms/h7/w2/v13</property>
      <property value="2.27171">fsim/tables/ps_full_ms/h7/w2/v14</property>
      <property value="1.81691">fsim/tables/ps_full_ms/h7/w2/v15</property>
      <property value="12.5831">fsim/tables/ps_full_ms/h7/w2/v2</property>
      <property value="12.5887">fsim/tables/ps_full_ms/h7/w2/v3</property>
      <property value="12.5944">fsim/tables/ps_full_ms/h7/w2/v4</property>
      <property value="12.6">fsim/tables/ps_full_ms/h7/w2/v5</property>
      <property value="12.6057">fsim/tables/ps_full_ms/h7/w2/v6</property>
      <property value="10.7407">fsim/tables/ps_full_ms/h7/w2/v7</property>
      <property value="8.7911">fsim/tables/ps_full_ms/h7/w2/v8</property>
      <property value="6.84154">fsim/tables/ps_full_ms/h7/w2/v9</property>
      <property value="-19.2289">fsim/tables/ps_idle_ms/h0/w0/v0</property>
      <property value="-23.6884">fsim/tables/ps_idle_ms/h0/w0/v1</property>
      <property value="-100.76">fsim/tables/ps_idle_ms/h0/w0/v10</property>
      <property value="-116.882">fsim/tables/ps_idle_ms/h0/w0/v11</property>
      <property value="-163.851">fsim/tables/ps_idle_ms/h0/w0/v12</property>
      <property value="-310.291">fsim/tables/ps_idle_ms/h0/w0/v13</property>
      <property value="-370.375">fsim/tables/ps_idle_ms/h0/w0/v14</property>
      <property value="-421.926">fsim/tables/ps_idle_ms/h0/w0/v15</property>
      <property value="-28.8064">fsim/tables/ps_idle_ms/h0/w0/v2</property>
      <property value="-34.6016">fsim/tables/ps_idle_ms/h0/w0/v3</property>
      <property value="-41.1049">fsim/tables/ps_idle_ms/h0/w0/v4</property>
      <property value="-48.436">fsim/tables/ps_idle_ms/h0/w0/v5</property>
      <property value="-56.9012">fsim/tables/ps_idle_ms/h0/w0/v6</property>
      <property value="-66.2641">fsim/tables/ps_idle_ms/h0/w0/v7</property>
      <property value="-76.6014">fsim/tables/ps_idle_ms/h0/w0/v8</property>
      <property value="-88.0021">fsim/tables/ps_idle_ms/h0/w0/v9</property>
      <property value="-26.6537">fsim/tables/ps_idle_ms/h0/w1/v0</property>
      <property value="-30.8664">fsim/tables/ps_idle_ms/h0/w1/v1</property>
      <property value="-94.1955">fsim/tables/ps_idle_ms/h0/w1/v10</property>
      <property value="-112.598">fsim/tables/ps_idle_ms/h0/w1/v11</property>
      <property value="-172.255">fsim/tables/ps_idle_ms/h0/w1/v12</property>
      <property value="-291.7">fsim/tables/ps_idle_ms/h0/w1/v13</property>
      <property value="-337.961">fsim/tables/ps_idle_ms/h0/w1/v14</property>
      <property value="-381.278">fsim/tables/ps_idle_ms/h0/w1/v15</property>
      <property value="-35.5019">fsim/tables/ps_idle_ms/h0/w1/v2</property>
      <property value="-40.5896">fsim/tables/ps_idle_ms/h0/w1/v3</property>
      <property value="-46.1196">fsim/tables/ps_idle_ms/h0/w1/v4</property>
      <property value="-52.1647">fsim/tables/ps_idle_ms/h0/w1/v5</property>
      <property value="-59.0054">fsim/tables/ps_idle_ms/h0/w1/v6</property>
      <property value="-66.4408">fsim/tables/ps_idle_ms/h0/w1/v7</property>
      <property value="-74.5461">fsim/tables/ps_idle_ms/h0/w1/v8</property>
      <property value="-83.517">fsim/tables/ps_idle_ms/h0/w1/v9</property>
      <property value="-13.3464">fsim/tables/ps_idle_ms/h0/w2/v0</property>
      <property value="-15.6222">fsim/tables/ps_idle_ms/h0/w2/v1</property>
      <property value="-68.3294">fsim/tables/ps_idle_ms/h0/w2/v10</property>
      <property value="-79.366">fsim/tables/ps_idle_ms/h0/w2/v11</property>
      <property value="-98.6659">fsim/tables/ps_idle_ms/h0/w2/v12</property>
      <property value="-180.952">fsim/tables/ps_idle_ms/h0/w2/v13</property>
      <property value="-293.855">fsim/tables/ps_idle_ms/h0/w2/v14</property>
      <property value="-347.839">fsim/tables/ps_idle_ms/h0/w2/v15</property>
      <property value="-18.7055">fsim/tables/ps_idle_ms/h0/w2/v2</property>
      <property value="-22.2427">fsim/tables/ps_idle_ms/h0/w2/v3</property>
      <property value="-26.6322">fsim/tables/ps_idle_ms/h0/w2/v4</property>
      <property value="-31.7523">fsim/tables/ps_idle_ms/h0/w2/v5</property>
      <property value="-37.5184">fsim/tables/ps_idle_ms/h0/w2/v6</property>
      <property value="-43.9217">fsim/tables/ps_idle_ms/h0/w2/v7</property>
      <property value="-50.981">fsim/tables/ps_idle_ms/h0/w2/v8</property>
      <property value="-59.0281">fsim/tables/ps_idle_ms/h0/w2/v9</property>
      <property value="-11.1251">fsim/tables/ps_idle_ms/h1/w0/v0</property>
      <property value="-12.6816">fsim/tables/ps_idle_ms/h1/w0/v1</property>
      <property value="-88.8397">fsim/tables/ps_idle_ms/h1/w0/v10</property>
      <property value="-220.417">fsim/tables/ps_idle_ms/h1/w0/v11</property>
      <property value="-356.169">fsim/tables/ps_idle_ms/h1/w0/v12</property>
      <property value="-447.147">fsim/tables/ps_idle_ms/h1/w0/v13</property>
      <property value="-490.251">fsim/tables/ps_idle_ms/h1/w0/v14</property>
      <property value="-518.306">fsim/tables/ps_idle_ms/h1/w0/v15</property>
      <property value="-15.3504">fsim/tables/ps_idle_ms/h1/w0/v2</property>
      <property value="-19.1255">fsim/tables/ps_idle_ms/h1/w0/v3</property>
      <property value="-23.7398">fsim/tables/ps_idle_ms/h1/w0/v4</property>
      <property value="-29.7654">fsim/tables/ps_idle_ms/h1/w0/v5</property>
      <property value="-36.8383">fsim/tables/ps_idle_ms/h1/w0/v6</property>
      <property value="-44.9483">fsim/tables/ps_idle_ms/h1/w0/v7</property>
      <property value="-54.1264">fsim/tables/ps_idle_ms/h1/w0/v8</property>
      <property value="-65.6748">fsim/tables/ps_idle_ms/h1/w0/v9</property>
      <property value="-22.2681">fsim/tables/ps_idle_ms/h1/w1/v0</property>
      <property value="-25.5109">fsim/tables/ps_idle_ms/h1/w1/v1</property>
      <property value="-220.915">fsim/tables/ps_idle_ms/h1/w1/v10</property>
      <property value="-299.215">fsim/tables/ps_idle_ms/h1/w1/v11</property>
      <property value="-354.307">fsim/tables/ps_idle_ms/h1/w1/v12</property>
      <property value="-396.13">fsim/tables/ps_idle_ms/h1/w1/v13</property>
      <property value="-418.387">fsim/tables/ps_idle_ms/h1/w1/v14</property>
      <property value="-435.339">fsim/tables/ps_idle_ms/h1/w1/v15</property>
      <property value="-29.4716">fsim/tables/ps_idle_ms/h1/w1/v2</property>
      <property value="-33.9535">fsim/tables/ps_idle_ms/h1/w1/v3</property>
      <property value="-38.8954">fsim/tables/ps_idle_ms/h1/w1/v4</property>
      <property value="-44.3009">fsim/tables/ps_idle_ms/h1/w1/v5</property>
      <property value="-50.2">fsim/tables/ps_idle_ms/h1/w1/v6</property>
      <property value="-57.1281">fsim/tables/ps_idle_ms/h1/w1/v7</property>
      <property value="-68.1763">fsim/tables/ps_idle_ms/h1/w1/v8</property>
      <property value="-109.184">fsim/tables/ps_idle_ms/h1/w1/v9</property>
      <property value="-14.191">fsim/tables/ps_idle_ms/h1/w2/v0</property>
      <property value="-15.65">fsim/tables/ps_idle_ms/h1/w2/v1</property>
      <property value="-79.004">fsim/tables/ps_idle_ms/h1/w2/v10</property>
      <property value="-182.794">fsim/tables/ps_idle_ms/h1/w2/v11</property>
      <property value="-269.313">fsim/tables/ps_idle_ms/h1/w2/v12</property>
      <property value="-320.209">fsim/tables/ps_idle_ms/h1/w2/v13</property>
      <property value="-359.221">fsim/tables/ps_idle_ms/h1/w2/v14</property>
      <property value="-378.004">fsim/tables/ps_idle_ms/h1/w2/v15</property>
      <property value="-17.8688">fsim/tables/ps_idle_ms/h1/w2/v2</property>
      <property value="-20.6835">fsim/tables/ps_idle_ms/h1/w2/v3</property>
      <property value="-24.2484">fsim/tables/ps_idle_ms/h1/w2/v4</property>
      <property value="-28.2981">fsim/tables/ps_idle_ms/h1/w2/v5</property>
      <property value="-33.3774">fsim/tables/ps_idle_ms/h1/w2/v6</property>
      <property value="-39.1238">fsim/tables/ps_idle_ms/h1/w2/v7</property>
      <property value="-45.5485">fsim/tables/ps_idle_ms/h1/w2/v8</property>
      <property value="-53.7457">fsim/tables/ps_idle_ms/h1/w2/v9</property>
      <property value="-22.4197">fsim/tables/ps_idle_ms/h2/w0/v0</property>
      <property value="-25.9143">fsim/tables/ps_idle_ms/h2/w0/v1</property>
      <property value="-313.64">fsim/tables/ps_idle_ms/h2/w0/v10</property>
      <property value="-353.634">fsim/tables/ps_idle_ms/h2/w0/v11</property>
      <property value="-396.201">fsim/tables/ps_idle_ms/h2/w0/v12</property>
      <property value="-442.072">fsim/tables/ps_idle_ms/h2/w0/v13</property>
      <property value="-477.726">fsim/tables/ps_idle_ms/h2/w0/v14</property>
      <property value="-497.629">fsim/tables/ps_idle_ms/h2/w0/v15</property>
      <property value="-29.8618">fsim/tables/ps_idle_ms/h2/w0/v2</property>
      <property value="-34.7681">fsim/tables/ps_idle_ms/h2/w0/v3</property>
      <property value="-40.3348">fsim/tables/ps_idle_ms/h2/w0/v4</property>
      <property value="-48.3254">fsim/tables/ps_idle_ms/h2/w0/v5</property>
      <property value="-85.7769">fsim/tables/ps_idle_ms/h2/w0/v6</property>
      <property value="-185.893">fsim/tables/ps_idle_ms/h2/w0/v7</property>
      <property value="-239.145">fsim/tables/ps_idle_ms/h2/w0/v8</property>
      <property value="-275.569">fsim/tables/ps_idle_ms/h2/w0/v9</property>
      <property value="-21.766">fsim/tables/ps_idle_ms/h2/w1/v0</property>
      <property value="-24.6137">fsim/tables/ps_idle_ms/h2/w1/v1</property>
      <property value="-262.955">fsim/tables/ps_idle_ms/h2/w1/v10</property>
      <property value="-295.738">fsim/tables/ps_idle_ms/h2/w1/v11</property>
      <property value="-330.532">fsim/tables/ps_idle_ms/h2/w1/v12</property>
      <property value="-367.61">fsim/tables/ps_idle_ms/h2/w1/v13</property>
      <property value="-402.985">fsim/tables/ps_idle_ms/h2/w1/v14</property>
      <property value="-419.348">fsim/tables/ps_idle_ms/h2/w1/v15</property>
      <property value="-27.9154">fsim/tables/ps_idle_ms/h2/w1/v2</property>
      <property value="-31.5577">fsim/tables/ps_idle_ms/h2/w1/v3</property>
      <property value="-36.1693">fsim/tables/ps_idle_ms/h2/w1/v4</property>
      <property value="-43.2348">fsim/tables/ps_idle_ms/h2/w1/v5</property>
      <property value="-76.6137">fsim/tables/ps_idle_ms/h2/w1/v6</property>
      <property value="-161.01">fsim/tables/ps_idle_ms/h2/w1/v7</property>
      <property value="-201.846">fsim/tables/ps_idle_ms/h2/w1/v8</property>
      <property value="-231.548">fsim/tables/ps_idle_ms/h2/w1/v9</property>
      <property value="-17.5019">fsim/tables/ps_idle_ms/h2/w2/v0</property>
      <property value="-17.9605">fsim/tables/ps_idle_ms/h2/w2/v1</property>
      <property value="-188.497">fsim/tables/ps_idle_ms/h2/w2/v10</property>
      <property value="-221.354">fsim/tables/ps_idle_ms/h2/w2/v11</property>
      <property value="-255.823">fsim/tables/ps_idle_ms/h2/w2/v12</property>
      <property value="-292.881">fsim/tables/ps_idle_ms/h2/w2/v13</property>
      <property value="-332.848">fsim/tables/ps_idle_ms/h2/w2/v14</property>
      <property value="-356.208">fsim/tables/ps_idle_ms/h2/w2/v15</property>
      <property value="-19.2793">fsim/tables/ps_idle_ms/h2/w2/v2</property>
      <property value="-21.345">fsim/tables/ps_idle_ms/h2/w2/v3</property>
      <property value="-24.014">fsim/tables/ps_idle_ms/h2/w2/v4</property>
      <property value="-27.6339">fsim/tables/ps_idle_ms/h2/w2/v5</property>
      <property value="-31.7971">fsim/tables/ps_idle_ms/h2/w2/v6</property>
      <property value="-37.753">fsim/tables/ps_idle_ms/h2/w2/v7</property>
      <property value="-73.9926">fsim/tables/ps_idle_ms/h2/w2/v8</property>
      <property value="-155.609">fsim/tables/ps_idle_ms/h2/w2/v9</property>
      <property value="-18.5648">fsim/tables/ps_idle_ms/h3/w0/v0</property>
      <property value="-18.6151">fsim/tables/ps_idle_ms/h3/w0/v1</property>
      <property value="-246.624">fsim/tables/ps_idle_ms/h3/w0/v10</property>
      <property value="-290.879">fsim/tables/ps_idle_ms/h3/w0/v11</property>
      <property value="-339.856">fsim/tables/ps_idle_ms/h3/w0/v12</property>
      <property value="-393.708">fsim/tables/ps_idle_ms/h3/w0/v13</property>
      <property value="-452.788">fsim/tables/ps_idle_ms/h3/w0/v14</property>
      <property value="-488.834">fsim/tables/ps_idle_ms/h3/w0/v15</property>
      <property value="-20.097">fsim/tables/ps_idle_ms/h3/w0/v2</property>
      <property value="-22.664">fsim/tables/ps_idle_ms/h3/w0/v3</property>
      <property value="-26.1927">fsim/tables/ps_idle_ms/h3/w0/v4</property>
      <property value="-31.3338">fsim/tables/ps_idle_ms/h3/w0/v5</property>
      <property value="-64.6249">fsim/tables/ps_idle_ms/h3/w0/v6</property>
      <property value="-137.411">fsim/tables/ps_idle_ms/h3/w0/v7</property>
      <property value="-170.5">fsim/tables/ps_idle_ms/h3/w0/v8</property>
      <property value="-206.629">fsim/tables/ps_idle_ms/h3/w0/v9</property>
      <property value="-20.7023">fsim/tables/ps_idle_ms/h3/w1/v0</property>
      <property value="-20.4529">fsim/tables/ps_idle_ms/h3/w1/v1</property>
      <property value="-207.95">fsim/tables/ps_idle_ms/h3/w1/v10</property>
      <property value="-243.194">fsim/tables/ps_idle_ms/h3/w1/v11</property>
      <property value="-281.991">fsim/tables/ps_idle_ms/h3/w1/v12</property>
      <property value="-324.53">fsim/tables/ps_idle_ms/h3/w1/v13</property>
      <property value="-370.938">fsim/tables/ps_idle_ms/h3/w1/v14</property>
      <property value="-404.05">fsim/tables/ps_idle_ms/h3/w1/v15</property>
      <property value="-21.3668">fsim/tables/ps_idle_ms/h3/w1/v2</property>
      <property value="-23.2747">fsim/tables/ps_idle_ms/h3/w1/v3</property>
      <property value="-26.1125">fsim/tables/ps_idle_ms/h3/w1/v4</property>
      <property value="-30.3965">fsim/tables/ps_idle_ms/h3/w1/v5</property>
      <property value="-71.2726">fsim/tables/ps_idle_ms/h3/w1/v6</property>
      <property value="-120.207">fsim/tables/ps_idle_ms/h3/w1/v7</property>
      <property value="-147.17">fsim/tables/ps_idle_ms/h3/w1/v8</property>
      <property value="-175.965">fsim/tables/ps_idle_ms/h3/w1/v9</property>
      <property value="-22.797">fsim/tables/ps_idle_ms/h3/w2/v0</property>
      <property value="-22.1475">fsim/tables/ps_idle_ms/h3/w2/v1</property>
      <property value="-180.599">fsim/tables/ps_idle_ms/h3/w2/v10</property>
      <property value="-209.672">fsim/tables/ps_idle_ms/h3/w2/v11</property>
      <property value="-240.669">fsim/tables/ps_idle_ms/h3/w2/v12</property>
      <property value="-275.076">fsim/tables/ps_idle_ms/h3/w2/v13</property>
      <property value="-312.917">fsim/tables/ps_idle_ms/h3/w2/v14</property>
      <property value="-342.847">fsim/tables/ps_idle_ms/h3/w2/v15</property>
      <property value="-22.6933">fsim/tables/ps_idle_ms/h3/w2/v2</property>
      <property value="-24.0769">fsim/tables/ps_idle_ms/h3/w2/v3</property>
      <property value="-26.2987">fsim/tables/ps_idle_ms/h3/w2/v4</property>
      <property value="-30.1892">fsim/tables/ps_idle_ms/h3/w2/v5</property>
      <property value="-70.797">fsim/tables/ps_idle_ms/h3/w2/v6</property>
      <property value="-106.818">fsim/tables/ps_idle_ms/h3/w2/v7</property>
      <property value="-129.638">fsim/tables/ps_idle_ms/h3/w2/v8</property>
      <property value="-153.775">fsim/tables/ps_idle_ms/h3/w2/v9</property>
      <property value="-19.2921">fsim/tables/ps_idle_ms/h4/w0/v0</property>
      <property value="-19.1044">fsim/tables/ps_idle_ms/h4/w0/v1</property>
      <property value="-235.376">fsim/tables/ps_idle_ms/h4/w0/v10</property>
      <property value="-277.385">fsim/tables/ps_idle_ms/h4/w0/v11</property>
      <property value="-323.799">fsim/tables/ps_idle_ms/h4/w0/v12</property>
      <property value="-374.845">fsim/tables/ps_idle_ms/h4/w0/v13</property>
      <property value="-430.821">fsim/tables/ps_idle_ms/h4/w0/v14</property>
      <property value="-466.901">fsim/tables/ps_idle_ms/h4/w0/v15</property>
      <property value="-20.3403">fsim/tables/ps_idle_ms/h4/w0/v2</property>
      <property value="-22.6768">fsim/tables/ps_idle_ms/h4/w0/v3</property>
      <property value="-25.9008">fsim/tables/ps_idle_ms/h4/w0/v4</property>
      <property value="-30.8595">fsim/tables/ps_idle_ms/h4/w0/v5</property>
      <property value="-66.0458">fsim/tables/ps_idle_ms/h4/w0/v6</property>
      <property value="-131.723">fsim/tables/ps_idle_ms/h4/w0/v7</property>
      <property value="-163.063">fsim/tables/ps_idle_ms/h4/w0/v8</property>
      <property value="-197.326">fsim/tables/ps_idle_ms/h4/w0/v9</property>
      <property value="-21.4965">fsim/tables/ps_idle_ms/h4/w1/v0</property>
      <property value="-21.0416">fsim/tables/ps_idle_ms/h4/w1/v1</property>
      <property value="-198.989">fsim/tables/ps_idle_ms/h4/w1/v10</property>
      <property value="-232.079">fsim/tables/ps_idle_ms/h4/w1/v11</property>
      <property value="-268.49">fsim/tables/ps_idle_ms/h4/w1/v12</property>
      <property value="-308.676">fsim/tables/ps_idle_ms/h4/w1/v13</property>
      <property value="-352.524">fsim/tables/ps_idle_ms/h4/w1/v14</property>
      <property value="-385.122">fsim/tables/ps_idle_ms/h4/w1/v15</property>
      <property value="-21.7638">fsim/tables/ps_idle_ms/h4/w1/v2</property>
      <property value="-23.4565">fsim/tables/ps_idle_ms/h4/w1/v3</property>
      <property value="-26.1197">fsim/tables/ps_idle_ms/h4/w1/v4</property>
      <property value="-30.1635">fsim/tables/ps_idle_ms/h4/w1/v5</property>
      <property value="-72.468">fsim/tables/ps_idle_ms/h4/w1/v6</property>
      <property value="-115.541">fsim/tables/ps_idle_ms/h4/w1/v7</property>
      <property value="-141.218">fsim/tables/ps_idle_ms/h4/w1/v8</property>
      <property value="-168.543">fsim/tables/ps_idle_ms/h4/w1/v9</property>
      <property value="-23.6671">fsim/tables/ps_idle_ms/h4/w2/v0</property>
      <property value="-22.8329">fsim/tables/ps_idle_ms/h4/w2/v1</property>
      <property value="-173.133">fsim/tables/ps_idle_ms/h4/w2/v10</property>
      <property value="-200.624">fsim/tables/ps_idle_ms/h4/w2/v11</property>
      <property value="-229.791">fsim/tables/ps_idle_ms/h4/w2/v12</property>
      <property value="-261.763">fsim/tables/ps_idle_ms/h4/w2/v13</property>
      <property value="-297.19">fsim/tables/ps_idle_ms/h4/w2/v14</property>
      <property value="-326.263">fsim/tables/ps_idle_ms/h4/w2/v15</property>
      <property value="-23.2202">fsim/tables/ps_idle_ms/h4/w2/v2</property>
      <property value="-24.4362">fsim/tables/ps_idle_ms/h4/w2/v3</property>
      <property value="-26.4255">fsim/tables/ps_idle_ms/h4/w2/v4</property>
      <property value="-30.9719">fsim/tables/ps_idle_ms/h4/w2/v5</property>
      <property value="-72.5741">fsim/tables/ps_idle_ms/h4/w2/v6</property>
      <property value="-103.082">fsim/tables/ps_idle_ms/h4/w2/v7</property>
      <property value="-124.795">fsim/tables/ps_idle_ms/h4/w2/v8</property>
      <property value="-147.661">fsim/tables/ps_idle_ms/h4/w2/v9</property>
      <property value="-24.2414">fsim/tables/ps_idle_ms/h5/w0/v0</property>
      <property value="-24.8763">fsim/tables/ps_idle_ms/h5/w0/v1</property>
      <property value="-181.007">fsim/tables/ps_idle_ms/h5/w0/v10</property>
      <property value="-203.89">fsim/tables/ps_idle_ms/h5/w0/v11</property>
      <property value="-228.608">fsim/tables/ps_idle_ms/h5/w0/v12</property>
      <property value="-255.455">fsim/tables/ps_idle_ms/h5/w0/v13</property>
      <property value="-284.668">fsim/tables/ps_idle_ms/h5/w0/v14</property>
      <property value="-308.336">fsim/tables/ps_idle_ms/h5/w0/v15</property>
      <property value="-26.2021">fsim/tables/ps_idle_ms/h5/w0/v2</property>
      <property value="-28.2552">fsim/tables/ps_idle_ms/h5/w0/v3</property>
      <property value="-42.7997">fsim/tables/ps_idle_ms/h5/w0/v4</property>
      <property value="-86.2157">fsim/tables/ps_idle_ms/h5/w0/v5</property>
      <property value="-101.73">fsim/tables/ps_idle_ms/h5/w0/v6</property>
      <property value="-119.536">fsim/tables/ps_idle_ms/h5/w0/v7</property>
      <property value="-138.239">fsim/tables/ps_idle_ms/h5/w0/v8</property>
      <property value="-158.904">fsim/tables/ps_idle_ms/h5/w0/v9</property>
      <property value="-29.4095">fsim/tables/ps_idle_ms/h5/w1/v0</property>
      <property value="-27.4">fsim/tables/ps_idle_ms/h5/w1/v1</property>
      <property value="-136.583">fsim/tables/ps_idle_ms/h5/w1/v10</property>
      <property value="-156.665">fsim/tables/ps_idle_ms/h5/w1/v11</property>
      <property value="-176.639">fsim/tables/ps_idle_ms/h5/w1/v12</property>
      <property value="-199.068">fsim/tables/ps_idle_ms/h5/w1/v13</property>
      <property value="-223.809">fsim/tables/ps_idle_ms/h5/w1/v14</property>
      <property value="-246.808">fsim/tables/ps_idle_ms/h5/w1/v15</property>
      <property value="-26.6562">fsim/tables/ps_idle_ms/h5/w1/v2</property>
      <property value="-26.8665">fsim/tables/ps_idle_ms/h5/w1/v3</property>
      <property value="-27.7256">fsim/tables/ps_idle_ms/h5/w1/v4</property>
      <property value="-32.2679">fsim/tables/ps_idle_ms/h5/w1/v5</property>
      <property value="-66.1334">fsim/tables/ps_idle_ms/h5/w1/v6</property>
      <property value="-84.7773">fsim/tables/ps_idle_ms/h5/w1/v7</property>
      <property value="-100.961">fsim/tables/ps_idle_ms/h5/w1/v8</property>
      <property value="-117.823">fsim/tables/ps_idle_ms/h5/w1/v9</property>
      <property value="-31.6661">fsim/tables/ps_idle_ms/h5/w2/v0</property>
      <property value="-29.8888">fsim/tables/ps_idle_ms/h5/w2/v1</property>
      <property value="-118.977">fsim/tables/ps_idle_ms/h5/w2/v10</property>
      <property value="-135.153">fsim/tables/ps_idle_ms/h5/w2/v11</property>
      <property value="-150.566">fsim/tables/ps_idle_ms/h5/w2/v12</property>
      <property value="-166.655">fsim/tables/ps_idle_ms/h5/w2/v13</property>
      <property value="-184.302">fsim/tables/ps_idle_ms/h5/w2/v14</property>
      <property value="-201.982">fsim/tables/ps_idle_ms/h5/w2/v15</property>
      <property value="-29.0851">fsim/tables/ps_idle_ms/h5/w2/v2</property>
      <property value="-28.9965">fsim/tables/ps_idle_ms/h5/w2/v3</property>
      <property value="-29.5805">fsim/tables/ps_idle_ms/h5/w2/v4</property>
      <property value="-35.3225">fsim/tables/ps_idle_ms/h5/w2/v5</property>
      <property value="-66.1438">fsim/tables/ps_idle_ms/h5/w2/v6</property>
      <property value="-78.0789">fsim/tables/ps_idle_ms/h5/w2/v7</property>
      <property value="-91.0798">fsim/tables/ps_idle_ms/h5/w2/v8</property>
      <property value="-104.2">fsim/tables/ps_idle_ms/h5/w2/v9</property>
      <property value="-28.4695">fsim/tables/ps_idle_ms/h6/w0/v0</property>
      <property value="-28.3134">fsim/tables/ps_idle_ms/h6/w0/v1</property>
      <property value="-131.762">fsim/tables/ps_idle_ms/h6/w0/v10</property>
      <property value="-146.428">fsim/tables/ps_idle_ms/h6/w0/v11</property>
      <property value="-160.579">fsim/tables/ps_idle_ms/h6/w0/v12</property>
      <property value="-175.731">fsim/tables/ps_idle_ms/h6/w0/v13</property>
      <property value="-192.43">fsim/tables/ps_idle_ms/h6/w0/v14</property>
      <property value="-208.56">fsim/tables/ps_idle_ms/h6/w0/v15</property>
      <property value="-28.5966">fsim/tables/ps_idle_ms/h6/w0/v2</property>
      <property value="-29.5617">fsim/tables/ps_idle_ms/h6/w0/v3</property>
      <property value="-40.3361">fsim/tables/ps_idle_ms/h6/w0/v4</property>
      <property value="-70.2124">fsim/tables/ps_idle_ms/h6/w0/v5</property>
      <property value="-80.3832">fsim/tables/ps_idle_ms/h6/w0/v6</property>
      <property value="-92.0773">fsim/tables/ps_idle_ms/h6/w0/v7</property>
      <property value="-104.123">fsim/tables/ps_idle_ms/h6/w0/v8</property>
      <property value="-117.384">fsim/tables/ps_idle_ms/h6/w0/v9</property>
      <property value="-34.7805">fsim/tables/ps_idle_ms/h6/w1/v0</property>
      <property value="-32.8218">fsim/tables/ps_idle_ms/h6/w1/v1</property>
      <property value="-99.703">fsim/tables/ps_idle_ms/h6/w1/v10</property>
      <property value="-111.385">fsim/tables/ps_idle_ms/h6/w1/v11</property>
      <property value="-123.938">fsim/tables/ps_idle_ms/h6/w1/v12</property>
      <property value="-135.271">fsim/tables/ps_idle_ms/h6/w1/v13</property>
      <property value="-147.332">fsim/tables/ps_idle_ms/h6/w1/v14</property>
      <property value="-159.867">fsim/tables/ps_idle_ms/h6/w1/v15</property>
      <property value="-31.7146">fsim/tables/ps_idle_ms/h6/w1/v2</property>
      <property value="-31.241">fsim/tables/ps_idle_ms/h6/w1/v3</property>
      <property value="-31.2531">fsim/tables/ps_idle_ms/h6/w1/v4</property>
      <property value="-34.9902">fsim/tables/ps_idle_ms/h6/w1/v5</property>
      <property value="-56.2101">fsim/tables/ps_idle_ms/h6/w1/v6</property>
      <property value="-69.3525">fsim/tables/ps_idle_ms/h6/w1/v7</property>
      <property value="-78.3535">fsim/tables/ps_idle_ms/h6/w1/v8</property>
      <property value="-88.9151">fsim/tables/ps_idle_ms/h6/w1/v9</property>
      <property value="-38.124">fsim/tables/ps_idle_ms/h6/w2/v0</property>
      <property value="-36.5958">fsim/tables/ps_idle_ms/h6/w2/v1</property>
      <property value="-73.4703">fsim/tables/ps_idle_ms/h6/w2/v10</property>
      <property value="-80.2308">fsim/tables/ps_idle_ms/h6/w2/v11</property>
      <property value="-86.4627">fsim/tables/ps_idle_ms/h6/w2/v12</property>
      <property value="-93.6692">fsim/tables/ps_idle_ms/h6/w2/v13</property>
      <property value="-102.035">fsim/tables/ps_idle_ms/h6/w2/v14</property>
      <property value="-110.733">fsim/tables/ps_idle_ms/h6/w2/v15</property>
      <property value="-35.4766">fsim/tables/ps_idle_ms/h6/w2/v2</property>
      <property value="-34.6969">fsim/tables/ps_idle_ms/h6/w2/v3</property>
      <property value="-34.124">fsim/tables/ps_idle_ms/h6/w2/v4</property>
      <property value="-33.9884">fsim/tables/ps_idle_ms/h6/w2/v5</property>
      <property value="-37.1313">fsim/tables/ps_idle_ms/h6/w2/v6</property>
      <property value="-49.3105">fsim/tables/ps_idle_ms/h6/w2/v7</property>
      <property value="-62.489">fsim/tables/ps_idle_ms/h6/w2/v8</property>
      <property value="-67.6575">fsim/tables/ps_idle_ms/h6/w2/v9</property>
      <property value="-37.7517">fsim/tables/ps_idle_ms/h7/w0/v0</property>
      <property value="-35.8883">fsim/tables/ps_idle_ms/h7/w0/v1</property>
      <property value="-78.2441">fsim/tables/ps_idle_ms/h7/w0/v10</property>
      <property value="-85.5007">fsim/tables/ps_idle_ms/h7/w0/v11</property>
      <property value="-92.9798">fsim/tables/ps_idle_ms/h7/w0/v12</property>
      <property value="-101.388">fsim/tables/ps_idle_ms/h7/w0/v13</property>
      <property value="-111.235">fsim/tables/ps_idle_ms/h7/w0/v14</property>
      <property value="-121.011">fsim/tables/ps_idle_ms/h7/w0/v15</property>
      <property value="-34.6501">fsim/tables/ps_idle_ms/h7/w0/v2</property>
      <property value="-33.7433">fsim/tables/ps_idle_ms/h7/w0/v3</property>
      <property value="-33.1541">fsim/tables/ps_idle_ms/h7/w0/v4</property>
      <property value="-33.2044">fsim/tables/ps_idle_ms/h7/w0/v5</property>
      <property value="-36.897">fsim/tables/ps_idle_ms/h7/w0/v6</property>
      <property value="-52.8191">fsim/tables/ps_idle_ms/h7/w0/v7</property>
      <property value="-64.762">fsim/tables/ps_idle_ms/h7/w0/v8</property>
      <property value="-71.036">fsim/tables/ps_idle_ms/h7/w0/v9</property>
      <property value="-41.5535">fsim/tables/ps_idle_ms/h7/w1/v0</property>
      <property value="-40.42">fsim/tables/ps_idle_ms/h7/w1/v1</property>
      <property value="-59.873">fsim/tables/ps_idle_ms/h7/w1/v10</property>
      <property value="-62.7916">fsim/tables/ps_idle_ms/h7/w1/v11</property>
      <property value="-66.077">fsim/tables/ps_idle_ms/h7/w1/v12</property>
      <property value="-70.3662">fsim/tables/ps_idle_ms/h7/w1/v13</property>
      <property value="-75.7042">fsim/tables/ps_idle_ms/h7/w1/v14</property>
      <property value="-80.717">fsim/tables/ps_idle_ms/h7/w1/v15</property>
      <property value="-39.2866">fsim/tables/ps_idle_ms/h7/w1/v2</property>
      <property value="-38.4581">fsim/tables/ps_idle_ms/h7/w1/v3</property>
      <property value="-37.6843">fsim/tables/ps_idle_ms/h7/w1/v4</property>
      <property value="-37.4152">fsim/tables/ps_idle_ms/h7/w1/v5</property>
      <property value="-37.472">fsim/tables/ps_idle_ms/h7/w1/v6</property>
      <property value="-39.4403">fsim/tables/ps_idle_ms/h7/w1/v7</property>
      <property value="-43.5295">fsim/tables/ps_idle_ms/h7/w1/v8</property>
      <property value="-53.0333">fsim/tables/ps_idle_ms/h7/w1/v9</property>
      <property value="-63.1681">fsim/tables/ps_idle_ms/h7/w2/v10</property>
      <property value="-63.1681">fsim/tables/ps_idle_ms/h7/w2/v11</property>
      <property value="-63.1681">fsim/tables/ps_idle_ms/h7/w2/v12</property>
      <property value="-63.5341">fsim/tables/ps_idle_ms/h7/w2/v13</property>
      <property value="-63.9799">fsim/tables/ps_idle_ms/h7/w2/v14</property>
      <property value="-63.6267">fsim/tables/ps_idle_ms/h7/w2/v15</property>
      <property value="-63.1681">fsim/tables/ps_idle_ms/h7/w2/v9</property>
      <property value="378.74">fsim/tables/reach_tas_ms/h0/w0</property>
      <property value="378.258">fsim/tables/reach_tas_ms/h0/w1</property>
      <property value="377.939">fsim/tables/reach_tas_ms/h0/w2</property>
      <property value="417.459">fsim/tables/reach_tas_ms/h1/w0</property>
      <property value="414.416">fsim/tables/reach_tas_ms/h1/w1</property>
      <property value="413.615">fsim/tables/reach_tas_ms/h1/w2</property>
      <property value="470.518">fsim/tables/reach_tas_ms/h2/w0</property>
      <property value="468.798">fsim/tables/reach_tas_ms/h2/w1</property>
      <property value="463.673">fsim/tables/reach_tas_ms/h2/w2</property>
      <property value="534.744">fsim/tables/reach_tas_ms/h3/w0</property>
      <property value="528.891">fsim/tables/reach_tas_ms/h3/w1</property>
      <property value="523.309">fsim/tables/reach_tas_ms/h3/w2</property>
      <property value="535.4">fsim/tables/reach_tas_ms/h4/w0</property>
      <property value="529.129">fsim/tables/reach_tas_ms/h4/w1</property>
      <property value="523.191">fsim/tables/reach_tas_ms/h4/w2</property>
      <property value="529.906">fsim/tables/reach_tas_ms/h5/w0</property>
      <property value="515.498">fsim/tables/reach_tas_ms/h5/w1</property>
      <property value="500.226">fsim/tables/reach_tas_ms/h5/w2</property>
      <property value="499.916">fsim/tables/reach_tas_ms/h6/w0</property>
      <property value="472.195">fsim/tables/reach_tas_ms/h6/w1</property>
      <property value="412.779">fsim/tables/reach_tas_ms/h6/w2</property>
      <property value="425.164">fsim/tables/reach_tas_ms/h7/w0</property>
      <property value="365.64">fsim/tables/reach_tas_ms/h7/w1</property>
      <property value="0.0">fsim/tables/speed_fraction/v0</property>
      <property value="0.0666667">fsim/tables/speed_fraction/v1</property>
      <property value="0.666667">fsim/tables/speed_fraction/v10</property>
      <property value="0.733333">fsim/tables/speed_fraction/v11</property>
      <property value="0.8">fsim/tables/speed_fraction/v12</property>
      <property value="0.866667">fsim/tables/speed_fraction/v13</property>
      <property value="0.933333">fsim/tables/speed_fraction/v14</property>
      <property value="1">fsim/tables/speed_fraction/v15</property>
      <property value="0.133333">fsim/tables/speed_fraction/v2</property>
      <property value="0.2">fsim/tables/speed_fraction/v3</property>
      <property value="0.266667">fsim/tables/speed_fraction/v4</property>
      <property value="0.333333">fsim/tables/speed_fraction/v5</property>
      <property value="0.4">fsim/tables/speed_fraction/v6</property>
      <property value="0.466667">fsim/tables/speed_fraction/v7</property>
      <property value="0.533333">fsim/tables/speed_fraction/v8</property>
      <property value="0.6">fsim/tables/speed_fraction/v9</property>
      <property value="51.4184">fsim/tables/stall_cas_ms/h0/w0</property>
      <property value="56.3686">fsim/tables/stall_cas_ms/h0/w1</property>
      <property value="60.9178">fsim/tables/stall_cas_ms/h0/w2</property>
      <property value="51.5373">fsim/tables/stall_cas_ms/h1/w0</property>
      <property value="56.4989">fsim/tables/stall_cas_ms/h1/w1</property>
      <property value="61.0587">fsim/tables/stall_cas_ms/h1/w2</property>
      <property value="51.9386">fsim/tables/stall_cas_ms/h2/w0</property>
      <property value="56.9389">fsim/tables/stall_cas_ms/h2/w1</property>
      <property value="61.5341">fsim/tables/stall_cas_ms/h2/w2</property>
      <property value="52.5797">fsim/tables/stall_cas_ms/h3/w0</property>
      <property value="57.6417">fsim/tables/stall_cas_ms/h3/w1</property>
      <property value="62.2936">fsim/tables/stall_cas_ms/h3/w2</property>
      <property value="52.8589">fsim/tables/stall_cas_ms/h4/w0</property>
      <property value="57.9478">fsim/tables/stall_cas_ms/h4/w1</property>
      <property value="62.6244">fsim/tables/stall_cas_ms/h4/w2</property>
      <property value="53.4885">fsim/tables/stall_cas_ms/h5/w0</property>
      <property value="58.638">fsim/tables/stall_cas_ms/h5/w1</property>
      <property value="63.3703">fsim/tables/stall_cas_ms/h5/w2</property>
      <property value="54.0222">fsim/tables/stall_cas_ms/h6/w0</property>
      <property value="59.223">fsim/tables/stall_cas_ms/h6/w1</property>
      <property value="64.0026">fsim/tables/stall_cas_ms/h6/w2</property>
      <property value="59.1848">fsim/tables/stall_cas_ms/h7/w0</property>
      <property value="64.8826">fsim/tables/stall_cas_ms/h7/w1</property>
      <property value="70.119">fsim/tables/stall_cas_ms/h7/w2</property>
      <property value="10480">fsim/tables/weight_kg/w0</property>
      <property value="12595">fsim/tables/weight_kg/w1</property>
      <property value="14710">fsim/tables/weight_kg/w2</property>
      <channel name="Pitch (fly-by-wire)">
        <!-- hangar: load factor command, alpha and pitch-rate inner loop (hangar/fcs.py) -->
        <summer name="fcs/pitch-trim-sum">
          <input>fcs/elevator-cmd-norm</input>
          <input>fcs/pitch-trim-cmd-norm</input>
          <clipto> <min>-1</min> <max>1</max> </clipto>
        </summer>
        <!-- the integrators are reset below 60 kt and while a wheel carries weight
             (on the ground, taking off and landing) -->
        <switch name="fcs/fbw/reset">
          <default value="0"/>
          <test logic="OR" value="-1">
            velocities/vc-kts lt 60
            gear/wow gt 0
          </test>
        </switch>
        <fcs_function name="fcs/fbw/k-alpha">
          <function>
            <table>
              <independentVar lookup="row">aero/qbar-psf</independentVar>
              <independentVar lookup="column">velocities/mach</independentVar>
              <tableData>
                       0.150     0.400     0.700     0.900     1.100     1.400     2.000
              10.0  -4.14238  -4.24714  -4.03621  -3.59990  -6.00000  -6.00000  -6.00000
              20.0  -2.23801  -2.36716  -2.25942  -2.00374  -3.59312  -6.00000  -6.00000
              40.0  -1.30058  -1.42924  -1.37169  -1.20604  -2.02513  -3.63739  -4.29282
              80.0  -0.80800  -0.96753  -0.97484  -0.87338  -0.93364  -1.02496  -1.78641
             150.0  -0.75939  -0.92584  -0.94310  -0.83961  -0.87652  -0.81687  -0.31166
             300.0  -0.76087  -0.85112  -0.88576  -0.79289  -0.82126  -0.76728  -0.26085
             600.0  -0.96229  -0.77763  -0.82151  -0.73891  -0.74967  -0.70310  -0.24363
            1200.0  -2.03520  -0.62512  -0.57163  -0.45862  -0.22913  -0.14064  -0.03179
            2400.0  -6.00000  -0.75489  -0.48615  -0.35042   0.05021   0.45565   0.71774
              </tableData>
            </table>
          </function>
        </fcs_function>
        <fcs_function name="fcs/fbw/k-q">
          <function>
            <table>
              <independentVar lookup="row">aero/qbar-psf</independentVar>
              <independentVar lookup="column">velocities/mach</independentVar>
              <tableData>
                       0.150     0.400     0.700     0.900     1.100     1.400     2.000
              10.0  -3.00000  -3.00000  -3.00000  -3.00000  -3.00000  -3.00000  -3.00000
              20.0  -1.69511  -1.87441  -1.82140  -1.64831  -3.00000  -3.00000  -3.00000
              40.0  -0.71872  -0.88773  -0.88258  -0.80320  -1.60057  -3.00000  -3.00000
              80.0  -0.25186  -0.42491  -0.46210  -0.44918  -0.87947  -1.44538  -1.70730
             150.0  -0.11795  -0.28717  -0.32263  -0.31395  -0.62410  -1.09003  -1.20636
             300.0  -0.00680  -0.17279  -0.20941  -0.20751  -0.41933  -0.74099  -0.82856
             600.0   0.08272  -0.09319  -0.13081  -0.13355  -0.27711  -0.50009  -0.56806
            1200.0   0.22215  -0.00956  -0.04597  -0.04971  -0.12021  -0.27022  -0.36458
            2400.0   0.56546   0.04652   0.00381  -0.00507  -0.03260  -0.10431  -0.16265
              </tableData>
            </table>
          </function>
        </fcs_function>
        <fcs_function name="fcs/fbw/k-ff">
          <function>
            <table>
              <independentVar lookup="row">aero/qbar-psf</independentVar>
              <independentVar lookup="column">velocities/mach</independentVar>
              <tableData>
                       0.150     0.400     0.700     0.900     1.100     1.400     2.000
              10.0  -0.30000  -0.30000  -0.30000  -0.30000  -0.30000  -0.30000  -0.30000
              20.0  -0.30000  -0.30000  -0.30000  -0.30000  -0.30000  -0.30000  -0.30000
              40.0  -0.30000  -0.30000  -0.30000  -0.30000  -0.30000  -0.30000  -0.30000
              80.0  -0.14199  -0.14096  -0.13710  -0.12850  -0.28726  -0.30000  -0.30000
             150.0  -0.07695  -0.07615  -0.07351  -0.06844  -0.15455  -0.30000  -0.30000
             300.0  -0.03841  -0.03802  -0.03671  -0.03420  -0.07748  -0.15818  -0.20774
             600.0  -0.01917  -0.01897  -0.01832  -0.01707  -0.03871  -0.07915  -0.10440
            1200.0  -0.00600  -0.00582  -0.00529  -0.00452  -0.01080  -0.02789  -0.04680
            2400.0  -0.00150  -0.00146  -0.00132  -0.00113  -0.00270  -0.00698  -0.01172
              </tableData>
            </table>
          </function>
        </fcs_function>
        <fcs_function name="fcs/fbw/k-i">
          <function>
            <table>
              <independentVar lookup="row">aero/qbar-psf</independentVar>
              <independentVar lookup="column">velocities/mach</independentVar>
              <tableData>
                       0.150     0.400     0.700     0.900     1.100     1.400     2.000
              10.0  -0.60000  -0.60000  -0.60000  -0.60000  -0.60000  -0.60000  -0.60000
              20.0  -0.60000  -0.60000  -0.60000  -0.60000  -0.60000  -0.60000  -0.60000
              40.0  -0.60000  -0.60000  -0.58030  -0.50476  -0.60000  -0.60000  -0.60000
              80.0  -0.14199  -0.14096  -0.13710  -0.12850  -0.28726  -0.54794  -0.60000
             150.0  -0.07695  -0.07615  -0.07351  -0.06844  -0.15455  -0.31399  -0.40586
             300.0  -0.03841  -0.03802  -0.03671  -0.03420  -0.07748  -0.15818  -0.20774
             600.0  -0.01917  -0.01897  -0.01832  -0.01707  -0.03871  -0.07915  -0.10440
            1200.0  -0.00600  -0.00582  -0.00529  -0.00452  -0.01080  -0.02789  -0.04680
            2400.0  -0.00150  -0.00146  -0.00132  -0.00113  -0.00270  -0.00698  -0.01172
              </tableData>
            </table>
          </function>
        </fcs_function>
        <fcs_function name="fcs/fbw/n-alpha">
          <function>
            <table>
              <independentVar lookup="row">aero/qbar-psf</independentVar>
              <independentVar lookup="column">velocities/mach</independentVar>
              <tableData>
                       0.150     0.400     0.700     0.900     1.100     1.400     2.000
              10.0   1.00000   1.00000   1.00000   1.00000   1.00000   1.00000   1.00000
              20.0   1.00000   1.00000   1.00000   1.00000   1.00000   1.00000   1.00000
              40.0   1.00000   1.00000   1.00000   1.00000   1.00000   1.00000   1.00000
              80.0   3.56459   3.68029   4.02137   4.50861   4.21855   2.88449   1.42904
             150.0   7.40339   7.55602   8.02453   8.74103   8.30569   6.57654   5.07912
             300.0  14.57577  14.87349  15.78740  17.19592  16.33584  12.99056  10.26346
             600.0  28.82877  29.42633  31.26059  34.08759  32.36136  25.65858  20.21433
            1200.0  57.42634  58.62354  62.29947  67.96486  64.50544  51.06663  40.14483
            2400.0 114.73645 117.13147 124.48333 135.81411 128.89527 101.99139  80.10376
              </tableData>
            </table>
          </function>
        </fcs_function>
        <!-- the pitching moment's departures from a straight line through the
             angle-of-attack envelope (+0.324 per rad about the CG), cancelled by the
             elevator: the gains are designed on the line -->
        <fcs_function name="fcs/fbw/moment-comp">
          <function>
            <table>
              <independentVar lookup="row">aero/alpha-rad</independentVar>
              <independentVar lookup="column">velocities/mach</independentVar>
              <tableData>
                       0.150     0.400     0.700     0.900     1.100     1.400     2.000
          -0.17453  -0.00006  -0.00006  -0.00006  -0.00005  -0.00010  -0.00019  -0.00023
          -0.15708  -0.00308  -0.00303  -0.00286  -0.00257  -0.00505  -0.00954  -0.01154
          -0.13963  -0.00501  -0.00492  -0.00465  -0.00418  -0.00820  -0.01550  -0.01875
          -0.12217  -0.00466  -0.00458  -0.00433  -0.00389  -0.00764  -0.01443  -0.01747
          -0.10472  -0.00402  -0.00395  -0.00373  -0.00335  -0.00659  -0.01244  -0.01506
          -0.08727  -0.00111  -0.00110  -0.00103  -0.00093  -0.00183  -0.00345  -0.00418
          -0.06981   0.00120   0.00118   0.00111   0.00100   0.00196   0.00370   0.00448
          -0.05236   0.00068   0.00067   0.00063   0.00057   0.00111   0.00210   0.00254
          -0.03491   0.00047   0.00046   0.00044   0.00039   0.00077   0.00146   0.00177
          -0.01745   0.00074   0.00072   0.00068   0.00061   0.00121   0.00228   0.00276
           0.00000   0.00087   0.00085   0.00081   0.00072   0.00142   0.00269   0.00325
           0.01745   0.00099   0.00097   0.00092   0.00082   0.00162   0.00306   0.00370
           0.03491   0.00122   0.00120   0.00113   0.00102   0.00200   0.00377   0.00457
           0.05236   0.00154   0.00152   0.00143   0.00129   0.00253   0.00477   0.00578
           0.06981   0.00194   0.00191   0.00180   0.00162   0.00318   0.00600   0.00726
           0.08727   0.00239   0.00235   0.00222   0.00200   0.00392   0.00741   0.00896
           0.10472   0.00287   0.00282   0.00266   0.00239   0.00470   0.00888   0.01075
           0.12217   0.00333   0.00327   0.00309   0.00278   0.00545   0.01030   0.01247
           0.13963   0.00370   0.00364   0.00344   0.00309   0.00607   0.01147   0.01388
           0.15708   0.00386   0.00379   0.00358   0.00322   0.00632   0.01194   0.01445
           0.17453   0.00364   0.00358   0.00338   0.00304   0.00597   0.01127   0.01364
           0.19199   0.00296   0.00291   0.00275   0.00247   0.00485   0.00915   0.01108
           0.20944   0.00186   0.00183   0.00173   0.00155   0.00305   0.00575   0.00696
           0.22689   0.00036   0.00035   0.00033   0.00030   0.00058   0.00110   0.00133
           0.24435  -0.00126  -0.00124  -0.00117  -0.00105  -0.00207  -0.00390  -0.00472
           0.26180  -0.00264  -0.00260  -0.00245  -0.00220  -0.00433  -0.00818  -0.00990
           0.27925  -0.00338  -0.00332  -0.00313  -0.00281  -0.00553  -0.01045  -0.01264
           0.29671  -0.00327  -0.00322  -0.00304  -0.00273  -0.00536  -0.01013  -0.01226
           0.31416  -0.00237  -0.00233  -0.00220  -0.00198  -0.00389  -0.00735  -0.00890
           0.33161  -0.00086  -0.00085  -0.00080  -0.00072  -0.00142  -0.00267  -0.00324
           0.34907   0.00077   0.00075   0.00071   0.00064   0.00126   0.00237   0.00287
           0.36652   0.00199   0.00196   0.00185   0.00166   0.00327   0.00617   0.00747
           0.38397   0.00246   0.00242   0.00228   0.00205   0.00403   0.00761   0.00921
           0.40143   0.00210   0.00206   0.00195   0.00175   0.00344   0.00650   0.00787
           0.41888   0.00120   0.00118   0.00112   0.00100   0.00197   0.00372   0.00451
           0.43633   0.00006   0.00005   0.00005   0.00005   0.00009   0.00017   0.00021
           0.45379  -0.00111  -0.00109  -0.00103  -0.00092  -0.00182  -0.00343  -0.00415
           0.47124  -0.00240  -0.00236  -0.00223  -0.00200  -0.00394  -0.00744  -0.00900
           0.48869  -0.00399  -0.00393  -0.00371  -0.00333  -0.00655  -0.01236  -0.01496
           0.50615  -0.00568  -0.00559  -0.00528  -0.00474  -0.00932  -0.01760  -0.02129
              </tableData>
            </table>
          </function>
        </fcs_function>
        <!-- the gravity reference: the load factor that holds the flight path -->
        <fcs_function name="fcs/fbw/g-ref">
          <function>
            <product>
              <cos><property>attitude/theta-rad</property></cos>
              <cos><property>attitude/phi-rad</property></cos>
            </product>
          </function>
        </fcs_function>
        <!-- stick to load factor beyond the gravity reference, aft (negative) to n_max,
             no more than the lift at the angle-of-attack limits gives - beyond the
             gravity reference of the moment, so that full aft stick still reaches
             the limit in a steep climb or inverted - through a 0.2 s prefilter and
             a 12 g/s onset limit (a full pull at once pitches an agile airframe
             faster than its nose-down control can stop at the angle-of-attack
             limit) -->
        <fcs_function name="fcs/fbw/dn-stick">
          <function>
            <max>
              <min>
                <table>
                  <independentVar lookup="row">fcs/pitch-trim-sum</independentVar>
                  <tableData>
                    -1.0  8.000
                     0.0  0.0
                     1.0  -4.600
                  </tableData>
                </table>
                <difference><product><property>fcs/fbw/n-alpha</property><value>0.50615</value></product><property>fcs/fbw/g-ref</property></difference>
              </min>
              <difference><product><property>fcs/fbw/n-alpha</property><value>-0.17453</value></product><property>fcs/fbw/g-ref</property></difference>
            </max>
          </function>
        </fcs_function>
        <lag_filter name="fcs/fbw/dn-lag">
          <input>fcs/fbw/dn-stick</input>
          <c1>5.0</c1>
        </lag_filter>
        <actuator name="fcs/fbw/dn-cmd">
          <input>fcs/fbw/dn-lag</input>
          <rate_limit>12.0</rate_limit>
        </actuator>
        <!-- the response the command should produce (the short period's rise): the
             integrator trims away what differs from it, not the rise itself -->
        <lag_filter name="fcs/fbw/dn-model">
          <input>fcs/fbw/dn-cmd</input>
          <c1>2.5</c1>
        </lag_filter>
        <fcs_function name="fcs/fbw/dn">
          <function>
            <difference><property>accelerations/Nz</property><property>fcs/fbw/g-ref</property></difference>
          </function>
        </fcs_function>
        <!-- the angle of attack with its rise over the next 0.35 s counted as spent
             (the rise, not the pitch rate: in a steady pull the nose turns with the
             flight path and the angle of attack holds), and the load factor the
             angle of attack left to each limit gives -->
        <fcs_function name="fcs/fbw/alpha-ahead">
          <function>
            <sum>
              <property>aero/alpha-rad</property>
              <product><value>0.35</value><property>aero/alphadot-rad_sec</property></product>
            </sum>
          </function>
        </fcs_function>
        <fcs_function name="fcs/fbw/dn-room-up">
          <function>
            <product><property>fcs/fbw/n-alpha</property>
              <difference><value>0.50615</value><property>fcs/fbw/alpha-ahead</property></difference></product>
          </function>
        </fcs_function>
        <fcs_function name="fcs/fbw/dn-room-down">
          <function>
            <product><property>fcs/fbw/n-alpha</property>
              <difference><value>-0.17453</value><property>fcs/fbw/alpha-ahead</property></difference></product>
          </function>
        </fcs_function>
        <!-- the command limited to the load factor the aircraft pulls now plus what
             the angle of attack left gives: at a limit the feedforward asks for the
             load factor the airframe gives there, whatever elevator holds it - a
             steady pull on a stable airframe, a push on an unstable one (a
             feedforward faded out past the limit instead took about 10 deg of
             elevator per deg of alpha, on one side of it only: the actuator's rate
             limit could not follow, and the MiG-29A cycled between 24 and 29 deg) -->
        <fcs_function name="fcs/fbw/dn-limited">
          <function>
            <max>
              <min>
                <property>fcs/fbw/dn-cmd</property>
                <sum><property>fcs/fbw/dn</property><property>fcs/fbw/dn-room-up</property></sum>
              </min>
              <sum><property>fcs/fbw/dn</property><property>fcs/fbw/dn-room-down</property></sum>
            </max>
          </function>
        </fcs_function>
        <!-- the integrator's error: the load factor's departure from the model
             response, and at a limit the angle of attack left, counted five times -
             it trims what the airframe needs there beyond the linear design (vortex
             lift, the tail's power at high alpha) in a fraction of a second, not
             over the pull -->
        <fcs_function name="fcs/fbw/pitch-error">
          <function>
            <max>
              <min>
                <difference><property>fcs/fbw/dn-model</property><property>fcs/fbw/dn</property></difference>
                <product><value>5.0</value><property>fcs/fbw/dn-room-up</property></product>
              </min>
              <product><value>5.0</value><property>fcs/fbw/dn-room-down</property></product>
            </max>
          </function>
        </fcs_function>
        <fcs_function name="fcs/fbw/pitch-error-rate">
          <function><product><property>fcs/fbw/k-i</property><property>fcs/fbw/pitch-error</property></product></function>
        </fcs_function>
        <!-- the integrator: reset below 60 kt and on the wheels, held while the
             elevator is at a stop it would push further into (anti-windup) -->
        <switch name="fcs/fbw/pitch-hold">
          <default value="0"/>
          <test logic="OR" value="-1">
            velocities/vc-kts lt 60
            gear/wow gt 0
          </test>
          <test logic="AND" value="1">
            fcs/fbw/elevator-raw gt 0.87266
            fcs/fbw/pitch-error-rate gt 0
          </test>
          <test logic="AND" value="1">
            fcs/fbw/elevator-raw lt -0.43633
            fcs/fbw/pitch-error-rate lt 0
          </test>
        </switch>
        <integrator name="fcs/fbw/pitch-integral">
          <input>fcs/fbw/pitch-error-rate</input>
          <c1>1.0</c1>
          <trigger>fcs/fbw/pitch-hold</trigger>
          <clipto> <min>-0.5</min> <max>0.5</max> </clipto>
        </integrator>
        <!-- past an angle-of-attack limit (the next 0.35 s counted) a push back
             in proportion, all the travel 4 deg beyond: an unstable airframe
             pitching up fast needs it at once, not when an integrator winds -->
        <fcs_function name="fcs/fbw/alpha-push">
          <function>
            <difference>
              <product><value>12.50000</value>
                <max><value>0</value><difference><property>fcs/fbw/alpha-ahead</property><value>0.50615</value></difference></max></product>
              <product><value>6.25000</value>
                <max><value>0</value><difference><value>-0.17453</value><property>fcs/fbw/alpha-ahead</property></difference></max></product>
            </difference>
          </function>
        </fcs_function>
        <lag_filter name="fcs/fbw/ground">
          <input>gear/wow</input>
          <c1>2.0</c1>
        </lag_filter>
        <fcs_function name="fcs/fbw/ground-direct">
          <function>
            <product>
              <property>fcs/fbw/ground</property>
              <table>
                <independentVar lookup="row">fcs/pitch-trim-sum</independentVar>
                <tableData>
                  -1.0  -0.43633
                   0.0  0.0
                   1.0  0.87266
                </tableData>
              </table>
            </product>
          </function>
        </fcs_function>
        <!-- the elevator: the push, the moment compensation, angle-of-attack and
             pitch-rate feedback, the feedforward of the limited command, the
             integrator, the ground mode's direct stick -->
        <fcs_function name="fcs/fbw/elevator-raw">
          <function>
            <sum>
              <property>fcs/fbw/alpha-push</property>
              <property>fcs/fbw/moment-comp</property>
              <product><value>-1</value><property>fcs/fbw/k-alpha</property><property>aero/alpha-rad</property></product>
              <product><value>-1</value><property>fcs/fbw/k-q</property><property>velocities/q-rad_sec</property></product>
              <product><property>fcs/fbw/k-ff</property><property>fcs/fbw/dn-limited</property></product>
              <property>fcs/fbw/pitch-integral</property>
              <property>fcs/fbw/ground-direct</property>
            </sum>
          </function>
        </fcs_function>
        <pure_gain name="fcs/fbw/elevator">
          <input>fcs/fbw/elevator-raw</input>
          <gain>1.0</gain>
          <clipto> <min>-0.43633</min> <max>0.87266</max> </clipto>
        </pure_gain>
        <!-- full travel in 0.83 s: 60 deg/s for a +-25 deg tail, faster for a
             canard's longer throw -->
        <actuator name="fcs/elevator-actuator">
          <input>fcs/fbw/elevator</input>
          <lag>40</lag>
          <rate_limit>1.577</rate_limit>
          <output>fcs/elevator-pos-rad</output>
        </actuator>
      </channel>
      <channel name="Roll (fly-by-wire)">
        <!-- hangar: roll-rate command about the flight path, limited to what the rudder can
             coordinate; bank hold at neutral stick -->
        <summer name="fcs/roll-trim-sum">
          <input>fcs/aileron-cmd-norm</input>
          <input>fcs/roll-trim-cmd-norm</input>
          <clipto> <min>-1</min> <max>1</max> </clipto>
        </summer>
        <fcs_function name="fcs/fbw/k-roll">
          <function>
            <table>
              <independentVar lookup="row">aero/qbar-psf</independentVar>
              <independentVar lookup="column">velocities/mach</independentVar>
              <tableData>
                       0.150     0.400     0.700     0.900     1.100     1.400     2.000
              10.0   1.50000   1.50000   1.50000   1.50000   1.50000   1.50000   1.50000
              20.0   1.50000   1.50000   1.50000   1.32863   1.50000   1.50000   1.50000
              40.0   0.72125   0.80338   0.75693   0.65152   1.28272   1.50000   1.50000
              80.0   0.18946   0.26420   0.25929   0.22493   0.44895   0.87312   1.31725
             150.0   0.04255   0.11780   0.12472   0.11009   0.22266   0.44484   0.56272
             300.0   0.00000   0.03949   0.05130   0.04690   0.09891   0.20649   0.26654
             600.0   0.00000   0.00000   0.01413   0.01508   0.03676   0.08822   0.12322
            1200.0   0.00000   0.00000   0.00000   0.00000   0.00570   0.02910   0.05159
            2400.0   0.00000   0.00000   0.00000   0.00000   0.00000   0.00000   0.01582
              </tableData>
            </table>
          </function>
        </fcs_function>
        <fcs_function name="fcs/fbw/k-roll-ff">
          <function>
            <table>
              <independentVar lookup="row">aero/qbar-psf</independentVar>
              <independentVar lookup="column">velocities/mach</independentVar>
              <tableData>
                       0.150     0.400     0.700     0.900     1.100     1.400     2.000
              10.0   0.17085   0.06356   0.03528   0.02559   0.03877   0.04583   0.03049
              20.0   0.17085   0.06356   0.03528   0.02559   0.03877   0.04583   0.03049
              40.0   0.17085   0.06356   0.03528   0.02559   0.03877   0.04583   0.03049
              80.0   0.13425   0.05077   0.02914   0.02145   0.03241   0.03043   0.02062
             150.0   0.12715   0.04701   0.02563   0.01819   0.02790   0.03543   0.02528
             300.0   0.11380   0.04231   0.02343   0.01695   0.02573   0.03076   0.02099
             600.0   0.11227   0.04176   0.02317   0.01680   0.02546   0.03016   0.02012
            1200.0   0.11195   0.04165   0.02311   0.01676   0.02540   0.03004   0.02000
            2400.0   0.11184   0.04161   0.02309   0.01675   0.02538   0.03001   0.01997
              </tableData>
            </table>
          </function>
        </fcs_function>
        <fcs_function name="fcs/fbw/k-roll-i">
          <function>
            <table>
              <independentVar lookup="row">aero/qbar-psf</independentVar>
              <independentVar lookup="column">velocities/mach</independentVar>
              <tableData>
                       0.150     0.400     0.700     0.900     1.100     1.400     2.000
              10.0   0.31719   0.30825   0.28167   0.24075   0.46986   0.89356   1.00000
              20.0   0.15859   0.15412   0.14084   0.12037   0.23493   0.44678   0.54070
              40.0   0.07930   0.07706   0.07042   0.06019   0.11747   0.22339   0.27035
              80.0   0.02877   0.02800   0.02564   0.02190   0.04279   0.08031   0.11892
             150.0   0.01508   0.01465   0.01336   0.01140   0.02227   0.04269   0.05227
             300.0   0.00748   0.00727   0.00664   0.00568   0.01108   0.02109   0.02556
             600.0   0.00373   0.00363   0.00332   0.00283   0.00553   0.01052   0.01274
            1200.0   0.00187   0.00181   0.00166   0.00142   0.00276   0.00526   0.00636
            2400.0   0.00093   0.00091   0.00083   0.00071   0.00138   0.00263   0.00318
              </tableData>
            </table>
          </function>
        </fcs_function>
        <fcs_function name="fcs/fbw/p-max">
          <function>
            <table>
              <independentVar lookup="row">aero/qbar-psf</independentVar>
              <independentVar lookup="column">velocities/mach</independentVar>
              <tableData>
                       0.150     0.400     0.700     0.900     1.100     1.400     2.000
              10.0   2.04314   4.71239   4.71239   4.71239   4.71239   4.71239   4.71239
              20.0   2.04314   4.71239   4.71239   4.71239   4.71239   4.71239   4.71239
              40.0   2.04314   4.71239   4.71239   4.71239   4.71239   4.71239   4.71239
              80.0   2.60007   4.71239   4.71239   4.71239   4.71239   4.71239   4.71239
             150.0   2.74541   4.71239   4.71239   4.71239   4.71239   4.71239   4.71239
             300.0   3.06747   4.71239   4.71239   4.71239   4.71239   4.71239   4.71239
             600.0   3.10921   4.71239   4.71239   4.71239   4.71239   4.71239   4.71239
            1200.0   3.11799   4.71239   4.71239   4.71239   4.71239   4.71239   4.71239
            2400.0   3.12119   4.71239   4.71239   4.71239   4.71239   4.71239   4.71239
              </tableData>
            </table>
          </function>
        </fcs_function>
        <!-- the stick's rate halves towards alpha_max -->
        <fcs_function name="fcs/fbw/p-stick">
          <function>
            <product>
              <property>fcs/roll-trim-sum</property>
              <property>fcs/fbw/p-max</property>
              <table>
                <independentVar lookup="row">aero/alpha-rad</independentVar>
                <tableData>
                  0.20246 1.0
                  0.50615 0.5
                </tableData>
              </table>
            </product>
          </function>
        </fcs_function>
        <!-- the rudder's yaw acceleration at full travel (1/s^2), and the yaw damping (1/s) -->
        <fcs_function name="fcs/fbw/yaw-accel">
          <function>
            <table>
              <independentVar lookup="row">aero/qbar-psf</independentVar>
              <independentVar lookup="column">velocities/mach</independentVar>
              <tableData>
                       0.150     0.400     0.700     0.900     1.100     1.400     2.000
              10.0   0.04543   0.04616   0.04844   0.05202   0.03046   0.01938   0.02290
              20.0   0.09086   0.09232   0.09687   0.10404   0.06093   0.03877   0.04580
              40.0   0.18171   0.18465   0.19374   0.20807   0.12186   0.07753   0.09159
              80.0   0.44847   0.45718   0.48390   0.52517   0.30574   0.18708   0.20086
             150.0   0.88854   0.90366   0.95049   1.02381   0.59862   0.37693   0.43777
             300.0   1.80676   1.83628   1.92786   2.07199   1.21294   0.76969   0.90532
             600.0   3.62877   3.68749   3.86969   4.15656   2.43408   1.54760   1.82627
            1200.0   7.26525   7.38258   7.74660   8.31981   4.87244   3.09946   3.66041
            2400.0  14.53380  14.76840  15.49641  16.64278   9.74682   6.20096   7.32514
              </tableData>
            </table>
          </function>
        </fcs_function>
        <fcs_function name="fcs/fbw/yaw-damping">
          <function>
            <table>
              <independentVar lookup="row">aero/qbar-psf</independentVar>
              <independentVar lookup="column">velocities/mach</independentVar>
              <tableData>
                       0.150     0.400     0.700     0.900     1.100     1.400     2.000
              10.0   0.02333   0.00893   0.00543   0.00460   0.00357   0.00222   0.00122
              20.0   0.04667   0.01787   0.01085   0.00921   0.00715   0.00444   0.00244
              40.0   0.09334   0.03573   0.02170   0.01842   0.01430   0.00889   0.00489
              80.0   0.19498   0.07480   0.04568   0.03901   0.03019   0.01833   0.00969
             150.0   0.38008   0.14555   0.08847   0.07509   0.05833   0.03603   0.01952
             300.0   0.75304   0.28813   0.17472   0.14796   0.11503   0.07191   0.03975
             600.0   1.48573   0.56865   0.34512   0.29261   0.22732   0.14173   0.07822
            1200.0   2.95350   1.13064   0.68658   0.58256   0.45239   0.28147   0.15499
            2400.0   5.90041   2.25884   1.37177   1.16404   0.90388   0.56197   0.30897
              </tableData>
            </table>
          </function>
        </fcs_function>
        <!-- the rudder's share of the yaw a roll about the flight path needs, per unit of
             its roll acceleration: sin(alpha), less the ailerons' own yaw and what a
             principal axis inclined to the body axis gives -->
        <fcs_function name="fcs/fbw/roll-yaw-share">
          <function>
            <table>
              <independentVar lookup="row">aero/alpha-rad</independentVar>
              <tableData>
                   -0.34907  -0.36048
                   -0.26180  -0.28831
                   -0.17453  -0.21276
                   -0.08727  -0.13057
                    0.00000  -0.03825
                    0.08727   0.05437
                    0.17453   0.13640
                    0.26180   0.20519
                    0.34907   0.27129
                    0.43633   0.33719
                    0.52360   0.41031
                    0.61087   0.48643
                    0.69813   0.56104
                    0.78540   0.63147
                    0.87266   0.67978
              </tableData>
            </table>
          </function>
        </fcs_function>
        <!-- the yaw acceleration each rad/s of roll rate needs while the aircraft pitches
             under it: the pitch rate's inertia coupling, the angle of attack rising, and
             the yaw damping the roll's yaw rate meets -->
        <fcs_function name="fcs/fbw/p-yaw-need">
          <function>
            <abs>
              <sum>
                <product>
                  <sum>
                    <property>aero/alphadot-rad_sec</property>
                    <product><value>0.60508</value><property>velocities/q-rad_sec</property></product>
                  </sum>
                  <cos><property>aero/alpha-rad</property></cos>
                </product>
                <product><property>fcs/fbw/yaw-damping</property><sin><property>aero/alpha-rad</property></sin></product>
              </sum>
            </abs>
          </function>
        </fcs_function>
        <!-- no more roll rate than 0.5 of the rudder's yaw holds: a roll the rudder cannot
             follow turns the angle of attack into sideslip -->
        <fcs_function name="fcs/fbw/p-yaw-max">
          <function>
            <quotient>
              <product><value>0.5</value><property>fcs/fbw/yaw-accel</property></product>
              <max><value>0.001</value><property>fcs/fbw/p-yaw-need</property></max>
            </quotient>
          </function>
        </fcs_function>
        <fcs_function name="fcs/fbw/p-limited">
          <function>
            <max>
              <min><property>fcs/fbw/p-stick</property><property>fcs/fbw/p-yaw-max</property></min>
              <product><value>-1</value><property>fcs/fbw/p-yaw-max</property></product>
            </max>
          </function>
        </fcs_function>
        <!-- and while the rate grows, no faster roll acceleration than all of it
             coordinates, unless the roll asked for could not leave 2.0 deg of sideslip
             even uncoordinated: at worst c^2 p^2 / (8 Y), c the rudder's share, Y its yaw
             acceleration, p the rate asked for -->
        <fcs_function name="fcs/fbw/p-accel">
          <function>
            <product>
              <quotient>
                <property>fcs/fbw/yaw-accel</property>
                <max><value>0.01</value><abs><property>fcs/fbw/roll-yaw-share</property></abs></max>
              </quotient>
              <max>
                <value>1</value>
                <quotient>
                  <product><value>0.27925</value><property>fcs/fbw/yaw-accel</property></product>
                  <sum>
                    <value>1e-9</value>
                    <product>
                      <property>fcs/fbw/roll-yaw-share</property><property>fcs/fbw/roll-yaw-share</property>
                      <property>fcs/fbw/p-limited</property><property>fcs/fbw/p-limited</property>
                    </product>
                  </sum>
                </quotient>
              </max>
            </product>
          </function>
        </fcs_function>
        <!-- a roll is stopped as fast as the ailerons can -->
        <fcs_function name="fcs/fbw/p-accel-up">
          <function>
            <sum><property>fcs/fbw/p-accel</property>
              <product><value>1000</value><lt><property>fcs/fbw/p-cmd</property><value>0</value></lt></product></sum>
          </function>
        </fcs_function>
        <fcs_function name="fcs/fbw/p-accel-down">
          <function>
            <sum><property>fcs/fbw/p-accel</property>
              <product><value>1000</value><gt><property>fcs/fbw/p-cmd</property><value>0</value></gt></product></sum>
          </function>
        </fcs_function>
        <actuator name="fcs/fbw/p-cmd">
          <input>fcs/fbw/p-limited</input>
          <rate_limit sense="incr">fcs/fbw/p-accel-up</rate_limit>
          <rate_limit sense="decr">fcs/fbw/p-accel-down</rate_limit>
        </actuator>
        <fcs_function name="fcs/fbw/p-stability">
          <function>
            <sum>
              <product><property>velocities/p-rad_sec</property><cos><property>aero/alpha-rad</property></cos></product>
              <product><property>velocities/r-rad_sec</property><sin><property>aero/alpha-rad</property></sin></product>
            </sum>
          </function>
        </fcs_function>
        <fcs_function name="fcs/fbw/roll-error-rate">
          <function>
            <product><property>fcs/fbw/k-roll-i</property>
              <difference><property>fcs/fbw/p-cmd</property><property>fcs/fbw/p-stability</property></difference></product>
          </function>
        </fcs_function>
        <integrator name="fcs/fbw/roll-integral">
          <input>fcs/fbw/roll-error-rate</input>
          <c1>1.0</c1>
          <trigger>fcs/fbw/reset</trigger>
          <clipto> <min>-0.21817</min> <max>0.21817</max> </clipto>
        </integrator>
        <fcs_function name="fcs/fbw/aileron">
          <function>
            <sum>
              <product><property>fcs/fbw/k-roll-ff</property><property>fcs/fbw/p-cmd</property></product>
              <product><property>fcs/fbw/k-roll</property>
                <difference><property>fcs/fbw/p-cmd</property><property>fcs/fbw/p-stability</property></difference></product>
              <property>fcs/fbw/roll-integral</property>
            </sum>
          </function>
          <clipto> <min>-0.43633</min> <max>0.43633</max> </clipto>
        </fcs_function>
        <actuator name="fcs/left-aileron-actuator">
          <input>fcs/fbw/aileron</input>
          <lag>40</lag>
          <rate_limit>1.4</rate_limit>
          <output>fcs/left-aileron-pos-rad</output>
        </actuator>
        <pure_gain name="fcs/right-aileron">
          <input>fcs/left-aileron-pos-rad</input>
          <gain>-1</gain>
          <output>fcs/right-aileron-pos-rad</output>
        </pure_gain>
      </channel>
      <channel name="Yaw (fly-by-wire)">
        <!-- hangar: yaw damper, sideslip feedback, pedals command sideslip -->
        <summer name="fcs/yaw-trim-sum">
          <input>fcs/rudder-cmd-norm</input>
          <input>fcs/yaw-trim-cmd-norm</input>
          <clipto> <min>-1</min> <max>1</max> </clipto>
        </summer>
        <fcs_function name="fcs/fbw/k-yaw-r">
          <function>
            <table>
              <independentVar lookup="row">aero/qbar-psf</independentVar>
              <independentVar lookup="column">velocities/mach</independentVar>
              <tableData>
                       0.150     0.400     0.700     0.900     1.100     1.400     2.000
              10.0  -3.00000  -3.00000  -3.00000  -3.00000  -3.00000  -3.00000  -3.00000
              20.0  -3.00000  -3.00000  -3.00000  -3.00000  -3.00000  -3.00000  -3.00000
              40.0  -3.00000  -3.00000  -3.00000  -3.00000  -3.00000  -3.00000  -3.00000
              80.0  -1.49151  -1.61947  -1.56526  -1.44928  -2.50811  -3.00000  -3.00000
             150.0  -0.59433  -0.76021  -0.76358  -0.71804  -1.24679  -2.01974  -1.76254
             300.0  -0.14376  -0.31843  -0.34472  -0.33020  -0.58250  -0.95555  -0.83366
             600.0   0.00000  -0.10445  -0.14070  -0.14041  -0.25808  -0.44310  -0.39619
            1200.0   0.00000  -0.00303  -0.04527  -0.05318  -0.10583  -0.18922  -0.19477
            2400.0   0.00000   0.00000  -0.01382  -0.02353  -0.05605  -0.11051  -0.12686
              </tableData>
            </table>
          </function>
        </fcs_function>
        <fcs_function name="fcs/fbw/k-yaw-beta">
          <function>
            <table>
              <independentVar lookup="row">aero/qbar-psf</independentVar>
              <independentVar lookup="column">velocities/mach</independentVar>
              <tableData>
                       0.150     0.400     0.700     0.900     1.100     1.400     2.000
              10.0   3.00000   3.00000   3.00000   3.00000   3.00000   3.00000   3.00000
              20.0   3.00000   3.00000   3.00000   3.00000   3.00000   3.00000   3.00000
              40.0   0.82704   0.76149   0.57984   0.36059   0.96081   3.00000   1.18612
              80.0   0.87898   0.88961   0.92800   0.98978   1.59896   2.25985   0.00000
             150.0   0.72374   0.72529   0.72504   0.71628   1.19574   1.61349   0.37885
             300.0   0.39973   0.39517   0.38089   0.35919   0.61568   0.95188   0.53934
             600.0   0.14023   0.13706   0.12779   0.11525   0.20588   0.37160   0.22165
            1200.0   0.00000   0.00000   0.00000   0.00000   0.00000   0.01737   0.00000
            2400.0   0.00000   0.00000   0.00000   0.00000   0.00000   0.00000   0.00000
              </tableData>
            </table>
          </function>
        </fcs_function>
        <fcs_function name="fcs/fbw/k-pedal">
          <function>
            <table>
              <independentVar lookup="row">aero/qbar-psf</independentVar>
              <independentVar lookup="column">velocities/mach</independentVar>
              <tableData>
                       0.150     0.400     0.700     0.900     1.100     1.400     2.000
              10.0   0.00000   0.00000   0.00000   0.00000   0.00000   0.00000   0.00000
              20.0   0.00000   0.00000   0.00000   0.00000   0.00000   0.00000   0.00000
              40.0   0.00000   0.00000   0.00000   0.00000   0.00000   0.00000   0.00000
              80.0   0.00000   0.00000   0.00000   0.00000   0.00000   0.00000   0.00000
             150.0   0.00298   0.00379   0.00602   0.00866   0.01150   0.00000   0.00000
             300.0   0.02147   0.02164   0.02204   0.02232   0.03561   0.04012   0.02908
             600.0   0.02835   0.02826   0.02792   0.02724   0.04442   0.05692   0.05296
            1200.0   0.03066   0.03047   0.02988   0.02885   0.04733   0.06269   0.06122
            2400.0   0.03105   0.03085   0.03023   0.02916   0.04787   0.06400   0.06375
              </tableData>
            </table>
          </function>
        </fcs_function>
        <!-- the yaw damper damps the sideslip's rate, the stability-axis yaw rate less
             the one that coordinates the bank and the side force: in the dutch roll the
             yaw rate itself, and zero in a steady coordinated turn, in a roll about the
             flight path and in a steady sideslip - it coordinates those as long as they
             last (a damper on the washed-out yaw rate stopped coordinating a sustained
             roll, and at low speed the roll turned the angle of attack into sideslip) -->
        <!-- on the wheels (the pitch's ground mode, fcs/fbw/ground) the pedals move the rudder
             directly over its travel, a ground law: the sideslip feedback, there the
             crosswind's, turned the nose into it, and as the C-17A's nose wheel unloaded
             towards its rotation it ran 8.6 m off its line across 10 m/s -->
        <fcs_function name="fcs/fbw/rudder">
          <function>
            <sum>
              <product>
                <difference><value>1</value><property>fcs/fbw/ground</property></difference>
                <sum>
                  <product><property>fcs/fbw/k-pedal</property><property>fcs/yaw-trim-sum</property></product>
                  <product><value>-1</value><property>fcs/fbw/k-yaw-beta</property>
                    <difference><property>aero/beta-rad</property>
                      <product><value>0.17453</value><property>fcs/yaw-trim-sum</property></product></difference></product>
                  <product><property>fcs/fbw/k-yaw-r</property><property>aero/betadot-rad_sec</property></product>
                </sum>
              </product>
              <product><property>fcs/fbw/ground</property><value>0.52360</value><property>fcs/yaw-trim-sum</property></product>
            </sum>
          </function>
          <clipto> <min>-0.52360</min> <max>0.52360</max> </clipto>
        </fcs_function>
        <actuator name="fcs/rudder-actuator">
          <input>fcs/fbw/rudder</input>
          <lag>40</lag>
          <rate_limit>1.4</rate_limit>
          <output>fcs/rudder-pos-rad</output>
        </actuator>
        <!-- the nose wheel steers with the pedals (JSBSim steers from fcs/steer-cmd-norm,
             positive right; the rudder command is positive left) -->
        <pure_gain name="fcs/steer-from-rudder">
          <input>fcs/yaw-trim-sum</input>
          <gain>-1</gain>
          <output>fcs/steer-cmd-norm</output>
        </pure_gain>
      </channel>
      <channel name="Speedbrake">
        <kinematic name="fcs/speedbrake-control">
          <input>fcs/speedbrake-cmd-norm</input>
          <traverse>
            <setting> <position>0</position> <time>0</time> </setting>
            <setting> <position>1</position> <time>2.00</time> </setting>
          </traverse>
          <output>fcs/speedbrake-pos-norm</output>
        </kinematic>
        <pure_gain name="fcs/speedbrake-elevator">
          <input>fcs/speedbrake-pos-norm</input>
          <gain>20</gain>
          <output>fcs/speedbrake-elevator-deg</output>
        </pure_gain>
      </channel>
      <channel name="Leading-Edge Flaps">
        <fcs_function name="fcs/lef-schedule">
          <function>
            <sum>
              <product> <value>1.38</value> <property>aero/alpha-deg</property> </product>
              <product> <value>-9.05</value>
                <quotient> <property>aero/qbar-psf</property> <property>atmosphere/P-psf</property> </quotient>
              </product>
              <value>1.45</value>
            </sum>
          </function>
          <clipto> <min>-2</min> <max>25</max> </clipto>
        </fcs_function>
        <actuator name="fcs/lef-actuator">
          <input>fcs/lef-schedule</input>
          <lag>7.35</lag>
          <rate_limit>25</rate_limit>
          <output>fcs/lef-pos-deg</output>
        </actuator>
      </channel>
      <channel name="Throttle 0">
        <fcs_function name="fcs/throttle-lever-0">
          <function>
            <table>
              <independentVar lookup="row">fcs/throttle-cmd-norm[0]</independentVar>
              <tableData>
                0.0  0.0
                0.8  1.0
                1.0  2.0
              </tableData>
            </table>
          </function>
          <output>fcs/throttle-pos-norm[0]</output>
        </fcs_function>
      </channel>
      <channel name="Throttle 1">
        <fcs_function name="fcs/throttle-lever-1">
          <function>
            <table>
              <independentVar lookup="row">fcs/throttle-cmd-norm[1]</independentVar>
              <tableData>
                0.0  0.0
                0.8  1.0
                1.0  2.0
              </tableData>
            </table>
          </function>
          <output>fcs/throttle-pos-norm[1]</output>
        </fcs_function>
      </channel>
      <channel name="Landing Gear">
        <kinematic name="fcs/gear-control">
          <input>gear/gear-cmd-norm</input>
          <traverse>
            <setting> <position>0</position> <time>0</time> </setting>
            <setting> <position>1</position> <time>5</time> </setting>
          </traverse>
          <output>gear/gear-pos-norm</output>
        </kinematic>
      </channel>
    </flight_control>
    <aerodynamics>
        <function name="aero/function/mach-lift">
          <description>lift, and damping, over its low-speed value (hangar: aero/mach.py)</description>
          <table>
            <independentVar lookup="row">velocities/mach</independentVar>
            <tableData>
                 0.000     1.000000
                 0.300     1.014192
                 0.500     1.042087
                 0.600     1.063728
                 0.700     1.092735
                 0.800     1.132720
                 0.850     1.159093
                 0.900     1.192291
                 0.950     1.191874
                 1.000     1.179861
                 1.050     1.158866
                 1.100     1.131500
                 1.200     1.068106
                 1.400     0.895114
                 1.600     0.926685
                 1.800     0.797071
                 2.000     0.702802
                 2.300     0.599950
                 2.600     0.525152
            </tableData>
          </table>
        </function>
        <function name="aero/function/mach-side">
          <description>side force, rolling and yawing moment over their low-speed values</description>
          <table>
            <independentVar lookup="row">velocities/mach</independentVar>
            <tableData>
                 0.000     1.000000
                 0.300     1.006486
                 0.500     1.018895
                 0.600     1.028216
                 0.700     1.040279
                 0.800     1.056019
                 0.850     1.065702
                 0.900     1.076699
                 0.950     1.072892
                 1.000     1.064268
                 1.050     1.051598
                 1.100     1.035649
                 1.200     0.996992
                 1.400     0.883626
                 1.600     0.798327
                 1.800     1.154564
                 2.000     1.043891
                 2.300     0.913201
                 2.600     0.812408
            </tableData>
          </table>
        </function>
        <function name="aero/function/mach-dCm-dCL">
          <description>pitching moment per unit low-speed lift: the neutral point's move</description>
          <table>
            <independentVar lookup="row">velocities/mach</independentVar>
            <tableData>
                 0.000     0.000000
                 0.300    -0.001596
                 0.500    -0.005078
                 0.600    -0.008103
                 0.700    -0.012610
                 0.800    -0.019644
                 0.850    -0.024737
                 0.900    -0.031446
                 0.950    -0.050823
                 1.000    -0.075963
                 1.050    -0.102740
                 1.100    -0.127328
                 1.200    -0.157336
                 1.400    -0.158794
                 1.600    -0.195436
                 1.800    -0.184201
                 2.000    -0.175682
                 2.300    -0.166105
                 2.600    -0.158977
            </tableData>
          </table>
        </function>
        <function name="aero/function/mach-dCD0">
          <description>zero-lift drag's change: friction and wave drag</description>
          <table>
            <independentVar lookup="row">velocities/mach</independentVar>
            <tableData>
                 0.000     0.000000
                 0.300    -0.000090
                 0.500    -0.000244
                 0.600    -0.000347
                 0.700    -0.000466
                 0.800    -0.000599
                 0.850    -0.000670
                 0.900    -0.000654
                 0.950    -0.000092
                 1.000     0.007379
                 1.050     0.033823
                 1.100     0.033739
                 1.200     0.033565
                 1.400     0.032067
                 1.600     0.031138
                 1.800     0.030315
                 2.000     0.029554
                 2.300     0.028498
                 2.600     0.027528
            </tableData>
          </table>
        </function>
        <function name="aero/function/mach-dK">
          <description>induced-drag factor's change (per CL^2)</description>
          <table>
            <independentVar lookup="row">velocities/mach</independentVar>
            <tableData>
                 0.000     0.000000
                 0.300     0.005387
                 0.500     0.015340
                 0.600     0.022529
                 0.700     0.031503
                 0.800     0.042761
                 0.850     0.049557
                 0.900     0.057480
                 0.950     0.057384
                 1.000     0.054592
                 1.050     0.052664
                 1.100     0.054948
                 1.200     0.072313
                 1.400     0.113517
                 1.600     0.118902
                 1.800     0.095564
                 2.000     0.061971
                 2.300    -0.006214
                 2.600    -0.094724
            </tableData>
          </table>
        </function>
        <function name="aero/function/mach-aileron">
          <description>aileron power over its low-speed value</description>
          <table>
            <independentVar lookup="row">velocities/mach</independentVar>
            <tableData>
                 0.000     1.000000
                 0.300     1.019200
                 0.500     1.058582
                 0.600     1.090852
                 0.700     1.136898
                 0.800     1.206802
                 0.850     1.258041
                 0.900     1.330154
                 0.950     1.241879
                 1.000     1.080366
                 1.050     0.881595
                 1.100     0.681547
                 1.200     0.421547
                 1.400     0.358379
                 1.600     0.389176
                 1.800     0.335412
                 2.000     0.296127
                 2.300     0.253118
                 2.600     0.221755
            </tableData>
          </table>
        </function>
        <function name="aero/function/mach-elevator">
          <description>elevator power over its low-speed value</description>
          <table>
            <independentVar lookup="row">velocities/mach</independentVar>
            <tableData>
                 0.000     1.000000
                 0.300     1.011427
                 0.500     1.035146
                 0.600     1.054827
                 0.700     1.083234
                 0.800     1.126978
                 0.850     1.159480
                 0.900     1.205919
                 0.950     1.119313
                 1.000     0.971044
                 1.050     0.792153
                 1.100     0.613683
                 1.200     0.382175
                 1.400     0.324907
                 1.600     0.352828
                 1.800     0.304085
                 2.000     0.268469
                 2.300     0.229477
                 2.600     0.201043
            </tableData>
          </table>
        </function>
        <function name="aero/function/mach-rudder">
          <description>rudder power over its low-speed value</description>
          <table>
            <independentVar lookup="row">velocities/mach</independentVar>
            <tableData>
                 0.000     1.000000
                 0.300     1.010899
                 0.500     1.032450
                 0.600     1.049290
                 0.700     1.072024
                 0.800     1.103639
                 0.850     1.124651
                 0.900     1.151309
                 0.950     1.078151
                 1.000     0.958746
                 1.050     0.816362
                 1.100     0.674269
                 1.200     0.484034
                 1.400     0.428995
                 1.600     0.387583
                 1.800     0.560534
                 2.000     0.506803
                 2.300     0.443354
                 2.600     0.394419
            </tableData>
          </table>
        </function>
        <function name="aero/function/CL-base">
          <description>CL over alpha and beta at low speed</description>
          <table>
            <independentVar lookup="row">aero/alpha-deg</independentVar>
            <independentVar lookup="column">aero/beta-deg</independentVar>
            <tableData>
                        -90.00    -70.00    -50.00    -40.00    -30.00    -25.00    -20.00    -15.00    -10.00     -6.00     -3.00      0.00      3.00      6.00     10.00     15.00     20.00     25.00     30.00     40.00     50.00     70.00     90.00
             -180.00  -0.00000   0.00000   0.00000   0.00000   0.00000   0.00000   0.00000   0.00000   0.00000   0.00000   0.00000   0.00000   0.00000   0.00000   0.00000   0.00000   0.00000   0.00000   0.00000   0.00000   0.00000   0.00000  -0.00000
             -120.00   0.00000   0.08072   0.25549   0.35606   0.45002   0.49102   0.52636   0.55499   0.57608   0.58774   0.59275   0.59326   0.59275   0.58774   0.57608   0.55499   0.52636   0.49102   0.45002   0.35606   0.25549   0.08072   0.00000
              -70.00  -0.00000  -0.06687  -0.21508  -0.30051  -0.38048  -0.41540  -0.44551  -0.46992  -0.48789  -0.49727  -0.50186  -0.50206  -0.50186  -0.49727  -0.48789  -0.46992  -0.44551  -0.41540  -0.38048  -0.30051  -0.21508  -0.06687  -0.00000
              -46.00  -0.00000  -0.23193  -0.62686  -0.84702  -1.04556  -1.12278  -1.19080  -1.25456  -1.30341  -1.32698  -1.33652  -1.33968  -1.33652  -1.32698  -1.30341  -1.25456  -1.19080  -1.12278  -1.04556  -0.84702  -0.62686  -0.23193  -0.00000
              -32.00  -0.00000  -0.33802  -0.63401  -0.85416  -1.06544  -1.15611  -1.22831  -1.28816  -1.32338  -1.34004  -1.34859  -1.35232  -1.34859  -1.34004  -1.32338  -1.28816  -1.22831  -1.15611  -1.06544  -0.85416  -0.63401  -0.33802  -0.00000
              -22.00  -0.00000  -0.27629  -0.49609  -0.67785  -0.85198  -0.92322  -0.97876  -1.03028  -1.06614  -1.08471  -1.09332  -1.09630  -1.09332  -1.08471  -1.06614  -1.03028  -0.97876  -0.92322  -0.85198  -0.67785  -0.49609  -0.27629  -0.00000
              -17.00  -0.00000  -0.22373  -0.39811  -0.55036  -0.69823  -0.75714  -0.80022  -0.83806  -0.86979  -0.88900  -0.89751  -0.90038  -0.89751  -0.88900  -0.86979  -0.83806  -0.80022  -0.75714  -0.69823  -0.55036  -0.39811  -0.22373  -0.00000
              -13.00  -0.00000  -0.17511  -0.31101  -0.43184  -0.55153  -0.59776  -0.63103  -0.65878  -0.68130  -0.69407  -0.69988  -0.70191  -0.69988  -0.69407  -0.68130  -0.65878  -0.63103  -0.59776  -0.55153  -0.43184  -0.31101  -0.17511  -0.00000
               -9.00  -0.00000  -0.12370  -0.21860  -0.30377  -0.38908  -0.41973  -0.44119  -0.45828  -0.47134  -0.47813  -0.48091  -0.48179  -0.48091  -0.47813  -0.47134  -0.45828  -0.44119  -0.41973  -0.38908  -0.30377  -0.21860  -0.12370  -0.00000
               -5.00  -0.00000  -0.07117  -0.12629  -0.17635  -0.22732  -0.24335  -0.25310  -0.26054  -0.26589  -0.26854  -0.26962  -0.26996  -0.26962  -0.26854  -0.26589  -0.26054  -0.25310  -0.24335  -0.22732  -0.17635  -0.12629  -0.07117  -0.00000
               -1.00  -0.00000  -0.01376  -0.02471  -0.04408  -0.06105  -0.06268  -0.05993  -0.05757  -0.05579  -0.05482  -0.05437  -0.05419  -0.05437  -0.05482  -0.05579  -0.05757  -0.05993  -0.06268  -0.06105  -0.04408  -0.02471  -0.01376  -0.00000
                3.00   0.00000   0.04792   0.07557   0.09002   0.10760   0.12053   0.13573   0.14819   0.15726   0.16189   0.16380   0.16442   0.16380   0.16189   0.15726   0.14819   0.13573   0.12053   0.10760   0.09002   0.07557   0.04792   0.00000
                7.00   0.00000   0.11174   0.17694   0.22344   0.27702   0.30613   0.33517   0.35800   0.37464   0.38320   0.38680   0.38799   0.38680   0.38320   0.37464   0.35800   0.33517   0.30613   0.27702   0.22344   0.17694   0.11174   0.00000
               11.00   0.00000   0.17228   0.27700   0.35767   0.44697   0.49184   0.53590   0.56962   0.59437   0.60728   0.61290   0.61481   0.61290   0.60728   0.59437   0.56962   0.53590   0.49184   0.44697   0.35767   0.27700   0.17228   0.00000
               15.00   0.00000   0.22916   0.37436   0.48742   0.61006   0.66945   0.72868   0.77216   0.80434   0.82165   0.82923   0.83176   0.82923   0.82165   0.80434   0.77216   0.72868   0.66945   0.61006   0.48742   0.37436   0.22916   0.00000
               19.00   0.00000   0.27713   0.46304   0.60427   0.75359   0.82614   0.89832   0.95031   0.98684   1.00592   1.01418   1.01695   1.01418   1.00592   0.98684   0.95031   0.89832   0.82614   0.75359   0.60427   0.46304   0.27713   0.00000
               23.00   0.00000   0.31574   0.53547   0.70710   0.88580   0.96852   1.04815   1.09993   1.13318   1.14758   1.15355   1.15558   1.15355   1.14758   1.13318   1.09993   1.04815   0.96852   0.88580   0.70710   0.53547   0.31574   0.00000
               27.00   0.00000   0.34477   0.59541   0.79415   1.00098   1.09134   1.16871   1.21558   1.24541   1.25815   1.26236   1.26310   1.26236   1.25815   1.24541   1.21558   1.16871   1.09134   1.00098   0.79415   0.59541   0.34477   0.00000
               32.00   0.00000   0.36953   0.65081   0.87310   1.09906   1.18717   1.25782   1.30133   1.33432   1.35519   1.36488   1.36811   1.36488   1.35519   1.33432   1.30133   1.25782   1.18717   1.09906   0.87310   0.65081   0.36953   0.00000
               46.00   0.00000   0.20938   0.64260   0.84153   1.02981   1.11600   1.19683   1.26220   1.31076   1.33438   1.34446   1.34776   1.34446   1.33438   1.31076   1.26220   1.19683   1.11600   1.02981   0.84153   0.64260   0.20938   0.00000
               70.00   0.00000   0.06695   0.21535   0.30089   0.38096   0.41592   0.44607   0.47051   0.48851   0.49789   0.50249   0.50269   0.50249   0.49789   0.48851   0.47051   0.44607   0.41592   0.38096   0.30089   0.21535   0.06695   0.00000
              120.00  -0.00000  -0.08072  -0.25549  -0.35606  -0.45002  -0.49102  -0.52636  -0.55499  -0.57608  -0.58774  -0.59275  -0.59326  -0.59275  -0.58774  -0.57608  -0.55499  -0.52636  -0.49102  -0.45002  -0.35606  -0.25549  -0.08072  -0.00000
              180.00   0.00000   0.00000   0.00000   0.00000   0.00000   0.00000   0.00000   0.00000   0.00000   0.00000   0.00000   0.00000   0.00000   0.00000   0.00000   0.00000   0.00000   0.00000   0.00000   0.00000   0.00000   0.00000   0.00000
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            </tableData>
          </table>
        </function>
      <axis name="DRAG">
        <function name="aero/coefficient/CD_base">
          <description>CD over alpha and beta (hangar)</description>
          <product>
            <property>aero/qbar-psf</property>
            <property>metrics/Sw-sqft</property>
          <table>
            <independentVar lookup="row">aero/alpha-deg</independentVar>
            <independentVar lookup="column">aero/beta-deg</independentVar>
            <tableData>
                        -90.00    -70.00    -50.00    -40.00    -30.00    -25.00    -20.00    -15.00    -10.00     -6.00     -3.00      0.00      3.00      6.00     10.00     15.00     20.00     25.00     30.00     40.00     50.00     70.00     90.00
             -180.00   0.22636   0.16611   0.08662   0.05499   0.03315   0.02599   0.02106   0.01803   0.01470   0.01521   0.01582   0.01604   0.01582   0.01521   0.01470   0.01803   0.02106   0.02599   0.03315   0.05499   0.08662   0.16611   0.22636
             -120.00   0.22636   0.23562   0.40161   0.55274   0.72352   0.80629   0.88152   0.94505   0.99330   1.01881   1.02990   1.03372   1.02990   1.01881   0.99330   0.94505   0.88152   0.80629   0.72352   0.55274   0.40161   0.23562   0.22636
              -70.00   0.22636   0.27560   0.52366   0.73018   0.95831   1.06777   1.16683   1.25028   1.31355   1.34719   1.36157   1.36648   1.36157   1.34719   1.31355   1.25028   1.16683   1.06777   0.95831   0.73018   0.52366   0.27560   0.22636
              -46.00   0.22636   0.29363   0.55811   0.75356   0.95944   1.04904   1.13092   1.20800   1.26770   1.29897   1.31208   1.31648   1.31208   1.29897   1.26770   1.20800   1.13092   1.04904   0.95944   0.75356   0.55811   0.29363   0.22636
              -32.00   0.22636   0.29519   0.39912   0.48965   0.60020   0.65351   0.69835   0.73823   0.76048   0.77113   0.77659   0.77896   0.77659   0.77113   0.76048   0.73823   0.69835   0.65351   0.60020   0.48965   0.39912   0.29519   0.22636
              -22.00   0.22636   0.26445   0.27273   0.29170   0.32686   0.34335   0.36041   0.37165   0.37942   0.38355   0.38561   0.38634   0.38561   0.38355   0.37942   0.37165   0.36041   0.34335   0.32686   0.29170   0.27273   0.26445   0.22636
              -17.00   0.22636   0.25060   0.22287   0.21384   0.21946   0.22280   0.22828   0.22798   0.22917   0.23087   0.23177   0.23208   0.23177   0.23087   0.22917   0.22798   0.22828   0.22280   0.21946   0.21384   0.22287   0.25060   0.22636
              -13.00   0.22636   0.24218   0.19274   0.16581   0.15282   0.14803   0.14697   0.14060   0.13642   0.13460   0.13395   0.13376   0.13395   0.13460   0.13642   0.14060   0.14697   0.14803   0.15282   0.16581   0.19274   0.24218   0.22636
               -9.00   0.22636   0.23596   0.17124   0.13117   0.10416   0.09328   0.08746   0.07711   0.06963   0.06581   0.06420   0.06365   0.06420   0.06581   0.06963   0.07711   0.08746   0.09328   0.10416   0.13117   0.17124   0.23596   0.22636
               -5.00   0.22636   0.23136   0.15766   0.11054   0.07632   0.06254   0.05448   0.04242   0.03361   0.02910   0.02722   0.02660   0.02722   0.02910   0.03361   0.04242   0.05448   0.06254   0.07632   0.11054   0.15766   0.23136   0.22636
               -1.00   0.22636   0.22904   0.15177   0.10188   0.06508   0.05343   0.04189   0.02952   0.02052   0.01595   0.01406   0.01344   0.01406   0.01595   0.02052   0.02952   0.04189   0.05343   0.06508   0.10188   0.15177   0.22904   0.22636
                3.00   0.22636   0.23012   0.15237   0.10257   0.06625   0.05527   0.04448   0.03286   0.02444   0.02016   0.01839   0.01781   0.01839   0.02016   0.02444   0.03286   0.04448   0.05527   0.06625   0.10257   0.15237   0.23012   0.22636
                7.00   0.22636   0.23458   0.15995   0.11343   0.08102   0.07233   0.06389   0.05421   0.04718   0.04361   0.04211   0.04162   0.04211   0.04361   0.04718   0.05421   0.06389   0.07233   0.08102   0.11343   0.15995   0.23458   0.22636
               11.00   0.22636   0.24127   0.17610   0.13743   0.11398   0.10994   0.10685   0.10134   0.09741   0.09544   0.09466   0.09441   0.09466   0.09544   0.09741   0.10134   0.10685   0.10994   0.11398   0.13743   0.17610   0.24127   0.22636
               15.00   0.22636   0.24986   0.20189   0.17665   0.16807   0.17187   0.17705   0.17794   0.17874   0.17937   0.17976   0.17989   0.17976   0.17937   0.17874   0.17794   0.17705   0.17187   0.16807   0.17665   0.20189   0.24986   0.22636
               19.00   0.22636   0.26109   0.23690   0.22999   0.24099   0.25523   0.27104   0.28035   0.28682   0.29032   0.29191   0.29244   0.29191   0.29032   0.28682   0.28035   0.27104   0.25523   0.24099   0.22999   0.23690   0.26109   0.22636
               23.00   0.22636   0.27423   0.27902   0.29689   0.33451   0.35889   0.38898   0.40584   0.41643   0.42072   0.42246   0.42305   0.42246   0.42072   0.41643   0.40584   0.38898   0.35889   0.33451   0.29689   0.27902   0.27423   0.22636
               27.00   0.22636   0.28823   0.32761   0.37603   0.44781   0.48645   0.52569   0.54808   0.56258   0.56882   0.57089   0.57123   0.57089   0.56882   0.56258   0.54808   0.52569   0.48645   0.44781   0.37603   0.32761   0.28823   0.22636
               32.00   0.22636   0.30618   0.39392   0.48467   0.60117   0.65386   0.70232   0.73254   0.75581   0.77052   0.77734   0.77963   0.77734   0.77052   0.75581   0.73254   0.70232   0.65386   0.60117   0.48467   0.39392   0.30618   0.22636
               46.00   0.22636   0.28812   0.55513   0.73548   0.93093   1.02869   1.12405   1.20449   1.26641   1.29785   1.31133   1.31584   1.31133   1.29785   1.26641   1.20449   1.12405   1.02869   0.93093   0.73548   0.55513   0.28812   0.22636
               70.00   0.22636   0.27560   0.52358   0.73014   0.95830   1.06776   1.16682   1.25028   1.31355   1.34719   1.36157   1.36648   1.36157   1.34719   1.31355   1.25028   1.16682   1.06776   0.95830   0.73014   0.52358   0.27560   0.22636
              120.00   0.22636   0.23562   0.40161   0.55274   0.72352   0.80629   0.88152   0.94505   0.99330   1.01881   1.02990   1.03372   1.02990   1.01881   0.99330   0.94505   0.88152   0.80629   0.72352   0.55274   0.40161   0.23562   0.22636
              180.00   0.22636   0.16611   0.08662   0.05499   0.03315   0.02599   0.02106   0.01803   0.01470   0.01521   0.01582   0.01604   0.01582   0.01521   0.01470   0.01803   0.02106   0.02599   0.03315   0.05499   0.08662   0.16611   0.22636
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            </tableData>
          </table>
          </product>
        </function>
        <function name="aero/coefficient/CD_mach">
          <description>zero-lift drag's change with Mach: friction, wave drag</description>
          <product>
            <property>aero/qbar-psf</property>
            <property>metrics/Sw-sqft</property>
            <property>aero/function/mach-dCD0</property>
          </product>
        </function>
        <function name="aero/coefficient/CD_induced_mach">
          <description>induced drag's change with Mach (leading-edge suction lost)</description>
          <product>
            <property>aero/qbar-psf</property>
            <property>metrics/Sw-sqft</property>
            <property>aero/cl-squared</property>
            <property>aero/function/mach-dK</property>
          </product>
        </function>
        <function name="aero/coefficient/CD_aileron">
          <description>CD increment from aileron (deg), over alpha</description>
          <product>
            <property>aero/qbar-psf</property>
            <property>metrics/Sw-sqft</property>
            <property>aero/function/mach-aileron</property>
          <table>
            <independentVar lookup="row">aero/alpha-deg</independentVar>
            <independentVar lookup="column">fcs/left-aileron-pos-deg</independentVar>
            <tableData>
                        -25.00    -20.00    -15.00    -10.00     -5.00      0.00      5.00     10.00     15.00     20.00     25.00
             -180.00   0.01417   0.00928   0.00531   0.00239   0.00060   0.00000   0.00060   0.00239   0.00531   0.00928   0.01417
             -120.00   0.01412   0.00925   0.00529   0.00238   0.00060   0.00000   0.00060   0.00238   0.00529   0.00925   0.01412
              -70.00   0.01411   0.00924   0.00529   0.00238   0.00060   0.00000   0.00060   0.00238   0.00529   0.00924   0.01411
              -46.00   0.00704   0.00421   0.00210   0.00079   0.00017   0.00000   0.00017   0.00079   0.00210   0.00421   0.00704
              -32.00   0.01078   0.00666   0.00341   0.00126   0.00025   0.00000   0.00025   0.00126   0.00341   0.00666   0.01078
              -22.00   0.02410   0.01769   0.01152   0.00577   0.00153   0.00000   0.00153   0.00577   0.01152   0.01769   0.02410
              -17.00   0.03108   0.02364   0.01610   0.00850   0.00236   0.00000   0.00236   0.00850   0.01610   0.02364   0.03108
              -13.00   0.03332   0.02526   0.01715   0.00902   0.00250   0.00000   0.00250   0.00902   0.01715   0.02526   0.03332
               -9.00   0.03591   0.02690   0.01810   0.00949   0.00263   0.00000   0.00263   0.00949   0.01810   0.02690   0.03591
               -5.00   0.03858   0.02899   0.01943   0.01006   0.00276   0.00000   0.00276   0.01006   0.01943   0.02899   0.03858
               -1.00   0.03874   0.02916   0.01961   0.01022   0.00281   0.00000   0.00281   0.01022   0.01961   0.02916   0.03874
                3.00   0.03901   0.02934   0.01970   0.01024   0.00281   0.00000   0.00281   0.01024   0.01970   0.02934   0.03901
                7.00   0.03847   0.02876   0.01942   0.01039   0.00295   0.00000   0.00295   0.01039   0.01942   0.02876   0.03847
               11.00   0.04086   0.03223   0.02299   0.01280   0.00372   0.00000   0.00372   0.01280   0.02299   0.03223   0.04086
               15.00   0.04179   0.03346   0.02441   0.01405   0.00420   0.00000   0.00420   0.01405   0.02441   0.03346   0.04179
               19.00   0.03818   0.03017   0.02165   0.01232   0.00375   0.00000   0.00375   0.01232   0.02165   0.03017   0.03818
               23.00   0.03117   0.02384   0.01635   0.00872   0.00243   0.00000   0.00243   0.00872   0.01635   0.02384   0.03117
               27.00   0.01947   0.01324   0.00750   0.00283   0.00043   0.00000   0.00043   0.00283   0.00750   0.01324   0.01947
               32.00   0.00708   0.00298   0.00007  -0.00112  -0.00061   0.00000  -0.00061  -0.00112   0.00007   0.00298   0.00708
               46.00  -0.00124  -0.00275  -0.00311  -0.00215  -0.00067   0.00000  -0.00067  -0.00215  -0.00311  -0.00275  -0.00124
               70.00   0.01411   0.00924   0.00529   0.00238   0.00060   0.00000   0.00060   0.00238   0.00529   0.00924   0.01411
              120.00   0.01412   0.00925   0.00529   0.00238   0.00060   0.00000   0.00060   0.00238   0.00529   0.00925   0.01412
              180.00   0.01417   0.00928   0.00531   0.00239   0.00060   0.00000   0.00060   0.00239   0.00531   0.00928   0.01417
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            </tableData>
          </table>
          </product>
        </function>
        <function name="aero/coefficient/CD_elevator">
          <description>CD increment from elevator (deg), over alpha</description>
          <product>
            <property>aero/qbar-psf</property>
            <property>metrics/Sw-sqft</property>
            <property>aero/function/mach-elevator</property>
          <table>
            <independentVar lookup="row">aero/alpha-deg</independentVar>
            <independentVar lookup="column">fcs/elevator-pos-deg</independentVar>
            <tableData>
                        -25.00    -20.00    -15.00    -10.00     -5.00      0.00      5.00     10.00     15.00     20.00     25.00     30.00     35.00     40.00     45.00     50.00
             -180.00   0.02097   0.01608   0.00914   0.00317   0.00073   0.00000   0.00073   0.00317   0.00914   0.01608   0.02463   0.02887   0.03357   0.03857   0.04373   0.04889
             -120.00   0.02704   0.02217   0.01603   0.01018   0.00478   0.00000  -0.00402  -0.00714  -0.00929  -0.01039  -0.01041  -0.01499  -0.01913  -0.02269  -0.02556  -0.02852
              -70.00   0.01768   0.01281  -0.00703  -0.00537  -0.00300   0.00000   0.00352   0.00747   0.01172   0.01613   0.02059   0.01931   0.01720   0.01433   0.01077   0.00665
              -46.00   0.07726   0.06534   0.05964   0.04676   0.02589   0.00000  -0.02703  -0.05110  -0.06864  -0.08000  -0.08776  -0.08835  -0.08916  -0.08991  -0.09042  -0.09055
              -32.00   0.07994   0.06606   0.05763   0.04381   0.02370   0.00000  -0.02386  -0.04392  -0.05633  -0.06139  -0.06214  -0.05572  -0.04997  -0.04481  -0.04015  -0.03590
              -22.00   0.08936   0.07327   0.05906   0.04135   0.02059   0.00000  -0.01809  -0.03165  -0.03827  -0.03834  -0.03431  -0.02445  -0.01488  -0.00565   0.00325   0.01188
              -17.00   0.09933   0.08215   0.06460   0.04359   0.02069   0.00000  -0.01638  -0.02720  -0.03079  -0.02758  -0.01965  -0.00773   0.00425   0.01616   0.02795   0.03960
              -13.00   0.09857   0.08191   0.06264   0.04126   0.01904   0.00000  -0.01360  -0.02068  -0.02005  -0.01228   0.00085   0.01466   0.02905   0.04380   0.05878   0.07389
               -9.00   0.09325   0.07788   0.05846   0.03708   0.01604   0.00000  -0.00916  -0.01070  -0.00432   0.00838   0.02500   0.03847   0.05298   0.06829   0.08442   0.10133
               -5.00   0.07767   0.06471   0.04731   0.02918   0.01205   0.00000  -0.00431  -0.00011   0.01071   0.02573   0.04387   0.05689   0.07156   0.08775   0.10536   0.12433
               -1.00   0.05714   0.04681   0.03069   0.01650   0.00534   0.00000   0.00189   0.01038   0.02357   0.03977   0.05849   0.06992   0.08337   0.09875   0.11601   0.13439
                3.00   0.03976   0.03189   0.01648   0.00461  -0.00149   0.00000   0.00883   0.02302   0.03913   0.05595   0.07456   0.08371   0.09520   0.10897   0.12471   0.14161
                7.00   0.02394   0.01830   0.00398  -0.00502  -0.00649   0.00000   0.01458   0.03433   0.05443   0.07292   0.09124   0.09738   0.10600   0.11709   0.13026   0.14465
               11.00   0.00146   0.00096  -0.00748  -0.01108  -0.00899   0.00000   0.01676   0.03888   0.06132   0.08133   0.10005   0.10355   0.10909   0.11679   0.12659   0.13766
               15.00  -0.00929  -0.00676  -0.01218  -0.01338  -0.00975   0.00000   0.01718   0.03976   0.06183   0.08144   0.09991   0.10173   0.10501   0.10995   0.11659   0.12429
               19.00  -0.02048  -0.01607  -0.01859  -0.01655  -0.01038   0.00000   0.01663   0.03825   0.05929   0.07684   0.09256   0.09184   0.09342   0.09691   0.10224   0.10821
               23.00  -0.02872  -0.02309  -0.02358  -0.01913  -0.01060   0.00000   0.01360   0.03078   0.04780   0.06212   0.07497   0.07131   0.06979   0.07087   0.07414   0.07908
               27.00  -0.03744  -0.03089  -0.02949  -0.02281  -0.01186   0.00000   0.01202   0.02494   0.03703   0.04689   0.05582   0.05064   0.04699   0.04521   0.04585   0.04877
               32.00  -0.05202  -0.04467  -0.04068  -0.03076  -0.01576   0.00000   0.01367   0.02478   0.03271   0.03764   0.04131   0.03361   0.02769   0.02360   0.02086   0.02026
               46.00  -0.08110  -0.07364  -0.06155  -0.04405  -0.02207   0.00000   0.01843   0.03105   0.03681   0.03627   0.03068   0.01672   0.00369  -0.00792  -0.01776  -0.02578
               70.00   0.02100   0.01613   0.01172   0.00747   0.00352   0.00000  -0.00300  -0.00537  -0.00703   0.01275   0.04517   0.04938   0.03438   0.01849   0.00282  -0.01154
              120.00  -0.00552  -0.01039  -0.00929  -0.00714  -0.00402   0.00000   0.00478   0.01018   0.01603   0.02217   0.02839   0.02887   0.02847   0.02719   0.02509   0.02221
              180.00   0.02097   0.01608   0.00914   0.00317   0.00073   0.00000   0.00073   0.00317   0.00914   0.01608   0.02463   0.02887   0.03357   0.03857   0.04373   0.04889
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            </tableData>
          </table>
          </product>
        </function>
        <function name="aero/coefficient/CD_rudder">
          <description>CD increment from rudder (deg), over alpha</description>
          <product>
            <property>aero/qbar-psf</property>
            <property>metrics/Sw-sqft</property>
            <property>aero/function/mach-rudder</property>
          <table>
            <independentVar lookup="row">aero/alpha-deg</independentVar>
            <independentVar lookup="column">fcs/rudder-pos-deg</independentVar>
            <tableData>
                        -30.00    -25.00    -20.00    -15.00    -10.00     -5.00      0.00      5.00     10.00     15.00     20.00     25.00     30.00
             -180.00   0.00418   0.00299   0.00196   0.00112   0.00050   0.00013   0.00000   0.00013   0.00050   0.00112   0.00196   0.00299   0.00418
             -120.00   0.00052   0.00037   0.00024   0.00014   0.00006   0.00002   0.00000   0.00002   0.00006   0.00014   0.00024   0.00037   0.00052
              -70.00   0.00018   0.00013   0.00009   0.00005   0.00002   0.00001   0.00000   0.00001   0.00002   0.00005   0.00008   0.00013   0.00017
              -46.00   0.00305   0.00241   0.00181   0.00121   0.00063   0.00017   0.00000   0.00017   0.00063   0.00121   0.00181   0.00241   0.00305
              -32.00   0.00600   0.00474   0.00355   0.00237   0.00123   0.00034   0.00000   0.00034   0.00123   0.00238   0.00355   0.00474   0.00600
              -22.00   0.00772   0.00609   0.00455   0.00304   0.00157   0.00043   0.00000   0.00043   0.00157   0.00304   0.00456   0.00609   0.00772
              -17.00   0.00843   0.00665   0.00497   0.00331   0.00172   0.00047   0.00000   0.00047   0.00172   0.00332   0.00497   0.00665   0.00843
              -13.00   0.00888   0.00700   0.00523   0.00349   0.00180   0.00049   0.00000   0.00049   0.00180   0.00349   0.00523   0.00700   0.00888
               -9.00   0.00921   0.00726   0.00542   0.00361   0.00187   0.00051   0.00000   0.00051   0.00187   0.00361   0.00542   0.00726   0.00921
               -5.00   0.00941   0.00741   0.00553   0.00368   0.00190   0.00052   0.00000   0.00052   0.00190   0.00369   0.00553   0.00741   0.00941
               -1.00   0.00947   0.00746   0.00556   0.00370   0.00191   0.00052   0.00000   0.00052   0.00191   0.00370   0.00556   0.00746   0.00947
                3.00   0.00939   0.00739   0.00551   0.00367   0.00189   0.00052   0.00000   0.00052   0.00189   0.00367   0.00551   0.00739   0.00939
                7.00   0.00917   0.00721   0.00538   0.00358   0.00185   0.00051   0.00000   0.00051   0.00185   0.00358   0.00538   0.00722   0.00917
               11.00   0.00882   0.00694   0.00517   0.00344   0.00177   0.00049   0.00000   0.00049   0.00177   0.00344   0.00517   0.00694   0.00882
               15.00   0.00835   0.00656   0.00489   0.00325   0.00168   0.00046   0.00000   0.00046   0.00168   0.00325   0.00489   0.00656   0.00835
               19.00   0.00777   0.00611   0.00454   0.00302   0.00156   0.00043   0.00000   0.00043   0.00156   0.00302   0.00454   0.00611   0.00778
               23.00   0.00711   0.00558   0.00415   0.00275   0.00142   0.00039   0.00000   0.00039   0.00142   0.00275   0.00415   0.00559   0.00712
               27.00   0.00639   0.00501   0.00372   0.00247   0.00127   0.00035   0.00000   0.00035   0.00127   0.00247   0.00373   0.00502   0.00640
               32.00   0.00550   0.00432   0.00321   0.00213   0.00110   0.00030   0.00000   0.00030   0.00110   0.00213   0.00321   0.00432   0.00551
               46.00   0.00326   0.00259   0.00195   0.00131   0.00068   0.00019   0.00000   0.00019   0.00068   0.00131   0.00195   0.00259   0.00326
               70.00   0.00018   0.00013   0.00009   0.00005   0.00002   0.00001   0.00000   0.00001   0.00002   0.00005   0.00008   0.00013   0.00017
              120.00   0.00052   0.00037   0.00024   0.00014   0.00006   0.00002   0.00000   0.00002   0.00006   0.00014   0.00024   0.00037   0.00052
              180.00   0.00418   0.00299   0.00196   0.00112   0.00050   0.00013   0.00000   0.00013   0.00050   0.00112   0.00196   0.00299   0.00418
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            </tableData>
          </table>
          </product>
        </function>
        <function name="aero/coefficient/CD_ground">
          <description>Induced drag change in ground effect</description>
          <product>
            <property>aero/qbar-psf</property>
            <property>metrics/Sw-sqft</property>
            <property>aero/cl-squared</property>
            <value>0.15504</value>
          <table>
            <independentVar lookup="row">aero/h_b-mac-ft</independentVar>
            <tableData>
                    0.00   -1.00000
                    0.10   -0.28090
                    0.15   -0.14793
                    0.20   -0.08897
                    0.30   -0.04160
                    0.40   -0.02383
                    0.50   -0.01538
                    0.60   -0.01073
                    0.70   -0.00791
                    0.80   -0.00607
                    0.90   -0.00480
                    1.00   -0.00389
                    1.10   -0.00322
            </tableData>
          </table>
          </product>
        </function>
        <function name="aero/coefficient/CD_surfaces_elevator">
          <description>surfaces: the drag of its elevator deflected 20 deg at the full speedbrake, its forces cancelling (hangar)</description>
          <product>
            <property>aero/qbar-psf</property>
            <property>metrics/Sw-sqft</property>
            <table>
              <independentVar lookup="row">aero/alpha-deg</independentVar>
              <independentVar lookup="column">fcs/speedbrake-elevator-deg</independentVar>
              <tableData>
                          -25.00    -20.00    -15.00    -10.00     -5.00      0.00      5.00     10.00     15.00     20.00     25.00     30.00     35.00     40.00     45.00     50.00
               -180.00   0.02097   0.01608   0.00914   0.00317   0.00073   0.00000   0.00073   0.00317   0.00914   0.01608   0.02463   0.02887   0.03357   0.03857   0.04373   0.04889
               -120.00   0.02704   0.02217   0.01603   0.01018   0.00478   0.00000  -0.00402  -0.00714  -0.00929  -0.01039  -0.01041  -0.01499  -0.01913  -0.02269  -0.02556  -0.02852
                -70.00   0.01768   0.01281  -0.00703  -0.00537  -0.00300   0.00000   0.00352   0.00747   0.01172   0.01613   0.02059   0.01931   0.01720   0.01433   0.01077   0.00665
                -46.00   0.07726   0.06534   0.05964   0.04676   0.02589   0.00000  -0.02703  -0.05110  -0.06864  -0.08000  -0.08776  -0.08835  -0.08916  -0.08991  -0.09042  -0.09055
                -32.00   0.07994   0.06606   0.05763   0.04381   0.02370   0.00000  -0.02386  -0.04392  -0.05633  -0.06139  -0.06214  -0.05572  -0.04997  -0.04481  -0.04015  -0.03590
                -22.00   0.08936   0.07327   0.05906   0.04135   0.02059   0.00000  -0.01809  -0.03165  -0.03827  -0.03834  -0.03431  -0.02445  -0.01488  -0.00565   0.00325   0.01188
                -17.00   0.09933   0.08215   0.06460   0.04359   0.02069   0.00000  -0.01638  -0.02720  -0.03079  -0.02758  -0.01965  -0.00773   0.00425   0.01616   0.02795   0.03960
                -13.00   0.09857   0.08191   0.06264   0.04126   0.01904   0.00000  -0.01360  -0.02068  -0.02005  -0.01228   0.00085   0.01466   0.02905   0.04380   0.05878   0.07389
                 -9.00   0.09325   0.07788   0.05846   0.03708   0.01604   0.00000  -0.00916  -0.01070  -0.00432   0.00838   0.02500   0.03847   0.05298   0.06829   0.08442   0.10133
                 -5.00   0.07767   0.06471   0.04731   0.02918   0.01205   0.00000  -0.00431  -0.00011   0.01071   0.02573   0.04387   0.05689   0.07156   0.08775   0.10536   0.12433
                 -1.00   0.05714   0.04681   0.03069   0.01650   0.00534   0.00000   0.00189   0.01038   0.02357   0.03977   0.05849   0.06992   0.08337   0.09875   0.11601   0.13439
                  3.00   0.03976   0.03189   0.01648   0.00461  -0.00149   0.00000   0.00883   0.02302   0.03913   0.05595   0.07456   0.08371   0.09520   0.10897   0.12471   0.14161
                  7.00   0.02394   0.01830   0.00398  -0.00502  -0.00649   0.00000   0.01458   0.03433   0.05443   0.07292   0.09124   0.09738   0.10600   0.11709   0.13026   0.14465
                 11.00   0.00146   0.00096  -0.00748  -0.01108  -0.00899   0.00000   0.01676   0.03888   0.06132   0.08133   0.10005   0.10355   0.10909   0.11679   0.12659   0.13766
                 15.00  -0.00929  -0.00676  -0.01218  -0.01338  -0.00975   0.00000   0.01718   0.03976   0.06183   0.08144   0.09991   0.10173   0.10501   0.10995   0.11659   0.12429
                 19.00  -0.02048  -0.01607  -0.01859  -0.01655  -0.01038   0.00000   0.01663   0.03825   0.05929   0.07684   0.09256   0.09184   0.09342   0.09691   0.10224   0.10821
                 23.00  -0.02872  -0.02309  -0.02358  -0.01913  -0.01060   0.00000   0.01360   0.03078   0.04780   0.06212   0.07497   0.07131   0.06979   0.07087   0.07414   0.07908
                 27.00  -0.03744  -0.03089  -0.02949  -0.02281  -0.01186   0.00000   0.01202   0.02494   0.03703   0.04689   0.05582   0.05064   0.04699   0.04521   0.04585   0.04877
                 32.00  -0.05202  -0.04467  -0.04068  -0.03076  -0.01576   0.00000   0.01367   0.02478   0.03271   0.03764   0.04131   0.03361   0.02769   0.02360   0.02086   0.02026
                 46.00  -0.08110  -0.07364  -0.06155  -0.04405  -0.02207   0.00000   0.01843   0.03105   0.03681   0.03627   0.03068   0.01672   0.00369  -0.00792  -0.01776  -0.02578
                 70.00   0.02100   0.01613   0.01172   0.00747   0.00352   0.00000  -0.00300  -0.00537  -0.00703   0.01275   0.04517   0.04938   0.03438   0.01849   0.00282  -0.01154
                120.00  -0.00552  -0.01039  -0.00929  -0.00714  -0.00402   0.00000   0.00478   0.01018   0.01603   0.02217   0.02839   0.02887   0.02847   0.02719   0.02509   0.02221
                180.00   0.02097   0.01608   0.00914   0.00317   0.00073   0.00000   0.00073   0.00317   0.00914   0.01608   0.02463   0.02887   0.03357   0.03857   0.04373   0.04889
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              </tableData>
            </table>
          </product>
        </function>
      </axis>
      <axis name="SIDE">
        <function name="aero/coefficient/CY_base">
          <description>CY over alpha and beta (hangar)</description>
          <product>
            <property>aero/qbar-psf</property>
            <property>metrics/Sw-sqft</property>
            <property>aero/function/mach-side</property>
          <table>
            <independentVar lookup="row">aero/alpha-deg</independentVar>
            <independentVar lookup="column">aero/beta-deg</independentVar>
            <tableData>
                        -90.00    -70.00    -50.00    -40.00    -30.00    -25.00    -20.00    -15.00    -10.00     -6.00     -3.00      0.00      3.00      6.00     10.00     15.00     20.00     25.00     30.00     40.00     50.00     70.00     90.00
             -180.00  -0.00000   0.06620   0.07667   0.06257   0.04281   0.03275   0.02338   0.01517   0.03134   0.04134   0.02208  -0.00000  -0.02208  -0.04134  -0.03134  -0.01517  -0.02338  -0.03275  -0.04281  -0.06257  -0.07667  -0.06620   0.00000
              -35.00   0.00000  -0.13273  -0.19229  -0.23652  -0.24349  -0.22420  -0.19065  -0.12878  -0.08939  -0.05503  -0.02782  -0.00000   0.02782   0.05503   0.08939   0.12878   0.19065   0.22420   0.24349   0.23652   0.19229   0.13273  -0.00000
              -11.00   0.00000   0.06089   0.09915   0.08799   0.07646   0.07096   0.08127   0.06264   0.04229   0.02549   0.01276  -0.00000  -0.01276  -0.02549  -0.04229  -0.06264  -0.08127  -0.07096  -0.07646  -0.08799  -0.09915  -0.06089  -0.00000
                4.00   0.00000   0.08584   0.12155   0.11107   0.09581   0.09805   0.09193   0.07055   0.04739   0.02834   0.01410  -0.00000  -0.01410  -0.02834  -0.04739  -0.07055  -0.09193  -0.09805  -0.09581  -0.11107  -0.12155  -0.08584  -0.00000
               19.00   0.00000   0.00316   0.02371   0.00329  -0.01358  -0.00601   0.00052  -0.00090  -0.00095  -0.00064  -0.00034  -0.00000   0.00034   0.00064   0.00095   0.00090  -0.00052   0.00601   0.01358  -0.00329  -0.02371  -0.00316  -0.00000
               42.00   0.00000  -0.14417  -0.31407  -0.36021  -0.35228  -0.32334  -0.28010  -0.22056  -0.14530  -0.08941  -0.04444  -0.00000   0.04444   0.08941   0.14530   0.22056   0.28010   0.32334   0.35228   0.36021   0.31407   0.14417  -0.00000
              180.00  -0.00000   0.06620   0.07667   0.06257   0.04281   0.03275   0.02338   0.01517   0.03134   0.04134   0.02208  -0.00000  -0.02208  -0.04134  -0.03134  -0.01517  -0.02338  -0.03275  -0.04281  -0.06257  -0.07667  -0.06620   0.00000
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            </tableData>
          </table>
          </product>
        </function>
        <function name="aero/coefficient/CY_aileron">
          <description>CY increment from aileron (deg), over alpha</description>
          <product>
            <property>aero/qbar-psf</property>
            <property>metrics/Sw-sqft</property>
            <property>aero/function/mach-aileron</property>
          <table>
            <independentVar lookup="row">aero/alpha-deg</independentVar>
            <independentVar lookup="column">fcs/left-aileron-pos-deg</independentVar>
            <tableData>
                        -25.00    -20.00    -15.00    -10.00     -5.00      0.00      5.00     10.00     15.00     20.00     25.00
             -180.00   0.00000   0.00000   0.00000   0.00000   0.00000   0.00000   0.00000   0.00000   0.00000   0.00000   0.00000
              -35.00   0.01598   0.01421   0.01187   0.00859   0.00441   0.00000  -0.00441  -0.00859  -0.01187  -0.01421  -0.01598
              -11.00   0.02810   0.02482   0.02068   0.01509   0.00795   0.00000  -0.00795  -0.01509  -0.02068  -0.02482  -0.02810
                4.00   0.03087   0.02727   0.02274   0.01660   0.00876   0.00000  -0.00876  -0.01660  -0.02274  -0.02727  -0.03087
               19.00   0.03226   0.02844   0.02369   0.01735   0.00926   0.00000  -0.00926  -0.01735  -0.02369  -0.02844  -0.03226
               42.00   0.01484   0.01311   0.01085   0.00771   0.00372   0.00000  -0.00372  -0.00771  -0.01085  -0.01311  -0.01484
              180.00   0.00000   0.00000   0.00000   0.00000   0.00000   0.00000   0.00000   0.00000   0.00000   0.00000   0.00000
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            </tableData>
          </table>
          </product>
        </function>
        <function name="aero/coefficient/CY_rudder">
          <description>CY increment from rudder (deg), over alpha</description>
          <product>
            <property>aero/qbar-psf</property>
            <property>metrics/Sw-sqft</property>
            <property>aero/function/mach-rudder</property>
          <table>
            <independentVar lookup="row">aero/alpha-deg</independentVar>
            <independentVar lookup="column">fcs/rudder-pos-deg</independentVar>
            <tableData>
                        -30.00    -25.00    -20.00    -15.00    -10.00     -5.00      0.00      5.00     10.00     15.00     20.00     25.00     30.00
             -180.00   0.00000   0.00000   0.00000   0.00000   0.00000   0.00000   0.00000   0.00000   0.00000   0.00000   0.00000   0.00000   0.00000
              -35.00  -0.03536  -0.03233  -0.02886  -0.02429  -0.01786  -0.00943   0.00000   0.00943   0.01786   0.02429   0.02886   0.03233   0.03536
              -11.00  -0.04032  -0.03685  -0.03287  -0.02764  -0.02032  -0.01076   0.00000   0.01076   0.02032   0.02764   0.03287   0.03686   0.04034
                4.00  -0.03893  -0.03562  -0.03180  -0.02677  -0.01970  -0.01044   0.00000   0.01044   0.01970   0.02678   0.03182   0.03564   0.03896
               19.00  -0.03217  -0.02947  -0.02635  -0.02221  -0.01635  -0.00867   0.00000   0.00867   0.01636   0.02222   0.02637   0.02950   0.03221
               42.00  -0.03329  -0.03074  -0.02773  -0.02357  -0.01750  -0.00921   0.00000   0.00921   0.01750   0.02357   0.02773   0.03074   0.03328
              180.00   0.00000   0.00000   0.00000   0.00000   0.00000   0.00000   0.00000   0.00000   0.00000   0.00000   0.00000   0.00000   0.00000
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            </tableData>
          </table>
          </product>
        </function>
        <function name="aero/coefficient/CYp">
          <description>CY per p (non-dimensional), over alpha</description>
          <product>
            <property>aero/qbar-psf</property>
            <property>metrics/Sw-sqft</property>
            <property>aero/bi2vel</property>
            <property>velocities/p-aero-rad_sec</property>
            <property>aero/function/mach-lift</property>
          <table>
            <independentVar lookup="row">aero/alpha-deg</independentVar>
            <tableData>
                 -180.00   -0.06253
                 -165.00   -0.13270
                  -32.00    0.00132
                  -10.00    0.01715
                    5.00    0.02497
                   20.00   -0.00118
                   46.00   -0.05809
                  180.00   -0.06253
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            </tableData>
          </table>
          </product>
        </function>
        <function name="aero/coefficient/CYr">
          <description>CY per r (non-dimensional), over alpha</description>
          <product>
            <property>aero/qbar-psf</property>
            <property>metrics/Sw-sqft</property>
            <property>aero/bi2vel</property>
            <property>velocities/r-aero-rad_sec</property>
            <property>aero/function/mach-lift</property>
          <table>
            <independentVar lookup="row">aero/alpha-deg</independentVar>
            <tableData>
                 -180.00    0.43902
                 -165.00    0.39764
                  -32.00    0.05920
                  -10.00    0.09404
                    5.00    0.08354
                   20.00    0.01689
                   46.00    0.01614
                  180.00    0.43902
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            </tableData>
          </table>
          </product>
        </function>
      </axis>
      <axis name="LIFT">
        <function name="aero/coefficient/CL_base">
          <description>CL over alpha and beta, ground effect, compressibility (hangar)</description>
          <product>
            <property>aero/qbar-psf</property>
            <property>metrics/Sw-sqft</property>
            <property>aero/function/CL-base</property>
            <property>aero/function/mach-lift</property>
          <table>
            <independentVar lookup="row">aero/h_b-mac-ft</independentVar>
            <tableData>
                    0.00    1.20000
                    0.10    1.08692
                    0.20    1.03778
                    0.40    1.00713
                    0.60    1.00135
                    0.80    1.00025
                    1.00    1.00005
                    1.10    1.00000
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            </tableData>
          </table>
          </product>
        </function>
        <function name="aero/coefficient/CL_elevator">
          <description>CL increment from elevator (deg), over alpha</description>
          <product>
            <property>aero/qbar-psf</property>
            <property>metrics/Sw-sqft</property>
            <property>aero/function/mach-elevator</property>
          <table>
            <independentVar lookup="row">aero/alpha-deg</independentVar>
            <independentVar lookup="column">fcs/elevator-pos-deg</independentVar>
            <tableData>
                        -25.00    -20.00    -15.00    -10.00     -5.00      0.00      5.00     10.00     15.00     20.00     25.00     30.00     35.00     40.00     45.00     50.00
             -180.00   0.01902   0.01902   0.01480   0.02082   0.01999   0.00000  -0.01999  -0.02082  -0.01480  -0.01902  -0.02267  -0.02563  -0.02781  -0.02915  -0.02960  -0.02915
              -35.00  -0.20309  -0.18649  -0.16267  -0.12295  -0.06645   0.00000   0.06851   0.13123   0.18134   0.21955   0.25106   0.26103   0.27135   0.28188   0.29252   0.30329
              -11.00  -0.32032  -0.28852  -0.24801  -0.18651  -0.10079   0.00000   0.10311   0.19581   0.26436   0.30572   0.32629   0.32289   0.32303   0.32755   0.33320   0.34118
                4.00  -0.33919  -0.30231  -0.25786  -0.19186  -0.10248   0.00000   0.10217   0.19119   0.25622   0.29840   0.32703   0.32064   0.31483   0.30991   0.30645   0.30534
               19.00  -0.33998  -0.30397  -0.25408  -0.18558  -0.09716   0.00000   0.09240   0.16841   0.22065   0.25354   0.27457   0.26662   0.25667   0.24525   0.23362   0.22562
               42.00  -0.21084  -0.19383  -0.16047  -0.11669  -0.06158   0.00000   0.06173   0.11628   0.15664   0.18286   0.19440   0.18778   0.17896   0.16879   0.15840   0.14730
              180.00   0.01902   0.01902   0.01480   0.02082   0.01999   0.00000  -0.01999  -0.02082  -0.01480  -0.01902  -0.02267  -0.02563  -0.02781  -0.02915  -0.02960  -0.02915
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            </tableData>
          </table>
          </product>
        </function>
        <function name="aero/coefficient/CLq">
          <description>CL per q (non-dimensional), over alpha</description>
          <product>
            <property>aero/qbar-psf</property>
            <property>metrics/Sw-sqft</property>
            <property>aero/ci2vel</property>
            <property>velocities/q-aero-rad_sec</property>
            <property>aero/function/mach-lift</property>
          <table>
            <independentVar lookup="row">aero/alpha-deg</independentVar>
            <tableData>
                 -180.00    0.00032
                 -165.00   -0.20606
                  -32.00    1.83372
                  -10.00    3.03132
                    5.00    2.94151
                   20.00    2.31937
                   46.00    1.15618
                  180.00    0.00032
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            </tableData>
          </table>
          </product>
        </function>
        <function name="aero/coefficient/CLadot">
          <description>CL per alpha-dot (downwash lag at the tail)</description>
          <product>
            <property>aero/qbar-psf</property>
            <property>metrics/Sw-sqft</property>
            <property>aero/ci2vel</property>
            <property>aero/alphadot-rad_sec</property>
            <value>0.00000</value>
            <property>aero/function/mach-lift</property>
          </product>
        </function>
      </axis>
      <axis name="ROLL">
        <function name="aero/coefficient/Cl_base">
          <description>Cl over alpha and beta (hangar)</description>
          <product>
            <property>aero/qbar-psf</property>
            <property>metrics/Sw-sqft</property>
            <property>metrics/bw-ft</property>
            <property>aero/function/mach-side</property>
          <table>
            <independentVar lookup="row">aero/alpha-deg</independentVar>
            <independentVar lookup="column">aero/beta-deg</independentVar>
            <tableData>
                        -90.00    -70.00    -50.00    -40.00    -30.00    -25.00    -20.00    -15.00    -10.00     -6.00     -3.00      0.00      3.00      6.00     10.00     15.00     20.00     25.00     30.00     40.00     50.00     70.00     90.00
             -180.00   0.02053   0.00977  -0.00786  -0.00992  -0.01011  -0.00941  -0.00821  -0.00658  -0.00121   0.00277   0.00164  -0.00000  -0.00164  -0.00277   0.00121   0.00658   0.00821   0.00941   0.01011   0.00992   0.00786  -0.00977  -0.02053
              -35.00   0.02053   0.00961   0.01407   0.01347   0.00536   0.00002  -0.00450  -0.00446  -0.00661  -0.00492  -0.00246  -0.00000   0.00246   0.00492   0.00661   0.00446   0.00450  -0.00002  -0.00536  -0.01347  -0.01407  -0.00961  -0.02053
              -11.00   0.02053   0.00292  -0.00189  -0.01845  -0.03801  -0.03942  -0.03013  -0.02331  -0.01642  -0.01020  -0.00520  -0.00000   0.00520   0.01020   0.01642   0.02331   0.03013   0.03942   0.03801   0.01845   0.00189  -0.00292  -0.02053
                4.00   0.02053  -0.00156  -0.00217  -0.00287   0.00321   0.00702   0.00764   0.00594   0.00404   0.00244   0.00123  -0.00000  -0.00123  -0.00244  -0.00404  -0.00594  -0.00764  -0.00702  -0.00321   0.00287   0.00217   0.00156  -0.02053
               19.00   0.02053  -0.00788  -0.00712   0.00199   0.03324   0.04012   0.03525   0.02464   0.01483   0.00849   0.00414  -0.00000  -0.00414  -0.00849  -0.01483  -0.02464  -0.03525  -0.04012  -0.03324  -0.00199   0.00712   0.00788  -0.02053
               42.00   0.02053   0.00794  -0.02090  -0.02297  -0.01257  -0.00601  -0.00280  -0.00181   0.00014   0.00008   0.00015  -0.00000  -0.00015  -0.00008  -0.00014   0.00181   0.00280   0.00601   0.01257   0.02297   0.02090  -0.00794  -0.02053
              180.00   0.02053   0.00977  -0.00786  -0.00992  -0.01011  -0.00941  -0.00821  -0.00658  -0.00121   0.00277   0.00164  -0.00000  -0.00164  -0.00277   0.00121   0.00658   0.00821   0.00941   0.01011   0.00992   0.00786  -0.00977  -0.02053
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            </tableData>
          </table>
          </product>
        </function>
        <function name="aero/coefficient/Cl_aileron">
          <description>Cl increment from aileron (deg), over alpha</description>
          <product>
            <property>aero/qbar-psf</property>
            <property>metrics/Sw-sqft</property>
            <property>metrics/bw-ft</property>
            <property>aero/function/mach-aileron</property>
          <table>
            <independentVar lookup="row">aero/alpha-deg</independentVar>
            <independentVar lookup="column">fcs/left-aileron-pos-deg</independentVar>
            <tableData>
                        -25.00    -20.00    -15.00    -10.00     -5.00      0.00      5.00     10.00     15.00     20.00     25.00
             -180.00   0.00000   0.00000   0.00000   0.00000   0.00000   0.00000   0.00000   0.00000   0.00000   0.00000   0.00000
              -35.00  -0.04162  -0.03722  -0.03138  -0.02312  -0.01228   0.00000   0.01228   0.02312   0.03138   0.03722   0.04162
              -11.00  -0.06689  -0.05921  -0.04944  -0.03615  -0.01909   0.00000   0.01909   0.03615   0.04944   0.05921   0.06689
                4.00  -0.06466  -0.05732  -0.04793  -0.03508  -0.01854   0.00000   0.01854   0.03508   0.04793   0.05732   0.06466
               19.00  -0.06223  -0.05509  -0.04604  -0.03371  -0.01783   0.00000   0.01783   0.03371   0.04604   0.05509   0.06223
               42.00  -0.03212  -0.02880  -0.02435  -0.01800  -0.00961   0.00000   0.00961   0.01800   0.02435   0.02880   0.03212
              180.00   0.00000   0.00000   0.00000   0.00000   0.00000   0.00000   0.00000   0.00000   0.00000   0.00000   0.00000
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            </tableData>
          </table>
          </product>
        </function>
        <function name="aero/coefficient/Cl_rudder">
          <description>Cl increment from rudder (deg), over alpha</description>
          <product>
            <property>aero/qbar-psf</property>
            <property>metrics/Sw-sqft</property>
            <property>metrics/bw-ft</property>
            <property>aero/function/mach-rudder</property>
          <table>
            <independentVar lookup="row">aero/alpha-deg</independentVar>
            <independentVar lookup="column">fcs/rudder-pos-deg</independentVar>
            <tableData>
                        -30.00    -25.00    -20.00    -15.00    -10.00     -5.00      0.00      5.00     10.00     15.00     20.00     25.00     30.00
             -180.00   0.00000   0.00000   0.00000   0.00000   0.00000   0.00000   0.00000   0.00000   0.00000   0.00000   0.00000   0.00000   0.00000
              -35.00  -0.00481  -0.00430  -0.00375  -0.00309  -0.00223  -0.00117   0.00000   0.00117   0.00223   0.00309   0.00375   0.00430   0.00481
              -11.00  -0.00570  -0.00507  -0.00439  -0.00359  -0.00258  -0.00135   0.00000   0.00135   0.00258   0.00359   0.00439   0.00507   0.00570
                4.00  -0.00583  -0.00520  -0.00451  -0.00370  -0.00266  -0.00139   0.00000   0.00139   0.00266   0.00370   0.00452   0.00520   0.00584
               19.00  -0.00505  -0.00451  -0.00392  -0.00321  -0.00231  -0.00121   0.00000   0.00121   0.00231   0.00321   0.00392   0.00451   0.00506
               42.00  -0.00537  -0.00485  -0.00428  -0.00357  -0.00261  -0.00137   0.00000   0.00137   0.00261   0.00357   0.00428   0.00485   0.00537
              180.00   0.00000   0.00000   0.00000   0.00000   0.00000   0.00000   0.00000   0.00000   0.00000   0.00000   0.00000   0.00000   0.00000
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            </tableData>
          </table>
          </product>
        </function>
        <function name="aero/coefficient/Clp">
          <description>Cl per p (non-dimensional), over alpha</description>
          <product>
            <property>aero/qbar-psf</property>
            <property>metrics/Sw-sqft</property>
            <property>metrics/bw-ft</property>
            <property>aero/bi2vel</property>
            <property>velocities/p-aero-rad_sec</property>
            <property>aero/function/mach-lift</property>
          <table>
            <independentVar lookup="row">aero/alpha-deg</independentVar>
            <tableData>
                 -180.00   -0.58620
                 -165.00   -0.15211
                  -32.00   -0.25300
                  -10.00   -0.27057
                    5.00   -0.22498
                   20.00   -0.17350
                   46.00   -0.19789
                  180.00   -0.58620
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            </tableData>
          </table>
          </product>
        </function>
        <function name="aero/coefficient/Clr">
          <description>Cl per r (non-dimensional), over alpha</description>
          <product>
            <property>aero/qbar-psf</property>
            <property>metrics/Sw-sqft</property>
            <property>metrics/bw-ft</property>
            <property>aero/bi2vel</property>
            <property>velocities/r-aero-rad_sec</property>
            <property>aero/function/mach-lift</property>
          <table>
            <independentVar lookup="row">aero/alpha-deg</independentVar>
            <tableData>
                 -180.00    0.04336
                 -165.00    0.08479
                  -32.00   -0.16385
                  -10.00   -0.06152
                    5.00    0.04197
                   20.00    0.13832
                   46.00    0.28982
                  180.00    0.04336
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            </tableData>
          </table>
          </product>
        </function>
      </axis>
      <axis name="PITCH">
        <function name="aero/coefficient/Cm_base">
          <description>Cm over alpha and beta (hangar)</description>
          <product>
            <property>aero/qbar-psf</property>
            <property>metrics/Sw-sqft</property>
            <property>metrics/cbarw-ft</property>
          <table>
            <independentVar lookup="row">aero/alpha-deg</independentVar>
            <independentVar lookup="column">aero/beta-deg</independentVar>
            <tableData>
                        -90.00    -70.00    -50.00    -40.00    -30.00    -25.00    -20.00    -15.00    -10.00     -6.00     -3.00      0.00      3.00      6.00     10.00     15.00     20.00     25.00     30.00     40.00     50.00     70.00     90.00
             -180.00  -0.00000  -0.00019  -0.00013  -0.00010  -0.00013  -0.00015  -0.00016  -0.00018   0.00165   0.00128   0.00013  -0.00029   0.00013   0.00128   0.00165  -0.00018  -0.00016  -0.00015  -0.00013  -0.00010  -0.00013  -0.00019  -0.00000
              -35.00  -0.00000  -0.00875  -0.08433  -0.11122  -0.13873  -0.15251  -0.16472  -0.17526  -0.18127  -0.18360  -0.18426  -0.18448  -0.18426  -0.18360  -0.18127  -0.17526  -0.16472  -0.15251  -0.13873  -0.11122  -0.08433  -0.00875  -0.00000
              -11.00  -0.00000  -0.01020  -0.03551  -0.04169  -0.04828  -0.05243  -0.05774  -0.05985  -0.06066  -0.06105  -0.06120  -0.06124  -0.06120  -0.06105  -0.06066  -0.05985  -0.05774  -0.05243  -0.04828  -0.04169  -0.03551  -0.01020  -0.00000
                4.00   0.00000   0.00130   0.01189   0.01867   0.02378   0.02381   0.02346   0.02370   0.02374   0.02365   0.02355   0.02350   0.02355   0.02365   0.02374   0.02370   0.02346   0.02381   0.02378   0.01867   0.01189   0.00130   0.00000
               19.00   0.00000   0.00677   0.05388   0.07615   0.09443   0.09917   0.10060   0.10329   0.10504   0.10578   0.10622   0.10637   0.10622   0.10578   0.10504   0.10329   0.10060   0.09917   0.09443   0.07615   0.05388   0.00677   0.00000
               42.00   0.00000   0.01917   0.09315   0.12552   0.15897   0.17528   0.18784   0.19667   0.20329   0.20711   0.20873   0.20928   0.20873   0.20711   0.20329   0.19667   0.18784   0.17528   0.15897   0.12552   0.09315   0.01917   0.00000
              180.00  -0.00000  -0.00019  -0.00013  -0.00010  -0.00013  -0.00015  -0.00016  -0.00018   0.00165   0.00128   0.00013  -0.00029   0.00013   0.00128   0.00165  -0.00018  -0.00016  -0.00015  -0.00013  -0.00010  -0.00013  -0.00019  -0.00000
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            </tableData>
          </table>
          </product>
        </function>
        <function name="aero/coefficient/Cm_mach">
          <description>Cm from the neutral point's move with Mach</description>
          <product>
            <property>aero/qbar-psf</property>
            <property>metrics/Sw-sqft</property>
            <property>metrics/cbarw-ft</property>
            <property>aero/function/CL-base</property>
            <property>aero/function/mach-dCm-dCL</property>
          </product>
        </function>
        <function name="aero/coefficient/Cm_elevator">
          <description>Cm increment from elevator (deg), over alpha</description>
          <product>
            <property>aero/qbar-psf</property>
            <property>metrics/Sw-sqft</property>
            <property>metrics/cbarw-ft</property>
            <property>aero/function/mach-elevator</property>
          <table>
            <independentVar lookup="row">aero/alpha-deg</independentVar>
            <independentVar lookup="column">fcs/elevator-pos-deg</independentVar>
            <tableData>
                        -25.00    -20.00    -15.00    -10.00     -5.00      0.00      5.00     10.00     15.00     20.00     25.00     30.00     35.00     40.00     45.00     50.00
             -180.00  -0.00901  -0.00916  -0.00705  -0.00969  -0.00929   0.00000   0.00930   0.00969   0.00669   0.00850   0.01001   0.01099   0.01156   0.01168   0.01136   0.01058
              -35.00   0.13997   0.12779   0.10433   0.07504   0.03923   0.00000  -0.03888  -0.07332  -0.09942  -0.11739  -0.13014  -0.12853  -0.12621  -0.12322  -0.11965  -0.11554
              -11.00   0.18986   0.17390   0.14301   0.10341   0.05444   0.00000  -0.05506  -0.10487  -0.14408  -0.17211  -0.19128  -0.19439  -0.19660  -0.19808  -0.19833  -0.19747
                4.00   0.20053   0.18363   0.15077   0.10856   0.05671   0.00000  -0.05658  -0.10796  -0.14951  -0.18197  -0.20878  -0.21757  -0.22550  -0.23236  -0.23779  -0.24137
               19.00   0.18036   0.16370   0.13594   0.09864   0.05179   0.00000  -0.05218  -0.10005  -0.13900  -0.16863  -0.19267  -0.20080  -0.20935  -0.21808  -0.22635  -0.23245
               42.00   0.11376   0.10180   0.08697   0.06449   0.03420   0.00000  -0.03430  -0.06539  -0.09067  -0.11090  -0.13126  -0.14207  -0.15312  -0.16390  -0.17392  -0.18338
              180.00  -0.00901  -0.00916  -0.00705  -0.00969  -0.00929   0.00000   0.00930   0.00969   0.00669   0.00850   0.01001   0.01099   0.01156   0.01168   0.01136   0.01058
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            </tableData>
          </table>
          </product>
        </function>
        <function name="aero/coefficient/Cmq">
          <description>Cm per q (non-dimensional), over alpha</description>
          <product>
            <property>aero/qbar-psf</property>
            <property>metrics/Sw-sqft</property>
            <property>metrics/cbarw-ft</property>
            <property>aero/ci2vel</property>
            <property>velocities/q-aero-rad_sec</property>
            <property>aero/function/mach-lift</property>
          <table>
            <independentVar lookup="row">aero/alpha-deg</independentVar>
            <tableData>
                 -180.00   -0.67820
                 -165.00   -0.01663
                  -32.00   -1.45145
                  -10.00   -1.31726
                    5.00   -1.23148
                   20.00   -1.30799
                   46.00   -1.38763
                  180.00   -0.67820
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            </tableData>
          </table>
          </product>
        </function>
        <function name="aero/coefficient/Cmadot">
          <description>Cm per alpha-dot (downwash lag at the tail)</description>
          <product>
            <property>aero/qbar-psf</property>
            <property>metrics/Sw-sqft</property>
            <property>metrics/cbarw-ft</property>
            <property>aero/ci2vel</property>
            <property>aero/alphadot-rad_sec</property>
            <value>0.00000</value>
            <property>aero/function/mach-lift</property>
          </product>
        </function>
      </axis>
      <axis name="YAW">
        <function name="aero/coefficient/Cn_base">
          <description>Cn over alpha and beta (hangar)</description>
          <product>
            <property>aero/qbar-psf</property>
            <property>metrics/Sw-sqft</property>
            <property>metrics/bw-ft</property>
            <property>aero/function/mach-side</property>
          <table>
            <independentVar lookup="row">aero/alpha-deg</independentVar>
            <independentVar lookup="column">aero/beta-deg</independentVar>
            <tableData>
                        -90.00    -70.00    -50.00    -40.00    -30.00    -25.00    -20.00    -15.00    -10.00     -6.00     -3.00      0.00      3.00      6.00     10.00     15.00     20.00     25.00     30.00     40.00     50.00     70.00     90.00
             -180.00  -0.00892  -0.02925  -0.04429  -0.04559  -0.04178  -0.03783  -0.03254  -0.02598  -0.02889  -0.02890  -0.01545  -0.00000   0.01545   0.02890   0.02889   0.02598   0.03254   0.03783   0.04178   0.04559   0.04429   0.02925   0.00892
              -35.00  -0.00892   0.00575   0.01965   0.02438   0.02363   0.02084   0.01659   0.00447   0.00313   0.00193   0.00095  -0.00000  -0.00095  -0.00193  -0.00313  -0.00447  -0.01659  -0.02084  -0.02363  -0.02438  -0.01965  -0.00575   0.00892
              -11.00  -0.00892   0.00764   0.02008   0.02403   0.01954   0.01499   0.00332   0.00178   0.00079   0.00034   0.00014  -0.00000  -0.00014  -0.00034  -0.00079  -0.00178  -0.00332  -0.01499  -0.01954  -0.02403  -0.02008  -0.00764   0.00892
                4.00  -0.00892   0.00671   0.01779   0.02144   0.01629   0.00784   0.00127  -0.00002  -0.00061  -0.00062  -0.00038  -0.00000   0.00038   0.00062   0.00061   0.00002  -0.00127  -0.00784  -0.01629  -0.02144  -0.01779  -0.00671   0.00892
               19.00  -0.00892   0.00639   0.01688   0.02280   0.02217   0.01551   0.00880   0.00609   0.00375   0.00215   0.00105  -0.00000  -0.00105  -0.00215  -0.00375  -0.00609  -0.00880  -0.01551  -0.02217  -0.02280  -0.01688  -0.00639   0.00892
               42.00  -0.00892   0.00460   0.01519   0.01854   0.01961   0.01795   0.01483   0.01010   0.00441   0.00266   0.00110  -0.00000  -0.00110  -0.00266  -0.00441  -0.01010  -0.01483  -0.01795  -0.01961  -0.01854  -0.01519  -0.00460   0.00892
              180.00  -0.00892  -0.02925  -0.04429  -0.04559  -0.04178  -0.03783  -0.03254  -0.02598  -0.02889  -0.02890  -0.01545  -0.00000   0.01545   0.02890   0.02889   0.02598   0.03254   0.03783   0.04178   0.04559   0.04429   0.02925   0.00892
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            </tableData>
          </table>
          </product>
        </function>
        <function name="aero/coefficient/Cn_aileron">
          <description>Cn increment from aileron (deg), over alpha</description>
          <product>
            <property>aero/qbar-psf</property>
            <property>metrics/Sw-sqft</property>
            <property>metrics/bw-ft</property>
            <property>aero/function/mach-aileron</property>
          <table>
            <independentVar lookup="row">aero/alpha-deg</independentVar>
            <independentVar lookup="column">fcs/left-aileron-pos-deg</independentVar>
            <tableData>
                        -25.00    -20.00    -15.00    -10.00     -5.00      0.00      5.00     10.00     15.00     20.00     25.00
             -180.00  -0.00000  -0.00000  -0.00000  -0.00000  -0.00000   0.00000  -0.00000  -0.00000  -0.00000  -0.00000  -0.00000
              -35.00  -0.00026  -0.00015  -0.00004   0.00006   0.00010   0.00000  -0.00010  -0.00006   0.00004   0.00015   0.00026
              -11.00  -0.01139  -0.00999  -0.00814  -0.00568  -0.00283   0.00000   0.00283   0.00568   0.00815   0.00999   0.01139
                4.00  -0.00856  -0.00755  -0.00627  -0.00456  -0.00240   0.00000   0.00240   0.00456   0.00627   0.00755   0.00856
               19.00  -0.01365  -0.01282  -0.01159  -0.00940  -0.00549   0.00000   0.00549   0.00940   0.01159   0.01282   0.01365
               42.00  -0.01587  -0.01438  -0.01226  -0.00906  -0.00472   0.00000   0.00472   0.00906   0.01226   0.01438   0.01587
              180.00  -0.00000  -0.00000  -0.00000  -0.00000  -0.00000   0.00000  -0.00000  -0.00000  -0.00000  -0.00000  -0.00000
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            </tableData>
          </table>
          </product>
        </function>
        <function name="aero/coefficient/Cn_rudder">
          <description>Cn increment from rudder (deg), over alpha</description>
          <product>
            <property>aero/qbar-psf</property>
            <property>metrics/Sw-sqft</property>
            <property>metrics/bw-ft</property>
            <property>aero/function/mach-rudder</property>
          <table>
            <independentVar lookup="row">aero/alpha-deg</independentVar>
            <independentVar lookup="column">fcs/rudder-pos-deg</independentVar>
            <tableData>
                        -30.00    -25.00    -20.00    -15.00    -10.00     -5.00      0.00      5.00     10.00     15.00     20.00     25.00     30.00
             -180.00  -0.00000  -0.00000  -0.00000  -0.00000  -0.00000  -0.00000   0.00000  -0.00000  -0.00000  -0.00000  -0.00000  -0.00000  -0.00000
              -35.00   0.01531   0.01400   0.01250   0.01053   0.00774   0.00409   0.00000  -0.00409  -0.00774  -0.01053  -0.01250  -0.01400  -0.01532
              -11.00   0.01895   0.01732   0.01546   0.01300   0.00956   0.00506   0.00000  -0.00506  -0.00956  -0.01301  -0.01546  -0.01733  -0.01896
                4.00   0.01925   0.01763   0.01577   0.01329   0.00979   0.00519   0.00000  -0.00519  -0.00979  -0.01329  -0.01577  -0.01764  -0.01926
               19.00   0.01698   0.01557   0.01394   0.01176   0.00867   0.00459   0.00000  -0.00459  -0.00867  -0.01176  -0.01394  -0.01557  -0.01699
               42.00   0.01607   0.01481   0.01334   0.01131   0.00838   0.00443   0.00000  -0.00442  -0.00838  -0.01131  -0.01333  -0.01481  -0.01607
              180.00  -0.00000  -0.00000  -0.00000  -0.00000  -0.00000  -0.00000   0.00000  -0.00000  -0.00000  -0.00000  -0.00000  -0.00000  -0.00000
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            </tableData>
          </table>
          </product>
        </function>
        <function name="aero/coefficient/Cnp">
          <description>Cn per p (non-dimensional), over alpha</description>
          <product>
            <property>aero/qbar-psf</property>
            <property>metrics/Sw-sqft</property>
            <property>metrics/bw-ft</property>
            <property>aero/bi2vel</property>
            <property>velocities/p-aero-rad_sec</property>
            <property>aero/function/mach-lift</property>
          <table>
            <independentVar lookup="row">aero/alpha-deg</independentVar>
            <tableData>
                 -180.00    0.04237
                 -165.00    0.07345
                  -32.00    0.00659
                  -10.00    0.01419
                    5.00   -0.02069
                   20.00    0.00004
                   46.00    0.01769
                  180.00    0.04237
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            </tableData>
          </table>
          </product>
        </function>
        <function name="aero/coefficient/Cnr">
          <description>Cn per r (non-dimensional), over alpha</description>
          <product>
            <property>aero/qbar-psf</property>
            <property>metrics/Sw-sqft</property>
            <property>metrics/bw-ft</property>
            <property>aero/bi2vel</property>
            <property>velocities/r-aero-rad_sec</property>
            <property>aero/function/mach-lift</property>
          <table>
            <independentVar lookup="row">aero/alpha-deg</independentVar>
            <tableData>
                 -180.00   -0.13280
                 -165.00   -0.14458
                  -32.00   -0.14699
                  -10.00   -0.12504
                    5.00   -0.11908
                   20.00   -0.11086
                   46.00   -0.13117
                  180.00   -0.13280
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            </tableData>
          </table>
          </product>
        </function>
      </axis>
    </aerodynamics>
</fdm_config>
