<?xml version="1.0"?>
<?xml-stylesheet type="text/xsl" href="http://jsbsim.sourceforge.net/JSBSim.xsl"?>
<!-- Generated by hangar 0.1.0 from rc135w.toml on 2026-10-01. Edit the design and rebuild; changes
     made here are overwritten.  -->
<fdm_config name="rc135w" version="2.0" release="ALPHA"
            xmlns:xsi="http://www.w3.org/2001/XMLSchema-instance"
            xsi:noNamespaceSchemaLocation="http://jsbsim.sourceforge.net/JSBSim.xsd">
    <fileheader>
      <author>hangar</author>
      <filecreationdate>2026-10-01</filecreationdate>
      <version>0.1.0</version>
      <description>Boeing RC-135W Rivet Joint (hangar build)</description>
      <note>Aerodynamics: vortex lattice with viscous section polars, full-envelope
        strip model, slender-body fuselage (hangar). Mass: Raymer component
        weights on the geometry. Propeller: blade-element momentum theory.</note>
      <reference refID="fsim/applicability/aerobatic" author="the design" title="USAF RC-135 fact sheet: a large reconnaissance aircraft, not cleared for aerobatics" date="n/a"/>
      <reference refID="fsim/applicability/carrier" author="the design" title="USAF RC-135 fact sheet: a land-based reconnaissance aircraft" date="n/a"/>
      <reference refID="fsim/applicability/drag_devices" author="the design" title="C-135 data: spoilers" date="n/a"/>
      <reference refID="fsim/applicability/flaps" author="the design" title="C-135 data: trailing-edge flaps" date="n/a"/>
      <reference refID="fsim/applicability/ground_contact" author="the design" title="USAF RC-135 fact sheet: tricycle wheeled gear" date="n/a"/>
      <reference refID="fsim/applicability/releasable_stores" author="the design" title="USAF RC-135 fact sheet: unarmed" date="n/a"/>
      <reference refID="fsim/applicability/retractable_gear" author="the design" title="C-135 data: retractable gear" date="n/a"/>
      <reference refID="fsim/applicability/vertical_flight" author="the design" title="USAF RC-135 fact sheet: a conventional take-off and landing jet. Conventional take-off and landing: no rotors, lift fans or vectored lift to hover" date="n/a"/>
    </fileheader>
    <metrics>
      <wingarea unit="M2"> 227.6896 </wingarea>
      <wingspan unit="M"> 39.8800 </wingspan>
      <chord unit="M"> 6.1571 </chord>
      <htailarea unit="M2"> 47.6998 </htailarea>
      <htailarm unit="M"> 18.7561 </htailarm>
      <vtailarea unit="M2"> 31.6735 </vtailarea>
      <vtailarm unit="M"> 17.5583 </vtailarm>
      <location name="AERORP" unit="M">
        <x> 18.2196 </x>
        <y> 0.0000 </y>
        <z> 1.0164 </z>
      </location>
      <location name="EYEPOINT" unit="M">
        <x> 2.9000 </x>
        <y> -0.5000 </y>
        <z> 2.4000 </z>
      </location>
      <location name="VRP" unit="M">
        <x> 18.4000 </x>
        <y> -0.0000 </y>
        <z> 0.9000 </z>
      </location>
    </metrics>
    <mass_balance negated_crossproduct_inertia="false">
      <ixx unit="KG*M2"> 2843049.40 </ixx>
      <iyy unit="KG*M2"> 5348352.80 </iyy>
      <izz unit="KG*M2"> 7964006.88 </izz>
      <ixy unit="KG*M2"> -0.123 </ixy>
      <ixz unit="KG*M2"> 273162.635 </ixz>
      <iyz unit="KG*M2"> 1.561 </iyz>
      <emptywt unit="KG"> 78500.00 </emptywt>
      <location name="CG" unit="M">
        <x> 18.4000 </x>
        <y> -0.0000 </y>
        <z> 0.9000 </z>
      </location>
      <pointmass name="pilot">
        <weight unit="KG"> 100.00 </weight>
        <location unit="M">
          <x> 2.9000 </x>
          <y> -0.5000 </y>
          <z> 1.7000 </z>
        </location>
      </pointmass>
      <pointmass name="co-pilot">
        <weight unit="KG"> 100.00 </weight>
        <location unit="M">
          <x> 2.9000 </x>
          <y> 0.5000 </y>
          <z> 1.7000 </z>
        </location>
      </pointmass>
      <pointmass name="navigator">
        <weight unit="KG"> 100.00 </weight>
        <location unit="M">
          <x> 3.6000 </x>
          <y> 0.0000 </y>
          <z> 1.7000 </z>
        </location>
      </pointmass>
      <pointmass name="mission crew">
        <weight unit="KG"> 2400.00 </weight>
        <location unit="M">
          <x> 15.0000 </x>
          <y> 0.0000 </y>
          <z> 1.5000 </z>
        </location>
      </pointmass>
    </mass_balance>
    <ground_reactions>
      <contact type="BOGEY" name="Nose Gear">
        <location unit="M">
          <x> 5.4800 </x>
          <y> 0.0000 </y>
          <z> -2.2300 </z>
        </location>
        <static_friction> 0.8 </static_friction>
        <dynamic_friction> 0.5 </dynamic_friction>
        <rolling_friction> 0.02 </rolling_friction>
        <spring_coeff unit="N/M"> 693991 </spring_coeff>
        <damping_coeff unit="N/M/SEC"> 76769 </damping_coeff>
        <damping_coeff_rebound unit="N/M/SEC"> 153537 </damping_coeff_rebound>
        <max_steer unit="DEG"> 60.0 </max_steer>
        <brake_group> NONE </brake_group>
        <retractable> 1 </retractable>
      </contact>
      <contact type="BOGEY" name="Left Main Gear">
        <location unit="M">
          <x> 19.3800 </x>
          <y> -3.3660 </y>
          <z> -2.2600 </z>
        </location>
        <static_friction> 0.8 </static_friction>
        <dynamic_friction> 0.5 </dynamic_friction>
        <rolling_friction> 0.02 </rolling_friction>
        <spring_coeff unit="N/M"> 3347693 </spring_coeff>
        <damping_coeff unit="N/M/SEC"> 414029 </damping_coeff>
        <damping_coeff_rebound unit="N/M/SEC"> 828058 </damping_coeff_rebound>
        <max_steer unit="DEG"> 0.0 </max_steer>
        <brake_group> LEFT </brake_group>
        <retractable> 1 </retractable>
      </contact>
      <contact type="BOGEY" name="Right Main Gear">
        <location unit="M">
          <x> 19.3800 </x>
          <y> 3.3660 </y>
          <z> -2.2600 </z>
        </location>
        <static_friction> 0.8 </static_friction>
        <dynamic_friction> 0.5 </dynamic_friction>
        <rolling_friction> 0.02 </rolling_friction>
        <spring_coeff unit="N/M"> 3347693 </spring_coeff>
        <damping_coeff unit="N/M/SEC"> 414029 </damping_coeff>
        <damping_coeff_rebound unit="N/M/SEC"> 828058 </damping_coeff_rebound>
        <max_steer unit="DEG"> 0.0 </max_steer>
        <brake_group> RIGHT </brake_group>
        <retractable> 1 </retractable>
      </contact>
      <contact type="STRUCTURE" name="fin rear">
        <location unit="M">
          <x> 40.0090 </x>
          <y> 0.0000 </y>
          <z> 10.4900 </z>
        </location>
        <static_friction> 0.8 </static_friction>
        <dynamic_friction> 0.6 </dynamic_friction>
        <spring_coeff unit="N/M"> 7676463 </spring_coeff>
        <damping_coeff unit="N/M/SEC"> 255882 </damping_coeff>
        <damping_coeff_rebound unit="N/M/SEC"> 255882 </damping_coeff_rebound>
      </contact>
      <contact type="STRUCTURE" name="fuselage front">
        <location unit="M">
          <x> -0.6000 </x>
          <y> 0.0000 </y>
          <z> 0.3300 </z>
        </location>
        <static_friction> 0.8 </static_friction>
        <dynamic_friction> 0.6 </dynamic_friction>
        <spring_coeff unit="N/M"> 5604193 </spring_coeff>
        <damping_coeff unit="N/M/SEC"> 186806 </damping_coeff>
        <damping_coeff_rebound unit="N/M/SEC"> 186806 </damping_coeff_rebound>
      </contact>
      <contact type="STRUCTURE" name="fuselage front 2">
        <location unit="M">
          <x> 2.7748 </x>
          <y> 0.0000 </y>
          <z> 2.5656 </z>
        </location>
        <static_friction> 0.8 </static_friction>
        <dynamic_friction> 0.6 </dynamic_friction>
        <spring_coeff unit="N/M"> 7639233 </spring_coeff>
        <damping_coeff unit="N/M/SEC"> 254641 </damping_coeff>
        <damping_coeff_rebound unit="N/M/SEC"> 254641 </damping_coeff_rebound>
      </contact>
      <contact type="STRUCTURE" name="fuselage bottom">
        <location unit="M">
          <x> 25.2380 </x>
          <y> -0.0000 </y>
          <z> -0.8007 </z>
        </location>
        <static_friction> 0.8 </static_friction>
        <dynamic_friction> 0.6 </dynamic_friction>
        <spring_coeff unit="N/M"> 40868038 </spring_coeff>
        <damping_coeff unit="N/M/SEC"> 1362268 </damping_coeff>
        <damping_coeff_rebound unit="N/M/SEC"> 1362268 </damping_coeff_rebound>
      </contact>
      <contact type="STRUCTURE" name="htail left rear">
        <location unit="M">
          <x> 41.1930 </x>
          <y> -6.0241 </y>
          <z> 2.9619 </z>
        </location>
        <static_friction> 0.8 </static_friction>
        <dynamic_friction> 0.6 </dynamic_friction>
        <spring_coeff unit="N/M"> 7285951 </spring_coeff>
        <damping_coeff unit="N/M/SEC"> 242865 </damping_coeff>
        <damping_coeff_rebound unit="N/M/SEC"> 242865 </damping_coeff_rebound>
      </contact>
      <contact type="STRUCTURE" name="htail right rear">
        <location unit="M">
          <x> 41.1930 </x>
          <y> 6.0241 </y>
          <z> 2.9619 </z>
        </location>
        <static_friction> 0.8 </static_friction>
        <dynamic_friction> 0.6 </dynamic_friction>
        <spring_coeff unit="N/M"> 7285948 </spring_coeff>
        <damping_coeff unit="N/M/SEC"> 242865 </damping_coeff>
        <damping_coeff_rebound unit="N/M/SEC"> 242865 </damping_coeff_rebound>
      </contact>
      <contact type="STRUCTURE" name="inboard nacelle left front">
        <location unit="M">
          <x> 14.1199 </x>
          <y> -8.2800 </y>
          <z> -1.3305 </z>
        </location>
        <static_friction> 0.8 </static_friction>
        <dynamic_friction> 0.6 </dynamic_friction>
        <spring_coeff unit="N/M"> 21452405 </spring_coeff>
        <damping_coeff unit="N/M/SEC"> 715080 </damping_coeff>
        <damping_coeff_rebound unit="N/M/SEC"> 715080 </damping_coeff_rebound>
      </contact>
      <contact type="STRUCTURE" name="inboard nacelle right front">
        <location unit="M">
          <x> 14.1199 </x>
          <y> 8.2800 </y>
          <z> -1.3305 </z>
        </location>
        <static_friction> 0.8 </static_friction>
        <dynamic_friction> 0.6 </dynamic_friction>
        <spring_coeff unit="N/M"> 21452371 </spring_coeff>
        <damping_coeff unit="N/M/SEC"> 715079 </damping_coeff>
        <damping_coeff_rebound unit="N/M/SEC"> 715079 </damping_coeff_rebound>
      </contact>
      <contact type="STRUCTURE" name="outboard nacelle left bottom">
        <location unit="M">
          <x> 18.2000 </x>
          <y> -14.7619 </y>
          <z> -0.3173 </z>
        </location>
        <static_friction> 0.8 </static_friction>
        <dynamic_friction> 0.6 </dynamic_friction>
        <spring_coeff unit="N/M"> 9965995 </spring_coeff>
        <damping_coeff unit="N/M/SEC"> 332200 </damping_coeff>
        <damping_coeff_rebound unit="N/M/SEC"> 332200 </damping_coeff_rebound>
      </contact>
      <contact type="STRUCTURE" name="outboard nacelle right bottom">
        <location unit="M">
          <x> 18.2000 </x>
          <y> 14.7619 </y>
          <z> -0.3173 </z>
        </location>
        <static_friction> 0.8 </static_friction>
        <dynamic_friction> 0.6 </dynamic_friction>
        <spring_coeff unit="N/M"> 9965982 </spring_coeff>
        <damping_coeff unit="N/M/SEC"> 332199 </damping_coeff>
        <damping_coeff_rebound unit="N/M/SEC"> 332199 </damping_coeff_rebound>
      </contact>
      <contact type="STRUCTURE" name="wing left rear">
        <location unit="M">
          <x> 25.7830 </x>
          <y> -19.9400 </y>
          <z> 2.4480 </z>
        </location>
        <static_friction> 0.8 </static_friction>
        <dynamic_friction> 0.6 </dynamic_friction>
        <spring_coeff unit="N/M"> 2741201 </spring_coeff>
        <damping_coeff unit="N/M/SEC"> 91373 </damping_coeff>
        <damping_coeff_rebound unit="N/M/SEC"> 91373 </damping_coeff_rebound>
      </contact>
      <contact type="STRUCTURE" name="wing left rear 2">
        <location unit="M">
          <x> 28.5626 </x>
          <y> -19.9342 </y>
          <z> 2.4956 </z>
        </location>
        <static_friction> 0.8 </static_friction>
        <dynamic_friction> 0.6 </dynamic_friction>
        <spring_coeff unit="N/M"> 2598380 </spring_coeff>
        <damping_coeff unit="N/M/SEC"> 86613 </damping_coeff>
        <damping_coeff_rebound unit="N/M/SEC"> 86613 </damping_coeff_rebound>
      </contact>
      <contact type="STRUCTURE" name="wing right rear">
        <location unit="M">
          <x> 28.5626 </x>
          <y> 19.9342 </y>
          <z> 2.4956 </z>
        </location>
        <static_friction> 0.8 </static_friction>
        <dynamic_friction> 0.6 </dynamic_friction>
        <spring_coeff unit="N/M"> 2598378 </spring_coeff>
        <damping_coeff unit="N/M/SEC"> 86613 </damping_coeff>
        <damping_coeff_rebound unit="N/M/SEC"> 86613 </damping_coeff_rebound>
      </contact>
      <contact type="STRUCTURE" name="wing right rear 2">
        <location unit="M">
          <x> 25.7830 </x>
          <y> 19.9400 </y>
          <z> 2.4480 </z>
        </location>
        <static_friction> 0.8 </static_friction>
        <dynamic_friction> 0.6 </dynamic_friction>
        <spring_coeff unit="N/M"> 2741198 </spring_coeff>
        <damping_coeff unit="N/M/SEC"> 91373 </damping_coeff>
        <damping_coeff_rebound unit="N/M/SEC"> 91373 </damping_coeff_rebound>
      </contact>
    </ground_reactions>
    <propulsion>
      <engine file="rc135w_engine0">
        <location unit="M">
          <x> 15.7000 </x>
          <y> -8.2800 </y>
          <z> -0.3500 </z>
        </location>
        <feed>0</feed>
        <feed>1</feed>
        <feed>2</feed>
        <feed>3</feed>
        <feed>4</feed>
        <feed>5</feed>
        <feed>6</feed>
        <feed>7</feed>
        <thruster file="rc135w_nozzle0">
          <location unit="M">
            <x> 17.4000 </x>
            <y> -8.2800 </y>
            <z> -0.3500 </z>
          </location>
          <orient unit="DEG"> <roll>0.00</roll> <pitch>0.00</pitch> <yaw>0.00</yaw> </orient>

        </thruster>
      </engine>
      <engine file="rc135w_engine0">
        <location unit="M">
          <x> 15.7000 </x>
          <y> 8.2800 </y>
          <z> -0.3500 </z>
        </location>
        <feed>0</feed>
        <feed>1</feed>
        <feed>2</feed>
        <feed>3</feed>
        <feed>4</feed>
        <feed>5</feed>
        <feed>6</feed>
        <feed>7</feed>
        <thruster file="rc135w_nozzle0">
          <location unit="M">
            <x> 17.4000 </x>
            <y> 8.2800 </y>
            <z> -0.3500 </z>
          </location>
          <orient unit="DEG"> <roll>0.00</roll> <pitch>0.00</pitch> <yaw>0.00</yaw> </orient>

        </thruster>
      </engine>
      <engine file="rc135w_engine1">
        <location unit="M">
          <x> 20.2000 </x>
          <y> -14.0500 </y>
          <z> 0.2000 </z>
        </location>
        <feed>0</feed>
        <feed>1</feed>
        <feed>2</feed>
        <feed>3</feed>
        <feed>4</feed>
        <feed>5</feed>
        <feed>6</feed>
        <feed>7</feed>
        <thruster file="rc135w_nozzle1">
          <location unit="M">
            <x> 21.9000 </x>
            <y> -14.0500 </y>
            <z> 0.2000 </z>
          </location>
          <orient unit="DEG"> <roll>0.00</roll> <pitch>0.00</pitch> <yaw>0.00</yaw> </orient>

        </thruster>
      </engine>
      <engine file="rc135w_engine1">
        <location unit="M">
          <x> 20.2000 </x>
          <y> 14.0500 </y>
          <z> 0.2000 </z>
        </location>
        <feed>0</feed>
        <feed>1</feed>
        <feed>2</feed>
        <feed>3</feed>
        <feed>4</feed>
        <feed>5</feed>
        <feed>6</feed>
        <feed>7</feed>
        <thruster file="rc135w_nozzle1">
          <location unit="M">
            <x> 21.9000 </x>
            <y> 14.0500 </y>
            <z> 0.2000 </z>
          </location>
          <orient unit="DEG"> <roll>0.00</roll> <pitch>0.00</pitch> <yaw>0.00</yaw> </orient>

        </thruster>
      </engine>
      <tank type="FUEL">
        <location unit="M">
          <x> 16.9600 </x>
          <y> -5.0000 </y>
          <z> 0.5500 </z>
        </location>
        <capacity unit="KG"> 5900.00 </capacity>
        <contents unit="KG"> 2950.00 </contents>
      </tank>
      <tank type="FUEL">
        <location unit="M">
          <x> 16.9600 </x>
          <y> 5.0000 </y>
          <z> 0.5500 </z>
        </location>
        <capacity unit="KG"> 5900.00 </capacity>
        <contents unit="KG"> 2950.00 </contents>
      </tank>
      <tank type="FUEL">
        <location unit="M">
          <x> 20.9400 </x>
          <y> -11.0000 </y>
          <z> 1.3000 </z>
        </location>
        <capacity unit="KG"> 4540.00 </capacity>
        <contents unit="KG"> 2270.00 </contents>
      </tank>
      <tank type="FUEL">
        <location unit="M">
          <x> 20.9400 </x>
          <y> 11.0000 </y>
          <z> 1.3000 </z>
        </location>
        <capacity unit="KG"> 4540.00 </capacity>
        <contents unit="KG"> 2270.00 </contents>
      </tank>
      <tank type="FUEL">
        <location unit="M">
          <x> 24.2500 </x>
          <y> -16.0000 </y>
          <z> 1.9000 </z>
        </location>
        <capacity unit="KG"> 900.00 </capacity>
        <contents unit="KG"> 450.00 </contents>
      </tank>
      <tank type="FUEL">
        <location unit="M">
          <x> 24.2500 </x>
          <y> 16.0000 </y>
          <z> 1.9000 </z>
        </location>
        <capacity unit="KG"> 900.00 </capacity>
        <contents unit="KG"> 450.00 </contents>
      </tank>
      <tank type="FUEL">
        <location unit="M">
          <x> 14.5000 </x>
          <y> 0.0000 </y>
          <z> -0.2500 </z>
        </location>
        <capacity unit="KG"> 22226.00 </capacity>
        <contents unit="KG"> 11113.00 </contents>
      </tank>
      <tank type="FUEL">
        <location unit="M">
          <x> 23.7000 </x>
          <y> 0.0000 </y>
          <z> -0.3000 </z>
        </location>
        <capacity unit="KG"> 14500.00 </capacity>
        <contents unit="KG"> 7250.00 </contents>
      </tank>
    </propulsion>
    <flight_control name="rc135w">
      <!-- the aircraft's profile for the platform (docs/control-architecture.md, section 7): what
           hangar knows of it - its design, its flight tests, its identified responses -->
      <property value="1">fsim/identity/version</property>
      <property value="1">fsim/identity/provenance</property>
      <property value="5">fsim/identity/class</property>
      <property value="1">fsim/identity/family</property>
      <property value="1">fsim/effectors/version</property>
      <property value="1">fsim/effectors/provenance</property>
      <property value="1">fsim/effectors/flaps</property>
      <property value="8">fsim/effectors/flaps_transit_s</property>
      <property value="0.0">fsim/effectors/neutral</property>
      <property value="0.0">fsim/effectors/pitch</property>
      <property value="1">fsim/effectors/pitch_trim</property>
      <property value="1">fsim/effectors/retractable_gear</property>
      <property value="0.0">fsim/effectors/roll</property>
      <property value="1">fsim/effectors/speedbrake</property>
      <property value="1">fsim/effectors/wheel_brakes</property>
      <property value="0.0">fsim/effectors/yaw</property>
      <property value="1">fsim/envelope/version</property>
      <property value="1">fsim/envelope/provenance</property>
      <property value="17.7218">fsim/envelope/clean/alpha_max_deg</property>
      <property value="74.7462">fsim/envelope/clean/cas_min_ms</property>
      <property value="12.86">fsim/envelope/crosswind_max_ms</property>
      <property value="12.6">fsim/envelope/ground_pitch_max_deg</property>
      <property value="8.65">fsim/envelope/ground_turn_radius_m</property>
      <property value="0.0323">fsim/envelope/ground_yaw_accel_rad_s2</property>
      <property value="1">fsim/propulsion/version</property>
      <property value="1">fsim/propulsion/provenance</property>
      <property value="0.0">fsim/propulsion/afterburner</property>
      <property value="4">fsim/propulsion/engines</property>
      <property value="0.324558">fsim/propulsion/spool_s</property>
      <property value="2">fsim/propulsion/type</property>
      <property value="1">fsim/plant/version</property>
      <property value="1">fsim/plant/provenance</property>
      <property value="-2.3091">fsim/plant/alpha_zero_lift_deg</property>
      <property value="3000">fsim/plant/altitude_m</property>
      <property value="150.783">fsim/plant/eas_ms</property>
      <property value="0.223431">fsim/plant/elevator_trim</property>
      <property value="-0.33527">fsim/plant/elevator_trim_lift</property>
      <property value="2.95304">fsim/plant/pitch/gain</property>
      <property value="0.551475">fsim/plant/pitch/tau_s</property>
      <property value="0.894261">fsim/plant/roll/gain</property>
      <property value="0.404466">fsim/plant/roll/tau_s</property>
      <property value="2.3392">fsim/plant/speed/gain</property>
      <property value="0.324558">fsim/plant/speed/tau_s</property>
      <property value="173.26">fsim/plant/tas_ms</property>
      <property value="0.546152">fsim/plant/throttle_trim</property>
      <property value="0.468328">fsim/plant/yaw/gain</property>
      <property value="1">fsim/performance/version</property>
      <property value="1">fsim/performance/provenance</property>
      <property value="11794.7">fsim/performance/ceiling_m</property>
      <property value="295.048">fsim/performance/max_tas_ms</property>
      <property value="74.7462">fsim/performance/stall_cas_ms</property>
      <property value="69.8958">fsim/performance/stall_flaps_cas_ms</property>
      <property value="1">fsim/applicability/version</property>
      <property value="1">fsim/applicability/provenance</property>
      <property value="0.0">fsim/applicability/aerobatic</property>
      <property value="1">fsim/applicability/carrier</property>
      <property value="2">fsim/applicability/drag_devices</property>
      <property value="1">fsim/applicability/flaps</property>
      <property value="1">fsim/applicability/ground_contact</property>
      <property value="1">fsim/applicability/releasable_stores</property>
      <property value="1">fsim/applicability/retractable_gear</property>
      <property value="0.0">fsim/applicability/vertical_flight</property>
      <property value="1">fsim/tables/version</property>
      <property value="1">fsim/tables/provenance</property>
      <property value="100">fsim/tables/altitude_m/h0</property>
      <property value="2360">fsim/tables/altitude_m/h1</property>
      <property value="4720">fsim/tables/altitude_m/h2</property>
      <property value="7080">fsim/tables/altitude_m/h3</property>
      <property value="8850">fsim/tables/altitude_m/h4</property>
      <property value="10030">fsim/tables/altitude_m/h5</property>
      <property value="11200">fsim/tables/altitude_m/h6</property>
      <property value="0.700469">fsim/tables/best_endurance_fuel_kg_s/h0/w0</property>
      <property value="0.839333">fsim/tables/best_endurance_fuel_kg_s/h0/w1</property>
      <property value="0.856152">fsim/tables/best_endurance_fuel_kg_s/h0/w2</property>
      <property value="0.997835">fsim/tables/best_endurance_fuel_kg_s/h0/w3</property>
      <property value="0.637326">fsim/tables/best_endurance_fuel_kg_s/h1/w0</property>
      <property value="0.759881">fsim/tables/best_endurance_fuel_kg_s/h1/w1</property>
      <property value="0.775961">fsim/tables/best_endurance_fuel_kg_s/h1/w2</property>
      <property value="0.908395">fsim/tables/best_endurance_fuel_kg_s/h1/w3</property>
      <property value="0.571268">fsim/tables/best_endurance_fuel_kg_s/h2/w0</property>
      <property value="0.681288">fsim/tables/best_endurance_fuel_kg_s/h2/w1</property>
      <property value="0.698198">fsim/tables/best_endurance_fuel_kg_s/h2/w2</property>
      <property value="0.820145">fsim/tables/best_endurance_fuel_kg_s/h2/w3</property>
      <property value="0.50894">fsim/tables/best_endurance_fuel_kg_s/h3/w0</property>
      <property value="0.612329">fsim/tables/best_endurance_fuel_kg_s/h3/w1</property>
      <property value="0.6255">fsim/tables/best_endurance_fuel_kg_s/h3/w2</property>
      <property value="0.741056">fsim/tables/best_endurance_fuel_kg_s/h3/w3</property>
      <property value="0.46479">fsim/tables/best_endurance_fuel_kg_s/h4/w0</property>
      <property value="0.564068">fsim/tables/best_endurance_fuel_kg_s/h4/w1</property>
      <property value="0.574883">fsim/tables/best_endurance_fuel_kg_s/h4/w2</property>
      <property value="0.694056">fsim/tables/best_endurance_fuel_kg_s/h4/w3</property>
      <property value="0.439431">fsim/tables/best_endurance_fuel_kg_s/h5/w0</property>
      <property value="0.538877">fsim/tables/best_endurance_fuel_kg_s/h5/w1</property>
      <property value="0.550316">fsim/tables/best_endurance_fuel_kg_s/h5/w2</property>
      <property value="0.65114">fsim/tables/best_endurance_fuel_kg_s/h5/w3</property>
      <property value="0.417995">fsim/tables/best_endurance_fuel_kg_s/h6/w0</property>
      <property value="0.518443">fsim/tables/best_endurance_fuel_kg_s/h6/w1</property>
      <property value="0.530752">fsim/tables/best_endurance_fuel_kg_s/h6/w2</property>
      <property value="113.378">fsim/tables/best_endurance_tas_ms/h0/w0</property>
      <property value="127.511">fsim/tables/best_endurance_tas_ms/h0/w1</property>
      <property value="129.122">fsim/tables/best_endurance_tas_ms/h0/w2</property>
      <property value="141.374">fsim/tables/best_endurance_tas_ms/h0/w3</property>
      <property value="126.101">fsim/tables/best_endurance_tas_ms/h1/w0</property>
      <property value="139.659">fsim/tables/best_endurance_tas_ms/h1/w1</property>
      <property value="141.795">fsim/tables/best_endurance_tas_ms/h1/w2</property>
      <property value="158.06">fsim/tables/best_endurance_tas_ms/h1/w3</property>
      <property value="140.096">fsim/tables/best_endurance_tas_ms/h2/w0</property>
      <property value="155.809">fsim/tables/best_endurance_tas_ms/h2/w1</property>
      <property value="158.217">fsim/tables/best_endurance_tas_ms/h2/w2</property>
      <property value="177.648">fsim/tables/best_endurance_tas_ms/h2/w3</property>
      <property value="158.373">fsim/tables/best_endurance_tas_ms/h3/w0</property>
      <property value="176.653">fsim/tables/best_endurance_tas_ms/h3/w1</property>
      <property value="181.866">fsim/tables/best_endurance_tas_ms/h3/w2</property>
      <property value="201.683">fsim/tables/best_endurance_tas_ms/h3/w3</property>
      <property value="174.77">fsim/tables/best_endurance_tas_ms/h4/w0</property>
      <property value="195.124">fsim/tables/best_endurance_tas_ms/h4/w1</property>
      <property value="194.703">fsim/tables/best_endurance_tas_ms/h4/w2</property>
      <property value="212.117">fsim/tables/best_endurance_tas_ms/h4/w3</property>
      <property value="185.473">fsim/tables/best_endurance_tas_ms/h5/w0</property>
      <property value="211.378">fsim/tables/best_endurance_tas_ms/h5/w1</property>
      <property value="211.546">fsim/tables/best_endurance_tas_ms/h5/w2</property>
      <property value="218.424">fsim/tables/best_endurance_tas_ms/h5/w3</property>
      <property value="200.156">fsim/tables/best_endurance_tas_ms/h6/w0</property>
      <property value="224.013">fsim/tables/best_endurance_tas_ms/h6/w1</property>
      <property value="227.235">fsim/tables/best_endurance_tas_ms/h6/w2</property>
      <property value="0.858927">fsim/tables/best_range_fuel_kg_s/h0/w0</property>
      <property value="1.0203">fsim/tables/best_range_fuel_kg_s/h0/w1</property>
      <property value="1.0402">fsim/tables/best_range_fuel_kg_s/h0/w2</property>
      <property value="1.2238">fsim/tables/best_range_fuel_kg_s/h0/w3</property>
      <property value="0.770178">fsim/tables/best_range_fuel_kg_s/h1/w0</property>
      <property value="0.925772">fsim/tables/best_range_fuel_kg_s/h1/w1</property>
      <property value="0.942804">fsim/tables/best_range_fuel_kg_s/h1/w2</property>
      <property value="1.08137">fsim/tables/best_range_fuel_kg_s/h1/w3</property>
      <property value="0.689886">fsim/tables/best_range_fuel_kg_s/h2/w0</property>
      <property value="0.817029">fsim/tables/best_range_fuel_kg_s/h2/w1</property>
      <property value="0.834081">fsim/tables/best_range_fuel_kg_s/h2/w2</property>
      <property value="0.967591">fsim/tables/best_range_fuel_kg_s/h2/w3</property>
      <property value="0.601999">fsim/tables/best_range_fuel_kg_s/h3/w0</property>
      <property value="0.71956">fsim/tables/best_range_fuel_kg_s/h3/w1</property>
      <property value="0.734553">fsim/tables/best_range_fuel_kg_s/h3/w2</property>
      <property value="0.809299">fsim/tables/best_range_fuel_kg_s/h3/w3</property>
      <property value="0.550697">fsim/tables/best_range_fuel_kg_s/h4/w0</property>
      <property value="0.61512">fsim/tables/best_range_fuel_kg_s/h4/w1</property>
      <property value="0.624597">fsim/tables/best_range_fuel_kg_s/h4/w2</property>
      <property value="0.724101">fsim/tables/best_range_fuel_kg_s/h4/w3</property>
      <property value="0.490659">fsim/tables/best_range_fuel_kg_s/h5/w0</property>
      <property value="0.568315">fsim/tables/best_range_fuel_kg_s/h5/w1</property>
      <property value="0.57734">fsim/tables/best_range_fuel_kg_s/h5/w2</property>
      <property value="0.680679">fsim/tables/best_range_fuel_kg_s/h5/w3</property>
      <property value="0.446484">fsim/tables/best_range_fuel_kg_s/h6/w0</property>
      <property value="0.537643">fsim/tables/best_range_fuel_kg_s/h6/w1</property>
      <property value="0.553639">fsim/tables/best_range_fuel_kg_s/h6/w2</property>
      <property value="157.2">fsim/tables/best_range_tas_ms/h0/w0</property>
      <property value="177.151">fsim/tables/best_range_tas_ms/h0/w1</property>
      <property value="179.311">fsim/tables/best_range_tas_ms/h0/w2</property>
      <property value="201.695">fsim/tables/best_range_tas_ms/h0/w3</property>
      <property value="173.616">fsim/tables/best_range_tas_ms/h1/w0</property>
      <property value="197.304">fsim/tables/best_range_tas_ms/h1/w1</property>
      <property value="199.915">fsim/tables/best_range_tas_ms/h1/w2</property>
      <property value="218.27">fsim/tables/best_range_tas_ms/h1/w3</property>
      <property value="195.874">fsim/tables/best_range_tas_ms/h2/w0</property>
      <property value="218.072">fsim/tables/best_range_tas_ms/h2/w1</property>
      <property value="221.286">fsim/tables/best_range_tas_ms/h2/w2</property>
      <property value="242.403">fsim/tables/best_range_tas_ms/h2/w3</property>
      <property value="217.877">fsim/tables/best_range_tas_ms/h3/w0</property>
      <property value="243.295">fsim/tables/best_range_tas_ms/h3/w1</property>
      <property value="246.341">fsim/tables/best_range_tas_ms/h3/w2</property>
      <property value="248.292">fsim/tables/best_range_tas_ms/h3/w3</property>
      <property value="240.103">fsim/tables/best_range_tas_ms/h4/w0</property>
      <property value="242.361">fsim/tables/best_range_tas_ms/h4/w1</property>
      <property value="243.275">fsim/tables/best_range_tas_ms/h4/w2</property>
      <property value="248.112">fsim/tables/best_range_tas_ms/h4/w3</property>
      <property value="237.767">fsim/tables/best_range_tas_ms/h5/w0</property>
      <property value="242.576">fsim/tables/best_range_tas_ms/h5/w1</property>
      <property value="242.518">fsim/tables/best_range_tas_ms/h5/w2</property>
      <property value="246.286">fsim/tables/best_range_tas_ms/h5/w3</property>
      <property value="237.842">fsim/tables/best_range_tas_ms/h6/w0</property>
      <property value="244.319">fsim/tables/best_range_tas_ms/h6/w1</property>
      <property value="246.894">fsim/tables/best_range_tas_ms/h6/w2</property>
      <property value="200.582">fsim/tables/climb_tas_ms/h0/w0</property>
      <property value="203.806">fsim/tables/climb_tas_ms/h0/w1</property>
      <property value="203.452">fsim/tables/climb_tas_ms/h0/w2</property>
      <property value="202.535">fsim/tables/climb_tas_ms/h0/w3</property>
      <property value="227.176">fsim/tables/climb_tas_ms/h1/w0</property>
      <property value="233.831">fsim/tables/climb_tas_ms/h1/w1</property>
      <property value="235.222">fsim/tables/climb_tas_ms/h1/w2</property>
      <property value="231.261">fsim/tables/climb_tas_ms/h1/w3</property>
      <property value="242.298">fsim/tables/climb_tas_ms/h2/w0</property>
      <property value="253.345">fsim/tables/climb_tas_ms/h2/w1</property>
      <property value="252.845">fsim/tables/climb_tas_ms/h2/w2</property>
      <property value="245.792">fsim/tables/climb_tas_ms/h2/w3</property>
      <property value="241.483">fsim/tables/climb_tas_ms/h3/w0</property>
      <property value="245.52">fsim/tables/climb_tas_ms/h3/w1</property>
      <property value="247.961">fsim/tables/climb_tas_ms/h3/w2</property>
      <property value="249.082">fsim/tables/climb_tas_ms/h3/w3</property>
      <property value="240.86">fsim/tables/climb_tas_ms/h4/w0</property>
      <property value="242.698">fsim/tables/climb_tas_ms/h4/w1</property>
      <property value="240.411">fsim/tables/climb_tas_ms/h4/w2</property>
      <property value="245.426">fsim/tables/climb_tas_ms/h4/w3</property>
      <property value="238.809">fsim/tables/climb_tas_ms/h5/w0</property>
      <property value="239.563">fsim/tables/climb_tas_ms/h5/w1</property>
      <property value="237.553">fsim/tables/climb_tas_ms/h5/w2</property>
      <property value="240.623">fsim/tables/climb_tas_ms/h5/w3</property>
      <property value="236.28">fsim/tables/climb_tas_ms/h6/w0</property>
      <property value="231.522">fsim/tables/climb_tas_ms/h6/w1</property>
      <property value="234.267">fsim/tables/climb_tas_ms/h6/w2</property>
      <property value="59406">fsim/tables/fuel_capacity_kg</property>
      <property value="0.741553">fsim/tables/fuel_kg_s/h0/w0/v0</property>
      <property value="0.702053">fsim/tables/fuel_kg_s/h0/w0/v1</property>
      <property value="1.30939">fsim/tables/fuel_kg_s/h0/w0/v10</property>
      <property value="1.40413">fsim/tables/fuel_kg_s/h0/w0/v11</property>
      <property value="1.5025">fsim/tables/fuel_kg_s/h0/w0/v12</property>
      <property value="1.60653">fsim/tables/fuel_kg_s/h0/w0/v13</property>
      <property value="1.72836">fsim/tables/fuel_kg_s/h0/w0/v14</property>
      <property value="1.90609">fsim/tables/fuel_kg_s/h0/w0/v15</property>
      <property value="0.715615">fsim/tables/fuel_kg_s/h0/w0/v2</property>
      <property value="0.75195">fsim/tables/fuel_kg_s/h0/w0/v3</property>
      <property value="0.811096">fsim/tables/fuel_kg_s/h0/w0/v4</property>
      <property value="0.877202">fsim/tables/fuel_kg_s/h0/w0/v5</property>
      <property value="0.956828">fsim/tables/fuel_kg_s/h0/w0/v6</property>
      <property value="1.03687">fsim/tables/fuel_kg_s/h0/w0/v7</property>
      <property value="1.12466">fsim/tables/fuel_kg_s/h0/w0/v8</property>
      <property value="1.21681">fsim/tables/fuel_kg_s/h0/w0/v9</property>
      <property value="0.944764">fsim/tables/fuel_kg_s/h0/w1/v0</property>
      <property value="0.85461">fsim/tables/fuel_kg_s/h0/w1/v1</property>
      <property value="1.34175">fsim/tables/fuel_kg_s/h0/w1/v10</property>
      <property value="1.43428">fsim/tables/fuel_kg_s/h0/w1/v11</property>
      <property value="1.53031">fsim/tables/fuel_kg_s/h0/w1/v12</property>
      <property value="1.62985">fsim/tables/fuel_kg_s/h0/w1/v13</property>
      <property value="1.74291">fsim/tables/fuel_kg_s/h0/w1/v14</property>
      <property value="1.90875">fsim/tables/fuel_kg_s/h0/w1/v15</property>
      <property value="0.839339">fsim/tables/fuel_kg_s/h0/w1/v2</property>
      <property value="0.855804">fsim/tables/fuel_kg_s/h0/w1/v3</property>
      <property value="0.894543">fsim/tables/fuel_kg_s/h0/w1/v4</property>
      <property value="0.952713">fsim/tables/fuel_kg_s/h0/w1/v5</property>
      <property value="1.01662">fsim/tables/fuel_kg_s/h0/w1/v6</property>
      <property value="1.0929">fsim/tables/fuel_kg_s/h0/w1/v7</property>
      <property value="1.17274">fsim/tables/fuel_kg_s/h0/w1/v8</property>
      <property value="1.25154">fsim/tables/fuel_kg_s/h0/w1/v9</property>
      <property value="0.970134">fsim/tables/fuel_kg_s/h0/w2/v0</property>
      <property value="0.875078">fsim/tables/fuel_kg_s/h0/w2/v1</property>
      <property value="1.34588">fsim/tables/fuel_kg_s/h0/w2/v10</property>
      <property value="1.43812">fsim/tables/fuel_kg_s/h0/w2/v11</property>
      <property value="1.53386">fsim/tables/fuel_kg_s/h0/w2/v12</property>
      <property value="1.63305">fsim/tables/fuel_kg_s/h0/w2/v13</property>
      <property value="1.7458">fsim/tables/fuel_kg_s/h0/w2/v14</property>
      <property value="1.91098">fsim/tables/fuel_kg_s/h0/w2/v15</property>
      <property value="0.856214">fsim/tables/fuel_kg_s/h0/w2/v2</property>
      <property value="0.870977">fsim/tables/fuel_kg_s/h0/w2/v3</property>
      <property value="0.906255">fsim/tables/fuel_kg_s/h0/w2/v4</property>
      <property value="0.962343">fsim/tables/fuel_kg_s/h0/w2/v5</property>
      <property value="1.02611">fsim/tables/fuel_kg_s/h0/w2/v6</property>
      <property value="1.09998">fsim/tables/fuel_kg_s/h0/w2/v7</property>
      <property value="1.17962">fsim/tables/fuel_kg_s/h0/w2/v8</property>
      <property value="1.2581">fsim/tables/fuel_kg_s/h0/w2/v9</property>
      <property value="1.16761">fsim/tables/fuel_kg_s/h0/w3/v0</property>
      <property value="1.06071">fsim/tables/fuel_kg_s/h0/w3/v1</property>
      <property value="1.39211">fsim/tables/fuel_kg_s/h0/w3/v10</property>
      <property value="1.47217">fsim/tables/fuel_kg_s/h0/w3/v11</property>
      <property value="1.56515">fsim/tables/fuel_kg_s/h0/w3/v12</property>
      <property value="1.66132">fsim/tables/fuel_kg_s/h0/w3/v13</property>
      <property value="1.77151">fsim/tables/fuel_kg_s/h0/w3/v14</property>
      <property value="1.93083">fsim/tables/fuel_kg_s/h0/w3/v15</property>
      <property value="1.00144">fsim/tables/fuel_kg_s/h0/w3/v2</property>
      <property value="0.999345">fsim/tables/fuel_kg_s/h0/w3/v3</property>
      <property value="1.01682">fsim/tables/fuel_kg_s/h0/w3/v4</property>
      <property value="1.05411">fsim/tables/fuel_kg_s/h0/w3/v5</property>
      <property value="1.10794">fsim/tables/fuel_kg_s/h0/w3/v6</property>
      <property value="1.17032">fsim/tables/fuel_kg_s/h0/w3/v7</property>
      <property value="1.23949">fsim/tables/fuel_kg_s/h0/w3/v8</property>
      <property value="1.31524">fsim/tables/fuel_kg_s/h0/w3/v9</property>
      <property value="0.721319">fsim/tables/fuel_kg_s/h1/w0/v0</property>
      <property value="0.650764">fsim/tables/fuel_kg_s/h1/w0/v1</property>
      <property value="1.02863">fsim/tables/fuel_kg_s/h1/w0/v10</property>
      <property value="1.10412">fsim/tables/fuel_kg_s/h1/w0/v11</property>
      <property value="1.1823">fsim/tables/fuel_kg_s/h1/w0/v12</property>
      <property value="1.26296">fsim/tables/fuel_kg_s/h1/w0/v13</property>
      <property value="1.36201">fsim/tables/fuel_kg_s/h1/w0/v14</property>
      <property value="1.54319">fsim/tables/fuel_kg_s/h1/w0/v15</property>
      <property value="0.637328">fsim/tables/fuel_kg_s/h1/w0/v2</property>
      <property value="0.650114">fsim/tables/fuel_kg_s/h1/w0/v3</property>
      <property value="0.67799">fsim/tables/fuel_kg_s/h1/w0/v4</property>
      <property value="0.72249">fsim/tables/fuel_kg_s/h1/w0/v5</property>
      <property value="0.772075">fsim/tables/fuel_kg_s/h1/w0/v6</property>
      <property value="0.830486">fsim/tables/fuel_kg_s/h1/w0/v7</property>
      <property value="0.892537">fsim/tables/fuel_kg_s/h1/w0/v8</property>
      <property value="0.956069">fsim/tables/fuel_kg_s/h1/w0/v9</property>
      <property value="0.890271">fsim/tables/fuel_kg_s/h1/w1/v0</property>
      <property value="0.809896">fsim/tables/fuel_kg_s/h1/w1/v1</property>
      <property value="1.07064">fsim/tables/fuel_kg_s/h1/w1/v10</property>
      <property value="1.13533">fsim/tables/fuel_kg_s/h1/w1/v11</property>
      <property value="1.21083">fsim/tables/fuel_kg_s/h1/w1/v12</property>
      <property value="1.28852">fsim/tables/fuel_kg_s/h1/w1/v13</property>
      <property value="1.38505">fsim/tables/fuel_kg_s/h1/w1/v14</property>
      <property value="1.5437">fsim/tables/fuel_kg_s/h1/w1/v15</property>
      <property value="0.76298">fsim/tables/fuel_kg_s/h1/w1/v2</property>
      <property value="0.76123">fsim/tables/fuel_kg_s/h1/w1/v3</property>
      <property value="0.776544">fsim/tables/fuel_kg_s/h1/w1/v4</property>
      <property value="0.803722">fsim/tables/fuel_kg_s/h1/w1/v5</property>
      <property value="0.844229">fsim/tables/fuel_kg_s/h1/w1/v6</property>
      <property value="0.892939">fsim/tables/fuel_kg_s/h1/w1/v7</property>
      <property value="0.945848">fsim/tables/fuel_kg_s/h1/w1/v8</property>
      <property value="1.00766">fsim/tables/fuel_kg_s/h1/w1/v9</property>
      <property value="0.910564">fsim/tables/fuel_kg_s/h1/w2/v0</property>
      <property value="0.829924">fsim/tables/fuel_kg_s/h1/w2/v1</property>
      <property value="1.07689">fsim/tables/fuel_kg_s/h1/w2/v10</property>
      <property value="1.14114">fsim/tables/fuel_kg_s/h1/w2/v11</property>
      <property value="1.21449">fsim/tables/fuel_kg_s/h1/w2/v12</property>
      <property value="1.29181">fsim/tables/fuel_kg_s/h1/w2/v13</property>
      <property value="1.38805">fsim/tables/fuel_kg_s/h1/w2/v14</property>
      <property value="1.5441">fsim/tables/fuel_kg_s/h1/w2/v15</property>
      <property value="0.780537">fsim/tables/fuel_kg_s/h1/w2/v2</property>
      <property value="0.776663">fsim/tables/fuel_kg_s/h1/w2/v3</property>
      <property value="0.7905">fsim/tables/fuel_kg_s/h1/w2/v4</property>
      <property value="0.815846">fsim/tables/fuel_kg_s/h1/w2/v5</property>
      <property value="0.853226">fsim/tables/fuel_kg_s/h1/w2/v6</property>
      <property value="0.90181">fsim/tables/fuel_kg_s/h1/w2/v7</property>
      <property value="0.952535">fsim/tables/fuel_kg_s/h1/w2/v8</property>
      <property value="1.01415">fsim/tables/fuel_kg_s/h1/w2/v9</property>
      <property value="1.08375">fsim/tables/fuel_kg_s/h1/w3/v0</property>
      <property value="1.0077">fsim/tables/fuel_kg_s/h1/w3/v1</property>
      <property value="1.13098">fsim/tables/fuel_kg_s/h1/w3/v10</property>
      <property value="1.19288">fsim/tables/fuel_kg_s/h1/w3/v11</property>
      <property value="1.25637">fsim/tables/fuel_kg_s/h1/w3/v12</property>
      <property value="1.32158">fsim/tables/fuel_kg_s/h1/w3/v13</property>
      <property value="1.4141">fsim/tables/fuel_kg_s/h1/w3/v14</property>
      <property value="1.54691">fsim/tables/fuel_kg_s/h1/w3/v15</property>
      <property value="0.934982">fsim/tables/fuel_kg_s/h1/w3/v2</property>
      <property value="0.910548">fsim/tables/fuel_kg_s/h1/w3/v3</property>
      <property value="0.909683">fsim/tables/fuel_kg_s/h1/w3/v4</property>
      <property value="0.922356">fsim/tables/fuel_kg_s/h1/w3/v5</property>
      <property value="0.94705">fsim/tables/fuel_kg_s/h1/w3/v6</property>
      <property value="0.978271">fsim/tables/fuel_kg_s/h1/w3/v7</property>
      <property value="1.02579">fsim/tables/fuel_kg_s/h1/w3/v8</property>
      <property value="1.07392">fsim/tables/fuel_kg_s/h1/w3/v9</property>
      <property value="0.671483">fsim/tables/fuel_kg_s/h2/w0/v0</property>
      <property value="0.612483">fsim/tables/fuel_kg_s/h2/w0/v1</property>
      <property value="0.791264">fsim/tables/fuel_kg_s/h2/w0/v10</property>
      <property value="0.839518">fsim/tables/fuel_kg_s/h2/w0/v11</property>
      <property value="0.893236">fsim/tables/fuel_kg_s/h2/w0/v12</property>
      <property value="0.950974">fsim/tables/fuel_kg_s/h2/w0/v13</property>
      <property value="1.02863">fsim/tables/fuel_kg_s/h2/w0/v14</property>
      <property value="1.24835">fsim/tables/fuel_kg_s/h2/w0/v15</property>
      <property value="0.575518">fsim/tables/fuel_kg_s/h2/w0/v2</property>
      <property value="0.571652">fsim/tables/fuel_kg_s/h2/w0/v3</property>
      <property value="0.582161">fsim/tables/fuel_kg_s/h2/w0/v4</property>
      <property value="0.600377">fsim/tables/fuel_kg_s/h2/w0/v5</property>
      <property value="0.625352">fsim/tables/fuel_kg_s/h2/w0/v6</property>
      <property value="0.661243">fsim/tables/fuel_kg_s/h2/w0/v7</property>
      <property value="0.698002">fsim/tables/fuel_kg_s/h2/w0/v8</property>
      <property value="0.744201">fsim/tables/fuel_kg_s/h2/w0/v9</property>
      <property value="0.81718">fsim/tables/fuel_kg_s/h2/w1/v0</property>
      <property value="0.763648">fsim/tables/fuel_kg_s/h2/w1/v1</property>
      <property value="0.838442">fsim/tables/fuel_kg_s/h2/w1/v10</property>
      <property value="0.884672">fsim/tables/fuel_kg_s/h2/w1/v11</property>
      <property value="0.931967">fsim/tables/fuel_kg_s/h2/w1/v12</property>
      <property value="0.980412">fsim/tables/fuel_kg_s/h2/w1/v13</property>
      <property value="1.05153">fsim/tables/fuel_kg_s/h2/w1/v14</property>
      <property value="1.2503">fsim/tables/fuel_kg_s/h2/w1/v15</property>
      <property value="0.708579">fsim/tables/fuel_kg_s/h2/w1/v2</property>
      <property value="0.684202">fsim/tables/fuel_kg_s/h2/w1/v3</property>
      <property value="0.684565">fsim/tables/fuel_kg_s/h2/w1/v4</property>
      <property value="0.694162">fsim/tables/fuel_kg_s/h2/w1/v5</property>
      <property value="0.710126">fsim/tables/fuel_kg_s/h2/w1/v6</property>
      <property value="0.730256">fsim/tables/fuel_kg_s/h2/w1/v7</property>
      <property value="0.763046">fsim/tables/fuel_kg_s/h2/w1/v8</property>
      <property value="0.799215">fsim/tables/fuel_kg_s/h2/w1/v9</property>
      <property value="0.835605">fsim/tables/fuel_kg_s/h2/w2/v0</property>
      <property value="0.783091">fsim/tables/fuel_kg_s/h2/w2/v1</property>
      <property value="0.844356">fsim/tables/fuel_kg_s/h2/w2/v10</property>
      <property value="0.890351">fsim/tables/fuel_kg_s/h2/w2/v11</property>
      <property value="0.937372">fsim/tables/fuel_kg_s/h2/w2/v12</property>
      <property value="0.985509">fsim/tables/fuel_kg_s/h2/w2/v13</property>
      <property value="1.05447">fsim/tables/fuel_kg_s/h2/w2/v14</property>
      <property value="1.25065">fsim/tables/fuel_kg_s/h2/w2/v15</property>
      <property value="0.726743">fsim/tables/fuel_kg_s/h2/w2/v2</property>
      <property value="0.700016">fsim/tables/fuel_kg_s/h2/w2/v3</property>
      <property value="0.698838">fsim/tables/fuel_kg_s/h2/w2/v4</property>
      <property value="0.706889">fsim/tables/fuel_kg_s/h2/w2/v5</property>
      <property value="0.721213">fsim/tables/fuel_kg_s/h2/w2/v6</property>
      <property value="0.741377">fsim/tables/fuel_kg_s/h2/w2/v7</property>
      <property value="0.77121">fsim/tables/fuel_kg_s/h2/w2/v8</property>
      <property value="0.807219">fsim/tables/fuel_kg_s/h2/w2/v9</property>
      <property value="0.992737">fsim/tables/fuel_kg_s/h2/w3/v0</property>
      <property value="0.946472">fsim/tables/fuel_kg_s/h2/w3/v1</property>
      <property value="0.911416">fsim/tables/fuel_kg_s/h2/w3/v10</property>
      <property value="0.946453">fsim/tables/fuel_kg_s/h2/w3/v11</property>
      <property value="0.98435">fsim/tables/fuel_kg_s/h2/w3/v12</property>
      <property value="1.02981">fsim/tables/fuel_kg_s/h2/w3/v13</property>
      <property value="1.09585">fsim/tables/fuel_kg_s/h2/w3/v14</property>
      <property value="1.25993">fsim/tables/fuel_kg_s/h2/w3/v15</property>
      <property value="0.881524">fsim/tables/fuel_kg_s/h2/w3/v2</property>
      <property value="0.841423">fsim/tables/fuel_kg_s/h2/w3/v3</property>
      <property value="0.823133">fsim/tables/fuel_kg_s/h2/w3/v4</property>
      <property value="0.820305">fsim/tables/fuel_kg_s/h2/w3/v5</property>
      <property value="0.82654">fsim/tables/fuel_kg_s/h2/w3/v6</property>
      <property value="0.838175">fsim/tables/fuel_kg_s/h2/w3/v7</property>
      <property value="0.858663">fsim/tables/fuel_kg_s/h2/w3/v8</property>
      <property value="0.880414">fsim/tables/fuel_kg_s/h2/w3/v9</property>
      <property value="0.611932">fsim/tables/fuel_kg_s/h3/w0/v0</property>
      <property value="0.574511">fsim/tables/fuel_kg_s/h3/w0/v1</property>
      <property value="0.604797">fsim/tables/fuel_kg_s/h3/w0/v10</property>
      <property value="0.635086">fsim/tables/fuel_kg_s/h3/w0/v11</property>
      <property value="0.667949">fsim/tables/fuel_kg_s/h3/w0/v12</property>
      <property value="0.70156">fsim/tables/fuel_kg_s/h3/w0/v13</property>
      <property value="0.753278">fsim/tables/fuel_kg_s/h3/w0/v14</property>
      <property value="0.919842">fsim/tables/fuel_kg_s/h3/w0/v15</property>
      <property value="0.534005">fsim/tables/fuel_kg_s/h3/w0/v2</property>
      <property value="0.512089">fsim/tables/fuel_kg_s/h3/w0/v3</property>
      <property value="0.509006">fsim/tables/fuel_kg_s/h3/w0/v4</property>
      <property value="0.514187">fsim/tables/fuel_kg_s/h3/w0/v5</property>
      <property value="0.522829">fsim/tables/fuel_kg_s/h3/w0/v6</property>
      <property value="0.537531">fsim/tables/fuel_kg_s/h3/w0/v7</property>
      <property value="0.554863">fsim/tables/fuel_kg_s/h3/w0/v8</property>
      <property value="0.579227">fsim/tables/fuel_kg_s/h3/w0/v9</property>
      <property value="0.745015">fsim/tables/fuel_kg_s/h3/w1/v0</property>
      <property value="0.711511">fsim/tables/fuel_kg_s/h3/w1/v1</property>
      <property value="0.667039">fsim/tables/fuel_kg_s/h3/w1/v10</property>
      <property value="0.689208">fsim/tables/fuel_kg_s/h3/w1/v11</property>
      <property value="0.711625">fsim/tables/fuel_kg_s/h3/w1/v12</property>
      <property value="0.739498">fsim/tables/fuel_kg_s/h3/w1/v13</property>
      <property value="0.788949">fsim/tables/fuel_kg_s/h3/w1/v14</property>
      <property value="0.926577">fsim/tables/fuel_kg_s/h3/w1/v15</property>
      <property value="0.66574">fsim/tables/fuel_kg_s/h3/w1/v2</property>
      <property value="0.63173">fsim/tables/fuel_kg_s/h3/w1/v3</property>
      <property value="0.613669">fsim/tables/fuel_kg_s/h3/w1/v4</property>
      <property value="0.61235">fsim/tables/fuel_kg_s/h3/w1/v5</property>
      <property value="0.614423">fsim/tables/fuel_kg_s/h3/w1/v6</property>
      <property value="0.621454">fsim/tables/fuel_kg_s/h3/w1/v7</property>
      <property value="0.634387">fsim/tables/fuel_kg_s/h3/w1/v8</property>
      <property value="0.648848">fsim/tables/fuel_kg_s/h3/w1/v9</property>
      <property value="0.762268">fsim/tables/fuel_kg_s/h3/w2/v0</property>
      <property value="0.728655">fsim/tables/fuel_kg_s/h3/w2/v1</property>
      <property value="0.675602">fsim/tables/fuel_kg_s/h3/w2/v10</property>
      <property value="0.697653">fsim/tables/fuel_kg_s/h3/w2/v11</property>
      <property value="0.719957">fsim/tables/fuel_kg_s/h3/w2/v12</property>
      <property value="0.744062">fsim/tables/fuel_kg_s/h3/w2/v13</property>
      <property value="0.793024">fsim/tables/fuel_kg_s/h3/w2/v14</property>
      <property value="0.9267">fsim/tables/fuel_kg_s/h3/w2/v15</property>
      <property value="0.683971">fsim/tables/fuel_kg_s/h3/w2/v2</property>
      <property value="0.648157">fsim/tables/fuel_kg_s/h3/w2/v3</property>
      <property value="0.629267">fsim/tables/fuel_kg_s/h3/w2/v4</property>
      <property value="0.625769">fsim/tables/fuel_kg_s/h3/w2/v5</property>
      <property value="0.626319">fsim/tables/fuel_kg_s/h3/w2/v6</property>
      <property value="0.633447">fsim/tables/fuel_kg_s/h3/w2/v7</property>
      <property value="0.644753">fsim/tables/fuel_kg_s/h3/w2/v8</property>
      <property value="0.659202">fsim/tables/fuel_kg_s/h3/w2/v9</property>
      <property value="0.914623">fsim/tables/fuel_kg_s/h3/w3/v0</property>
      <property value="0.880354">fsim/tables/fuel_kg_s/h3/w3/v1</property>
      <property value="0.764322">fsim/tables/fuel_kg_s/h3/w3/v10</property>
      <property value="0.777945">fsim/tables/fuel_kg_s/h3/w3/v11</property>
      <property value="0.792903">fsim/tables/fuel_kg_s/h3/w3/v12</property>
      <property value="0.815759">fsim/tables/fuel_kg_s/h3/w3/v13</property>
      <property value="0.853498">fsim/tables/fuel_kg_s/h3/w3/v14</property>
      <property value="0.935377">fsim/tables/fuel_kg_s/h3/w3/v15</property>
      <property value="0.843951">fsim/tables/fuel_kg_s/h3/w3/v2</property>
      <property value="0.795516">fsim/tables/fuel_kg_s/h3/w3/v3</property>
      <property value="0.765014">fsim/tables/fuel_kg_s/h3/w3/v4</property>
      <property value="0.747069">fsim/tables/fuel_kg_s/h3/w3/v5</property>
      <property value="0.743965">fsim/tables/fuel_kg_s/h3/w3/v6</property>
      <property value="0.741131">fsim/tables/fuel_kg_s/h3/w3/v7</property>
      <property value="0.746136">fsim/tables/fuel_kg_s/h3/w3/v8</property>
      <property value="0.751526">fsim/tables/fuel_kg_s/h3/w3/v9</property>
      <property value="0.569978">fsim/tables/fuel_kg_s/h4/w0/v0</property>
      <property value="0.543764">fsim/tables/fuel_kg_s/h4/w0/v1</property>
      <property value="0.506181">fsim/tables/fuel_kg_s/h4/w0/v10</property>
      <property value="0.522907">fsim/tables/fuel_kg_s/h4/w0/v11</property>
      <property value="0.53983">fsim/tables/fuel_kg_s/h4/w0/v12</property>
      <property value="0.558161">fsim/tables/fuel_kg_s/h4/w0/v13</property>
      <property value="0.595155">fsim/tables/fuel_kg_s/h4/w0/v14</property>
      <property value="0.690904">fsim/tables/fuel_kg_s/h4/w0/v15</property>
      <property value="0.507795">fsim/tables/fuel_kg_s/h4/w0/v2</property>
      <property value="0.481727">fsim/tables/fuel_kg_s/h4/w0/v3</property>
      <property value="0.467821">fsim/tables/fuel_kg_s/h4/w0/v4</property>
      <property value="0.464806">fsim/tables/fuel_kg_s/h4/w0/v5</property>
      <property value="0.467003">fsim/tables/fuel_kg_s/h4/w0/v6</property>
      <property value="0.472632">fsim/tables/fuel_kg_s/h4/w0/v7</property>
      <property value="0.48201">fsim/tables/fuel_kg_s/h4/w0/v8</property>
      <property value="0.493073">fsim/tables/fuel_kg_s/h4/w0/v9</property>
      <property value="0.70149">fsim/tables/fuel_kg_s/h4/w1/v0</property>
      <property value="0.674134">fsim/tables/fuel_kg_s/h4/w1/v1</property>
      <property value="0.581657">fsim/tables/fuel_kg_s/h4/w1/v10</property>
      <property value="0.592289">fsim/tables/fuel_kg_s/h4/w1/v11</property>
      <property value="0.60276">fsim/tables/fuel_kg_s/h4/w1/v12</property>
      <property value="0.619596">fsim/tables/fuel_kg_s/h4/w1/v13</property>
      <property value="0.647887">fsim/tables/fuel_kg_s/h4/w1/v14</property>
      <property value="0.699601">fsim/tables/fuel_kg_s/h4/w1/v15</property>
      <property value="0.645843">fsim/tables/fuel_kg_s/h4/w1/v2</property>
      <property value="0.608487">fsim/tables/fuel_kg_s/h4/w1/v3</property>
      <property value="0.583977">fsim/tables/fuel_kg_s/h4/w1/v4</property>
      <property value="0.570974">fsim/tables/fuel_kg_s/h4/w1/v5</property>
      <property value="0.564662">fsim/tables/fuel_kg_s/h4/w1/v6</property>
      <property value="0.564454">fsim/tables/fuel_kg_s/h4/w1/v7</property>
      <property value="0.56812">fsim/tables/fuel_kg_s/h4/w1/v8</property>
      <property value="0.572837">fsim/tables/fuel_kg_s/h4/w1/v9</property>
      <property value="0.717423">fsim/tables/fuel_kg_s/h4/w2/v0</property>
      <property value="0.689755">fsim/tables/fuel_kg_s/h4/w2/v1</property>
      <property value="0.590922">fsim/tables/fuel_kg_s/h4/w2/v10</property>
      <property value="0.601511">fsim/tables/fuel_kg_s/h4/w2/v11</property>
      <property value="0.611921">fsim/tables/fuel_kg_s/h4/w2/v12</property>
      <property value="0.626923">fsim/tables/fuel_kg_s/h4/w2/v13</property>
      <property value="0.654862">fsim/tables/fuel_kg_s/h4/w2/v14</property>
      <property value="0.700805">fsim/tables/fuel_kg_s/h4/w2/v15</property>
      <property value="0.662711">fsim/tables/fuel_kg_s/h4/w2/v2</property>
      <property value="0.623661">fsim/tables/fuel_kg_s/h4/w2/v3</property>
      <property value="0.598459">fsim/tables/fuel_kg_s/h4/w2/v4</property>
      <property value="0.58526">fsim/tables/fuel_kg_s/h4/w2/v5</property>
      <property value="0.575674">fsim/tables/fuel_kg_s/h4/w2/v6</property>
      <property value="0.576965">fsim/tables/fuel_kg_s/h4/w2/v7</property>
      <property value="0.57899">fsim/tables/fuel_kg_s/h4/w2/v8</property>
      <property value="0.58373">fsim/tables/fuel_kg_s/h4/w2/v9</property>
      <property value="0.75039">fsim/tables/fuel_kg_s/h4/w3/v0</property>
      <property value="0.746187">fsim/tables/fuel_kg_s/h4/w3/v1</property>
      <property value="0.70002">fsim/tables/fuel_kg_s/h4/w3/v10</property>
      <property value="0.702621">fsim/tables/fuel_kg_s/h4/w3/v11</property>
      <property value="0.708743">fsim/tables/fuel_kg_s/h4/w3/v12</property>
      <property value="0.721619">fsim/tables/fuel_kg_s/h4/w3/v13</property>
      <property value="0.736984">fsim/tables/fuel_kg_s/h4/w3/v14</property>
      <property value="0.752943">fsim/tables/fuel_kg_s/h4/w3/v15</property>
      <property value="0.730647">fsim/tables/fuel_kg_s/h4/w3/v2</property>
      <property value="0.717701">fsim/tables/fuel_kg_s/h4/w3/v3</property>
      <property value="0.707721">fsim/tables/fuel_kg_s/h4/w3/v4</property>
      <property value="0.695697">fsim/tables/fuel_kg_s/h4/w3/v5</property>
      <property value="0.694069">fsim/tables/fuel_kg_s/h4/w3/v6</property>
      <property value="0.696316">fsim/tables/fuel_kg_s/h4/w3/v7</property>
      <property value="0.694438">fsim/tables/fuel_kg_s/h4/w3/v8</property>
      <property value="0.697096">fsim/tables/fuel_kg_s/h4/w3/v9</property>
      <property value="0.547758">fsim/tables/fuel_kg_s/h5/w0/v0</property>
      <property value="0.524564">fsim/tables/fuel_kg_s/h5/w0/v1</property>
      <property value="0.459928">fsim/tables/fuel_kg_s/h5/w0/v10</property>
      <property value="0.468798">fsim/tables/fuel_kg_s/h5/w0/v11</property>
      <property value="0.480741">fsim/tables/fuel_kg_s/h5/w0/v12</property>
      <property value="0.495003">fsim/tables/fuel_kg_s/h5/w0/v13</property>
      <property value="0.518917">fsim/tables/fuel_kg_s/h5/w0/v14</property>
      <property value="0.570101">fsim/tables/fuel_kg_s/h5/w0/v15</property>
      <property value="0.497118">fsim/tables/fuel_kg_s/h5/w0/v2</property>
      <property value="0.47037">fsim/tables/fuel_kg_s/h5/w0/v3</property>
      <property value="0.452732">fsim/tables/fuel_kg_s/h5/w0/v4</property>
      <property value="0.440753">fsim/tables/fuel_kg_s/h5/w0/v5</property>
      <property value="0.439432">fsim/tables/fuel_kg_s/h5/w0/v6</property>
      <property value="0.440903">fsim/tables/fuel_kg_s/h5/w0/v7</property>
      <property value="0.44538">fsim/tables/fuel_kg_s/h5/w0/v8</property>
      <property value="0.450907">fsim/tables/fuel_kg_s/h5/w0/v9</property>
      <property value="0.710387">fsim/tables/fuel_kg_s/h5/w1/v0</property>
      <property value="0.626406">fsim/tables/fuel_kg_s/h5/w1/v1</property>
      <property value="0.542952">fsim/tables/fuel_kg_s/h5/w1/v10</property>
      <property value="0.546397">fsim/tables/fuel_kg_s/h5/w1/v11</property>
      <property value="0.553502">fsim/tables/fuel_kg_s/h5/w1/v12</property>
      <property value="0.562964">fsim/tables/fuel_kg_s/h5/w1/v13</property>
      <property value="0.579665">fsim/tables/fuel_kg_s/h5/w1/v14</property>
      <property value="0.59921">fsim/tables/fuel_kg_s/h5/w1/v15</property>
      <property value="0.632097">fsim/tables/fuel_kg_s/h5/w1/v2</property>
      <property value="0.602874">fsim/tables/fuel_kg_s/h5/w1/v3</property>
      <property value="0.577205">fsim/tables/fuel_kg_s/h5/w1/v4</property>
      <property value="0.558796">fsim/tables/fuel_kg_s/h5/w1/v5</property>
      <property value="0.54823">fsim/tables/fuel_kg_s/h5/w1/v6</property>
      <property value="0.539277">fsim/tables/fuel_kg_s/h5/w1/v7</property>
      <property value="0.539504">fsim/tables/fuel_kg_s/h5/w1/v8</property>
      <property value="0.539253">fsim/tables/fuel_kg_s/h5/w1/v9</property>
      <property value="0.710263">fsim/tables/fuel_kg_s/h5/w2/v0</property>
      <property value="0.711326">fsim/tables/fuel_kg_s/h5/w2/v1</property>
      <property value="0.553662">fsim/tables/fuel_kg_s/h5/w2/v10</property>
      <property value="0.557235">fsim/tables/fuel_kg_s/h5/w2/v11</property>
      <property value="0.562327">fsim/tables/fuel_kg_s/h5/w2/v12</property>
      <property value="0.571604">fsim/tables/fuel_kg_s/h5/w2/v13</property>
      <property value="0.588294">fsim/tables/fuel_kg_s/h5/w2/v14</property>
      <property value="0.605848">fsim/tables/fuel_kg_s/h5/w2/v15</property>
      <property value="0.624615">fsim/tables/fuel_kg_s/h5/w2/v2</property>
      <property value="0.625728">fsim/tables/fuel_kg_s/h5/w2/v3</property>
      <property value="0.596582">fsim/tables/fuel_kg_s/h5/w2/v4</property>
      <property value="0.575225">fsim/tables/fuel_kg_s/h5/w2/v5</property>
      <property value="0.564579">fsim/tables/fuel_kg_s/h5/w2/v6</property>
      <property value="0.552731">fsim/tables/fuel_kg_s/h5/w2/v7</property>
      <property value="0.550893">fsim/tables/fuel_kg_s/h5/w2/v8</property>
      <property value="0.550602">fsim/tables/fuel_kg_s/h5/w2/v9</property>
      <property value="0.65114">fsim/tables/fuel_kg_s/h5/w3/v0</property>
      <property value="0.652358">fsim/tables/fuel_kg_s/h5/w3/v1</property>
      <property value="0.665883">fsim/tables/fuel_kg_s/h5/w3/v10</property>
      <property value="0.667781">fsim/tables/fuel_kg_s/h5/w3/v11</property>
      <property value="0.670582">fsim/tables/fuel_kg_s/h5/w3/v12</property>
      <property value="0.673982">fsim/tables/fuel_kg_s/h5/w3/v13</property>
      <property value="0.677369">fsim/tables/fuel_kg_s/h5/w3/v14</property>
      <property value="0.680726">fsim/tables/fuel_kg_s/h5/w3/v15</property>
      <property value="0.655532">fsim/tables/fuel_kg_s/h5/w3/v2</property>
      <property value="0.657795">fsim/tables/fuel_kg_s/h5/w3/v3</property>
      <property value="0.659241">fsim/tables/fuel_kg_s/h5/w3/v4</property>
      <property value="0.66008">fsim/tables/fuel_kg_s/h5/w3/v5</property>
      <property value="0.661004">fsim/tables/fuel_kg_s/h5/w3/v6</property>
      <property value="0.662102">fsim/tables/fuel_kg_s/h5/w3/v7</property>
      <property value="0.66253">fsim/tables/fuel_kg_s/h5/w3/v8</property>
      <property value="0.663748">fsim/tables/fuel_kg_s/h5/w3/v9</property>
      <property value="0.515925">fsim/tables/fuel_kg_s/h6/w0/v0</property>
      <property value="0.512493">fsim/tables/fuel_kg_s/h6/w0/v1</property>
      <property value="0.424317">fsim/tables/fuel_kg_s/h6/w0/v10</property>
      <property value="0.429239">fsim/tables/fuel_kg_s/h6/w0/v11</property>
      <property value="0.436367">fsim/tables/fuel_kg_s/h6/w0/v12</property>
      <property value="0.444115">fsim/tables/fuel_kg_s/h6/w0/v13</property>
      <property value="0.459576">fsim/tables/fuel_kg_s/h6/w0/v14</property>
      <property value="0.478578">fsim/tables/fuel_kg_s/h6/w0/v15</property>
      <property value="0.493704">fsim/tables/fuel_kg_s/h6/w0/v2</property>
      <property value="0.464042">fsim/tables/fuel_kg_s/h6/w0/v3</property>
      <property value="0.445446">fsim/tables/fuel_kg_s/h6/w0/v4</property>
      <property value="0.432386">fsim/tables/fuel_kg_s/h6/w0/v5</property>
      <property value="0.42257">fsim/tables/fuel_kg_s/h6/w0/v6</property>
      <property value="0.418546">fsim/tables/fuel_kg_s/h6/w0/v7</property>
      <property value="0.418269">fsim/tables/fuel_kg_s/h6/w0/v8</property>
      <property value="0.421194">fsim/tables/fuel_kg_s/h6/w0/v9</property>
      <property value="0.588695">fsim/tables/fuel_kg_s/h6/w1/v0</property>
      <property value="0.592029">fsim/tables/fuel_kg_s/h6/w1/v1</property>
      <property value="0.519178">fsim/tables/fuel_kg_s/h6/w1/v10</property>
      <property value="0.52164">fsim/tables/fuel_kg_s/h6/w1/v11</property>
      <property value="0.52375">fsim/tables/fuel_kg_s/h6/w1/v12</property>
      <property value="0.528757">fsim/tables/fuel_kg_s/h6/w1/v13</property>
      <property value="0.534814">fsim/tables/fuel_kg_s/h6/w1/v14</property>
      <property value="0.544278">fsim/tables/fuel_kg_s/h6/w1/v15</property>
      <property value="0.53128">fsim/tables/fuel_kg_s/h6/w1/v2</property>
      <property value="0.537752">fsim/tables/fuel_kg_s/h6/w1/v3</property>
      <property value="0.538451">fsim/tables/fuel_kg_s/h6/w1/v4</property>
      <property value="0.5335">fsim/tables/fuel_kg_s/h6/w1/v5</property>
      <property value="0.525232">fsim/tables/fuel_kg_s/h6/w1/v6</property>
      <property value="0.522558">fsim/tables/fuel_kg_s/h6/w1/v7</property>
      <property value="0.520105">fsim/tables/fuel_kg_s/h6/w1/v8</property>
      <property value="0.51849">fsim/tables/fuel_kg_s/h6/w1/v9</property>
      <property value="0.540286">fsim/tables/fuel_kg_s/h6/w2/v0</property>
      <property value="0.537413">fsim/tables/fuel_kg_s/h6/w2/v1</property>
      <property value="0.535319">fsim/tables/fuel_kg_s/h6/w2/v10</property>
      <property value="0.538131">fsim/tables/fuel_kg_s/h6/w2/v11</property>
      <property value="0.541656">fsim/tables/fuel_kg_s/h6/w2/v12</property>
      <property value="0.545242">fsim/tables/fuel_kg_s/h6/w2/v13</property>
      <property value="0.548837">fsim/tables/fuel_kg_s/h6/w2/v14</property>
      <property value="0.553639">fsim/tables/fuel_kg_s/h6/w2/v15</property>
      <property value="0.536079">fsim/tables/fuel_kg_s/h6/w2/v2</property>
      <property value="0.534531">fsim/tables/fuel_kg_s/h6/w2/v3</property>
      <property value="0.532952">fsim/tables/fuel_kg_s/h6/w2/v4</property>
      <property value="0.531408">fsim/tables/fuel_kg_s/h6/w2/v5</property>
      <property value="0.53081">fsim/tables/fuel_kg_s/h6/w2/v6</property>
      <property value="0.530859">fsim/tables/fuel_kg_s/h6/w2/v7</property>
      <property value="0.532451">fsim/tables/fuel_kg_s/h6/w2/v8</property>
      <property value="0.533937">fsim/tables/fuel_kg_s/h6/w2/v9</property>
      <property value="45.844">fsim/tables/max_climb_ms/h0/w0</property>
      <property value="35.4794">fsim/tables/max_climb_ms/h0/w1</property>
      <property value="34.4641">fsim/tables/max_climb_ms/h0/w2</property>
      <property value="27.273">fsim/tables/max_climb_ms/h0/w3</property>
      <property value="36.63">fsim/tables/max_climb_ms/h1/w0</property>
      <property value="28.2391">fsim/tables/max_climb_ms/h1/w1</property>
      <property value="27.3987">fsim/tables/max_climb_ms/h1/w2</property>
      <property value="21.4085">fsim/tables/max_climb_ms/h1/w3</property>
      <property value="27.7704">fsim/tables/max_climb_ms/h2/w0</property>
      <property value="21.0616">fsim/tables/max_climb_ms/h2/w1</property>
      <property value="20.3924">fsim/tables/max_climb_ms/h2/w2</property>
      <property value="15.669">fsim/tables/max_climb_ms/h2/w3</property>
      <property value="18.4045">fsim/tables/max_climb_ms/h3/w0</property>
      <property value="13.5129">fsim/tables/max_climb_ms/h3/w1</property>
      <property value="13.0186">fsim/tables/max_climb_ms/h3/w2</property>
      <property value="9.04677">fsim/tables/max_climb_ms/h3/w3</property>
      <property value="12.661">fsim/tables/max_climb_ms/h4/w0</property>
      <property value="8.2978">fsim/tables/max_climb_ms/h4/w1</property>
      <property value="7.87996">fsim/tables/max_climb_ms/h4/w2</property>
      <property value="4.61817">fsim/tables/max_climb_ms/h4/w3</property>
      <property value="9.18291">fsim/tables/max_climb_ms/h5/w0</property>
      <property value="5.35201">fsim/tables/max_climb_ms/h5/w1</property>
      <property value="4.99737">fsim/tables/max_climb_ms/h5/w2</property>
      <property value="2.16186">fsim/tables/max_climb_ms/h5/w3</property>
      <property value="6.04318">fsim/tables/max_climb_ms/h6/w0</property>
      <property value="2.62753">fsim/tables/max_climb_ms/h6/w1</property>
      <property value="2.31928">fsim/tables/max_climb_ms/h6/w2</property>
      <property value="295.482">fsim/tables/max_tas_ms/h0/w0</property>
      <property value="295.24">fsim/tables/max_tas_ms/h0/w1</property>
      <property value="295.201">fsim/tables/max_tas_ms/h0/w2</property>
      <property value="294.9">fsim/tables/max_tas_ms/h0/w3</property>
      <property value="291.067">fsim/tables/max_tas_ms/h1/w0</property>
      <property value="290.776">fsim/tables/max_tas_ms/h1/w1</property>
      <property value="290.743">fsim/tables/max_tas_ms/h1/w2</property>
      <property value="290.447">fsim/tables/max_tas_ms/h1/w3</property>
      <property value="284.786">fsim/tables/max_tas_ms/h2/w0</property>
      <property value="284.437">fsim/tables/max_tas_ms/h2/w1</property>
      <property value="284.393">fsim/tables/max_tas_ms/h2/w2</property>
      <property value="283.948">fsim/tables/max_tas_ms/h2/w3</property>
      <property value="276.684">fsim/tables/max_tas_ms/h3/w0</property>
      <property value="276.029">fsim/tables/max_tas_ms/h3/w1</property>
      <property value="275.924">fsim/tables/max_tas_ms/h3/w2</property>
      <property value="274.688">fsim/tables/max_tas_ms/h3/w3</property>
      <property value="269.091">fsim/tables/max_tas_ms/h4/w0</property>
      <property value="267.698">fsim/tables/max_tas_ms/h4/w1</property>
      <property value="267.482">fsim/tables/max_tas_ms/h4/w2</property>
      <property value="265.206">fsim/tables/max_tas_ms/h4/w3</property>
      <property value="263.589">fsim/tables/max_tas_ms/h5/w0</property>
      <property value="261.428">fsim/tables/max_tas_ms/h5/w1</property>
      <property value="261.131">fsim/tables/max_tas_ms/h5/w2</property>
      <property value="253.903">fsim/tables/max_tas_ms/h5/w3</property>
      <property value="258.073">fsim/tables/max_tas_ms/h6/w0</property>
      <property value="254.759">fsim/tables/max_tas_ms/h6/w1</property>
      <property value="254.54">fsim/tables/max_tas_ms/h6/w2</property>
      <property value="97.7184">fsim/tables/min_tas_ms/h0/w0</property>
      <property value="103.35">fsim/tables/min_tas_ms/h0/w1</property>
      <property value="104.095">fsim/tables/min_tas_ms/h0/w2</property>
      <property value="110.955">fsim/tables/min_tas_ms/h0/w3</property>
      <property value="101.904">fsim/tables/min_tas_ms/h1/w0</property>
      <property value="109.781">fsim/tables/min_tas_ms/h1/w1</property>
      <property value="110.768">fsim/tables/min_tas_ms/h1/w2</property>
      <property value="119.538">fsim/tables/min_tas_ms/h1/w3</property>
      <property value="109.283">fsim/tables/min_tas_ms/h2/w0</property>
      <property value="119.473">fsim/tables/min_tas_ms/h2/w1</property>
      <property value="120.707">fsim/tables/min_tas_ms/h2/w2</property>
      <property value="131.49">fsim/tables/min_tas_ms/h2/w3</property>
      <property value="120.083">fsim/tables/min_tas_ms/h3/w0</property>
      <property value="132.624">fsim/tables/min_tas_ms/h3/w1</property>
      <property value="134.132">fsim/tables/min_tas_ms/h3/w2</property>
      <property value="147.122">fsim/tables/min_tas_ms/h3/w3</property>
      <property value="130.621">fsim/tables/min_tas_ms/h4/w0</property>
      <property value="145.068">fsim/tables/min_tas_ms/h4/w1</property>
      <property value="146.788">fsim/tables/min_tas_ms/h4/w2</property>
      <property value="182.751">fsim/tables/min_tas_ms/h4/w3</property>
      <property value="139.012">fsim/tables/min_tas_ms/h5/w0</property>
      <property value="155.256">fsim/tables/min_tas_ms/h5/w1</property>
      <property value="155.684">fsim/tables/min_tas_ms/h5/w2</property>
      <property value="218.242">fsim/tables/min_tas_ms/h5/w3</property>
      <property value="148.804">fsim/tables/min_tas_ms/h6/w0</property>
      <property value="187.396">fsim/tables/min_tas_ms/h6/w1</property>
      <property value="212.536">fsim/tables/min_tas_ms/h6/w2</property>
      <property value="29.4282">fsim/tables/ps_full_ms/h0/w0/v0</property>
      <property value="32.8357">fsim/tables/ps_full_ms/h0/w0/v1</property>
      <property value="44.4415">fsim/tables/ps_full_ms/h0/w0/v10</property>
      <property value="42.8129">fsim/tables/ps_full_ms/h0/w0/v11</property>
      <property value="40.5654">fsim/tables/ps_full_ms/h0/w0/v12</property>
      <property value="37.619">fsim/tables/ps_full_ms/h0/w0/v13</property>
      <property value="33.4086">fsim/tables/ps_full_ms/h0/w0/v14</property>
      <property value="25.9628">fsim/tables/ps_full_ms/h0/w0/v15</property>
      <property value="35.8859">fsim/tables/ps_full_ms/h0/w0/v2</property>
      <property value="38.5148">fsim/tables/ps_full_ms/h0/w0/v3</property>
      <property value="40.8758">fsim/tables/ps_full_ms/h0/w0/v4</property>
      <property value="42.8409">fsim/tables/ps_full_ms/h0/w0/v5</property>
      <property value="44.2861">fsim/tables/ps_full_ms/h0/w0/v6</property>
      <property value="45.3387">fsim/tables/ps_full_ms/h0/w0/v7</property>
      <property value="45.8265">fsim/tables/ps_full_ms/h0/w0/v8</property>
      <property value="45.5062">fsim/tables/ps_full_ms/h0/w0/v9</property>
      <property value="22.6666">fsim/tables/ps_full_ms/h0/w1/v0</property>
      <property value="25.5235">fsim/tables/ps_full_ms/h0/w1/v1</property>
      <property value="34.3174">fsim/tables/ps_full_ms/h0/w1/v10</property>
      <property value="32.98">fsim/tables/ps_full_ms/h0/w1/v11</property>
      <property value="31.1826">fsim/tables/ps_full_ms/h0/w1/v12</property>
      <property value="28.932">fsim/tables/ps_full_ms/h0/w1/v13</property>
      <property value="25.8374">fsim/tables/ps_full_ms/h0/w1/v14</property>
      <property value="20.3385">fsim/tables/ps_full_ms/h0/w1/v15</property>
      <property value="27.9346">fsim/tables/ps_full_ms/h0/w1/v2</property>
      <property value="30.0538">fsim/tables/ps_full_ms/h0/w1/v3</property>
      <property value="31.8098">fsim/tables/ps_full_ms/h0/w1/v4</property>
      <property value="33.2602">fsim/tables/ps_full_ms/h0/w1/v5</property>
      <property value="34.4007">fsim/tables/ps_full_ms/h0/w1/v6</property>
      <property value="35.0949">fsim/tables/ps_full_ms/h0/w1/v7</property>
      <property value="35.4604">fsim/tables/ps_full_ms/h0/w1/v8</property>
      <property value="35.2238">fsim/tables/ps_full_ms/h0/w1/v9</property>
      <property value="22.0085">fsim/tables/ps_full_ms/h0/w2/v0</property>
      <property value="24.818">fsim/tables/ps_full_ms/h0/w2/v1</property>
      <property value="33.3477">fsim/tables/ps_full_ms/h0/w2/v10</property>
      <property value="32.0385">fsim/tables/ps_full_ms/h0/w2/v11</property>
      <property value="30.2847">fsim/tables/ps_full_ms/h0/w2/v12</property>
      <property value="28.094">fsim/tables/ps_full_ms/h0/w2/v13</property>
      <property value="25.0839">fsim/tables/ps_full_ms/h0/w2/v14</property>
      <property value="19.7476">fsim/tables/ps_full_ms/h0/w2/v15</property>
      <property value="27.1502">fsim/tables/ps_full_ms/h0/w2/v2</property>
      <property value="29.2241">fsim/tables/ps_full_ms/h0/w2/v3</property>
      <property value="30.9284">fsim/tables/ps_full_ms/h0/w2/v4</property>
      <property value="32.3399">fsim/tables/ps_full_ms/h0/w2/v5</property>
      <property value="33.435">fsim/tables/ps_full_ms/h0/w2/v6</property>
      <property value="34.1144">fsim/tables/ps_full_ms/h0/w2/v7</property>
      <property value="34.4508">fsim/tables/ps_full_ms/h0/w2/v8</property>
      <property value="34.2137">fsim/tables/ps_full_ms/h0/w2/v9</property>
      <property value="17.2477">fsim/tables/ps_full_ms/h0/w3/v0</property>
      <property value="19.6155">fsim/tables/ps_full_ms/h0/w3/v1</property>
      <property value="26.2823">fsim/tables/ps_full_ms/h0/w3/v10</property>
      <property value="25.3433">fsim/tables/ps_full_ms/h0/w3/v11</property>
      <property value="23.902">fsim/tables/ps_full_ms/h0/w3/v12</property>
      <property value="22.1347">fsim/tables/ps_full_ms/h0/w3/v13</property>
      <property value="19.7103">fsim/tables/ps_full_ms/h0/w3/v14</property>
      <property value="15.5297">fsim/tables/ps_full_ms/h0/w3/v15</property>
      <property value="21.4502">fsim/tables/ps_full_ms/h0/w3/v2</property>
      <property value="23.1955">fsim/tables/ps_full_ms/h0/w3/v3</property>
      <property value="24.5921">fsim/tables/ps_full_ms/h0/w3/v4</property>
      <property value="25.6786">fsim/tables/ps_full_ms/h0/w3/v5</property>
      <property value="26.5">fsim/tables/ps_full_ms/h0/w3/v6</property>
      <property value="27.0314">fsim/tables/ps_full_ms/h0/w3/v7</property>
      <property value="27.2635">fsim/tables/ps_full_ms/h0/w3/v8</property>
      <property value="26.9087">fsim/tables/ps_full_ms/h0/w3/v9</property>
      <property value="21.8184">fsim/tables/ps_full_ms/h1/w0/v0</property>
      <property value="24.4609">fsim/tables/ps_full_ms/h1/w0/v1</property>
      <property value="36.6057">fsim/tables/ps_full_ms/h1/w0/v10</property>
      <property value="36.5752">fsim/tables/ps_full_ms/h1/w0/v11</property>
      <property value="36.2157">fsim/tables/ps_full_ms/h1/w0/v12</property>
      <property value="35.5378">fsim/tables/ps_full_ms/h1/w0/v13</property>
      <property value="33.2146">fsim/tables/ps_full_ms/h1/w0/v14</property>
      <property value="26.0783">fsim/tables/ps_full_ms/h1/w0/v15</property>
      <property value="26.7418">fsim/tables/ps_full_ms/h1/w0/v2</property>
      <property value="28.9497">fsim/tables/ps_full_ms/h1/w0/v3</property>
      <property value="30.8913">fsim/tables/ps_full_ms/h1/w0/v4</property>
      <property value="32.5288">fsim/tables/ps_full_ms/h1/w0/v5</property>
      <property value="33.9062">fsim/tables/ps_full_ms/h1/w0/v6</property>
      <property value="34.9009">fsim/tables/ps_full_ms/h1/w0/v7</property>
      <property value="35.6279">fsim/tables/ps_full_ms/h1/w0/v8</property>
      <property value="36.3229">fsim/tables/ps_full_ms/h1/w0/v9</property>
      <property value="16.4073">fsim/tables/ps_full_ms/h1/w1/v0</property>
      <property value="18.6728">fsim/tables/ps_full_ms/h1/w1/v1</property>
      <property value="28.1508">fsim/tables/ps_full_ms/h1/w1/v10</property>
      <property value="28.2213">fsim/tables/ps_full_ms/h1/w1/v11</property>
      <property value="27.8832">fsim/tables/ps_full_ms/h1/w1/v12</property>
      <property value="27.3119">fsim/tables/ps_full_ms/h1/w1/v13</property>
      <property value="25.4196">fsim/tables/ps_full_ms/h1/w1/v14</property>
      <property value="20.4659">fsim/tables/ps_full_ms/h1/w1/v15</property>
      <property value="20.492">fsim/tables/ps_full_ms/h1/w1/v2</property>
      <property value="22.3129">fsim/tables/ps_full_ms/h1/w1/v3</property>
      <property value="23.8302">fsim/tables/ps_full_ms/h1/w1/v4</property>
      <property value="25.0843">fsim/tables/ps_full_ms/h1/w1/v5</property>
      <property value="26.1022">fsim/tables/ps_full_ms/h1/w1/v6</property>
      <property value="26.8543">fsim/tables/ps_full_ms/h1/w1/v7</property>
      <property value="27.439">fsim/tables/ps_full_ms/h1/w1/v8</property>
      <property value="27.8768">fsim/tables/ps_full_ms/h1/w1/v9</property>
      <property value="15.8896">fsim/tables/ps_full_ms/h1/w2/v0</property>
      <property value="18.0802">fsim/tables/ps_full_ms/h1/w2/v1</property>
      <property value="27.3184">fsim/tables/ps_full_ms/h1/w2/v10</property>
      <property value="27.3951">fsim/tables/ps_full_ms/h1/w2/v11</property>
      <property value="27.0858">fsim/tables/ps_full_ms/h1/w2/v12</property>
      <property value="26.5245">fsim/tables/ps_full_ms/h1/w2/v13</property>
      <property value="24.6728">fsim/tables/ps_full_ms/h1/w2/v14</property>
      <property value="19.9178">fsim/tables/ps_full_ms/h1/w2/v15</property>
      <property value="19.8765">fsim/tables/ps_full_ms/h1/w2/v2</property>
      <property value="21.66">fsim/tables/ps_full_ms/h1/w2/v3</property>
      <property value="23.1273">fsim/tables/ps_full_ms/h1/w2/v4</property>
      <property value="24.3555">fsim/tables/ps_full_ms/h1/w2/v5</property>
      <property value="25.3512">fsim/tables/ps_full_ms/h1/w2/v6</property>
      <property value="26.0611">fsim/tables/ps_full_ms/h1/w2/v7</property>
      <property value="26.6553">fsim/tables/ps_full_ms/h1/w2/v8</property>
      <property value="27.0665">fsim/tables/ps_full_ms/h1/w2/v9</property>
      <property value="12.0949">fsim/tables/ps_full_ms/h1/w3/v0</property>
      <property value="13.6432">fsim/tables/ps_full_ms/h1/w3/v1</property>
      <property value="21.4025">fsim/tables/ps_full_ms/h1/w3/v10</property>
      <property value="21.3738">fsim/tables/ps_full_ms/h1/w3/v11</property>
      <property value="21.2148">fsim/tables/ps_full_ms/h1/w3/v12</property>
      <property value="20.9121">fsim/tables/ps_full_ms/h1/w3/v13</property>
      <property value="19.3722">fsim/tables/ps_full_ms/h1/w3/v14</property>
      <property value="16.0041">fsim/tables/ps_full_ms/h1/w3/v15</property>
      <property value="15.376">fsim/tables/ps_full_ms/h1/w3/v2</property>
      <property value="16.8644">fsim/tables/ps_full_ms/h1/w3/v3</property>
      <property value="18.0165">fsim/tables/ps_full_ms/h1/w3/v4</property>
      <property value="18.982">fsim/tables/ps_full_ms/h1/w3/v5</property>
      <property value="19.8058">fsim/tables/ps_full_ms/h1/w3/v6</property>
      <property value="20.406">fsim/tables/ps_full_ms/h1/w3/v7</property>
      <property value="20.8392">fsim/tables/ps_full_ms/h1/w3/v8</property>
      <property value="21.251">fsim/tables/ps_full_ms/h1/w3/v9</property>
      <property value="15.0625">fsim/tables/ps_full_ms/h2/w0/v0</property>
      <property value="17.0349">fsim/tables/ps_full_ms/h2/w0/v1</property>
      <property value="27.1843">fsim/tables/ps_full_ms/h2/w0/v10</property>
      <property value="27.6276">fsim/tables/ps_full_ms/h2/w0/v11</property>
      <property value="27.7703">fsim/tables/ps_full_ms/h2/w0/v12</property>
      <property value="27.6716">fsim/tables/ps_full_ms/h2/w0/v13</property>
      <property value="26.3279">fsim/tables/ps_full_ms/h2/w0/v14</property>
      <property value="19.1891">fsim/tables/ps_full_ms/h2/w0/v15</property>
      <property value="18.8501">fsim/tables/ps_full_ms/h2/w0/v2</property>
      <property value="20.6238">fsim/tables/ps_full_ms/h2/w0/v3</property>
      <property value="22.0756">fsim/tables/ps_full_ms/h2/w0/v4</property>
      <property value="23.3218">fsim/tables/ps_full_ms/h2/w0/v5</property>
      <property value="24.352">fsim/tables/ps_full_ms/h2/w0/v6</property>
      <property value="25.1054">fsim/tables/ps_full_ms/h2/w0/v7</property>
      <property value="25.9025">fsim/tables/ps_full_ms/h2/w0/v8</property>
      <property value="26.606">fsim/tables/ps_full_ms/h2/w0/v9</property>
      <property value="10.8466">fsim/tables/ps_full_ms/h2/w1/v0</property>
      <property value="12.2662">fsim/tables/ps_full_ms/h2/w1/v1</property>
      <property value="20.6459">fsim/tables/ps_full_ms/h2/w1/v10</property>
      <property value="20.8813">fsim/tables/ps_full_ms/h2/w1/v11</property>
      <property value="21.0239">fsim/tables/ps_full_ms/h2/w1/v12</property>
      <property value="21.0601">fsim/tables/ps_full_ms/h2/w1/v13</property>
      <property value="20.0407">fsim/tables/ps_full_ms/h2/w1/v14</property>
      <property value="14.9598">fsim/tables/ps_full_ms/h2/w1/v15</property>
      <property value="13.9989">fsim/tables/ps_full_ms/h2/w1/v2</property>
      <property value="15.4307">fsim/tables/ps_full_ms/h2/w1/v3</property>
      <property value="16.5466">fsim/tables/ps_full_ms/h2/w1/v4</property>
      <property value="17.4597">fsim/tables/ps_full_ms/h2/w1/v5</property>
      <property value="18.2808">fsim/tables/ps_full_ms/h2/w1/v6</property>
      <property value="18.9578">fsim/tables/ps_full_ms/h2/w1/v7</property>
      <property value="19.6009">fsim/tables/ps_full_ms/h2/w1/v8</property>
      <property value="20.1904">fsim/tables/ps_full_ms/h2/w1/v9</property>
      <property value="10.4241">fsim/tables/ps_full_ms/h2/w2/v0</property>
      <property value="11.785">fsim/tables/ps_full_ms/h2/w2/v1</property>
      <property value="20.0177">fsim/tables/ps_full_ms/h2/w2/v10</property>
      <property value="20.2353">fsim/tables/ps_full_ms/h2/w2/v11</property>
      <property value="20.3632">fsim/tables/ps_full_ms/h2/w2/v12</property>
      <property value="20.3893">fsim/tables/ps_full_ms/h2/w2/v13</property>
      <property value="19.4385">fsim/tables/ps_full_ms/h2/w2/v14</property>
      <property value="14.5561">fsim/tables/ps_full_ms/h2/w2/v15</property>
      <property value="13.4975">fsim/tables/ps_full_ms/h2/w2/v2</property>
      <property value="14.9099">fsim/tables/ps_full_ms/h2/w2/v3</property>
      <property value="15.993">fsim/tables/ps_full_ms/h2/w2/v4</property>
      <property value="16.871">fsim/tables/ps_full_ms/h2/w2/v5</property>
      <property value="17.6746">fsim/tables/ps_full_ms/h2/w2/v6</property>
      <property value="18.3412">fsim/tables/ps_full_ms/h2/w2/v7</property>
      <property value="18.9926">fsim/tables/ps_full_ms/h2/w2/v8</property>
      <property value="19.5475">fsim/tables/ps_full_ms/h2/w2/v9</property>
      <property value="7.27579">fsim/tables/ps_full_ms/h2/w3/v0</property>
      <property value="8.231">fsim/tables/ps_full_ms/h2/w3/v1</property>
      <property value="15.2551">fsim/tables/ps_full_ms/h2/w3/v10</property>
      <property value="15.5102">fsim/tables/ps_full_ms/h2/w3/v11</property>
      <property value="15.6685">fsim/tables/ps_full_ms/h2/w3/v12</property>
      <property value="15.6243">fsim/tables/ps_full_ms/h2/w3/v13</property>
      <property value="14.8042">fsim/tables/ps_full_ms/h2/w3/v14</property>
      <property value="11.5312">fsim/tables/ps_full_ms/h2/w3/v15</property>
      <property value="9.71556">fsim/tables/ps_full_ms/h2/w3/v2</property>
      <property value="10.9296">fsim/tables/ps_full_ms/h2/w3/v3</property>
      <property value="11.9042">fsim/tables/ps_full_ms/h2/w3/v4</property>
      <property value="12.6041">fsim/tables/ps_full_ms/h2/w3/v5</property>
      <property value="13.1691">fsim/tables/ps_full_ms/h2/w3/v6</property>
      <property value="13.8045">fsim/tables/ps_full_ms/h2/w3/v7</property>
      <property value="14.3826">fsim/tables/ps_full_ms/h2/w3/v8</property>
      <property value="14.9285">fsim/tables/ps_full_ms/h2/w3/v9</property>
      <property value="9.30681">fsim/tables/ps_full_ms/h3/w0/v0</property>
      <property value="10.5987">fsim/tables/ps_full_ms/h3/w0/v1</property>
      <property value="18.1301">fsim/tables/ps_full_ms/h3/w0/v10</property>
      <property value="18.3296">fsim/tables/ps_full_ms/h3/w0/v11</property>
      <property value="18.401">fsim/tables/ps_full_ms/h3/w0/v12</property>
      <property value="18.3782">fsim/tables/ps_full_ms/h3/w0/v13</property>
      <property value="17.9564">fsim/tables/ps_full_ms/h3/w0/v14</property>
      <property value="13.0579">fsim/tables/ps_full_ms/h3/w0/v15</property>
      <property value="12.2043">fsim/tables/ps_full_ms/h3/w0/v2</property>
      <property value="13.5153">fsim/tables/ps_full_ms/h3/w0/v3</property>
      <property value="14.4828">fsim/tables/ps_full_ms/h3/w0/v4</property>
      <property value="15.2666">fsim/tables/ps_full_ms/h3/w0/v5</property>
      <property value="15.9834">fsim/tables/ps_full_ms/h3/w0/v6</property>
      <property value="16.5839">fsim/tables/ps_full_ms/h3/w0/v7</property>
      <property value="17.2577">fsim/tables/ps_full_ms/h3/w0/v8</property>
      <property value="17.7177">fsim/tables/ps_full_ms/h3/w0/v9</property>
      <property value="5.94959">fsim/tables/ps_full_ms/h3/w1/v0</property>
      <property value="6.80021">fsim/tables/ps_full_ms/h3/w1/v1</property>
      <property value="13.0671">fsim/tables/ps_full_ms/h3/w1/v10</property>
      <property value="13.2975">fsim/tables/ps_full_ms/h3/w1/v11</property>
      <property value="13.463">fsim/tables/ps_full_ms/h3/w1/v12</property>
      <property value="13.4653">fsim/tables/ps_full_ms/h3/w1/v13</property>
      <property value="13.0868">fsim/tables/ps_full_ms/h3/w1/v14</property>
      <property value="9.98554">fsim/tables/ps_full_ms/h3/w1/v15</property>
      <property value="8.11117">fsim/tables/ps_full_ms/h3/w1/v2</property>
      <property value="9.2144">fsim/tables/ps_full_ms/h3/w1/v3</property>
      <property value="10.1256">fsim/tables/ps_full_ms/h3/w1/v4</property>
      <property value="10.7088">fsim/tables/ps_full_ms/h3/w1/v5</property>
      <property value="11.1985">fsim/tables/ps_full_ms/h3/w1/v6</property>
      <property value="11.808">fsim/tables/ps_full_ms/h3/w1/v7</property>
      <property value="12.2824">fsim/tables/ps_full_ms/h3/w1/v8</property>
      <property value="12.7323">fsim/tables/ps_full_ms/h3/w1/v9</property>
      <property value="5.61252">fsim/tables/ps_full_ms/h3/w2/v0</property>
      <property value="6.41601">fsim/tables/ps_full_ms/h3/w2/v1</property>
      <property value="12.558">fsim/tables/ps_full_ms/h3/w2/v10</property>
      <property value="12.7661">fsim/tables/ps_full_ms/h3/w2/v11</property>
      <property value="12.943">fsim/tables/ps_full_ms/h3/w2/v12</property>
      <property value="12.9955">fsim/tables/ps_full_ms/h3/w2/v13</property>
      <property value="12.6221">fsim/tables/ps_full_ms/h3/w2/v14</property>
      <property value="9.70318">fsim/tables/ps_full_ms/h3/w2/v15</property>
      <property value="7.68446">fsim/tables/ps_full_ms/h3/w2/v2</property>
      <property value="8.77318">fsim/tables/ps_full_ms/h3/w2/v3</property>
      <property value="9.66684">fsim/tables/ps_full_ms/h3/w2/v4</property>
      <property value="10.2445">fsim/tables/ps_full_ms/h3/w2/v5</property>
      <property value="10.735">fsim/tables/ps_full_ms/h3/w2/v6</property>
      <property value="11.3123">fsim/tables/ps_full_ms/h3/w2/v7</property>
      <property value="11.7893">fsim/tables/ps_full_ms/h3/w2/v8</property>
      <property value="12.2076">fsim/tables/ps_full_ms/h3/w2/v9</property>
      <property value="3.01895">fsim/tables/ps_full_ms/h3/w3/v0</property>
      <property value="3.54791">fsim/tables/ps_full_ms/h3/w3/v1</property>
      <property value="8.64762">fsim/tables/ps_full_ms/h3/w3/v10</property>
      <property value="8.85444">fsim/tables/ps_full_ms/h3/w3/v11</property>
      <property value="9.02156">fsim/tables/ps_full_ms/h3/w3/v12</property>
      <property value="9.0341">fsim/tables/ps_full_ms/h3/w3/v13</property>
      <property value="8.85292">fsim/tables/ps_full_ms/h3/w3/v14</property>
      <property value="7.6052">fsim/tables/ps_full_ms/h3/w3/v15</property>
      <property value="4.37167">fsim/tables/ps_full_ms/h3/w3/v2</property>
      <property value="5.3141">fsim/tables/ps_full_ms/h3/w3/v3</property>
      <property value="6.10023">fsim/tables/ps_full_ms/h3/w3/v4</property>
      <property value="6.72118">fsim/tables/ps_full_ms/h3/w3/v5</property>
      <property value="7.26322">fsim/tables/ps_full_ms/h3/w3/v6</property>
      <property value="7.72399">fsim/tables/ps_full_ms/h3/w3/v7</property>
      <property value="8.06615">fsim/tables/ps_full_ms/h3/w3/v8</property>
      <property value="8.4311">fsim/tables/ps_full_ms/h3/w3/v9</property>
      <property value="5.48816">fsim/tables/ps_full_ms/h4/w0/v0</property>
      <property value="6.36371">fsim/tables/ps_full_ms/h4/w0/v1</property>
      <property value="12.2429">fsim/tables/ps_full_ms/h4/w0/v10</property>
      <property value="12.4335">fsim/tables/ps_full_ms/h4/w0/v11</property>
      <property value="12.5928">fsim/tables/ps_full_ms/h4/w0/v12</property>
      <property value="12.6269">fsim/tables/ps_full_ms/h4/w0/v13</property>
      <property value="12.2439">fsim/tables/ps_full_ms/h4/w0/v14</property>
      <property value="9.55682">fsim/tables/ps_full_ms/h4/w0/v15</property>
      <property value="7.59466">fsim/tables/ps_full_ms/h4/w0/v2</property>
      <property value="8.64409">fsim/tables/ps_full_ms/h4/w0/v3</property>
      <property value="9.5113">fsim/tables/ps_full_ms/h4/w0/v4</property>
      <property value="10.0604">fsim/tables/ps_full_ms/h4/w0/v5</property>
      <property value="10.521">fsim/tables/ps_full_ms/h4/w0/v6</property>
      <property value="11.08">fsim/tables/ps_full_ms/h4/w0/v7</property>
      <property value="11.5252">fsim/tables/ps_full_ms/h4/w0/v8</property>
      <property value="11.9256">fsim/tables/ps_full_ms/h4/w0/v9</property>
      <property value="2.59058">fsim/tables/ps_full_ms/h4/w1/v0</property>
      <property value="3.1361">fsim/tables/ps_full_ms/h4/w1/v1</property>
      <property value="7.94826">fsim/tables/ps_full_ms/h4/w1/v10</property>
      <property value="8.11993">fsim/tables/ps_full_ms/h4/w1/v11</property>
      <property value="8.28751">fsim/tables/ps_full_ms/h4/w1/v12</property>
      <property value="8.28368">fsim/tables/ps_full_ms/h4/w1/v13</property>
      <property value="8.09104">fsim/tables/ps_full_ms/h4/w1/v14</property>
      <property value="7.18098">fsim/tables/ps_full_ms/h4/w1/v15</property>
      <property value="3.91239">fsim/tables/ps_full_ms/h4/w1/v2</property>
      <property value="4.80744">fsim/tables/ps_full_ms/h4/w1/v3</property>
      <property value="5.55602">fsim/tables/ps_full_ms/h4/w1/v4</property>
      <property value="6.12934">fsim/tables/ps_full_ms/h4/w1/v5</property>
      <property value="6.67518">fsim/tables/ps_full_ms/h4/w1/v6</property>
      <property value="7.10088">fsim/tables/ps_full_ms/h4/w1/v7</property>
      <property value="7.4147">fsim/tables/ps_full_ms/h4/w1/v8</property>
      <property value="7.73852">fsim/tables/ps_full_ms/h4/w1/v9</property>
      <property value="2.28374">fsim/tables/ps_full_ms/h4/w2/v0</property>
      <property value="2.7989">fsim/tables/ps_full_ms/h4/w2/v1</property>
      <property value="7.52548">fsim/tables/ps_full_ms/h4/w2/v10</property>
      <property value="7.67737">fsim/tables/ps_full_ms/h4/w2/v11</property>
      <property value="7.82885">fsim/tables/ps_full_ms/h4/w2/v12</property>
      <property value="7.85917">fsim/tables/ps_full_ms/h4/w2/v13</property>
      <property value="7.66579">fsim/tables/ps_full_ms/h4/w2/v14</property>
      <property value="6.92948">fsim/tables/ps_full_ms/h4/w2/v15</property>
      <property value="3.52147">fsim/tables/ps_full_ms/h4/w2/v2</property>
      <property value="4.41163">fsim/tables/ps_full_ms/h4/w2/v3</property>
      <property value="5.15122">fsim/tables/ps_full_ms/h4/w2/v4</property>
      <property value="5.71038">fsim/tables/ps_full_ms/h4/w2/v5</property>
      <property value="6.27984">fsim/tables/ps_full_ms/h4/w2/v6</property>
      <property value="6.67991">fsim/tables/ps_full_ms/h4/w2/v7</property>
      <property value="6.99751">fsim/tables/ps_full_ms/h4/w2/v8</property>
      <property value="7.29618">fsim/tables/ps_full_ms/h4/w2/v9</property>
      <property value="1.89364">fsim/tables/ps_full_ms/h4/w3/v0</property>
      <property value="2.29503">fsim/tables/ps_full_ms/h4/w3/v1</property>
      <property value="4.47133">fsim/tables/ps_full_ms/h4/w3/v10</property>
      <property value="4.52739">fsim/tables/ps_full_ms/h4/w3/v11</property>
      <property value="4.58345">fsim/tables/ps_full_ms/h4/w3/v12</property>
      <property value="4.49181">fsim/tables/ps_full_ms/h4/w3/v13</property>
      <property value="4.45428">fsim/tables/ps_full_ms/h4/w3/v14</property>
      <property value="4.36574">fsim/tables/ps_full_ms/h4/w3/v15</property>
      <property value="2.69643">fsim/tables/ps_full_ms/h4/w3/v2</property>
      <property value="3.09783">fsim/tables/ps_full_ms/h4/w3/v3</property>
      <property value="3.49922">fsim/tables/ps_full_ms/h4/w3/v4</property>
      <property value="3.76228">fsim/tables/ps_full_ms/h4/w3/v5</property>
      <property value="3.93731">fsim/tables/ps_full_ms/h4/w3/v6</property>
      <property value="4.11234">fsim/tables/ps_full_ms/h4/w3/v7</property>
      <property value="4.28737">fsim/tables/ps_full_ms/h4/w3/v8</property>
      <property value="4.41528">fsim/tables/ps_full_ms/h4/w3/v9</property>
      <property value="3.25862">fsim/tables/ps_full_ms/h5/w0/v0</property>
      <property value="3.91432">fsim/tables/ps_full_ms/h5/w0/v1</property>
      <property value="8.85112">fsim/tables/ps_full_ms/h5/w0/v10</property>
      <property value="9.06544">fsim/tables/ps_full_ms/h5/w0/v11</property>
      <property value="9.1575">fsim/tables/ps_full_ms/h5/w0/v12</property>
      <property value="9.17413">fsim/tables/ps_full_ms/h5/w0/v13</property>
      <property value="8.98469">fsim/tables/ps_full_ms/h5/w0/v14</property>
      <property value="7.73082">fsim/tables/ps_full_ms/h5/w0/v15</property>
      <property value="4.80863">fsim/tables/ps_full_ms/h5/w0/v2</property>
      <property value="5.71024">fsim/tables/ps_full_ms/h5/w0/v3</property>
      <property value="6.45116">fsim/tables/ps_full_ms/h5/w0/v4</property>
      <property value="7.07854">fsim/tables/ps_full_ms/h5/w0/v5</property>
      <property value="7.53515">fsim/tables/ps_full_ms/h5/w0/v6</property>
      <property value="7.95824">fsim/tables/ps_full_ms/h5/w0/v7</property>
      <property value="8.31758">fsim/tables/ps_full_ms/h5/w0/v8</property>
      <property value="8.63685">fsim/tables/ps_full_ms/h5/w0/v9</property>
      <property value="0.431717">fsim/tables/ps_full_ms/h5/w1/v0</property>
      <property value="0.934227">fsim/tables/ps_full_ms/h5/w1/v1</property>
      <property value="5.04748">fsim/tables/ps_full_ms/h5/w1/v10</property>
      <property value="5.23321">fsim/tables/ps_full_ms/h5/w1/v11</property>
      <property value="5.30984">fsim/tables/ps_full_ms/h5/w1/v12</property>
      <property value="5.34724">fsim/tables/ps_full_ms/h5/w1/v13</property>
      <property value="5.27689">fsim/tables/ps_full_ms/h5/w1/v14</property>
      <property value="5.10332">fsim/tables/ps_full_ms/h5/w1/v15</property>
      <property value="1.38215">fsim/tables/ps_full_ms/h5/w1/v2</property>
      <property value="2.15869">fsim/tables/ps_full_ms/h5/w1/v3</property>
      <property value="2.78748">fsim/tables/ps_full_ms/h5/w1/v4</property>
      <property value="3.41471">fsim/tables/ps_full_ms/h5/w1/v5</property>
      <property value="3.90117">fsim/tables/ps_full_ms/h5/w1/v6</property>
      <property value="4.33348">fsim/tables/ps_full_ms/h5/w1/v7</property>
      <property value="4.6362">fsim/tables/ps_full_ms/h5/w1/v8</property>
      <property value="4.87395">fsim/tables/ps_full_ms/h5/w1/v9</property>
      <property value="0.268774">fsim/tables/ps_full_ms/h5/w2/v0</property>
      <property value="0.828717">fsim/tables/ps_full_ms/h5/w2/v1</property>
      <property value="4.70595">fsim/tables/ps_full_ms/h5/w2/v10</property>
      <property value="4.81887">fsim/tables/ps_full_ms/h5/w2/v11</property>
      <property value="4.9318">fsim/tables/ps_full_ms/h5/w2/v12</property>
      <property value="4.93363">fsim/tables/ps_full_ms/h5/w2/v13</property>
      <property value="4.87697">fsim/tables/ps_full_ms/h5/w2/v14</property>
      <property value="4.76193">fsim/tables/ps_full_ms/h5/w2/v15</property>
      <property value="1.38866">fsim/tables/ps_full_ms/h5/w2/v2</property>
      <property value="1.9486">fsim/tables/ps_full_ms/h5/w2/v3</property>
      <property value="2.49489">fsim/tables/ps_full_ms/h5/w2/v4</property>
      <property value="3.03372">fsim/tables/ps_full_ms/h5/w2/v5</property>
      <property value="3.57255">fsim/tables/ps_full_ms/h5/w2/v6</property>
      <property value="3.99186">fsim/tables/ps_full_ms/h5/w2/v7</property>
      <property value="4.24447">fsim/tables/ps_full_ms/h5/w2/v8</property>
      <property value="4.49709">fsim/tables/ps_full_ms/h5/w2/v9</property>
      <property value="1.60743">fsim/tables/ps_full_ms/h5/w3/v0</property>
      <property value="1.65375">fsim/tables/ps_full_ms/h5/w3/v1</property>
      <property value="2.07057">fsim/tables/ps_full_ms/h5/w3/v10</property>
      <property value="2.11689">fsim/tables/ps_full_ms/h5/w3/v11</property>
      <property value="2.15304">fsim/tables/ps_full_ms/h5/w3/v12</property>
      <property value="1.84869">fsim/tables/ps_full_ms/h5/w3/v13</property>
      <property value="1.54434">fsim/tables/ps_full_ms/h5/w3/v14</property>
      <property value="1.24">fsim/tables/ps_full_ms/h5/w3/v15</property>
      <property value="1.70006">fsim/tables/ps_full_ms/h5/w3/v2</property>
      <property value="1.74638">fsim/tables/ps_full_ms/h5/w3/v3</property>
      <property value="1.79269">fsim/tables/ps_full_ms/h5/w3/v4</property>
      <property value="1.839">fsim/tables/ps_full_ms/h5/w3/v5</property>
      <property value="1.88532">fsim/tables/ps_full_ms/h5/w3/v6</property>
      <property value="1.93163">fsim/tables/ps_full_ms/h5/w3/v7</property>
      <property value="1.97795">fsim/tables/ps_full_ms/h5/w3/v8</property>
      <property value="2.02426">fsim/tables/ps_full_ms/h5/w3/v9</property>
      <property value="1.04358">fsim/tables/ps_full_ms/h6/w0/v0</property>
      <property value="1.54235">fsim/tables/ps_full_ms/h6/w0/v1</property>
      <property value="5.757">fsim/tables/ps_full_ms/h6/w0/v10</property>
      <property value="5.90305">fsim/tables/ps_full_ms/h6/w0/v11</property>
      <property value="5.97838">fsim/tables/ps_full_ms/h6/w0/v12</property>
      <property value="6.04163">fsim/tables/ps_full_ms/h6/w0/v13</property>
      <property value="5.92714">fsim/tables/ps_full_ms/h6/w0/v14</property>
      <property value="5.66817">fsim/tables/ps_full_ms/h6/w0/v15</property>
      <property value="2.07127">fsim/tables/ps_full_ms/h6/w0/v2</property>
      <property value="2.90343">fsim/tables/ps_full_ms/h6/w0/v3</property>
      <property value="3.50617">fsim/tables/ps_full_ms/h6/w0/v4</property>
      <property value="4.09839">fsim/tables/ps_full_ms/h6/w0/v5</property>
      <property value="4.65037">fsim/tables/ps_full_ms/h6/w0/v6</property>
      <property value="5.03311">fsim/tables/ps_full_ms/h6/w0/v7</property>
      <property value="5.3421">fsim/tables/ps_full_ms/h6/w0/v8</property>
      <property value="5.54662">fsim/tables/ps_full_ms/h6/w0/v9</property>
      <property value="0.34874">fsim/tables/ps_full_ms/h6/w1/v0</property>
      <property value="0.638245">fsim/tables/ps_full_ms/h6/w1/v1</property>
      <property value="2.50136">fsim/tables/ps_full_ms/h6/w1/v10</property>
      <property value="2.61784">fsim/tables/ps_full_ms/h6/w1/v11</property>
      <property value="2.46729">fsim/tables/ps_full_ms/h6/w1/v12</property>
      <property value="2.2925">fsim/tables/ps_full_ms/h6/w1/v13</property>
      <property value="2.11771">fsim/tables/ps_full_ms/h6/w1/v14</property>
      <property value="1.94292">fsim/tables/ps_full_ms/h6/w1/v15</property>
      <property value="0.92775">fsim/tables/ps_full_ms/h6/w1/v2</property>
      <property value="1.21725">fsim/tables/ps_full_ms/h6/w1/v3</property>
      <property value="1.50676">fsim/tables/ps_full_ms/h6/w1/v4</property>
      <property value="1.79626">fsim/tables/ps_full_ms/h6/w1/v5</property>
      <property value="2.03542">fsim/tables/ps_full_ms/h6/w1/v6</property>
      <property value="2.1519">fsim/tables/ps_full_ms/h6/w1/v7</property>
      <property value="2.26839">fsim/tables/ps_full_ms/h6/w1/v8</property>
      <property value="2.38487">fsim/tables/ps_full_ms/h6/w1/v9</property>
      <property value="1.71721">fsim/tables/ps_full_ms/h6/w2/v0</property>
      <property value="1.78069">fsim/tables/ps_full_ms/h6/w2/v1</property>
      <property value="2.20026">fsim/tables/ps_full_ms/h6/w2/v10</property>
      <property value="1.96926">fsim/tables/ps_full_ms/h6/w2/v11</property>
      <property value="1.73825">fsim/tables/ps_full_ms/h6/w2/v12</property>
      <property value="1.50725">fsim/tables/ps_full_ms/h6/w2/v13</property>
      <property value="1.27625">fsim/tables/ps_full_ms/h6/w2/v14</property>
      <property value="1.04524">fsim/tables/ps_full_ms/h6/w2/v15</property>
      <property value="1.84416">fsim/tables/ps_full_ms/h6/w2/v2</property>
      <property value="1.90764">fsim/tables/ps_full_ms/h6/w2/v3</property>
      <property value="1.97112">fsim/tables/ps_full_ms/h6/w2/v4</property>
      <property value="2.03459">fsim/tables/ps_full_ms/h6/w2/v5</property>
      <property value="2.09807">fsim/tables/ps_full_ms/h6/w2/v6</property>
      <property value="2.16155">fsim/tables/ps_full_ms/h6/w2/v7</property>
      <property value="2.22503">fsim/tables/ps_full_ms/h6/w2/v8</property>
      <property value="2.2885">fsim/tables/ps_full_ms/h6/w2/v9</property>
      <property value="-4.48501">fsim/tables/ps_idle_ms/h0/w0/v0</property>
      <property value="-4.81266">fsim/tables/ps_idle_ms/h0/w0/v1</property>
      <property value="-29.3098">fsim/tables/ps_idle_ms/h0/w0/v10</property>
      <property value="-34.3965">fsim/tables/ps_idle_ms/h0/w0/v11</property>
      <property value="-40.0279">fsim/tables/ps_idle_ms/h0/w0/v12</property>
      <property value="-46.2403">fsim/tables/ps_idle_ms/h0/w0/v13</property>
      <property value="-53.6105">fsim/tables/ps_idle_ms/h0/w0/v14</property>
      <property value="-64.7254">fsim/tables/ps_idle_ms/h0/w0/v15</property>
      <property value="-5.74939">fsim/tables/ps_idle_ms/h0/w0/v2</property>
      <property value="-7.0661">fsim/tables/ps_idle_ms/h0/w0/v3</property>
      <property value="-8.90646">fsim/tables/ps_idle_ms/h0/w0/v4</property>
      <property value="-11.1079">fsim/tables/ps_idle_ms/h0/w0/v5</property>
      <property value="-13.8505">fsim/tables/ps_idle_ms/h0/w0/v6</property>
      <property value="-16.9392">fsim/tables/ps_idle_ms/h0/w0/v7</property>
      <property value="-20.5526">fsim/tables/ps_idle_ms/h0/w0/v8</property>
      <property value="-24.7034">fsim/tables/ps_idle_ms/h0/w0/v9</property>
      <property value="-5.56412">fsim/tables/ps_idle_ms/h0/w1/v0</property>
      <property value="-5.46661">fsim/tables/ps_idle_ms/h0/w1/v1</property>
      <property value="-24.0041">fsim/tables/ps_idle_ms/h0/w1/v10</property>
      <property value="-27.9657">fsim/tables/ps_idle_ms/h0/w1/v11</property>
      <property value="-32.329">fsim/tables/ps_idle_ms/h0/w1/v12</property>
      <property value="-37.0877">fsim/tables/ps_idle_ms/h0/w1/v13</property>
      <property value="-42.5406">fsim/tables/ps_idle_ms/h0/w1/v14</property>
      <property value="-50.4507">fsim/tables/ps_idle_ms/h0/w1/v15</property>
      <property value="-6.05925">fsim/tables/ps_idle_ms/h0/w1/v2</property>
      <property value="-7.03648">fsim/tables/ps_idle_ms/h0/w1/v3</property>
      <property value="-8.35285">fsim/tables/ps_idle_ms/h0/w1/v4</property>
      <property value="-10.098">fsim/tables/ps_idle_ms/h0/w1/v5</property>
      <property value="-12.1261">fsim/tables/ps_idle_ms/h0/w1/v6</property>
      <property value="-14.5787">fsim/tables/ps_idle_ms/h0/w1/v7</property>
      <property value="-17.3553">fsim/tables/ps_idle_ms/h0/w1/v8</property>
      <property value="-20.4138">fsim/tables/ps_idle_ms/h0/w1/v9</property>
      <property value="-5.6858">fsim/tables/ps_idle_ms/h0/w2/v0</property>
      <property value="-5.54876">fsim/tables/ps_idle_ms/h0/w2/v1</property>
      <property value="-23.4991">fsim/tables/ps_idle_ms/h0/w2/v10</property>
      <property value="-27.3524">fsim/tables/ps_idle_ms/h0/w2/v11</property>
      <property value="-31.5933">fsim/tables/ps_idle_ms/h0/w2/v12</property>
      <property value="-36.2169">fsim/tables/ps_idle_ms/h0/w2/v13</property>
      <property value="-41.5118">fsim/tables/ps_idle_ms/h0/w2/v14</property>
      <property value="-49.1105">fsim/tables/ps_idle_ms/h0/w2/v15</property>
      <property value="-6.11522">fsim/tables/ps_idle_ms/h0/w2/v2</property>
      <property value="-7.06548">fsim/tables/ps_idle_ms/h0/w2/v3</property>
      <property value="-8.32463">fsim/tables/ps_idle_ms/h0/w2/v4</property>
      <property value="-10.009">fsim/tables/ps_idle_ms/h0/w2/v5</property>
      <property value="-11.9963">fsim/tables/ps_idle_ms/h0/w2/v6</property>
      <property value="-14.3574">fsim/tables/ps_idle_ms/h0/w2/v7</property>
      <property value="-17.0675">fsim/tables/ps_idle_ms/h0/w2/v8</property>
      <property value="-20.0436">fsim/tables/ps_idle_ms/h0/w2/v9</property>
      <property value="-6.56151">fsim/tables/ps_idle_ms/h0/w3/v0</property>
      <property value="-6.41088">fsim/tables/ps_idle_ms/h0/w3/v1</property>
      <property value="-20.1275">fsim/tables/ps_idle_ms/h0/w3/v10</property>
      <property value="-23.0247">fsim/tables/ps_idle_ms/h0/w3/v11</property>
      <property value="-26.3921">fsim/tables/ps_idle_ms/h0/w3/v12</property>
      <property value="-30.0523">fsim/tables/ps_idle_ms/h0/w3/v13</property>
      <property value="-34.2367">fsim/tables/ps_idle_ms/h0/w3/v14</property>
      <property value="-39.9113">fsim/tables/ps_idle_ms/h0/w3/v15</property>
      <property value="-6.57809">fsim/tables/ps_idle_ms/h0/w3/v2</property>
      <property value="-7.3151">fsim/tables/ps_idle_ms/h0/w3/v3</property>
      <property value="-8.28847">fsim/tables/ps_idle_ms/h0/w3/v4</property>
      <property value="-9.53472">fsim/tables/ps_idle_ms/h0/w3/v5</property>
      <property value="-11.1072">fsim/tables/ps_idle_ms/h0/w3/v6</property>
      <property value="-12.951">fsim/tables/ps_idle_ms/h0/w3/v7</property>
      <property value="-15.05">fsim/tables/ps_idle_ms/h0/w3/v8</property>
      <property value="-17.479">fsim/tables/ps_idle_ms/h0/w3/v9</property>
      <property value="-5.57115">fsim/tables/ps_idle_ms/h1/w0/v0</property>
      <property value="-5.4446">fsim/tables/ps_idle_ms/h1/w0/v1</property>
      <property value="-23.4474">fsim/tables/ps_idle_ms/h1/w0/v10</property>
      <property value="-27.3158">fsim/tables/ps_idle_ms/h1/w0/v11</property>
      <property value="-31.5735">fsim/tables/ps_idle_ms/h1/w0/v12</property>
      <property value="-36.2096">fsim/tables/ps_idle_ms/h1/w0/v13</property>
      <property value="-41.9102">fsim/tables/ps_idle_ms/h1/w0/v14</property>
      <property value="-53.2716">fsim/tables/ps_idle_ms/h1/w0/v15</property>
      <property value="-6.00707">fsim/tables/ps_idle_ms/h1/w0/v2</property>
      <property value="-6.9627">fsim/tables/ps_idle_ms/h1/w0/v3</property>
      <property value="-8.22468">fsim/tables/ps_idle_ms/h1/w0/v4</property>
      <property value="-9.90558">fsim/tables/ps_idle_ms/h1/w0/v5</property>
      <property value="-11.8901">fsim/tables/ps_idle_ms/h1/w0/v6</property>
      <property value="-14.2696">fsim/tables/ps_idle_ms/h1/w0/v7</property>
      <property value="-16.9826">fsim/tables/ps_idle_ms/h1/w0/v8</property>
      <property value="-19.9616">fsim/tables/ps_idle_ms/h1/w0/v9</property>
      <property value="-6.55514">fsim/tables/ps_idle_ms/h1/w1/v0</property>
      <property value="-6.40871">fsim/tables/ps_idle_ms/h1/w1/v1</property>
      <property value="-19.6568">fsim/tables/ps_idle_ms/h1/w1/v10</property>
      <property value="-22.4594">fsim/tables/ps_idle_ms/h1/w1/v11</property>
      <property value="-25.7213">fsim/tables/ps_idle_ms/h1/w1/v12</property>
      <property value="-29.2708">fsim/tables/ps_idle_ms/h1/w1/v13</property>
      <property value="-33.6496">fsim/tables/ps_idle_ms/h1/w1/v14</property>
      <property value="-41.5212">fsim/tables/ps_idle_ms/h1/w1/v15</property>
      <property value="-6.55295">fsim/tables/ps_idle_ms/h1/w1/v2</property>
      <property value="-7.25063">fsim/tables/ps_idle_ms/h1/w1/v3</property>
      <property value="-8.20681">fsim/tables/ps_idle_ms/h1/w1/v4</property>
      <property value="-9.40969">fsim/tables/ps_idle_ms/h1/w1/v5</property>
      <property value="-10.8989">fsim/tables/ps_idle_ms/h1/w1/v6</property>
      <property value="-12.6989">fsim/tables/ps_idle_ms/h1/w1/v7</property>
      <property value="-14.7186">fsim/tables/ps_idle_ms/h1/w1/v8</property>
      <property value="-17.082">fsim/tables/ps_idle_ms/h1/w1/v9</property>
      <property value="-6.66048">fsim/tables/ps_idle_ms/h1/w2/v0</property>
      <property value="-6.51994">fsim/tables/ps_idle_ms/h1/w2/v1</property>
      <property value="-19.3159">fsim/tables/ps_idle_ms/h1/w2/v10</property>
      <property value="-22.0329">fsim/tables/ps_idle_ms/h1/w2/v11</property>
      <property value="-25.1629">fsim/tables/ps_idle_ms/h1/w2/v12</property>
      <property value="-28.608">fsim/tables/ps_idle_ms/h1/w2/v13</property>
      <property value="-32.8615">fsim/tables/ps_idle_ms/h1/w2/v14</property>
      <property value="-40.4174">fsim/tables/ps_idle_ms/h1/w2/v15</property>
      <property value="-6.65204">fsim/tables/ps_idle_ms/h1/w2/v2</property>
      <property value="-7.30221">fsim/tables/ps_idle_ms/h1/w2/v3</property>
      <property value="-8.23528">fsim/tables/ps_idle_ms/h1/w2/v4</property>
      <property value="-9.39206">fsim/tables/ps_idle_ms/h1/w2/v5</property>
      <property value="-10.8078">fsim/tables/ps_idle_ms/h1/w2/v6</property>
      <property value="-12.5702">fsim/tables/ps_idle_ms/h1/w2/v7</property>
      <property value="-14.5044">fsim/tables/ps_idle_ms/h1/w2/v8</property>
      <property value="-16.8084">fsim/tables/ps_idle_ms/h1/w2/v9</property>
      <property value="-7.5684">fsim/tables/ps_idle_ms/h1/w3/v0</property>
      <property value="-7.5508">fsim/tables/ps_idle_ms/h1/w3/v1</property>
      <property value="-16.8948">fsim/tables/ps_idle_ms/h1/w3/v10</property>
      <property value="-19.0752">fsim/tables/ps_idle_ms/h1/w3/v11</property>
      <property value="-21.4194">fsim/tables/ps_idle_ms/h1/w3/v12</property>
      <property value="-23.9357">fsim/tables/ps_idle_ms/h1/w3/v13</property>
      <property value="-27.2663">fsim/tables/ps_idle_ms/h1/w3/v14</property>
      <property value="-32.6531">fsim/tables/ps_idle_ms/h1/w3/v15</property>
      <property value="-7.42518">fsim/tables/ps_idle_ms/h1/w3/v2</property>
      <property value="-7.76455">fsim/tables/ps_idle_ms/h1/w3/v3</property>
      <property value="-8.4783">fsim/tables/ps_idle_ms/h1/w3/v4</property>
      <property value="-9.36819">fsim/tables/ps_idle_ms/h1/w3/v5</property>
      <property value="-10.4521">fsim/tables/ps_idle_ms/h1/w3/v6</property>
      <property value="-11.6731">fsim/tables/ps_idle_ms/h1/w3/v7</property>
      <property value="-13.2545">fsim/tables/ps_idle_ms/h1/w3/v8</property>
      <property value="-14.941">fsim/tables/ps_idle_ms/h1/w3/v9</property>
      <property value="-6.63521">fsim/tables/ps_idle_ms/h2/w0/v0</property>
      <property value="-6.49538">fsim/tables/ps_idle_ms/h2/w0/v1</property>
      <property value="-18.6725">fsim/tables/ps_idle_ms/h2/w0/v10</property>
      <property value="-21.2821">fsim/tables/ps_idle_ms/h2/w0/v11</property>
      <property value="-24.2442">fsim/tables/ps_idle_ms/h2/w0/v12</property>
      <property value="-27.5399">fsim/tables/ps_idle_ms/h2/w0/v13</property>
      <property value="-31.8208">fsim/tables/ps_idle_ms/h2/w0/v14</property>
      <property value="-42.3669">fsim/tables/ps_idle_ms/h2/w0/v15</property>
      <property value="-6.61716">fsim/tables/ps_idle_ms/h2/w0/v2</property>
      <property value="-7.21262">fsim/tables/ps_idle_ms/h2/w0/v3</property>
      <property value="-8.11109">fsim/tables/ps_idle_ms/h2/w0/v4</property>
      <property value="-9.21659">fsim/tables/ps_idle_ms/h2/w0/v5</property>
      <property value="-10.5193">fsim/tables/ps_idle_ms/h2/w0/v6</property>
      <property value="-12.2211">fsim/tables/ps_idle_ms/h2/w0/v7</property>
      <property value="-14.0602">fsim/tables/ps_idle_ms/h2/w0/v8</property>
      <property value="-16.2665">fsim/tables/ps_idle_ms/h2/w0/v9</property>
      <property value="-7.6615">fsim/tables/ps_idle_ms/h2/w1/v0</property>
      <property value="-7.66619">fsim/tables/ps_idle_ms/h2/w1/v1</property>
      <property value="-16.0518">fsim/tables/ps_idle_ms/h2/w1/v10</property>
      <property value="-18.0777">fsim/tables/ps_idle_ms/h2/w1/v11</property>
      <property value="-20.2506">fsim/tables/ps_idle_ms/h2/w1/v12</property>
      <property value="-22.5744">fsim/tables/ps_idle_ms/h2/w1/v13</property>
      <property value="-25.7206">fsim/tables/ps_idle_ms/h2/w1/v14</property>
      <property value="-33.1482">fsim/tables/ps_idle_ms/h2/w1/v15</property>
      <property value="-7.53074">fsim/tables/ps_idle_ms/h2/w1/v2</property>
      <property value="-7.74417">fsim/tables/ps_idle_ms/h2/w1/v3</property>
      <property value="-8.40687">fsim/tables/ps_idle_ms/h2/w1/v4</property>
      <property value="-9.24664">fsim/tables/ps_idle_ms/h2/w1/v5</property>
      <property value="-10.2299">fsim/tables/ps_idle_ms/h2/w1/v6</property>
      <property value="-11.3492">fsim/tables/ps_idle_ms/h2/w1/v7</property>
      <property value="-12.7355">fsim/tables/ps_idle_ms/h2/w1/v8</property>
      <property value="-14.3147">fsim/tables/ps_idle_ms/h2/w1/v9</property>
      <property value="-7.78072">fsim/tables/ps_idle_ms/h2/w2/v0</property>
      <property value="-7.8018">fsim/tables/ps_idle_ms/h2/w2/v1</property>
      <property value="-15.8039">fsim/tables/ps_idle_ms/h2/w2/v10</property>
      <property value="-17.7699">fsim/tables/ps_idle_ms/h2/w2/v11</property>
      <property value="-19.8801">fsim/tables/ps_idle_ms/h2/w2/v12</property>
      <property value="-22.1344">fsim/tables/ps_idle_ms/h2/w2/v13</property>
      <property value="-25.1439">fsim/tables/ps_idle_ms/h2/w2/v14</property>
      <property value="-32.2712">fsim/tables/ps_idle_ms/h2/w2/v15</property>
      <property value="-7.65602">fsim/tables/ps_idle_ms/h2/w2/v2</property>
      <property value="-7.83891">fsim/tables/ps_idle_ms/h2/w2/v3</property>
      <property value="-8.46341">fsim/tables/ps_idle_ms/h2/w2/v4</property>
      <property value="-9.2719">fsim/tables/ps_idle_ms/h2/w2/v5</property>
      <property value="-10.2116">fsim/tables/ps_idle_ms/h2/w2/v6</property>
      <property value="-11.3145">fsim/tables/ps_idle_ms/h2/w2/v7</property>
      <property value="-12.6102">fsim/tables/ps_idle_ms/h2/w2/v8</property>
      <property value="-14.1517">fsim/tables/ps_idle_ms/h2/w2/v9</property>
      <property value="-8.78071">fsim/tables/ps_idle_ms/h2/w3/v0</property>
      <property value="-8.87691">fsim/tables/ps_idle_ms/h2/w3/v1</property>
      <property value="-14.347">fsim/tables/ps_idle_ms/h2/w3/v10</property>
      <property value="-15.7207">fsim/tables/ps_idle_ms/h2/w3/v11</property>
      <property value="-17.2364">fsim/tables/ps_idle_ms/h2/w3/v12</property>
      <property value="-18.9991">fsim/tables/ps_idle_ms/h2/w3/v13</property>
      <property value="-21.3627">fsim/tables/ps_idle_ms/h2/w3/v14</property>
      <property value="-26.2471">fsim/tables/ps_idle_ms/h2/w3/v15</property>
      <property value="-8.64941">fsim/tables/ps_idle_ms/h2/w3/v2</property>
      <property value="-8.66285">fsim/tables/ps_idle_ms/h2/w3/v3</property>
      <property value="-8.92483">fsim/tables/ps_idle_ms/h2/w3/v4</property>
      <property value="-9.52476">fsim/tables/ps_idle_ms/h2/w3/v5</property>
      <property value="-10.2725">fsim/tables/ps_idle_ms/h2/w3/v6</property>
      <property value="-11.0774">fsim/tables/ps_idle_ms/h2/w3/v7</property>
      <property value="-12.0612">fsim/tables/ps_idle_ms/h2/w3/v8</property>
      <property value="-13.0942">fsim/tables/ps_idle_ms/h2/w3/v9</property>
      <property value="-7.81266">fsim/tables/ps_idle_ms/h3/w0/v0</property>
      <property value="-7.85675">fsim/tables/ps_idle_ms/h3/w0/v1</property>
      <property value="-15.0168">fsim/tables/ps_idle_ms/h3/w0/v10</property>
      <property value="-16.7668">fsim/tables/ps_idle_ms/h3/w0/v11</property>
      <property value="-18.7123">fsim/tables/ps_idle_ms/h3/w0/v12</property>
      <property value="-20.7942">fsim/tables/ps_idle_ms/h3/w0/v13</property>
      <property value="-23.606">fsim/tables/ps_idle_ms/h3/w0/v14</property>
      <property value="-31.1742">fsim/tables/ps_idle_ms/h3/w0/v15</property>
      <property value="-7.69101">fsim/tables/ps_idle_ms/h3/w0/v2</property>
      <property value="-7.84337">fsim/tables/ps_idle_ms/h3/w0/v3</property>
      <property value="-8.36236">fsim/tables/ps_idle_ms/h3/w0/v4</property>
      <property value="-9.0971">fsim/tables/ps_idle_ms/h3/w0/v5</property>
      <property value="-9.94345">fsim/tables/ps_idle_ms/h3/w0/v6</property>
      <property value="-10.991">fsim/tables/ps_idle_ms/h3/w0/v7</property>
      <property value="-12.1205">fsim/tables/ps_idle_ms/h3/w0/v8</property>
      <property value="-13.4971">fsim/tables/ps_idle_ms/h3/w0/v9</property>
      <property value="-8.94894">fsim/tables/ps_idle_ms/h3/w1/v0</property>
      <property value="-9.04535">fsim/tables/ps_idle_ms/h3/w1/v1</property>
      <property value="-13.6166">fsim/tables/ps_idle_ms/h3/w1/v10</property>
      <property value="-14.8144">fsim/tables/ps_idle_ms/h3/w1/v11</property>
      <property value="-16.0723">fsim/tables/ps_idle_ms/h3/w1/v12</property>
      <property value="-17.5">fsim/tables/ps_idle_ms/h3/w1/v13</property>
      <property value="-19.6172">fsim/tables/ps_idle_ms/h3/w1/v14</property>
      <property value="-24.5734">fsim/tables/ps_idle_ms/h3/w1/v15</property>
      <property value="-8.83985">fsim/tables/ps_idle_ms/h3/w1/v2</property>
      <property value="-8.79702">fsim/tables/ps_idle_ms/h3/w1/v3</property>
      <property value="-8.97911">fsim/tables/ps_idle_ms/h3/w1/v4</property>
      <property value="-9.45797">fsim/tables/ps_idle_ms/h3/w1/v5</property>
      <property value="-10.0799">fsim/tables/ps_idle_ms/h3/w1/v6</property>
      <property value="-10.7902">fsim/tables/ps_idle_ms/h3/w1/v7</property>
      <property value="-11.6437">fsim/tables/ps_idle_ms/h3/w1/v8</property>
      <property value="-12.573">fsim/tables/ps_idle_ms/h3/w1/v9</property>
      <property value="-9.08209">fsim/tables/ps_idle_ms/h3/w2/v0</property>
      <property value="-9.1729">fsim/tables/ps_idle_ms/h3/w2/v1</property>
      <property value="-13.4947">fsim/tables/ps_idle_ms/h3/w2/v10</property>
      <property value="-14.6612">fsim/tables/ps_idle_ms/h3/w2/v11</property>
      <property value="-15.8852">fsim/tables/ps_idle_ms/h3/w2/v12</property>
      <property value="-17.2065">fsim/tables/ps_idle_ms/h3/w2/v13</property>
      <property value="-19.2315">fsim/tables/ps_idle_ms/h3/w2/v14</property>
      <property value="-23.9277">fsim/tables/ps_idle_ms/h3/w2/v15</property>
      <property value="-8.98926">fsim/tables/ps_idle_ms/h3/w2/v2</property>
      <property value="-8.9306">fsim/tables/ps_idle_ms/h3/w2/v3</property>
      <property value="-9.08159">fsim/tables/ps_idle_ms/h3/w2/v4</property>
      <property value="-9.51482">fsim/tables/ps_idle_ms/h3/w2/v5</property>
      <property value="-10.1014">fsim/tables/ps_idle_ms/h3/w2/v6</property>
      <property value="-10.8034">fsim/tables/ps_idle_ms/h3/w2/v7</property>
      <property value="-11.6056">fsim/tables/ps_idle_ms/h3/w2/v8</property>
      <property value="-12.5168">fsim/tables/ps_idle_ms/h3/w2/v9</property>
      <property value="-10.2055">fsim/tables/ps_idle_ms/h3/w3/v0</property>
      <property value="-10.2357">fsim/tables/ps_idle_ms/h3/w3/v1</property>
      <property value="-12.8883">fsim/tables/ps_idle_ms/h3/w3/v10</property>
      <property value="-13.685">fsim/tables/ps_idle_ms/h3/w3/v11</property>
      <property value="-14.5237">fsim/tables/ps_idle_ms/h3/w3/v12</property>
      <property value="-15.565">fsim/tables/ps_idle_ms/h3/w3/v13</property>
      <property value="-16.9876">fsim/tables/ps_idle_ms/h3/w3/v14</property>
      <property value="-19.4637">fsim/tables/ps_idle_ms/h3/w3/v15</property>
      <property value="-10.2321">fsim/tables/ps_idle_ms/h3/w3/v2</property>
      <property value="-9.99459">fsim/tables/ps_idle_ms/h3/w3/v3</property>
      <property value="-9.97948">fsim/tables/ps_idle_ms/h3/w3/v4</property>
      <property value="-10.1352">fsim/tables/ps_idle_ms/h3/w3/v5</property>
      <property value="-10.4627">fsim/tables/ps_idle_ms/h3/w3/v6</property>
      <property value="-10.9225">fsim/tables/ps_idle_ms/h3/w3/v7</property>
      <property value="-11.533">fsim/tables/ps_idle_ms/h3/w3/v8</property>
      <property value="-12.1341">fsim/tables/ps_idle_ms/h3/w3/v9</property>
      <property value="-8.82475">fsim/tables/ps_idle_ms/h4/w0/v0</property>
      <property value="-8.92728">fsim/tables/ps_idle_ms/h4/w0/v1</property>
      <property value="-13.2305">fsim/tables/ps_idle_ms/h4/w0/v10</property>
      <property value="-14.3821">fsim/tables/ps_idle_ms/h4/w0/v11</property>
      <property value="-15.5904">fsim/tables/ps_idle_ms/h4/w0/v12</property>
      <property value="-16.9031">fsim/tables/ps_idle_ms/h4/w0/v13</property>
      <property value="-18.8925">fsim/tables/ps_idle_ms/h4/w0/v14</property>
      <property value="-23.3332">fsim/tables/ps_idle_ms/h4/w0/v15</property>
      <property value="-8.71638">fsim/tables/ps_idle_ms/h4/w0/v2</property>
      <property value="-8.6736">fsim/tables/ps_idle_ms/h4/w0/v3</property>
      <property value="-8.83726">fsim/tables/ps_idle_ms/h4/w0/v4</property>
      <property value="-9.26918">fsim/tables/ps_idle_ms/h4/w0/v5</property>
      <property value="-9.85849">fsim/tables/ps_idle_ms/h4/w0/v6</property>
      <property value="-10.5489">fsim/tables/ps_idle_ms/h4/w0/v7</property>
      <property value="-11.3538">fsim/tables/ps_idle_ms/h4/w0/v8</property>
      <property value="-12.2517">fsim/tables/ps_idle_ms/h4/w0/v9</property>
      <property value="-10.0698">fsim/tables/ps_idle_ms/h4/w1/v0</property>
      <property value="-10.1067">fsim/tables/ps_idle_ms/h4/w1/v1</property>
      <property value="-12.5322">fsim/tables/ps_idle_ms/h4/w1/v10</property>
      <property value="-13.2967">fsim/tables/ps_idle_ms/h4/w1/v11</property>
      <property value="-14.0764">fsim/tables/ps_idle_ms/h4/w1/v12</property>
      <property value="-15.0489">fsim/tables/ps_idle_ms/h4/w1/v13</property>
      <property value="-16.3922">fsim/tables/ps_idle_ms/h4/w1/v14</property>
      <property value="-18.5416">fsim/tables/ps_idle_ms/h4/w1/v15</property>
      <property value="-10.1146">fsim/tables/ps_idle_ms/h4/w1/v2</property>
      <property value="-9.85897">fsim/tables/ps_idle_ms/h4/w1/v3</property>
      <property value="-9.84202">fsim/tables/ps_idle_ms/h4/w1/v4</property>
      <property value="-9.9892">fsim/tables/ps_idle_ms/h4/w1/v5</property>
      <property value="-10.2611">fsim/tables/ps_idle_ms/h4/w1/v6</property>
      <property value="-10.6879">fsim/tables/ps_idle_ms/h4/w1/v7</property>
      <property value="-11.259">fsim/tables/ps_idle_ms/h4/w1/v8</property>
      <property value="-11.8405">fsim/tables/ps_idle_ms/h4/w1/v9</property>
      <property value="-10.2151">fsim/tables/ps_idle_ms/h4/w2/v0</property>
      <property value="-10.2434">fsim/tables/ps_idle_ms/h4/w2/v1</property>
      <property value="-12.4693">fsim/tables/ps_idle_ms/h4/w2/v10</property>
      <property value="-13.2141">fsim/tables/ps_idle_ms/h4/w2/v11</property>
      <property value="-13.9734">fsim/tables/ps_idle_ms/h4/w2/v12</property>
      <property value="-14.8685">fsim/tables/ps_idle_ms/h4/w2/v13</property>
      <property value="-16.1662">fsim/tables/ps_idle_ms/h4/w2/v14</property>
      <property value="-18.1103">fsim/tables/ps_idle_ms/h4/w2/v15</property>
      <property value="-10.2759">fsim/tables/ps_idle_ms/h4/w2/v2</property>
      <property value="-9.99838">fsim/tables/ps_idle_ms/h4/w2/v3</property>
      <property value="-9.98263">fsim/tables/ps_idle_ms/h4/w2/v4</property>
      <property value="-10.1065">fsim/tables/ps_idle_ms/h4/w2/v5</property>
      <property value="-10.3351">fsim/tables/ps_idle_ms/h4/w2/v6</property>
      <property value="-10.7363">fsim/tables/ps_idle_ms/h4/w2/v7</property>
      <property value="-11.2631">fsim/tables/ps_idle_ms/h4/w2/v8</property>
      <property value="-11.8364">fsim/tables/ps_idle_ms/h4/w2/v9</property>
      <property value="-11.2592">fsim/tables/ps_idle_ms/h4/w3/v0</property>
      <property value="-11.1276">fsim/tables/ps_idle_ms/h4/w3/v1</property>
      <property value="-12.8098">fsim/tables/ps_idle_ms/h4/w3/v10</property>
      <property value="-13.1743">fsim/tables/ps_idle_ms/h4/w3/v11</property>
      <property value="-13.6068">fsim/tables/ps_idle_ms/h4/w3/v12</property>
      <property value="-14.2245">fsim/tables/ps_idle_ms/h4/w3/v13</property>
      <property value="-14.9037">fsim/tables/ps_idle_ms/h4/w3/v14</property>
      <property value="-15.4787">fsim/tables/ps_idle_ms/h4/w3/v15</property>
      <property value="-11.1088">fsim/tables/ps_idle_ms/h4/w3/v2</property>
      <property value="-11.1275">fsim/tables/ps_idle_ms/h4/w3/v3</property>
      <property value="-11.232">fsim/tables/ps_idle_ms/h4/w3/v4</property>
      <property value="-11.3106">fsim/tables/ps_idle_ms/h4/w3/v5</property>
      <property value="-11.5516">fsim/tables/ps_idle_ms/h4/w3/v6</property>
      <property value="-11.7733">fsim/tables/ps_idle_ms/h4/w3/v7</property>
      <property value="-12.0638">fsim/tables/ps_idle_ms/h4/w3/v8</property>
      <property value="-12.436">fsim/tables/ps_idle_ms/h4/w3/v9</property>
      <property value="-9.57543">fsim/tables/ps_idle_ms/h5/w0/v0</property>
      <property value="-9.64127">fsim/tables/ps_idle_ms/h5/w0/v1</property>
      <property value="-12.4884">fsim/tables/ps_idle_ms/h5/w0/v10</property>
      <property value="-13.2822">fsim/tables/ps_idle_ms/h5/w0/v11</property>
      <property value="-14.201">fsim/tables/ps_idle_ms/h5/w0/v12</property>
      <property value="-15.2446">fsim/tables/ps_idle_ms/h5/w0/v13</property>
      <property value="-16.6669">fsim/tables/ps_idle_ms/h5/w0/v14</property>
      <property value="-19.266">fsim/tables/ps_idle_ms/h5/w0/v15</property>
      <property value="-9.57997">fsim/tables/ps_idle_ms/h5/w0/v2</property>
      <property value="-9.39171">fsim/tables/ps_idle_ms/h5/w0/v3</property>
      <property value="-9.41798">fsim/tables/ps_idle_ms/h5/w0/v4</property>
      <property value="-9.57737">fsim/tables/ps_idle_ms/h5/w0/v5</property>
      <property value="-9.96479">fsim/tables/ps_idle_ms/h5/w0/v6</property>
      <property value="-10.4607">fsim/tables/ps_idle_ms/h5/w0/v7</property>
      <property value="-11.0721">fsim/tables/ps_idle_ms/h5/w0/v8</property>
      <property value="-11.7073">fsim/tables/ps_idle_ms/h5/w0/v9</property>
      <property value="-10.8882">fsim/tables/ps_idle_ms/h5/w1/v0</property>
      <property value="-10.9015">fsim/tables/ps_idle_ms/h5/w1/v1</property>
      <property value="-12.1205">fsim/tables/ps_idle_ms/h5/w1/v10</property>
      <property value="-12.6091">fsim/tables/ps_idle_ms/h5/w1/v11</property>
      <property value="-13.2009">fsim/tables/ps_idle_ms/h5/w1/v12</property>
      <property value="-13.8765">fsim/tables/ps_idle_ms/h5/w1/v13</property>
      <property value="-14.7782">fsim/tables/ps_idle_ms/h5/w1/v14</property>
      <property value="-15.7592">fsim/tables/ps_idle_ms/h5/w1/v15</property>
      <property value="-10.9987">fsim/tables/ps_idle_ms/h5/w1/v2</property>
      <property value="-10.7479">fsim/tables/ps_idle_ms/h5/w1/v3</property>
      <property value="-10.6272">fsim/tables/ps_idle_ms/h5/w1/v4</property>
      <property value="-10.6008">fsim/tables/ps_idle_ms/h5/w1/v5</property>
      <property value="-10.7389">fsim/tables/ps_idle_ms/h5/w1/v6</property>
      <property value="-10.9178">fsim/tables/ps_idle_ms/h5/w1/v7</property>
      <property value="-11.2278">fsim/tables/ps_idle_ms/h5/w1/v8</property>
      <property value="-11.6252">fsim/tables/ps_idle_ms/h5/w1/v9</property>
      <property value="-11.0528">fsim/tables/ps_idle_ms/h5/w2/v0</property>
      <property value="-11.0453">fsim/tables/ps_idle_ms/h5/w2/v1</property>
      <property value="-12.0689">fsim/tables/ps_idle_ms/h5/w2/v10</property>
      <property value="-12.5569">fsim/tables/ps_idle_ms/h5/w2/v11</property>
      <property value="-13.0823">fsim/tables/ps_idle_ms/h5/w2/v12</property>
      <property value="-13.7404">fsim/tables/ps_idle_ms/h5/w2/v13</property>
      <property value="-14.6256">fsim/tables/ps_idle_ms/h5/w2/v14</property>
      <property value="-15.4923">fsim/tables/ps_idle_ms/h5/w2/v15</property>
      <property value="-11.1382">fsim/tables/ps_idle_ms/h5/w2/v2</property>
      <property value="-10.9856">fsim/tables/ps_idle_ms/h5/w2/v3</property>
      <property value="-10.7718">fsim/tables/ps_idle_ms/h5/w2/v4</property>
      <property value="-10.7387">fsim/tables/ps_idle_ms/h5/w2/v5</property>
      <property value="-10.8445">fsim/tables/ps_idle_ms/h5/w2/v6</property>
      <property value="-10.9556">fsim/tables/ps_idle_ms/h5/w2/v7</property>
      <property value="-11.2713">fsim/tables/ps_idle_ms/h5/w2/v8</property>
      <property value="-11.5894">fsim/tables/ps_idle_ms/h5/w2/v9</property>
      <property value="-12.0931">fsim/tables/ps_idle_ms/h5/w3/v0</property>
      <property value="-12.1356">fsim/tables/ps_idle_ms/h5/w3/v1</property>
      <property value="-12.9318">fsim/tables/ps_idle_ms/h5/w3/v10</property>
      <property value="-13.0902">fsim/tables/ps_idle_ms/h5/w3/v11</property>
      <property value="-13.2645">fsim/tables/ps_idle_ms/h5/w3/v12</property>
      <property value="-13.4337">fsim/tables/ps_idle_ms/h5/w3/v13</property>
      <property value="-13.5724">fsim/tables/ps_idle_ms/h5/w3/v14</property>
      <property value="-13.686">fsim/tables/ps_idle_ms/h5/w3/v15</property>
      <property value="-12.2158">fsim/tables/ps_idle_ms/h5/w3/v2</property>
      <property value="-12.2992">fsim/tables/ps_idle_ms/h5/w3/v3</property>
      <property value="-12.3787">fsim/tables/ps_idle_ms/h5/w3/v4</property>
      <property value="-12.4554">fsim/tables/ps_idle_ms/h5/w3/v5</property>
      <property value="-12.5316">fsim/tables/ps_idle_ms/h5/w3/v6</property>
      <property value="-12.61">fsim/tables/ps_idle_ms/h5/w3/v7</property>
      <property value="-12.6912">fsim/tables/ps_idle_ms/h5/w3/v8</property>
      <property value="-12.7881">fsim/tables/ps_idle_ms/h5/w3/v9</property>
      <property value="-10.4196">fsim/tables/ps_idle_ms/h6/w0/v0</property>
      <property value="-10.4404">fsim/tables/ps_idle_ms/h6/w0/v1</property>
      <property value="-11.9647">fsim/tables/ps_idle_ms/h6/w0/v10</property>
      <property value="-12.5324">fsim/tables/ps_idle_ms/h6/w0/v11</property>
      <property value="-13.2014">fsim/tables/ps_idle_ms/h6/w0/v12</property>
      <property value="-13.9065">fsim/tables/ps_idle_ms/h6/w0/v13</property>
      <property value="-14.891">fsim/tables/ps_idle_ms/h6/w0/v14</property>
      <property value="-16.1735">fsim/tables/ps_idle_ms/h6/w0/v15</property>
      <property value="-10.5271">fsim/tables/ps_idle_ms/h6/w0/v2</property>
      <property value="-10.2383">fsim/tables/ps_idle_ms/h6/w0/v3</property>
      <property value="-10.1796">fsim/tables/ps_idle_ms/h6/w0/v4</property>
      <property value="-10.2113">fsim/tables/ps_idle_ms/h6/w0/v5</property>
      <property value="-10.332">fsim/tables/ps_idle_ms/h6/w0/v6</property>
      <property value="-10.6235">fsim/tables/ps_idle_ms/h6/w0/v7</property>
      <property value="-10.957">fsim/tables/ps_idle_ms/h6/w0/v8</property>
      <property value="-11.4534">fsim/tables/ps_idle_ms/h6/w0/v9</property>
      <property value="-11.6148">fsim/tables/ps_idle_ms/h6/w1/v0</property>
      <property value="-11.4704">fsim/tables/ps_idle_ms/h6/w1/v1</property>
      <property value="-12.343">fsim/tables/ps_idle_ms/h6/w1/v10</property>
      <property value="-12.6384">fsim/tables/ps_idle_ms/h6/w1/v11</property>
      <property value="-12.9412">fsim/tables/ps_idle_ms/h6/w1/v12</property>
      <property value="-13.3337">fsim/tables/ps_idle_ms/h6/w1/v13</property>
      <property value="-13.7368">fsim/tables/ps_idle_ms/h6/w1/v14</property>
      <property value="-14.1749">fsim/tables/ps_idle_ms/h6/w1/v15</property>
      <property value="-11.4568">fsim/tables/ps_idle_ms/h6/w1/v2</property>
      <property value="-11.4248">fsim/tables/ps_idle_ms/h6/w1/v3</property>
      <property value="-11.4962">fsim/tables/ps_idle_ms/h6/w1/v4</property>
      <property value="-11.5799">fsim/tables/ps_idle_ms/h6/w1/v5</property>
      <property value="-11.6384">fsim/tables/ps_idle_ms/h6/w1/v6</property>
      <property value="-11.7996">fsim/tables/ps_idle_ms/h6/w1/v7</property>
      <property value="-11.9729">fsim/tables/ps_idle_ms/h6/w1/v8</property>
      <property value="-12.1448">fsim/tables/ps_idle_ms/h6/w1/v9</property>
      <property value="-11.7653">fsim/tables/ps_idle_ms/h6/w2/v0</property>
      <property value="-11.8226">fsim/tables/ps_idle_ms/h6/w2/v1</property>
      <property value="-12.9218">fsim/tables/ps_idle_ms/h6/w2/v10</property>
      <property value="-13.1449">fsim/tables/ps_idle_ms/h6/w2/v11</property>
      <property value="-13.3823">fsim/tables/ps_idle_ms/h6/w2/v12</property>
      <property value="-13.6055">fsim/tables/ps_idle_ms/h6/w2/v13</property>
      <property value="-13.807">fsim/tables/ps_idle_ms/h6/w2/v14</property>
      <property value="-14.0266">fsim/tables/ps_idle_ms/h6/w2/v15</property>
      <property value="-11.9257">fsim/tables/ps_idle_ms/h6/w2/v2</property>
      <property value="-12.027">fsim/tables/ps_idle_ms/h6/w2/v3</property>
      <property value="-12.1247">fsim/tables/ps_idle_ms/h6/w2/v4</property>
      <property value="-12.2213">fsim/tables/ps_idle_ms/h6/w2/v5</property>
      <property value="-12.3186">fsim/tables/ps_idle_ms/h6/w2/v6</property>
      <property value="-12.419">fsim/tables/ps_idle_ms/h6/w2/v7</property>
      <property value="-12.5686">fsim/tables/ps_idle_ms/h6/w2/v8</property>
      <property value="-12.7395">fsim/tables/ps_idle_ms/h6/w2/v9</property>
      <property value="295.482">fsim/tables/reach_tas_ms/h0/w0</property>
      <property value="295.24">fsim/tables/reach_tas_ms/h0/w1</property>
      <property value="295.201">fsim/tables/reach_tas_ms/h0/w2</property>
      <property value="294.9">fsim/tables/reach_tas_ms/h0/w3</property>
      <property value="291.067">fsim/tables/reach_tas_ms/h1/w0</property>
      <property value="290.776">fsim/tables/reach_tas_ms/h1/w1</property>
      <property value="290.743">fsim/tables/reach_tas_ms/h1/w2</property>
      <property value="290.447">fsim/tables/reach_tas_ms/h1/w3</property>
      <property value="284.786">fsim/tables/reach_tas_ms/h2/w0</property>
      <property value="284.437">fsim/tables/reach_tas_ms/h2/w1</property>
      <property value="284.393">fsim/tables/reach_tas_ms/h2/w2</property>
      <property value="283.948">fsim/tables/reach_tas_ms/h2/w3</property>
      <property value="276.684">fsim/tables/reach_tas_ms/h3/w0</property>
      <property value="276.029">fsim/tables/reach_tas_ms/h3/w1</property>
      <property value="275.924">fsim/tables/reach_tas_ms/h3/w2</property>
      <property value="274.688">fsim/tables/reach_tas_ms/h3/w3</property>
      <property value="269.091">fsim/tables/reach_tas_ms/h4/w0</property>
      <property value="267.698">fsim/tables/reach_tas_ms/h4/w1</property>
      <property value="267.482">fsim/tables/reach_tas_ms/h4/w2</property>
      <property value="265.206">fsim/tables/reach_tas_ms/h4/w3</property>
      <property value="263.589">fsim/tables/reach_tas_ms/h5/w0</property>
      <property value="261.428">fsim/tables/reach_tas_ms/h5/w1</property>
      <property value="261.131">fsim/tables/reach_tas_ms/h5/w2</property>
      <property value="258.073">fsim/tables/reach_tas_ms/h6/w0</property>
      <property value="0.0">fsim/tables/speed_fraction/v0</property>
      <property value="0.0666667">fsim/tables/speed_fraction/v1</property>
      <property value="0.666667">fsim/tables/speed_fraction/v10</property>
      <property value="0.733333">fsim/tables/speed_fraction/v11</property>
      <property value="0.8">fsim/tables/speed_fraction/v12</property>
      <property value="0.866667">fsim/tables/speed_fraction/v13</property>
      <property value="0.933333">fsim/tables/speed_fraction/v14</property>
      <property value="1">fsim/tables/speed_fraction/v15</property>
      <property value="0.133333">fsim/tables/speed_fraction/v2</property>
      <property value="0.2">fsim/tables/speed_fraction/v3</property>
      <property value="0.266667">fsim/tables/speed_fraction/v4</property>
      <property value="0.333333">fsim/tables/speed_fraction/v5</property>
      <property value="0.4">fsim/tables/speed_fraction/v6</property>
      <property value="0.466667">fsim/tables/speed_fraction/v7</property>
      <property value="0.533333">fsim/tables/speed_fraction/v8</property>
      <property value="0.6">fsim/tables/speed_fraction/v9</property>
      <property value="66.7964">fsim/tables/stall_cas_ms/h0/w0</property>
      <property value="75.3554">fsim/tables/stall_cas_ms/h0/w1</property>
      <property value="76.3579">fsim/tables/stall_cas_ms/h0/w2</property>
      <property value="84.8486">fsim/tables/stall_cas_ms/h0/w3</property>
      <property value="66.8329">fsim/tables/stall_cas_ms/h1/w0</property>
      <property value="75.3966">fsim/tables/stall_cas_ms/h1/w1</property>
      <property value="76.3996">fsim/tables/stall_cas_ms/h1/w2</property>
      <property value="84.895">fsim/tables/stall_cas_ms/h1/w3</property>
      <property value="66.9185">fsim/tables/stall_cas_ms/h2/w0</property>
      <property value="75.4932">fsim/tables/stall_cas_ms/h2/w1</property>
      <property value="76.4975">fsim/tables/stall_cas_ms/h2/w2</property>
      <property value="85.0038">fsim/tables/stall_cas_ms/h2/w3</property>
      <property value="66.9435">fsim/tables/stall_cas_ms/h3/w0</property>
      <property value="75.5213">fsim/tables/stall_cas_ms/h3/w1</property>
      <property value="76.526">fsim/tables/stall_cas_ms/h3/w2</property>
      <property value="85.0354">fsim/tables/stall_cas_ms/h3/w3</property>
      <property value="66.7467">fsim/tables/stall_cas_ms/h4/w0</property>
      <property value="75.2994">fsim/tables/stall_cas_ms/h4/w1</property>
      <property value="76.3011">fsim/tables/stall_cas_ms/h4/w2</property>
      <property value="84.7855">fsim/tables/stall_cas_ms/h4/w3</property>
      <property value="66.846">fsim/tables/stall_cas_ms/h5/w0</property>
      <property value="75.4114">fsim/tables/stall_cas_ms/h5/w1</property>
      <property value="76.4146">fsim/tables/stall_cas_ms/h5/w2</property>
      <property value="84.9117">fsim/tables/stall_cas_ms/h5/w3</property>
      <property value="66.8886">fsim/tables/stall_cas_ms/h6/w0</property>
      <property value="75.4595">fsim/tables/stall_cas_ms/h6/w1</property>
      <property value="76.4633">fsim/tables/stall_cas_ms/h6/w2</property>
      <property value="87140.6">fsim/tables/weight_kg/w0</property>
      <property value="110903">fsim/tables/weight_kg/w1</property>
      <property value="113873">fsim/tables/weight_kg/w2</property>
      <property value="140606">fsim/tables/weight_kg/w3</property>
      <channel name="Pitch">
        <summer name="fcs/pitch-trim-sum">
          <input>fcs/elevator-cmd-norm</input>
          <input>fcs/pitch-trim-cmd-norm</input>
          <clipto> <min>-1</min> <max>1</max> </clipto>
        </summer>
        <aerosurface_scale name="fcs/elevator-control">
          <input>fcs/pitch-trim-sum</input>
          <range> <min>-30.00</min> <max>20.00</max> </range>
          <gain>0.0174533</gain>
        </aerosurface_scale>
        <actuator name="fcs/elevator-actuator">
          <input>fcs/elevator-control</input>
          <rate_limit>2.0</rate_limit>
          <output>fcs/elevator-pos-rad</output>
        </actuator>
      </channel>
      <channel name="Roll">
        <summer name="fcs/roll-trim-sum">
          <input>fcs/aileron-cmd-norm</input>
          <input>fcs/roll-trim-cmd-norm</input>
          <clipto> <min>-1</min> <max>1</max> </clipto>
        </summer>
        <aerosurface_scale name="fcs/left-aileron-control">
          <input>fcs/roll-trim-sum</input>
          <range> <min>-20.00</min> <max>20.00</max> </range>
          <gain>0.0174533</gain>
        </aerosurface_scale>
        <actuator name="fcs/left-aileron-actuator">
          <input>fcs/left-aileron-control</input>
          <rate_limit>2.0</rate_limit>
          <output>fcs/left-aileron-pos-rad</output>
        </actuator>
        <pure_gain name="fcs/right-aileron">
          <input>fcs/left-aileron-pos-rad</input>
          <gain>-1</gain>
          <output>fcs/right-aileron-pos-rad</output>
        </pure_gain>
      </channel>
      <channel name="Yaw">
        <summer name="fcs/yaw-trim-sum">
          <input>fcs/rudder-cmd-norm</input>
          <input>fcs/yaw-trim-cmd-norm</input>
          <clipto> <min>-1</min> <max>1</max> </clipto>
        </summer>
        <aerosurface_scale name="fcs/rudder-control">
          <input>fcs/yaw-trim-sum</input>
          <range> <min>-25.00</min> <max>25.00</max> </range>
          <gain>0.0174533</gain>
        </aerosurface_scale>
        <!-- the yaw damper (hangar/fcs.py yaw_damper): the yaw rate, washed out so a
             steady turn's is left alone, against itself through the rudder - the
             dutch roll damped to 0.30 at 1 g across the speed range -->
        <washout_filter name="fcs/yaw-damper-washout">
          <input>velocities/r-rad_sec</input>
          <c1>0.500</c1>
        </washout_filter>
        <fcs_function name="fcs/yaw-damper">
          <function>
            <product>
              <value>-1</value>
              <table>
                <independentVar lookup="row">aero/qbar-psf</independentVar>
                <tableData>
                  10.0   -3.00000
                  20.0   -3.00000
                  40.0   -3.00000
                  80.0   -3.00000
                 150.0   -1.33008
                 300.0   -0.29873
                 600.0   -0.11688
                1200.0   -0.06951
                2400.0   -0.06185
                </tableData>
              </table>
              <property>fcs/yaw-damper-washout</property>
            </product>
          </function>
          <clipto> <min>-0.21817</min> <max>0.21817</max> </clipto>
        </fcs_function>
        <summer name="fcs/rudder-sum">
          <input>fcs/rudder-control</input>
          <input>fcs/yaw-damper</input>
          <clipto> <min>-0.43633</min> <max>0.43633</max> </clipto>
        </summer>
        <actuator name="fcs/rudder-actuator">
          <input>fcs/rudder-sum</input>
          <rate_limit>2.0</rate_limit>
          <output>fcs/rudder-pos-rad</output>
        </actuator>
        <!-- the nose or tail wheel steers with the rudder pedals (JSBSim steers from
             fcs/steer-cmd-norm, positive right; the rudder command is positive left) -->
        <pure_gain name="fcs/steer-from-rudder">
          <input>fcs/yaw-trim-sum</input>
          <gain>-1</gain>
          <output>fcs/steer-cmd-norm</output>
        </pure_gain>
      </channel>
      <channel name="Flaps">
        <kinematic name="fcs/flaps-control">
          <input>fcs/flap-cmd-norm</input>
          <traverse>
            <setting> <position>0.0</position> <time>0.0</time> </setting>
            <setting> <position>12.5</position> <time>2.0</time> </setting>
            <setting> <position>25.0</position> <time>2.0</time> </setting>
            <setting> <position>37.5</position> <time>2.0</time> </setting>
            <setting> <position>50.0</position> <time>2.0</time> </setting>
          </traverse>
          <output>fcs/flap-pos-deg</output>
        </kinematic>
        <pure_gain name="fcs/flaps-normalized">
          <input>fcs/flap-pos-deg</input>
          <gain>0.02</gain>
          <output>fcs/flap-pos-norm</output>
        </pure_gain>
      </channel>
      <channel name="Speedbrake">
        <kinematic name="fcs/speedbrake-control">
          <input>fcs/speedbrake-cmd-norm</input>
          <traverse>
            <setting> <position>0</position> <time>0</time> </setting>
            <setting> <position>1</position> <time>2.00</time> </setting>
          </traverse>
          <output>fcs/speedbrake-pos-norm</output>
        </kinematic>
      </channel>
      <channel name="Landing Gear">
        <kinematic name="fcs/gear-control">
          <input>gear/gear-cmd-norm</input>
          <traverse>
            <setting> <position>0</position> <time>0</time> </setting>
            <setting> <position>1</position> <time>5</time> </setting>
          </traverse>
          <output>gear/gear-pos-norm</output>
        </kinematic>
      </channel>
    </flight_control>
    <aerodynamics>
        <function name="aero/function/mach-lift">
          <description>lift, and damping, over its low-speed value (hangar: aero/mach.py)</description>
          <table>
            <independentVar lookup="row">velocities/mach</independentVar>
            <tableData>
                 0.000     1.000000
                 0.300     1.025208
                 0.500     1.076453
                 0.600     1.117830
                 0.700     1.175613
                 0.800     1.259695
                 0.850     1.317768
                 0.900     1.392661
                 0.950     1.394822
                 1.000     1.394174
                 1.050     1.391783
                 1.100     1.388715
                 1.200     1.384815
            </tableData>
          </table>
        </function>
        <function name="aero/function/mach-side">
          <description>side force, rolling and yawing moment over their low-speed values</description>
          <table>
            <independentVar lookup="row">velocities/mach</independentVar>
            <tableData>
                 0.000     1.000000
                 0.300     1.016199
                 0.500     1.048386
                 0.600     1.073702
                 0.700     1.108132
                 0.800     1.156451
                 0.850     1.188620
                 0.900     1.228476
                 0.950     1.210758
                 1.000     1.170992
                 1.050     1.116525
                 1.100     1.054709
                 1.200     0.938427
            </tableData>
          </table>
        </function>
        <function name="aero/function/mach-dCm-dCL">
          <description>pitching moment per unit low-speed lift: the neutral point's move</description>
          <table>
            <independentVar lookup="row">velocities/mach</independentVar>
            <tableData>
                 0.000     0.000000
                 0.300    -0.014912
                 0.500    -0.046544
                 0.600    -0.073526
                 0.700    -0.113694
                 0.800    -0.178320
                 0.850    -0.228078
                 0.900    -0.299661
                 0.950    -0.329887
                 1.000    -0.355433
                 1.050    -0.377817
                 1.100    -0.398647
                 1.200    -0.442410
            </tableData>
          </table>
        </function>
        <function name="aero/function/mach-dCD0">
          <description>zero-lift drag's change: friction and wave drag</description>
          <table>
            <independentVar lookup="row">velocities/mach</independentVar>
            <tableData>
                 0.000     0.000000
                 0.300    -0.000113
                 0.500    -0.000308
                 0.600    -0.000438
                 0.700    -0.000588
                 0.800    -0.000656
                 0.850     0.000147
                 0.900     0.014334
                 0.950     0.079410
                 1.000     0.155005
                 1.050     0.191222
                 1.100     0.191116
                 1.200     0.190897
            </tableData>
          </table>
        </function>
        <function name="aero/function/mach-dK">
          <description>induced-drag factor's change (per CL^2)</description>
          <table>
            <independentVar lookup="row">velocities/mach</independentVar>
            <tableData>
                 0.000     0.000000
                 0.300     0.002495
                 0.500     0.007039
                 0.600     0.010261
                 0.700     0.014203
                 0.800     0.019000
                 0.850     0.021791
                 0.900     0.024888
                 0.950     0.024970
                 1.000     0.024945
                 1.050     0.034561
                 1.100     0.058087
                 1.200     0.113511
            </tableData>
          </table>
        </function>
        <function name="aero/function/mach-aileron">
          <description>aileron power over its low-speed value</description>
          <table>
            <independentVar lookup="row">velocities/mach</independentVar>
            <tableData>
                 0.000     1.000000
                 0.300     1.022894
                 0.500     1.068805
                 0.600     1.105212
                 0.700     1.154952
                 0.800     1.224773
                 0.850     1.271094
                 0.900     1.328768
                 0.950     1.259886
                 1.000     1.142534
                 1.050     0.992871
                 1.100     0.827051
                 1.200     0.511567
            </tableData>
          </table>
        </function>
        <function name="aero/function/mach-elevator">
          <description>elevator power over its low-speed value</description>
          <table>
            <independentVar lookup="row">velocities/mach</independentVar>
            <tableData>
                 0.000     1.000000
                 0.300     1.024420
                 0.500     1.074618
                 0.600     1.115787
                 0.700     1.174451
                 0.800     1.263054
                 0.850     1.327496
                 0.900     1.417422
                 0.950     1.356846
                 1.000     1.238631
                 1.050     1.081990
                 1.100     0.906136
                 1.200     0.573641
            </tableData>
          </table>
        </function>
        <function name="aero/function/mach-flap">
          <description>flap power over its low-speed value</description>
          <table>
            <independentVar lookup="row">velocities/mach</independentVar>
            <tableData>
                 0.000     1.000000
                 0.300     1.029367
                 0.500     1.089661
                 0.600     1.138899
                 0.700     1.208440
                 0.800     1.311173
                 0.850     1.383299
                 0.900     1.478597
                 0.950     1.417213
                 1.000     1.295824
                 1.050     1.134432
                 1.100     0.953038
                 1.200     0.610252
            </tableData>
          </table>
        </function>
        <function name="aero/function/mach-rudder">
          <description>rudder power over its low-speed value</description>
          <table>
            <independentVar lookup="row">velocities/mach</independentVar>
            <tableData>
                 0.000     1.000000
                 0.300     1.020823
                 0.500     1.063263
                 0.600     1.097725
                 0.700     1.146318
                 0.800     1.218554
                 0.850     1.270127
                 0.900     1.340366
                 0.950     1.280671
                 1.000     1.171214
                 1.050     1.028582
                 1.100     0.869363
                 1.200     0.567512
            </tableData>
          </table>
        </function>
        <function name="aero/function/CL-base">
          <description>CL over alpha and beta at low speed</description>
          <table>
            <independentVar lookup="row">aero/alpha-deg</independentVar>
            <independentVar lookup="column">aero/beta-deg</independentVar>
            <tableData>
                        -90.00    -70.00    -50.00    -40.00    -30.00    -25.00    -20.00    -15.00    -10.00     -6.00     -3.00      0.00      3.00      6.00     10.00     15.00     20.00     25.00     30.00     40.00     50.00     70.00     90.00
             -180.00  -0.00000  -0.00009  -0.00774   0.00457   0.00559   0.00226  -0.00080  -0.00271  -0.00406  -0.00472  -0.00500  -0.00509  -0.00500  -0.00472  -0.00406  -0.00271  -0.00080   0.00226   0.00559   0.00457  -0.00774  -0.00009  -0.00000
             -120.00  -0.00000   0.14730   0.37800   0.50058   0.61128   0.65862   0.69900   0.73145   0.75518   0.76823   0.77409   0.77442   0.77409   0.76823   0.75518   0.73145   0.69900   0.65862   0.61128   0.50058   0.37800   0.14730  -0.00000
              -70.00  -0.00000  -0.11443  -0.30063  -0.40097  -0.49230  -0.53156  -0.56515  -0.59221  -0.61204  -0.62240  -0.62616  -0.62547  -0.62616  -0.62240  -0.61204  -0.59221  -0.56515  -0.53156  -0.49230  -0.40097  -0.30063  -0.11443  -0.00000
              -46.00  -0.00000  -0.19630  -0.51488  -0.68497  -0.83461  -0.89742  -0.95058  -0.99314  -1.02372  -1.03405  -1.03847  -1.03992  -1.03847  -1.03405  -1.02372  -0.99314  -0.95058  -0.89742  -0.83461  -0.68497  -0.51488  -0.19630  -0.00000
              -32.00  -0.00000  -0.21184  -0.54574  -0.72218  -0.90691  -0.98563  -1.04908  -1.07835  -1.09511  -1.10364  -1.10722  -1.10841  -1.10722  -1.10364  -1.09511  -1.07835  -1.04908  -0.98563  -0.90691  -0.72218  -0.54574  -0.21184  -0.00000
              -22.00  -0.00000  -0.14408  -0.56848  -0.75208  -0.96282  -1.06505  -1.16540  -1.23394  -1.33753  -1.37499  -1.38881  -1.37903  -1.38881  -1.37499  -1.33753  -1.23394  -1.16540  -1.06505  -0.96282  -0.75208  -0.56848  -0.14408  -0.00000
              -17.00  -0.00000  -0.09754  -0.48394  -0.70470  -0.90357  -0.99171  -1.10286  -1.17136  -1.21986  -1.24458  -1.25494  -1.25837  -1.25494  -1.24458  -1.21986  -1.17136  -1.10286  -0.99171  -0.90357  -0.70470  -0.48394  -0.09754  -0.00000
              -13.00  -0.00000  -0.05695  -0.41791  -0.60219  -0.68867  -0.76387  -0.83648  -0.88663  -0.92233  -0.94031  -0.94775  -0.95020  -0.94775  -0.94031  -0.92233  -0.88663  -0.83648  -0.76387  -0.68867  -0.60219  -0.41791  -0.05695  -0.00000
               -9.00  -0.00000  -0.01440  -0.33839  -0.39395  -0.44598  -0.49867  -0.54775  -0.58347  -0.60856  -0.62089  -0.62585  -0.62744  -0.62585  -0.62089  -0.60856  -0.58347  -0.54775  -0.49867  -0.44598  -0.39395  -0.33839  -0.01440  -0.00000
               -5.00  -0.00000   0.00394  -0.17399  -0.16392  -0.19677  -0.22575  -0.25449  -0.27629  -0.29140  -0.29854  -0.30118  -0.30194  -0.30118  -0.29854  -0.29140  -0.27629  -0.25449  -0.22575  -0.19677  -0.16392  -0.17399   0.00394  -0.00000
               -1.00  -0.00000   0.00066   0.02148   0.05023   0.05658   0.05077   0.03981   0.03135   0.02541   0.02257   0.02158   0.02141   0.02158   0.02257   0.02541   0.03135   0.03981   0.05077   0.05658   0.05023   0.02148   0.00066  -0.00000
                3.00   0.00000   0.00046   0.20952   0.27183   0.31564   0.33075   0.33653   0.34098   0.34365   0.34451   0.34452   0.34437   0.34452   0.34451   0.34365   0.34098   0.33653   0.33075   0.31564   0.27183   0.20952   0.00046   0.00000
                7.00   0.00000   0.02591   0.41016   0.52936   0.59589   0.62737   0.64790   0.66551   0.67734   0.68279   0.68482   0.68543   0.68482   0.68279   0.67734   0.66551   0.64790   0.62737   0.59589   0.52936   0.41016   0.02591   0.00000
               11.00   0.00000   0.06014   0.43099   0.76009   0.85628   0.90565   0.93804   0.96852   0.98979   1.00030   1.00460   1.00600   1.00460   1.00030   0.98979   0.96852   0.93804   0.90565   0.85628   0.76009   0.43099   0.06014   0.00000
               15.00   0.00000   0.09900   0.51685   0.77792   1.06869   1.13496   1.18076   1.22756   1.26057   1.27717   1.28408   1.28637   1.28408   1.27717   1.26057   1.22756   1.18076   1.13496   1.06869   0.77792   0.51685   0.09900   0.00000
               19.00   0.00000   0.13699   0.60055   0.85205   1.00419   1.08649   1.17351   1.36064   1.41615   1.44367   1.45515   1.45896   1.45515   1.44367   1.41615   1.36064   1.17351   1.08649   1.00419   0.85205   0.60055   0.13699   0.00000
               23.00   0.00000   0.17191   0.63021   0.83937   1.00903   1.05910   1.10107   1.16141   1.20217   1.22239   1.22909   1.21742   1.22909   1.22239   1.20217   1.16141   1.10107   1.05910   1.00903   0.83937   0.63021   0.17191   0.00000
               27.00   0.00000   0.20346   0.57762   0.77298   0.91871   1.01929   1.06039   1.11494   1.15806   1.18040   1.18985   1.19301   1.18985   1.18040   1.15806   1.11494   1.06039   1.01929   0.91871   0.77298   0.57762   0.20346   0.00000
               32.00   0.00000   0.22875   0.55565   0.73599   0.86886   0.92627   0.98235   1.03505   1.07774   1.09986   1.10921   1.11234   1.10921   1.09986   1.07774   1.03505   0.98235   0.92627   0.86886   0.73599   0.55565   0.22875   0.00000
               46.00   0.00000   0.19777   0.51954   0.69149   0.84211   0.90498   0.95800   1.00267   1.02826   1.03985   1.04481   1.04643   1.04481   1.03985   1.02826   1.00267   0.95800   0.90498   0.84211   0.69149   0.51954   0.19777   0.00000
               70.00   0.00000   0.11477   0.30178   0.40260   0.49437   0.53383   0.56759   0.59479   0.61472   0.62513   0.62891   0.62822   0.62891   0.62513   0.61472   0.59479   0.56759   0.53383   0.49437   0.40260   0.30178   0.11477   0.00000
              120.00   0.00000  -0.14720  -0.37768  -0.50013  -0.61071  -0.65800  -0.69834  -0.73075  -0.75445  -0.76749  -0.77334  -0.77367  -0.77334  -0.76749  -0.75445  -0.73075  -0.69834  -0.65800  -0.61071  -0.50013  -0.37768  -0.14720   0.00000
              180.00  -0.00000  -0.00009  -0.00774   0.00457   0.00559   0.00226  -0.00080  -0.00271  -0.00406  -0.00472  -0.00500  -0.00509  -0.00500  -0.00472  -0.00406  -0.00271  -0.00080   0.00226   0.00559   0.00457  -0.00774  -0.00009  -0.00000
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            </tableData>
          </table>
        </function>
      <axis name="DRAG">
        <function name="aero/coefficient/CD_base">
          <description>CD over alpha and beta (hangar)</description>
          <product>
            <property>aero/qbar-psf</property>
            <property>metrics/Sw-sqft</property>
          <table>
            <independentVar lookup="row">aero/alpha-deg</independentVar>
            <independentVar lookup="column">aero/beta-deg</independentVar>
            <tableData>
                        -90.00    -70.00    -50.00    -40.00    -30.00    -25.00    -20.00    -15.00    -10.00     -6.00     -3.00      0.00      3.00      6.00     10.00     15.00     20.00     25.00     30.00     40.00     50.00     70.00     90.00
             -180.00   0.61596   0.51636   0.29530   0.18770   0.10357   0.07263   0.04942   0.03347   0.02175   0.01896   0.01859   0.01853   0.01859   0.01896   0.02175   0.03347   0.04942   0.07263   0.10357   0.18770   0.29530   0.51636   0.61596
             -120.00   0.61596   0.62150   0.75519   0.89064   1.04977   1.12844   1.20061   1.26203   1.30892   1.33379   1.34461   1.34839   1.34461   1.33379   1.30892   1.26203   1.20061   1.12844   1.04977   0.89064   0.75519   0.62150   0.61596
              -70.00   0.61596   0.64789   0.85418   1.04008   1.25130   1.35415   1.44792   1.52737   1.58789   1.62015   1.63392   1.63870   1.63392   1.62015   1.58789   1.52737   1.44792   1.35415   1.25130   1.04008   0.85418   0.64789   0.61596
              -46.00   0.61596   0.60205   0.63271   0.69039   0.76754   0.80838   0.84713   0.88203   0.90947   0.91684   0.91984   0.92079   0.91984   0.91684   0.90947   0.88203   0.84713   0.80838   0.76754   0.69039   0.63271   0.60205   0.61596
              -32.00   0.61596   0.57075   0.48925   0.46957   0.48289   0.49824   0.51886   0.51084   0.50435   0.50105   0.49966   0.49919   0.49966   0.50105   0.50435   0.51084   0.51886   0.49824   0.48289   0.46957   0.48925   0.57075   0.61596
              -22.00   0.61596   0.55280   0.40121   0.33769   0.30550   0.31163   0.28839   0.26251   0.23409   0.22209   0.21738   0.21461   0.21738   0.22209   0.23409   0.26251   0.28839   0.31163   0.30550   0.33769   0.40121   0.55280   0.61596
              -17.00   0.61596   0.54554   0.36815   0.28151   0.21095   0.19148   0.17105   0.14971   0.13292   0.12404   0.12024   0.11897   0.12024   0.12404   0.13292   0.14971   0.17105   0.19148   0.21095   0.28151   0.36815   0.54554   0.61596
              -13.00   0.61596   0.54070   0.34553   0.23618   0.17653   0.15120   0.12526   0.10385   0.08848   0.08066   0.07738   0.07629   0.07738   0.08066   0.08848   0.10385   0.12526   0.15120   0.17653   0.23618   0.34553   0.54070   0.61596
               -9.00   0.61596   0.53677   0.32452   0.21096   0.14989   0.11511   0.08931   0.06939   0.05545   0.04852   0.04567   0.04474   0.04567   0.04852   0.05545   0.06939   0.08931   0.11511   0.14989   0.21096   0.32452   0.53677   0.61596
               -5.00   0.61596   0.53454   0.31825   0.19922   0.13445   0.09290   0.06714   0.04783   0.03462   0.02827   0.02575   0.02495   0.02575   0.02827   0.03462   0.04783   0.06714   0.09290   0.13445   0.19922   0.31825   0.53454   0.61596
               -1.00   0.61596   0.53387   0.31514   0.19420   0.12945   0.08555   0.05929   0.03968   0.02642   0.02022   0.01784   0.01712   0.01784   0.02022   0.02642   0.03968   0.05929   0.08555   0.12945   0.19420   0.31514   0.53387   0.61596
                3.00   0.61596   0.53360   0.31911   0.20359   0.13715   0.09399   0.06633   0.04560   0.03135   0.02464   0.02196   0.02110   0.02196   0.02464   0.03135   0.04560   0.06633   0.09399   0.13715   0.20359   0.31911   0.53360   0.61596
                7.00   0.61596   0.53540   0.33322   0.24347   0.16991   0.12384   0.09655   0.07163   0.05446   0.04667   0.04276   0.04010   0.04276   0.04667   0.05446   0.07163   0.09655   0.12384   0.16991   0.24347   0.33322   0.53540   0.61596
               11.00   0.61596   0.53860   0.34798   0.27903   0.21820   0.17398   0.14103   0.11105   0.08929   0.07788   0.07284   0.07074   0.07284   0.07788   0.08929   0.11105   0.14103   0.17398   0.21820   0.27903   0.34798   0.53860   0.61596
               15.00   0.61596   0.54296   0.36531   0.31133   0.28472   0.23521   0.19369   0.15792   0.13094   0.11628   0.10972   0.10744   0.10972   0.11628   0.13094   0.15792   0.19369   0.23521   0.28472   0.31133   0.36531   0.54296   0.61596
               19.00   0.61596   0.54825   0.38394   0.34142   0.33471   0.30591   0.27334   0.24958   0.20114   0.17459   0.16233   0.15857   0.16233   0.17459   0.20114   0.24958   0.27334   0.30591   0.33471   0.34142   0.38394   0.54825   0.61596
               23.00   0.61596   0.55435   0.40970   0.36863   0.37177   0.34117   0.31037   0.28735   0.27085   0.26379   0.26250   0.25563   0.26250   0.26379   0.27085   0.28735   0.31037   0.34117   0.37177   0.36863   0.40970   0.55435   0.61596
               27.00   0.61596   0.56116   0.44379   0.41130   0.39818   0.40098   0.37287   0.35895   0.35039   0.34541   0.34327   0.34265   0.34327   0.34541   0.35039   0.35895   0.37287   0.40098   0.39818   0.41130   0.44379   0.56116   0.61596
               32.00   0.61596   0.57069   0.48894   0.47131   0.46868   0.47730   0.46809   0.46635   0.46788   0.46911   0.46975   0.47000   0.46975   0.46911   0.46788   0.46635   0.46809   0.47730   0.46868   0.47131   0.48894   0.57069   0.61596
               46.00   0.61596   0.60198   0.63231   0.68965   0.76566   0.80530   0.84254   0.87938   0.89799   0.90647   0.90994   0.91102   0.90994   0.90647   0.89799   0.87938   0.84254   0.80530   0.76566   0.68965   0.63231   0.60198   0.61596
               70.00   0.61596   0.64785   0.85392   1.03965   1.25068   1.35344   1.44713   1.52652   1.58698   1.61921   1.63298   1.63775   1.63298   1.61921   1.58698   1.52652   1.44713   1.35344   1.25068   1.03965   0.85392   0.64785   0.61596
              120.00   0.61596   0.62156   0.75554   0.89122   1.05061   1.12939   1.20168   1.26318   1.31014   1.33504   1.34588   1.34967   1.34588   1.33504   1.31014   1.26318   1.20168   1.12939   1.05061   0.89122   0.75554   0.62156   0.61596
              180.00   0.61596   0.51636   0.29530   0.18770   0.10357   0.07263   0.04942   0.03347   0.02175   0.01896   0.01859   0.01853   0.01859   0.01896   0.02175   0.03347   0.04942   0.07263   0.10357   0.18770   0.29530   0.51636   0.61596
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            </tableData>
          </table>
          </product>
        </function>
        <function name="aero/coefficient/CD_mach">
          <description>zero-lift drag's change with Mach: friction, wave drag</description>
          <product>
            <property>aero/qbar-psf</property>
            <property>metrics/Sw-sqft</property>
            <property>aero/function/mach-dCD0</property>
          </product>
        </function>
        <function name="aero/coefficient/CD_induced_mach">
          <description>induced drag's change with Mach (leading-edge suction lost)</description>
          <product>
            <property>aero/qbar-psf</property>
            <property>metrics/Sw-sqft</property>
            <property>aero/cl-squared</property>
            <property>aero/function/mach-dK</property>
          </product>
        </function>
        <function name="aero/coefficient/CD_aileron">
          <description>CD increment from aileron (deg), over alpha</description>
          <product>
            <property>aero/qbar-psf</property>
            <property>metrics/Sw-sqft</property>
            <property>aero/function/mach-aileron</property>
          <table>
            <independentVar lookup="row">aero/alpha-deg</independentVar>
            <independentVar lookup="column">fcs/left-aileron-pos-deg</independentVar>
            <tableData>
                        -20.00    -15.00    -10.00     -5.00      0.00      5.00     10.00     15.00     20.00
             -180.00   0.00305   0.00175   0.00079   0.00020   0.00000   0.00020   0.00079   0.00175   0.00305
             -120.00   0.00300   0.00172   0.00077   0.00020   0.00000   0.00020   0.00077   0.00172   0.00300
              -70.00   0.00299   0.00172   0.00077   0.00019   0.00000   0.00019   0.00077   0.00172   0.00299
              -46.00   0.00718   0.00467   0.00240   0.00064   0.00000   0.00064   0.00240   0.00467   0.00718
              -32.00   0.01464   0.01007   0.00535   0.00149   0.00000   0.00149   0.00535   0.01007   0.01464
              -22.00   0.03469   0.02476   0.01407   0.00506   0.00000   0.00506   0.01407   0.02476   0.03469
              -17.00   0.00586   0.00362   0.00172   0.00043   0.00000   0.00043   0.00172   0.00362   0.00586
              -13.00   0.00704   0.00453   0.00228   0.00061   0.00000   0.00061   0.00228   0.00453   0.00704
               -9.00   0.00752   0.00486   0.00245   0.00066   0.00000   0.00066   0.00245   0.00486   0.00752
               -5.00   0.00775   0.00503   0.00254   0.00069   0.00000   0.00069   0.00254   0.00503   0.00775
               -1.00   0.00776   0.00503   0.00255   0.00069   0.00000   0.00069   0.00255   0.00503   0.00776
                3.00   0.00752   0.00487   0.00246   0.00067   0.00000   0.00067   0.00246   0.00487   0.00752
                7.00   0.00710   0.00458   0.00231   0.00062   0.00000   0.00062   0.00231   0.00458   0.00710
               11.00   0.00661   0.00423   0.00212   0.00057   0.00000   0.00057   0.00212   0.00423   0.00661
               15.00   0.01967   0.01070   0.00403   0.00082   0.00000   0.00082   0.00403   0.01070   0.01967
               19.00   0.08172   0.06349   0.03763   0.01133   0.00000   0.01133   0.03763   0.06349   0.08172
               23.00   0.06117   0.03881   0.02341   0.01422   0.00000   0.01422   0.02341   0.03881   0.06117
               27.00   0.02817   0.01937   0.01035   0.00289   0.00000   0.00289   0.01035   0.01937   0.02817
               32.00   0.01970   0.01361   0.00732   0.00205   0.00000   0.00205   0.00732   0.01361   0.01970
               46.00   0.00824   0.00539   0.00284   0.00077   0.00000   0.00077   0.00284   0.00539   0.00824
               70.00   0.00299   0.00172   0.00077   0.00019   0.00000   0.00019   0.00077   0.00172   0.00299
              120.00   0.00300   0.00172   0.00077   0.00020   0.00000   0.00020   0.00077   0.00172   0.00300
              180.00   0.00305   0.00175   0.00079   0.00020   0.00000   0.00020   0.00079   0.00175   0.00305
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            </tableData>
          </table>
          </product>
        </function>
        <function name="aero/coefficient/CD_elevator">
          <description>CD increment from elevator (deg), over alpha</description>
          <product>
            <property>aero/qbar-psf</property>
            <property>metrics/Sw-sqft</property>
            <property>aero/function/mach-elevator</property>
          <table>
            <independentVar lookup="row">aero/alpha-deg</independentVar>
            <independentVar lookup="column">fcs/elevator-pos-deg</independentVar>
            <tableData>
                        -30.00    -25.00    -20.00    -15.00    -10.00     -5.00      0.00      5.00     10.00     15.00     20.00
             -180.00   0.00689   0.00492   0.00323   0.00185   0.00083   0.00021   0.00000   0.00021   0.00083   0.00185   0.00323
             -120.00   0.00678   0.00484   0.00317   0.00182   0.00082   0.00021   0.00000   0.00021   0.00082   0.00182   0.00317
              -70.00   0.00676   0.00483   0.00316   0.00181   0.00082   0.00021   0.00000   0.00021   0.00082   0.00181   0.00316
              -46.00  -0.00370  -0.00419  -0.00442  -0.00428  -0.00363  -0.00227   0.00000   0.00321   0.00718   0.01156   0.01613
              -32.00  -0.00600  -0.00581  -0.00540  -0.00478  -0.00392  -0.00252   0.00000   0.00412   0.00979   0.01639   0.02342
              -22.00   0.01662   0.01414   0.01194   0.00978   0.00700   0.00337   0.00000  -0.00163  -0.00064   0.00287   0.00789
              -17.00   0.03168   0.02821   0.02445   0.01992   0.01411   0.00716   0.00000  -0.00623  -0.01073  -0.01307  -0.01364
              -13.00   0.03128   0.02745   0.02350   0.01894   0.01324   0.00656   0.00000  -0.00541  -0.00903  -0.01064  -0.01069
               -9.00   0.02869   0.02493   0.02111   0.01677   0.01149   0.00553   0.00000  -0.00423  -0.00671  -0.00743  -0.00686
               -5.00   0.02483   0.02122   0.01762   0.01367   0.00907   0.00419   0.00000  -0.00278  -0.00392  -0.00362  -0.00237
               -1.00   0.01991   0.01654   0.01328   0.00987   0.00618   0.00261   0.00000  -0.00114  -0.00079   0.00060   0.00256
                3.00   0.01418   0.01115   0.00833   0.00558   0.00294   0.00086   0.00000   0.00063   0.00252   0.00502   0.00769
                7.00   0.00867   0.00596   0.00354   0.00143  -0.00018  -0.00081   0.00000   0.00227   0.00555   0.00900   0.01223
               11.00   0.00387   0.00150  -0.00050  -0.00201  -0.00271  -0.00214   0.00000   0.00353   0.00784   0.01198   0.01560
               15.00  -0.00089  -0.00285  -0.00440  -0.00528  -0.00509  -0.00336   0.00000   0.00465   0.00983   0.01454   0.01849
               19.00  -0.00751  -0.00908  -0.01008  -0.01012  -0.00866  -0.00522   0.00000   0.00640   0.01301   0.01873   0.02334
               23.00  -0.01319  -0.01439  -0.01489  -0.01416  -0.01154  -0.00667   0.00000   0.00769   0.01537   0.02202   0.02757
               27.00   0.02050   0.01378   0.00203  -0.00951  -0.01143  -0.00713   0.00000   0.00813   0.01608   0.02301   0.02882
               32.00   0.02768   0.02110   0.01485   0.00887   0.00353   0.00006   0.00000   0.00418   0.01201   0.02254   0.03208
               46.00   0.02219   0.01724   0.01267   0.00843   0.00464   0.00169   0.00000  -0.00036   0.00029   0.00144   0.00276
               70.00   0.00676   0.00483   0.00316   0.00181   0.00082   0.00021   0.00000   0.00021   0.00082   0.00181   0.00316
              120.00   0.00678   0.00484   0.00317   0.00182   0.00082   0.00021   0.00000   0.00021   0.00082   0.00182   0.00317
              180.00   0.00689   0.00492   0.00323   0.00185   0.00083   0.00021   0.00000   0.00021   0.00083   0.00185   0.00323
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            </tableData>
          </table>
          </product>
        </function>
        <function name="aero/coefficient/CD_flap">
          <description>CD increment from flap (deg), over alpha</description>
          <product>
            <property>aero/qbar-psf</property>
            <property>metrics/Sw-sqft</property>
            <property>aero/function/mach-flap</property>
          <table>
            <independentVar lookup="row">aero/alpha-deg</independentVar>
            <independentVar lookup="column">fcs/flap-pos-deg</independentVar>
            <tableData>
                          0.00      5.00     10.00     15.00     20.00     25.00     30.00     35.00     40.00     45.00     50.00
             -180.00   0.00000   0.00032   0.00126   0.00281   0.00490   0.00749   0.01048   0.01379   0.01732   0.02096   0.02460
             -120.00   0.00000   0.00031   0.00124   0.00276   0.00482   0.00736   0.01031   0.01356   0.01703   0.02061   0.02419
              -70.00   0.00000   0.00031   0.00124   0.00275   0.00481   0.00734   0.01027   0.01352   0.01698   0.02055   0.02412
              -46.00   0.00000   0.01249   0.02777   0.04530   0.06430   0.08421   0.10484   0.12631   0.14824   0.16832   0.18904
              -32.00   0.00000   0.02152   0.04992   0.08351   0.11976   0.15670   0.19353   0.22919   0.26425   0.29515   0.32405
              -22.00   0.00000  -0.01819  -0.03064  -0.04281  -0.05242  -0.05819  -0.06032  -0.05967  -0.05678  -0.05226  -0.04670
              -17.00   0.00000  -0.00896  -0.01505  -0.01822  -0.01874  -0.01709  -0.01376  -0.00893  -0.00170   0.00654   0.01530
              -13.00   0.00000  -0.00602  -0.00933  -0.00979  -0.00770  -0.00358   0.00213   0.00917   0.01743   0.02617   0.03574
               -9.00   0.00000  -0.00329  -0.00376  -0.00148   0.00310   0.00942   0.01708   0.02590   0.03586   0.04597   0.05688
               -5.00   0.00000  -0.00046   0.00191   0.00685   0.01376   0.02207   0.03144   0.04177   0.05311   0.06430   0.07622
               -1.00   0.00000   0.00238   0.00750   0.01493   0.02394   0.03397   0.04474   0.05626   0.06865   0.08058   0.09313
                3.00   0.00000   0.00524   0.01305   0.02283   0.03376   0.04529   0.05724   0.06970   0.08283   0.09518   0.10796
                7.00   0.00000   0.00898   0.02043   0.03350   0.04726   0.06108   0.07480   0.08834   0.10181   0.11428   0.12798
               11.00   0.00000   0.01193   0.02608   0.04123   0.05596   0.07027   0.08585   0.10496   0.12924   0.15420   0.18188
               15.00   0.00000   0.01316   0.02803   0.04649   0.07307   0.10630   0.14107   0.17467   0.20660   0.23213   0.25666
               19.00   0.00000   0.01960   0.05841   0.10344   0.14328   0.17666   0.20655   0.23485   0.26277   0.28594   0.30923
               23.00   0.00000   0.00172   0.03847   0.08115   0.12453   0.16802   0.20851   0.24594   0.28053   0.30689   0.33135
               27.00   0.00000  -0.00854  -0.00361   0.01408   0.04417   0.09620   0.15600   0.19736   0.22827   0.25764   0.28867
               32.00   0.00000  -0.01630  -0.02325  -0.02193  -0.01468  -0.00364   0.01006   0.02628   0.04538   0.06840   0.10563
               46.00   0.00000  -0.01048  -0.01775  -0.02204  -0.02395  -0.02414  -0.02310  -0.02111  -0.01830  -0.01537  -0.01202
               70.00   0.00000   0.00031   0.00124   0.00275   0.00481   0.00734   0.01027   0.01352   0.01698   0.02055   0.02412
              120.00   0.00000   0.00031   0.00124   0.00276   0.00482   0.00736   0.01031   0.01356   0.01703   0.02061   0.02419
              180.00   0.00000   0.00032   0.00126   0.00281   0.00490   0.00749   0.01048   0.01379   0.01732   0.02096   0.02460
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            </tableData>
          </table>
          </product>
        </function>
        <function name="aero/coefficient/CD_rudder">
          <description>CD increment from rudder (deg), over alpha</description>
          <product>
            <property>aero/qbar-psf</property>
            <property>metrics/Sw-sqft</property>
            <property>aero/function/mach-rudder</property>
          <table>
            <independentVar lookup="row">aero/alpha-deg</independentVar>
            <independentVar lookup="column">fcs/rudder-pos-deg</independentVar>
            <tableData>
                        -25.00    -20.00    -15.00    -10.00     -5.00      0.00      5.00     10.00     15.00     20.00     25.00
             -180.00   0.00544   0.00357   0.00204   0.00092   0.00023   0.00000   0.00023   0.00092   0.00204   0.00357   0.00544
             -120.00   0.00068   0.00045   0.00026   0.00011   0.00003   0.00000   0.00003   0.00011   0.00026   0.00045   0.00068
              -70.00   0.00023   0.00015   0.00009   0.00004   0.00001   0.00000   0.00001   0.00004   0.00009   0.00015   0.00023
              -46.00   0.00967   0.00757   0.00528   0.00282   0.00078   0.00000   0.00078   0.00282   0.00528   0.00757   0.00967
              -32.00   0.01149   0.00876   0.00597   0.00314   0.00087   0.00000   0.00087   0.00314   0.00597   0.00876   0.01149
              -22.00   0.01600   0.01259   0.00907   0.00545   0.00247   0.00000   0.00247   0.00545   0.00907   0.01259   0.01600
              -17.00   0.01347   0.01014   0.00683   0.00356   0.00098   0.00000   0.00098   0.00356   0.00683   0.01014   0.01347
              -13.00   0.01387   0.01041   0.00698   0.00363   0.00100   0.00000   0.00100   0.00363   0.00698   0.01041   0.01387
               -9.00   0.01406   0.01053   0.00704   0.00365   0.00100   0.00000   0.00100   0.00365   0.00704   0.01053   0.01406
               -5.00   0.01407   0.01052   0.00703   0.00364   0.00100   0.00000   0.00100   0.00364   0.00703   0.01052   0.01407
               -1.00   0.01392   0.01039   0.00692   0.00358   0.00098   0.00000   0.00098   0.00358   0.00692   0.01039   0.01392
                3.00   0.01359   0.01013   0.00674   0.00348   0.00095   0.00000   0.00095   0.00348   0.00674   0.01013   0.01359
                7.00   0.01311   0.00976   0.00649   0.00335   0.00092   0.00000   0.00092   0.00335   0.00649   0.00976   0.01311
               11.00   0.01249   0.00928   0.00616   0.00318   0.00087   0.00000   0.00087   0.00318   0.00616   0.00928   0.01249
               15.00   0.01174   0.00872   0.00578   0.00298   0.00081   0.00000   0.00081   0.00298   0.00578   0.00872   0.01174
               19.00   0.01090   0.00809   0.00536   0.00276   0.00075   0.00000   0.00075   0.00276   0.00536   0.00809   0.01090
               23.00   0.01005   0.00746   0.00494   0.00254   0.00070   0.00000   0.00070   0.00254   0.00494   0.00746   0.01005
               27.00   0.00899   0.00666   0.00440   0.00226   0.00062   0.00000   0.00062   0.00226   0.00440   0.00666   0.00899
               32.00   0.00776   0.00576   0.00381   0.00196   0.00054   0.00000   0.00054   0.00196   0.00381   0.00576   0.00776
               46.00   0.00870   0.00674   0.00465   0.00246   0.00069   0.00000   0.00069   0.00246   0.00465   0.00674   0.00870
               70.00   0.00023   0.00015   0.00009   0.00004   0.00001   0.00000   0.00001   0.00004   0.00009   0.00015   0.00023
              120.00   0.00068   0.00045   0.00026   0.00011   0.00003   0.00000   0.00003   0.00011   0.00026   0.00045   0.00068
              180.00   0.00544   0.00357   0.00204   0.00092   0.00023   0.00000   0.00023   0.00092   0.00204   0.00357   0.00544
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            </tableData>
          </table>
          </product>
        </function>
        <function name="aero/coefficient/CD_ground">
          <description>Induced drag change in ground effect</description>
          <product>
            <property>aero/qbar-psf</property>
            <property>metrics/Sw-sqft</property>
            <property>aero/cl-squared</property>
            <value>0.05361</value>
          <table>
            <independentVar lookup="row">aero/h_b-mac-ft</independentVar>
            <tableData>
                    0.00   -1.00000
                    0.10   -0.28090
                    0.15   -0.14793
                    0.20   -0.08897
                    0.30   -0.04160
                    0.40   -0.02383
                    0.50   -0.01538
                    0.60   -0.01073
                    0.70   -0.00791
                    0.80   -0.00607
                    0.90   -0.00480
                    1.00   -0.00389
                    1.10   -0.00322
            </tableData>
          </table>
          </product>
        </function>
        <function name="aero/coefficient/CD_spoilers">
          <description>spoilers: drag of its spoiler panels, 13.7 m2 opened to 60 deg (hangar)</description>
          <product>
            <property>aero/qbar-psf</property>
            <property>metrics/Sw-sqft</property>
            <value>0.072062</value>
            <pow>
              <sin>
                <product>
                  <property>fcs/speedbrake-pos-norm</property>
                  <value>1.0472</value>
                </product>
              </sin>
              <value>2</value>
            </pow>
          </product>
        </function>
        <function name="aero/coefficient/CD_gear">
          <description>the gear extended: its wheels' and struts' drag by Raymer's components, 1.31 m2 (hangar)</description>
          <product>
            <property>aero/qbar-psf</property>
            <property>metrics/Sw-sqft</property>
            <value>0.0057622</value>
            <property>gear/gear-pos-norm</property>
          </product>
        </function>
      </axis>
      <axis name="SIDE">
        <function name="aero/coefficient/CY_base">
          <description>CY over alpha and beta (hangar)</description>
          <product>
            <property>aero/qbar-psf</property>
            <property>metrics/Sw-sqft</property>
            <property>aero/function/mach-side</property>
          <table>
            <independentVar lookup="row">aero/alpha-deg</independentVar>
            <independentVar lookup="column">aero/beta-deg</independentVar>
            <tableData>
                        -90.00    -70.00    -50.00    -40.00    -30.00    -25.00    -20.00    -15.00    -10.00     -6.00     -3.00      0.00      3.00      6.00     10.00     15.00     20.00     25.00     30.00     40.00     50.00     70.00     90.00
             -180.00  -0.00000   0.18557   0.27328   0.25107   0.19087   0.15426   0.11681   0.08081   0.07551   0.07619   0.03973  -0.00000  -0.03973  -0.07619  -0.07551  -0.08081  -0.11681  -0.15426  -0.19087  -0.25107  -0.27328  -0.18557   0.00000
             -120.00  -0.00000  -0.04659  -0.22515  -0.29406  -0.30982  -0.29286  -0.25906  -0.20980  -0.14765  -0.08866  -0.03351  -0.00000   0.03351   0.08866   0.14765   0.20980   0.25906   0.29286   0.30982   0.29406   0.22515   0.04659   0.00000
              -70.00   0.00000  -0.08824  -0.31438  -0.39415  -0.40567  -0.38031  -0.33394  -0.26807  -0.18527  -0.10809  -0.04668  -0.00000   0.04668   0.10809   0.18527   0.26807   0.33394   0.38031   0.40567   0.39415   0.31438   0.08824  -0.00000
              -46.00   0.00000   0.02512  -0.06707  -0.11485  -0.13302  -0.12591  -0.10643  -0.07202  -0.02226  -0.01529  -0.00782  -0.00000   0.00782   0.01529   0.02226   0.07202   0.10643   0.12591   0.13302   0.11485   0.06707  -0.02512  -0.00000
              -32.00   0.00000   0.09486   0.08495   0.05156   0.01503   0.00897   0.04487   0.03015   0.01731   0.00956   0.00463  -0.00000  -0.00463  -0.00956  -0.01731  -0.03015  -0.04487  -0.00897  -0.01503  -0.05156  -0.08495  -0.09486  -0.00000
              -22.00   0.00000   0.15486   0.16971   0.13909   0.08983   0.09626   0.08618   0.05904   0.03725   0.02174   0.01097  -0.00000  -0.01097  -0.02174  -0.03725  -0.05904  -0.08618  -0.09626  -0.08983  -0.13909  -0.16971  -0.15486  -0.00000
              -17.00   0.00000   0.18419   0.21399   0.18226   0.13146   0.14826   0.11800   0.08479   0.05393   0.03132   0.01541  -0.00000  -0.01541  -0.03132  -0.05393  -0.08479  -0.11800  -0.14826  -0.13146  -0.18226  -0.21399  -0.18419  -0.00000
              -13.00   0.00000   0.20616   0.25233   0.21272   0.16561   0.17801   0.14370   0.10471   0.06725   0.03922   0.01931  -0.00000  -0.01931  -0.03922  -0.06725  -0.10471  -0.14370  -0.17801  -0.16561  -0.21272  -0.25233  -0.20616  -0.00000
               -9.00   0.00000   0.22638   0.28585   0.23332   0.19440   0.20223   0.16354   0.11963   0.07689   0.04473   0.02197  -0.00000  -0.02197  -0.04473  -0.07689  -0.11963  -0.16354  -0.20223  -0.19440  -0.23332  -0.28585  -0.22638  -0.00000
               -5.00   0.00000   0.23326   0.30164   0.24912   0.21672   0.21951   0.17748   0.13000   0.08336   0.04816   0.02347  -0.00000  -0.02347  -0.04816  -0.08336  -0.13000  -0.17748  -0.21951  -0.21672  -0.24912  -0.30164  -0.23326  -0.00000
               -1.00   0.00000   0.23125   0.30322   0.25464   0.23290   0.23001   0.18586   0.13631   0.08729   0.05011   0.02410  -0.00000  -0.02410  -0.05011  -0.08729  -0.13631  -0.18586  -0.23001  -0.23290  -0.25464  -0.30322  -0.23125  -0.00000
                3.00   0.00000   0.23350   0.30357   0.25523   0.24247   0.23440   0.18950   0.13942   0.08968   0.05179   0.02512  -0.00000  -0.02512  -0.05179  -0.08968  -0.13942  -0.18950  -0.23440  -0.24247  -0.25523  -0.30357  -0.23350  -0.00000
                7.00   0.00000   0.22421   0.29343   0.25425   0.24839   0.23634   0.19192   0.14235   0.09281   0.05454   0.02692  -0.00000  -0.02692  -0.05454  -0.09281  -0.14235  -0.19192  -0.23634  -0.24839  -0.25425  -0.29343  -0.22421  -0.00000
               11.00   0.00000   0.20867   0.25703   0.24423   0.24845   0.23591   0.19315   0.14448   0.09528   0.05659   0.02813  -0.00000  -0.02813  -0.05659  -0.09528  -0.14448  -0.19315  -0.23591  -0.24845  -0.24423  -0.25703  -0.20867  -0.00000
               15.00   0.00000   0.18845   0.22257   0.20642   0.22084   0.22646   0.18762   0.14081   0.09325   0.05558   0.02770  -0.00000  -0.02770  -0.05558  -0.09325  -0.14081  -0.18762  -0.22646  -0.22084  -0.20642  -0.22257  -0.18845  -0.00000
               19.00   0.00000   0.16603   0.18070   0.15894   0.16341   0.15406   0.14031   0.12232   0.08086   0.04816   0.02403  -0.00000  -0.02403  -0.04816  -0.08086  -0.12232  -0.14031  -0.15406  -0.16341  -0.15894  -0.18070  -0.16603  -0.00000
               23.00   0.00000   0.14242   0.14862   0.11876   0.12971   0.11947   0.09850   0.07683   0.04964   0.02506   0.00752  -0.00000  -0.00752  -0.02506  -0.04964  -0.07683  -0.09850  -0.11947  -0.12971  -0.11876  -0.14862  -0.14242  -0.00000
               27.00   0.00000   0.11793   0.12596   0.09659   0.09135   0.11552   0.09910   0.07365   0.04773   0.02802   0.01363  -0.00000  -0.01363  -0.02802  -0.04773  -0.07365  -0.09910  -0.11552  -0.09135  -0.09659  -0.12596  -0.11793  -0.00000
               32.00   0.00000   0.08930   0.08456   0.05220   0.04347   0.05351   0.06749   0.04432   0.02590   0.01437   0.00676  -0.00000  -0.00676  -0.01437  -0.02590  -0.04432  -0.06749  -0.05351  -0.04347  -0.05220  -0.08456  -0.08930  -0.00000
               46.00   0.00000   0.02509  -0.06674  -0.11450  -0.13239  -0.12462  -0.10399  -0.05678  -0.03084  -0.02039  -0.01010  -0.00000   0.01010   0.02039   0.03084   0.05678   0.10399   0.12462   0.13239   0.11450   0.06674  -0.02509  -0.00000
               70.00   0.00000  -0.08814  -0.31408  -0.39380  -0.40532  -0.37998  -0.33366  -0.26785  -0.18512  -0.10799  -0.04663  -0.00000   0.04663   0.10799   0.18512   0.26785   0.33366   0.37998   0.40532   0.39380   0.31408   0.08814  -0.00000
              120.00  -0.00000  -0.04674  -0.22556  -0.29454  -0.31030  -0.29330  -0.25945  -0.21011  -0.14787  -0.08879  -0.03358  -0.00000   0.03358   0.08879   0.14787   0.21011   0.25945   0.29330   0.31030   0.29454   0.22556   0.04674   0.00000
              180.00  -0.00000   0.18557   0.27328   0.25107   0.19087   0.15426   0.11681   0.08081   0.07551   0.07619   0.03973  -0.00000  -0.03973  -0.07619  -0.07551  -0.08081  -0.11681  -0.15426  -0.19087  -0.25107  -0.27328  -0.18557   0.00000
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            </tableData>
          </table>
          </product>
        </function>
        <function name="aero/coefficient/CY_aileron">
          <description>CY increment from aileron (deg), over alpha</description>
          <product>
            <property>aero/qbar-psf</property>
            <property>metrics/Sw-sqft</property>
            <property>aero/function/mach-aileron</property>
          <table>
            <independentVar lookup="row">aero/alpha-deg</independentVar>
            <independentVar lookup="column">fcs/left-aileron-pos-deg</independentVar>
            <tableData>
                        -20.00    -15.00    -10.00     -5.00      0.00      5.00     10.00     15.00     20.00
             -180.00   0.00000   0.00000   0.00000   0.00000   0.00000   0.00000   0.00000   0.00000   0.00000
             -120.00   0.00175   0.00148   0.00110   0.00058   0.00000  -0.00058  -0.00110  -0.00148  -0.00175
              -70.00  -0.00054  -0.00046  -0.00034  -0.00018   0.00000   0.00018   0.00034   0.00046   0.00054
              -46.00  -0.00163  -0.00154  -0.00122  -0.00068   0.00000   0.00068   0.00122   0.00154   0.00163
              -32.00  -0.00454  -0.00410  -0.00320  -0.00176   0.00000   0.00176   0.00320   0.00410   0.00454
              -22.00  -0.00854  -0.00717  -0.00517  -0.00246   0.00000   0.00246   0.00517   0.00717   0.00854
              -17.00  -0.00994  -0.00851  -0.00635  -0.00340   0.00000   0.00340   0.00635   0.00851   0.00994
              -13.00  -0.01046  -0.00894  -0.00665  -0.00355   0.00000   0.00355   0.00665   0.00894   0.01046
               -9.00  -0.01047  -0.00895  -0.00666  -0.00355   0.00000   0.00355   0.00666   0.00895   0.01047
               -5.00  -0.01043  -0.00892  -0.00664  -0.00354   0.00000   0.00354   0.00664   0.00892   0.01043
               -1.00  -0.01039  -0.00888  -0.00661  -0.00352   0.00000   0.00352   0.00661   0.00888   0.01039
                3.00  -0.01032  -0.00881  -0.00654  -0.00349   0.00000   0.00349   0.00654   0.00881   0.01032
                7.00  -0.01039  -0.00885  -0.00657  -0.00350   0.00000   0.00350   0.00657   0.00885   0.01039
               11.00  -0.01093  -0.00933  -0.00694  -0.00370   0.00000   0.00370   0.00694   0.00933   0.01093
               15.00  -0.01248  -0.01060  -0.00783  -0.00415   0.00000   0.00415   0.00783   0.01060   0.01248
               19.00  -0.01828  -0.01597  -0.01221  -0.00672   0.00000   0.00672   0.01221   0.01597   0.01828
               23.00  -0.05374  -0.04484  -0.03516  -0.02433   0.00000   0.02433   0.03516   0.04484   0.05374
               27.00  -0.03690  -0.03062  -0.02262  -0.01207   0.00000   0.01207   0.02262   0.03062   0.03690
               32.00  -0.02541  -0.02167  -0.01621  -0.00874   0.00000   0.00874   0.01621   0.02167   0.02541
               46.00  -0.00441  -0.00386  -0.00291  -0.00157   0.00000   0.00157   0.00291   0.00386   0.00441
               70.00  -0.00062  -0.00052  -0.00039  -0.00021   0.00000   0.00021   0.00039   0.00052   0.00062
              120.00   0.00176   0.00150   0.00111   0.00059   0.00000  -0.00059  -0.00111  -0.00150  -0.00176
              180.00   0.00000   0.00000   0.00000   0.00000   0.00000   0.00000   0.00000   0.00000   0.00000
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            </tableData>
          </table>
          </product>
        </function>
        <function name="aero/coefficient/CY_rudder">
          <description>CY increment from rudder (deg), over alpha</description>
          <product>
            <property>aero/qbar-psf</property>
            <property>metrics/Sw-sqft</property>
            <property>aero/function/mach-rudder</property>
          <table>
            <independentVar lookup="row">aero/alpha-deg</independentVar>
            <independentVar lookup="column">fcs/rudder-pos-deg</independentVar>
            <tableData>
                        -25.00    -20.00    -15.00    -10.00     -5.00      0.00      5.00     10.00     15.00     20.00     25.00
             -180.00   0.00000   0.00000   0.00000   0.00000   0.00000   0.00000   0.00000   0.00000   0.00000   0.00000   0.00000
             -120.00   0.00000   0.00000   0.00000   0.00000   0.00000   0.00000   0.00000   0.00000   0.00000   0.00000   0.00000
              -70.00  -0.01797  -0.01621  -0.01378  -0.01021  -0.00543   0.00000   0.00543   0.01021   0.01378   0.01620   0.01795
              -46.00  -0.05727  -0.05170  -0.04398  -0.03239  -0.01716   0.00000   0.01716   0.03239   0.04398   0.05170   0.05726
              -32.00  -0.05502  -0.04971  -0.04231  -0.03141  -0.01672   0.00000   0.01672   0.03141   0.04231   0.04971   0.05502
              -22.00  -0.06410  -0.05785  -0.04913  -0.03647  -0.01924   0.00000   0.01924   0.03647   0.04913   0.05785   0.06410
              -17.00  -0.06843  -0.06185  -0.05265  -0.03907  -0.02079   0.00000   0.02079   0.03907   0.05265   0.06185   0.06843
              -13.00  -0.07076  -0.06395  -0.05443  -0.04038  -0.02149   0.00000   0.02149   0.04038   0.05443   0.06395   0.07076
               -9.00  -0.07236  -0.06538  -0.05565  -0.04129  -0.02197   0.00000   0.02197   0.04129   0.05565   0.06538   0.07236
               -5.00  -0.07317  -0.06612  -0.05627  -0.04174  -0.02221   0.00000   0.02221   0.04174   0.05627   0.06612   0.07317
               -1.00  -0.07318  -0.06612  -0.05627  -0.04174  -0.02221   0.00000   0.02221   0.04174   0.05627   0.06612   0.07318
                3.00  -0.07245  -0.06547  -0.05572  -0.04134  -0.02200   0.00000   0.02200   0.04134   0.05572   0.06547   0.07245
                7.00  -0.07112  -0.06429  -0.05473  -0.04061  -0.02162   0.00000   0.02162   0.04061   0.05473   0.06429   0.07112
               11.00  -0.06898  -0.06237  -0.05311  -0.03942  -0.02098   0.00000   0.02098   0.03942   0.05311   0.06237   0.06898
               15.00  -0.06600  -0.05968  -0.05082  -0.03772  -0.02008   0.00000   0.02008   0.03772   0.05082   0.05968   0.06600
               19.00  -0.06244  -0.05647  -0.04810  -0.03571  -0.01901   0.00000   0.01901   0.03571   0.04810   0.05647   0.06244
               23.00  -0.05900  -0.05343  -0.04556  -0.03384  -0.01802   0.00000   0.01802   0.03384   0.04556   0.05343   0.05900
               27.00  -0.05374  -0.04865  -0.04147  -0.03080  -0.01640   0.00000   0.01640   0.03080   0.04147   0.04865   0.05374
               32.00  -0.04777  -0.04321  -0.03681  -0.02733  -0.01455   0.00000   0.01455   0.02733   0.03681   0.04321   0.04777
               46.00  -0.05356  -0.04847  -0.04110  -0.03007  -0.01594   0.00000   0.01594   0.03007   0.04110   0.04847   0.05356
               70.00  -0.01797  -0.01621  -0.01378  -0.01021  -0.00543   0.00000   0.00543   0.01021   0.01378   0.01620   0.01795
              120.00   0.00000   0.00000   0.00000   0.00000   0.00000   0.00000   0.00000   0.00000   0.00000   0.00000   0.00000
              180.00   0.00000   0.00000   0.00000   0.00000   0.00000   0.00000   0.00000   0.00000   0.00000   0.00000   0.00000
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            </tableData>
          </table>
          </product>
        </function>
        <function name="aero/coefficient/CYp">
          <description>CY per p (non-dimensional), over alpha</description>
          <product>
            <property>aero/qbar-psf</property>
            <property>metrics/Sw-sqft</property>
            <property>aero/bi2vel</property>
            <property>velocities/p-aero-rad_sec</property>
            <property>aero/function/mach-lift</property>
          <table>
            <independentVar lookup="row">aero/alpha-deg</independentVar>
            <tableData>
                 -180.00   -0.44700
                 -165.00   -0.22296
                 -105.00   -0.17437
                  -60.00   -0.23063
                  -42.00   -0.20209
                  -30.00   -0.15358
                  -20.00   -0.16647
                  -16.00   -0.22234
                  -12.00   -0.22681
                   -8.00   -0.22484
                   -4.00   -0.22158
                    0.00   -0.21646
                    4.00   -0.20610
                    8.00   -0.20213
                   12.00   -0.21455
                   16.00   -0.22654
                   20.00    0.01096
                   24.00    0.37053
                   28.00    0.08554
                   35.00   -0.04835
                   50.00   -0.20163
                   80.00   -0.17091
                  135.00   -0.22642
                  180.00   -0.44700
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            </tableData>
          </table>
          </product>
        </function>
        <function name="aero/coefficient/CYr">
          <description>CY per r (non-dimensional), over alpha</description>
          <product>
            <property>aero/qbar-psf</property>
            <property>metrics/Sw-sqft</property>
            <property>aero/bi2vel</property>
            <property>velocities/r-aero-rad_sec</property>
            <property>aero/function/mach-lift</property>
          <table>
            <independentVar lookup="row">aero/alpha-deg</independentVar>
            <tableData>
                 -180.00    0.63749
                 -165.00    0.61847
                 -105.00    0.17406
                  -60.00    0.34729
                  -42.00    0.31591
                  -30.00    0.26365
                  -20.00    0.25954
                  -16.00    0.29959
                  -12.00    0.32888
                   -8.00    0.35382
                   -4.00    0.37581
                    0.00    0.39265
                    4.00    0.40623
                    8.00    0.43327
                   12.00    0.44298
                   16.00    0.44755
                   20.00    0.52513
                   24.00    0.63093
                   28.00    0.50593
                   35.00    0.41383
                   50.00    0.44004
                   80.00    0.15223
                  135.00    0.41405
                  180.00    0.63749
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            </tableData>
          </table>
          </product>
        </function>
      </axis>
      <axis name="LIFT">
        <function name="aero/coefficient/CL_base">
          <description>CL over alpha and beta, ground effect, compressibility (hangar)</description>
          <product>
            <property>aero/qbar-psf</property>
            <property>metrics/Sw-sqft</property>
            <property>aero/function/CL-base</property>
            <property>aero/function/mach-lift</property>
          <table>
            <independentVar lookup="row">aero/h_b-mac-ft</independentVar>
            <tableData>
                    0.00    1.20000
                    0.10    1.08692
                    0.15    1.05730
                    0.20    1.03778
                    0.30    1.01642
                    0.40    1.00713
                    0.50    1.00310
                    0.60    1.00135
                    0.70    1.00059
                    0.80    1.00025
                    0.90    1.00011
                    1.00    1.00005
                    1.10    1.00000
            </tableData>
          </table>
          </product>
        </function>
        <function name="aero/coefficient/CL_elevator">
          <description>CL increment from elevator (deg), over alpha</description>
          <product>
            <property>aero/qbar-psf</property>
            <property>metrics/Sw-sqft</property>
            <property>aero/function/mach-elevator</property>
          <table>
            <independentVar lookup="row">aero/alpha-deg</independentVar>
            <independentVar lookup="column">fcs/elevator-pos-deg</independentVar>
            <tableData>
                        -30.00    -25.00    -20.00    -15.00    -10.00     -5.00      0.00      5.00     10.00     15.00     20.00
             -180.00  -0.00000  -0.00000  -0.00000  -0.00000   0.00000   0.00000   0.00000   0.00000   0.00000  -0.00000  -0.00000
             -120.00  -0.03214  -0.02965  -0.02673  -0.02271  -0.01683  -0.00895   0.00000   0.00895   0.01682   0.02269   0.02669
              -70.00  -0.00662  -0.00617  -0.00562  -0.00484  -0.00365  -0.00199   0.00000   0.00210   0.00404   0.00554   0.00660
              -46.00  -0.02859  -0.02722  -0.02533  -0.02222  -0.01699  -0.00929   0.00000   0.00959   0.01802   0.02394   0.02741
              -32.00  -0.03822  -0.03787  -0.03651  -0.03320  -0.02637  -0.01494   0.00000   0.01601   0.03011   0.03972   0.04489
              -22.00  -0.05498  -0.05237  -0.04919  -0.04456  -0.03594  -0.02078   0.00000   0.02335   0.04610   0.06518   0.07890
              -17.00  -0.07851  -0.07507  -0.07003  -0.06173  -0.04758  -0.02626   0.00000   0.02745   0.05209   0.07038   0.08248
              -13.00  -0.09578  -0.09001  -0.08264  -0.07158  -0.05404  -0.02918   0.00000   0.02973   0.05608   0.07550   0.08829
               -9.00  -0.10249  -0.09616  -0.08819  -0.07615  -0.05721  -0.03074   0.00000   0.03112   0.05857   0.07874   0.09196
               -5.00  -0.10710  -0.10030  -0.09182  -0.07912  -0.05931  -0.03180   0.00000   0.03206   0.06023   0.08085   0.09431
               -1.00  -0.11007  -0.10294  -0.09410  -0.08097  -0.06060  -0.03243   0.00000   0.03257   0.06108   0.08188   0.09540
                3.00  -0.11171  -0.10435  -0.09527  -0.08187  -0.06119  -0.03269   0.00000   0.03271   0.06126   0.08199   0.09541
                7.00  -0.11230  -0.10481  -0.09562  -0.08210  -0.06128  -0.03269   0.00000   0.03259   0.06093   0.08142   0.09461
               11.00  -0.11115  -0.10365  -0.09448  -0.08103  -0.06041  -0.03217   0.00000   0.03196   0.05964   0.07957   0.09232
               15.00  -0.10773  -0.10034  -0.09134  -0.07828  -0.05833  -0.03103   0.00000   0.03071   0.05719   0.07618   0.08827
               19.00  -0.09849  -0.09278  -0.08487  -0.07256  -0.05387  -0.02855   0.00000   0.02808   0.05221   0.06959   0.08083
               23.00  -0.10650  -0.09749  -0.08706  -0.07313  -0.05348  -0.02803   0.00000   0.02726   0.05076   0.06818   0.08032
               27.00  -0.17027  -0.15592  -0.13019  -0.09613  -0.06322  -0.03060   0.00000   0.02698   0.04844   0.06356   0.07425
               32.00  -0.10169  -0.09738  -0.09094  -0.07988  -0.06109  -0.03353   0.00000   0.03602   0.07057   0.10395   0.12733
               46.00  -0.05991  -0.05666  -0.05225  -0.04519  -0.03382  -0.01799   0.00000   0.01763   0.03262   0.04330   0.05021
               70.00  -0.02082  -0.01909  -0.01709  -0.01437  -0.01049  -0.00547   0.00000   0.00522   0.00963   0.01279   0.01489
              120.00  -0.01975  -0.01824  -0.01645  -0.01399  -0.01037  -0.00552   0.00000   0.00552   0.01038   0.01401   0.01650
              180.00   0.00000   0.00000   0.00000   0.00000   0.00000   0.00000   0.00000   0.00000   0.00000   0.00000   0.00000
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            </tableData>
          </table>
          </product>
        </function>
        <function name="aero/coefficient/CL_flap">
          <description>CL increment from flap (deg), over alpha</description>
          <product>
            <property>aero/qbar-psf</property>
            <property>metrics/Sw-sqft</property>
            <property>aero/function/mach-flap</property>
          <table>
            <independentVar lookup="row">aero/alpha-deg</independentVar>
            <independentVar lookup="column">fcs/flap-pos-deg</independentVar>
            <tableData>
                          0.00      5.00     10.00     15.00     20.00     25.00     30.00     35.00     40.00     45.00     50.00
             -180.00   0.00000   0.00000   0.00000  -0.00000  -0.00000  -0.00000  -0.00000  -0.00000  -0.00000  -0.00000  -0.00000
             -120.00   0.00000   0.02100   0.04182   0.06136   0.07885   0.09424   0.10802   0.12084   0.13330   0.14379   0.15428
              -70.00   0.00000   0.01116   0.02277   0.03418   0.04484   0.05457   0.06359   0.07225   0.08093   0.08845   0.09617
              -46.00   0.00000   0.03500   0.07042   0.10371   0.13291   0.15756   0.17843   0.19674   0.21392   0.22689   0.23908
              -32.00   0.00000   0.05580   0.11137   0.16201   0.20447   0.23815   0.26448   0.28645   0.30545   0.31711   0.32767
              -22.00   0.00000   0.05057   0.11290   0.18585   0.25838   0.32679   0.39113   0.45341   0.51586   0.56879   0.62243
              -17.00   0.00000   0.10132   0.20549   0.30531   0.39628   0.47814   0.55438   0.63224   0.72007   0.78833   0.85216
              -13.00   0.00000   0.10766   0.21515   0.31636   0.40701   0.48662   0.55772   0.62388   0.68827   0.74205   0.79608
               -9.00   0.00000   0.10963   0.21878   0.32126   0.41281   0.49299   0.56439   0.63063   0.69488   0.74830   0.80171
               -5.00   0.00000   0.11062   0.22048   0.32341   0.41514   0.49532   0.56657   0.63255   0.69643   0.74943   0.80234
               -1.00   0.00000   0.11082   0.22066   0.32335   0.41472   0.49445   0.56522   0.63067   0.69396   0.74641   0.79872
                3.00   0.00000   0.11215   0.22325   0.32708   0.41942   0.49997   0.57145   0.63751   0.70134   0.75420   0.80681
                7.00   0.00000   0.11644   0.23185   0.33979   0.43585   0.51966   0.59387   0.66194   0.72648   0.77819   0.82706
               11.00   0.00000   0.11364   0.22598   0.33036   0.42125   0.49624   0.55700   0.60742   0.65121   0.68436   0.71549
               15.00   0.00000   0.09951   0.18950   0.26138   0.31560   0.35802   0.39377   0.42635   0.45810   0.48388   0.50949
               19.00   0.00000   0.07361   0.13810   0.19524   0.24503   0.28702   0.32186   0.35159   0.37813   0.39740   0.41528
               23.00   0.00000   0.14826   0.32505   0.44514   0.52000   0.57465   0.61596   0.64971   0.67828   0.69876   0.71674
               27.00   0.00000   0.08921   0.18038   0.26900   0.35620   0.45429   0.54519   0.60853   0.65347   0.68665   0.71636
               32.00   0.00000   0.07460   0.15005   0.22117   0.28457   0.34007   0.39040   0.43914   0.49245   0.55069   0.60801
               46.00   0.00000   0.04084   0.08085   0.11747   0.14918   0.17599   0.19899   0.21945   0.23837   0.25326   0.26732
               70.00   0.00000   0.01030   0.02009   0.02889   0.03646   0.04288   0.04844   0.05345   0.05817   0.06203   0.06579
              120.00   0.00000   0.02364   0.04709   0.06910   0.08882   0.10617   0.12172   0.13620   0.15026   0.16212   0.17398
              180.00   0.00000   0.00000   0.00000   0.00000   0.00000   0.00000  -0.00000  -0.00000  -0.00000  -0.00000  -0.00000
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            </tableData>
          </table>
          <table>
            <independentVar lookup="row">aero/h_b-mac-ft</independentVar>
            <tableData>
                    0.00    1.20000
                    0.10    1.08692
                    0.20    1.03778
                    0.40    1.00713
                    0.60    1.00135
                    0.80    1.00025
                    1.00    1.00005
                    1.10    1.00000
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            </tableData>
          </table>
          </product>
        </function>
        <function name="aero/coefficient/CLq">
          <description>CL per q (non-dimensional), over alpha</description>
          <product>
            <property>aero/qbar-psf</property>
            <property>metrics/Sw-sqft</property>
            <property>aero/ci2vel</property>
            <property>velocities/q-aero-rad_sec</property>
            <property>aero/function/mach-lift</property>
          <table>
            <independentVar lookup="row">aero/alpha-deg</independentVar>
            <tableData>
                 -180.00   -2.67822
                 -165.00   -0.98986
                  -32.00    1.14108
                  -10.00    7.62611
                    5.00    9.91995
                   20.00    1.86309
                   46.00    1.66444
                  180.00   -2.67822
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            </tableData>
          </table>
          </product>
        </function>
        <function name="aero/coefficient/CLadot">
          <description>CL per alpha-dot (downwash lag at the tail)</description>
          <product>
            <property>aero/qbar-psf</property>
            <property>metrics/Sw-sqft</property>
            <property>aero/ci2vel</property>
            <property>aero/alphadot-rad_sec</property>
            <value>0.97523</value>
            <property>aero/function/mach-lift</property>
          </product>
        </function>
        <function name="aero/coefficient/CL_spoilers">
          <description>spoilers: the lift lost behind them, 137 m2 of wing, over alpha (hangar)</description>
          <product>
            <property>aero/qbar-psf</property>
            <property>metrics/Sw-sqft</property>
            <table>
              <independentVar lookup="row">aero/alpha-deg</independentVar>
              <tableData>
                   -180.00    0.00214
                   -165.00   -0.17107
                    -32.00    0.46593
                    -10.00    0.29786
                      5.00   -0.21581
                     20.00   -0.60929
                     46.00   -0.43988
                    180.00    0.00214
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              </tableData>
            </table>
            <min>
              <value>1</value>
              <product>
                <property>fcs/speedbrake-pos-norm</property>
                <value>1.33333</value>
              </product>
            </min>
          </product>
        </function>
      </axis>
      <axis name="ROLL">
        <function name="aero/coefficient/Cl_base">
          <description>Cl over alpha and beta (hangar)</description>
          <product>
            <property>aero/qbar-psf</property>
            <property>metrics/Sw-sqft</property>
            <property>metrics/bw-ft</property>
            <property>aero/function/mach-side</property>
          <table>
            <independentVar lookup="row">aero/alpha-deg</independentVar>
            <independentVar lookup="column">aero/beta-deg</independentVar>
            <tableData>
                        -90.00    -70.00    -50.00    -40.00    -30.00    -25.00    -20.00    -15.00    -10.00     -6.00     -3.00      0.00      3.00      6.00     10.00     15.00     20.00     25.00     30.00     40.00     50.00     70.00     90.00
             -180.00   0.02543   0.03156   0.06000   0.07283   0.06681   0.05947   0.05003   0.03893   0.03009   0.02271   0.01178  -0.00000  -0.01178  -0.02271  -0.03009  -0.03893  -0.05003  -0.05947  -0.06681  -0.07283  -0.06000  -0.03156  -0.02543
              -35.00   0.02543   0.02845   0.03227   0.02636   0.01315   0.00741   0.00746   0.00691   0.00429   0.00247   0.00123  -0.00000  -0.00123  -0.00247  -0.00429  -0.00691  -0.00746  -0.00741  -0.01315  -0.02636  -0.03227  -0.02845  -0.02543
              -11.00   0.02543   0.04781   0.05609   0.03602   0.00411   0.00238   0.00243   0.00206   0.00145   0.00088   0.00044  -0.00000  -0.00044  -0.00088  -0.00145  -0.00206  -0.00243  -0.00238  -0.00411  -0.03602  -0.05609  -0.04781  -0.02543
                4.00   0.02543   0.04958   0.07978   0.06313   0.06510   0.06628   0.05672   0.04436   0.03042   0.01851   0.00930  -0.00000  -0.00930  -0.01851  -0.03042  -0.04436  -0.05672  -0.06628  -0.06510  -0.06313  -0.07978  -0.04958  -0.02543
               19.00   0.02543   0.03438   0.00706   0.01130   0.04494   0.05211   0.04984   0.04849   0.03375   0.02066   0.01041  -0.00000  -0.01041  -0.02066  -0.03375  -0.04849  -0.04984  -0.05211  -0.04494  -0.01130  -0.00706  -0.03438  -0.02543
               42.00   0.02543   0.03269   0.03581   0.03211   0.02526   0.02180   0.01894   0.01854   0.01210   0.00715   0.00360  -0.00000  -0.00360  -0.00715  -0.01210  -0.01854  -0.01894  -0.02180  -0.02526  -0.03211  -0.03581  -0.03269  -0.02543
              180.00   0.02543   0.03156   0.06000   0.07283   0.06681   0.05947   0.05003   0.03893   0.03009   0.02271   0.01178  -0.00000  -0.01178  -0.02271  -0.03009  -0.03893  -0.05003  -0.05947  -0.06681  -0.07283  -0.06000  -0.03156  -0.02543
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            </tableData>
          </table>
          </product>
        </function>
        <function name="aero/coefficient/Cl_aileron">
          <description>Cl increment from aileron (deg), over alpha</description>
          <product>
            <property>aero/qbar-psf</property>
            <property>metrics/Sw-sqft</property>
            <property>metrics/bw-ft</property>
            <property>aero/function/mach-aileron</property>
          <table>
            <independentVar lookup="row">aero/alpha-deg</independentVar>
            <independentVar lookup="column">fcs/left-aileron-pos-deg</independentVar>
            <tableData>
                        -20.00    -15.00    -10.00     -5.00      0.00      5.00     10.00     15.00     20.00
             -180.00   0.00000   0.00000   0.00000   0.00000   0.00000   0.00000   0.00000   0.00000   0.00000
              -35.00  -0.00840  -0.00795  -0.00634  -0.00352   0.00000   0.00352   0.00634   0.00795   0.00840
              -11.00  -0.03825  -0.03264  -0.02427  -0.01293   0.00000   0.01293   0.02427   0.03264   0.03825
                4.00  -0.03839  -0.03279  -0.02439  -0.01300   0.00000   0.01300   0.02439   0.03279   0.03839
               19.00  -0.04733  -0.04160  -0.03223  -0.01807   0.00000   0.01807   0.03223   0.04160   0.04733
               42.00  -0.00895  -0.00824  -0.00646  -0.00351   0.00000   0.00351   0.00646   0.00824   0.00895
              180.00   0.00000   0.00000   0.00000   0.00000   0.00000   0.00000   0.00000   0.00000   0.00000
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            </tableData>
          </table>
          </product>
        </function>
        <function name="aero/coefficient/Cl_rudder">
          <description>Cl increment from rudder (deg), over alpha</description>
          <product>
            <property>aero/qbar-psf</property>
            <property>metrics/Sw-sqft</property>
            <property>metrics/bw-ft</property>
            <property>aero/function/mach-rudder</property>
          <table>
            <independentVar lookup="row">aero/alpha-deg</independentVar>
            <independentVar lookup="column">fcs/rudder-pos-deg</independentVar>
            <tableData>
                        -25.00    -20.00    -15.00    -10.00     -5.00      0.00      5.00     10.00     15.00     20.00     25.00
             -180.00   0.00000   0.00000   0.00000   0.00000   0.00000   0.00000   0.00000   0.00000   0.00000   0.00000   0.00000
              -35.00  -0.00675  -0.00608  -0.00516  -0.00381  -0.00202   0.00000   0.00202   0.00381   0.00516   0.00608   0.00675
              -11.00  -0.00860  -0.00775  -0.00658  -0.00487  -0.00259   0.00000   0.00259   0.00487   0.00658   0.00775   0.00860
                4.00  -0.00900  -0.00811  -0.00688  -0.00510  -0.00271   0.00000   0.00271   0.00510   0.00688   0.00811   0.00900
               19.00  -0.00815  -0.00735  -0.00624  -0.00463  -0.00246   0.00000   0.00246   0.00463   0.00624   0.00735   0.00815
               42.00  -0.00664  -0.00599  -0.00506  -0.00369  -0.00196   0.00000   0.00196   0.00369   0.00506   0.00599   0.00664
              180.00   0.00000   0.00000   0.00000   0.00000   0.00000   0.00000   0.00000   0.00000   0.00000   0.00000   0.00000
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            </tableData>
          </table>
          </product>
        </function>
        <function name="aero/coefficient/Clp">
          <description>Cl per p (non-dimensional), over alpha</description>
          <product>
            <property>aero/qbar-psf</property>
            <property>metrics/Sw-sqft</property>
            <property>metrics/bw-ft</property>
            <property>aero/bi2vel</property>
            <property>velocities/p-aero-rad_sec</property>
            <property>aero/function/mach-lift</property>
          <table>
            <independentVar lookup="row">aero/alpha-deg</independentVar>
            <tableData>
                 -180.00   -0.66132
                 -165.00   -0.16381
                  -32.00   -0.13245
                  -10.00   -0.42046
                    5.00   -0.40627
                   20.00    0.28572
                   46.00   -0.21790
                  180.00   -0.66132
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            </tableData>
          </table>
          </product>
        </function>
        <function name="aero/coefficient/Clr">
          <description>Cl per r (non-dimensional), over alpha</description>
          <product>
            <property>aero/qbar-psf</property>
            <property>metrics/Sw-sqft</property>
            <property>metrics/bw-ft</property>
            <property>aero/bi2vel</property>
            <property>velocities/r-aero-rad_sec</property>
            <property>aero/function/mach-lift</property>
          <table>
            <independentVar lookup="row">aero/alpha-deg</independentVar>
            <tableData>
                 -180.00    0.10286
                 -165.00    0.12505
                  -32.00   -0.13653
                  -10.00   -0.01121
                    5.00    0.16022
                   20.00    0.51567
                   46.00    0.20011
                  180.00    0.10286
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            </tableData>
          </table>
          </product>
        </function>
      </axis>
      <axis name="PITCH">
        <function name="aero/coefficient/Cm_base">
          <description>Cm over alpha and beta (hangar)</description>
          <product>
            <property>aero/qbar-psf</property>
            <property>metrics/Sw-sqft</property>
            <property>metrics/cbarw-ft</property>
          <table>
            <independentVar lookup="row">aero/alpha-deg</independentVar>
            <independentVar lookup="column">aero/beta-deg</independentVar>
            <tableData>
                        -90.00    -70.00    -50.00    -40.00    -30.00    -25.00    -20.00    -15.00    -10.00     -6.00     -3.00      0.00      3.00      6.00     10.00     15.00     20.00     25.00     30.00     40.00     50.00     70.00     90.00
             -180.00   0.00000  -0.00730   0.01017  -0.05163  -0.13208  -0.16912  -0.19879  -0.21947  -0.22810  -0.23593  -0.24301  -0.24551  -0.24301  -0.23593  -0.22810  -0.21947  -0.19879  -0.16912  -0.13208  -0.05163   0.01017  -0.00730   0.00000
              -35.00   0.00000   0.05884   0.18580   0.24857   0.30104   0.32131   0.34677   0.34452   0.34599   0.34615   0.34606   0.34601   0.34606   0.34615   0.34599   0.34452   0.34677   0.32131   0.30104   0.24857   0.18580   0.05884   0.00000
              -11.00   0.00000   0.01128   0.15082   0.27988   0.31818   0.34422   0.38568   0.41615   0.43825   0.44968   0.45453   0.45615   0.45453   0.44968   0.43825   0.41615   0.38568   0.34422   0.31818   0.27988   0.15082   0.01128   0.00000
                4.00   0.00000  -0.00807   0.02459   0.02685   0.02121   0.02367   0.03612   0.04670   0.05416   0.05778   0.05917   0.05960   0.05917   0.05778   0.05416   0.04670   0.03612   0.02367   0.02121   0.02685   0.02459  -0.00807   0.00000
               19.00   0.00000  -0.01486  -0.16975  -0.34821  -0.30841  -0.28336  -0.26876  -0.21220  -0.22664  -0.23479  -0.23845  -0.23968  -0.23845  -0.23479  -0.22664  -0.21220  -0.26876  -0.28336  -0.30841  -0.34821  -0.16975  -0.01486   0.00000
               42.00   0.00000  -0.06724  -0.20844  -0.29127  -0.35317  -0.37651  -0.39878  -0.41692  -0.41701  -0.41714  -0.41715  -0.41707  -0.41715  -0.41714  -0.41701  -0.41692  -0.39878  -0.37651  -0.35317  -0.29127  -0.20844  -0.06724   0.00000
              180.00   0.00000  -0.00730   0.01017  -0.05163  -0.13208  -0.16912  -0.19879  -0.21947  -0.22810  -0.23593  -0.24301  -0.24551  -0.24301  -0.23593  -0.22810  -0.21947  -0.19879  -0.16912  -0.13208  -0.05163   0.01017  -0.00730   0.00000
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            </tableData>
          </table>
          </product>
        </function>
        <function name="aero/coefficient/Cm_mach">
          <description>Cm from the neutral point's move with Mach</description>
          <product>
            <property>aero/qbar-psf</property>
            <property>metrics/Sw-sqft</property>
            <property>metrics/cbarw-ft</property>
            <property>aero/function/CL-base</property>
            <property>aero/function/mach-dCm-dCL</property>
          </product>
        </function>
        <function name="aero/coefficient/Cm_elevator">
          <description>Cm increment from elevator (deg), over alpha</description>
          <product>
            <property>aero/qbar-psf</property>
            <property>metrics/Sw-sqft</property>
            <property>metrics/cbarw-ft</property>
            <property>aero/function/mach-elevator</property>
          <table>
            <independentVar lookup="row">aero/alpha-deg</independentVar>
            <independentVar lookup="column">fcs/elevator-pos-deg</independentVar>
            <tableData>
                        -30.00    -25.00    -20.00    -15.00    -10.00     -5.00      0.00      5.00     10.00     15.00     20.00
             -180.00  -0.00181  -0.00129  -0.00085  -0.00048  -0.00022  -0.00005   0.00000  -0.00005  -0.00022  -0.00048  -0.00085
              -35.00   0.06887   0.06815   0.06579   0.05973   0.04683   0.02570   0.00000  -0.02449  -0.04188  -0.04805  -0.04402
              -11.00   0.32334   0.30146   0.27477   0.23590   0.17633   0.09433   0.00000  -0.09469  -0.17761  -0.23810  -0.27744
                4.00   0.34986   0.32591   0.29674   0.25436   0.18968   0.10120   0.00000  -0.10114  -0.18945  -0.25385  -0.29591
               19.00   0.30921   0.29224   0.26821   0.23007   0.17148   0.09132   0.00000  -0.09084  -0.16998  -0.22797  -0.26653
               42.00   0.11084   0.11536   0.11548   0.10713   0.08512   0.04767   0.00000  -0.05063  -0.09640  -0.13071  -0.15415
              180.00  -0.00181  -0.00129  -0.00085  -0.00048  -0.00022  -0.00005   0.00000  -0.00005  -0.00022  -0.00048  -0.00085
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            </tableData>
          </table>
          </product>
        </function>
        <function name="aero/coefficient/Cm_flap">
          <description>Cm increment from flap (deg), over alpha</description>
          <product>
            <property>aero/qbar-psf</property>
            <property>metrics/Sw-sqft</property>
            <property>metrics/cbarw-ft</property>
            <property>aero/function/mach-flap</property>
          <table>
            <independentVar lookup="row">aero/alpha-deg</independentVar>
            <independentVar lookup="column">fcs/flap-pos-deg</independentVar>
            <tableData>
                          0.00      5.00     10.00     15.00     20.00     25.00     30.00     35.00     40.00     45.00     50.00
             -180.00   0.00000   0.00001   0.00006   0.00013   0.00022   0.00034   0.00047   0.00062   0.00078   0.00095   0.00111
              -35.00   0.00000  -0.00196  -0.00473  -0.00817  -0.01204  -0.01611  -0.01973  -0.02270  -0.02565  -0.02802  -0.02935
              -11.00   0.00000  -0.00209  -0.00446  -0.00731  -0.01070  -0.01459  -0.01891  -0.02360  -0.02868  -0.03400  -0.03963
                4.00   0.00000  -0.01236  -0.02516  -0.03812  -0.05101  -0.06372  -0.07632  -0.08897  -0.10188  -0.11428  -0.12692
               19.00   0.00000   0.00700   0.01220   0.01398   0.01182   0.00688   0.00034  -0.00726  -0.01580  -0.02524  -0.03554
               42.00   0.00000   0.00075   0.00185   0.00317   0.00456   0.00590   0.00714   0.00823   0.00909   0.00973   0.01007
              180.00   0.00000   0.00001   0.00006   0.00013   0.00022   0.00034   0.00047   0.00062   0.00078   0.00095   0.00111
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            </tableData>
          </table>
          </product>
        </function>
        <function name="aero/coefficient/Cmq">
          <description>Cm per q (non-dimensional), over alpha</description>
          <product>
            <property>aero/qbar-psf</property>
            <property>metrics/Sw-sqft</property>
            <property>metrics/cbarw-ft</property>
            <property>aero/ci2vel</property>
            <property>velocities/q-aero-rad_sec</property>
            <property>aero/function/mach-lift</property>
          <table>
            <independentVar lookup="row">aero/alpha-deg</independentVar>
            <tableData>
                 -180.00  -11.72954
                 -165.00   -5.31065
                  -32.00   -6.70612
                  -10.00  -13.41509
                    5.00  -20.08949
                   20.00  -11.97258
                   46.00   -9.95093
                  180.00  -11.72954
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            </tableData>
          </table>
          </product>
        </function>
        <function name="aero/coefficient/Cmadot">
          <description>Cm per alpha-dot (downwash lag at the tail)</description>
          <product>
            <property>aero/qbar-psf</property>
            <property>metrics/Sw-sqft</property>
            <property>metrics/cbarw-ft</property>
            <property>aero/ci2vel</property>
            <property>aero/alphadot-rad_sec</property>
            <value>-2.97082</value>
            <property>aero/function/mach-lift</property>
          </product>
        </function>
        <function name="aero/coefficient/Cm_spoilers">
          <description>spoilers: its drag's pitching moment, -0.12 m from the reference point's height</description>
          <product>
            <property>aero/qbar-psf</property>
            <property>metrics/Sw-sqft</property>
            <property>metrics/cbarw-ft</property>
            <value>-0.00135582</value>
            <pow>
              <sin>
                <product>
                  <property>fcs/speedbrake-pos-norm</property>
                  <value>1.0472</value>
                </product>
              </sin>
              <value>2</value>
            </pow>
          </product>
        </function>
        <function name="aero/coefficient/Cm_spoilers_lift">
          <description>spoilers: the lift lost's pitching moment, -0.67 m from the reference point</description>
          <product>
            <property>aero/qbar-psf</property>
            <property>metrics/Sw-sqft</property>
            <property>metrics/cbarw-ft</property>
            <table>
              <independentVar lookup="row">aero/alpha-deg</independentVar>
              <tableData>
                   -180.00    0.00023
                   -165.00   -0.01858
                    -32.00    0.05059
                    -10.00    0.03234
                      5.00   -0.02343
                     20.00   -0.06616
                     46.00   -0.04777
                    180.00    0.00023
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              </tableData>
            </table>
            <min>
              <value>1</value>
              <product>
                <property>fcs/speedbrake-pos-norm</property>
                <value>1.33333</value>
              </product>
            </min>
          </product>
        </function>
        <function name="aero/coefficient/Cm_gear">
          <description>the gear's drag's pitching moment, -2.46 m from the reference point's height</description>
          <product>
            <property>aero/qbar-psf</property>
            <property>metrics/Sw-sqft</property>
            <property>metrics/cbarw-ft</property>
            <value>-0.00230395</value>
            <property>gear/gear-pos-norm</property>
          </product>
        </function>
      </axis>
      <axis name="YAW">
        <function name="aero/coefficient/Cn_base">
          <description>Cn over alpha and beta (hangar)</description>
          <product>
            <property>aero/qbar-psf</property>
            <property>metrics/Sw-sqft</property>
            <property>metrics/bw-ft</property>
            <property>aero/function/mach-side</property>
          <table>
            <independentVar lookup="row">aero/alpha-deg</independentVar>
            <independentVar lookup="column">aero/beta-deg</independentVar>
            <tableData>
                        -90.00    -70.00    -50.00    -40.00    -30.00    -25.00    -20.00    -15.00    -10.00     -6.00     -3.00      0.00      3.00      6.00     10.00     15.00     20.00     25.00     30.00     40.00     50.00     70.00     90.00
             -180.00  -0.06804  -0.08862  -0.09360  -0.08688  -0.07323  -0.06395  -0.05318  -0.04110  -0.04115  -0.04179  -0.02242  -0.00000   0.02242   0.04179   0.04115   0.04110   0.05318   0.06395   0.07323   0.08688   0.09360   0.08862   0.06804
              -35.00  -0.06804  -0.04422  -0.02306  -0.01442  -0.01088  -0.01244  -0.02475  -0.02552  -0.01623  -0.00952  -0.00475  -0.00000   0.00475   0.00952   0.01623   0.02552   0.02475   0.01244   0.01088   0.01442   0.02306   0.04422   0.06804
              -11.00  -0.06804  -0.04299  -0.02606  -0.01879  -0.02436  -0.03851  -0.03446  -0.02691  -0.01837  -0.01114  -0.00559  -0.00000   0.00559   0.01114   0.01837   0.02691   0.03446   0.03851   0.02436   0.01879   0.02606   0.04299   0.06804
                4.00  -0.06804  -0.04330  -0.00684  -0.00212  -0.01941  -0.02727  -0.02498  -0.01999  -0.01391  -0.00855  -0.00432  -0.00000   0.00432   0.00855   0.01391   0.01999   0.02498   0.02727   0.01941   0.00212   0.00684   0.04330   0.06804
               19.00  -0.06804  -0.04062  -0.01908  -0.01375  -0.01648  -0.01674  -0.02150  -0.01610  -0.01099  -0.00663  -0.00332  -0.00000   0.00332   0.00663   0.01099   0.01610   0.02150   0.01674   0.01648   0.01375   0.01908   0.04062   0.06804
               42.00  -0.06804  -0.04616  -0.02423  -0.01556  -0.01088  -0.01119  -0.01454  -0.02399  -0.01505  -0.00872  -0.00443  -0.00000   0.00443   0.00872   0.01505   0.02399   0.01454   0.01119   0.01088   0.01556   0.02423   0.04616   0.06804
              180.00  -0.06804  -0.08862  -0.09360  -0.08688  -0.07323  -0.06395  -0.05318  -0.04110  -0.04115  -0.04179  -0.02242  -0.00000   0.02242   0.04179   0.04115   0.04110   0.05318   0.06395   0.07323   0.08688   0.09360   0.08862   0.06804
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            </tableData>
          </table>
          </product>
        </function>
        <function name="aero/coefficient/Cn_aileron">
          <description>Cn increment from aileron (deg), over alpha</description>
          <product>
            <property>aero/qbar-psf</property>
            <property>metrics/Sw-sqft</property>
            <property>metrics/bw-ft</property>
            <property>aero/function/mach-aileron</property>
          <table>
            <independentVar lookup="row">aero/alpha-deg</independentVar>
            <independentVar lookup="column">fcs/left-aileron-pos-deg</independentVar>
            <tableData>
                        -20.00    -15.00    -10.00     -5.00      0.00      5.00     10.00     15.00     20.00
             -180.00  -0.00000  -0.00000  -0.00000  -0.00000   0.00000  -0.00000  -0.00000  -0.00000  -0.00000
              -35.00   0.01827   0.01538   0.01133   0.00601   0.00000  -0.00601  -0.01133  -0.01538  -0.01827
              -11.00   0.00407   0.00345   0.00255   0.00135   0.00000  -0.00135  -0.00255  -0.00345  -0.00407
                4.00  -0.00018  -0.00017  -0.00014  -0.00008   0.00000   0.00008   0.00014   0.00017   0.00018
               19.00  -0.02274  -0.01883  -0.01303  -0.00612   0.00000   0.00612   0.01303   0.01883   0.02274
               42.00  -0.01643  -0.01387  -0.01024  -0.00544   0.00000   0.00544   0.01024   0.01387   0.01643
              180.00  -0.00000  -0.00000  -0.00000  -0.00000   0.00000  -0.00000  -0.00000  -0.00000  -0.00000
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            </tableData>
          </table>
          </product>
        </function>
        <function name="aero/coefficient/Cn_rudder">
          <description>Cn increment from rudder (deg), over alpha</description>
          <product>
            <property>aero/qbar-psf</property>
            <property>metrics/Sw-sqft</property>
            <property>metrics/bw-ft</property>
            <property>aero/function/mach-rudder</property>
          <table>
            <independentVar lookup="row">aero/alpha-deg</independentVar>
            <independentVar lookup="column">fcs/rudder-pos-deg</independentVar>
            <tableData>
                        -25.00    -20.00    -15.00    -10.00     -5.00      0.00      5.00     10.00     15.00     20.00     25.00
             -180.00  -0.00000  -0.00000  -0.00000  -0.00000  -0.00000   0.00000  -0.00000  -0.00000  -0.00000  -0.00000  -0.00000
              -35.00   0.02479   0.02238   0.01903   0.01409   0.00749   0.00000  -0.00749  -0.01409  -0.01903  -0.02238  -0.02479
              -11.00   0.03277   0.02959   0.02517   0.01866   0.00993   0.00000  -0.00993  -0.01866  -0.02517  -0.02959  -0.03277
                4.00   0.03445   0.03110   0.02645   0.01961   0.01043   0.00000  -0.01043  -0.01961  -0.02645  -0.03110  -0.03445
               19.00   0.02960   0.02674   0.02276   0.01688   0.00898   0.00000  -0.00898  -0.01688  -0.02276  -0.02674  -0.02960
               42.00   0.02436   0.02203   0.01867   0.01366   0.00725   0.00000  -0.00725  -0.01366  -0.01867  -0.02203  -0.02436
              180.00  -0.00000  -0.00000  -0.00000  -0.00000  -0.00000   0.00000  -0.00000  -0.00000  -0.00000  -0.00000  -0.00000
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            </tableData>
          </table>
          </product>
        </function>
        <function name="aero/coefficient/Cnp">
          <description>Cn per p (non-dimensional), over alpha</description>
          <product>
            <property>aero/qbar-psf</property>
            <property>metrics/Sw-sqft</property>
            <property>metrics/bw-ft</property>
            <property>aero/bi2vel</property>
            <property>velocities/p-aero-rad_sec</property>
            <property>aero/function/mach-lift</property>
          <table>
            <independentVar lookup="row">aero/alpha-deg</independentVar>
            <tableData>
                 -180.00    0.13512
                 -165.00    0.10722
                  -32.00    0.06001
                  -10.00    0.15027
                    5.00   -0.03523
                   20.00    0.11725
                   46.00    0.04375
                  180.00    0.13512
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            </tableData>
          </table>
          </product>
        </function>
        <function name="aero/coefficient/Cnr">
          <description>Cn per r (non-dimensional), over alpha</description>
          <product>
            <property>aero/qbar-psf</property>
            <property>metrics/Sw-sqft</property>
            <property>metrics/bw-ft</property>
            <property>aero/bi2vel</property>
            <property>velocities/r-aero-rad_sec</property>
            <property>aero/function/mach-lift</property>
          <table>
            <independentVar lookup="row">aero/alpha-deg</independentVar>
            <tableData>
                 -180.00   -0.28920
                 -165.00   -0.28309
                  -32.00   -0.15281
                  -10.00   -0.20189
                    5.00   -0.20629
                   20.00   -0.09439
                   46.00   -0.18352
                  180.00   -0.28920
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            </tableData>
          </table>
          </product>
        </function>
      </axis>
    </aerodynamics>
</fdm_config>
