<?xml version="1.0"?>
<?xml-stylesheet type="text/xsl" href="http://jsbsim.sourceforge.net/JSBSim.xsl"?>
<!-- Generated by hangar 0.1.0 from rq4b.toml on 2026-10-01. Edit the design and rebuild; changes
     made here are overwritten.  -->
<fdm_config name="rq4b" version="2.0" release="ALPHA"
            xmlns:xsi="http://www.w3.org/2001/XMLSchema-instance"
            xsi:noNamespaceSchemaLocation="http://jsbsim.sourceforge.net/JSBSim.xsd">
    <fileheader>
      <author>hangar</author>
      <filecreationdate>2026-10-01</filecreationdate>
      <version>0.1.0</version>
      <description>Northrop Grumman RQ-4B Global Hawk (hangar build)</description>
      <note>Aerodynamics: vortex lattice with viscous section polars, full-envelope
        strip model, slender-body fuselage (hangar). Mass: Raymer component
        weights on the geometry. Propeller: blade-element momentum theory.</note>
      <reference refID="fsim/applicability/aerobatic" author="the design" title="USAF RQ-4 fact sheet: a high-altitude long-endurance UAV, not cleared for aerobatics" date="n/a"/>
      <reference refID="fsim/applicability/carrier" author="the design" title="USAF RQ-4 fact sheet: a land-based UAV" date="n/a"/>
      <reference refID="fsim/applicability/drag_devices" author="the design" title="C. Eaton and R. Woolf, Flight Test Validation of the RQ-4 Block 20 Global Hawk Aerodynamic and Propulsive Models (SFTE, 2009): its model's spoiler increments" date="n/a"/>
      <reference refID="fsim/applicability/flaps" author="the design" title="Northrop Grumman RQ-4 data: trailing-edge flaps" date="n/a"/>
      <reference refID="fsim/applicability/ground_contact" author="the design" title="USAF RQ-4 fact sheet: tricycle wheeled gear" date="n/a"/>
      <reference refID="fsim/applicability/releasable_stores" author="the design" title="USAF RQ-4 fact sheet: an unarmed reconnaissance UAV" date="n/a"/>
      <reference refID="fsim/applicability/retractable_gear" author="the design" title="Northrop Grumman RQ-4 data: retractable gear" date="n/a"/>
      <reference refID="fsim/applicability/vertical_flight" author="the design" title="USAF RQ-4 fact sheet: a conventional runway take-off and landing UAV. Conventional take-off and landing: no rotors, lift fans or vectored lift to hover" date="n/a"/>
    </fileheader>
    <metrics>
      <wingarea unit="M2"> 63.6400 </wingarea>
      <wingspan unit="M"> 39.9000 </wingspan>
      <chord unit="M"> 1.7207 </chord>
      <htailarea unit="M2"> 0.0000 </htailarea>
      <htailarm unit="M"> 0.0000 </htailarm>
      <vtailarea unit="M2"> 9.6541 </vtailarea>
      <vtailarm unit="M"> 5.1253 </vtailarm>
      <location name="AERORP" unit="M">
        <x> 7.8250 </x>
        <y> 0.0000 </y>
        <z> 0.1000 </z>
      </location>
      <location name="EYEPOINT" unit="M">
        <x> 7.8250 </x>
        <y> 0.0000 </y>
        <z> 0.1000 </z>
      </location>
      <location name="VRP" unit="M">
        <x> 7.8400 </x>
        <y> 0.0000 </y>
        <z> 0.1000 </z>
      </location>
    </metrics>
    <mass_balance negated_crossproduct_inertia="false">
      <ixx unit="KG*M2"> 134392.09 </ixx>
      <iyy unit="KG*M2"> 69010.16 </iyy>
      <izz unit="KG*M2"> 196982.86 </izz>
      <ixy unit="KG*M2"> -0.002 </ixy>
      <ixz unit="KG*M2"> 4045.072 </ixz>
      <iyz unit="KG*M2"> 0.090 </iyz>
      <emptywt unit="KG"> 6781.00 </emptywt>
      <location name="CG" unit="M">
        <x> 7.8400 </x>
        <y> 0.0000 </y>
        <z> 0.1000 </z>
      </location>
      <pointmass name="sensors">
        <weight unit="KG"> 1361.00 </weight>
        <location unit="M">
          <x> 7.5000 </x>
          <y> 0.0000 </y>
          <z> -0.1000 </z>
        </location>
      </pointmass>
    </mass_balance>
    <ground_reactions>
      <contact type="BOGEY" name="Nose Gear">
        <location unit="M">
          <x> 3.2500 </x>
          <y> 0.0000 </y>
          <z> -1.5350 </z>
        </location>
        <static_friction> 0.8 </static_friction>
        <dynamic_friction> 0.5 </dynamic_friction>
        <rolling_friction> 0.02 </rolling_friction>
        <spring_coeff unit="N/M"> 161338 </spring_coeff>
        <damping_coeff unit="N/M/SEC"> 12620 </damping_coeff>
        <damping_coeff_rebound unit="N/M/SEC"> 25240 </damping_coeff_rebound>
        <max_steer unit="DEG"> 45.0 </max_steer>
        <brake_group> NONE </brake_group>
        <retractable> 1 </retractable>
      </contact>
      <contact type="BOGEY" name="Left Main Gear">
        <location unit="M">
          <x> 8.3000 </x>
          <y> -1.6150 </y>
          <z> -1.5350 </z>
        </location>
        <static_friction> 0.8 </static_friction>
        <dynamic_friction> 0.5 </dynamic_friction>
        <rolling_friction> 0.02 </rolling_friction>
        <spring_coeff unit="N/M"> 582839 </spring_coeff>
        <damping_coeff unit="N/M/SEC"> 52642 </damping_coeff>
        <damping_coeff_rebound unit="N/M/SEC"> 105284 </damping_coeff_rebound>
        <max_steer unit="DEG"> 0.0 </max_steer>
        <brake_group> LEFT </brake_group>
        <retractable> 1 </retractable>
      </contact>
      <contact type="BOGEY" name="Right Main Gear">
        <location unit="M">
          <x> 8.3000 </x>
          <y> 1.6150 </y>
          <z> -1.5350 </z>
        </location>
        <static_friction> 0.8 </static_friction>
        <dynamic_friction> 0.5 </dynamic_friction>
        <rolling_friction> 0.02 </rolling_friction>
        <spring_coeff unit="N/M"> 582839 </spring_coeff>
        <damping_coeff unit="N/M/SEC"> 52642 </damping_coeff>
        <damping_coeff_rebound unit="N/M/SEC"> 105284 </damping_coeff_rebound>
        <max_steer unit="DEG"> 0.0 </max_steer>
        <brake_group> RIGHT </brake_group>
        <retractable> 1 </retractable>
      </contact>
      <contact type="STRUCTURE" name="fuselage front">
        <location unit="M">
          <x> 0.0000 </x>
          <y> 0.0000 </y>
          <z> 0.1900 </z>
        </location>
        <static_friction> 0.8 </static_friction>
        <dynamic_friction> 0.6 </dynamic_friction>
        <spring_coeff unit="N/M"> 433416 </spring_coeff>
        <damping_coeff unit="N/M/SEC"> 14447 </damping_coeff>
        <damping_coeff_rebound unit="N/M/SEC"> 14447 </damping_coeff_rebound>
      </contact>
      <contact type="STRUCTURE" name="fuselage rear">
        <location unit="M">
          <x> 14.5100 </x>
          <y> 0.0000 </y>
          <z> 0.3444 </z>
        </location>
        <static_friction> 0.8 </static_friction>
        <dynamic_friction> 0.6 </dynamic_friction>
        <spring_coeff unit="N/M"> 1134919 </spring_coeff>
        <damping_coeff unit="N/M/SEC"> 37831 </damping_coeff>
        <damping_coeff_rebound unit="N/M/SEC"> 37831 </damping_coeff_rebound>
      </contact>
      <contact type="STRUCTURE" name="vtail left rear">
        <location unit="M">
          <x> 14.2778 </x>
          <y> -2.8739 </y>
          <z> 3.1226 </z>
        </location>
        <static_friction> 0.8 </static_friction>
        <dynamic_friction> 0.6 </dynamic_friction>
        <spring_coeff unit="N/M"> 957405 </spring_coeff>
        <damping_coeff unit="N/M/SEC"> 31913 </damping_coeff>
        <damping_coeff_rebound unit="N/M/SEC"> 31913 </damping_coeff_rebound>
      </contact>
      <contact type="STRUCTURE" name="vtail right rear">
        <location unit="M">
          <x> 14.2778 </x>
          <y> 2.8739 </y>
          <z> 3.1226 </z>
        </location>
        <static_friction> 0.8 </static_friction>
        <dynamic_friction> 0.6 </dynamic_friction>
        <spring_coeff unit="N/M"> 957405 </spring_coeff>
        <damping_coeff unit="N/M/SEC"> 31913 </damping_coeff>
        <damping_coeff_rebound unit="N/M/SEC"> 31913 </damping_coeff_rebound>
      </contact>
      <contact type="STRUCTURE" name="wing left rear">
        <location unit="M">
          <x> 9.7800 </x>
          <y> -19.9500 </y>
          <z> 0.5470 </z>
        </location>
        <static_friction> 0.8 </static_friction>
        <dynamic_friction> 0.6 </dynamic_friction>
        <spring_coeff unit="N/M"> 283782 </spring_coeff>
        <damping_coeff unit="N/M/SEC"> 9459 </damping_coeff>
        <damping_coeff_rebound unit="N/M/SEC"> 9459 </damping_coeff_rebound>
      </contact>
      <contact type="STRUCTURE" name="wing right rear">
        <location unit="M">
          <x> 9.7800 </x>
          <y> 19.9500 </y>
          <z> 0.5470 </z>
        </location>
        <static_friction> 0.8 </static_friction>
        <dynamic_friction> 0.6 </dynamic_friction>
        <spring_coeff unit="N/M"> 283782 </spring_coeff>
        <damping_coeff unit="N/M/SEC"> 9459 </damping_coeff>
        <damping_coeff_rebound unit="N/M/SEC"> 9459 </damping_coeff_rebound>
      </contact>
    </ground_reactions>
    <propulsion>
      <engine file="rq4b_engine0">
        <location unit="M">
          <x> 10.4000 </x>
          <y> 0.0000 </y>
          <z> 1.3000 </z>
        </location>
        <feed>0</feed>
        <feed>1</feed>
        <feed>2</feed>
        <feed>3</feed>
        <thruster file="rq4b_nozzle0">
          <location unit="M">
            <x> 12.9500 </x>
            <y> 0.0000 </y>
            <z> 1.3000 </z>
          </location>
          <orient unit="DEG"> <roll>0.00</roll> <pitch>0.00</pitch> <yaw>0.00</yaw> </orient>

        </thruster>
      </engine>
      <tank type="FUEL">
        <location unit="M">
          <x> 7.7300 </x>
          <y> -4.0000 </y>
          <z> -0.0200 </z>
        </location>
        <capacity unit="KG"> 2300.00 </capacity>
        <contents unit="KG"> 690.00 </contents>
      </tank>
      <tank type="FUEL">
        <location unit="M">
          <x> 7.7300 </x>
          <y> 4.0000 </y>
          <z> -0.0200 </z>
        </location>
        <capacity unit="KG"> 2300.00 </capacity>
        <contents unit="KG"> 690.00 </contents>
      </tank>
      <tank type="FUEL">
        <location unit="M">
          <x> 8.3100 </x>
          <y> -10.0000 </y>
          <z> 0.2000 </z>
        </location>
        <capacity unit="KG"> 1624.00 </capacity>
        <contents unit="KG"> 487.20 </contents>
      </tank>
      <tank type="FUEL">
        <location unit="M">
          <x> 8.3100 </x>
          <y> 10.0000 </y>
          <z> 0.2000 </z>
        </location>
        <capacity unit="KG"> 1624.00 </capacity>
        <contents unit="KG"> 487.20 </contents>
      </tank>
    </propulsion>
    <flight_control name="rq4b">
      <!-- the aircraft's profile for the platform (docs/control-architecture.md, section 7): what
           hangar knows of it - its design, its flight tests, its identified responses -->
      <property value="1">fsim/identity/version</property>
      <property value="1">fsim/identity/provenance</property>
      <property value="8">fsim/identity/class</property>
      <property value="1">fsim/identity/family</property>
      <property value="1">fsim/effectors/version</property>
      <property value="1">fsim/effectors/provenance</property>
      <property value="1">fsim/effectors/flaps</property>
      <property value="8">fsim/effectors/flaps_transit_s</property>
      <property value="0.0">fsim/effectors/neutral</property>
      <property value="0.0">fsim/effectors/pitch</property>
      <property value="1">fsim/effectors/pitch_trim</property>
      <property value="1">fsim/effectors/retractable_gear</property>
      <property value="0.0">fsim/effectors/roll</property>
      <property value="1">fsim/effectors/speedbrake</property>
      <property value="1">fsim/effectors/wheel_brakes</property>
      <property value="0.0">fsim/effectors/yaw</property>
      <property value="1">fsim/envelope/version</property>
      <property value="1">fsim/envelope/provenance</property>
      <property value="19.5015">fsim/envelope/clean/alpha_max_deg</property>
      <property value="39.0223">fsim/envelope/clean/cas_min_ms</property>
      <property value="15.43">fsim/envelope/crosswind_max_ms</property>
      <property value="16.16">fsim/envelope/ground_pitch_max_deg</property>
      <property value="5.28">fsim/envelope/ground_turn_radius_m</property>
      <property value="0.0794">fsim/envelope/ground_yaw_accel_rad_s2</property>
      <property value="1">fsim/propulsion/version</property>
      <property value="1">fsim/propulsion/provenance</property>
      <property value="0.0">fsim/propulsion/afterburner</property>
      <property value="1">fsim/propulsion/engines</property>
      <property value="0.271475">fsim/propulsion/spool_s</property>
      <property value="2">fsim/propulsion/type</property>
      <property value="1">fsim/plant/version</property>
      <property value="1">fsim/plant/provenance</property>
      <property value="-6.53029">fsim/plant/alpha_zero_lift_deg</property>
      <property value="3000">fsim/plant/altitude_m</property>
      <property value="87.1702">fsim/plant/eas_ms</property>
      <property value="-0.036738">fsim/plant/elevator_trim</property>
      <property value="-0.141053">fsim/plant/elevator_trim_lift</property>
      <property value="7.75216">fsim/plant/pitch/gain</property>
      <property value="0.668021">fsim/plant/pitch/tau_s</property>
      <property value="0.509464">fsim/plant/roll/gain</property>
      <property value="0.118675">fsim/plant/roll/tau_s</property>
      <property value="2.27836">fsim/plant/speed/gain</property>
      <property value="0.271475">fsim/plant/speed/tau_s</property>
      <property value="100.821">fsim/plant/tas_ms</property>
      <property value="0.490389">fsim/plant/throttle_trim</property>
      <property value="0.339711">fsim/plant/yaw/gain</property>
      <property value="1">fsim/performance/version</property>
      <property value="1">fsim/performance/provenance</property>
      <property value="13762.2">fsim/performance/ceiling_m</property>
      <property value="184.832">fsim/performance/max_tas_ms</property>
      <property value="39.0223">fsim/performance/stall_cas_ms</property>
      <property value="36.2555">fsim/performance/stall_flaps_cas_ms</property>
      <property value="1">fsim/applicability/version</property>
      <property value="1">fsim/applicability/provenance</property>
      <property value="0.0">fsim/applicability/aerobatic</property>
      <property value="1">fsim/applicability/carrier</property>
      <property value="2">fsim/applicability/drag_devices</property>
      <property value="1">fsim/applicability/flaps</property>
      <property value="1">fsim/applicability/ground_contact</property>
      <property value="1">fsim/applicability/releasable_stores</property>
      <property value="1">fsim/applicability/retractable_gear</property>
      <property value="0.0">fsim/applicability/vertical_flight</property>
      <property value="1">fsim/tables/version</property>
      <property value="1">fsim/tables/provenance</property>
      <property value="100">fsim/tables/altitude_m/h0</property>
      <property value="2750">fsim/tables/altitude_m/h1</property>
      <property value="5500">fsim/tables/altitude_m/h2</property>
      <property value="8260">fsim/tables/altitude_m/h3</property>
      <property value="10320">fsim/tables/altitude_m/h4</property>
      <property value="11700">fsim/tables/altitude_m/h5</property>
      <property value="13070">fsim/tables/altitude_m/h6</property>
      <property value="0.082097">fsim/tables/best_endurance_fuel_kg_s/h0/w0</property>
      <property value="0.0854559">fsim/tables/best_endurance_fuel_kg_s/h0/w1</property>
      <property value="0.0805179">fsim/tables/best_endurance_fuel_kg_s/h0/w2</property>
      <property value="0.0805179">fsim/tables/best_endurance_fuel_kg_s/h0/w3</property>
      <property value="0.0805179">fsim/tables/best_endurance_fuel_kg_s/h1/w0</property>
      <property value="0.0805179">fsim/tables/best_endurance_fuel_kg_s/h1/w1</property>
      <property value="0.0805179">fsim/tables/best_endurance_fuel_kg_s/h1/w2</property>
      <property value="0.0805179">fsim/tables/best_endurance_fuel_kg_s/h1/w3</property>
      <property value="0.0805179">fsim/tables/best_endurance_fuel_kg_s/h2/w0</property>
      <property value="0.0805179">fsim/tables/best_endurance_fuel_kg_s/h2/w1</property>
      <property value="0.0805179">fsim/tables/best_endurance_fuel_kg_s/h2/w2</property>
      <property value="0.0805179">fsim/tables/best_endurance_fuel_kg_s/h2/w3</property>
      <property value="0.0805179">fsim/tables/best_endurance_fuel_kg_s/h3/w0</property>
      <property value="0.0805179">fsim/tables/best_endurance_fuel_kg_s/h3/w1</property>
      <property value="0.0805179">fsim/tables/best_endurance_fuel_kg_s/h3/w2</property>
      <property value="0.0805179">fsim/tables/best_endurance_fuel_kg_s/h3/w3</property>
      <property value="0.0805179">fsim/tables/best_endurance_fuel_kg_s/h4/w0</property>
      <property value="0.0805179">fsim/tables/best_endurance_fuel_kg_s/h4/w1</property>
      <property value="0.0805179">fsim/tables/best_endurance_fuel_kg_s/h4/w2</property>
      <property value="0.0805179">fsim/tables/best_endurance_fuel_kg_s/h4/w3</property>
      <property value="0.0805179">fsim/tables/best_endurance_fuel_kg_s/h5/w0</property>
      <property value="0.0805179">fsim/tables/best_endurance_fuel_kg_s/h5/w1</property>
      <property value="0.0805179">fsim/tables/best_endurance_fuel_kg_s/h5/w2</property>
      <property value="0.0805179">fsim/tables/best_endurance_fuel_kg_s/h5/w3</property>
      <property value="0.0805179">fsim/tables/best_endurance_fuel_kg_s/h6/w0</property>
      <property value="0.0805179">fsim/tables/best_endurance_fuel_kg_s/h6/w1</property>
      <property value="0.0805179">fsim/tables/best_endurance_fuel_kg_s/h6/w2</property>
      <property value="85.4667">fsim/tables/best_endurance_tas_ms/h0/w0</property>
      <property value="87.9973">fsim/tables/best_endurance_tas_ms/h0/w1</property>
      <property value="73.6309">fsim/tables/best_endurance_tas_ms/h0/w2</property>
      <property value="73.722">fsim/tables/best_endurance_tas_ms/h0/w3</property>
      <property value="60.667">fsim/tables/best_endurance_tas_ms/h1/w0</property>
      <property value="74.3191">fsim/tables/best_endurance_tas_ms/h1/w1</property>
      <property value="74.9143">fsim/tables/best_endurance_tas_ms/h1/w2</property>
      <property value="77.2127">fsim/tables/best_endurance_tas_ms/h1/w3</property>
      <property value="73.0345">fsim/tables/best_endurance_tas_ms/h2/w0</property>
      <property value="74.75">fsim/tables/best_endurance_tas_ms/h2/w1</property>
      <property value="77.4079">fsim/tables/best_endurance_tas_ms/h2/w2</property>
      <property value="82.8978">fsim/tables/best_endurance_tas_ms/h2/w3</property>
      <property value="76.1664">fsim/tables/best_endurance_tas_ms/h3/w0</property>
      <property value="79.7084">fsim/tables/best_endurance_tas_ms/h3/w1</property>
      <property value="84.2747">fsim/tables/best_endurance_tas_ms/h3/w2</property>
      <property value="92.3347">fsim/tables/best_endurance_tas_ms/h3/w3</property>
      <property value="81.3227">fsim/tables/best_endurance_tas_ms/h4/w0</property>
      <property value="86.184">fsim/tables/best_endurance_tas_ms/h4/w1</property>
      <property value="92.1806">fsim/tables/best_endurance_tas_ms/h4/w2</property>
      <property value="102.384">fsim/tables/best_endurance_tas_ms/h4/w3</property>
      <property value="87.1513">fsim/tables/best_endurance_tas_ms/h5/w0</property>
      <property value="93.0827">fsim/tables/best_endurance_tas_ms/h5/w1</property>
      <property value="100.029">fsim/tables/best_endurance_tas_ms/h5/w2</property>
      <property value="112.485">fsim/tables/best_endurance_tas_ms/h5/w3</property>
      <property value="95.246">fsim/tables/best_endurance_tas_ms/h6/w0</property>
      <property value="102.282">fsim/tables/best_endurance_tas_ms/h6/w1</property>
      <property value="110.939">fsim/tables/best_endurance_tas_ms/h6/w2</property>
      <property value="0.082097">fsim/tables/best_range_fuel_kg_s/h0/w0</property>
      <property value="0.0854559">fsim/tables/best_range_fuel_kg_s/h0/w1</property>
      <property value="0.0866208">fsim/tables/best_range_fuel_kg_s/h0/w2</property>
      <property value="0.0863013">fsim/tables/best_range_fuel_kg_s/h0/w3</property>
      <property value="0.0834345">fsim/tables/best_range_fuel_kg_s/h1/w0</property>
      <property value="0.0845013">fsim/tables/best_range_fuel_kg_s/h1/w1</property>
      <property value="0.0846912">fsim/tables/best_range_fuel_kg_s/h1/w2</property>
      <property value="0.08506">fsim/tables/best_range_fuel_kg_s/h1/w3</property>
      <property value="0.0831703">fsim/tables/best_range_fuel_kg_s/h2/w0</property>
      <property value="0.0833358">fsim/tables/best_range_fuel_kg_s/h2/w1</property>
      <property value="0.0831274">fsim/tables/best_range_fuel_kg_s/h2/w2</property>
      <property value="0.0823457">fsim/tables/best_range_fuel_kg_s/h2/w3</property>
      <property value="0.0824288">fsim/tables/best_range_fuel_kg_s/h3/w0</property>
      <property value="0.0824058">fsim/tables/best_range_fuel_kg_s/h3/w1</property>
      <property value="0.0822766">fsim/tables/best_range_fuel_kg_s/h3/w2</property>
      <property value="0.0821059">fsim/tables/best_range_fuel_kg_s/h3/w3</property>
      <property value="0.0805179">fsim/tables/best_range_fuel_kg_s/h4/w0</property>
      <property value="0.0805179">fsim/tables/best_range_fuel_kg_s/h4/w1</property>
      <property value="0.0805179">fsim/tables/best_range_fuel_kg_s/h4/w2</property>
      <property value="0.0805179">fsim/tables/best_range_fuel_kg_s/h4/w3</property>
      <property value="0.0805179">fsim/tables/best_range_fuel_kg_s/h5/w0</property>
      <property value="0.0805179">fsim/tables/best_range_fuel_kg_s/h5/w1</property>
      <property value="0.0805179">fsim/tables/best_range_fuel_kg_s/h5/w2</property>
      <property value="0.0805179">fsim/tables/best_range_fuel_kg_s/h5/w3</property>
      <property value="0.0805179">fsim/tables/best_range_fuel_kg_s/h6/w0</property>
      <property value="0.0805179">fsim/tables/best_range_fuel_kg_s/h6/w1</property>
      <property value="0.0805179">fsim/tables/best_range_fuel_kg_s/h6/w2</property>
      <property value="85.4667">fsim/tables/best_range_tas_ms/h0/w0</property>
      <property value="87.9973">fsim/tables/best_range_tas_ms/h0/w1</property>
      <property value="88.4727">fsim/tables/best_range_tas_ms/h0/w2</property>
      <property value="88.4236">fsim/tables/best_range_tas_ms/h0/w3</property>
      <property value="105.615">fsim/tables/best_range_tas_ms/h1/w0</property>
      <property value="106.522">fsim/tables/best_range_tas_ms/h1/w1</property>
      <property value="106.685">fsim/tables/best_range_tas_ms/h1/w2</property>
      <property value="107.158">fsim/tables/best_range_tas_ms/h1/w3</property>
      <property value="132.85">fsim/tables/best_range_tas_ms/h2/w0</property>
      <property value="133.267">fsim/tables/best_range_tas_ms/h2/w1</property>
      <property value="132.786">fsim/tables/best_range_tas_ms/h2/w2</property>
      <property value="133.149">fsim/tables/best_range_tas_ms/h2/w3</property>
      <property value="164.677">fsim/tables/best_range_tas_ms/h3/w0</property>
      <property value="164.989">fsim/tables/best_range_tas_ms/h3/w1</property>
      <property value="165.671">fsim/tables/best_range_tas_ms/h3/w2</property>
      <property value="166.704">fsim/tables/best_range_tas_ms/h3/w3</property>
      <property value="173.725">fsim/tables/best_range_tas_ms/h4/w0</property>
      <property value="173.508">fsim/tables/best_range_tas_ms/h4/w1</property>
      <property value="172.882">fsim/tables/best_range_tas_ms/h4/w2</property>
      <property value="169.125">fsim/tables/best_range_tas_ms/h4/w3</property>
      <property value="170.222">fsim/tables/best_range_tas_ms/h5/w0</property>
      <property value="169">fsim/tables/best_range_tas_ms/h5/w1</property>
      <property value="166.498">fsim/tables/best_range_tas_ms/h5/w2</property>
      <property value="154.446">fsim/tables/best_range_tas_ms/h5/w3</property>
      <property value="168.653">fsim/tables/best_range_tas_ms/h6/w0</property>
      <property value="166.181">fsim/tables/best_range_tas_ms/h6/w1</property>
      <property value="159.688">fsim/tables/best_range_tas_ms/h6/w2</property>
      <property value="106.039">fsim/tables/climb_tas_ms/h0/w0</property>
      <property value="106.012">fsim/tables/climb_tas_ms/h0/w1</property>
      <property value="109.106">fsim/tables/climb_tas_ms/h0/w2</property>
      <property value="109.884">fsim/tables/climb_tas_ms/h0/w3</property>
      <property value="110.546">fsim/tables/climb_tas_ms/h1/w0</property>
      <property value="112.725">fsim/tables/climb_tas_ms/h1/w1</property>
      <property value="111.759">fsim/tables/climb_tas_ms/h1/w2</property>
      <property value="117.79">fsim/tables/climb_tas_ms/h1/w3</property>
      <property value="109.665">fsim/tables/climb_tas_ms/h2/w0</property>
      <property value="113.836">fsim/tables/climb_tas_ms/h2/w1</property>
      <property value="113.861">fsim/tables/climb_tas_ms/h2/w2</property>
      <property value="119.14">fsim/tables/climb_tas_ms/h2/w3</property>
      <property value="108.991">fsim/tables/climb_tas_ms/h3/w0</property>
      <property value="113.167">fsim/tables/climb_tas_ms/h3/w1</property>
      <property value="113.572">fsim/tables/climb_tas_ms/h3/w2</property>
      <property value="126.236">fsim/tables/climb_tas_ms/h3/w3</property>
      <property value="111.657">fsim/tables/climb_tas_ms/h4/w0</property>
      <property value="115.271">fsim/tables/climb_tas_ms/h4/w1</property>
      <property value="116.959">fsim/tables/climb_tas_ms/h4/w2</property>
      <property value="130.433">fsim/tables/climb_tas_ms/h4/w3</property>
      <property value="119.208">fsim/tables/climb_tas_ms/h5/w0</property>
      <property value="121.952">fsim/tables/climb_tas_ms/h5/w1</property>
      <property value="127.46">fsim/tables/climb_tas_ms/h5/w2</property>
      <property value="133.42">fsim/tables/climb_tas_ms/h5/w3</property>
      <property value="128.496">fsim/tables/climb_tas_ms/h6/w0</property>
      <property value="130.368">fsim/tables/climb_tas_ms/h6/w1</property>
      <property value="133.992">fsim/tables/climb_tas_ms/h6/w2</property>
      <property value="7848">fsim/tables/fuel_capacity_kg</property>
      <property value="0.082097">fsim/tables/fuel_kg_s/h0/w0/v0</property>
      <property value="0.089624">fsim/tables/fuel_kg_s/h0/w0/v1</property>
      <property value="0.182731">fsim/tables/fuel_kg_s/h0/w0/v10</property>
      <property value="0.195738">fsim/tables/fuel_kg_s/h0/w0/v11</property>
      <property value="0.209497">fsim/tables/fuel_kg_s/h0/w0/v12</property>
      <property value="0.224131">fsim/tables/fuel_kg_s/h0/w0/v13</property>
      <property value="0.239794">fsim/tables/fuel_kg_s/h0/w0/v14</property>
      <property value="0.256629">fsim/tables/fuel_kg_s/h0/w0/v15</property>
      <property value="0.0979355">fsim/tables/fuel_kg_s/h0/w0/v2</property>
      <property value="0.107092">fsim/tables/fuel_kg_s/h0/w0/v3</property>
      <property value="0.116586">fsim/tables/fuel_kg_s/h0/w0/v4</property>
      <property value="0.126338">fsim/tables/fuel_kg_s/h0/w0/v5</property>
      <property value="0.136442">fsim/tables/fuel_kg_s/h0/w0/v6</property>
      <property value="0.147319">fsim/tables/fuel_kg_s/h0/w0/v7</property>
      <property value="0.158587">fsim/tables/fuel_kg_s/h0/w0/v8</property>
      <property value="0.170378">fsim/tables/fuel_kg_s/h0/w0/v9</property>
      <property value="0.0854559">fsim/tables/fuel_kg_s/h0/w1/v0</property>
      <property value="0.0929403">fsim/tables/fuel_kg_s/h0/w1/v1</property>
      <property value="0.183772">fsim/tables/fuel_kg_s/h0/w1/v10</property>
      <property value="0.196604">fsim/tables/fuel_kg_s/h0/w1/v11</property>
      <property value="0.210164">fsim/tables/fuel_kg_s/h0/w1/v12</property>
      <property value="0.224567">fsim/tables/fuel_kg_s/h0/w1/v13</property>
      <property value="0.239969">fsim/tables/fuel_kg_s/h0/w1/v14</property>
      <property value="0.256495">fsim/tables/fuel_kg_s/h0/w1/v15</property>
      <property value="0.100731">fsim/tables/fuel_kg_s/h0/w1/v2</property>
      <property value="0.109612">fsim/tables/fuel_kg_s/h0/w1/v3</property>
      <property value="0.119012">fsim/tables/fuel_kg_s/h0/w1/v4</property>
      <property value="0.12866">fsim/tables/fuel_kg_s/h0/w1/v5</property>
      <property value="0.138578">fsim/tables/fuel_kg_s/h0/w1/v6</property>
      <property value="0.148807">fsim/tables/fuel_kg_s/h0/w1/v7</property>
      <property value="0.159906">fsim/tables/fuel_kg_s/h0/w1/v8</property>
      <property value="0.171569">fsim/tables/fuel_kg_s/h0/w1/v9</property>
      <property value="0.0805179">fsim/tables/fuel_kg_s/h0/w2/v0</property>
      <property value="0.0805179">fsim/tables/fuel_kg_s/h0/w2/v1</property>
      <property value="0.172278">fsim/tables/fuel_kg_s/h0/w2/v10</property>
      <property value="0.186586">fsim/tables/fuel_kg_s/h0/w2/v11</property>
      <property value="0.201758">fsim/tables/fuel_kg_s/h0/w2/v12</property>
      <property value="0.217965">fsim/tables/fuel_kg_s/h0/w2/v13</property>
      <property value="0.235414">fsim/tables/fuel_kg_s/h0/w2/v14</property>
      <property value="0.25434">fsim/tables/fuel_kg_s/h0/w2/v15</property>
      <property value="0.0857176">fsim/tables/fuel_kg_s/h0/w2/v2</property>
      <property value="0.0938278">fsim/tables/fuel_kg_s/h0/w2/v3</property>
      <property value="0.102968">fsim/tables/fuel_kg_s/h0/w2/v4</property>
      <property value="0.112759">fsim/tables/fuel_kg_s/h0/w2/v5</property>
      <property value="0.123656">fsim/tables/fuel_kg_s/h0/w2/v6</property>
      <property value="0.135072">fsim/tables/fuel_kg_s/h0/w2/v7</property>
      <property value="0.14688">fsim/tables/fuel_kg_s/h0/w2/v8</property>
      <property value="0.159167">fsim/tables/fuel_kg_s/h0/w2/v9</property>
      <property value="0.0805179">fsim/tables/fuel_kg_s/h0/w3/v0</property>
      <property value="0.0805179">fsim/tables/fuel_kg_s/h0/w3/v1</property>
      <property value="0.17181">fsim/tables/fuel_kg_s/h0/w3/v10</property>
      <property value="0.185633">fsim/tables/fuel_kg_s/h0/w3/v11</property>
      <property value="0.200229">fsim/tables/fuel_kg_s/h0/w3/v12</property>
      <property value="0.216605">fsim/tables/fuel_kg_s/h0/w3/v13</property>
      <property value="0.234269">fsim/tables/fuel_kg_s/h0/w3/v14</property>
      <property value="0.253432">fsim/tables/fuel_kg_s/h0/w3/v15</property>
      <property value="0.0856054">fsim/tables/fuel_kg_s/h0/w3/v2</property>
      <property value="0.0939906">fsim/tables/fuel_kg_s/h0/w3/v3</property>
      <property value="0.102952">fsim/tables/fuel_kg_s/h0/w3/v4</property>
      <property value="0.112666">fsim/tables/fuel_kg_s/h0/w3/v5</property>
      <property value="0.123276">fsim/tables/fuel_kg_s/h0/w3/v6</property>
      <property value="0.134088">fsim/tables/fuel_kg_s/h0/w3/v7</property>
      <property value="0.146111">fsim/tables/fuel_kg_s/h0/w3/v8</property>
      <property value="0.158657">fsim/tables/fuel_kg_s/h0/w3/v9</property>
      <property value="0.0805179">fsim/tables/fuel_kg_s/h1/w0/v0</property>
      <property value="0.0805179">fsim/tables/fuel_kg_s/h1/w0/v1</property>
      <property value="0.13582">fsim/tables/fuel_kg_s/h1/w0/v10</property>
      <property value="0.149281">fsim/tables/fuel_kg_s/h1/w0/v11</property>
      <property value="0.163645">fsim/tables/fuel_kg_s/h1/w0/v12</property>
      <property value="0.179162">fsim/tables/fuel_kg_s/h1/w0/v13</property>
      <property value="0.195962">fsim/tables/fuel_kg_s/h1/w0/v14</property>
      <property value="0.214248">fsim/tables/fuel_kg_s/h1/w0/v15</property>
      <property value="0.0805179">fsim/tables/fuel_kg_s/h1/w0/v2</property>
      <property value="0.0805179">fsim/tables/fuel_kg_s/h1/w0/v3</property>
      <property value="0.0805179">fsim/tables/fuel_kg_s/h1/w0/v4</property>
      <property value="0.0813426">fsim/tables/fuel_kg_s/h1/w0/v5</property>
      <property value="0.0906062">fsim/tables/fuel_kg_s/h1/w0/v6</property>
      <property value="0.10089">fsim/tables/fuel_kg_s/h1/w0/v7</property>
      <property value="0.111657">fsim/tables/fuel_kg_s/h1/w0/v8</property>
      <property value="0.123123">fsim/tables/fuel_kg_s/h1/w0/v9</property>
      <property value="0.0805179">fsim/tables/fuel_kg_s/h1/w1/v0</property>
      <property value="0.0805179">fsim/tables/fuel_kg_s/h1/w1/v1</property>
      <property value="0.141299">fsim/tables/fuel_kg_s/h1/w1/v10</property>
      <property value="0.153661">fsim/tables/fuel_kg_s/h1/w1/v11</property>
      <property value="0.1668">fsim/tables/fuel_kg_s/h1/w1/v12</property>
      <property value="0.180901">fsim/tables/fuel_kg_s/h1/w1/v13</property>
      <property value="0.196034">fsim/tables/fuel_kg_s/h1/w1/v14</property>
      <property value="0.212351">fsim/tables/fuel_kg_s/h1/w1/v15</property>
      <property value="0.0805179">fsim/tables/fuel_kg_s/h1/w1/v2</property>
      <property value="0.0805179">fsim/tables/fuel_kg_s/h1/w1/v3</property>
      <property value="0.0829418">fsim/tables/fuel_kg_s/h1/w1/v4</property>
      <property value="0.0907562">fsim/tables/fuel_kg_s/h1/w1/v5</property>
      <property value="0.0996442">fsim/tables/fuel_kg_s/h1/w1/v6</property>
      <property value="0.109237">fsim/tables/fuel_kg_s/h1/w1/v7</property>
      <property value="0.119303">fsim/tables/fuel_kg_s/h1/w1/v8</property>
      <property value="0.129917">fsim/tables/fuel_kg_s/h1/w1/v9</property>
      <property value="0.0805179">fsim/tables/fuel_kg_s/h1/w2/v0</property>
      <property value="0.0805179">fsim/tables/fuel_kg_s/h1/w2/v1</property>
      <property value="0.141205">fsim/tables/fuel_kg_s/h1/w2/v10</property>
      <property value="0.153021">fsim/tables/fuel_kg_s/h1/w2/v11</property>
      <property value="0.166174">fsim/tables/fuel_kg_s/h1/w2/v12</property>
      <property value="0.180338">fsim/tables/fuel_kg_s/h1/w2/v13</property>
      <property value="0.195528">fsim/tables/fuel_kg_s/h1/w2/v14</property>
      <property value="0.211896">fsim/tables/fuel_kg_s/h1/w2/v15</property>
      <property value="0.0805179">fsim/tables/fuel_kg_s/h1/w2/v2</property>
      <property value="0.0805179">fsim/tables/fuel_kg_s/h1/w2/v3</property>
      <property value="0.0834997">fsim/tables/fuel_kg_s/h1/w2/v4</property>
      <property value="0.0914358">fsim/tables/fuel_kg_s/h1/w2/v5</property>
      <property value="0.0997932">fsim/tables/fuel_kg_s/h1/w2/v6</property>
      <property value="0.109131">fsim/tables/fuel_kg_s/h1/w2/v7</property>
      <property value="0.119294">fsim/tables/fuel_kg_s/h1/w2/v8</property>
      <property value="0.129991">fsim/tables/fuel_kg_s/h1/w2/v9</property>
      <property value="0.0805179">fsim/tables/fuel_kg_s/h1/w3/v0</property>
      <property value="0.0805179">fsim/tables/fuel_kg_s/h1/w3/v1</property>
      <property value="0.141851">fsim/tables/fuel_kg_s/h1/w3/v10</property>
      <property value="0.15374">fsim/tables/fuel_kg_s/h1/w3/v11</property>
      <property value="0.166329">fsim/tables/fuel_kg_s/h1/w3/v12</property>
      <property value="0.179777">fsim/tables/fuel_kg_s/h1/w3/v13</property>
      <property value="0.194695">fsim/tables/fuel_kg_s/h1/w3/v14</property>
      <property value="0.211006">fsim/tables/fuel_kg_s/h1/w3/v15</property>
      <property value="0.0805179">fsim/tables/fuel_kg_s/h1/w3/v2</property>
      <property value="0.0805179">fsim/tables/fuel_kg_s/h1/w3/v3</property>
      <property value="0.0851968">fsim/tables/fuel_kg_s/h1/w3/v4</property>
      <property value="0.0928872">fsim/tables/fuel_kg_s/h1/w3/v5</property>
      <property value="0.101123">fsim/tables/fuel_kg_s/h1/w3/v6</property>
      <property value="0.110307">fsim/tables/fuel_kg_s/h1/w3/v7</property>
      <property value="0.11989">fsim/tables/fuel_kg_s/h1/w3/v8</property>
      <property value="0.130533">fsim/tables/fuel_kg_s/h1/w3/v9</property>
      <property value="0.0805179">fsim/tables/fuel_kg_s/h2/w0/v0</property>
      <property value="0.0805179">fsim/tables/fuel_kg_s/h2/w0/v1</property>
      <property value="0.0984228">fsim/tables/fuel_kg_s/h2/w0/v10</property>
      <property value="0.106621">fsim/tables/fuel_kg_s/h2/w0/v11</property>
      <property value="0.115757">fsim/tables/fuel_kg_s/h2/w0/v12</property>
      <property value="0.125597">fsim/tables/fuel_kg_s/h2/w0/v13</property>
      <property value="0.136157">fsim/tables/fuel_kg_s/h2/w0/v14</property>
      <property value="0.147537">fsim/tables/fuel_kg_s/h2/w0/v15</property>
      <property value="0.0805179">fsim/tables/fuel_kg_s/h2/w0/v2</property>
      <property value="0.0805179">fsim/tables/fuel_kg_s/h2/w0/v3</property>
      <property value="0.0805179">fsim/tables/fuel_kg_s/h2/w0/v4</property>
      <property value="0.0805179">fsim/tables/fuel_kg_s/h2/w0/v5</property>
      <property value="0.0805179">fsim/tables/fuel_kg_s/h2/w0/v6</property>
      <property value="0.0805179">fsim/tables/fuel_kg_s/h2/w0/v7</property>
      <property value="0.0833158">fsim/tables/fuel_kg_s/h2/w0/v8</property>
      <property value="0.0906669">fsim/tables/fuel_kg_s/h2/w0/v9</property>
      <property value="0.0805179">fsim/tables/fuel_kg_s/h2/w1/v0</property>
      <property value="0.0805179">fsim/tables/fuel_kg_s/h2/w1/v1</property>
      <property value="0.098828">fsim/tables/fuel_kg_s/h2/w1/v10</property>
      <property value="0.107005">fsim/tables/fuel_kg_s/h2/w1/v11</property>
      <property value="0.115689">fsim/tables/fuel_kg_s/h2/w1/v12</property>
      <property value="0.125223">fsim/tables/fuel_kg_s/h2/w1/v13</property>
      <property value="0.135717">fsim/tables/fuel_kg_s/h2/w1/v14</property>
      <property value="0.147014">fsim/tables/fuel_kg_s/h2/w1/v15</property>
      <property value="0.0805179">fsim/tables/fuel_kg_s/h2/w1/v2</property>
      <property value="0.0805179">fsim/tables/fuel_kg_s/h2/w1/v3</property>
      <property value="0.0805179">fsim/tables/fuel_kg_s/h2/w1/v4</property>
      <property value="0.0805179">fsim/tables/fuel_kg_s/h2/w1/v5</property>
      <property value="0.0805179">fsim/tables/fuel_kg_s/h2/w1/v6</property>
      <property value="0.0805179">fsim/tables/fuel_kg_s/h2/w1/v7</property>
      <property value="0.0837553">fsim/tables/fuel_kg_s/h2/w1/v8</property>
      <property value="0.0910885">fsim/tables/fuel_kg_s/h2/w1/v9</property>
      <property value="0.0805179">fsim/tables/fuel_kg_s/h2/w2/v0</property>
      <property value="0.0805179">fsim/tables/fuel_kg_s/h2/w2/v1</property>
      <property value="0.0993972">fsim/tables/fuel_kg_s/h2/w2/v10</property>
      <property value="0.107531">fsim/tables/fuel_kg_s/h2/w2/v11</property>
      <property value="0.116166">fsim/tables/fuel_kg_s/h2/w2/v12</property>
      <property value="0.125372">fsim/tables/fuel_kg_s/h2/w2/v13</property>
      <property value="0.135209">fsim/tables/fuel_kg_s/h2/w2/v14</property>
      <property value="0.146295">fsim/tables/fuel_kg_s/h2/w2/v15</property>
      <property value="0.0805179">fsim/tables/fuel_kg_s/h2/w2/v2</property>
      <property value="0.0805179">fsim/tables/fuel_kg_s/h2/w2/v3</property>
      <property value="0.0805179">fsim/tables/fuel_kg_s/h2/w2/v4</property>
      <property value="0.0805179">fsim/tables/fuel_kg_s/h2/w2/v5</property>
      <property value="0.0805179">fsim/tables/fuel_kg_s/h2/w2/v6</property>
      <property value="0.0805179">fsim/tables/fuel_kg_s/h2/w2/v7</property>
      <property value="0.0848421">fsim/tables/fuel_kg_s/h2/w2/v8</property>
      <property value="0.0916879">fsim/tables/fuel_kg_s/h2/w2/v9</property>
      <property value="0.0805179">fsim/tables/fuel_kg_s/h2/w3/v0</property>
      <property value="0.0805179">fsim/tables/fuel_kg_s/h2/w3/v1</property>
      <property value="0.100571">fsim/tables/fuel_kg_s/h2/w3/v10</property>
      <property value="0.108067">fsim/tables/fuel_kg_s/h2/w3/v11</property>
      <property value="0.116591">fsim/tables/fuel_kg_s/h2/w3/v12</property>
      <property value="0.125576">fsim/tables/fuel_kg_s/h2/w3/v13</property>
      <property value="0.13516">fsim/tables/fuel_kg_s/h2/w3/v14</property>
      <property value="0.145405">fsim/tables/fuel_kg_s/h2/w3/v15</property>
      <property value="0.0805179">fsim/tables/fuel_kg_s/h2/w3/v2</property>
      <property value="0.0805179">fsim/tables/fuel_kg_s/h2/w3/v3</property>
      <property value="0.0805179">fsim/tables/fuel_kg_s/h2/w3/v4</property>
      <property value="0.0805179">fsim/tables/fuel_kg_s/h2/w3/v5</property>
      <property value="0.0805179">fsim/tables/fuel_kg_s/h2/w3/v6</property>
      <property value="0.0809631">fsim/tables/fuel_kg_s/h2/w3/v7</property>
      <property value="0.0866783">fsim/tables/fuel_kg_s/h2/w3/v8</property>
      <property value="0.0934594">fsim/tables/fuel_kg_s/h2/w3/v9</property>
      <property value="0.0805179">fsim/tables/fuel_kg_s/h3/w0/v0</property>
      <property value="0.0805179">fsim/tables/fuel_kg_s/h3/w0/v1</property>
      <property value="0.0805179">fsim/tables/fuel_kg_s/h3/w0/v10</property>
      <property value="0.0805179">fsim/tables/fuel_kg_s/h3/w0/v11</property>
      <property value="0.0805179">fsim/tables/fuel_kg_s/h3/w0/v12</property>
      <property value="0.0829633">fsim/tables/fuel_kg_s/h3/w0/v13</property>
      <property value="0.0892877">fsim/tables/fuel_kg_s/h3/w0/v14</property>
      <property value="0.0961957">fsim/tables/fuel_kg_s/h3/w0/v15</property>
      <property value="0.0805179">fsim/tables/fuel_kg_s/h3/w0/v2</property>
      <property value="0.0805179">fsim/tables/fuel_kg_s/h3/w0/v3</property>
      <property value="0.0805179">fsim/tables/fuel_kg_s/h3/w0/v4</property>
      <property value="0.0805179">fsim/tables/fuel_kg_s/h3/w0/v5</property>
      <property value="0.0805179">fsim/tables/fuel_kg_s/h3/w0/v6</property>
      <property value="0.0805179">fsim/tables/fuel_kg_s/h3/w0/v7</property>
      <property value="0.0805179">fsim/tables/fuel_kg_s/h3/w0/v8</property>
      <property value="0.0805179">fsim/tables/fuel_kg_s/h3/w0/v9</property>
      <property value="0.0805179">fsim/tables/fuel_kg_s/h3/w1/v0</property>
      <property value="0.0805179">fsim/tables/fuel_kg_s/h3/w1/v1</property>
      <property value="0.0805179">fsim/tables/fuel_kg_s/h3/w1/v10</property>
      <property value="0.0805179">fsim/tables/fuel_kg_s/h3/w1/v11</property>
      <property value="0.0805179">fsim/tables/fuel_kg_s/h3/w1/v12</property>
      <property value="0.0831437">fsim/tables/fuel_kg_s/h3/w1/v13</property>
      <property value="0.0893207">fsim/tables/fuel_kg_s/h3/w1/v14</property>
      <property value="0.095949">fsim/tables/fuel_kg_s/h3/w1/v15</property>
      <property value="0.0805179">fsim/tables/fuel_kg_s/h3/w1/v2</property>
      <property value="0.0805179">fsim/tables/fuel_kg_s/h3/w1/v3</property>
      <property value="0.0805179">fsim/tables/fuel_kg_s/h3/w1/v4</property>
      <property value="0.0805179">fsim/tables/fuel_kg_s/h3/w1/v5</property>
      <property value="0.0805179">fsim/tables/fuel_kg_s/h3/w1/v6</property>
      <property value="0.0805179">fsim/tables/fuel_kg_s/h3/w1/v7</property>
      <property value="0.0805179">fsim/tables/fuel_kg_s/h3/w1/v8</property>
      <property value="0.0805179">fsim/tables/fuel_kg_s/h3/w1/v9</property>
      <property value="0.0805179">fsim/tables/fuel_kg_s/h3/w2/v0</property>
      <property value="0.0805179">fsim/tables/fuel_kg_s/h3/w2/v1</property>
      <property value="0.0805179">fsim/tables/fuel_kg_s/h3/w2/v10</property>
      <property value="0.0805179">fsim/tables/fuel_kg_s/h3/w2/v11</property>
      <property value="0.0805179">fsim/tables/fuel_kg_s/h3/w2/v12</property>
      <property value="0.0828923">fsim/tables/fuel_kg_s/h3/w2/v13</property>
      <property value="0.0888189">fsim/tables/fuel_kg_s/h3/w2/v14</property>
      <property value="0.095163">fsim/tables/fuel_kg_s/h3/w2/v15</property>
      <property value="0.0805179">fsim/tables/fuel_kg_s/h3/w2/v2</property>
      <property value="0.0805179">fsim/tables/fuel_kg_s/h3/w2/v3</property>
      <property value="0.0805179">fsim/tables/fuel_kg_s/h3/w2/v4</property>
      <property value="0.0805179">fsim/tables/fuel_kg_s/h3/w2/v5</property>
      <property value="0.0805179">fsim/tables/fuel_kg_s/h3/w2/v6</property>
      <property value="0.0805179">fsim/tables/fuel_kg_s/h3/w2/v7</property>
      <property value="0.0805179">fsim/tables/fuel_kg_s/h3/w2/v8</property>
      <property value="0.0805179">fsim/tables/fuel_kg_s/h3/w2/v9</property>
      <property value="0.0805179">fsim/tables/fuel_kg_s/h3/w3/v0</property>
      <property value="0.0805179">fsim/tables/fuel_kg_s/h3/w3/v1</property>
      <property value="0.0805179">fsim/tables/fuel_kg_s/h3/w3/v10</property>
      <property value="0.0805179">fsim/tables/fuel_kg_s/h3/w3/v11</property>
      <property value="0.0805179">fsim/tables/fuel_kg_s/h3/w3/v12</property>
      <property value="0.0825641">fsim/tables/fuel_kg_s/h3/w3/v13</property>
      <property value="0.0877672">fsim/tables/fuel_kg_s/h3/w3/v14</property>
      <property value="0.0929451">fsim/tables/fuel_kg_s/h3/w3/v15</property>
      <property value="0.0805179">fsim/tables/fuel_kg_s/h3/w3/v2</property>
      <property value="0.0805179">fsim/tables/fuel_kg_s/h3/w3/v3</property>
      <property value="0.0805179">fsim/tables/fuel_kg_s/h3/w3/v4</property>
      <property value="0.0805179">fsim/tables/fuel_kg_s/h3/w3/v5</property>
      <property value="0.0805179">fsim/tables/fuel_kg_s/h3/w3/v6</property>
      <property value="0.0805179">fsim/tables/fuel_kg_s/h3/w3/v7</property>
      <property value="0.0805179">fsim/tables/fuel_kg_s/h3/w3/v8</property>
      <property value="0.0805179">fsim/tables/fuel_kg_s/h3/w3/v9</property>
      <property value="0.0805179">fsim/tables/fuel_kg_s/h4/w0/v0</property>
      <property value="0.0805179">fsim/tables/fuel_kg_s/h4/w0/v1</property>
      <property value="0.0805179">fsim/tables/fuel_kg_s/h4/w0/v10</property>
      <property value="0.0805179">fsim/tables/fuel_kg_s/h4/w0/v11</property>
      <property value="0.0805179">fsim/tables/fuel_kg_s/h4/w0/v12</property>
      <property value="0.0805179">fsim/tables/fuel_kg_s/h4/w0/v13</property>
      <property value="0.0805179">fsim/tables/fuel_kg_s/h4/w0/v14</property>
      <property value="0.0805179">fsim/tables/fuel_kg_s/h4/w0/v15</property>
      <property value="0.0805179">fsim/tables/fuel_kg_s/h4/w0/v2</property>
      <property value="0.0805179">fsim/tables/fuel_kg_s/h4/w0/v3</property>
      <property value="0.0805179">fsim/tables/fuel_kg_s/h4/w0/v4</property>
      <property value="0.0805179">fsim/tables/fuel_kg_s/h4/w0/v5</property>
      <property value="0.0805179">fsim/tables/fuel_kg_s/h4/w0/v6</property>
      <property value="0.0805179">fsim/tables/fuel_kg_s/h4/w0/v7</property>
      <property value="0.0805179">fsim/tables/fuel_kg_s/h4/w0/v8</property>
      <property value="0.0805179">fsim/tables/fuel_kg_s/h4/w0/v9</property>
      <property value="0.0805179">fsim/tables/fuel_kg_s/h4/w1/v0</property>
      <property value="0.0805179">fsim/tables/fuel_kg_s/h4/w1/v1</property>
      <property value="0.0805179">fsim/tables/fuel_kg_s/h4/w1/v10</property>
      <property value="0.0805179">fsim/tables/fuel_kg_s/h4/w1/v11</property>
      <property value="0.0805179">fsim/tables/fuel_kg_s/h4/w1/v12</property>
      <property value="0.0805179">fsim/tables/fuel_kg_s/h4/w1/v13</property>
      <property value="0.0805179">fsim/tables/fuel_kg_s/h4/w1/v14</property>
      <property value="0.0805179">fsim/tables/fuel_kg_s/h4/w1/v15</property>
      <property value="0.0805179">fsim/tables/fuel_kg_s/h4/w1/v2</property>
      <property value="0.0805179">fsim/tables/fuel_kg_s/h4/w1/v3</property>
      <property value="0.0805179">fsim/tables/fuel_kg_s/h4/w1/v4</property>
      <property value="0.0805179">fsim/tables/fuel_kg_s/h4/w1/v5</property>
      <property value="0.0805179">fsim/tables/fuel_kg_s/h4/w1/v6</property>
      <property value="0.0805179">fsim/tables/fuel_kg_s/h4/w1/v7</property>
      <property value="0.0805179">fsim/tables/fuel_kg_s/h4/w1/v8</property>
      <property value="0.0805179">fsim/tables/fuel_kg_s/h4/w1/v9</property>
      <property value="0.0805179">fsim/tables/fuel_kg_s/h4/w2/v0</property>
      <property value="0.0805179">fsim/tables/fuel_kg_s/h4/w2/v1</property>
      <property value="0.0805179">fsim/tables/fuel_kg_s/h4/w2/v10</property>
      <property value="0.0805179">fsim/tables/fuel_kg_s/h4/w2/v11</property>
      <property value="0.0805179">fsim/tables/fuel_kg_s/h4/w2/v12</property>
      <property value="0.0805179">fsim/tables/fuel_kg_s/h4/w2/v13</property>
      <property value="0.0805179">fsim/tables/fuel_kg_s/h4/w2/v14</property>
      <property value="0.0805179">fsim/tables/fuel_kg_s/h4/w2/v15</property>
      <property value="0.0805179">fsim/tables/fuel_kg_s/h4/w2/v2</property>
      <property value="0.0805179">fsim/tables/fuel_kg_s/h4/w2/v3</property>
      <property value="0.0805179">fsim/tables/fuel_kg_s/h4/w2/v4</property>
      <property value="0.0805179">fsim/tables/fuel_kg_s/h4/w2/v5</property>
      <property value="0.0805179">fsim/tables/fuel_kg_s/h4/w2/v6</property>
      <property value="0.0805179">fsim/tables/fuel_kg_s/h4/w2/v7</property>
      <property value="0.0805179">fsim/tables/fuel_kg_s/h4/w2/v8</property>
      <property value="0.0805179">fsim/tables/fuel_kg_s/h4/w2/v9</property>
      <property value="0.0805179">fsim/tables/fuel_kg_s/h4/w3/v0</property>
      <property value="0.0805179">fsim/tables/fuel_kg_s/h4/w3/v1</property>
      <property value="0.0805179">fsim/tables/fuel_kg_s/h4/w3/v10</property>
      <property value="0.0805179">fsim/tables/fuel_kg_s/h4/w3/v11</property>
      <property value="0.0805179">fsim/tables/fuel_kg_s/h4/w3/v12</property>
      <property value="0.0805179">fsim/tables/fuel_kg_s/h4/w3/v13</property>
      <property value="0.0805179">fsim/tables/fuel_kg_s/h4/w3/v14</property>
      <property value="0.0805179">fsim/tables/fuel_kg_s/h4/w3/v15</property>
      <property value="0.0805179">fsim/tables/fuel_kg_s/h4/w3/v2</property>
      <property value="0.0805179">fsim/tables/fuel_kg_s/h4/w3/v3</property>
      <property value="0.0805179">fsim/tables/fuel_kg_s/h4/w3/v4</property>
      <property value="0.0805179">fsim/tables/fuel_kg_s/h4/w3/v5</property>
      <property value="0.0805179">fsim/tables/fuel_kg_s/h4/w3/v6</property>
      <property value="0.0805179">fsim/tables/fuel_kg_s/h4/w3/v7</property>
      <property value="0.0805179">fsim/tables/fuel_kg_s/h4/w3/v8</property>
      <property value="0.0805179">fsim/tables/fuel_kg_s/h4/w3/v9</property>
      <property value="0.0805179">fsim/tables/fuel_kg_s/h5/w0/v0</property>
      <property value="0.0805179">fsim/tables/fuel_kg_s/h5/w0/v1</property>
      <property value="0.0805179">fsim/tables/fuel_kg_s/h5/w0/v10</property>
      <property value="0.0805179">fsim/tables/fuel_kg_s/h5/w0/v11</property>
      <property value="0.0805179">fsim/tables/fuel_kg_s/h5/w0/v12</property>
      <property value="0.0805179">fsim/tables/fuel_kg_s/h5/w0/v13</property>
      <property value="0.0805179">fsim/tables/fuel_kg_s/h5/w0/v14</property>
      <property value="0.0805179">fsim/tables/fuel_kg_s/h5/w0/v15</property>
      <property value="0.0805179">fsim/tables/fuel_kg_s/h5/w0/v2</property>
      <property value="0.0805179">fsim/tables/fuel_kg_s/h5/w0/v3</property>
      <property value="0.0805179">fsim/tables/fuel_kg_s/h5/w0/v4</property>
      <property value="0.0805179">fsim/tables/fuel_kg_s/h5/w0/v5</property>
      <property value="0.0805179">fsim/tables/fuel_kg_s/h5/w0/v6</property>
      <property value="0.0805179">fsim/tables/fuel_kg_s/h5/w0/v7</property>
      <property value="0.0805179">fsim/tables/fuel_kg_s/h5/w0/v8</property>
      <property value="0.0805179">fsim/tables/fuel_kg_s/h5/w0/v9</property>
      <property value="0.0805179">fsim/tables/fuel_kg_s/h5/w1/v0</property>
      <property value="0.0805179">fsim/tables/fuel_kg_s/h5/w1/v1</property>
      <property value="0.0805179">fsim/tables/fuel_kg_s/h5/w1/v10</property>
      <property value="0.0805179">fsim/tables/fuel_kg_s/h5/w1/v11</property>
      <property value="0.0805179">fsim/tables/fuel_kg_s/h5/w1/v12</property>
      <property value="0.0805179">fsim/tables/fuel_kg_s/h5/w1/v13</property>
      <property value="0.0805179">fsim/tables/fuel_kg_s/h5/w1/v14</property>
      <property value="0.0805179">fsim/tables/fuel_kg_s/h5/w1/v15</property>
      <property value="0.0805179">fsim/tables/fuel_kg_s/h5/w1/v2</property>
      <property value="0.0805179">fsim/tables/fuel_kg_s/h5/w1/v3</property>
      <property value="0.0805179">fsim/tables/fuel_kg_s/h5/w1/v4</property>
      <property value="0.0805179">fsim/tables/fuel_kg_s/h5/w1/v5</property>
      <property value="0.0805179">fsim/tables/fuel_kg_s/h5/w1/v6</property>
      <property value="0.0805179">fsim/tables/fuel_kg_s/h5/w1/v7</property>
      <property value="0.0805179">fsim/tables/fuel_kg_s/h5/w1/v8</property>
      <property value="0.0805179">fsim/tables/fuel_kg_s/h5/w1/v9</property>
      <property value="0.0805179">fsim/tables/fuel_kg_s/h5/w2/v0</property>
      <property value="0.0805179">fsim/tables/fuel_kg_s/h5/w2/v1</property>
      <property value="0.0805179">fsim/tables/fuel_kg_s/h5/w2/v10</property>
      <property value="0.0805179">fsim/tables/fuel_kg_s/h5/w2/v11</property>
      <property value="0.0805179">fsim/tables/fuel_kg_s/h5/w2/v12</property>
      <property value="0.0805179">fsim/tables/fuel_kg_s/h5/w2/v13</property>
      <property value="0.0805179">fsim/tables/fuel_kg_s/h5/w2/v14</property>
      <property value="0.0805179">fsim/tables/fuel_kg_s/h5/w2/v15</property>
      <property value="0.0805179">fsim/tables/fuel_kg_s/h5/w2/v2</property>
      <property value="0.0805179">fsim/tables/fuel_kg_s/h5/w2/v3</property>
      <property value="0.0805179">fsim/tables/fuel_kg_s/h5/w2/v4</property>
      <property value="0.0805179">fsim/tables/fuel_kg_s/h5/w2/v5</property>
      <property value="0.0805179">fsim/tables/fuel_kg_s/h5/w2/v6</property>
      <property value="0.0805179">fsim/tables/fuel_kg_s/h5/w2/v7</property>
      <property value="0.0805179">fsim/tables/fuel_kg_s/h5/w2/v8</property>
      <property value="0.0805179">fsim/tables/fuel_kg_s/h5/w2/v9</property>
      <property value="0.0805179">fsim/tables/fuel_kg_s/h5/w3/v0</property>
      <property value="0.0805179">fsim/tables/fuel_kg_s/h5/w3/v1</property>
      <property value="0.0805179">fsim/tables/fuel_kg_s/h5/w3/v10</property>
      <property value="0.0805179">fsim/tables/fuel_kg_s/h5/w3/v11</property>
      <property value="0.0805179">fsim/tables/fuel_kg_s/h5/w3/v12</property>
      <property value="0.0805179">fsim/tables/fuel_kg_s/h5/w3/v13</property>
      <property value="0.0805179">fsim/tables/fuel_kg_s/h5/w3/v14</property>
      <property value="0.0805179">fsim/tables/fuel_kg_s/h5/w3/v15</property>
      <property value="0.0805179">fsim/tables/fuel_kg_s/h5/w3/v2</property>
      <property value="0.0805179">fsim/tables/fuel_kg_s/h5/w3/v3</property>
      <property value="0.0805179">fsim/tables/fuel_kg_s/h5/w3/v4</property>
      <property value="0.0805179">fsim/tables/fuel_kg_s/h5/w3/v5</property>
      <property value="0.0805179">fsim/tables/fuel_kg_s/h5/w3/v6</property>
      <property value="0.0805179">fsim/tables/fuel_kg_s/h5/w3/v7</property>
      <property value="0.0805179">fsim/tables/fuel_kg_s/h5/w3/v8</property>
      <property value="0.0805179">fsim/tables/fuel_kg_s/h5/w3/v9</property>
      <property value="0.0805179">fsim/tables/fuel_kg_s/h6/w0/v0</property>
      <property value="0.0805179">fsim/tables/fuel_kg_s/h6/w0/v1</property>
      <property value="0.0805179">fsim/tables/fuel_kg_s/h6/w0/v10</property>
      <property value="0.0805179">fsim/tables/fuel_kg_s/h6/w0/v11</property>
      <property value="0.0805179">fsim/tables/fuel_kg_s/h6/w0/v12</property>
      <property value="0.0805179">fsim/tables/fuel_kg_s/h6/w0/v13</property>
      <property value="0.0805179">fsim/tables/fuel_kg_s/h6/w0/v14</property>
      <property value="0.0805179">fsim/tables/fuel_kg_s/h6/w0/v15</property>
      <property value="0.0805179">fsim/tables/fuel_kg_s/h6/w0/v2</property>
      <property value="0.0805179">fsim/tables/fuel_kg_s/h6/w0/v3</property>
      <property value="0.0805179">fsim/tables/fuel_kg_s/h6/w0/v4</property>
      <property value="0.0805179">fsim/tables/fuel_kg_s/h6/w0/v5</property>
      <property value="0.0805179">fsim/tables/fuel_kg_s/h6/w0/v6</property>
      <property value="0.0805179">fsim/tables/fuel_kg_s/h6/w0/v7</property>
      <property value="0.0805179">fsim/tables/fuel_kg_s/h6/w0/v8</property>
      <property value="0.0805179">fsim/tables/fuel_kg_s/h6/w0/v9</property>
      <property value="0.0805179">fsim/tables/fuel_kg_s/h6/w1/v0</property>
      <property value="0.0805179">fsim/tables/fuel_kg_s/h6/w1/v1</property>
      <property value="0.0805179">fsim/tables/fuel_kg_s/h6/w1/v10</property>
      <property value="0.0805179">fsim/tables/fuel_kg_s/h6/w1/v11</property>
      <property value="0.0805179">fsim/tables/fuel_kg_s/h6/w1/v12</property>
      <property value="0.0805179">fsim/tables/fuel_kg_s/h6/w1/v13</property>
      <property value="0.0805179">fsim/tables/fuel_kg_s/h6/w1/v14</property>
      <property value="0.0805179">fsim/tables/fuel_kg_s/h6/w1/v15</property>
      <property value="0.0805179">fsim/tables/fuel_kg_s/h6/w1/v2</property>
      <property value="0.0805179">fsim/tables/fuel_kg_s/h6/w1/v3</property>
      <property value="0.0805179">fsim/tables/fuel_kg_s/h6/w1/v4</property>
      <property value="0.0805179">fsim/tables/fuel_kg_s/h6/w1/v5</property>
      <property value="0.0805179">fsim/tables/fuel_kg_s/h6/w1/v6</property>
      <property value="0.0805179">fsim/tables/fuel_kg_s/h6/w1/v7</property>
      <property value="0.0805179">fsim/tables/fuel_kg_s/h6/w1/v8</property>
      <property value="0.0805179">fsim/tables/fuel_kg_s/h6/w1/v9</property>
      <property value="0.0805179">fsim/tables/fuel_kg_s/h6/w2/v0</property>
      <property value="0.0805179">fsim/tables/fuel_kg_s/h6/w2/v1</property>
      <property value="0.0805179">fsim/tables/fuel_kg_s/h6/w2/v10</property>
      <property value="0.0805179">fsim/tables/fuel_kg_s/h6/w2/v11</property>
      <property value="0.0805179">fsim/tables/fuel_kg_s/h6/w2/v12</property>
      <property value="0.0805179">fsim/tables/fuel_kg_s/h6/w2/v13</property>
      <property value="0.0805179">fsim/tables/fuel_kg_s/h6/w2/v14</property>
      <property value="0.0805179">fsim/tables/fuel_kg_s/h6/w2/v15</property>
      <property value="0.0805179">fsim/tables/fuel_kg_s/h6/w2/v2</property>
      <property value="0.0805179">fsim/tables/fuel_kg_s/h6/w2/v3</property>
      <property value="0.0805179">fsim/tables/fuel_kg_s/h6/w2/v4</property>
      <property value="0.0805179">fsim/tables/fuel_kg_s/h6/w2/v5</property>
      <property value="0.0805179">fsim/tables/fuel_kg_s/h6/w2/v6</property>
      <property value="0.0805179">fsim/tables/fuel_kg_s/h6/w2/v7</property>
      <property value="0.0805179">fsim/tables/fuel_kg_s/h6/w2/v8</property>
      <property value="0.0805179">fsim/tables/fuel_kg_s/h6/w2/v9</property>
      <property value="21.4658">fsim/tables/max_climb_ms/h0/w0</property>
      <property value="18.3299">fsim/tables/max_climb_ms/h0/w1</property>
      <property value="15.4533">fsim/tables/max_climb_ms/h0/w2</property>
      <property value="11.9941">fsim/tables/max_climb_ms/h0/w3</property>
      <property value="18.4307">fsim/tables/max_climb_ms/h1/w0</property>
      <property value="15.7037">fsim/tables/max_climb_ms/h1/w1</property>
      <property value="13.2008">fsim/tables/max_climb_ms/h1/w2</property>
      <property value="10.1883">fsim/tables/max_climb_ms/h1/w3</property>
      <property value="12.835">fsim/tables/max_climb_ms/h2/w0</property>
      <property value="10.8873">fsim/tables/max_climb_ms/h2/w1</property>
      <property value="9.05358">fsim/tables/max_climb_ms/h2/w2</property>
      <property value="6.78214">fsim/tables/max_climb_ms/h2/w3</property>
      <property value="8.20659">fsim/tables/max_climb_ms/h3/w0</property>
      <property value="6.7928">fsim/tables/max_climb_ms/h3/w1</property>
      <property value="5.47072">fsim/tables/max_climb_ms/h3/w2</property>
      <property value="3.78096">fsim/tables/max_climb_ms/h3/w3</property>
      <property value="5.29463">fsim/tables/max_climb_ms/h4/w0</property>
      <property value="4.21769">fsim/tables/max_climb_ms/h4/w1</property>
      <property value="3.18033">fsim/tables/max_climb_ms/h4/w2</property>
      <property value="1.85573">fsim/tables/max_climb_ms/h4/w3</property>
      <property value="3.70886">fsim/tables/max_climb_ms/h5/w0</property>
      <property value="2.80141">fsim/tables/max_climb_ms/h5/w1</property>
      <property value="1.92553">fsim/tables/max_climb_ms/h5/w2</property>
      <property value="0.725001">fsim/tables/max_climb_ms/h5/w3</property>
      <property value="2.52909">fsim/tables/max_climb_ms/h6/w0</property>
      <property value="1.73555">fsim/tables/max_climb_ms/h6/w1</property>
      <property value="0.914357">fsim/tables/max_climb_ms/h6/w2</property>
      <property value="184.432">fsim/tables/max_tas_ms/h0/w0</property>
      <property value="184.845">fsim/tables/max_tas_ms/h0/w1</property>
      <property value="184.619">fsim/tables/max_tas_ms/h0/w2</property>
      <property value="185.274">fsim/tables/max_tas_ms/h0/w3</property>
      <property value="195.541">fsim/tables/max_tas_ms/h1/w0</property>
      <property value="195.185">fsim/tables/max_tas_ms/h1/w1</property>
      <property value="195.617">fsim/tables/max_tas_ms/h1/w2</property>
      <property value="196.337">fsim/tables/max_tas_ms/h1/w3</property>
      <property value="191.665">fsim/tables/max_tas_ms/h2/w0</property>
      <property value="192.033">fsim/tables/max_tas_ms/h2/w1</property>
      <property value="192.455">fsim/tables/max_tas_ms/h2/w2</property>
      <property value="192.851">fsim/tables/max_tas_ms/h2/w3</property>
      <property value="185.598">fsim/tables/max_tas_ms/h3/w0</property>
      <property value="185.855">fsim/tables/max_tas_ms/h3/w1</property>
      <property value="185.681">fsim/tables/max_tas_ms/h3/w2</property>
      <property value="185.229">fsim/tables/max_tas_ms/h3/w3</property>
      <property value="179.097">fsim/tables/max_tas_ms/h4/w0</property>
      <property value="178.874">fsim/tables/max_tas_ms/h4/w1</property>
      <property value="178.229">fsim/tables/max_tas_ms/h4/w2</property>
      <property value="174.356">fsim/tables/max_tas_ms/h4/w3</property>
      <property value="175.486">fsim/tables/max_tas_ms/h5/w0</property>
      <property value="174.227">fsim/tables/max_tas_ms/h5/w1</property>
      <property value="171.647">fsim/tables/max_tas_ms/h5/w2</property>
      <property value="159.223">fsim/tables/max_tas_ms/h5/w3</property>
      <property value="173.869">fsim/tables/max_tas_ms/h6/w0</property>
      <property value="171.321">fsim/tables/max_tas_ms/h6/w1</property>
      <property value="164.627">fsim/tables/max_tas_ms/h6/w2</property>
      <property value="85.462">fsim/tables/min_tas_ms/h0/w0</property>
      <property value="87.9942">fsim/tables/min_tas_ms/h0/w1</property>
      <property value="73.6286">fsim/tables/min_tas_ms/h0/w2</property>
      <property value="73.7029">fsim/tables/min_tas_ms/h0/w3</property>
      <property value="60.667">fsim/tables/min_tas_ms/h1/w0</property>
      <property value="74.3191">fsim/tables/min_tas_ms/h1/w1</property>
      <property value="74.9106">fsim/tables/min_tas_ms/h1/w2</property>
      <property value="77.174">fsim/tables/min_tas_ms/h1/w3</property>
      <property value="73.0345">fsim/tables/min_tas_ms/h2/w0</property>
      <property value="74.7466">fsim/tables/min_tas_ms/h2/w1</property>
      <property value="77.3787">fsim/tables/min_tas_ms/h2/w2</property>
      <property value="82.8233">fsim/tables/min_tas_ms/h2/w3</property>
      <property value="76.1664">fsim/tables/min_tas_ms/h3/w0</property>
      <property value="79.6883">fsim/tables/min_tas_ms/h3/w1</property>
      <property value="84.2241">fsim/tables/min_tas_ms/h3/w2</property>
      <property value="92.2283">fsim/tables/min_tas_ms/h3/w3</property>
      <property value="81.3084">fsim/tables/min_tas_ms/h4/w0</property>
      <property value="86.1515">fsim/tables/min_tas_ms/h4/w1</property>
      <property value="92.1114">fsim/tables/min_tas_ms/h4/w2</property>
      <property value="102.213">fsim/tables/min_tas_ms/h4/w3</property>
      <property value="87.1211">fsim/tables/min_tas_ms/h5/w0</property>
      <property value="93.0288">fsim/tables/min_tas_ms/h5/w1</property>
      <property value="99.9474">fsim/tables/min_tas_ms/h5/w2</property>
      <property value="112.485">fsim/tables/min_tas_ms/h5/w3</property>
      <property value="95.2046">fsim/tables/min_tas_ms/h6/w0</property>
      <property value="102.218">fsim/tables/min_tas_ms/h6/w1</property>
      <property value="110.61">fsim/tables/min_tas_ms/h6/w2</property>
      <property value="19.8944">fsim/tables/ps_full_ms/h0/w0/v0</property>
      <property value="20.9432">fsim/tables/ps_full_ms/h0/w0/v1</property>
      <property value="15.9764">fsim/tables/ps_full_ms/h0/w0/v10</property>
      <property value="14.0536">fsim/tables/ps_full_ms/h0/w0/v11</property>
      <property value="11.8288">fsim/tables/ps_full_ms/h0/w0/v12</property>
      <property value="9.28267">fsim/tables/ps_full_ms/h0/w0/v13</property>
      <property value="6.39894">fsim/tables/ps_full_ms/h0/w0/v14</property>
      <property value="3.16536">fsim/tables/ps_full_ms/h0/w0/v15</property>
      <property value="21.3189">fsim/tables/ps_full_ms/h0/w0/v2</property>
      <property value="21.4575">fsim/tables/ps_full_ms/h0/w0/v3</property>
      <property value="21.4174">fsim/tables/ps_full_ms/h0/w0/v4</property>
      <property value="21.1734">fsim/tables/ps_full_ms/h0/w0/v5</property>
      <property value="20.7102">fsim/tables/ps_full_ms/h0/w0/v6</property>
      <property value="19.9838">fsim/tables/ps_full_ms/h0/w0/v7</property>
      <property value="18.9485">fsim/tables/ps_full_ms/h0/w0/v8</property>
      <property value="17.6106">fsim/tables/ps_full_ms/h0/w0/v9</property>
      <property value="17.1259">fsim/tables/ps_full_ms/h0/w1/v0</property>
      <property value="17.9938">fsim/tables/ps_full_ms/h0/w1/v1</property>
      <property value="13.5051">fsim/tables/ps_full_ms/h0/w1/v10</property>
      <property value="11.8732">fsim/tables/ps_full_ms/h0/w1/v11</property>
      <property value="9.98907">fsim/tables/ps_full_ms/h0/w1/v12</property>
      <property value="7.84295">fsim/tables/ps_full_ms/h0/w1/v13</property>
      <property value="5.42073">fsim/tables/ps_full_ms/h0/w1/v14</property>
      <property value="2.71318">fsim/tables/ps_full_ms/h0/w1/v15</property>
      <property value="18.2597">fsim/tables/ps_full_ms/h0/w1/v2</property>
      <property value="18.3296">fsim/tables/ps_full_ms/h0/w1/v3</property>
      <property value="18.2444">fsim/tables/ps_full_ms/h0/w1/v4</property>
      <property value="17.9896">fsim/tables/ps_full_ms/h0/w1/v5</property>
      <property value="17.5541">fsim/tables/ps_full_ms/h0/w1/v6</property>
      <property value="16.925">fsim/tables/ps_full_ms/h0/w1/v7</property>
      <property value="16.0599">fsim/tables/ps_full_ms/h0/w1/v8</property>
      <property value="14.8987">fsim/tables/ps_full_ms/h0/w1/v9</property>
      <property value="11.8568">fsim/tables/ps_full_ms/h0/w2/v0</property>
      <property value="14.0569">fsim/tables/ps_full_ms/h0/w2/v1</property>
      <property value="12.5349">fsim/tables/ps_full_ms/h0/w2/v10</property>
      <property value="11.1302">fsim/tables/ps_full_ms/h0/w2/v11</property>
      <property value="9.44311">fsim/tables/ps_full_ms/h0/w2/v12</property>
      <property value="7.46713">fsim/tables/ps_full_ms/h0/w2/v13</property>
      <property value="5.18747">fsim/tables/ps_full_ms/h0/w2/v14</property>
      <property value="2.58643">fsim/tables/ps_full_ms/h0/w2/v15</property>
      <property value="14.6159">fsim/tables/ps_full_ms/h0/w2/v2</property>
      <property value="15.0883">fsim/tables/ps_full_ms/h0/w2/v3</property>
      <property value="15.3554">fsim/tables/ps_full_ms/h0/w2/v4</property>
      <property value="15.4528">fsim/tables/ps_full_ms/h0/w2/v5</property>
      <property value="15.3365">fsim/tables/ps_full_ms/h0/w2/v6</property>
      <property value="14.9811">fsim/tables/ps_full_ms/h0/w2/v7</property>
      <property value="14.4065">fsim/tables/ps_full_ms/h0/w2/v8</property>
      <property value="13.6035">fsim/tables/ps_full_ms/h0/w2/v9</property>
      <property value="8.94519">fsim/tables/ps_full_ms/h0/w3/v0</property>
      <property value="10.6891">fsim/tables/ps_full_ms/h0/w3/v1</property>
      <property value="9.81013">fsim/tables/ps_full_ms/h0/w3/v10</property>
      <property value="8.76823">fsim/tables/ps_full_ms/h0/w3/v11</property>
      <property value="7.51931">fsim/tables/ps_full_ms/h0/w3/v12</property>
      <property value="5.97362">fsim/tables/ps_full_ms/h0/w3/v13</property>
      <property value="4.17193">fsim/tables/ps_full_ms/h0/w3/v14</property>
      <property value="2.11512">fsim/tables/ps_full_ms/h0/w3/v15</property>
      <property value="11.2006">fsim/tables/ps_full_ms/h0/w3/v2</property>
      <property value="11.6396">fsim/tables/ps_full_ms/h0/w3/v3</property>
      <property value="11.8864">fsim/tables/ps_full_ms/h0/w3/v4</property>
      <property value="11.9922">fsim/tables/ps_full_ms/h0/w3/v5</property>
      <property value="11.9316">fsim/tables/ps_full_ms/h0/w3/v6</property>
      <property value="11.7238">fsim/tables/ps_full_ms/h0/w3/v7</property>
      <property value="11.2826">fsim/tables/ps_full_ms/h0/w3/v8</property>
      <property value="10.6432">fsim/tables/ps_full_ms/h0/w3/v9</property>
      <property value="13.112">fsim/tables/ps_full_ms/h1/w0/v0</property>
      <property value="13.6267">fsim/tables/ps_full_ms/h1/w0/v1</property>
      <property value="15.7207">fsim/tables/ps_full_ms/h1/w0/v10</property>
      <property value="14.0344">fsim/tables/ps_full_ms/h1/w0/v11</property>
      <property value="11.9289">fsim/tables/ps_full_ms/h1/w0/v12</property>
      <property value="9.35014">fsim/tables/ps_full_ms/h1/w0/v13</property>
      <property value="6.28967">fsim/tables/ps_full_ms/h1/w0/v14</property>
      <property value="2.7269">fsim/tables/ps_full_ms/h1/w0/v15</property>
      <property value="14.2912">fsim/tables/ps_full_ms/h1/w0/v2</property>
      <property value="17.2244">fsim/tables/ps_full_ms/h1/w0/v3</property>
      <property value="17.881">fsim/tables/ps_full_ms/h1/w0/v4</property>
      <property value="18.3059">fsim/tables/ps_full_ms/h1/w0/v5</property>
      <property value="18.4235">fsim/tables/ps_full_ms/h1/w0/v6</property>
      <property value="18.1824">fsim/tables/ps_full_ms/h1/w0/v7</property>
      <property value="17.6057">fsim/tables/ps_full_ms/h1/w0/v8</property>
      <property value="16.8523">fsim/tables/ps_full_ms/h1/w0/v9</property>
      <property value="11.8256">fsim/tables/ps_full_ms/h1/w1/v0</property>
      <property value="14.1815">fsim/tables/ps_full_ms/h1/w1/v1</property>
      <property value="12.8812">fsim/tables/ps_full_ms/h1/w1/v10</property>
      <property value="11.4727">fsim/tables/ps_full_ms/h1/w1/v11</property>
      <property value="9.7596">fsim/tables/ps_full_ms/h1/w1/v12</property>
      <property value="7.72221">fsim/tables/ps_full_ms/h1/w1/v13</property>
      <property value="5.35811">fsim/tables/ps_full_ms/h1/w1/v14</property>
      <property value="2.65332">fsim/tables/ps_full_ms/h1/w1/v15</property>
      <property value="14.7549">fsim/tables/ps_full_ms/h1/w1/v2</property>
      <property value="15.3011">fsim/tables/ps_full_ms/h1/w1/v3</property>
      <property value="15.6039">fsim/tables/ps_full_ms/h1/w1/v4</property>
      <property value="15.7036">fsim/tables/ps_full_ms/h1/w1/v5</property>
      <property value="15.5738">fsim/tables/ps_full_ms/h1/w1/v6</property>
      <property value="15.1697">fsim/tables/ps_full_ms/h1/w1/v7</property>
      <property value="14.6103">fsim/tables/ps_full_ms/h1/w1/v8</property>
      <property value="13.9015">fsim/tables/ps_full_ms/h1/w1/v9</property>
      <property value="9.80555">fsim/tables/ps_full_ms/h1/w2/v0</property>
      <property value="11.7918">fsim/tables/ps_full_ms/h1/w2/v1</property>
      <property value="10.8755">fsim/tables/ps_full_ms/h1/w2/v10</property>
      <property value="9.76587">fsim/tables/ps_full_ms/h1/w2/v11</property>
      <property value="8.33361">fsim/tables/ps_full_ms/h1/w2/v12</property>
      <property value="6.60549">fsim/tables/ps_full_ms/h1/w2/v13</property>
      <property value="4.60234">fsim/tables/ps_full_ms/h1/w2/v14</property>
      <property value="2.31229">fsim/tables/ps_full_ms/h1/w2/v15</property>
      <property value="12.3269">fsim/tables/ps_full_ms/h1/w2/v2</property>
      <property value="12.8304">fsim/tables/ps_full_ms/h1/w2/v3</property>
      <property value="13.1245">fsim/tables/ps_full_ms/h1/w2/v4</property>
      <property value="13.1993">fsim/tables/ps_full_ms/h1/w2/v5</property>
      <property value="13.1075">fsim/tables/ps_full_ms/h1/w2/v6</property>
      <property value="12.8246">fsim/tables/ps_full_ms/h1/w2/v7</property>
      <property value="12.3383">fsim/tables/ps_full_ms/h1/w2/v8</property>
      <property value="11.7238">fsim/tables/ps_full_ms/h1/w2/v9</property>
      <property value="7.3962">fsim/tables/ps_full_ms/h1/w3/v0</property>
      <property value="8.94217">fsim/tables/ps_full_ms/h1/w3/v1</property>
      <property value="8.43147">fsim/tables/ps_full_ms/h1/w3/v10</property>
      <property value="7.54979">fsim/tables/ps_full_ms/h1/w3/v11</property>
      <property value="6.48269">fsim/tables/ps_full_ms/h1/w3/v12</property>
      <property value="5.21982">fsim/tables/ps_full_ms/h1/w3/v13</property>
      <property value="3.6901">fsim/tables/ps_full_ms/h1/w3/v14</property>
      <property value="1.90981">fsim/tables/ps_full_ms/h1/w3/v15</property>
      <property value="9.42458">fsim/tables/ps_full_ms/h1/w3/v2</property>
      <property value="9.82246">fsim/tables/ps_full_ms/h1/w3/v3</property>
      <property value="10.0712">fsim/tables/ps_full_ms/h1/w3/v4</property>
      <property value="10.1779">fsim/tables/ps_full_ms/h1/w3/v5</property>
      <property value="10.1315">fsim/tables/ps_full_ms/h1/w3/v6</property>
      <property value="9.87439">fsim/tables/ps_full_ms/h1/w3/v7</property>
      <property value="9.5737">fsim/tables/ps_full_ms/h1/w3/v8</property>
      <property value="9.10666">fsim/tables/ps_full_ms/h1/w3/v9</property>
      <property value="9.54041">fsim/tables/ps_full_ms/h2/w0/v0</property>
      <property value="11.4818">fsim/tables/ps_full_ms/h2/w0/v1</property>
      <property value="10.6209">fsim/tables/ps_full_ms/h2/w0/v10</property>
      <property value="9.58882">fsim/tables/ps_full_ms/h2/w0/v11</property>
      <property value="8.1885">fsim/tables/ps_full_ms/h2/w0/v12</property>
      <property value="6.4967">fsim/tables/ps_full_ms/h2/w0/v13</property>
      <property value="4.53433">fsim/tables/ps_full_ms/h2/w0/v14</property>
      <property value="2.2898">fsim/tables/ps_full_ms/h2/w0/v15</property>
      <property value="11.929">fsim/tables/ps_full_ms/h2/w0/v2</property>
      <property value="12.4214">fsim/tables/ps_full_ms/h2/w0/v3</property>
      <property value="12.7512">fsim/tables/ps_full_ms/h2/w0/v4</property>
      <property value="12.8332">fsim/tables/ps_full_ms/h2/w0/v5</property>
      <property value="12.7435">fsim/tables/ps_full_ms/h2/w0/v6</property>
      <property value="12.4725">fsim/tables/ps_full_ms/h2/w0/v7</property>
      <property value="12.0287">fsim/tables/ps_full_ms/h2/w0/v8</property>
      <property value="11.425">fsim/tables/ps_full_ms/h2/w0/v9</property>
      <property value="7.97661">fsim/tables/ps_full_ms/h2/w1/v0</property>
      <property value="9.63932">fsim/tables/ps_full_ms/h2/w1/v1</property>
      <property value="8.99492">fsim/tables/ps_full_ms/h2/w1/v10</property>
      <property value="8.11195">fsim/tables/ps_full_ms/h2/w1/v11</property>
      <property value="6.9799">fsim/tables/ps_full_ms/h2/w1/v12</property>
      <property value="5.59893">fsim/tables/ps_full_ms/h2/w1/v13</property>
      <property value="3.93627">fsim/tables/ps_full_ms/h2/w1/v14</property>
      <property value="2.03895">fsim/tables/ps_full_ms/h2/w1/v15</property>
      <property value="10.0737">fsim/tables/ps_full_ms/h2/w1/v2</property>
      <property value="10.5052">fsim/tables/ps_full_ms/h2/w1/v3</property>
      <property value="10.7712">fsim/tables/ps_full_ms/h2/w1/v4</property>
      <property value="10.8806">fsim/tables/ps_full_ms/h2/w1/v5</property>
      <property value="10.8034">fsim/tables/ps_full_ms/h2/w1/v6</property>
      <property value="10.5369">fsim/tables/ps_full_ms/h2/w1/v7</property>
      <property value="10.2201">fsim/tables/ps_full_ms/h2/w1/v8</property>
      <property value="9.69187">fsim/tables/ps_full_ms/h2/w1/v9</property>
      <property value="6.49558">fsim/tables/ps_full_ms/h2/w2/v0</property>
      <property value="7.96491">fsim/tables/ps_full_ms/h2/w2/v1</property>
      <property value="7.518">fsim/tables/ps_full_ms/h2/w2/v10</property>
      <property value="6.76922">fsim/tables/ps_full_ms/h2/w2/v11</property>
      <property value="5.81067">fsim/tables/ps_full_ms/h2/w2/v12</property>
      <property value="4.68368">fsim/tables/ps_full_ms/h2/w2/v13</property>
      <property value="3.38379">fsim/tables/ps_full_ms/h2/w2/v14</property>
      <property value="1.81524">fsim/tables/ps_full_ms/h2/w2/v15</property>
      <property value="8.35095">fsim/tables/ps_full_ms/h2/w2/v2</property>
      <property value="8.72029">fsim/tables/ps_full_ms/h2/w2/v3</property>
      <property value="8.98145">fsim/tables/ps_full_ms/h2/w2/v4</property>
      <property value="9.05358">fsim/tables/ps_full_ms/h2/w2/v5</property>
      <property value="8.99843">fsim/tables/ps_full_ms/h2/w2/v6</property>
      <property value="8.76181">fsim/tables/ps_full_ms/h2/w2/v7</property>
      <property value="8.49851">fsim/tables/ps_full_ms/h2/w2/v8</property>
      <property value="8.11528">fsim/tables/ps_full_ms/h2/w2/v9</property>
      <property value="4.87006">fsim/tables/ps_full_ms/h2/w3/v0</property>
      <property value="5.91369">fsim/tables/ps_full_ms/h2/w3/v1</property>
      <property value="5.67436">fsim/tables/ps_full_ms/h2/w3/v10</property>
      <property value="5.16572">fsim/tables/ps_full_ms/h2/w3/v11</property>
      <property value="4.42609">fsim/tables/ps_full_ms/h2/w3/v12</property>
      <property value="3.56249">fsim/tables/ps_full_ms/h2/w3/v13</property>
      <property value="2.57598">fsim/tables/ps_full_ms/h2/w3/v14</property>
      <property value="1.46161">fsim/tables/ps_full_ms/h2/w3/v15</property>
      <property value="6.23383">fsim/tables/ps_full_ms/h2/w3/v2</property>
      <property value="6.56247">fsim/tables/ps_full_ms/h2/w3/v3</property>
      <property value="6.73355">fsim/tables/ps_full_ms/h2/w3/v4</property>
      <property value="6.78031">fsim/tables/ps_full_ms/h2/w3/v5</property>
      <property value="6.71677">fsim/tables/ps_full_ms/h2/w3/v6</property>
      <property value="6.59392">fsim/tables/ps_full_ms/h2/w3/v7</property>
      <property value="6.40962">fsim/tables/ps_full_ms/h2/w3/v8</property>
      <property value="6.08626">fsim/tables/ps_full_ms/h2/w3/v9</property>
      <property value="5.88356">fsim/tables/ps_full_ms/h3/w0/v0</property>
      <property value="7.22771">fsim/tables/ps_full_ms/h3/w0/v1</property>
      <property value="6.75696">fsim/tables/ps_full_ms/h3/w0/v10</property>
      <property value="6.06279">fsim/tables/ps_full_ms/h3/w0/v11</property>
      <property value="5.2251">fsim/tables/ps_full_ms/h3/w0/v12</property>
      <property value="4.23684">fsim/tables/ps_full_ms/h3/w0/v13</property>
      <property value="3.05016">fsim/tables/ps_full_ms/h3/w0/v14</property>
      <property value="1.67802">fsim/tables/ps_full_ms/h3/w0/v15</property>
      <property value="7.57329">fsim/tables/ps_full_ms/h3/w0/v2</property>
      <property value="7.86463">fsim/tables/ps_full_ms/h3/w0/v3</property>
      <property value="8.11076">fsim/tables/ps_full_ms/h3/w0/v4</property>
      <property value="8.20095">fsim/tables/ps_full_ms/h3/w0/v5</property>
      <property value="8.11645">fsim/tables/ps_full_ms/h3/w0/v6</property>
      <property value="7.91701">fsim/tables/ps_full_ms/h3/w0/v7</property>
      <property value="7.65288">fsim/tables/ps_full_ms/h3/w0/v8</property>
      <property value="7.28559">fsim/tables/ps_full_ms/h3/w0/v9</property>
      <property value="4.88903">fsim/tables/ps_full_ms/h3/w1/v0</property>
      <property value="5.98136">fsim/tables/ps_full_ms/h3/w1/v1</property>
      <property value="5.61923">fsim/tables/ps_full_ms/h3/w1/v10</property>
      <property value="5.08406">fsim/tables/ps_full_ms/h3/w1/v11</property>
      <property value="4.37228">fsim/tables/ps_full_ms/h3/w1/v12</property>
      <property value="3.5465">fsim/tables/ps_full_ms/h3/w1/v13</property>
      <property value="2.55599">fsim/tables/ps_full_ms/h3/w1/v14</property>
      <property value="1.43647">fsim/tables/ps_full_ms/h3/w1/v15</property>
      <property value="6.24917">fsim/tables/ps_full_ms/h3/w1/v2</property>
      <property value="6.53616">fsim/tables/ps_full_ms/h3/w1/v3</property>
      <property value="6.75254">fsim/tables/ps_full_ms/h3/w1/v4</property>
      <property value="6.7928">fsim/tables/ps_full_ms/h3/w1/v5</property>
      <property value="6.71012">fsim/tables/ps_full_ms/h3/w1/v6</property>
      <property value="6.57968">fsim/tables/ps_full_ms/h3/w1/v7</property>
      <property value="6.36941">fsim/tables/ps_full_ms/h3/w1/v8</property>
      <property value="6.03868">fsim/tables/ps_full_ms/h3/w1/v9</property>
      <property value="3.98101">fsim/tables/ps_full_ms/h3/w2/v0</property>
      <property value="4.79991">fsim/tables/ps_full_ms/h3/w2/v1</property>
      <property value="4.55573">fsim/tables/ps_full_ms/h3/w2/v10</property>
      <property value="4.12199">fsim/tables/ps_full_ms/h3/w2/v11</property>
      <property value="3.60903">fsim/tables/ps_full_ms/h3/w2/v12</property>
      <property value="2.95543">fsim/tables/ps_full_ms/h3/w2/v13</property>
      <property value="2.16083">fsim/tables/ps_full_ms/h3/w2/v14</property>
      <property value="1.25848">fsim/tables/ps_full_ms/h3/w2/v15</property>
      <property value="5.02519">fsim/tables/ps_full_ms/h3/w2/v2</property>
      <property value="5.29203">fsim/tables/ps_full_ms/h3/w2/v3</property>
      <property value="5.43887">fsim/tables/ps_full_ms/h3/w2/v4</property>
      <property value="5.46135">fsim/tables/ps_full_ms/h3/w2/v5</property>
      <property value="5.40859">fsim/tables/ps_full_ms/h3/w2/v6</property>
      <property value="5.316">fsim/tables/ps_full_ms/h3/w2/v7</property>
      <property value="5.15775">fsim/tables/ps_full_ms/h3/w2/v8</property>
      <property value="4.91668">fsim/tables/ps_full_ms/h3/w2/v9</property>
      <property value="2.78073">fsim/tables/ps_full_ms/h3/w3/v0</property>
      <property value="3.24962">fsim/tables/ps_full_ms/h3/w3/v1</property>
      <property value="3.21436">fsim/tables/ps_full_ms/h3/w3/v10</property>
      <property value="2.93797">fsim/tables/ps_full_ms/h3/w3/v11</property>
      <property value="2.54907">fsim/tables/ps_full_ms/h3/w3/v12</property>
      <property value="2.11005">fsim/tables/ps_full_ms/h3/w3/v13</property>
      <property value="1.61453">fsim/tables/ps_full_ms/h3/w3/v14</property>
      <property value="1.03863">fsim/tables/ps_full_ms/h3/w3/v15</property>
      <property value="3.48826">fsim/tables/ps_full_ms/h3/w3/v2</property>
      <property value="3.66786">fsim/tables/ps_full_ms/h3/w3/v3</property>
      <property value="3.75306">fsim/tables/ps_full_ms/h3/w3/v4</property>
      <property value="3.76923">fsim/tables/ps_full_ms/h3/w3/v5</property>
      <property value="3.77633">fsim/tables/ps_full_ms/h3/w3/v6</property>
      <property value="3.71676">fsim/tables/ps_full_ms/h3/w3/v7</property>
      <property value="3.62718">fsim/tables/ps_full_ms/h3/w3/v8</property>
      <property value="3.44015">fsim/tables/ps_full_ms/h3/w3/v9</property>
      <property value="3.81091">fsim/tables/ps_full_ms/h4/w0/v0</property>
      <property value="4.62689">fsim/tables/ps_full_ms/h4/w0/v1</property>
      <property value="4.34838">fsim/tables/ps_full_ms/h4/w0/v10</property>
      <property value="3.91566">fsim/tables/ps_full_ms/h4/w0/v11</property>
      <property value="3.40503">fsim/tables/ps_full_ms/h4/w0/v12</property>
      <property value="2.75697">fsim/tables/ps_full_ms/h4/w0/v13</property>
      <property value="2.00015">fsim/tables/ps_full_ms/h4/w0/v14</property>
      <property value="1.15215">fsim/tables/ps_full_ms/h4/w0/v15</property>
      <property value="4.86885">fsim/tables/ps_full_ms/h4/w0/v2</property>
      <property value="5.0921">fsim/tables/ps_full_ms/h4/w0/v3</property>
      <property value="5.235">fsim/tables/ps_full_ms/h4/w0/v4</property>
      <property value="5.29435">fsim/tables/ps_full_ms/h4/w0/v5</property>
      <property value="5.23006">fsim/tables/ps_full_ms/h4/w0/v6</property>
      <property value="5.12351">fsim/tables/ps_full_ms/h4/w0/v7</property>
      <property value="4.95803">fsim/tables/ps_full_ms/h4/w0/v8</property>
      <property value="4.71091">fsim/tables/ps_full_ms/h4/w0/v9</property>
      <property value="3.07937">fsim/tables/ps_full_ms/h4/w1/v0</property>
      <property value="3.66455">fsim/tables/ps_full_ms/h4/w1/v1</property>
      <property value="3.52372">fsim/tables/ps_full_ms/h4/w1/v10</property>
      <property value="3.15795">fsim/tables/ps_full_ms/h4/w1/v11</property>
      <property value="2.73015">fsim/tables/ps_full_ms/h4/w1/v12</property>
      <property value="2.24498">fsim/tables/ps_full_ms/h4/w1/v13</property>
      <property value="1.69595">fsim/tables/ps_full_ms/h4/w1/v14</property>
      <property value="1.01089">fsim/tables/ps_full_ms/h4/w1/v15</property>
      <property value="3.86976">fsim/tables/ps_full_ms/h4/w1/v2</property>
      <property value="4.05995">fsim/tables/ps_full_ms/h4/w1/v3</property>
      <property value="4.17774">fsim/tables/ps_full_ms/h4/w1/v4</property>
      <property value="4.21768">fsim/tables/ps_full_ms/h4/w1/v5</property>
      <property value="4.16864">fsim/tables/ps_full_ms/h4/w1/v6</property>
      <property value="4.11184">fsim/tables/ps_full_ms/h4/w1/v7</property>
      <property value="3.97037">fsim/tables/ps_full_ms/h4/w1/v8</property>
      <property value="3.76962">fsim/tables/ps_full_ms/h4/w1/v9</property>
      <property value="2.31574">fsim/tables/ps_full_ms/h4/w2/v0</property>
      <property value="2.71562">fsim/tables/ps_full_ms/h4/w2/v1</property>
      <property value="2.67562">fsim/tables/ps_full_ms/h4/w2/v10</property>
      <property value="2.4311">fsim/tables/ps_full_ms/h4/w2/v11</property>
      <property value="2.13025">fsim/tables/ps_full_ms/h4/w2/v12</property>
      <property value="1.74086">fsim/tables/ps_full_ms/h4/w2/v13</property>
      <property value="1.30869">fsim/tables/ps_full_ms/h4/w2/v14</property>
      <property value="0.832223">fsim/tables/ps_full_ms/h4/w2/v15</property>
      <property value="2.92315">fsim/tables/ps_full_ms/h4/w2/v2</property>
      <property value="3.06156">fsim/tables/ps_full_ms/h4/w2/v3</property>
      <property value="3.14543">fsim/tables/ps_full_ms/h4/w2/v4</property>
      <property value="3.16841">fsim/tables/ps_full_ms/h4/w2/v5</property>
      <property value="3.17368">fsim/tables/ps_full_ms/h4/w2/v6</property>
      <property value="3.12241">fsim/tables/ps_full_ms/h4/w2/v7</property>
      <property value="3.02842">fsim/tables/ps_full_ms/h4/w2/v8</property>
      <property value="2.88668">fsim/tables/ps_full_ms/h4/w2/v9</property>
      <property value="1.26458">fsim/tables/ps_full_ms/h4/w3/v0</property>
      <property value="1.48199">fsim/tables/ps_full_ms/h4/w3/v1</property>
      <property value="1.61891">fsim/tables/ps_full_ms/h4/w3/v10</property>
      <property value="1.49459">fsim/tables/ps_full_ms/h4/w3/v11</property>
      <property value="1.33771">fsim/tables/ps_full_ms/h4/w3/v12</property>
      <property value="1.12807">fsim/tables/ps_full_ms/h4/w3/v13</property>
      <property value="0.899883">fsim/tables/ps_full_ms/h4/w3/v14</property>
      <property value="0.652531">fsim/tables/ps_full_ms/h4/w3/v15</property>
      <property value="1.61767">fsim/tables/ps_full_ms/h4/w3/v2</property>
      <property value="1.72073">fsim/tables/ps_full_ms/h4/w3/v3</property>
      <property value="1.78287">fsim/tables/ps_full_ms/h4/w3/v4</property>
      <property value="1.82957">fsim/tables/ps_full_ms/h4/w3/v5</property>
      <property value="1.84981">fsim/tables/ps_full_ms/h4/w3/v6</property>
      <property value="1.83453">fsim/tables/ps_full_ms/h4/w3/v7</property>
      <property value="1.79452">fsim/tables/ps_full_ms/h4/w3/v8</property>
      <property value="1.73041">fsim/tables/ps_full_ms/h4/w3/v9</property>
      <property value="2.68163">fsim/tables/ps_full_ms/h5/w0/v0</property>
      <property value="3.19098">fsim/tables/ps_full_ms/h5/w0/v1</property>
      <property value="3.10418">fsim/tables/ps_full_ms/h5/w0/v10</property>
      <property value="2.81603">fsim/tables/ps_full_ms/h5/w0/v11</property>
      <property value="2.42489">fsim/tables/ps_full_ms/h5/w0/v12</property>
      <property value="1.98447">fsim/tables/ps_full_ms/h5/w0/v13</property>
      <property value="1.49285">fsim/tables/ps_full_ms/h5/w0/v14</property>
      <property value="0.940992">fsim/tables/ps_full_ms/h5/w0/v15</property>
      <property value="3.41891">fsim/tables/ps_full_ms/h5/w0/v2</property>
      <property value="3.565">fsim/tables/ps_full_ms/h5/w0/v3</property>
      <property value="3.6716">fsim/tables/ps_full_ms/h5/w0/v4</property>
      <property value="3.69725">fsim/tables/ps_full_ms/h5/w0/v5</property>
      <property value="3.70334">fsim/tables/ps_full_ms/h5/w0/v6</property>
      <property value="3.63352">fsim/tables/ps_full_ms/h5/w0/v7</property>
      <property value="3.52877">fsim/tables/ps_full_ms/h5/w0/v8</property>
      <property value="3.33496">fsim/tables/ps_full_ms/h5/w0/v9</property>
      <property value="2.0159">fsim/tables/ps_full_ms/h5/w1/v0</property>
      <property value="2.36842">fsim/tables/ps_full_ms/h5/w1/v1</property>
      <property value="2.37887">fsim/tables/ps_full_ms/h5/w1/v10</property>
      <property value="2.1543">fsim/tables/ps_full_ms/h5/w1/v11</property>
      <property value="1.89961">fsim/tables/ps_full_ms/h5/w1/v12</property>
      <property value="1.58596">fsim/tables/ps_full_ms/h5/w1/v13</property>
      <property value="1.20039">fsim/tables/ps_full_ms/h5/w1/v14</property>
      <property value="0.77753">fsim/tables/ps_full_ms/h5/w1/v15</property>
      <property value="2.54188">fsim/tables/ps_full_ms/h5/w1/v2</property>
      <property value="2.6693">fsim/tables/ps_full_ms/h5/w1/v3</property>
      <property value="2.7421">fsim/tables/ps_full_ms/h5/w1/v4</property>
      <property value="2.78632">fsim/tables/ps_full_ms/h5/w1/v5</property>
      <property value="2.79695">fsim/tables/ps_full_ms/h5/w1/v6</property>
      <property value="2.76906">fsim/tables/ps_full_ms/h5/w1/v7</property>
      <property value="2.67291">fsim/tables/ps_full_ms/h5/w1/v8</property>
      <property value="2.55799">fsim/tables/ps_full_ms/h5/w1/v9</property>
      <property value="1.34476">fsim/tables/ps_full_ms/h5/w2/v0</property>
      <property value="1.54345">fsim/tables/ps_full_ms/h5/w2/v1</property>
      <property value="1.66608">fsim/tables/ps_full_ms/h5/w2/v10</property>
      <property value="1.53819">fsim/tables/ps_full_ms/h5/w2/v11</property>
      <property value="1.36592">fsim/tables/ps_full_ms/h5/w2/v12</property>
      <property value="1.15088">fsim/tables/ps_full_ms/h5/w2/v13</property>
      <property value="0.916791">fsim/tables/ps_full_ms/h5/w2/v14</property>
      <property value="0.663007">fsim/tables/ps_full_ms/h5/w2/v15</property>
      <property value="1.67889">fsim/tables/ps_full_ms/h5/w2/v2</property>
      <property value="1.77669">fsim/tables/ps_full_ms/h5/w2/v3</property>
      <property value="1.83651">fsim/tables/ps_full_ms/h5/w2/v4</property>
      <property value="1.89573">fsim/tables/ps_full_ms/h5/w2/v5</property>
      <property value="1.92193">fsim/tables/ps_full_ms/h5/w2/v6</property>
      <property value="1.89847">fsim/tables/ps_full_ms/h5/w2/v7</property>
      <property value="1.85661">fsim/tables/ps_full_ms/h5/w2/v8</property>
      <property value="1.78083">fsim/tables/ps_full_ms/h5/w2/v9</property>
      <property value="0.343576">fsim/tables/ps_full_ms/h5/w3/v0</property>
      <property value="0.423655">fsim/tables/ps_full_ms/h5/w3/v1</property>
      <property value="0.701134">fsim/tables/ps_full_ms/h5/w3/v10</property>
      <property value="0.68098">fsim/tables/ps_full_ms/h5/w3/v11</property>
      <property value="0.63677">fsim/tables/ps_full_ms/h5/w3/v12</property>
      <property value="0.590792">fsim/tables/ps_full_ms/h5/w3/v13</property>
      <property value="0.543327">fsim/tables/ps_full_ms/h5/w3/v14</property>
      <property value="0.478936">fsim/tables/ps_full_ms/h5/w3/v15</property>
      <property value="0.48872">fsim/tables/ps_full_ms/h5/w3/v2</property>
      <property value="0.559112">fsim/tables/ps_full_ms/h5/w3/v3</property>
      <property value="0.616351">fsim/tables/ps_full_ms/h5/w3/v4</property>
      <property value="0.671327">fsim/tables/ps_full_ms/h5/w3/v5</property>
      <property value="0.693221">fsim/tables/ps_full_ms/h5/w3/v6</property>
      <property value="0.714823">fsim/tables/ps_full_ms/h5/w3/v7</property>
      <property value="0.720431">fsim/tables/ps_full_ms/h5/w3/v8</property>
      <property value="0.711021">fsim/tables/ps_full_ms/h5/w3/v9</property>
      <property value="1.80532">fsim/tables/ps_full_ms/h6/w0/v0</property>
      <property value="2.09301">fsim/tables/ps_full_ms/h6/w0/v1</property>
      <property value="2.19897">fsim/tables/ps_full_ms/h6/w0/v10</property>
      <property value="1.98547">fsim/tables/ps_full_ms/h6/w0/v11</property>
      <property value="1.74507">fsim/tables/ps_full_ms/h6/w0/v12</property>
      <property value="1.47918">fsim/tables/ps_full_ms/h6/w0/v13</property>
      <property value="1.14244">fsim/tables/ps_full_ms/h6/w0/v14</property>
      <property value="0.752385">fsim/tables/ps_full_ms/h6/w0/v15</property>
      <property value="2.28033">fsim/tables/ps_full_ms/h6/w0/v2</property>
      <property value="2.38655">fsim/tables/ps_full_ms/h6/w0/v3</property>
      <property value="2.4617">fsim/tables/ps_full_ms/h6/w0/v4</property>
      <property value="2.50128">fsim/tables/ps_full_ms/h6/w0/v5</property>
      <property value="2.52778">fsim/tables/ps_full_ms/h6/w0/v6</property>
      <property value="2.52881">fsim/tables/ps_full_ms/h6/w0/v7</property>
      <property value="2.45141">fsim/tables/ps_full_ms/h6/w0/v8</property>
      <property value="2.33619">fsim/tables/ps_full_ms/h6/w0/v9</property>
      <property value="1.15888">fsim/tables/ps_full_ms/h6/w1/v0</property>
      <property value="1.36286">fsim/tables/ps_full_ms/h6/w1/v1</property>
      <property value="1.5161">fsim/tables/ps_full_ms/h6/w1/v10</property>
      <property value="1.39193">fsim/tables/ps_full_ms/h6/w1/v11</property>
      <property value="1.25596">fsim/tables/ps_full_ms/h6/w1/v12</property>
      <property value="1.05868">fsim/tables/ps_full_ms/h6/w1/v13</property>
      <property value="0.839417">fsim/tables/ps_full_ms/h6/w1/v14</property>
      <property value="0.602901">fsim/tables/ps_full_ms/h6/w1/v15</property>
      <property value="1.48315">fsim/tables/ps_full_ms/h6/w1/v2</property>
      <property value="1.5709">fsim/tables/ps_full_ms/h6/w1/v3</property>
      <property value="1.62623">fsim/tables/ps_full_ms/h6/w1/v4</property>
      <property value="1.68716">fsim/tables/ps_full_ms/h6/w1/v5</property>
      <property value="1.71793">fsim/tables/ps_full_ms/h6/w1/v6</property>
      <property value="1.72754">fsim/tables/ps_full_ms/h6/w1/v7</property>
      <property value="1.68045">fsim/tables/ps_full_ms/h6/w1/v8</property>
      <property value="1.62694">fsim/tables/ps_full_ms/h6/w1/v9</property>
      <property value="0.496982">fsim/tables/ps_full_ms/h6/w2/v0</property>
      <property value="0.590272">fsim/tables/ps_full_ms/h6/w2/v1</property>
      <property value="0.85133">fsim/tables/ps_full_ms/h6/w2/v10</property>
      <property value="0.798647">fsim/tables/ps_full_ms/h6/w2/v11</property>
      <property value="0.743773">fsim/tables/ps_full_ms/h6/w2/v12</property>
      <property value="0.664229">fsim/tables/ps_full_ms/h6/w2/v13</property>
      <property value="0.560239">fsim/tables/ps_full_ms/h6/w2/v14</property>
      <property value="0.450375">fsim/tables/ps_full_ms/h6/w2/v15</property>
      <property value="0.667373">fsim/tables/ps_full_ms/h6/w2/v2</property>
      <property value="0.73701">fsim/tables/ps_full_ms/h6/w2/v3</property>
      <property value="0.8073">fsim/tables/ps_full_ms/h6/w2/v4</property>
      <property value="0.85109">fsim/tables/ps_full_ms/h6/w2/v5</property>
      <property value="0.891936">fsim/tables/ps_full_ms/h6/w2/v6</property>
      <property value="0.91358">fsim/tables/ps_full_ms/h6/w2/v7</property>
      <property value="0.905838">fsim/tables/ps_full_ms/h6/w2/v8</property>
      <property value="0.895296">fsim/tables/ps_full_ms/h6/w2/v9</property>
      <property value="-4.19266">fsim/tables/ps_idle_ms/h0/w0/v0</property>
      <property value="-5.31938">fsim/tables/ps_idle_ms/h0/w0/v1</property>
      <property value="-25.9517">fsim/tables/ps_idle_ms/h0/w0/v10</property>
      <property value="-29.5902">fsim/tables/ps_idle_ms/h0/w0/v11</property>
      <property value="-33.5718">fsim/tables/ps_idle_ms/h0/w0/v12</property>
      <property value="-37.9217">fsim/tables/ps_idle_ms/h0/w0/v13</property>
      <property value="-42.5815">fsim/tables/ps_idle_ms/h0/w0/v14</property>
      <property value="-44.4111">fsim/tables/ps_idle_ms/h0/w0/v15</property>
      <property value="-6.6703">fsim/tables/ps_idle_ms/h0/w0/v2</property>
      <property value="-8.23457">fsim/tables/ps_idle_ms/h0/w0/v3</property>
      <property value="-10.002">fsim/tables/ps_idle_ms/h0/w0/v4</property>
      <property value="-11.9832">fsim/tables/ps_idle_ms/h0/w0/v5</property>
      <property value="-14.2355">fsim/tables/ps_idle_ms/h0/w0/v6</property>
      <property value="-16.7731">fsim/tables/ps_idle_ms/h0/w0/v7</property>
      <property value="-19.5647">fsim/tables/ps_idle_ms/h0/w0/v8</property>
      <property value="-22.6193">fsim/tables/ps_idle_ms/h0/w0/v9</property>
      <property value="-3.97145">fsim/tables/ps_idle_ms/h0/w1/v0</property>
      <property value="-4.96513">fsim/tables/ps_idle_ms/h0/w1/v1</property>
      <property value="-22.4326">fsim/tables/ps_idle_ms/h0/w1/v10</property>
      <property value="-25.4807">fsim/tables/ps_idle_ms/h0/w1/v11</property>
      <property value="-28.8068">fsim/tables/ps_idle_ms/h0/w1/v12</property>
      <property value="-32.4525">fsim/tables/ps_idle_ms/h0/w1/v13</property>
      <property value="-36.3862">fsim/tables/ps_idle_ms/h0/w1/v14</property>
      <property value="-38.3474">fsim/tables/ps_idle_ms/h0/w1/v15</property>
      <property value="-6.09678">fsim/tables/ps_idle_ms/h0/w1/v2</property>
      <property value="-7.44464">fsim/tables/ps_idle_ms/h0/w1/v3</property>
      <property value="-8.97">fsim/tables/ps_idle_ms/h0/w1/v4</property>
      <property value="-10.6713">fsim/tables/ps_idle_ms/h0/w1/v5</property>
      <property value="-12.5579">fsim/tables/ps_idle_ms/h0/w1/v6</property>
      <property value="-14.669">fsim/tables/ps_idle_ms/h0/w1/v7</property>
      <property value="-17.0399">fsim/tables/ps_idle_ms/h0/w1/v8</property>
      <property value="-19.6256">fsim/tables/ps_idle_ms/h0/w1/v9</property>
      <property value="-2.11134">fsim/tables/ps_idle_ms/h0/w2/v0</property>
      <property value="-2.66933">fsim/tables/ps_idle_ms/h0/w2/v1</property>
      <property value="-16.7987">fsim/tables/ps_idle_ms/h0/w2/v10</property>
      <property value="-19.587">fsim/tables/ps_idle_ms/h0/w2/v11</property>
      <property value="-22.6403">fsim/tables/ps_idle_ms/h0/w2/v12</property>
      <property value="-26.0228">fsim/tables/ps_idle_ms/h0/w2/v13</property>
      <property value="-29.8056">fsim/tables/ps_idle_ms/h0/w2/v14</property>
      <property value="-32.4866">fsim/tables/ps_idle_ms/h0/w2/v15</property>
      <property value="-3.39937">fsim/tables/ps_idle_ms/h0/w2/v2</property>
      <property value="-4.31773">fsim/tables/ps_idle_ms/h0/w2/v3</property>
      <property value="-5.44815">fsim/tables/ps_idle_ms/h0/w2/v4</property>
      <property value="-6.74724">fsim/tables/ps_idle_ms/h0/w2/v5</property>
      <property value="-8.30775">fsim/tables/ps_idle_ms/h0/w2/v6</property>
      <property value="-10.0783">fsim/tables/ps_idle_ms/h0/w2/v7</property>
      <property value="-12.0641">fsim/tables/ps_idle_ms/h0/w2/v8</property>
      <property value="-14.2792">fsim/tables/ps_idle_ms/h0/w2/v9</property>
      <property value="-2.00965">fsim/tables/ps_idle_ms/h0/w3/v0</property>
      <property value="-2.37947">fsim/tables/ps_idle_ms/h0/w3/v1</property>
      <property value="-13.0998">fsim/tables/ps_idle_ms/h0/w3/v10</property>
      <property value="-15.2314">fsim/tables/ps_idle_ms/h0/w3/v11</property>
      <property value="-17.5843">fsim/tables/ps_idle_ms/h0/w3/v12</property>
      <property value="-20.2046">fsim/tables/ps_idle_ms/h0/w3/v13</property>
      <property value="-23.1777">fsim/tables/ps_idle_ms/h0/w3/v14</property>
      <property value="-26.1515">fsim/tables/ps_idle_ms/h0/w3/v15</property>
      <property value="-2.88615">fsim/tables/ps_idle_ms/h0/w3/v2</property>
      <property value="-3.54561">fsim/tables/ps_idle_ms/h0/w3/v3</property>
      <property value="-4.3703">fsim/tables/ps_idle_ms/h0/w3/v4</property>
      <property value="-5.37101">fsim/tables/ps_idle_ms/h0/w3/v5</property>
      <property value="-6.53776">fsim/tables/ps_idle_ms/h0/w3/v6</property>
      <property value="-7.86227">fsim/tables/ps_idle_ms/h0/w3/v7</property>
      <property value="-9.42528">fsim/tables/ps_idle_ms/h0/w3/v8</property>
      <property value="-11.1679">fsim/tables/ps_idle_ms/h0/w3/v9</property>
      <property value="-1.56107">fsim/tables/ps_idle_ms/h1/w0/v0</property>
      <property value="-1.98565">fsim/tables/ps_idle_ms/h1/w0/v1</property>
      <property value="-19.4066">fsim/tables/ps_idle_ms/h1/w0/v10</property>
      <property value="-23.2649">fsim/tables/ps_idle_ms/h1/w0/v11</property>
      <property value="-27.5654">fsim/tables/ps_idle_ms/h1/w0/v12</property>
      <property value="-32.3879">fsim/tables/ps_idle_ms/h1/w0/v13</property>
      <property value="-37.7923">fsim/tables/ps_idle_ms/h1/w0/v14</property>
      <property value="-41.0351">fsim/tables/ps_idle_ms/h1/w0/v15</property>
      <property value="-2.65029">fsim/tables/ps_idle_ms/h1/w0/v2</property>
      <property value="-3.57613">fsim/tables/ps_idle_ms/h1/w0/v3</property>
      <property value="-4.77848">fsim/tables/ps_idle_ms/h1/w0/v4</property>
      <property value="-6.3049">fsim/tables/ps_idle_ms/h1/w0/v5</property>
      <property value="-8.19044">fsim/tables/ps_idle_ms/h1/w0/v6</property>
      <property value="-10.4185">fsim/tables/ps_idle_ms/h1/w0/v7</property>
      <property value="-12.9858">fsim/tables/ps_idle_ms/h1/w0/v8</property>
      <property value="-15.9627">fsim/tables/ps_idle_ms/h1/w0/v9</property>
      <property value="-2.18933">fsim/tables/ps_idle_ms/h1/w1/v0</property>
      <property value="-2.75173">fsim/tables/ps_idle_ms/h1/w1/v1</property>
      <property value="-17.9419">fsim/tables/ps_idle_ms/h1/w1/v10</property>
      <property value="-21.0118">fsim/tables/ps_idle_ms/h1/w1/v11</property>
      <property value="-24.3824">fsim/tables/ps_idle_ms/h1/w1/v12</property>
      <property value="-28.1168">fsim/tables/ps_idle_ms/h1/w1/v13</property>
      <property value="-32.2791">fsim/tables/ps_idle_ms/h1/w1/v14</property>
      <property value="-35.1811">fsim/tables/ps_idle_ms/h1/w1/v15</property>
      <property value="-3.49647">fsim/tables/ps_idle_ms/h1/w1/v2</property>
      <property value="-4.42182">fsim/tables/ps_idle_ms/h1/w1/v3</property>
      <property value="-5.62603">fsim/tables/ps_idle_ms/h1/w1/v4</property>
      <property value="-7.01519">fsim/tables/ps_idle_ms/h1/w1/v5</property>
      <property value="-8.6872">fsim/tables/ps_idle_ms/h1/w1/v6</property>
      <property value="-10.6023">fsim/tables/ps_idle_ms/h1/w1/v7</property>
      <property value="-12.7592">fsim/tables/ps_idle_ms/h1/w1/v8</property>
      <property value="-15.1751">fsim/tables/ps_idle_ms/h1/w1/v9</property>
      <property value="-2.13809">fsim/tables/ps_idle_ms/h1/w2/v0</property>
      <property value="-2.56659">fsim/tables/ps_idle_ms/h1/w2/v1</property>
      <property value="-15.1485">fsim/tables/ps_idle_ms/h1/w2/v10</property>
      <property value="-17.6963">fsim/tables/ps_idle_ms/h1/w2/v11</property>
      <property value="-20.5428">fsim/tables/ps_idle_ms/h1/w2/v12</property>
      <property value="-23.6757">fsim/tables/ps_idle_ms/h1/w2/v13</property>
      <property value="-27.192">fsim/tables/ps_idle_ms/h1/w2/v14</property>
      <property value="-30.5125">fsim/tables/ps_idle_ms/h1/w2/v15</property>
      <property value="-3.15838">fsim/tables/ps_idle_ms/h1/w2/v2</property>
      <property value="-3.91986">fsim/tables/ps_idle_ms/h1/w2/v3</property>
      <property value="-4.86884">fsim/tables/ps_idle_ms/h1/w2/v4</property>
      <property value="-6.05492">fsim/tables/ps_idle_ms/h1/w2/v5</property>
      <property value="-7.40585">fsim/tables/ps_idle_ms/h1/w2/v6</property>
      <property value="-9.00432">fsim/tables/ps_idle_ms/h1/w2/v7</property>
      <property value="-10.8328">fsim/tables/ps_idle_ms/h1/w2/v8</property>
      <property value="-12.8767">fsim/tables/ps_idle_ms/h1/w2/v9</property>
      <property value="-2.22957">fsim/tables/ps_idle_ms/h1/w3/v0</property>
      <property value="-2.51761">fsim/tables/ps_idle_ms/h1/w3/v1</property>
      <property value="-12.0498">fsim/tables/ps_idle_ms/h1/w3/v10</property>
      <property value="-14.0077">fsim/tables/ps_idle_ms/h1/w3/v11</property>
      <property value="-16.1641">fsim/tables/ps_idle_ms/h1/w3/v12</property>
      <property value="-18.5224">fsim/tables/ps_idle_ms/h1/w3/v13</property>
      <property value="-21.1929">fsim/tables/ps_idle_ms/h1/w3/v14</property>
      <property value="-24.1239">fsim/tables/ps_idle_ms/h1/w3/v15</property>
      <property value="-2.93273">fsim/tables/ps_idle_ms/h1/w3/v2</property>
      <property value="-3.48622">fsim/tables/ps_idle_ms/h1/w3/v3</property>
      <property value="-4.19367">fsim/tables/ps_idle_ms/h1/w3/v4</property>
      <property value="-5.06627">fsim/tables/ps_idle_ms/h1/w3/v5</property>
      <property value="-6.1108">fsim/tables/ps_idle_ms/h1/w3/v6</property>
      <property value="-7.32189">fsim/tables/ps_idle_ms/h1/w3/v7</property>
      <property value="-8.67824">fsim/tables/ps_idle_ms/h1/w3/v8</property>
      <property value="-10.2748">fsim/tables/ps_idle_ms/h1/w3/v9</property>
      <property value="-2.1601">fsim/tables/ps_idle_ms/h2/w0/v0</property>
      <property value="-2.59077">fsim/tables/ps_idle_ms/h2/w0/v1</property>
      <property value="-14.9554">fsim/tables/ps_idle_ms/h2/w0/v10</property>
      <property value="-17.4613">fsim/tables/ps_idle_ms/h2/w0/v11</property>
      <property value="-20.2754">fsim/tables/ps_idle_ms/h2/w0/v12</property>
      <property value="-23.3735">fsim/tables/ps_idle_ms/h2/w0/v13</property>
      <property value="-26.8218">fsim/tables/ps_idle_ms/h2/w0/v14</property>
      <property value="-29.9536">fsim/tables/ps_idle_ms/h2/w0/v15</property>
      <property value="-3.17931">fsim/tables/ps_idle_ms/h2/w0/v2</property>
      <property value="-3.93302">fsim/tables/ps_idle_ms/h2/w0/v3</property>
      <property value="-4.84448">fsim/tables/ps_idle_ms/h2/w0/v4</property>
      <property value="-5.98815">fsim/tables/ps_idle_ms/h2/w0/v5</property>
      <property value="-7.32247">fsim/tables/ps_idle_ms/h2/w0/v6</property>
      <property value="-8.89393">fsim/tables/ps_idle_ms/h2/w0/v7</property>
      <property value="-10.6981">fsim/tables/ps_idle_ms/h2/w0/v8</property>
      <property value="-12.7144">fsim/tables/ps_idle_ms/h2/w0/v9</property>
      <property value="-2.20876">fsim/tables/ps_idle_ms/h2/w1/v0</property>
      <property value="-2.54053">fsim/tables/ps_idle_ms/h2/w1/v1</property>
      <property value="-12.897">fsim/tables/ps_idle_ms/h2/w1/v10</property>
      <property value="-14.9996">fsim/tables/ps_idle_ms/h2/w1/v11</property>
      <property value="-17.3185">fsim/tables/ps_idle_ms/h2/w1/v12</property>
      <property value="-19.9021">fsim/tables/ps_idle_ms/h2/w1/v13</property>
      <property value="-22.8087">fsim/tables/ps_idle_ms/h2/w1/v14</property>
      <property value="-25.8067">fsim/tables/ps_idle_ms/h2/w1/v15</property>
      <property value="-3.01259">fsim/tables/ps_idle_ms/h2/w1/v2</property>
      <property value="-3.63345">fsim/tables/ps_idle_ms/h2/w1/v3</property>
      <property value="-4.41084">fsim/tables/ps_idle_ms/h2/w1/v4</property>
      <property value="-5.3261">fsim/tables/ps_idle_ms/h2/w1/v5</property>
      <property value="-6.47689">fsim/tables/ps_idle_ms/h2/w1/v6</property>
      <property value="-7.77143">fsim/tables/ps_idle_ms/h2/w1/v7</property>
      <property value="-9.27507">fsim/tables/ps_idle_ms/h2/w1/v8</property>
      <property value="-10.9929">fsim/tables/ps_idle_ms/h2/w1/v9</property>
      <property value="-2.32506">fsim/tables/ps_idle_ms/h2/w2/v0</property>
      <property value="-2.58149">fsim/tables/ps_idle_ms/h2/w2/v1</property>
      <property value="-11.0953">fsim/tables/ps_idle_ms/h2/w2/v10</property>
      <property value="-12.8539">fsim/tables/ps_idle_ms/h2/w2/v11</property>
      <property value="-14.7913">fsim/tables/ps_idle_ms/h2/w2/v12</property>
      <property value="-16.9076">fsim/tables/ps_idle_ms/h2/w2/v13</property>
      <property value="-19.2189">fsim/tables/ps_idle_ms/h2/w2/v14</property>
      <property value="-21.8331">fsim/tables/ps_idle_ms/h2/w2/v15</property>
      <property value="-2.96097">fsim/tables/ps_idle_ms/h2/w2/v2</property>
      <property value="-3.45896">fsim/tables/ps_idle_ms/h2/w2/v3</property>
      <property value="-4.07686">fsim/tables/ps_idle_ms/h2/w2/v4</property>
      <property value="-4.85487">fsim/tables/ps_idle_ms/h2/w2/v5</property>
      <property value="-5.77022">fsim/tables/ps_idle_ms/h2/w2/v6</property>
      <property value="-6.87398">fsim/tables/ps_idle_ms/h2/w2/v7</property>
      <property value="-8.10233">fsim/tables/ps_idle_ms/h2/w2/v8</property>
      <property value="-9.49621">fsim/tables/ps_idle_ms/h2/w2/v9</property>
      <property value="-2.58796">fsim/tables/ps_idle_ms/h2/w3/v0</property>
      <property value="-2.75688">fsim/tables/ps_idle_ms/h2/w3/v1</property>
      <property value="-9.0398">fsim/tables/ps_idle_ms/h2/w3/v10</property>
      <property value="-10.3274">fsim/tables/ps_idle_ms/h2/w3/v11</property>
      <property value="-11.7955">fsim/tables/ps_idle_ms/h2/w3/v12</property>
      <property value="-13.3973">fsim/tables/ps_idle_ms/h2/w3/v13</property>
      <property value="-15.1146">fsim/tables/ps_idle_ms/h2/w3/v14</property>
      <property value="-16.9402">fsim/tables/ps_idle_ms/h2/w3/v15</property>
      <property value="-3.02463">fsim/tables/ps_idle_ms/h2/w3/v2</property>
      <property value="-3.38635">fsim/tables/ps_idle_ms/h2/w3/v3</property>
      <property value="-3.84303">fsim/tables/ps_idle_ms/h2/w3/v4</property>
      <property value="-4.4043">fsim/tables/ps_idle_ms/h2/w3/v5</property>
      <property value="-5.10443">fsim/tables/ps_idle_ms/h2/w3/v6</property>
      <property value="-5.90125">fsim/tables/ps_idle_ms/h2/w3/v7</property>
      <property value="-6.82965">fsim/tables/ps_idle_ms/h2/w3/v8</property>
      <property value="-7.88459">fsim/tables/ps_idle_ms/h2/w3/v9</property>
      <property value="-2.40427">fsim/tables/ps_idle_ms/h3/w0/v0</property>
      <property value="-2.61959">fsim/tables/ps_idle_ms/h3/w0/v1</property>
      <property value="-10.3629">fsim/tables/ps_idle_ms/h3/w0/v10</property>
      <property value="-11.9673">fsim/tables/ps_idle_ms/h3/w0/v11</property>
      <property value="-13.7332">fsim/tables/ps_idle_ms/h3/w0/v12</property>
      <property value="-15.659">fsim/tables/ps_idle_ms/h3/w0/v13</property>
      <property value="-17.7183">fsim/tables/ps_idle_ms/h3/w0/v14</property>
      <property value="-20.0408">fsim/tables/ps_idle_ms/h3/w0/v15</property>
      <property value="-2.97918">fsim/tables/ps_idle_ms/h3/w0/v2</property>
      <property value="-3.44368">fsim/tables/ps_idle_ms/h3/w0/v3</property>
      <property value="-4.03143">fsim/tables/ps_idle_ms/h3/w0/v4</property>
      <property value="-4.74398">fsim/tables/ps_idle_ms/h3/w0/v5</property>
      <property value="-5.55836">fsim/tables/ps_idle_ms/h3/w0/v6</property>
      <property value="-6.53576">fsim/tables/ps_idle_ms/h3/w0/v7</property>
      <property value="-7.65845">fsim/tables/ps_idle_ms/h3/w0/v8</property>
      <property value="-8.90991">fsim/tables/ps_idle_ms/h3/w0/v9</property>
      <property value="-2.54496">fsim/tables/ps_idle_ms/h3/w1/v0</property>
      <property value="-2.72319">fsim/tables/ps_idle_ms/h3/w1/v1</property>
      <property value="-9.0731">fsim/tables/ps_idle_ms/h3/w1/v10</property>
      <property value="-10.3847">fsim/tables/ps_idle_ms/h3/w1/v11</property>
      <property value="-11.8581">fsim/tables/ps_idle_ms/h3/w1/v12</property>
      <property value="-13.4654">fsim/tables/ps_idle_ms/h3/w1/v13</property>
      <property value="-15.1759">fsim/tables/ps_idle_ms/h3/w1/v14</property>
      <property value="-17.0001">fsim/tables/ps_idle_ms/h3/w1/v15</property>
      <property value="-3.01073">fsim/tables/ps_idle_ms/h3/w1/v2</property>
      <property value="-3.39245">fsim/tables/ps_idle_ms/h3/w1/v3</property>
      <property value="-3.87081">fsim/tables/ps_idle_ms/h3/w1/v4</property>
      <property value="-4.44022">fsim/tables/ps_idle_ms/h3/w1/v5</property>
      <property value="-5.14016">fsim/tables/ps_idle_ms/h3/w1/v6</property>
      <property value="-5.91526">fsim/tables/ps_idle_ms/h3/w1/v7</property>
      <property value="-6.85503">fsim/tables/ps_idle_ms/h3/w1/v8</property>
      <property value="-7.91434">fsim/tables/ps_idle_ms/h3/w1/v9</property>
      <property value="-2.73532">fsim/tables/ps_idle_ms/h3/w2/v0</property>
      <property value="-2.87443">fsim/tables/ps_idle_ms/h3/w2/v1</property>
      <property value="-7.96339">fsim/tables/ps_idle_ms/h3/w2/v10</property>
      <property value="-8.9983">fsim/tables/ps_idle_ms/h3/w2/v11</property>
      <property value="-10.1249">fsim/tables/ps_idle_ms/h3/w2/v12</property>
      <property value="-11.426">fsim/tables/ps_idle_ms/h3/w2/v13</property>
      <property value="-12.8218">fsim/tables/ps_idle_ms/h3/w2/v14</property>
      <property value="-14.2565">fsim/tables/ps_idle_ms/h3/w2/v15</property>
      <property value="-3.09297">fsim/tables/ps_idle_ms/h3/w2/v2</property>
      <property value="-3.3936">fsim/tables/ps_idle_ms/h3/w2/v3</property>
      <property value="-3.78079">fsim/tables/ps_idle_ms/h3/w2/v4</property>
      <property value="-4.24953">fsim/tables/ps_idle_ms/h3/w2/v5</property>
      <property value="-4.78359">fsim/tables/ps_idle_ms/h3/w2/v6</property>
      <property value="-5.43517">fsim/tables/ps_idle_ms/h3/w2/v7</property>
      <property value="-6.1604">fsim/tables/ps_idle_ms/h3/w2/v8</property>
      <property value="-7.00756">fsim/tables/ps_idle_ms/h3/w2/v9</property>
      <property value="-3.08374">fsim/tables/ps_idle_ms/h3/w3/v0</property>
      <property value="-3.16791">fsim/tables/ps_idle_ms/h3/w3/v1</property>
      <property value="-6.70707">fsim/tables/ps_idle_ms/h3/w3/v10</property>
      <property value="-7.43012">fsim/tables/ps_idle_ms/h3/w3/v11</property>
      <property value="-8.24601">fsim/tables/ps_idle_ms/h3/w3/v12</property>
      <property value="-9.12896">fsim/tables/ps_idle_ms/h3/w3/v13</property>
      <property value="-10.1117">fsim/tables/ps_idle_ms/h3/w3/v14</property>
      <property value="-11.032">fsim/tables/ps_idle_ms/h3/w3/v15</property>
      <property value="-3.31768">fsim/tables/ps_idle_ms/h3/w3/v2</property>
      <property value="-3.52391">fsim/tables/ps_idle_ms/h3/w3/v3</property>
      <property value="-3.78732">fsim/tables/ps_idle_ms/h3/w3/v4</property>
      <property value="-4.12088">fsim/tables/ps_idle_ms/h3/w3/v5</property>
      <property value="-4.50026">fsim/tables/ps_idle_ms/h3/w3/v6</property>
      <property value="-4.95143">fsim/tables/ps_idle_ms/h3/w3/v7</property>
      <property value="-5.45205">fsim/tables/ps_idle_ms/h3/w3/v8</property>
      <property value="-6.05836">fsim/tables/ps_idle_ms/h3/w3/v9</property>
      <property value="-2.7346">fsim/tables/ps_idle_ms/h4/w0/v0</property>
      <property value="-2.86851">fsim/tables/ps_idle_ms/h4/w0/v1</property>
      <property value="-7.84907">fsim/tables/ps_idle_ms/h4/w0/v10</property>
      <property value="-8.86127">fsim/tables/ps_idle_ms/h4/w0/v11</property>
      <property value="-9.97014">fsim/tables/ps_idle_ms/h4/w0/v12</property>
      <property value="-11.2473">fsim/tables/ps_idle_ms/h4/w0/v13</property>
      <property value="-12.6084">fsim/tables/ps_idle_ms/h4/w0/v14</property>
      <property value="-14.0178">fsim/tables/ps_idle_ms/h4/w0/v15</property>
      <property value="-3.07091">fsim/tables/ps_idle_ms/h4/w0/v2</property>
      <property value="-3.3781">fsim/tables/ps_idle_ms/h4/w0/v3</property>
      <property value="-3.76866">fsim/tables/ps_idle_ms/h4/w0/v4</property>
      <property value="-4.23922">fsim/tables/ps_idle_ms/h4/w0/v5</property>
      <property value="-4.77221">fsim/tables/ps_idle_ms/h4/w0/v6</property>
      <property value="-5.41962">fsim/tables/ps_idle_ms/h4/w0/v7</property>
      <property value="-6.12482">fsim/tables/ps_idle_ms/h4/w0/v8</property>
      <property value="-6.93577">fsim/tables/ps_idle_ms/h4/w0/v9</property>
      <property value="-2.91936">fsim/tables/ps_idle_ms/h4/w1/v0</property>
      <property value="-3.02031">fsim/tables/ps_idle_ms/h4/w1/v1</property>
      <property value="-6.97831">fsim/tables/ps_idle_ms/h4/w1/v10</property>
      <property value="-7.80888">fsim/tables/ps_idle_ms/h4/w1/v11</property>
      <property value="-8.70628">fsim/tables/ps_idle_ms/h4/w1/v12</property>
      <property value="-9.69073">fsim/tables/ps_idle_ms/h4/w1/v13</property>
      <property value="-10.755">fsim/tables/ps_idle_ms/h4/w1/v14</property>
      <property value="-11.8716">fsim/tables/ps_idle_ms/h4/w1/v15</property>
      <property value="-3.18996">fsim/tables/ps_idle_ms/h4/w1/v2</property>
      <property value="-3.43485">fsim/tables/ps_idle_ms/h4/w1/v3</property>
      <property value="-3.74134">fsim/tables/ps_idle_ms/h4/w1/v4</property>
      <property value="-4.10726">fsim/tables/ps_idle_ms/h4/w1/v5</property>
      <property value="-4.55654">fsim/tables/ps_idle_ms/h4/w1/v6</property>
      <property value="-5.04627">fsim/tables/ps_idle_ms/h4/w1/v7</property>
      <property value="-5.63596">fsim/tables/ps_idle_ms/h4/w1/v8</property>
      <property value="-6.27457">fsim/tables/ps_idle_ms/h4/w1/v9</property>
      <property value="-3.15072">fsim/tables/ps_idle_ms/h4/w2/v0</property>
      <property value="-3.2143">fsim/tables/ps_idle_ms/h4/w2/v1</property>
      <property value="-6.27866">fsim/tables/ps_idle_ms/h4/w2/v10</property>
      <property value="-6.8777">fsim/tables/ps_idle_ms/h4/w2/v11</property>
      <property value="-7.55835">fsim/tables/ps_idle_ms/h4/w2/v12</property>
      <property value="-8.3298">fsim/tables/ps_idle_ms/h4/w2/v13</property>
      <property value="-9.18018">fsim/tables/ps_idle_ms/h4/w2/v14</property>
      <property value="-9.90599">fsim/tables/ps_idle_ms/h4/w2/v15</property>
      <property value="-3.3498">fsim/tables/ps_idle_ms/h4/w2/v2</property>
      <property value="-3.53639">fsim/tables/ps_idle_ms/h4/w2/v3</property>
      <property value="-3.7791">fsim/tables/ps_idle_ms/h4/w2/v4</property>
      <property value="-4.06712">fsim/tables/ps_idle_ms/h4/w2/v5</property>
      <property value="-4.39563">fsim/tables/ps_idle_ms/h4/w2/v6</property>
      <property value="-4.79466">fsim/tables/ps_idle_ms/h4/w2/v7</property>
      <property value="-5.22754">fsim/tables/ps_idle_ms/h4/w2/v8</property>
      <property value="-5.7234">fsim/tables/ps_idle_ms/h4/w2/v9</property>
      <property value="-3.53657">fsim/tables/ps_idle_ms/h4/w3/v0</property>
      <property value="-3.58381">fsim/tables/ps_idle_ms/h4/w3/v1</property>
      <property value="-5.41584">fsim/tables/ps_idle_ms/h4/w3/v10</property>
      <property value="-5.76512">fsim/tables/ps_idle_ms/h4/w3/v11</property>
      <property value="-6.14751">fsim/tables/ps_idle_ms/h4/w3/v12</property>
      <property value="-6.59808">fsim/tables/ps_idle_ms/h4/w3/v13</property>
      <property value="-7.13738">fsim/tables/ps_idle_ms/h4/w3/v14</property>
      <property value="-7.45332">fsim/tables/ps_idle_ms/h4/w3/v15</property>
      <property value="-3.66338">fsim/tables/ps_idle_ms/h4/w3/v2</property>
      <property value="-3.77122">fsim/tables/ps_idle_ms/h4/w3/v3</property>
      <property value="-3.91741">fsim/tables/ps_idle_ms/h4/w3/v4</property>
      <property value="-4.09262">fsim/tables/ps_idle_ms/h4/w3/v5</property>
      <property value="-4.28956">fsim/tables/ps_idle_ms/h4/w3/v6</property>
      <property value="-4.53036">fsim/tables/ps_idle_ms/h4/w3/v7</property>
      <property value="-4.78958">fsim/tables/ps_idle_ms/h4/w3/v8</property>
      <property value="-5.08304">fsim/tables/ps_idle_ms/h4/w3/v9</property>
      <property value="-3.03768">fsim/tables/ps_idle_ms/h5/w0/v0</property>
      <property value="-3.1302">fsim/tables/ps_idle_ms/h5/w0/v1</property>
      <property value="-6.67329">fsim/tables/ps_idle_ms/h5/w0/v10</property>
      <property value="-7.37541">fsim/tables/ps_idle_ms/h5/w0/v11</property>
      <property value="-8.16015">fsim/tables/ps_idle_ms/h5/w0/v12</property>
      <property value="-9.02918">fsim/tables/ps_idle_ms/h5/w0/v13</property>
      <property value="-9.97721">fsim/tables/ps_idle_ms/h5/w0/v14</property>
      <property value="-10.91">fsim/tables/ps_idle_ms/h5/w0/v15</property>
      <property value="-3.27879">fsim/tables/ps_idle_ms/h5/w0/v2</property>
      <property value="-3.48183">fsim/tables/ps_idle_ms/h5/w0/v3</property>
      <property value="-3.75766">fsim/tables/ps_idle_ms/h5/w0/v4</property>
      <property value="-4.10323">fsim/tables/ps_idle_ms/h5/w0/v5</property>
      <property value="-4.4964">fsim/tables/ps_idle_ms/h5/w0/v6</property>
      <property value="-4.95224">fsim/tables/ps_idle_ms/h5/w0/v7</property>
      <property value="-5.46061">fsim/tables/ps_idle_ms/h5/w0/v8</property>
      <property value="-6.04693">fsim/tables/ps_idle_ms/h5/w0/v9</property>
      <property value="-3.25022">fsim/tables/ps_idle_ms/h5/w1/v0</property>
      <property value="-3.3138">fsim/tables/ps_idle_ms/h5/w1/v1</property>
      <property value="-6.02471">fsim/tables/ps_idle_ms/h5/w1/v10</property>
      <property value="-6.55927">fsim/tables/ps_idle_ms/h5/w1/v11</property>
      <property value="-7.11322">fsim/tables/ps_idle_ms/h5/w1/v12</property>
      <property value="-7.76857">fsim/tables/ps_idle_ms/h5/w1/v13</property>
      <property value="-8.51749">fsim/tables/ps_idle_ms/h5/w1/v14</property>
      <property value="-9.14877">fsim/tables/ps_idle_ms/h5/w1/v15</property>
      <property value="-3.41723">fsim/tables/ps_idle_ms/h5/w1/v2</property>
      <property value="-3.58982">fsim/tables/ps_idle_ms/h5/w1/v3</property>
      <property value="-3.8066">fsim/tables/ps_idle_ms/h5/w1/v4</property>
      <property value="-4.05827">fsim/tables/ps_idle_ms/h5/w1/v5</property>
      <property value="-4.36643">fsim/tables/ps_idle_ms/h5/w1/v6</property>
      <property value="-4.70689">fsim/tables/ps_idle_ms/h5/w1/v7</property>
      <property value="-5.10616">fsim/tables/ps_idle_ms/h5/w1/v8</property>
      <property value="-5.52624">fsim/tables/ps_idle_ms/h5/w1/v9</property>
      <property value="-3.50281">fsim/tables/ps_idle_ms/h5/w2/v0</property>
      <property value="-3.53943">fsim/tables/ps_idle_ms/h5/w2/v1</property>
      <property value="-5.45453">fsim/tables/ps_idle_ms/h5/w2/v10</property>
      <property value="-5.81118">fsim/tables/ps_idle_ms/h5/w2/v11</property>
      <property value="-6.21274">fsim/tables/ps_idle_ms/h5/w2/v12</property>
      <property value="-6.66417">fsim/tables/ps_idle_ms/h5/w2/v13</property>
      <property value="-7.19667">fsim/tables/ps_idle_ms/h5/w2/v14</property>
      <property value="-7.54208">fsim/tables/ps_idle_ms/h5/w2/v15</property>
      <property value="-3.62461">fsim/tables/ps_idle_ms/h5/w2/v2</property>
      <property value="-3.74158">fsim/tables/ps_idle_ms/h5/w2/v3</property>
      <property value="-3.89307">fsim/tables/ps_idle_ms/h5/w2/v4</property>
      <property value="-4.07971">fsim/tables/ps_idle_ms/h5/w2/v5</property>
      <property value="-4.28342">fsim/tables/ps_idle_ms/h5/w2/v6</property>
      <property value="-4.53698">fsim/tables/ps_idle_ms/h5/w2/v7</property>
      <property value="-4.80295">fsim/tables/ps_idle_ms/h5/w2/v8</property>
      <property value="-5.11302">fsim/tables/ps_idle_ms/h5/w2/v9</property>
      <property value="-3.92762">fsim/tables/ps_idle_ms/h5/w3/v0</property>
      <property value="-3.9536">fsim/tables/ps_idle_ms/h5/w3/v1</property>
      <property value="-4.70471">fsim/tables/ps_idle_ms/h5/w3/v10</property>
      <property value="-4.82578">fsim/tables/ps_idle_ms/h5/w3/v11</property>
      <property value="-4.97972">fsim/tables/ps_idle_ms/h5/w3/v12</property>
      <property value="-5.19441">fsim/tables/ps_idle_ms/h5/w3/v13</property>
      <property value="-5.40323">fsim/tables/ps_idle_ms/h5/w3/v14</property>
      <property value="-5.29656">fsim/tables/ps_idle_ms/h5/w3/v15</property>
      <property value="-3.99247">fsim/tables/ps_idle_ms/h5/w3/v2</property>
      <property value="-4.0433">fsim/tables/ps_idle_ms/h5/w3/v3</property>
      <property value="-4.10687">fsim/tables/ps_idle_ms/h5/w3/v4</property>
      <property value="-4.17612">fsim/tables/ps_idle_ms/h5/w3/v5</property>
      <property value="-4.26536">fsim/tables/ps_idle_ms/h5/w3/v6</property>
      <property value="-4.35346">fsim/tables/ps_idle_ms/h5/w3/v7</property>
      <property value="-4.46309">fsim/tables/ps_idle_ms/h5/w3/v8</property>
      <property value="-4.58554">fsim/tables/ps_idle_ms/h5/w3/v9</property>
      <property value="-3.40765">fsim/tables/ps_idle_ms/h6/w0/v0</property>
      <property value="-3.47054">fsim/tables/ps_idle_ms/h6/w0/v1</property>
      <property value="-5.94452">fsim/tables/ps_idle_ms/h6/w0/v10</property>
      <property value="-6.44593">fsim/tables/ps_idle_ms/h6/w0/v11</property>
      <property value="-6.96642">fsim/tables/ps_idle_ms/h6/w0/v12</property>
      <property value="-7.53741">fsim/tables/ps_idle_ms/h6/w0/v13</property>
      <property value="-8.21978">fsim/tables/ps_idle_ms/h6/w0/v14</property>
      <property value="-8.76406">fsim/tables/ps_idle_ms/h6/w0/v15</property>
      <property value="-3.57659">fsim/tables/ps_idle_ms/h6/w0/v2</property>
      <property value="-3.72017">fsim/tables/ps_idle_ms/h6/w0/v3</property>
      <property value="-3.90266">fsim/tables/ps_idle_ms/h6/w0/v4</property>
      <property value="-4.14026">fsim/tables/ps_idle_ms/h6/w0/v5</property>
      <property value="-4.42821">fsim/tables/ps_idle_ms/h6/w0/v6</property>
      <property value="-4.73769">fsim/tables/ps_idle_ms/h6/w0/v7</property>
      <property value="-5.10999">fsim/tables/ps_idle_ms/h6/w0/v8</property>
      <property value="-5.50875">fsim/tables/ps_idle_ms/h6/w0/v9</property>
      <property value="-3.64357">fsim/tables/ps_idle_ms/h6/w1/v0</property>
      <property value="-3.68869">fsim/tables/ps_idle_ms/h6/w1/v1</property>
      <property value="-5.45171">fsim/tables/ps_idle_ms/h6/w1/v10</property>
      <property value="-5.78838">fsim/tables/ps_idle_ms/h6/w1/v11</property>
      <property value="-6.1342">fsim/tables/ps_idle_ms/h6/w1/v12</property>
      <property value="-6.56112">fsim/tables/ps_idle_ms/h6/w1/v13</property>
      <property value="-7.05457">fsim/tables/ps_idle_ms/h6/w1/v14</property>
      <property value="-7.33412">fsim/tables/ps_idle_ms/h6/w1/v15</property>
      <property value="-3.76166">fsim/tables/ps_idle_ms/h6/w1/v2</property>
      <property value="-3.85285">fsim/tables/ps_idle_ms/h6/w1/v3</property>
      <property value="-4.0019">fsim/tables/ps_idle_ms/h6/w1/v4</property>
      <property value="-4.17302">fsim/tables/ps_idle_ms/h6/w1/v5</property>
      <property value="-4.37132">fsim/tables/ps_idle_ms/h6/w1/v6</property>
      <property value="-4.59951">fsim/tables/ps_idle_ms/h6/w1/v7</property>
      <property value="-4.85554">fsim/tables/ps_idle_ms/h6/w1/v8</property>
      <property value="-5.12671">fsim/tables/ps_idle_ms/h6/w1/v9</property>
      <property value="-3.9246">fsim/tables/ps_idle_ms/h6/w2/v0</property>
      <property value="-3.94847">fsim/tables/ps_idle_ms/h6/w2/v1</property>
      <property value="-4.96585">fsim/tables/ps_idle_ms/h6/w2/v10</property>
      <property value="-5.14864">fsim/tables/ps_idle_ms/h6/w2/v11</property>
      <property value="-5.32677">fsim/tables/ps_idle_ms/h6/w2/v12</property>
      <property value="-5.58449">fsim/tables/ps_idle_ms/h6/w2/v13</property>
      <property value="-5.88885">fsim/tables/ps_idle_ms/h6/w2/v14</property>
      <property value="-5.91353">fsim/tables/ps_idle_ms/h6/w2/v15</property>
      <property value="-3.98451">fsim/tables/ps_idle_ms/h6/w2/v2</property>
      <property value="-4.05827">fsim/tables/ps_idle_ms/h6/w2/v3</property>
      <property value="-4.13543">fsim/tables/ps_idle_ms/h6/w2/v4</property>
      <property value="-4.24216">fsim/tables/ps_idle_ms/h6/w2/v5</property>
      <property value="-4.35105">fsim/tables/ps_idle_ms/h6/w2/v6</property>
      <property value="-4.48497">fsim/tables/ps_idle_ms/h6/w2/v7</property>
      <property value="-4.62976">fsim/tables/ps_idle_ms/h6/w2/v8</property>
      <property value="-4.77985">fsim/tables/ps_idle_ms/h6/w2/v9</property>
      <property value="184.432">fsim/tables/reach_tas_ms/h0/w0</property>
      <property value="184.845">fsim/tables/reach_tas_ms/h0/w1</property>
      <property value="184.619">fsim/tables/reach_tas_ms/h0/w2</property>
      <property value="185.274">fsim/tables/reach_tas_ms/h0/w3</property>
      <property value="195.541">fsim/tables/reach_tas_ms/h1/w0</property>
      <property value="195.185">fsim/tables/reach_tas_ms/h1/w1</property>
      <property value="195.617">fsim/tables/reach_tas_ms/h1/w2</property>
      <property value="196.337">fsim/tables/reach_tas_ms/h1/w3</property>
      <property value="191.665">fsim/tables/reach_tas_ms/h2/w0</property>
      <property value="192.033">fsim/tables/reach_tas_ms/h2/w1</property>
      <property value="192.455">fsim/tables/reach_tas_ms/h2/w2</property>
      <property value="192.851">fsim/tables/reach_tas_ms/h2/w3</property>
      <property value="185.598">fsim/tables/reach_tas_ms/h3/w0</property>
      <property value="185.855">fsim/tables/reach_tas_ms/h3/w1</property>
      <property value="185.681">fsim/tables/reach_tas_ms/h3/w2</property>
      <property value="185.229">fsim/tables/reach_tas_ms/h3/w3</property>
      <property value="179.097">fsim/tables/reach_tas_ms/h4/w0</property>
      <property value="178.874">fsim/tables/reach_tas_ms/h4/w1</property>
      <property value="178.229">fsim/tables/reach_tas_ms/h4/w2</property>
      <property value="174.356">fsim/tables/reach_tas_ms/h4/w3</property>
      <property value="175.486">fsim/tables/reach_tas_ms/h5/w0</property>
      <property value="174.227">fsim/tables/reach_tas_ms/h5/w1</property>
      <property value="171.647">fsim/tables/reach_tas_ms/h5/w2</property>
      <property value="159.223">fsim/tables/reach_tas_ms/h5/w3</property>
      <property value="173.869">fsim/tables/reach_tas_ms/h6/w0</property>
      <property value="171.321">fsim/tables/reach_tas_ms/h6/w1</property>
      <property value="164.627">fsim/tables/reach_tas_ms/h6/w2</property>
      <property value="0.0">fsim/tables/speed_fraction/v0</property>
      <property value="0.0666667">fsim/tables/speed_fraction/v1</property>
      <property value="0.666667">fsim/tables/speed_fraction/v10</property>
      <property value="0.733333">fsim/tables/speed_fraction/v11</property>
      <property value="0.8">fsim/tables/speed_fraction/v12</property>
      <property value="0.866667">fsim/tables/speed_fraction/v13</property>
      <property value="0.933333">fsim/tables/speed_fraction/v14</property>
      <property value="1">fsim/tables/speed_fraction/v15</property>
      <property value="0.133333">fsim/tables/speed_fraction/v2</property>
      <property value="0.2">fsim/tables/speed_fraction/v3</property>
      <property value="0.266667">fsim/tables/speed_fraction/v4</property>
      <property value="0.333333">fsim/tables/speed_fraction/v5</property>
      <property value="0.4">fsim/tables/speed_fraction/v6</property>
      <property value="0.466667">fsim/tables/speed_fraction/v7</property>
      <property value="0.533333">fsim/tables/speed_fraction/v8</property>
      <property value="0.6">fsim/tables/speed_fraction/v9</property>
      <property value="35.31">fsim/tables/stall_cas_ms/h0/w0</property>
      <property value="38.2886">fsim/tables/stall_cas_ms/h0/w1</property>
      <property value="41.7139">fsim/tables/stall_cas_ms/h0/w2</property>
      <property value="47.2578">fsim/tables/stall_cas_ms/h0/w3</property>
      <property value="35.2376">fsim/tables/stall_cas_ms/h1/w0</property>
      <property value="38.2101">fsim/tables/stall_cas_ms/h1/w1</property>
      <property value="41.6284">fsim/tables/stall_cas_ms/h1/w2</property>
      <property value="47.1609">fsim/tables/stall_cas_ms/h1/w3</property>
      <property value="35.2399">fsim/tables/stall_cas_ms/h2/w0</property>
      <property value="38.2126">fsim/tables/stall_cas_ms/h2/w1</property>
      <property value="41.6311">fsim/tables/stall_cas_ms/h2/w2</property>
      <property value="47.164">fsim/tables/stall_cas_ms/h2/w3</property>
      <property value="35.2234">fsim/tables/stall_cas_ms/h3/w0</property>
      <property value="38.1947">fsim/tables/stall_cas_ms/h3/w1</property>
      <property value="41.6116">fsim/tables/stall_cas_ms/h3/w2</property>
      <property value="47.142">fsim/tables/stall_cas_ms/h3/w3</property>
      <property value="35.2116">fsim/tables/stall_cas_ms/h4/w0</property>
      <property value="38.182">fsim/tables/stall_cas_ms/h4/w1</property>
      <property value="41.5977">fsim/tables/stall_cas_ms/h4/w2</property>
      <property value="47.1262">fsim/tables/stall_cas_ms/h4/w3</property>
      <property value="35.2577">fsim/tables/stall_cas_ms/h5/w0</property>
      <property value="38.2319">fsim/tables/stall_cas_ms/h5/w1</property>
      <property value="41.6521">fsim/tables/stall_cas_ms/h5/w2</property>
      <property value="47.1878">fsim/tables/stall_cas_ms/h5/w3</property>
      <property value="35.3045">fsim/tables/stall_cas_ms/h6/w0</property>
      <property value="38.2827">fsim/tables/stall_cas_ms/h6/w1</property>
      <property value="41.7074">fsim/tables/stall_cas_ms/h6/w2</property>
      <property value="8926.8">fsim/tables/weight_kg/w0</property>
      <property value="10496.4">fsim/tables/weight_kg/w1</property>
      <property value="12458.4">fsim/tables/weight_kg/w2</property>
      <property value="15990">fsim/tables/weight_kg/w3</property>
      <channel name="Pitch">
        <summer name="fcs/pitch-trim-sum">
          <input>fcs/elevator-cmd-norm</input>
          <input>fcs/pitch-trim-cmd-norm</input>
          <clipto> <min>-1</min> <max>1</max> </clipto>
        </summer>
        <aerosurface_scale name="fcs/elevator-control">
          <input>fcs/pitch-trim-sum</input>
          <range> <min>-25.00</min> <max>25.00</max> </range>
          <gain>0.0174533</gain>
        </aerosurface_scale>
        <actuator name="fcs/elevator-actuator">
          <input>fcs/elevator-control</input>
          <rate_limit>2.0</rate_limit>
          <output>fcs/elevator-pos-rad</output>
        </actuator>
      </channel>
      <channel name="Roll">
        <summer name="fcs/roll-trim-sum">
          <input>fcs/aileron-cmd-norm</input>
          <input>fcs/roll-trim-cmd-norm</input>
          <clipto> <min>-1</min> <max>1</max> </clipto>
        </summer>
        <aerosurface_scale name="fcs/left-aileron-control">
          <input>fcs/roll-trim-sum</input>
          <range> <min>-20.00</min> <max>20.00</max> </range>
          <gain>0.0174533</gain>
        </aerosurface_scale>
        <actuator name="fcs/left-aileron-actuator">
          <input>fcs/left-aileron-control</input>
          <rate_limit>2.0</rate_limit>
          <output>fcs/left-aileron-pos-rad</output>
        </actuator>
        <pure_gain name="fcs/right-aileron">
          <input>fcs/left-aileron-pos-rad</input>
          <gain>-1</gain>
          <output>fcs/right-aileron-pos-rad</output>
        </pure_gain>
      </channel>
      <channel name="Yaw">
        <summer name="fcs/yaw-trim-sum">
          <input>fcs/rudder-cmd-norm</input>
          <input>fcs/yaw-trim-cmd-norm</input>
          <clipto> <min>-1</min> <max>1</max> </clipto>
        </summer>
        <aerosurface_scale name="fcs/rudder-control">
          <input>fcs/yaw-trim-sum</input>
          <range> <min>-25.00</min> <max>25.00</max> </range>
          <gain>0.0174533</gain>
        </aerosurface_scale>
        <!-- the yaw damper (hangar/fcs.py yaw_damper): the yaw rate, washed out so a
             steady turn's is left alone, against itself through the rudder - the
             dutch roll damped to 0.30 at 1 g across the speed range -->
        <washout_filter name="fcs/yaw-damper-washout">
          <input>velocities/r-rad_sec</input>
          <c1>0.500</c1>
        </washout_filter>
        <fcs_function name="fcs/yaw-damper">
          <function>
            <product>
              <value>-1</value>
              <table>
                <independentVar lookup="row">aero/qbar-psf</independentVar>
                <tableData>
                  10.0   -3.00000
                  20.0   -2.29913
                  40.0   -0.82102
                  80.0   -0.56201
                 150.0   -0.33925
                 300.0   -0.19510
                 600.0   -0.09179
                1200.0   -0.03779
                2400.0   -0.02615
                </tableData>
              </table>
              <property>fcs/yaw-damper-washout</property>
            </product>
          </function>
          <clipto> <min>-0.21817</min> <max>0.21817</max> </clipto>
        </fcs_function>
        <!-- its sideslip feedback (hangar/fcs.py sideslip_gain): the weathercock
             stability the airframe is short of, made up to 0.03 /rad -->
        <fcs_function name="fcs/sideslip-feedback">
          <function>
            <product>
              <value>-1</value>
              <table>
                <independentVar lookup="row">aero/qbar-psf</independentVar>
                <tableData>
                  10.0    1.18339
                  20.0    1.25220
                  40.0    0.90223
                  80.0    0.68625
                 150.0    0.58511
                 300.0    0.49224
                 600.0    0.29517
                1200.0    0.00000
                2400.0    0.00000
                </tableData>
              </table>
              <property>aero/beta-rad</property>
            </product>
          </function>
          <clipto> <min>-0.21817</min> <max>0.21817</max> </clipto>
        </fcs_function>
        <summer name="fcs/rudder-sum">
          <input>fcs/rudder-control</input>
          <input>fcs/yaw-damper</input>
          <input>fcs/sideslip-feedback</input>
          <clipto> <min>-0.43633</min> <max>0.43633</max> </clipto>
        </summer>
        <actuator name="fcs/rudder-actuator">
          <input>fcs/rudder-sum</input>
          <rate_limit>2.0</rate_limit>
          <output>fcs/rudder-pos-rad</output>
        </actuator>
        <!-- the nose or tail wheel steers with the rudder pedals (JSBSim steers from
             fcs/steer-cmd-norm, positive right; the rudder command is positive left) -->
        <pure_gain name="fcs/steer-from-rudder">
          <input>fcs/yaw-trim-sum</input>
          <gain>-1</gain>
          <output>fcs/steer-cmd-norm</output>
        </pure_gain>
      </channel>
      <channel name="Flaps">
        <kinematic name="fcs/flaps-control">
          <input>fcs/flap-cmd-norm</input>
          <traverse>
            <setting> <position>0.0</position> <time>0.0</time> </setting>
            <setting> <position>7.5</position> <time>2.0</time> </setting>
            <setting> <position>15.0</position> <time>2.0</time> </setting>
            <setting> <position>22.5</position> <time>2.0</time> </setting>
            <setting> <position>30.0</position> <time>2.0</time> </setting>
          </traverse>
          <output>fcs/flap-pos-deg</output>
        </kinematic>
        <pure_gain name="fcs/flaps-normalized">
          <input>fcs/flap-pos-deg</input>
          <gain>0.0333333</gain>
          <output>fcs/flap-pos-norm</output>
        </pure_gain>
      </channel>
      <channel name="Speedbrake">
        <kinematic name="fcs/speedbrake-control">
          <input>fcs/speedbrake-cmd-norm</input>
          <traverse>
            <setting> <position>0</position> <time>0</time> </setting>
            <setting> <position>1</position> <time>2.00</time> </setting>
          </traverse>
          <output>fcs/speedbrake-pos-norm</output>
        </kinematic>
      </channel>
      <channel name="Landing Gear">
        <kinematic name="fcs/gear-control">
          <input>gear/gear-cmd-norm</input>
          <traverse>
            <setting> <position>0</position> <time>0</time> </setting>
            <setting> <position>1</position> <time>5</time> </setting>
          </traverse>
          <output>gear/gear-pos-norm</output>
        </kinematic>
      </channel>
    </flight_control>
    <aerodynamics>
        <function name="aero/function/mach-lift">
          <description>lift, and damping, over its low-speed value (hangar: aero/mach.py)</description>
          <table>
            <independentVar lookup="row">velocities/mach</independentVar>
            <tableData>
                 0.000     1.000000
                 0.300     1.042922
                 0.500     1.136532
                 0.600     1.218864
                 0.700     1.343809
                 0.800     1.570307
                 0.850     1.302663
                 0.900    -0.125988
            </tableData>
          </table>
        </function>
        <function name="aero/function/mach-side">
          <description>side force, rolling and yawing moment over their low-speed values</description>
          <table>
            <independentVar lookup="row">velocities/mach</independentVar>
            <tableData>
                 0.000     1.000000
                 0.300     1.031764
                 0.500     1.103065
                 0.600     1.168733
                 0.700     1.276312
                 0.800     1.479928
                 0.850     1.668825
                 0.900     1.926868
            </tableData>
          </table>
        </function>
        <function name="aero/function/mach-dCm-dCL">
          <description>pitching moment per unit low-speed lift: the neutral point's move</description>
          <table>
            <independentVar lookup="row">velocities/mach</independentVar>
            <tableData>
                 0.000     0.000000
                 0.300    -0.005371
                 0.500    -0.016759
                 0.600    -0.026481
                 0.700    -0.040842
                 0.800    -0.036395
                 0.850     0.041481
                 0.900     0.191547
            </tableData>
          </table>
        </function>
        <function name="aero/function/mach-dCD0">
          <description>zero-lift drag's change: friction and wave drag</description>
          <table>
            <independentVar lookup="row">velocities/mach</independentVar>
            <tableData>
                 0.000     0.000000
                 0.300    -0.000098
                 0.500    -0.000266
                 0.600    -0.000349
                 0.700     0.001448
                 0.800     0.032949
                 0.850     0.061431
                 0.900     0.091964
            </tableData>
          </table>
        </function>
        <function name="aero/function/mach-dK">
          <description>induced-drag factor's change (per CL^2)</description>
          <table>
            <independentVar lookup="row">velocities/mach</independentVar>
            <tableData>
                 0.000     0.000000
                 0.300     0.001631
                 0.500     0.004568
                 0.600     0.006612
                 0.700     0.009026
                 0.800     0.012024
                 0.850     0.008307
                 0.900    -1.254095
            </tableData>
          </table>
        </function>
        <function name="aero/function/mach-aileron">
          <description>aileron power over its low-speed value</description>
          <table>
            <independentVar lookup="row">velocities/mach</independentVar>
            <tableData>
                 0.000     1.000000
                 0.300     1.039877
                 0.500     1.126387
                 0.600     1.202063
                 0.700     1.317225
                 0.800     1.543848
                 0.850     1.590483
                 0.900     0.829532
            </tableData>
          </table>
        </function>
        <function name="aero/function/mach-elevator">
          <description>elevator power over its low-speed value</description>
          <table>
            <independentVar lookup="row">velocities/mach</independentVar>
            <tableData>
                 0.000     1.000000
                 0.300     1.028075
                 0.500     1.086520
                 0.600     1.135186
                 0.700     1.205666
                 0.800     1.314356
                 0.850     1.392753
                 0.900     1.484125
            </tableData>
          </table>
        </function>
        <function name="aero/function/mach-flap">
          <description>flap power over its low-speed value</description>
          <table>
            <independentVar lookup="row">velocities/mach</independentVar>
            <tableData>
                 0.000     1.000000
                 0.300     1.043828
                 0.500     1.140002
                 0.600     1.225367
                 0.700     1.357119
                 0.800     1.654157
                 0.850     1.552248
                 0.900     0.460431
            </tableData>
          </table>
        </function>
        <function name="aero/function/mach-rudder">
          <description>rudder power over its low-speed value</description>
          <table>
            <independentVar lookup="row">velocities/mach</independentVar>
            <tableData>
                 0.000     1.000000
                 0.300     1.024306
                 0.500     1.074494
                 0.600     1.115909
                 0.700     1.175372
                 0.800     1.266621
                 0.850     1.333697
                 0.900     1.398530
            </tableData>
          </table>
        </function>
        <function name="aero/function/CL-base">
          <description>CL over alpha and beta at low speed</description>
          <table>
            <independentVar lookup="row">aero/alpha-deg</independentVar>
            <independentVar lookup="column">aero/beta-deg</independentVar>
            <tableData>
                        -90.00    -70.00    -50.00    -40.00    -30.00    -25.00    -20.00    -15.00    -10.00     -6.00     -3.00      0.00      3.00      6.00     10.00     15.00     20.00     25.00     30.00     40.00     50.00     70.00     90.00
             -180.00  -0.00000   0.00815   0.05631   0.08225   0.10643   0.11699   0.13225   0.15093   0.14415   0.12724   0.11936   0.11800   0.11936   0.12724   0.14415   0.15093   0.13225   0.11699   0.10643   0.08225   0.05631   0.00815  -0.00000
             -120.00  -0.00003   0.13749   0.36494   0.48227   0.58902   0.63381   0.67181   0.70216   0.72422   0.73564   0.74047   0.74209   0.74047   0.73564   0.72422   0.70216   0.67181   0.63381   0.58902   0.48227   0.36494   0.13749  -0.00003
              -70.00  -0.00003  -0.10972  -0.30838  -0.41570  -0.51272  -0.55424  -0.58970  -0.61817  -0.63899  -0.64979  -0.65438  -0.65591  -0.65438  -0.64979  -0.63899  -0.61817  -0.58970  -0.55424  -0.51272  -0.41570  -0.30838  -0.10972  -0.00003
              -46.00  -0.00003  -0.18425  -0.51632  -0.69150  -0.86508  -0.93650  -0.98887  -1.03381  -1.06666  -1.08367  -1.09088  -1.09329  -1.09088  -1.08367  -1.06666  -1.03381  -0.98887  -0.93650  -0.86508  -0.69150  -0.51632  -0.18425  -0.00003
              -32.00  -0.00002  -0.18955  -0.54056  -0.72090  -0.90905  -0.99320  -1.06563  -1.12449  -1.16891  -1.18759  -1.18989  -1.19092  -1.18989  -1.18759  -1.16891  -1.12449  -1.06563  -0.99320  -0.90905  -0.72090  -0.54056  -0.18955  -0.00002
              -22.00  -0.00001  -0.17766  -0.56168  -0.75668  -0.96516  -1.05600  -1.13965  -1.20671  -1.25967  -1.29516  -1.31469  -1.32042  -1.31469  -1.29516  -1.25967  -1.20671  -1.13965  -1.05600  -0.96516  -0.75668  -0.56168  -0.17766  -0.00001
              -17.00  -0.00001  -0.14269  -0.48457  -0.64442  -0.81362  -0.89254  -0.96497  -1.02858  -1.08482  -1.11153  -1.12065  -1.12338  -1.12065  -1.11153  -1.08482  -1.02858  -0.96497  -0.89254  -0.81362  -0.64442  -0.48457  -0.14269  -0.00001
              -13.00  -0.00001  -0.10739  -0.31813  -0.40257  -0.50701  -0.55900  -0.60717  -0.65562  -0.69070  -0.70328  -0.70769  -0.70908  -0.70769  -0.70328  -0.69070  -0.65562  -0.60717  -0.55900  -0.50701  -0.40257  -0.31813  -0.10739  -0.00001
               -9.00  -0.00001  -0.05057  -0.12460  -0.14789  -0.18878  -0.21356  -0.24138  -0.26895  -0.28034  -0.28359  -0.28454  -0.28476  -0.28454  -0.28359  -0.28034  -0.26895  -0.24138  -0.21356  -0.18878  -0.14789  -0.12460  -0.05057  -0.00001
               -5.00  -0.00000   0.01109   0.06758   0.10993   0.13460   0.13527   0.12689   0.12711   0.13322   0.13747   0.13967   0.14055   0.13967   0.13747   0.13322   0.12711   0.12689   0.13527   0.13460   0.10993   0.06758   0.01109  -0.00000
               -1.00  -0.00000   0.07306   0.26126   0.36565   0.45375   0.47994   0.49973   0.52497   0.54561   0.55665   0.56150   0.56320   0.56150   0.55665   0.54561   0.52497   0.49973   0.47994   0.45375   0.36565   0.26126   0.07306  -0.00000
                3.00   0.00000   0.13235   0.45428   0.62132   0.77080   0.82325   0.87368   0.91979   0.95393   0.97152   0.97887   0.98129   0.97887   0.97152   0.95393   0.91979   0.87368   0.82325   0.77080   0.62132   0.45428   0.13235   0.00000
                7.00   0.00000   0.16087   0.63128   0.87595   1.08599   1.16736   1.24421   1.30903   1.35615   1.38021   1.39016   1.39337   1.39016   1.38021   1.35615   1.30903   1.24421   1.16736   1.08599   0.87595   0.63128   0.16087   0.00000
               11.00   0.00001   0.18028   0.68499   0.98486   1.27023   1.37849   1.47632   1.55765   1.61684   1.64759   1.66084   1.66508   1.66084   1.64759   1.61684   1.55765   1.47632   1.37849   1.27023   0.98486   0.68499   0.18028   0.00001
               15.00   0.00001   0.19957   0.62281   0.87941   1.12613   1.22946   1.31499   1.38353   1.43439   1.46249   1.47595   1.48152   1.47595   1.46249   1.43439   1.38353   1.31499   1.22946   1.12613   0.87941   0.62281   0.19957   0.00001
               19.00   0.00001   0.19209   0.56348   0.77577   0.97380   1.06433   1.13891   1.19998   1.24698   1.27431   1.28675   1.29165   1.28675   1.27431   1.24698   1.19998   1.13891   1.06433   0.97380   0.77577   0.56348   0.19209   0.00001
               23.00   0.00001   0.18554   0.54806   0.74479   0.92193   1.01368   1.08842   1.14811   1.19701   1.22280   1.23287   1.23462   1.23287   1.22280   1.19701   1.14811   1.08842   1.01368   0.92193   0.74479   0.54806   0.18554   0.00001
               27.00   0.00002   0.18711   0.54437   0.73226   0.89943   0.98076   1.06036   1.11937   1.16649   1.18568   1.19054   1.19187   1.19054   1.18568   1.16649   1.11937   1.06036   0.98076   0.89943   0.73226   0.54437   0.18711   0.00002
               32.00   0.00002   0.18964   0.54316   0.72401   0.88298   0.95879   1.03129   1.09892   1.13440   1.14842   1.15283   1.15475   1.15283   1.14842   1.13440   1.09892   1.03129   0.95879   0.88298   0.72401   0.54316   0.18964   0.00002
               46.00   0.00003   0.18414   0.51172   0.68065   0.83367   0.90431   0.95820   0.99762   1.01919   1.03221   1.03774   1.03958   1.03774   1.03221   1.01919   0.99762   0.95820   0.90431   0.83367   0.68065   0.51172   0.18414   0.00003
               70.00   0.00003   0.10705   0.28561   0.37827   0.46369   0.49926   0.52960   0.55394   0.57170   0.58091   0.58482   0.58613   0.58482   0.58091   0.57170   0.55394   0.52960   0.49926   0.46369   0.37827   0.28561   0.10705   0.00003
              120.00   0.00003  -0.13800  -0.37685  -0.50347  -0.61705  -0.66545  -0.70656  -0.73945  -0.76339  -0.77578  -0.78104  -0.78279  -0.78104  -0.77578  -0.76339  -0.73945  -0.70656  -0.66545  -0.61705  -0.50347  -0.37685  -0.13800   0.00003
              180.00   0.00000   0.00815   0.05631   0.08225   0.10643   0.11699   0.13225   0.15093   0.14415   0.12724   0.11936   0.11800   0.11936   0.12724   0.14415   0.15093   0.13225   0.11699   0.10643   0.08225   0.05631   0.00815   0.00000
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            </tableData>
          </table>
        </function>
      <axis name="DRAG">
        <function name="aero/coefficient/CD_base">
          <description>CD over alpha and beta (hangar)</description>
          <product>
            <property>aero/qbar-psf</property>
            <property>metrics/Sw-sqft</property>
          <table>
            <independentVar lookup="row">aero/alpha-deg</independentVar>
            <independentVar lookup="column">aero/beta-deg</independentVar>
            <tableData>
                        -90.00    -70.00    -50.00    -40.00    -30.00    -25.00    -20.00    -15.00    -10.00     -6.00     -3.00      0.00      3.00      6.00     10.00     15.00     20.00     25.00     30.00     40.00     50.00     70.00     90.00
             -180.00   0.37417   0.29489   0.16148   0.10153   0.05717   0.04191   0.03019   0.02378   0.02004   0.01900   0.01930   0.01948   0.01930   0.01900   0.02004   0.02378   0.03019   0.04191   0.05717   0.10153   0.16148   0.29489   0.37417
             -120.00   0.37417   0.39485   0.61248   0.79951   1.00456   1.10203   1.18965   1.26297   1.31822   1.34745   1.35998   1.36417   1.35998   1.34745   1.31822   1.26297   1.18965   1.10203   1.00456   0.79951   0.61248   0.39485   0.37417
              -70.00   0.37417   0.43146   0.71363   0.93754   1.17691   1.28940   1.39002   1.47391   1.53697   1.57030   1.58457   1.58935   1.58457   1.57030   1.53697   1.47391   1.39002   1.28940   1.17691   0.93754   0.71363   0.43146   0.37417
              -46.00   0.37417   0.39677   0.50802   0.60453   0.71062   0.76273   0.80897   0.84830   0.87818   0.89405   0.90086   0.90315   0.90086   0.89405   0.87818   0.84830   0.80897   0.76273   0.71062   0.60453   0.50802   0.39677   0.37417
              -32.00   0.37417   0.37232   0.37366   0.39070   0.42116   0.44168   0.46285   0.48177   0.49681   0.50632   0.50935   0.50880   0.50935   0.50632   0.49681   0.48177   0.46285   0.44168   0.42116   0.39070   0.37366   0.37232   0.37417
              -22.00   0.37417   0.35619   0.28027   0.24202   0.20776   0.19756   0.19108   0.18804   0.18814   0.19010   0.18709   0.18659   0.18709   0.19010   0.18814   0.18804   0.19108   0.19756   0.20776   0.24202   0.28027   0.35619   0.37417
              -17.00   0.37417   0.34983   0.24529   0.18739   0.13258   0.11438   0.10088   0.09344   0.08564   0.08062   0.07917   0.07873   0.07917   0.08062   0.08564   0.09344   0.10088   0.11438   0.13258   0.18739   0.24529   0.34983   0.37417
              -13.00   0.37417   0.34617   0.23154   0.16799   0.10826   0.08854   0.07464   0.06424   0.05266   0.04867   0.04713   0.04662   0.04713   0.04867   0.05266   0.06424   0.07464   0.08854   0.10826   0.16799   0.23154   0.34617   0.37417
               -9.00   0.37417   0.34416   0.22383   0.15714   0.09426   0.07395   0.06050   0.04308   0.03393   0.02987   0.02825   0.02771   0.02825   0.02987   0.03393   0.04308   0.06050   0.07395   0.09426   0.15714   0.22383   0.34416   0.37417
               -5.00   0.37417   0.34304   0.21922   0.15088   0.08806   0.06933   0.04939   0.03429   0.02546   0.02134   0.01972   0.01921   0.01972   0.02134   0.02546   0.03429   0.04939   0.06933   0.08806   0.15088   0.21922   0.34304   0.37417
               -1.00   0.37417   0.34253   0.21831   0.15019   0.09044   0.07075   0.04918   0.03583   0.02706   0.02295   0.02138   0.02089   0.02138   0.02295   0.02706   0.03583   0.04918   0.07075   0.09044   0.15019   0.21831   0.34253   0.37417
                3.00   0.37417   0.34271   0.22115   0.15585   0.10107   0.07743   0.05964   0.04716   0.03854   0.03443   0.03283   0.03234   0.03283   0.03443   0.03854   0.04716   0.05964   0.07743   0.10107   0.15585   0.22115   0.34271   0.37417
                7.00   0.37417   0.34400   0.22799   0.16883   0.11724   0.09469   0.07950   0.06793   0.05966   0.05555   0.05388   0.05333   0.05388   0.05555   0.05966   0.06793   0.07950   0.09469   0.11724   0.16883   0.22799   0.34400   0.37417
               11.00   0.37417   0.34665   0.24122   0.18918   0.14134   0.12137   0.10814   0.09819   0.09114   0.08748   0.08592   0.08540   0.08592   0.08748   0.09114   0.09819   0.10814   0.12137   0.14134   0.18918   0.24122   0.34665   0.37417
               15.00   0.37417   0.34981   0.26125   0.22017   0.18350   0.16487   0.15504   0.14795   0.14361   0.14156   0.14030   0.13976   0.14030   0.14156   0.14361   0.14795   0.15504   0.16487   0.18350   0.22017   0.26125   0.34981   0.37417
               19.00   0.37417   0.35419   0.28636   0.25820   0.24067   0.22904   0.22505   0.22387   0.22547   0.22749   0.22794   0.22839   0.22794   0.22749   0.22547   0.22387   0.22505   0.22904   0.24067   0.25820   0.28636   0.35419   0.37417
               23.00   0.37417   0.35962   0.31387   0.30022   0.29429   0.29476   0.29219   0.29561   0.30078   0.30521   0.30748   0.30789   0.30748   0.30521   0.30078   0.29561   0.29219   0.29476   0.29429   0.30022   0.31387   0.35962   0.37417
               27.00   0.37417   0.36535   0.34499   0.34791   0.35675   0.36299   0.36880   0.37595   0.38471   0.39068   0.39337   0.39429   0.39337   0.39068   0.38471   0.37595   0.36880   0.36299   0.35675   0.34791   0.34499   0.36535   0.37417
               32.00   0.37417   0.37328   0.38861   0.41501   0.44453   0.45787   0.47177   0.48792   0.50017   0.50539   0.50802   0.50908   0.50802   0.50539   0.50017   0.48792   0.47177   0.45787   0.44453   0.41501   0.38861   0.37328   0.37417
               46.00   0.37417   0.39779   0.52475   0.63550   0.74814   0.79756   0.84144   0.87601   0.89843   0.91029   0.91529   0.91695   0.91529   0.91029   0.89843   0.87601   0.84144   0.79756   0.74814   0.63550   0.52475   0.39779   0.37417
               70.00   0.37417   0.43211   0.72455   0.95843   1.20912   1.32708   1.43266   1.52072   1.58694   1.62194   1.63692   1.64195   1.63692   1.62194   1.58694   1.52072   1.43266   1.32708   1.20912   0.95843   0.72455   0.43211   0.37417
              120.00   0.37417   0.39397   0.59784   0.77171   0.96164   1.05181   1.13281   1.20056   1.25159   1.27858   1.29015   1.29402   1.29015   1.27858   1.25159   1.20056   1.13281   1.05181   0.96164   0.77171   0.59784   0.39397   0.37417
              180.00   0.37417   0.29489   0.16148   0.10153   0.05717   0.04191   0.03019   0.02378   0.02004   0.01900   0.01930   0.01948   0.01930   0.01900   0.02004   0.02378   0.03019   0.04191   0.05717   0.10153   0.16148   0.29489   0.37417
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            </tableData>
          </table>
          </product>
        </function>
        <function name="aero/coefficient/CD_mach">
          <description>zero-lift drag's change with Mach: friction, wave drag</description>
          <product>
            <property>aero/qbar-psf</property>
            <property>metrics/Sw-sqft</property>
            <property>aero/function/mach-dCD0</property>
          </product>
        </function>
        <function name="aero/coefficient/CD_induced_mach">
          <description>induced drag's change with Mach (leading-edge suction lost)</description>
          <product>
            <property>aero/qbar-psf</property>
            <property>metrics/Sw-sqft</property>
            <property>aero/cl-squared</property>
            <property>aero/function/mach-dK</property>
          </product>
        </function>
        <function name="aero/coefficient/CD_aileron">
          <description>CD increment from aileron (deg), over alpha</description>
          <product>
            <property>aero/qbar-psf</property>
            <property>metrics/Sw-sqft</property>
            <property>aero/function/mach-aileron</property>
          <table>
            <independentVar lookup="row">aero/alpha-deg</independentVar>
            <independentVar lookup="column">fcs/left-aileron-pos-deg</independentVar>
            <tableData>
                        -20.00    -15.00    -10.00     -5.00      0.00      5.00     10.00     15.00     20.00
             -180.00   0.00297   0.00170   0.00076   0.00019   0.00000   0.00019   0.00076   0.00170   0.00297
             -120.00   0.00296   0.00170   0.00076   0.00019   0.00000   0.00019   0.00076   0.00170   0.00296
              -70.00   0.00296   0.00170   0.00076   0.00019   0.00000   0.00019   0.00076   0.00170   0.00296
              -46.00   0.00461   0.00284   0.00137   0.00036   0.00000   0.00036   0.00137   0.00284   0.00461
              -32.00   0.00591   0.00376   0.00187   0.00050   0.00000   0.00050   0.00187   0.00376   0.00591
              -22.00   0.00069  -0.00002  -0.00022  -0.00009   0.00000  -0.00009  -0.00022  -0.00002   0.00069
              -17.00   0.00599   0.00388   0.00188   0.00046   0.00000   0.00046   0.00188   0.00388   0.00599
              -13.00   0.00702   0.00465   0.00237   0.00062   0.00000   0.00062   0.00237   0.00465   0.00702
               -9.00   0.00690   0.00456   0.00234   0.00064   0.00000   0.00064   0.00234   0.00456   0.00690
               -5.00   0.00694   0.00459   0.00236   0.00065   0.00000   0.00065   0.00236   0.00459   0.00694
               -1.00   0.00688   0.00455   0.00234   0.00064   0.00000   0.00064   0.00234   0.00455   0.00688
                3.00   0.00672   0.00444   0.00228   0.00062   0.00000   0.00062   0.00228   0.00444   0.00672
                7.00   0.00666   0.00438   0.00224   0.00061   0.00000   0.00061   0.00224   0.00438   0.00666
               11.00   0.00910   0.00611   0.00318   0.00088   0.00000   0.00088   0.00318   0.00611   0.00910
               15.00   0.01140   0.00751   0.00386   0.00106   0.00000   0.00106   0.00386   0.00751   0.01140
               19.00   0.00874   0.00570   0.00290   0.00079   0.00000   0.00079   0.00290   0.00570   0.00874
               23.00   0.00757   0.00491   0.00249   0.00068   0.00000   0.00068   0.00249   0.00491   0.00757
               27.00   0.00695   0.00446   0.00224   0.00060   0.00000   0.00060   0.00224   0.00446   0.00695
               32.00   0.00658   0.00417   0.00207   0.00056   0.00000   0.00056   0.00207   0.00417   0.00658
               46.00   0.00503   0.00312   0.00152   0.00040   0.00000   0.00040   0.00152   0.00312   0.00503
               70.00   0.00296   0.00170   0.00076   0.00019   0.00000   0.00019   0.00076   0.00170   0.00296
              120.00   0.00296   0.00170   0.00076   0.00019   0.00000   0.00019   0.00076   0.00170   0.00296
              180.00   0.00297   0.00170   0.00076   0.00019   0.00000   0.00019   0.00076   0.00170   0.00297
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            </tableData>
          </table>
          </product>
        </function>
        <function name="aero/coefficient/CD_elevator">
          <description>CD increment from elevator (deg), over alpha</description>
          <product>
            <property>aero/qbar-psf</property>
            <property>metrics/Sw-sqft</property>
            <property>aero/function/mach-elevator</property>
          <table>
            <independentVar lookup="row">aero/alpha-deg</independentVar>
            <independentVar lookup="column">fcs/elevator-pos-deg</independentVar>
            <tableData>
                        -25.00    -20.00    -15.00    -10.00     -5.00      0.00      5.00     10.00     15.00     20.00     25.00
             -180.00   0.00388   0.00254   0.00145   0.00065   0.00016   0.00000   0.00016   0.00065   0.00145   0.00254   0.00388
             -120.00   0.00178   0.00117   0.00067   0.00030   0.00008   0.00000   0.00008   0.00030   0.00067   0.00117   0.00178
              -70.00   0.00147   0.00096   0.00055   0.00025   0.00006   0.00000   0.00006   0.00025   0.00055   0.00096   0.00147
              -46.00   0.00189   0.00129   0.00077   0.00033   0.00002   0.00000   0.00041   0.00130   0.00256   0.00407   0.00577
              -32.00   0.00219   0.00171   0.00127   0.00077   0.00021   0.00000   0.00055   0.00205   0.00434   0.00709   0.01013
              -22.00   0.01860   0.01648   0.01381   0.01010   0.00526   0.00000  -0.00478  -0.00821  -0.01001  -0.01052  -0.01023
              -17.00   0.01850   0.01599   0.01300   0.00913   0.00449   0.00000  -0.00363  -0.00596  -0.00691  -0.00682  -0.00611
              -13.00   0.01801   0.01525   0.01209   0.00826   0.00397   0.00000  -0.00299  -0.00470  -0.00515  -0.00470  -0.00372
               -9.00   0.01643   0.01374   0.01073   0.00718   0.00335   0.00000  -0.00229  -0.00333  -0.00326  -0.00246  -0.00121
               -5.00   0.01447   0.01187   0.00906   0.00588   0.00262   0.00000  -0.00151  -0.00184  -0.00123  -0.00006   0.00145
               -1.00   0.01217   0.00973   0.00719   0.00445   0.00184   0.00000  -0.00070  -0.00029   0.00087   0.00240   0.00416
                3.00   0.00970   0.00746   0.00521   0.00296   0.00103   0.00000   0.00012   0.00125   0.00294   0.00481   0.00680
                7.00   0.00714   0.00512   0.00320   0.00144   0.00022   0.00000   0.00094   0.00278   0.00497   0.00715   0.00934
               11.00   0.00378   0.00208   0.00061  -0.00046  -0.00076   0.00000   0.00166   0.00425   0.00705   0.00965   0.01210
               15.00   0.00100  -0.00074  -0.00140  -0.00128  -0.00062   0.00000   0.00312   0.00710   0.01086   0.01409   0.01709
               19.00  -0.00067  -0.00181  -0.00216  -0.00295  -0.00342   0.00000   0.00562   0.01101   0.01549   0.01905   0.02214
               23.00   0.00697   0.00080  -0.00140  -0.00254  -0.00284   0.00000   0.00495   0.01014   0.01444   0.01786   0.02076
               27.00   0.01169   0.00293  -0.00203  -0.00380  -0.00267   0.00000   0.00358   0.00749   0.01078   0.01341   0.01567
               32.00   0.00654   0.00175  -0.00187  -0.00334  -0.00251   0.00000   0.00325   0.00670   0.00970   0.01210   0.01416
               46.00   0.00360   0.00199   0.00065  -0.00029  -0.00055   0.00000   0.00125   0.00285   0.00441   0.00582   0.00715
               70.00   0.00147   0.00096   0.00055   0.00025   0.00006   0.00000   0.00006   0.00025   0.00055   0.00096   0.00147
              120.00   0.00178   0.00117   0.00067   0.00030   0.00008   0.00000   0.00008   0.00030   0.00067   0.00117   0.00178
              180.00   0.00388   0.00254   0.00145   0.00065   0.00016   0.00000   0.00016   0.00065   0.00145   0.00254   0.00388
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            </tableData>
          </table>
          </product>
        </function>
        <function name="aero/coefficient/CD_flap">
          <description>CD increment from flap (deg), over alpha</description>
          <product>
            <property>aero/qbar-psf</property>
            <property>metrics/Sw-sqft</property>
            <property>aero/function/mach-flap</property>
          <table>
            <independentVar lookup="row">aero/alpha-deg</independentVar>
            <independentVar lookup="column">fcs/flap-pos-deg</independentVar>
            <tableData>
                          0.00      5.00     10.00     15.00     20.00     25.00     30.00
             -180.00   0.00000   0.00037   0.00145   0.00322   0.00563   0.00860   0.01203
             -120.00   0.00000   0.00037   0.00145   0.00322   0.00562   0.00859   0.01202
              -70.00   0.00000   0.00037   0.00145   0.00322   0.00562   0.00858   0.01202
              -46.00   0.00000   0.00558   0.01227   0.01935   0.02649   0.03383   0.04157
              -32.00   0.00000   0.00716   0.01635   0.02647   0.03678   0.04728   0.05823
              -22.00   0.00000  -0.01184  -0.02090  -0.02558  -0.02652  -0.02521  -0.02275
              -17.00   0.00000  -0.00353  -0.00428  -0.00291  -0.00019   0.00337   0.00756
              -13.00   0.00000  -0.00133  -0.00037   0.00221   0.00570   0.00977   0.01436
               -9.00   0.00000   0.00023   0.00257   0.00616   0.01028   0.01475   0.01966
               -5.00   0.00000   0.00179   0.00547   0.00999   0.01468   0.01952   0.02469
               -1.00   0.00000   0.00329   0.00821   0.01359   0.01877   0.02389   0.02927
                3.00   0.00000   0.00468   0.01073   0.01682   0.02240   0.02773   0.03324
                7.00   0.00000   0.00607   0.01329   0.02019   0.02624   0.03183   0.03750
               11.00   0.00000   0.00648   0.01566   0.02496   0.03294   0.03993   0.04677
               15.00   0.00000   0.00370   0.01097   0.01896   0.02632   0.03332   0.04053
               19.00   0.00000  -0.00227  -0.00176   0.00004   0.00238   0.00530   0.00905
               23.00   0.00000  -0.00468  -0.00685  -0.00758  -0.00758  -0.00700  -0.00582
               27.00   0.00000  -0.00720  -0.01185  -0.01476  -0.01661  -0.01769  -0.01813
               32.00   0.00000  -0.01019  -0.01777  -0.02311  -0.02687  -0.02957  -0.03153
               46.00   0.00000  -0.00673  -0.01153  -0.01444  -0.01588  -0.01633  -0.01614
               70.00   0.00000   0.00037   0.00145   0.00322   0.00562   0.00858   0.01202
              120.00   0.00000   0.00037   0.00145   0.00322   0.00562   0.00859   0.01202
              180.00   0.00000   0.00037   0.00145   0.00322   0.00563   0.00860   0.01203
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            </tableData>
          </table>
          </product>
        </function>
        <function name="aero/coefficient/CD_rudder">
          <description>CD increment from rudder (deg), over alpha</description>
          <product>
            <property>aero/qbar-psf</property>
            <property>metrics/Sw-sqft</property>
            <property>aero/function/mach-rudder</property>
          <table>
            <independentVar lookup="row">aero/alpha-deg</independentVar>
            <independentVar lookup="column">fcs/rudder-pos-deg</independentVar>
            <tableData>
                        -25.00    -20.00    -15.00    -10.00     -5.00      0.00      5.00     10.00     15.00     20.00     25.00
             -180.00   0.00388   0.00254   0.00145   0.00065   0.00016   0.00000   0.00016   0.00065   0.00145   0.00254   0.00388
             -120.00   0.00178   0.00117   0.00067   0.00030   0.00008   0.00000   0.00008   0.00030   0.00067   0.00117   0.00178
              -70.00   0.00147   0.00096   0.00055   0.00025   0.00006   0.00000   0.00006   0.00025   0.00055   0.00096   0.00147
              -46.00   0.00405   0.00286   0.00180   0.00089   0.00024   0.00000   0.00024   0.00089   0.00180   0.00286   0.00405
              -32.00   0.00708   0.00517   0.00338   0.00175   0.00049   0.00000   0.00049   0.00175   0.00338   0.00517   0.00708
              -22.00   0.00495   0.00355   0.00226   0.00111   0.00029   0.00000   0.00029   0.00111   0.00226   0.00355   0.00495
              -17.00   0.00681   0.00502   0.00331   0.00170   0.00046   0.00000   0.00046   0.00170   0.00331   0.00502   0.00681
              -13.00   0.00758   0.00558   0.00368   0.00189   0.00052   0.00000   0.00052   0.00189   0.00368   0.00558   0.00758
               -9.00   0.00804   0.00595   0.00393   0.00202   0.00055   0.00000   0.00055   0.00202   0.00393   0.00595   0.00804
               -5.00   0.00837   0.00620   0.00410   0.00211   0.00058   0.00000   0.00058   0.00211   0.00410   0.00620   0.00837
               -1.00   0.00854   0.00633   0.00420   0.00216   0.00059   0.00000   0.00059   0.00216   0.00420   0.00633   0.00854
                3.00   0.00857   0.00636   0.00421   0.00217   0.00059   0.00000   0.00059   0.00217   0.00421   0.00636   0.00857
                7.00   0.00846   0.00627   0.00416   0.00214   0.00059   0.00000   0.00059   0.00214   0.00416   0.00627   0.00846
               11.00   0.00809   0.00596   0.00389   0.00194   0.00048   0.00000   0.00048   0.00194   0.00389   0.00596   0.00809
               15.00   0.00951   0.00733   0.00518   0.00320   0.00123   0.00000   0.00123   0.00320   0.00518   0.00733   0.00951
               19.00   0.01289   0.00975   0.00716   0.00420   0.00105   0.00000   0.00105   0.00420   0.00716   0.00975   0.01289
               23.00   0.01805   0.01100   0.00661   0.00361   0.00091   0.00000   0.00091   0.00361   0.00661   0.01100   0.01805
               27.00   0.00983   0.00593   0.00349   0.00156   0.00048   0.00000   0.00048   0.00156   0.00349   0.00593   0.00983
               32.00   0.00972   0.00624   0.00360   0.00174   0.00041   0.00000   0.00041   0.00174   0.00360   0.00624   0.00972
               46.00   0.00605   0.00447   0.00294   0.00151   0.00041   0.00000   0.00041   0.00151   0.00294   0.00447   0.00605
               70.00   0.00147   0.00096   0.00055   0.00025   0.00006   0.00000   0.00006   0.00025   0.00055   0.00096   0.00147
              120.00   0.00178   0.00117   0.00067   0.00030   0.00008   0.00000   0.00008   0.00030   0.00067   0.00117   0.00178
              180.00   0.00388   0.00254   0.00145   0.00065   0.00016   0.00000   0.00016   0.00065   0.00145   0.00254   0.00388
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            </tableData>
          </table>
          </product>
        </function>
        <function name="aero/coefficient/CD_ground">
          <description>Induced drag change in ground effect</description>
          <product>
            <property>aero/qbar-psf</property>
            <property>metrics/Sw-sqft</property>
            <property>aero/cl-squared</property>
            <value>0.01497</value>
          <table>
            <independentVar lookup="row">aero/h_b-mac-ft</independentVar>
            <tableData>
                    0.00   -1.00000
                    0.10   -0.28090
                    0.15   -0.14793
                    0.20   -0.08897
                    0.30   -0.04160
                    0.40   -0.02383
                    0.50   -0.01538
                    0.60   -0.01073
                    0.70   -0.00791
                    0.80   -0.00607
                    0.90   -0.00480
                    1.00   -0.00389
                    1.10   -0.00322
            </tableData>
          </table>
          </product>
        </function>
        <function name="aero/coefficient/CD_spoilers">
          <description>spoilers: drag of its spoiler panels, 1.44 m2 opened to 45 deg (hangar)</description>
          <product>
            <property>aero/qbar-psf</property>
            <property>metrics/Sw-sqft</property>
            <value>0.0271673</value>
            <pow>
              <sin>
                <product>
                  <property>fcs/speedbrake-pos-norm</property>
                  <value>0.785398</value>
                </product>
              </sin>
              <value>2</value>
            </pow>
          </product>
        </function>
        <function name="aero/coefficient/CD_gear">
          <description>the gear extended: its wheels' and struts' drag by Raymer's components, 0.199 m2 (hangar)</description>
          <product>
            <property>aero/qbar-psf</property>
            <property>metrics/Sw-sqft</property>
            <value>0.003121</value>
            <property>gear/gear-pos-norm</property>
          </product>
        </function>
      </axis>
      <axis name="SIDE">
        <function name="aero/coefficient/CY_base">
          <description>CY over alpha and beta (hangar)</description>
          <product>
            <property>aero/qbar-psf</property>
            <property>metrics/Sw-sqft</property>
            <property>aero/function/mach-side</property>
          <table>
            <independentVar lookup="row">aero/alpha-deg</independentVar>
            <independentVar lookup="column">aero/beta-deg</independentVar>
            <tableData>
                        -90.00    -70.00    -50.00    -40.00    -30.00    -25.00    -20.00    -15.00    -10.00     -6.00     -3.00      0.00      3.00      6.00     10.00     15.00     20.00     25.00     30.00     40.00     50.00     70.00     90.00
             -180.00  -0.00004   0.10870   0.12846   0.10615   0.07214   0.05403   0.04441   0.04187   0.02824   0.02302   0.01435  -0.00000  -0.01435  -0.02302  -0.02824  -0.04187  -0.04441  -0.05403  -0.07214  -0.10615  -0.12846  -0.10870   0.00004
             -120.00  -0.00002  -0.11409  -0.34629  -0.41082  -0.41313  -0.38277  -0.33330  -0.26671  -0.18613  -0.11430  -0.05771  -0.00000   0.05771   0.11430   0.18613   0.26671   0.33330   0.38277   0.41313   0.41082   0.34629   0.11409   0.00002
              -70.00   0.00001  -0.14728  -0.40567  -0.48045  -0.47029  -0.43347  -0.37599  -0.30002  -0.20896  -0.12820  -0.06470  -0.00000   0.06470   0.12820   0.20896   0.30002   0.37599   0.43347   0.47029   0.48045   0.40567   0.14728  -0.00001
              -46.00   0.00003  -0.03335  -0.14973  -0.18861  -0.22385  -0.21359  -0.18260  -0.14659  -0.10271  -0.06323  -0.03196  -0.00000   0.03196   0.06323   0.10271   0.14659   0.18260   0.21359   0.22385   0.18861   0.14973   0.03335  -0.00003
              -32.00   0.00003   0.03965   0.01021  -0.00258  -0.04859  -0.06136  -0.06557  -0.06294  -0.05356  -0.03634  -0.01692  -0.00000   0.01692   0.03634   0.05356   0.06294   0.06557   0.06136   0.04859   0.00258  -0.01021  -0.03965  -0.00003
              -22.00   0.00003   0.08674   0.11863   0.12551   0.07982   0.06200   0.04088   0.02477   0.01252   0.00870   0.00668  -0.00000  -0.00668  -0.00870  -0.01252  -0.02477  -0.04088  -0.06200  -0.07982  -0.12551  -0.11863  -0.08674  -0.00003
              -17.00   0.00004   0.10818   0.16166   0.16901   0.12254   0.10043   0.07861   0.05754   0.04427   0.02903   0.01479  -0.00000  -0.01479  -0.02903  -0.04427  -0.05754  -0.07861  -0.10043  -0.12254  -0.16901  -0.16166  -0.10818  -0.00004
              -13.00   0.00004   0.12105   0.17708   0.18220   0.13947   0.11649   0.09503   0.07552   0.05487   0.03302   0.01634  -0.00000  -0.01634  -0.03302  -0.05487  -0.07552  -0.09503  -0.11649  -0.13947  -0.18220  -0.17708  -0.12105  -0.00004
               -9.00   0.00004   0.12737   0.18519   0.18725   0.15146   0.12868   0.10811   0.08813   0.05888   0.03447   0.01693  -0.00000  -0.01693  -0.03447  -0.05888  -0.08813  -0.10811  -0.12868  -0.15146  -0.18725  -0.18519  -0.12737  -0.00004
               -5.00   0.00004   0.13066   0.18969   0.18863   0.15963   0.13869   0.12002   0.09250   0.05998   0.03473   0.01689  -0.00000  -0.01689  -0.03473  -0.05998  -0.09250  -0.12002  -0.13869  -0.15963  -0.18863  -0.18969  -0.13066  -0.00004
               -1.00   0.00004   0.13210   0.19064   0.18664   0.16433   0.14610   0.12436   0.09262   0.05945   0.03419   0.01647  -0.00000  -0.01647  -0.03419  -0.05945  -0.09262  -0.12436  -0.14610  -0.16433  -0.18664  -0.19064  -0.13210  -0.00004
                3.00   0.00004   0.13119   0.18826   0.18111   0.16497   0.14883   0.12253   0.09003   0.05764   0.03312   0.01598  -0.00000  -0.01598  -0.03312  -0.05764  -0.09003  -0.12253  -0.14883  -0.16497  -0.18111  -0.18826  -0.13119  -0.00004
                7.00   0.00004   0.12406   0.18137   0.17176   0.15969   0.14388   0.11630   0.08509   0.05449   0.03143   0.01527  -0.00000  -0.01527  -0.03143  -0.05449  -0.08509  -0.11630  -0.14388  -0.15969  -0.17176  -0.18137  -0.12406  -0.00004
               11.00   0.00004   0.11232   0.16257   0.15439   0.14852   0.13309   0.10689   0.07798   0.05010   0.02965   0.01518  -0.00000  -0.01518  -0.02965  -0.05010  -0.07798  -0.10689  -0.13309  -0.14852  -0.15439  -0.16257  -0.11232  -0.00004
               15.00   0.00004   0.10103   0.13683   0.12617   0.12193   0.11264   0.09072   0.06669   0.04274   0.02528   0.01253  -0.00000  -0.01253  -0.02528  -0.04274  -0.06669  -0.09072  -0.11264  -0.12193  -0.12617  -0.13683  -0.10103  -0.00004
               19.00   0.00004   0.08949   0.10793   0.09375   0.08994   0.07547   0.05944   0.04037   0.02381   0.01188   0.00501  -0.00000  -0.00501  -0.01188  -0.02381  -0.04037  -0.05944  -0.07547  -0.08994  -0.09375  -0.10793  -0.08949  -0.00004
               23.00   0.00003   0.07485   0.07595   0.05936   0.05194   0.04331   0.02768   0.01299  -0.00139  -0.00573  -0.00538  -0.00000   0.00538   0.00573   0.00139  -0.01299  -0.02768  -0.04331  -0.05194  -0.05936  -0.07595  -0.07485  -0.00003
               27.00   0.00003   0.05843   0.03951   0.02008   0.01188   0.00451  -0.00350  -0.01562  -0.02340  -0.01744  -0.00820  -0.00000   0.00820   0.01744   0.02340   0.01562   0.00350  -0.00451  -0.01188  -0.02008  -0.03951  -0.05843  -0.00003
               32.00   0.00003   0.03528  -0.01171  -0.03505  -0.04435  -0.05086  -0.05440  -0.05274  -0.04338  -0.02731  -0.01296  -0.00000   0.01296   0.02731   0.04338   0.05274   0.05440   0.05086   0.04435   0.03505   0.01171  -0.03528  -0.00003
               46.00   0.00003  -0.03817  -0.17437  -0.21094  -0.23221  -0.22932  -0.20337  -0.16414  -0.11105  -0.06785  -0.03419  -0.00000   0.03419   0.06785   0.11105   0.16414   0.20337   0.22932   0.23221   0.21094   0.17437   0.03817  -0.00003
               70.00   0.00001  -0.15042  -0.42129  -0.49663  -0.49131  -0.45298  -0.39305  -0.31372  -0.21854  -0.13409  -0.06768  -0.00000   0.06768   0.13409   0.21854   0.31372   0.39305   0.45298   0.49131   0.49663   0.42129   0.15042  -0.00001
              120.00  -0.00002  -0.10991  -0.32599  -0.38899  -0.38594  -0.35727  -0.31090  -0.24868  -0.17349  -0.10653  -0.05379  -0.00000   0.05379   0.10653   0.17349   0.24868   0.31090   0.35727   0.38594   0.38899   0.32599   0.10991   0.00002
              180.00  -0.00004   0.10870   0.12846   0.10615   0.07214   0.05403   0.04441   0.04187   0.02824   0.02302   0.01435  -0.00000  -0.01435  -0.02302  -0.02824  -0.04187  -0.04441  -0.05403  -0.07214  -0.10615  -0.12846  -0.10870   0.00004
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            </tableData>
          </table>
          </product>
        </function>
        <function name="aero/coefficient/CY_aileron">
          <description>CY increment from aileron (deg), over alpha</description>
          <product>
            <property>aero/qbar-psf</property>
            <property>metrics/Sw-sqft</property>
            <property>aero/function/mach-aileron</property>
          <table>
            <independentVar lookup="row">aero/alpha-deg</independentVar>
            <independentVar lookup="column">fcs/left-aileron-pos-deg</independentVar>
            <tableData>
                        -20.00    -15.00    -10.00     -5.00      0.00      5.00     10.00     15.00     20.00
             -180.00   0.00000   0.00000   0.00000   0.00000   0.00000   0.00000   0.00000   0.00000   0.00000
             -120.00   0.00039   0.00033   0.00025   0.00013   0.00000  -0.00013  -0.00025  -0.00033  -0.00039
              -70.00  -0.00015  -0.00013  -0.00009  -0.00005   0.00000   0.00005   0.00009   0.00013   0.00015
              -46.00  -0.00080  -0.00070  -0.00053  -0.00029   0.00000   0.00029   0.00053   0.00070   0.00080
              -32.00  -0.00187  -0.00162  -0.00122  -0.00066   0.00000   0.00066   0.00122   0.00162   0.00187
              -22.00  -0.00343  -0.00297  -0.00225  -0.00122   0.00000   0.00122   0.00225   0.00297   0.00343
              -17.00  -0.00478  -0.00410  -0.00305  -0.00162   0.00000   0.00162   0.00305   0.00410   0.00478
              -13.00  -0.00499  -0.00429  -0.00320  -0.00171   0.00000   0.00171   0.00320   0.00429   0.00499
               -9.00  -0.00509  -0.00437  -0.00326  -0.00174   0.00000   0.00174   0.00326   0.00437   0.00509
               -5.00  -0.00514  -0.00442  -0.00330  -0.00176   0.00000   0.00176   0.00330   0.00442   0.00514
               -1.00  -0.00515  -0.00443  -0.00331  -0.00177   0.00000   0.00177   0.00331   0.00443   0.00515
                3.00  -0.00512  -0.00440  -0.00329  -0.00176   0.00000   0.00176   0.00329   0.00440   0.00512
                7.00  -0.00501  -0.00431  -0.00323  -0.00173   0.00000   0.00173   0.00323   0.00431   0.00501
               11.00  -0.00520  -0.00450  -0.00338  -0.00181   0.00000   0.00181   0.00338   0.00450   0.00520
               15.00  -0.00273  -0.00245  -0.00185  -0.00098   0.00000   0.00098   0.00185   0.00245   0.00273
               19.00  -0.00163  -0.00142  -0.00105  -0.00055   0.00000   0.00055   0.00105   0.00142   0.00163
               23.00  -0.00307  -0.00264  -0.00198  -0.00106   0.00000   0.00106   0.00198   0.00264   0.00307
               27.00  -0.00260  -0.00225  -0.00169  -0.00091   0.00000   0.00091   0.00169   0.00225   0.00260
               32.00  -0.00212  -0.00184  -0.00140  -0.00075   0.00000   0.00075   0.00140   0.00184   0.00212
               46.00  -0.00083  -0.00073  -0.00056  -0.00030   0.00000   0.00030   0.00056   0.00073   0.00083
               70.00  -0.00013  -0.00011  -0.00008  -0.00004   0.00000   0.00004   0.00008   0.00011   0.00013
              120.00   0.00043   0.00036   0.00027   0.00014   0.00000  -0.00014  -0.00027  -0.00036  -0.00043
              180.00  -0.00000  -0.00000  -0.00000  -0.00000   0.00000  -0.00000  -0.00000  -0.00000  -0.00000
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            </tableData>
          </table>
          </product>
        </function>
        <function name="aero/coefficient/CY_rudder">
          <description>CY increment from rudder (deg), over alpha</description>
          <product>
            <property>aero/qbar-psf</property>
            <property>metrics/Sw-sqft</property>
            <property>aero/function/mach-rudder</property>
          <table>
            <independentVar lookup="row">aero/alpha-deg</independentVar>
            <independentVar lookup="column">fcs/rudder-pos-deg</independentVar>
            <tableData>
                        -25.00    -20.00    -15.00    -10.00     -5.00      0.00      5.00     10.00     15.00     20.00     25.00
             -180.00   0.00000   0.00000   0.00000   0.00000   0.00000   0.00000   0.00000   0.00000   0.00000   0.00000   0.00000
             -120.00   0.01000   0.00902   0.00766   0.00568   0.00302   0.00000  -0.00302  -0.00568  -0.00766  -0.00902  -0.01000
              -70.00  -0.00207  -0.00186  -0.00158  -0.00117  -0.00062   0.00000   0.00062   0.00117   0.00158   0.00186   0.00207
              -46.00  -0.01331  -0.01238  -0.01082  -0.00820  -0.00443   0.00000   0.00443   0.00820   0.01082   0.01238   0.01331
              -32.00  -0.02629  -0.02472  -0.02192  -0.01695  -0.00932   0.00000   0.00932   0.01695   0.02192   0.02472   0.02629
              -22.00  -0.04146  -0.03791  -0.03265  -0.02445  -0.01307   0.00000   0.01307   0.02445   0.03265   0.03791   0.04146
              -17.00  -0.04982  -0.04513  -0.03849  -0.02859  -0.01522   0.00000   0.01522   0.02859   0.03849   0.04513   0.04982
              -13.00  -0.05252  -0.04738  -0.04029  -0.02990  -0.01592   0.00000   0.01592   0.02990   0.04029   0.04738   0.05252
               -9.00  -0.05402  -0.04881  -0.04154  -0.03082  -0.01640   0.00000   0.01640   0.03082   0.04154   0.04881   0.05402
               -5.00  -0.05505  -0.04972  -0.04231  -0.03138  -0.01670   0.00000   0.01670   0.03138   0.04231   0.04972   0.05505
               -1.00  -0.05547  -0.05010  -0.04263  -0.03162  -0.01682   0.00000   0.01682   0.03162   0.04263   0.05010   0.05547
                3.00  -0.05534  -0.04998  -0.04253  -0.03154  -0.01678   0.00000   0.01678   0.03154   0.04253   0.04998   0.05534
                7.00  -0.05479  -0.04948  -0.04209  -0.03122  -0.01661   0.00000   0.01661   0.03122   0.04209   0.04948   0.05479
               11.00  -0.05344  -0.04827  -0.04103  -0.03044  -0.01652   0.00000   0.01652   0.03044   0.04103   0.04827   0.05344
               15.00  -0.04753  -0.04243  -0.03503  -0.02537  -0.01350   0.00000   0.01350   0.02537   0.03503   0.04243   0.04753
               19.00  -0.03861  -0.03249  -0.02682  -0.01918  -0.00930   0.00000   0.00930   0.01918   0.02682   0.03249   0.03861
               23.00  -0.03573  -0.02661  -0.02097  -0.01562  -0.00759   0.00000   0.00759   0.01562   0.02097   0.02661   0.03573
               27.00  -0.03303  -0.02768  -0.02264  -0.01699  -0.00921   0.00000   0.00921   0.01699   0.02264   0.02768   0.03303
               32.00  -0.03265  -0.02878  -0.02400  -0.01770  -0.00957   0.00000   0.00957   0.01770   0.02400   0.02878   0.03265
               46.00  -0.02703  -0.02473  -0.02130  -0.01598  -0.00858   0.00000   0.00858   0.01598   0.02130   0.02473   0.02703
               70.00  -0.00428  -0.00386  -0.00328  -0.00243  -0.00129   0.00000   0.00129   0.00243   0.00328   0.00386   0.00428
              120.00   0.00719   0.00649   0.00551   0.00409   0.00217   0.00000  -0.00217  -0.00409  -0.00551  -0.00649  -0.00719
              180.00  -0.00000  -0.00000  -0.00000  -0.00000  -0.00000   0.00000  -0.00000  -0.00000  -0.00000  -0.00000  -0.00000
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            </tableData>
          </table>
          </product>
        </function>
        <function name="aero/coefficient/CYp">
          <description>CY per p (non-dimensional), over alpha</description>
          <product>
            <property>aero/qbar-psf</property>
            <property>metrics/Sw-sqft</property>
            <property>aero/bi2vel</property>
            <property>velocities/p-aero-rad_sec</property>
            <property>aero/function/mach-lift</property>
          <table>
            <independentVar lookup="row">aero/alpha-deg</independentVar>
            <tableData>
                 -180.00   -0.12447
                 -165.00   -0.05557
                 -105.00   -0.06568
                  -60.00   -0.05947
                  -42.00   -0.04101
                  -30.00   -0.00540
                  -20.00   -0.07342
                  -16.00   -0.08590
                  -12.00   -0.08660
                   -8.00   -0.08637
                   -4.00   -0.08613
                    0.00   -0.08612
                    4.00   -0.08662
                    8.00   -0.08879
                   12.00   -0.24313
                   16.00   -0.22768
                   20.00   -0.07977
                   24.00   -0.03495
                   28.00   -0.03357
                   35.00   -0.03676
                   50.00   -0.04548
                   80.00   -0.06722
                  135.00   -0.05222
                  180.00   -0.12447
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            </tableData>
          </table>
          </product>
        </function>
        <function name="aero/coefficient/CYr">
          <description>CY per r (non-dimensional), over alpha</description>
          <product>
            <property>aero/qbar-psf</property>
            <property>metrics/Sw-sqft</property>
            <property>aero/bi2vel</property>
            <property>velocities/r-aero-rad_sec</property>
            <property>aero/function/mach-lift</property>
          <table>
            <independentVar lookup="row">aero/alpha-deg</independentVar>
            <tableData>
                 -180.00    0.09760
                 -165.00    0.06858
                 -105.00    0.03089
                  -60.00   -0.00158
                  -42.00   -0.02268
                  -30.00   -0.08216
                  -20.00    0.02486
                  -16.00    0.03864
                  -12.00    0.04874
                   -8.00    0.05805
                   -4.00    0.06689
                    0.00    0.07410
                    4.00    0.07797
                    8.00    0.08324
                   12.00    0.05538
                   16.00    0.02657
                   20.00    0.04698
                   24.00    0.05318
                   28.00    0.05579
                   35.00    0.05979
                   50.00    0.03738
                   80.00    0.02686
                  135.00    0.00903
                  180.00    0.09760
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            </tableData>
          </table>
          </product>
        </function>
      </axis>
      <axis name="LIFT">
        <function name="aero/coefficient/CL_base">
          <description>CL over alpha and beta, ground effect, compressibility (hangar)</description>
          <product>
            <property>aero/qbar-psf</property>
            <property>metrics/Sw-sqft</property>
            <property>aero/function/CL-base</property>
            <property>aero/function/mach-lift</property>
          <table>
            <independentVar lookup="row">aero/h_b-mac-ft</independentVar>
            <tableData>
                    0.00    1.20000
                    0.10    1.08692
                    0.15    1.05730
                    0.20    1.03778
                    0.30    1.01642
                    0.40    1.00713
                    0.50    1.00310
                    0.60    1.00135
                    0.70    1.00059
                    0.80    1.00025
                    0.90    1.00011
                    1.00    1.00005
                    1.10    1.00000
            </tableData>
          </table>
          </product>
        </function>
        <function name="aero/coefficient/CL_elevator">
          <description>CL increment from elevator (deg), over alpha</description>
          <product>
            <property>aero/qbar-psf</property>
            <property>metrics/Sw-sqft</property>
            <property>aero/function/mach-elevator</property>
          <table>
            <independentVar lookup="row">aero/alpha-deg</independentVar>
            <independentVar lookup="column">fcs/elevator-pos-deg</independentVar>
            <tableData>
                        -25.00    -20.00    -15.00    -10.00     -5.00      0.00      5.00     10.00     15.00     20.00     25.00
             -180.00   0.00000   0.00000   0.00000   0.00000   0.00000   0.00000   0.00000   0.00000   0.00000   0.00000   0.00000
             -120.00  -0.01919  -0.01713  -0.01443  -0.01062  -0.00562   0.00000   0.00556   0.01038   0.01391   0.01622   0.01779
              -70.00  -0.00458  -0.00430  -0.00379  -0.00292  -0.00162   0.00000   0.00175   0.00342   0.00477   0.00578   0.00659
              -46.00  -0.01732  -0.01637  -0.01461  -0.01141  -0.00642   0.00000   0.00709   0.01380   0.01907   0.02276   0.02549
              -32.00  -0.02021  -0.02001  -0.01878  -0.01555  -0.00925   0.00000   0.01099   0.02174   0.03013   0.03584   0.03982
              -22.00  -0.02693  -0.02642  -0.02458  -0.02002  -0.01166   0.00000   0.01369   0.02697   0.03720   0.04418   0.04921
              -17.00  -0.05178  -0.04842  -0.04260  -0.03254  -0.01770   0.00000   0.01826   0.03458   0.04671   0.05478   0.06045
              -13.00  -0.05911  -0.05423  -0.04678  -0.03518  -0.01899   0.00000   0.01934   0.03648   0.04915   0.05755   0.06342
               -9.00  -0.06201  -0.05687  -0.04912  -0.03689  -0.01981   0.00000   0.02003   0.03769   0.05070   0.05928   0.06525
               -5.00  -0.06446  -0.05895  -0.05075  -0.03800  -0.02035   0.00000   0.02046   0.03842   0.05159   0.06025   0.06623
               -1.00  -0.06593  -0.06015  -0.05166  -0.03859  -0.02061   0.00000   0.02063   0.03867   0.05183   0.06045   0.06637
                3.00  -0.06655  -0.06060  -0.05193  -0.03871  -0.02063   0.00000   0.02056   0.03851   0.05160   0.06014   0.06597
                7.00  -0.06703  -0.06095  -0.05218  -0.03887  -0.02072   0.00000   0.02067   0.03866   0.05170   0.06013   0.06582
               11.00  -0.06006  -0.05459  -0.04676  -0.03483  -0.01860   0.00000   0.01803   0.03305   0.04454   0.05206   0.05702
               15.00  -0.05834  -0.05311  -0.04529  -0.03168  -0.01675   0.00000   0.01272   0.02353   0.03297   0.03956   0.04430
               19.00  -0.05072  -0.04479  -0.03633  -0.02738  -0.01352   0.00000   0.01162   0.02262   0.03157   0.03774   0.04210
               23.00  -0.04234  -0.02822  -0.01831  -0.01340  -0.00708   0.00000   0.01085   0.02267   0.03138   0.03710   0.04096
               27.00  -0.03696  -0.02586  -0.01697  -0.01519  -0.01007   0.00000   0.01174   0.02233   0.03015   0.03502   0.03813
               32.00  -0.03657  -0.03154  -0.02645  -0.02008  -0.01152   0.00000   0.01177   0.02220   0.02969   0.03436   0.03734
               46.00  -0.04281  -0.03841  -0.03234  -0.02359  -0.01224   0.00000   0.01143   0.02072   0.02707   0.03099   0.03354
               70.00  -0.01298  -0.01150  -0.00958  -0.00694  -0.00359   0.00000   0.00338   0.00617   0.00812   0.00934   0.01014
              120.00  -0.01260  -0.01153  -0.00993  -0.00744  -0.00399   0.00000   0.00405   0.00767   0.01045   0.01245   0.01400
              180.00   0.00000   0.00000   0.00000   0.00000   0.00000   0.00000   0.00000   0.00000   0.00000   0.00000   0.00000
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            </tableData>
          </table>
          </product>
        </function>
        <function name="aero/coefficient/CL_flap">
          <description>CL increment from flap (deg), over alpha</description>
          <product>
            <property>aero/qbar-psf</property>
            <property>metrics/Sw-sqft</property>
            <property>aero/function/mach-flap</property>
          <table>
            <independentVar lookup="row">aero/alpha-deg</independentVar>
            <independentVar lookup="column">fcs/flap-pos-deg</independentVar>
            <tableData>
                          0.00      5.00     10.00     15.00     20.00     25.00     30.00
             -180.00   0.00000   0.00000   0.00000   0.00000   0.00000   0.00000   0.00000
             -120.00   0.00000   0.01292   0.02430   0.03279   0.03858   0.04277   0.04635
              -70.00   0.00000   0.00939   0.01817   0.02504   0.02989   0.03350   0.03663
              -46.00   0.00000   0.03124   0.06013   0.08207   0.09672   0.10682   0.11507
              -32.00   0.00000   0.04857   0.09342   0.12710   0.14899   0.16344   0.17472
              -22.00   0.00000   0.04210   0.08088   0.11452   0.13954   0.15779   0.17320
              -17.00   0.00000   0.10015   0.18827   0.25283   0.29497   0.32377   0.34736
              -13.00   0.00000   0.10264   0.19253   0.25808   0.30072   0.32978   0.35353
               -9.00   0.00000   0.10298   0.19301   0.25851   0.30098   0.32982   0.35332
               -5.00   0.00000   0.10258   0.19208   0.25703   0.29900   0.32737   0.35042
               -1.00   0.00000   0.10146   0.18981   0.25375   0.29489   0.32254   0.34491
                3.00   0.00000   0.09971   0.18634   0.24882   0.28880   0.31549   0.33697
                7.00   0.00000   0.09927   0.18538   0.24646   0.28473   0.30981   0.32973
               11.00   0.00000   0.07841   0.14303   0.18899   0.21940   0.24096   0.25890
               15.00   0.00000   0.06874   0.12642   0.16927   0.20059   0.22552   0.24761
               19.00   0.00000   0.06639   0.12070   0.15926   0.18629   0.20788   0.22789
               23.00   0.00000   0.05890   0.10700   0.14055   0.16265   0.17866   0.19230
               27.00   0.00000   0.05112   0.09315   0.12229   0.14106   0.15416   0.16500
               32.00   0.00000   0.04253   0.07764   0.10192   0.11728   0.12762   0.13594
               46.00   0.00000   0.02501   0.04581   0.06025   0.06926   0.07520   0.07988
               70.00   0.00000   0.00581   0.01065   0.01410   0.01637   0.01798   0.01932
              120.00   0.00000   0.01703   0.03203   0.04322   0.05086   0.05639   0.06111
              180.00   0.00000   0.00000   0.00000   0.00000   0.00000   0.00000   0.00000
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            </tableData>
          </table>
          <table>
            <independentVar lookup="row">aero/h_b-mac-ft</independentVar>
            <tableData>
                    0.00    1.20000
                    0.10    1.08692
                    0.15    1.05730
                    0.20    1.03778
                    0.30    1.01642
                    0.40    1.00713
                    0.50    1.00310
                    0.60    1.00135
                    0.70    1.00059
                    0.80    1.00025
                    0.90    1.00011
                    1.00    1.00005
                    1.10    1.00000
            </tableData>
          </table>
          </product>
        </function>
        <function name="aero/coefficient/CLq">
          <description>CL per q (non-dimensional), over alpha</description>
          <product>
            <property>aero/qbar-psf</property>
            <property>metrics/Sw-sqft</property>
            <property>aero/ci2vel</property>
            <property>velocities/q-aero-rad_sec</property>
            <property>aero/function/mach-lift</property>
          <table>
            <independentVar lookup="row">aero/alpha-deg</independentVar>
            <tableData>
                 -180.00   -2.07419
                 -165.00   -0.79831
                 -105.00   -0.23597
                  -60.00    0.31644
                  -42.00    1.06519
                  -30.00    0.79590
                  -20.00    2.92304
                  -16.00    8.04596
                  -12.00    8.77006
                   -8.00    8.76774
                   -4.00    8.73270
                    0.00    8.70842
                    4.00    8.69854
                    8.00    7.67936
                   12.00   -0.06837
                   16.00   -2.20603
                   20.00    0.28037
                   24.00    0.84445
                   28.00    1.08891
                   35.00    0.90883
                   50.00    0.32353
                   80.00    0.15599
                  135.00   -0.47871
                  180.00   -2.07419
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            </tableData>
          </table>
          </product>
        </function>
        <function name="aero/coefficient/CLadot">
          <description>CL per alpha-dot (downwash lag at the tail)</description>
          <product>
            <property>aero/qbar-psf</property>
            <property>metrics/Sw-sqft</property>
            <property>aero/ci2vel</property>
            <property>aero/alphadot-rad_sec</property>
            <value>0.00000</value>
            <property>aero/function/mach-lift</property>
          </product>
        </function>
        <function name="aero/coefficient/CL_spoilers">
          <description>spoilers: the lift lost behind them, 14.4 m2 of wing, over alpha (hangar)</description>
          <product>
            <property>aero/qbar-psf</property>
            <property>metrics/Sw-sqft</property>
            <table>
              <independentVar lookup="row">aero/alpha-deg</independentVar>
              <tableData>
                   -180.00   -0.01870
                   -165.00   -0.07542
                   -105.00   -0.06527
                    -60.00    0.14177
                    -42.00    0.17913
                    -30.00    0.19052
                    -20.00    0.20864
                    -16.00    0.16226
                    -12.00    0.09561
                     -8.00    0.02827
                     -4.00   -0.03908
                      0.00   -0.10589
                      4.00   -0.17193
                      8.00   -0.23767
                     12.00   -0.26076
                     16.00   -0.22463
                     20.00   -0.20224
                     24.00   -0.19401
                     28.00   -0.18755
                     35.00   -0.18149
                     50.00   -0.15785
                     80.00   -0.04423
                    135.00    0.13651
                    180.00   -0.01870
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              </tableData>
            </table>
            <min>
              <value>1</value>
              <product>
                <property>fcs/speedbrake-pos-norm</property>
                <value>1</value>
              </product>
            </min>
          </product>
        </function>
      </axis>
      <axis name="ROLL">
        <function name="aero/coefficient/Cl_base">
          <description>Cl over alpha and beta (hangar)</description>
          <product>
            <property>aero/qbar-psf</property>
            <property>metrics/Sw-sqft</property>
            <property>metrics/bw-ft</property>
            <property>aero/function/mach-side</property>
          <table>
            <independentVar lookup="row">aero/alpha-deg</independentVar>
            <independentVar lookup="column">aero/beta-deg</independentVar>
            <tableData>
                        -90.00    -70.00    -50.00    -40.00    -30.00    -25.00    -20.00    -15.00    -10.00     -6.00     -3.00      0.00      3.00      6.00     10.00     15.00     20.00     25.00     30.00     40.00     50.00     70.00     90.00
             -180.00   0.00854   0.01797   0.02368   0.02272   0.01941   0.01697   0.01458   0.01222   0.00861   0.00579   0.00316  -0.00000  -0.00316  -0.00579  -0.00861  -0.01222  -0.01458  -0.01697  -0.01941  -0.02272  -0.02368  -0.01797  -0.00854
             -120.00   0.00854   0.01402   0.01628   0.01567   0.01320   0.01156   0.00962   0.00744   0.00507   0.00307   0.00154  -0.00000  -0.00154  -0.00307  -0.00507  -0.00744  -0.00962  -0.01156  -0.01320  -0.01567  -0.01628  -0.01402  -0.00854
              -70.00   0.00854   0.01473   0.01753   0.01658   0.01434   0.01260   0.01052   0.00815   0.00556   0.00337   0.00169  -0.00000  -0.00169  -0.00337  -0.00556  -0.00815  -0.01052  -0.01260  -0.01434  -0.01658  -0.01753  -0.01473  -0.00854
              -46.00   0.00854   0.01315   0.01524   0.01460   0.01037   0.00856   0.00721   0.00547   0.00366   0.00220   0.00110  -0.00000  -0.00110  -0.00220  -0.00366  -0.00547  -0.00721  -0.00856  -0.01037  -0.01460  -0.01524  -0.01315  -0.00854
              -32.00   0.00854   0.01139   0.01250   0.01126   0.00476   0.00208   0.00040  -0.00041  -0.00097  -0.00074  -0.00028  -0.00000   0.00028   0.00074   0.00097   0.00041  -0.00040  -0.00208  -0.00476  -0.01126  -0.01250  -0.01139  -0.00854
              -22.00   0.00854   0.01026   0.00810   0.00506  -0.00351  -0.00536  -0.00553  -0.00464  -0.00344  -0.00207  -0.00086  -0.00000   0.00086   0.00207   0.00344   0.00464   0.00553   0.00536   0.00351  -0.00506  -0.00810  -0.01026  -0.00854
              -17.00   0.00854   0.01612   0.02053   0.01837   0.00967   0.00668   0.00532   0.00406   0.00326   0.00231   0.00122  -0.00000  -0.00122  -0.00231  -0.00326  -0.00406  -0.00532  -0.00668  -0.00967  -0.01837  -0.02053  -0.01612  -0.00854
              -13.00   0.00854   0.02119   0.02772   0.02347   0.01568   0.01269   0.01067   0.00866   0.00652   0.00407   0.00205  -0.00000  -0.00205  -0.00407  -0.00652  -0.00866  -0.01067  -0.01269  -0.01568  -0.02347  -0.02772  -0.02119  -0.00854
               -9.00   0.00854   0.02264   0.02775   0.02414   0.01907   0.01649   0.01413   0.01178   0.00830   0.00505   0.00254  -0.00000  -0.00254  -0.00505  -0.00830  -0.01178  -0.01413  -0.01649  -0.01907  -0.02414  -0.02775  -0.02264  -0.00854
               -5.00   0.00854   0.02272   0.02814   0.02540   0.02228   0.02022   0.01779   0.01437   0.00988   0.00599   0.00301  -0.00000  -0.00301  -0.00599  -0.00988  -0.01437  -0.01779  -0.02022  -0.02228  -0.02540  -0.02814  -0.02272  -0.00854
               -1.00   0.00854   0.02282   0.02803   0.02665   0.02598   0.02433   0.02124   0.01669   0.01140   0.00692   0.00347  -0.00000  -0.00347  -0.00692  -0.01140  -0.01669  -0.02124  -0.02433  -0.02598  -0.02665  -0.02803  -0.02282  -0.00854
                3.00   0.00854   0.02267   0.02814   0.02783   0.02936   0.02829   0.02428   0.01891   0.01291   0.00783   0.00393  -0.00000  -0.00393  -0.00783  -0.01291  -0.01891  -0.02428  -0.02829  -0.02936  -0.02783  -0.02814  -0.02267  -0.00854
                7.00   0.00854   0.01655   0.02595   0.02890   0.03299   0.03234   0.02755   0.02146   0.01467   0.00891   0.00448  -0.00000  -0.00448  -0.00891  -0.01467  -0.02146  -0.02755  -0.03234  -0.03299  -0.02890  -0.02595  -0.01655  -0.00854
               11.00   0.00854   0.00844   0.00293   0.00794   0.01803   0.01951   0.01681   0.01304   0.00891   0.00545   0.00278  -0.00000  -0.00278  -0.00545  -0.00891  -0.01304  -0.01681  -0.01951  -0.01803  -0.00794  -0.00293  -0.00844  -0.00854
               15.00   0.00854   0.00386  -0.00313  -0.00184   0.00704   0.00995   0.00899   0.00707   0.00491   0.00310   0.00161  -0.00000  -0.00161  -0.00310  -0.00491  -0.00707  -0.00899  -0.00995  -0.00704   0.00184   0.00313  -0.00386  -0.00854
               19.00   0.00854   0.00640   0.00558   0.00624   0.01246   0.01368   0.01256   0.00996   0.00703   0.00432   0.00215  -0.00000  -0.00215  -0.00432  -0.00703  -0.00996  -0.01256  -0.01368  -0.01246  -0.00624  -0.00558  -0.00640  -0.00854
               23.00   0.00854   0.00934   0.00907   0.00926   0.01375   0.01420   0.01285   0.00998   0.00639   0.00364   0.00163  -0.00000  -0.00163  -0.00364  -0.00639  -0.00998  -0.01285  -0.01420  -0.01375  -0.00926  -0.00907  -0.00934  -0.00854
               27.00   0.00854   0.01051   0.01088   0.01035   0.01276   0.01271   0.01135   0.00835   0.00492   0.00277   0.00145  -0.00000  -0.00145  -0.00277  -0.00492  -0.00835  -0.01135  -0.01271  -0.01276  -0.01035  -0.01088  -0.01051  -0.00854
               32.00   0.00854   0.01150   0.01250   0.01136   0.01094   0.00994   0.00836   0.00587   0.00351   0.00205   0.00111  -0.00000  -0.00111  -0.00205  -0.00351  -0.00587  -0.00836  -0.00994  -0.01094  -0.01136  -0.01250  -0.01150  -0.00854
               46.00   0.00854   0.01318   0.01514   0.01487   0.01117   0.00844   0.00645   0.00478   0.00329   0.00197   0.00099  -0.00000  -0.00099  -0.00197  -0.00329  -0.00478  -0.00645  -0.00844  -0.01117  -0.01487  -0.01514  -0.01318  -0.00854
               70.00   0.00854   0.01474   0.01748   0.01673   0.01426   0.01253   0.01046   0.00810   0.00553   0.00335   0.00168  -0.00000  -0.00168  -0.00335  -0.00553  -0.00810  -0.01046  -0.01253  -0.01426  -0.01673  -0.01748  -0.01474  -0.00854
              120.00   0.00854   0.01400   0.01631   0.01549   0.01326   0.01161   0.00967   0.00748   0.00509   0.00309   0.00155  -0.00000  -0.00155  -0.00309  -0.00509  -0.00748  -0.00967  -0.01161  -0.01326  -0.01549  -0.01631  -0.01400  -0.00854
              180.00   0.00854   0.01797   0.02368   0.02272   0.01941   0.01697   0.01458   0.01222   0.00861   0.00579   0.00316  -0.00000  -0.00316  -0.00579  -0.00861  -0.01222  -0.01458  -0.01697  -0.01941  -0.02272  -0.02368  -0.01797  -0.00854
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            </tableData>
          </table>
          </product>
        </function>
        <function name="aero/coefficient/Cl_aileron">
          <description>Cl increment from aileron (deg), over alpha</description>
          <product>
            <property>aero/qbar-psf</property>
            <property>metrics/Sw-sqft</property>
            <property>metrics/bw-ft</property>
            <property>aero/function/mach-aileron</property>
          <table>
            <independentVar lookup="row">aero/alpha-deg</independentVar>
            <independentVar lookup="column">fcs/left-aileron-pos-deg</independentVar>
            <tableData>
                        -20.00    -15.00    -10.00     -5.00      0.00      5.00     10.00     15.00     20.00
             -180.00  -0.00000  -0.00000  -0.00000  -0.00000   0.00000  -0.00000  -0.00000  -0.00000  -0.00000
              -35.00  -0.01580  -0.01392  -0.01061  -0.00574   0.00000   0.00574   0.01061   0.01392   0.01580
              -11.00  -0.05697  -0.04878  -0.03641  -0.01945   0.00000   0.01945   0.03641   0.04878   0.05697
                4.00  -0.05620  -0.04833  -0.03613  -0.01931   0.00000   0.01931   0.03613   0.04833   0.05620
               19.00  -0.03616  -0.03088  -0.02307  -0.01236   0.00000   0.01236   0.02307   0.03088   0.03616
               42.00  -0.00894  -0.00805  -0.00623  -0.00340   0.00000   0.00340   0.00623   0.00805   0.00894
              180.00  -0.00000  -0.00000  -0.00000  -0.00000   0.00000  -0.00000  -0.00000  -0.00000  -0.00000
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            </tableData>
          </table>
          </product>
        </function>
        <function name="aero/coefficient/Cl_rudder">
          <description>Cl increment from rudder (deg), over alpha</description>
          <product>
            <property>aero/qbar-psf</property>
            <property>metrics/Sw-sqft</property>
            <property>metrics/bw-ft</property>
            <property>aero/function/mach-rudder</property>
          <table>
            <independentVar lookup="row">aero/alpha-deg</independentVar>
            <independentVar lookup="column">fcs/rudder-pos-deg</independentVar>
            <tableData>
                        -25.00    -20.00    -15.00    -10.00     -5.00      0.00      5.00     10.00     15.00     20.00     25.00
             -180.00  -0.00000  -0.00000  -0.00000  -0.00000  -0.00000   0.00000  -0.00000  -0.00000  -0.00000  -0.00000  -0.00000
              -35.00  -0.00165  -0.00156  -0.00139  -0.00107  -0.00059   0.00000   0.00059   0.00107   0.00139   0.00156   0.00165
              -11.00  -0.00404  -0.00365  -0.00311  -0.00231  -0.00123   0.00000   0.00123   0.00231   0.00311   0.00365   0.00404
                4.00  -0.00422  -0.00381  -0.00325  -0.00241  -0.00128   0.00000   0.00128   0.00241   0.00325   0.00381   0.00422
               19.00  -0.00395  -0.00349  -0.00297  -0.00220  -0.00112   0.00000   0.00112   0.00220   0.00297   0.00349   0.00395
               42.00  -0.00253  -0.00231  -0.00199  -0.00149  -0.00080   0.00000   0.00080   0.00149   0.00199   0.00231   0.00253
              180.00  -0.00000  -0.00000  -0.00000  -0.00000  -0.00000   0.00000  -0.00000  -0.00000  -0.00000  -0.00000  -0.00000
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            </tableData>
          </table>
          </product>
        </function>
        <function name="aero/coefficient/Clp">
          <description>Cl per p (non-dimensional), over alpha</description>
          <product>
            <property>aero/qbar-psf</property>
            <property>metrics/Sw-sqft</property>
            <property>metrics/bw-ft</property>
            <property>aero/bi2vel</property>
            <property>velocities/p-aero-rad_sec</property>
            <property>aero/function/mach-lift</property>
          <table>
            <independentVar lookup="row">aero/alpha-deg</independentVar>
            <tableData>
                 -180.00   -0.63092
                 -165.00   -0.21114
                  -32.00   -0.16898
                  -10.00   -0.65227
                    5.00   -0.65634
                   20.00    0.03766
                   46.00   -0.22303
                  180.00   -0.63092
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            </tableData>
          </table>
          </product>
        </function>
        <function name="aero/coefficient/Clr">
          <description>Cl per r (non-dimensional), over alpha</description>
          <product>
            <property>aero/qbar-psf</property>
            <property>metrics/Sw-sqft</property>
            <property>metrics/bw-ft</property>
            <property>aero/bi2vel</property>
            <property>velocities/r-aero-rad_sec</property>
            <property>aero/function/mach-lift</property>
          <table>
            <independentVar lookup="row">aero/alpha-deg</independentVar>
            <tableData>
                 -180.00    0.02709
                 -165.00    0.05995
                  -32.00   -0.21724
                  -10.00    0.03040
                    5.00    0.22189
                   20.00    0.33080
                   46.00    0.19182
                  180.00    0.02709
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            </tableData>
          </table>
          </product>
        </function>
      </axis>
      <axis name="PITCH">
        <function name="aero/coefficient/Cm_base">
          <description>Cm over alpha and beta (hangar)</description>
          <product>
            <property>aero/qbar-psf</property>
            <property>metrics/Sw-sqft</property>
            <property>metrics/cbarw-ft</property>
          <table>
            <independentVar lookup="row">aero/alpha-deg</independentVar>
            <independentVar lookup="column">aero/beta-deg</independentVar>
            <tableData>
                        -90.00    -70.00    -50.00    -40.00    -30.00    -25.00    -20.00    -15.00    -10.00     -6.00     -3.00      0.00      3.00      6.00     10.00     15.00     20.00     25.00     30.00     40.00     50.00     70.00     90.00
             -180.00   0.00003  -0.00165   0.01410   0.02256   0.03048   0.03394   0.06065   0.10293   0.06204  -0.00441  -0.03613  -0.04269  -0.03613  -0.00441   0.06204   0.10293   0.06065   0.03394   0.03048   0.02256   0.01410  -0.00165   0.00003
              -35.00   0.00003   0.05450   0.08125   0.04992   0.11385   0.14138   0.16683   0.18921   0.19264   0.17447   0.17009   0.16933   0.17009   0.17447   0.19264   0.18921   0.16683   0.14138   0.11385   0.04992   0.08125   0.05450   0.00003
              -11.00   0.00003   0.00767  -0.02728  -0.09564  -0.07449  -0.04551  -0.00705   0.04570   0.07426   0.08284   0.08594   0.08696   0.08594   0.08284   0.07426   0.04570  -0.00705  -0.04551  -0.07449  -0.09564  -0.02728   0.00767   0.00003
                4.00   0.00003  -0.01934  -0.06871  -0.10235  -0.12881  -0.09097  -0.07466  -0.07315  -0.07372  -0.07483  -0.07576  -0.07620  -0.07576  -0.07483  -0.07372  -0.07315  -0.07466  -0.09097  -0.12881  -0.10235  -0.06871  -0.01934   0.00003
               19.00   0.00003  -0.03011  -0.05188  -0.04640  -0.04379  -0.06885  -0.09540  -0.11858  -0.14559  -0.17053  -0.18416  -0.19109  -0.18416  -0.17053  -0.14559  -0.11858  -0.09540  -0.06885  -0.04379  -0.04640  -0.05188  -0.03011   0.00003
               42.00   0.00003  -0.06211  -0.11616  -0.11347  -0.14000  -0.17267  -0.21386  -0.21698  -0.22906  -0.23480  -0.22149  -0.21792  -0.22149  -0.23480  -0.22906  -0.21698  -0.21386  -0.17267  -0.14000  -0.11347  -0.11616  -0.06211   0.00003
              180.00   0.00003  -0.00165   0.01410   0.02256   0.03048   0.03394   0.06065   0.10293   0.06204  -0.00441  -0.03613  -0.04269  -0.03613  -0.00441   0.06204   0.10293   0.06065   0.03394   0.03048   0.02256   0.01410  -0.00165   0.00003
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            </tableData>
          </table>
          </product>
        </function>
        <function name="aero/coefficient/Cm_mach">
          <description>Cm from the neutral point's move with Mach</description>
          <product>
            <property>aero/qbar-psf</property>
            <property>metrics/Sw-sqft</property>
            <property>metrics/cbarw-ft</property>
            <property>aero/function/CL-base</property>
            <property>aero/function/mach-dCm-dCL</property>
          </product>
        </function>
        <function name="aero/coefficient/Cm_elevator">
          <description>Cm increment from elevator (deg), over alpha</description>
          <product>
            <property>aero/qbar-psf</property>
            <property>metrics/Sw-sqft</property>
            <property>metrics/cbarw-ft</property>
            <property>aero/function/mach-elevator</property>
          <table>
            <independentVar lookup="row">aero/alpha-deg</independentVar>
            <independentVar lookup="column">fcs/elevator-pos-deg</independentVar>
            <tableData>
                        -25.00    -20.00    -15.00    -10.00     -5.00      0.00      5.00     10.00     15.00     20.00     25.00
             -180.00  -0.00362  -0.00237  -0.00136  -0.00061  -0.00015   0.00000  -0.00015  -0.00061  -0.00136  -0.00237  -0.00362
              -35.00   0.04148   0.03972   0.03612   0.02882   0.01638   0.00000  -0.01725  -0.03170  -0.04040  -0.04362  -0.04330
              -11.00   0.18608   0.16803   0.14313   0.10634   0.05646   0.00000  -0.05570  -0.10364  -0.13804  -0.15997  -0.17449
                4.00   0.20219   0.18255   0.15515   0.11468   0.06062   0.00000  -0.05962  -0.11109  -0.14821  -0.17209  -0.18810
               19.00   0.17864   0.15939   0.13094   0.09903   0.04949   0.00000  -0.04370  -0.08387  -0.11582  -0.13778  -0.15341
               42.00   0.13575   0.12394   0.10655   0.07948   0.04225   0.00000  -0.04138  -0.07648  -0.10152  -0.11788  -0.12933
              180.00  -0.00362  -0.00237  -0.00136  -0.00061  -0.00015   0.00000  -0.00015  -0.00061  -0.00136  -0.00237  -0.00362
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            </tableData>
          </table>
          </product>
        </function>
        <function name="aero/coefficient/Cm_flap">
          <description>Cm increment from flap (deg), over alpha</description>
          <product>
            <property>aero/qbar-psf</property>
            <property>metrics/Sw-sqft</property>
            <property>metrics/cbarw-ft</property>
            <property>aero/function/mach-flap</property>
          <table>
            <independentVar lookup="row">aero/alpha-deg</independentVar>
            <independentVar lookup="column">fcs/flap-pos-deg</independentVar>
            <tableData>
                          0.00      5.00     10.00     15.00     20.00     25.00     30.00
             -180.00   0.00000   0.00003   0.00012   0.00027   0.00047   0.00071   0.00100
              -35.00   0.00000  -0.00613  -0.01173  -0.01605  -0.01910  -0.02136  -0.02331
              -11.00   0.00000  -0.00714  -0.01385  -0.01937  -0.02368  -0.02726  -0.03060
                4.00   0.00000  -0.00552  -0.01067  -0.01499  -0.01850  -0.02153  -0.02439
               19.00   0.00000  -0.00117  -0.00230  -0.00299  -0.00295  -0.00241  -0.00179
               42.00   0.00000  -0.00220  -0.00425  -0.00576  -0.00668  -0.00726  -0.00771
              180.00   0.00000   0.00003   0.00012   0.00027   0.00047   0.00071   0.00100
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            </tableData>
          </table>
          </product>
        </function>
        <function name="aero/coefficient/Cmq">
          <description>Cm per q (non-dimensional), over alpha</description>
          <product>
            <property>aero/qbar-psf</property>
            <property>metrics/Sw-sqft</property>
            <property>metrics/cbarw-ft</property>
            <property>aero/ci2vel</property>
            <property>velocities/q-aero-rad_sec</property>
            <property>aero/function/mach-lift</property>
          <table>
            <independentVar lookup="row">aero/alpha-deg</independentVar>
            <tableData>
                 -180.00   -4.24843
                 -165.00   -2.51276
                  -32.00   -5.59909
                  -10.00   -8.50000
                    5.00   -8.48146
                   20.00   -7.77614
                   46.00   -5.60298
                  180.00   -4.24843
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            </tableData>
          </table>
          </product>
        </function>
        <function name="aero/coefficient/Cmadot">
          <description>Cm per alpha-dot (downwash lag at the tail)</description>
          <product>
            <property>aero/qbar-psf</property>
            <property>metrics/Sw-sqft</property>
            <property>metrics/cbarw-ft</property>
            <property>aero/ci2vel</property>
            <property>aero/alphadot-rad_sec</property>
            <value>0.00000</value>
            <property>aero/function/mach-lift</property>
          </product>
        </function>
        <function name="aero/coefficient/Cm_spoilers">
          <description>spoilers: its drag's pitching moment, 0.11 m from the reference point's height</description>
          <product>
            <property>aero/qbar-psf</property>
            <property>metrics/Sw-sqft</property>
            <property>metrics/cbarw-ft</property>
            <value>0.00167189</value>
            <pow>
              <sin>
                <product>
                  <property>fcs/speedbrake-pos-norm</property>
                  <value>0.785398</value>
                </product>
              </sin>
              <value>2</value>
            </pow>
          </product>
        </function>
        <function name="aero/coefficient/Cm_spoilers_lift">
          <description>spoilers: the lift lost's pitching moment, 0.34 m from the reference point</description>
          <product>
            <property>aero/qbar-psf</property>
            <property>metrics/Sw-sqft</property>
            <property>metrics/cbarw-ft</property>
            <table>
              <independentVar lookup="row">aero/alpha-deg</independentVar>
              <tableData>
                   -180.00    0.00369
                   -165.00    0.01490
                    -32.00   -0.03729
                    -10.00   -0.01224
                      5.00    0.03720
                     20.00    0.03996
                     46.00    0.03255
                    180.00    0.00369
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              </tableData>
            </table>
            <min>
              <value>1</value>
              <product>
                <property>fcs/speedbrake-pos-norm</property>
                <value>1</value>
              </product>
            </min>
          </product>
        </function>
        <function name="aero/coefficient/Cm_gear">
          <description>the gear's drag's pitching moment, -0.99 m from the reference point's height</description>
          <product>
            <property>aero/qbar-psf</property>
            <property>metrics/Sw-sqft</property>
            <property>metrics/cbarw-ft</property>
            <value>-0.00179135</value>
            <property>gear/gear-pos-norm</property>
          </product>
        </function>
      </axis>
      <axis name="YAW">
        <function name="aero/coefficient/Cn_base">
          <description>Cn over alpha and beta (hangar)</description>
          <product>
            <property>aero/qbar-psf</property>
            <property>metrics/Sw-sqft</property>
            <property>metrics/bw-ft</property>
            <property>aero/function/mach-side</property>
          <table>
            <independentVar lookup="row">aero/alpha-deg</independentVar>
            <independentVar lookup="column">aero/beta-deg</independentVar>
            <tableData>
                        -90.00    -70.00    -50.00    -40.00    -30.00    -25.00    -20.00    -15.00    -10.00     -6.00     -3.00      0.00      3.00      6.00     10.00     15.00     20.00     25.00     30.00     40.00     50.00     70.00     90.00
             -180.00  -0.00301  -0.01027  -0.01489  -0.01508  -0.01354  -0.01212  -0.01115  -0.01066  -0.00814  -0.00627  -0.00372  -0.00000   0.00372   0.00627   0.00814   0.01066   0.01115   0.01212   0.01354   0.01508   0.01489   0.01027   0.00301
              -35.00  -0.00301   0.00167   0.00274   0.00163   0.00397   0.00449   0.00470   0.00465   0.00349   0.00174   0.00084  -0.00000  -0.00084  -0.00174  -0.00349  -0.00465  -0.00470  -0.00449  -0.00397  -0.00163  -0.00274  -0.00167   0.00301
              -11.00  -0.00301  -0.00074  -0.00026  -0.00134  -0.00101  -0.00142  -0.00221  -0.00319  -0.00287  -0.00185  -0.00095  -0.00000   0.00095   0.00185   0.00287   0.00319   0.00221   0.00142   0.00101   0.00134   0.00026   0.00074   0.00301
                4.00  -0.00301   0.00610   0.00982   0.00818   0.00403   0.00178   0.00056   0.00016  -0.00001  -0.00005  -0.00003  -0.00000   0.00003   0.00005   0.00001  -0.00016  -0.00056  -0.00178  -0.00403  -0.00818  -0.00982  -0.00610   0.00301
               19.00  -0.00301   0.00205   0.00408   0.00387   0.00126   0.00108   0.00053   0.00035   0.00018   0.00018   0.00014  -0.00000  -0.00014  -0.00018  -0.00018  -0.00035  -0.00053  -0.00108  -0.00126  -0.00387  -0.00408  -0.00205   0.00301
               42.00  -0.00301   0.00131   0.00253   0.00142   0.00249   0.00351   0.00416   0.00331   0.00269   0.00196   0.00086  -0.00000  -0.00086  -0.00196  -0.00269  -0.00331  -0.00416  -0.00351  -0.00249  -0.00142  -0.00253  -0.00131   0.00301
              180.00  -0.00301  -0.01027  -0.01489  -0.01508  -0.01354  -0.01212  -0.01115  -0.01066  -0.00814  -0.00627  -0.00372  -0.00000   0.00372   0.00627   0.00814   0.01066   0.01115   0.01212   0.01354   0.01508   0.01489   0.01027   0.00301
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            </tableData>
          </table>
          </product>
        </function>
        <function name="aero/coefficient/Cn_aileron">
          <description>Cn increment from aileron (deg), over alpha</description>
          <product>
            <property>aero/qbar-psf</property>
            <property>metrics/Sw-sqft</property>
            <property>metrics/bw-ft</property>
            <property>aero/function/mach-aileron</property>
          <table>
            <independentVar lookup="row">aero/alpha-deg</independentVar>
            <independentVar lookup="column">fcs/left-aileron-pos-deg</independentVar>
            <tableData>
                        -20.00    -15.00    -10.00     -5.00      0.00      5.00     10.00     15.00     20.00
             -180.00   0.00000   0.00000   0.00000   0.00000   0.00000   0.00000   0.00000   0.00000   0.00000
              -35.00   0.01764   0.01488   0.01097   0.00582   0.00000  -0.00582  -0.01097  -0.01488  -0.01764
              -11.00   0.00959   0.00820   0.00611   0.00326   0.00000  -0.00326  -0.00611  -0.00820  -0.00959
                4.00  -0.00165  -0.00140  -0.00104  -0.00055   0.00000   0.00055   0.00104   0.00140   0.00165
               19.00  -0.01582  -0.01314  -0.00957  -0.00504   0.00000   0.00504   0.00957   0.01314   0.01582
               42.00  -0.01644  -0.01392  -0.01029  -0.00547   0.00000   0.00547   0.01029   0.01392   0.01644
              180.00   0.00000   0.00000   0.00000   0.00000   0.00000   0.00000   0.00000   0.00000   0.00000
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            </tableData>
          </table>
          </product>
        </function>
        <function name="aero/coefficient/Cn_rudder">
          <description>Cn increment from rudder (deg), over alpha</description>
          <product>
            <property>aero/qbar-psf</property>
            <property>metrics/Sw-sqft</property>
            <property>metrics/bw-ft</property>
            <property>aero/function/mach-rudder</property>
          <table>
            <independentVar lookup="row">aero/alpha-deg</independentVar>
            <independentVar lookup="column">fcs/rudder-pos-deg</independentVar>
            <tableData>
                        -25.00    -20.00    -15.00    -10.00     -5.00      0.00      5.00     10.00     15.00     20.00     25.00
             -180.00   0.00000  -0.00000   0.00000   0.00000   0.00000   0.00000   0.00000   0.00000   0.00000  -0.00000   0.00000
              -35.00   0.00370   0.00345   0.00302   0.00231   0.00126   0.00000  -0.00126  -0.00231  -0.00302  -0.00345  -0.00370
              -11.00   0.00732   0.00661   0.00563   0.00417   0.00222   0.00000  -0.00222  -0.00417  -0.00563  -0.00661  -0.00732
                4.00   0.00778   0.00703   0.00598   0.00444   0.00236   0.00000  -0.00236  -0.00444  -0.00598  -0.00703  -0.00778
               19.00   0.00555   0.00478   0.00400   0.00291   0.00146   0.00000  -0.00146  -0.00291  -0.00400  -0.00478  -0.00555
               42.00   0.00372   0.00341   0.00295   0.00221   0.00119   0.00000  -0.00119  -0.00221  -0.00295  -0.00341  -0.00372
              180.00   0.00000  -0.00000   0.00000  -0.00000   0.00000   0.00000   0.00000  -0.00000   0.00000  -0.00000   0.00000
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            </tableData>
          </table>
          </product>
        </function>
        <function name="aero/coefficient/Cnp">
          <description>Cn per p (non-dimensional), over alpha</description>
          <product>
            <property>aero/qbar-psf</property>
            <property>metrics/Sw-sqft</property>
            <property>metrics/bw-ft</property>
            <property>aero/bi2vel</property>
            <property>velocities/p-aero-rad_sec</property>
            <property>aero/function/mach-lift</property>
          <table>
            <independentVar lookup="row">aero/alpha-deg</independentVar>
            <tableData>
                 -180.00    0.00301
                 -165.00    0.00945
                  -32.00    0.01172
                  -10.00    0.13947
                    5.00   -0.15633
                   20.00    0.00032
                   46.00   -0.00098
                  180.00    0.00301
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            </tableData>
          </table>
          </product>
        </function>
        <function name="aero/coefficient/Cnr">
          <description>Cn per r (non-dimensional), over alpha</description>
          <product>
            <property>aero/qbar-psf</property>
            <property>metrics/Sw-sqft</property>
            <property>metrics/bw-ft</property>
            <property>aero/bi2vel</property>
            <property>velocities/r-aero-rad_sec</property>
            <property>aero/function/mach-lift</property>
          <table>
            <independentVar lookup="row">aero/alpha-deg</independentVar>
            <tableData>
                 -180.00   -0.01171
                 -165.00   -0.00749
                  -32.00    0.04038
                  -10.00   -0.02683
                    5.00   -0.01263
                   20.00    0.04332
                   46.00    0.02660
                  180.00   -0.01171
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            </tableData>
          </table>
          </product>
        </function>
      </axis>
    </aerodynamics>
</fdm_config>
