<?xml version="1.0"?>
<?xml-stylesheet type="text/xsl" href="http://jsbsim.sourceforge.net/JSBSim.xsl"?>
<!-- Generated by hangar 0.1.0 from skua.toml on 2026-10-01. Edit the design and rebuild; changes
     made here are overwritten.  -->
<fdm_config name="skua" version="2.0" release="ALPHA"
            xmlns:xsi="http://www.w3.org/2001/XMLSchema-instance"
            xsi:noNamespaceSchemaLocation="http://jsbsim.sourceforge.net/JSBSim.xsd">
    <fileheader>
      <author>hangar</author>
      <filecreationdate>2026-10-01</filecreationdate>
      <version>0.1.0</version>
      <description>Skua - twin-boom pusher UAV, 4 m span, electric (hypothetical)</description>
      <note>Aerodynamics: vortex lattice with viscous section polars, full-envelope
        strip model, slender-body fuselage (hangar). Mass: Raymer component
        weights on the geometry. Propeller: blade-element momentum theory.</note>
      <reference refID="fsim/applicability/aerobatic" author="the design" title="This design: a light UAV, not designed for aerobatic loads" date="n/a"/>
      <reference refID="fsim/applicability/carrier" author="the design" title="This design: no launch bar or arresting hook" date="n/a"/>
      <reference refID="fsim/applicability/drag_devices" author="the design" title="This design: flaps only, no spoilers or airbrakes" date="n/a"/>
      <reference refID="fsim/applicability/flaps" author="the design" title="This design: slotted flaps" date="n/a"/>
      <reference refID="fsim/applicability/ground_contact" author="the design" title="This design: fixed wheeled gear" date="n/a"/>
      <reference refID="fsim/applicability/releasable_stores" author="the design" title="This design: no stores stations or release mechanism" date="n/a"/>
      <reference refID="fsim/applicability/retractable_gear" author="the design" title="This design: fixed gear" date="n/a"/>
      <reference refID="fsim/applicability/vertical_flight" author="the design" title="This design (hypothetical): a conventional pusher UAV that cannot hover" date="n/a"/>
    </fileheader>
    <metrics>
      <wingarea unit="M2"> 1.2978 </wingarea>
      <wingspan unit="M"> 4.0000 </wingspan>
      <chord unit="M"> 0.3289 </chord>
      <htailarea unit="M2"> 0.2420 </htailarea>
      <htailarm unit="M"> 1.4750 </htailarm>
      <vtailarea unit="M2"> 0.1530 </vtailarea>
      <vtailarm unit="M"> 1.4658 </vtailarm>
      <location name="AERORP" unit="M">
        <x> 0.6400 </x>
        <y> 0.0000 </y>
        <z> 0.1690 </z>
      </location>
      <location name="EYEPOINT" unit="M">
        <x> 0.6400 </x>
        <y> 0.0000 </y>
        <z> 0.1690 </z>
      </location>
      <location name="VRP" unit="M">
        <x> 0.7133 </x>
        <y> 0.0000 </y>
        <z> 0.0229 </z>
      </location>
    </metrics>
    <mass_balance negated_crossproduct_inertia="false">
      <ixx unit="KG*M2"> 4.64 </ixx>
      <iyy unit="KG*M2"> 4.73 </iyy>
      <izz unit="KG*M2"> 8.85 </izz>
      <ixy unit="KG*M2"> -0.000 </ixy>
      <ixz unit="KG*M2"> 0.404 </ixz>
      <iyz unit="KG*M2"> 0.000 </iyz>
      <emptywt unit="KG"> 21.00 </emptywt>
      <location name="CG" unit="M">
        <x> 0.7133 </x>
        <y> 0.0000 </y>
        <z> 0.0229 </z>
      </location>
      <pointmass name="camera">
        <weight unit="KG"> 2.00 </weight>
        <location unit="M">
          <x> 0.2000 </x>
          <y> 0.0000 </y>
          <z> -0.0800 </z>
        </location>
      </pointmass>
    </mass_balance>
    <ground_reactions>
      <contact type="BOGEY" name="Nose Gear">
        <location unit="M">
          <x> 0.1200 </x>
          <y> 0.0000 </y>
          <z> -0.3000 </z>
        </location>
        <static_friction> 0.8 </static_friction>
        <dynamic_friction> 0.5 </dynamic_friction>
        <rolling_friction> 0.02 </rolling_friction>
        <spring_coeff unit="N/M"> 5000 </spring_coeff>
        <damping_coeff unit="N/M/SEC"> 226 </damping_coeff>
        <damping_coeff_rebound unit="N/M/SEC"> 452 </damping_coeff_rebound>
        <max_steer unit="DEG"> 20.0 </max_steer>
        <brake_group> NONE </brake_group>
        <retractable> 0 </retractable>
      </contact>
      <contact type="BOGEY" name="Left Main Gear">
        <location unit="M">
          <x> 0.7600 </x>
          <y> -0.3500 </y>
          <z> -0.3000 </z>
        </location>
        <static_friction> 0.8 </static_friction>
        <dynamic_friction> 0.5 </dynamic_friction>
        <rolling_friction> 0.02 </rolling_friction>
        <spring_coeff unit="N/M"> 5000 </spring_coeff>
        <damping_coeff unit="N/M/SEC"> 226 </damping_coeff>
        <damping_coeff_rebound unit="N/M/SEC"> 452 </damping_coeff_rebound>
        <max_steer unit="DEG"> 0.0 </max_steer>
        <brake_group> LEFT </brake_group>
        <retractable> 0 </retractable>
      </contact>
      <contact type="BOGEY" name="Right Main Gear">
        <location unit="M">
          <x> 0.7600 </x>
          <y> 0.3500 </y>
          <z> -0.3000 </z>
        </location>
        <static_friction> 0.8 </static_friction>
        <dynamic_friction> 0.5 </dynamic_friction>
        <rolling_friction> 0.02 </rolling_friction>
        <spring_coeff unit="N/M"> 5000 </spring_coeff>
        <damping_coeff unit="N/M/SEC"> 226 </damping_coeff>
        <damping_coeff_rebound unit="N/M/SEC"> 452 </damping_coeff_rebound>
        <max_steer unit="DEG"> 0.0 </max_steer>
        <brake_group> RIGHT </brake_group>
        <retractable> 0 </retractable>
      </contact>
      <contact type="STRUCTURE" name="booms left rear">
        <location unit="M">
          <x> 2.3600 </x>
          <y> -0.5500 </y>
          <z> 0.1500 </z>
        </location>
        <static_friction> 0.8 </static_friction>
        <dynamic_friction> 0.6 </dynamic_friction>
        <spring_coeff unit="N/M"> 653 </spring_coeff>
        <damping_coeff unit="N/M/SEC"> 22 </damping_coeff>
        <damping_coeff_rebound unit="N/M/SEC"> 22 </damping_coeff_rebound>
      </contact>
      <contact type="STRUCTURE" name="booms right rear">
        <location unit="M">
          <x> 2.3600 </x>
          <y> 0.5500 </y>
          <z> 0.1500 </z>
        </location>
        <static_friction> 0.8 </static_friction>
        <dynamic_friction> 0.6 </dynamic_friction>
        <spring_coeff unit="N/M"> 653 </spring_coeff>
        <damping_coeff unit="N/M/SEC"> 22 </damping_coeff>
        <damping_coeff_rebound unit="N/M/SEC"> 22 </damping_coeff_rebound>
      </contact>
      <contact type="STRUCTURE" name="fin left rear">
        <location unit="M">
          <x> 2.3000 </x>
          <y> -0.5500 </y>
          <z> 0.4500 </z>
        </location>
        <static_friction> 0.8 </static_friction>
        <dynamic_friction> 0.6 </dynamic_friction>
        <spring_coeff unit="N/M"> 658 </spring_coeff>
        <damping_coeff unit="N/M/SEC"> 22 </damping_coeff>
        <damping_coeff_rebound unit="N/M/SEC"> 22 </damping_coeff_rebound>
      </contact>
      <contact type="STRUCTURE" name="fin right rear">
        <location unit="M">
          <x> 2.3000 </x>
          <y> 0.5500 </y>
          <z> 0.4500 </z>
        </location>
        <static_friction> 0.8 </static_friction>
        <dynamic_friction> 0.6 </dynamic_friction>
        <spring_coeff unit="N/M"> 658 </spring_coeff>
        <damping_coeff unit="N/M/SEC"> 22 </damping_coeff>
        <damping_coeff_rebound unit="N/M/SEC"> 22 </damping_coeff_rebound>
      </contact>
      <contact type="STRUCTURE" name="motor propeller rear">
        <location unit="M">
          <x> 1.5600 </x>
          <y> -0.0000 </y>
          <z> -0.2800 </z>
        </location>
        <static_friction> 0.8 </static_friction>
        <dynamic_friction> 0.6 </dynamic_friction>
        <spring_coeff unit="N/M"> 4120 </spring_coeff>
        <damping_coeff unit="N/M/SEC"> 137 </damping_coeff>
        <damping_coeff_rebound unit="N/M/SEC"> 137 </damping_coeff_rebound>
      </contact>
      <contact type="STRUCTURE" name="pod front">
        <location unit="M">
          <x> 0.0000 </x>
          <y> 0.0000 </y>
          <z> 0.0000 </z>
        </location>
        <static_friction> 0.8 </static_friction>
        <dynamic_friction> 0.6 </dynamic_friction>
        <spring_coeff unit="N/M"> 1933 </spring_coeff>
        <damping_coeff unit="N/M/SEC"> 64 </damping_coeff>
        <damping_coeff_rebound unit="N/M/SEC"> 64 </damping_coeff_rebound>
      </contact>
      <contact type="STRUCTURE" name="pod front 2">
        <location unit="M">
          <x> 0.1702 </x>
          <y> -0.0000 </y>
          <z> -0.1262 </z>
        </location>
        <static_friction> 0.8 </static_friction>
        <dynamic_friction> 0.6 </dynamic_friction>
        <spring_coeff unit="N/M"> 2617 </spring_coeff>
        <damping_coeff unit="N/M/SEC"> 87 </damping_coeff>
        <damping_coeff_rebound unit="N/M/SEC"> 87 </damping_coeff_rebound>
      </contact>
      <contact type="STRUCTURE" name="wing left front">
        <location unit="M">
          <x> 0.5800 </x>
          <y> -2.0000 </y>
          <z> 0.2250 </z>
        </location>
        <static_friction> 0.8 </static_friction>
        <dynamic_friction> 0.6 </dynamic_friction>
        <spring_coeff unit="N/M"> 484 </spring_coeff>
        <damping_coeff unit="N/M/SEC"> 16 </damping_coeff>
        <damping_coeff_rebound unit="N/M/SEC"> 16 </damping_coeff_rebound>
      </contact>
      <contact type="STRUCTURE" name="wing left front 2">
        <location unit="M">
          <x> 0.8200 </x>
          <y> -2.0000 </y>
          <z> 0.2250 </z>
        </location>
        <static_friction> 0.8 </static_friction>
        <dynamic_friction> 0.6 </dynamic_friction>
        <spring_coeff unit="N/M"> 484 </spring_coeff>
        <damping_coeff unit="N/M/SEC"> 16 </damping_coeff>
        <damping_coeff_rebound unit="N/M/SEC"> 16 </damping_coeff_rebound>
      </contact>
      <contact type="STRUCTURE" name="wing right front">
        <location unit="M">
          <x> 0.5800 </x>
          <y> 2.0000 </y>
          <z> 0.2250 </z>
        </location>
        <static_friction> 0.8 </static_friction>
        <dynamic_friction> 0.6 </dynamic_friction>
        <spring_coeff unit="N/M"> 484 </spring_coeff>
        <damping_coeff unit="N/M/SEC"> 16 </damping_coeff>
        <damping_coeff_rebound unit="N/M/SEC"> 16 </damping_coeff_rebound>
      </contact>
      <contact type="STRUCTURE" name="wing right front 2">
        <location unit="M">
          <x> 0.8200 </x>
          <y> 2.0000 </y>
          <z> 0.2250 </z>
        </location>
        <static_friction> 0.8 </static_friction>
        <dynamic_friction> 0.6 </dynamic_friction>
        <spring_coeff unit="N/M"> 484 </spring_coeff>
        <damping_coeff unit="N/M/SEC"> 16 </damping_coeff>
        <damping_coeff_rebound unit="N/M/SEC"> 16 </damping_coeff_rebound>
      </contact>
    </ground_reactions>
    <propulsion>
      <engine file="skua_engine0">
        <location unit="M">
          <x> 1.4400 </x>
          <y> 0.0000 </y>
          <z> 0.0000 </z>
        </location>

        <thruster file="skua_prop0">
          <location unit="M">
            <x> 1.5600 </x>
            <y> 0.0000 </y>
            <z> 0.0000 </z>
          </location>
          <orient unit="DEG"> <roll>0.00</roll> <pitch>0.00</pitch> <yaw>0.00</yaw> </orient>
          <sense>-1</sense>
        </thruster>
      </engine>
    </propulsion>
    <flight_control name="skua">
      <!-- the aircraft's profile for the platform (docs/control-architecture.md, section 7): what
           hangar knows of it - its design, its flight tests, its identified responses -->
      <property value="1">fsim/identity/version</property>
      <property value="1">fsim/identity/provenance</property>
      <property value="10">fsim/identity/class</property>
      <property value="1">fsim/identity/family</property>
      <property value="1">fsim/effectors/version</property>
      <property value="1">fsim/effectors/provenance</property>
      <property value="1">fsim/effectors/flaps</property>
      <property value="8">fsim/effectors/flaps_transit_s</property>
      <property value="0.0">fsim/effectors/neutral</property>
      <property value="0.0">fsim/effectors/pitch</property>
      <property value="1">fsim/effectors/pitch_trim</property>
      <property value="0.0">fsim/effectors/retractable_gear</property>
      <property value="0.0">fsim/effectors/roll</property>
      <property value="0.0">fsim/effectors/speedbrake</property>
      <property value="1">fsim/effectors/wheel_brakes</property>
      <property value="0.0">fsim/effectors/yaw</property>
      <property value="1">fsim/envelope/version</property>
      <property value="1">fsim/envelope/provenance</property>
      <property value="13.6839">fsim/envelope/clean/alpha_max_deg</property>
      <property value="13.9027">fsim/envelope/clean/cas_min_ms</property>
      <property value="2.78">fsim/envelope/crosswind_max_ms</property>
      <property value="15.04">fsim/envelope/ground_pitch_max_deg</property>
      <property value="1.73">fsim/envelope/ground_turn_radius_m</property>
      <property value="1.9823">fsim/envelope/ground_yaw_accel_rad_s2</property>
      <property value="1">fsim/propulsion/version</property>
      <property value="1">fsim/propulsion/provenance</property>
      <property value="0.0">fsim/propulsion/afterburner</property>
      <property value="1">fsim/propulsion/engines</property>
      <property value="0.03">fsim/propulsion/spool_s</property>
      <property value="4">fsim/propulsion/type</property>
      <property value="1">fsim/plant/version</property>
      <property value="1">fsim/plant/provenance</property>
      <property value="-5.4313">fsim/plant/alpha_zero_lift_deg</property>
      <property value="3000">fsim/plant/altitude_m</property>
      <property value="24.4872">fsim/plant/eas_ms</property>
      <property value="0.0">fsim/plant/elevator_trim</property>
      <property value="0.0">fsim/plant/elevator_trim_lift</property>
      <property value="3.95608">fsim/plant/pitch/gain</property>
      <property value="0.15184">fsim/plant/pitch/tau_s</property>
      <property value="2.90917">fsim/plant/roll/gain</property>
      <property value="0.05">fsim/plant/roll/tau_s</property>
      <property value="4.34522">fsim/plant/speed/gain</property>
      <property value="0.03">fsim/plant/speed/tau_s</property>
      <property value="28.4176">fsim/plant/tas_ms</property>
      <property value="0.79524">fsim/plant/throttle_trim</property>
      <property value="0.319352">fsim/plant/yaw/gain</property>
      <property value="1">fsim/performance/version</property>
      <property value="1">fsim/performance/provenance</property>
      <property value="10416.9">fsim/performance/ceiling_m</property>
      <property value="35.522">fsim/performance/max_tas_ms</property>
      <property value="13.9027">fsim/performance/stall_cas_ms</property>
      <property value="12.1711">fsim/performance/stall_flaps_cas_ms</property>
      <property value="1">fsim/applicability/version</property>
      <property value="1">fsim/applicability/provenance</property>
      <property value="0.0">fsim/applicability/aerobatic</property>
      <property value="1">fsim/applicability/carrier</property>
      <property value="1">fsim/applicability/drag_devices</property>
      <property value="1">fsim/applicability/flaps</property>
      <property value="1">fsim/applicability/ground_contact</property>
      <property value="1">fsim/applicability/releasable_stores</property>
      <property value="0.0">fsim/applicability/retractable_gear</property>
      <property value="0.0">fsim/applicability/vertical_flight</property>
      <property value="1">fsim/tables/version</property>
      <property value="1">fsim/tables/provenance</property>
      <property value="100">fsim/tables/altitude_m/h0</property>
      <property value="2080">fsim/tables/altitude_m/h1</property>
      <property value="4170">fsim/tables/altitude_m/h2</property>
      <property value="6250">fsim/tables/altitude_m/h3</property>
      <property value="7810">fsim/tables/altitude_m/h4</property>
      <property value="8850">fsim/tables/altitude_m/h5</property>
      <property value="9900">fsim/tables/altitude_m/h6</property>
      <property value="4.212000e+06">fsim/tables/battery_capacity_j</property>
      <property value="370.277">fsim/tables/best_endurance_power_w/h0/w0</property>
      <property value="405.47">fsim/tables/best_endurance_power_w/h1/w0</property>
      <property value="448.574">fsim/tables/best_endurance_power_w/h2/w0</property>
      <property value="498.873">fsim/tables/best_endurance_power_w/h3/w0</property>
      <property value="542.523">fsim/tables/best_endurance_power_w/h4/w0</property>
      <property value="574.971">fsim/tables/best_endurance_power_w/h5/w0</property>
      <property value="610.839">fsim/tables/best_endurance_power_w/h6/w0</property>
      <property value="16.1214">fsim/tables/best_endurance_tas_ms/h0/w0</property>
      <property value="17.7716">fsim/tables/best_endurance_tas_ms/h1/w0</property>
      <property value="19.7975">fsim/tables/best_endurance_tas_ms/h2/w0</property>
      <property value="22.1696">fsim/tables/best_endurance_tas_ms/h3/w0</property>
      <property value="24.2334">fsim/tables/best_endurance_tas_ms/h4/w0</property>
      <property value="25.77">fsim/tables/best_endurance_tas_ms/h5/w0</property>
      <property value="27.4739">fsim/tables/best_endurance_tas_ms/h6/w0</property>
      <property value="405.322">fsim/tables/best_range_power_w/h0/w0</property>
      <property value="444.095">fsim/tables/best_range_power_w/h1/w0</property>
      <property value="491.05">fsim/tables/best_range_power_w/h2/w0</property>
      <property value="543.268">fsim/tables/best_range_power_w/h3/w0</property>
      <property value="587.638">fsim/tables/best_range_power_w/h4/w0</property>
      <property value="621.692">fsim/tables/best_range_power_w/h5/w0</property>
      <property value="660.053">fsim/tables/best_range_power_w/h6/w0</property>
      <property value="19.2431">fsim/tables/best_range_tas_ms/h0/w0</property>
      <property value="21.2989">fsim/tables/best_range_tas_ms/h1/w0</property>
      <property value="23.6712">fsim/tables/best_range_tas_ms/h2/w0</property>
      <property value="26.3952">fsim/tables/best_range_tas_ms/h3/w0</property>
      <property value="28.6755">fsim/tables/best_range_tas_ms/h4/w0</property>
      <property value="30.4525">fsim/tables/best_range_tas_ms/h5/w0</property>
      <property value="32.4531">fsim/tables/best_range_tas_ms/h6/w0</property>
      <property value="19.2558">fsim/tables/climb_tas_ms/h0/w0</property>
      <property value="20.4543">fsim/tables/climb_tas_ms/h1/w0</property>
      <property value="22.063">fsim/tables/climb_tas_ms/h2/w0</property>
      <property value="24.0938">fsim/tables/climb_tas_ms/h3/w0</property>
      <property value="25.955">fsim/tables/climb_tas_ms/h4/w0</property>
      <property value="27.3834">fsim/tables/climb_tas_ms/h5/w0</property>
      <property value="29.001">fsim/tables/climb_tas_ms/h6/w0</property>
      <property value="5.3197">fsim/tables/max_climb_ms/h0/w0</property>
      <property value="4.45915">fsim/tables/max_climb_ms/h1/w0</property>
      <property value="3.52821">fsim/tables/max_climb_ms/h2/w0</property>
      <property value="2.58358">fsim/tables/max_climb_ms/h3/w0</property>
      <property value="1.85594">fsim/tables/max_climb_ms/h4/w0</property>
      <property value="1.36042">fsim/tables/max_climb_ms/h5/w0</property>
      <property value="0.852083">fsim/tables/max_climb_ms/h6/w0</property>
      <property value="35.6489">fsim/tables/max_tas_ms/h0/w0</property>
      <property value="35.8543">fsim/tables/max_tas_ms/h1/w0</property>
      <property value="36.0391">fsim/tables/max_tas_ms/h2/w0</property>
      <property value="36.0428">fsim/tables/max_tas_ms/h3/w0</property>
      <property value="35.8681">fsim/tables/max_tas_ms/h4/w0</property>
      <property value="35.4226">fsim/tables/max_tas_ms/h5/w0</property>
      <property value="34.7206">fsim/tables/max_tas_ms/h6/w0</property>
      <property value="16.1214">fsim/tables/min_tas_ms/h0/w0</property>
      <property value="17.7716">fsim/tables/min_tas_ms/h1/w0</property>
      <property value="19.7975">fsim/tables/min_tas_ms/h2/w0</property>
      <property value="22.1696">fsim/tables/min_tas_ms/h3/w0</property>
      <property value="24.2334">fsim/tables/min_tas_ms/h4/w0</property>
      <property value="25.77">fsim/tables/min_tas_ms/h5/w0</property>
      <property value="27.4711">fsim/tables/min_tas_ms/h6/w0</property>
      <property value="370.106">fsim/tables/power_w/h0/w0/v0</property>
      <property value="377.685">fsim/tables/power_w/h0/w0/v1</property>
      <property value="853.024">fsim/tables/power_w/h0/w0/v10</property>
      <property value="952.472">fsim/tables/power_w/h0/w0/v11</property>
      <property value="1063.92">fsim/tables/power_w/h0/w0/v12</property>
      <property value="1186">fsim/tables/power_w/h0/w0/v13</property>
      <property value="1318.69">fsim/tables/power_w/h0/w0/v14</property>
      <property value="1462.88">fsim/tables/power_w/h0/w0/v15</property>
      <property value="391.164">fsim/tables/power_w/h0/w0/v2</property>
      <property value="416.722">fsim/tables/power_w/h0/w0/v3</property>
      <property value="450.829">fsim/tables/power_w/h0/w0/v4</property>
      <property value="492.186">fsim/tables/power_w/h0/w0/v5</property>
      <property value="542.001">fsim/tables/power_w/h0/w0/v6</property>
      <property value="605.074">fsim/tables/power_w/h0/w0/v7</property>
      <property value="678.474">fsim/tables/power_w/h0/w0/v8</property>
      <property value="761.273">fsim/tables/power_w/h0/w0/v9</property>
      <property value="405.332">fsim/tables/power_w/h1/w0/v0</property>
      <property value="412.079">fsim/tables/power_w/h1/w0/v1</property>
      <property value="774.525">fsim/tables/power_w/h1/w0/v10</property>
      <property value="853.599">fsim/tables/power_w/h1/w0/v11</property>
      <property value="938.312">fsim/tables/power_w/h1/w0/v12</property>
      <property value="1028.91">fsim/tables/power_w/h1/w0/v13</property>
      <property value="1128.17">fsim/tables/power_w/h1/w0/v14</property>
      <property value="1236.65">fsim/tables/power_w/h1/w0/v15</property>
      <property value="422.463">fsim/tables/power_w/h1/w0/v2</property>
      <property value="440.689">fsim/tables/power_w/h1/w0/v3</property>
      <property value="467.976">fsim/tables/power_w/h1/w0/v4</property>
      <property value="501.774">fsim/tables/power_w/h1/w0/v5</property>
      <property value="540.478">fsim/tables/power_w/h1/w0/v6</property>
      <property value="585.877">fsim/tables/power_w/h1/w0/v7</property>
      <property value="639.823">fsim/tables/power_w/h1/w0/v8</property>
      <property value="704.713">fsim/tables/power_w/h1/w0/v9</property>
      <property value="448.462">fsim/tables/power_w/h2/w0/v0</property>
      <property value="454.888">fsim/tables/power_w/h2/w0/v1</property>
      <property value="709.207">fsim/tables/power_w/h2/w0/v10</property>
      <property value="766.25">fsim/tables/power_w/h2/w0/v11</property>
      <property value="826.73">fsim/tables/power_w/h2/w0/v12</property>
      <property value="892.748">fsim/tables/power_w/h2/w0/v13</property>
      <property value="964.225">fsim/tables/power_w/h2/w0/v14</property>
      <property value="1039.72">fsim/tables/power_w/h2/w0/v15</property>
      <property value="462.699">fsim/tables/power_w/h2/w0/v2</property>
      <property value="474.617">fsim/tables/power_w/h2/w0/v3</property>
      <property value="494.135">fsim/tables/power_w/h2/w0/v4</property>
      <property value="518.249">fsim/tables/power_w/h2/w0/v5</property>
      <property value="548.053">fsim/tables/power_w/h2/w0/v6</property>
      <property value="579.452">fsim/tables/power_w/h2/w0/v7</property>
      <property value="618.652">fsim/tables/power_w/h2/w0/v8</property>
      <property value="659.444">fsim/tables/power_w/h2/w0/v9</property>
      <property value="498.809">fsim/tables/power_w/h3/w0/v0</property>
      <property value="503.792">fsim/tables/power_w/h3/w0/v1</property>
      <property value="668.553">fsim/tables/power_w/h3/w0/v10</property>
      <property value="701.93">fsim/tables/power_w/h3/w0/v11</property>
      <property value="736.333">fsim/tables/power_w/h3/w0/v12</property>
      <property value="777.709">fsim/tables/power_w/h3/w0/v13</property>
      <property value="824.611">fsim/tables/power_w/h3/w0/v14</property>
      <property value="873.643">fsim/tables/power_w/h3/w0/v15</property>
      <property value="509.686">fsim/tables/power_w/h3/w0/v2</property>
      <property value="517.297">fsim/tables/power_w/h3/w0/v3</property>
      <property value="528.396">fsim/tables/power_w/h3/w0/v4</property>
      <property value="543.927">fsim/tables/power_w/h3/w0/v5</property>
      <property value="564.113">fsim/tables/power_w/h3/w0/v6</property>
      <property value="585.516">fsim/tables/power_w/h3/w0/v7</property>
      <property value="611.25">fsim/tables/power_w/h3/w0/v8</property>
      <property value="637.447">fsim/tables/power_w/h3/w0/v9</property>
      <property value="542.494">fsim/tables/power_w/h4/w0/v0</property>
      <property value="546.104">fsim/tables/power_w/h4/w0/v1</property>
      <property value="652.775">fsim/tables/power_w/h4/w0/v10</property>
      <property value="674.047">fsim/tables/power_w/h4/w0/v11</property>
      <property value="695.618">fsim/tables/power_w/h4/w0/v12</property>
      <property value="721.375">fsim/tables/power_w/h4/w0/v13</property>
      <property value="748.527">fsim/tables/power_w/h4/w0/v14</property>
      <property value="776.304">fsim/tables/power_w/h4/w0/v15</property>
      <property value="551.061">fsim/tables/power_w/h4/w0/v2</property>
      <property value="556.791">fsim/tables/power_w/h4/w0/v3</property>
      <property value="562.861">fsim/tables/power_w/h4/w0/v4</property>
      <property value="572.143">fsim/tables/power_w/h4/w0/v5</property>
      <property value="582.944">fsim/tables/power_w/h4/w0/v6</property>
      <property value="598.314">fsim/tables/power_w/h4/w0/v7</property>
      <property value="614.857">fsim/tables/power_w/h4/w0/v8</property>
      <property value="631.776">fsim/tables/power_w/h4/w0/v9</property>
      <property value="574.965">fsim/tables/power_w/h5/w0/v0</property>
      <property value="577.368">fsim/tables/power_w/h5/w0/v1</property>
      <property value="645.854">fsim/tables/power_w/h5/w0/v10</property>
      <property value="659.245">fsim/tables/power_w/h5/w0/v11</property>
      <property value="674.041">fsim/tables/power_w/h5/w0/v12</property>
      <property value="691.069">fsim/tables/power_w/h5/w0/v13</property>
      <property value="708.265">fsim/tables/power_w/h5/w0/v14</property>
      <property value="725.643">fsim/tables/power_w/h5/w0/v15</property>
      <property value="582.198">fsim/tables/power_w/h5/w0/v2</property>
      <property value="585.253">fsim/tables/power_w/h5/w0/v3</property>
      <property value="590.629">fsim/tables/power_w/h5/w0/v4</property>
      <property value="595.546">fsim/tables/power_w/h5/w0/v5</property>
      <property value="602.471">fsim/tables/power_w/h5/w0/v6</property>
      <property value="610.049">fsim/tables/power_w/h5/w0/v7</property>
      <property value="619.602">fsim/tables/power_w/h5/w0/v8</property>
      <property value="632.454">fsim/tables/power_w/h5/w0/v9</property>
      <property value="610.839">fsim/tables/power_w/h6/w0/v0</property>
      <property value="611.813">fsim/tables/power_w/h6/w0/v1</property>
      <property value="646.549">fsim/tables/power_w/h6/w0/v10</property>
      <property value="652.773">fsim/tables/power_w/h6/w0/v11</property>
      <property value="659.992">fsim/tables/power_w/h6/w0/v12</property>
      <property value="669.644">fsim/tables/power_w/h6/w0/v13</property>
      <property value="679.286">fsim/tables/power_w/h6/w0/v14</property>
      <property value="688.936">fsim/tables/power_w/h6/w0/v15</property>
      <property value="615.395">fsim/tables/power_w/h6/w0/v2</property>
      <property value="618.789">fsim/tables/power_w/h6/w0/v3</property>
      <property value="620.576">fsim/tables/power_w/h6/w0/v4</property>
      <property value="624.175">fsim/tables/power_w/h6/w0/v5</property>
      <property value="627.965">fsim/tables/power_w/h6/w0/v6</property>
      <property value="631.502">fsim/tables/power_w/h6/w0/v7</property>
      <property value="635.518">fsim/tables/power_w/h6/w0/v8</property>
      <property value="641.099">fsim/tables/power_w/h6/w0/v9</property>
      <property value="3.91887">fsim/tables/ps_full_ms/h0/w0/v10</property>
      <property value="3.45792">fsim/tables/ps_full_ms/h0/w0/v11</property>
      <property value="2.9145">fsim/tables/ps_full_ms/h0/w0/v12</property>
      <property value="2.27967">fsim/tables/ps_full_ms/h0/w0/v13</property>
      <property value="1.54843">fsim/tables/ps_full_ms/h0/w0/v14</property>
      <property value="0.722824">fsim/tables/ps_full_ms/h0/w0/v15</property>
      <property value="5.29854">fsim/tables/ps_full_ms/h0/w0/v3</property>
      <property value="5.23883">fsim/tables/ps_full_ms/h0/w0/v4</property>
      <property value="5.15471">fsim/tables/ps_full_ms/h0/w0/v5</property>
      <property value="5.04673">fsim/tables/ps_full_ms/h0/w0/v6</property>
      <property value="4.86743">fsim/tables/ps_full_ms/h0/w0/v7</property>
      <property value="4.61899">fsim/tables/ps_full_ms/h0/w0/v8</property>
      <property value="4.30817">fsim/tables/ps_full_ms/h0/w0/v9</property>
      <property value="3.215">fsim/tables/ps_full_ms/h1/w0/v10</property>
      <property value="2.83089">fsim/tables/ps_full_ms/h1/w0/v11</property>
      <property value="2.3845">fsim/tables/ps_full_ms/h1/w0/v12</property>
      <property value="1.87808">fsim/tables/ps_full_ms/h1/w0/v13</property>
      <property value="1.30867">fsim/tables/ps_full_ms/h1/w0/v14</property>
      <property value="0.667314">fsim/tables/ps_full_ms/h1/w0/v15</property>
      <property value="4.45915">fsim/tables/ps_full_ms/h1/w0/v2</property>
      <property value="4.43957">fsim/tables/ps_full_ms/h1/w0/v3</property>
      <property value="4.39301">fsim/tables/ps_full_ms/h1/w0/v4</property>
      <property value="4.32539">fsim/tables/ps_full_ms/h1/w0/v5</property>
      <property value="4.22117">fsim/tables/ps_full_ms/h1/w0/v6</property>
      <property value="4.04383">fsim/tables/ps_full_ms/h1/w0/v7</property>
      <property value="3.81837">fsim/tables/ps_full_ms/h1/w0/v8</property>
      <property value="3.54111">fsim/tables/ps_full_ms/h1/w0/v9</property>
      <property value="2.46577">fsim/tables/ps_full_ms/h2/w0/v10</property>
      <property value="2.16776">fsim/tables/ps_full_ms/h2/w0/v11</property>
      <property value="1.82665">fsim/tables/ps_full_ms/h2/w0/v12</property>
      <property value="1.4418">fsim/tables/ps_full_ms/h2/w0/v13</property>
      <property value="1.01259">fsim/tables/ps_full_ms/h2/w0/v14</property>
      <property value="0.546969">fsim/tables/ps_full_ms/h2/w0/v15</property>
      <property value="3.52821">fsim/tables/ps_full_ms/h2/w0/v2</property>
      <property value="3.50855">fsim/tables/ps_full_ms/h2/w0/v3</property>
      <property value="3.4682">fsim/tables/ps_full_ms/h2/w0/v4</property>
      <property value="3.40719">fsim/tables/ps_full_ms/h2/w0/v5</property>
      <property value="3.29785">fsim/tables/ps_full_ms/h2/w0/v6</property>
      <property value="3.14474">fsim/tables/ps_full_ms/h2/w0/v7</property>
      <property value="2.95467">fsim/tables/ps_full_ms/h2/w0/v8</property>
      <property value="2.72872">fsim/tables/ps_full_ms/h2/w0/v9</property>
      <property value="1.73692">fsim/tables/ps_full_ms/h3/w0/v10</property>
      <property value="1.5303">fsim/tables/ps_full_ms/h3/w0/v11</property>
      <property value="1.30058">fsim/tables/ps_full_ms/h3/w0/v12</property>
      <property value="1.04152">fsim/tables/ps_full_ms/h3/w0/v13</property>
      <property value="0.750495">fsim/tables/ps_full_ms/h3/w0/v14</property>
      <property value="0.435385">fsim/tables/ps_full_ms/h3/w0/v15</property>
      <property value="2.58358">fsim/tables/ps_full_ms/h3/w0/v2</property>
      <property value="2.56627">fsim/tables/ps_full_ms/h3/w0/v3</property>
      <property value="2.5324">fsim/tables/ps_full_ms/h3/w0/v4</property>
      <property value="2.47002">fsim/tables/ps_full_ms/h3/w0/v5</property>
      <property value="2.3671">fsim/tables/ps_full_ms/h3/w0/v6</property>
      <property value="2.23995">fsim/tables/ps_full_ms/h3/w0/v7</property>
      <property value="2.09182">fsim/tables/ps_full_ms/h3/w0/v8</property>
      <property value="1.9242">fsim/tables/ps_full_ms/h3/w0/v9</property>
      <property value="1.20409">fsim/tables/ps_full_ms/h4/w0/v10</property>
      <property value="1.0562">fsim/tables/ps_full_ms/h4/w0/v11</property>
      <property value="0.896343">fsim/tables/ps_full_ms/h4/w0/v12</property>
      <property value="0.720857">fsim/tables/ps_full_ms/h4/w0/v13</property>
      <property value="0.530839">fsim/tables/ps_full_ms/h4/w0/v14</property>
      <property value="0.331845">fsim/tables/ps_full_ms/h4/w0/v15</property>
      <property value="1.85594">fsim/tables/ps_full_ms/h4/w0/v2</property>
      <property value="1.84482">fsim/tables/ps_full_ms/h4/w0/v3</property>
      <property value="1.81757">fsim/tables/ps_full_ms/h4/w0/v4</property>
      <property value="1.76225">fsim/tables/ps_full_ms/h4/w0/v5</property>
      <property value="1.67814">fsim/tables/ps_full_ms/h4/w0/v6</property>
      <property value="1.57799">fsim/tables/ps_full_ms/h4/w0/v7</property>
      <property value="1.46459">fsim/tables/ps_full_ms/h4/w0/v8</property>
      <property value="1.34008">fsim/tables/ps_full_ms/h4/w0/v9</property>
      <property value="0.886774">fsim/tables/ps_full_ms/h5/w0/v10</property>
      <property value="0.781314">fsim/tables/ps_full_ms/h5/w0/v11</property>
      <property value="0.667216">fsim/tables/ps_full_ms/h5/w0/v12</property>
      <property value="0.543116">fsim/tables/ps_full_ms/h5/w0/v13</property>
      <property value="0.413328">fsim/tables/ps_full_ms/h5/w0/v14</property>
      <property value="0.278997">fsim/tables/ps_full_ms/h5/w0/v15</property>
      <property value="1.36042">fsim/tables/ps_full_ms/h5/w0/v2</property>
      <property value="1.35741">fsim/tables/ps_full_ms/h5/w0/v3</property>
      <property value="1.33634">fsim/tables/ps_full_ms/h5/w0/v4</property>
      <property value="1.29569">fsim/tables/ps_full_ms/h5/w0/v5</property>
      <property value="1.23313">fsim/tables/ps_full_ms/h5/w0/v6</property>
      <property value="1.15927">fsim/tables/ps_full_ms/h5/w0/v7</property>
      <property value="1.07696">fsim/tables/ps_full_ms/h5/w0/v8</property>
      <property value="0.985863">fsim/tables/ps_full_ms/h5/w0/v9</property>
      <property value="0.580027">fsim/tables/ps_full_ms/h6/w0/v10</property>
      <property value="0.518493">fsim/tables/ps_full_ms/h6/w0/v11</property>
      <property value="0.44986">fsim/tables/ps_full_ms/h6/w0/v12</property>
      <property value="0.374776">fsim/tables/ps_full_ms/h6/w0/v13</property>
      <property value="0.296266">fsim/tables/ps_full_ms/h6/w0/v14</property>
      <property value="0.21616">fsim/tables/ps_full_ms/h6/w0/v15</property>
      <property value="0.852083">fsim/tables/ps_full_ms/h6/w0/v2</property>
      <property value="0.852083">fsim/tables/ps_full_ms/h6/w0/v3</property>
      <property value="0.847616">fsim/tables/ps_full_ms/h6/w0/v4</property>
      <property value="0.829299">fsim/tables/ps_full_ms/h6/w0/v5</property>
      <property value="0.789669">fsim/tables/ps_full_ms/h6/w0/v6</property>
      <property value="0.741784">fsim/tables/ps_full_ms/h6/w0/v7</property>
      <property value="0.690476">fsim/tables/ps_full_ms/h6/w0/v8</property>
      <property value="0.636443">fsim/tables/ps_full_ms/h6/w0/v9</property>
      <property value="-1.11295">fsim/tables/ps_idle_ms/h0/w0/v0</property>
      <property value="-1.13803">fsim/tables/ps_idle_ms/h0/w0/v1</property>
      <property value="-2.58647">fsim/tables/ps_idle_ms/h0/w0/v10</property>
      <property value="-2.89282">fsim/tables/ps_idle_ms/h0/w0/v11</property>
      <property value="-3.2312">fsim/tables/ps_idle_ms/h0/w0/v12</property>
      <property value="-3.60161">fsim/tables/ps_idle_ms/h0/w0/v13</property>
      <property value="-3.79019">fsim/tables/ps_idle_ms/h0/w0/v14</property>
      <property value="-3.9881">fsim/tables/ps_idle_ms/h0/w0/v15</property>
      <property value="-1.1884">fsim/tables/ps_idle_ms/h0/w0/v2</property>
      <property value="-1.26496">fsim/tables/ps_idle_ms/h0/w0/v3</property>
      <property value="-1.36775">fsim/tables/ps_idle_ms/h0/w0/v4</property>
      <property value="-1.49239">fsim/tables/ps_idle_ms/h0/w0/v5</property>
      <property value="-1.64749">fsim/tables/ps_idle_ms/h0/w0/v6</property>
      <property value="-1.83576">fsim/tables/ps_idle_ms/h0/w0/v7</property>
      <property value="-2.05801">fsim/tables/ps_idle_ms/h0/w0/v8</property>
      <property value="-2.30946">fsim/tables/ps_idle_ms/h0/w0/v9</property>
      <property value="-1.22464">fsim/tables/ps_idle_ms/h1/w0/v0</property>
      <property value="-1.24629">fsim/tables/ps_idle_ms/h1/w0/v1</property>
      <property value="-2.36064">fsim/tables/ps_idle_ms/h1/w0/v10</property>
      <property value="-2.59814">fsim/tables/ps_idle_ms/h1/w0/v11</property>
      <property value="-2.85498">fsim/tables/ps_idle_ms/h1/w0/v12</property>
      <property value="-3.14379">fsim/tables/ps_idle_ms/h1/w0/v13</property>
      <property value="-3.33431">fsim/tables/ps_idle_ms/h1/w0/v14</property>
      <property value="-3.489">fsim/tables/ps_idle_ms/h1/w0/v15</property>
      <property value="-1.28667">fsim/tables/ps_idle_ms/h1/w0/v2</property>
      <property value="-1.34697">fsim/tables/ps_idle_ms/h1/w0/v3</property>
      <property value="-1.42877">fsim/tables/ps_idle_ms/h1/w0/v4</property>
      <property value="-1.52908">fsim/tables/ps_idle_ms/h1/w0/v5</property>
      <property value="-1.64562">fsim/tables/ps_idle_ms/h1/w0/v6</property>
      <property value="-1.78489">fsim/tables/ps_idle_ms/h1/w0/v7</property>
      <property value="-1.95077">fsim/tables/ps_idle_ms/h1/w0/v8</property>
      <property value="-2.14371">fsim/tables/ps_idle_ms/h1/w0/v9</property>
      <property value="-1.3614">fsim/tables/ps_idle_ms/h2/w0/v0</property>
      <property value="-1.37985">fsim/tables/ps_idle_ms/h2/w0/v1</property>
      <property value="-2.1699">fsim/tables/ps_idle_ms/h2/w0/v10</property>
      <property value="-2.34017">fsim/tables/ps_idle_ms/h2/w0/v11</property>
      <property value="-2.527">fsim/tables/ps_idle_ms/h2/w0/v12</property>
      <property value="-2.72928">fsim/tables/ps_idle_ms/h2/w0/v13</property>
      <property value="-2.90229">fsim/tables/ps_idle_ms/h2/w0/v14</property>
      <property value="-3.01654">fsim/tables/ps_idle_ms/h2/w0/v15</property>
      <property value="-1.4106">fsim/tables/ps_idle_ms/h2/w0/v2</property>
      <property value="-1.45495">fsim/tables/ps_idle_ms/h2/w0/v3</property>
      <property value="-1.51447">fsim/tables/ps_idle_ms/h2/w0/v4</property>
      <property value="-1.58995">fsim/tables/ps_idle_ms/h2/w0/v5</property>
      <property value="-1.67797">fsim/tables/ps_idle_ms/h2/w0/v6</property>
      <property value="-1.77748">fsim/tables/ps_idle_ms/h2/w0/v7</property>
      <property value="-1.88948">fsim/tables/ps_idle_ms/h2/w0/v8</property>
      <property value="-2.01985">fsim/tables/ps_idle_ms/h2/w0/v9</property>
      <property value="-1.52125">fsim/tables/ps_idle_ms/h3/w0/v0</property>
      <property value="-1.53612">fsim/tables/ps_idle_ms/h3/w0/v1</property>
      <property value="-2.05418">fsim/tables/ps_idle_ms/h3/w0/v10</property>
      <property value="-2.15353">fsim/tables/ps_idle_ms/h3/w0/v11</property>
      <property value="-2.26512">fsim/tables/ps_idle_ms/h3/w0/v12</property>
      <property value="-2.3902">fsim/tables/ps_idle_ms/h3/w0/v13</property>
      <property value="-2.51455">fsim/tables/ps_idle_ms/h3/w0/v14</property>
      <property value="-2.5911">fsim/tables/ps_idle_ms/h3/w0/v15</property>
      <property value="-1.55891">fsim/tables/ps_idle_ms/h3/w0/v2</property>
      <property value="-1.58871">fsim/tables/ps_idle_ms/h3/w0/v3</property>
      <property value="-1.6273">fsim/tables/ps_idle_ms/h3/w0/v4</property>
      <property value="-1.67613">fsim/tables/ps_idle_ms/h3/w0/v5</property>
      <property value="-1.73582">fsim/tables/ps_idle_ms/h3/w0/v6</property>
      <property value="-1.80452">fsim/tables/ps_idle_ms/h3/w0/v7</property>
      <property value="-1.88013">fsim/tables/ps_idle_ms/h3/w0/v8</property>
      <property value="-1.96375">fsim/tables/ps_idle_ms/h3/w0/v9</property>
      <property value="-1.66061">fsim/tables/ps_idle_ms/h4/w0/v0</property>
      <property value="-1.67192">fsim/tables/ps_idle_ms/h4/w0/v1</property>
      <property value="-2.01636">fsim/tables/ps_idle_ms/h4/w0/v10</property>
      <property value="-2.08164">fsim/tables/ps_idle_ms/h4/w0/v11</property>
      <property value="-2.15184">fsim/tables/ps_idle_ms/h4/w0/v12</property>
      <property value="-2.22563">fsim/tables/ps_idle_ms/h4/w0/v13</property>
      <property value="-2.30079">fsim/tables/ps_idle_ms/h4/w0/v14</property>
      <property value="-2.3448">fsim/tables/ps_idle_ms/h4/w0/v15</property>
      <property value="-1.689">fsim/tables/ps_idle_ms/h4/w0/v2</property>
      <property value="-1.71034">fsim/tables/ps_idle_ms/h4/w0/v3</property>
      <property value="-1.7358">fsim/tables/ps_idle_ms/h4/w0/v4</property>
      <property value="-1.76633">fsim/tables/ps_idle_ms/h4/w0/v5</property>
      <property value="-1.8036">fsim/tables/ps_idle_ms/h4/w0/v6</property>
      <property value="-1.84805">fsim/tables/ps_idle_ms/h4/w0/v7</property>
      <property value="-1.89894">fsim/tables/ps_idle_ms/h4/w0/v8</property>
      <property value="-1.95561">fsim/tables/ps_idle_ms/h4/w0/v9</property>
      <property value="-1.76447">fsim/tables/ps_idle_ms/h5/w0/v0</property>
      <property value="-1.77308">fsim/tables/ps_idle_ms/h5/w0/v1</property>
      <property value="-2.00184">fsim/tables/ps_idle_ms/h5/w0/v10</property>
      <property value="-2.04634">fsim/tables/ps_idle_ms/h5/w0/v11</property>
      <property value="-2.09233">fsim/tables/ps_idle_ms/h5/w0/v12</property>
      <property value="-2.13927">fsim/tables/ps_idle_ms/h5/w0/v13</property>
      <property value="-2.1831">fsim/tables/ps_idle_ms/h5/w0/v14</property>
      <property value="-2.2106">fsim/tables/ps_idle_ms/h5/w0/v15</property>
      <property value="-1.78574">fsim/tables/ps_idle_ms/h5/w0/v2</property>
      <property value="-1.8013">fsim/tables/ps_idle_ms/h5/w0/v3</property>
      <property value="-1.81951">fsim/tables/ps_idle_ms/h5/w0/v4</property>
      <property value="-1.84014">fsim/tables/ps_idle_ms/h5/w0/v5</property>
      <property value="-1.8637">fsim/tables/ps_idle_ms/h5/w0/v6</property>
      <property value="-1.89107">fsim/tables/ps_idle_ms/h5/w0/v7</property>
      <property value="-1.9233">fsim/tables/ps_idle_ms/h5/w0/v8</property>
      <property value="-1.96057">fsim/tables/ps_idle_ms/h5/w0/v9</property>
      <property value="-1.88006">fsim/tables/ps_idle_ms/h6/w0/v0</property>
      <property value="-1.88571">fsim/tables/ps_idle_ms/h6/w0/v1</property>
      <property value="-2.01399">fsim/tables/ps_idle_ms/h6/w0/v10</property>
      <property value="-2.03357">fsim/tables/ps_idle_ms/h6/w0/v11</property>
      <property value="-2.05383">fsim/tables/ps_idle_ms/h6/w0/v12</property>
      <property value="-2.08011">fsim/tables/ps_idle_ms/h6/w0/v13</property>
      <property value="-2.09274">fsim/tables/ps_idle_ms/h6/w0/v14</property>
      <property value="-2.10612">fsim/tables/ps_idle_ms/h6/w0/v15</property>
      <property value="-1.89355">fsim/tables/ps_idle_ms/h6/w0/v2</property>
      <property value="-1.90376">fsim/tables/ps_idle_ms/h6/w0/v3</property>
      <property value="-1.91549">fsim/tables/ps_idle_ms/h6/w0/v4</property>
      <property value="-1.92865">fsim/tables/ps_idle_ms/h6/w0/v5</property>
      <property value="-1.94347">fsim/tables/ps_idle_ms/h6/w0/v6</property>
      <property value="-1.95955">fsim/tables/ps_idle_ms/h6/w0/v7</property>
      <property value="-1.97677">fsim/tables/ps_idle_ms/h6/w0/v8</property>
      <property value="-1.99506">fsim/tables/ps_idle_ms/h6/w0/v9</property>
      <property value="35.6489">fsim/tables/reach_tas_ms/h0/w0</property>
      <property value="35.8543">fsim/tables/reach_tas_ms/h1/w0</property>
      <property value="36.0391">fsim/tables/reach_tas_ms/h2/w0</property>
      <property value="36.0428">fsim/tables/reach_tas_ms/h3/w0</property>
      <property value="35.8681">fsim/tables/reach_tas_ms/h4/w0</property>
      <property value="35.4226">fsim/tables/reach_tas_ms/h5/w0</property>
      <property value="34.7206">fsim/tables/reach_tas_ms/h6/w0</property>
      <property value="0.0">fsim/tables/speed_fraction/v0</property>
      <property value="0.0666667">fsim/tables/speed_fraction/v1</property>
      <property value="0.666667">fsim/tables/speed_fraction/v10</property>
      <property value="0.733333">fsim/tables/speed_fraction/v11</property>
      <property value="0.8">fsim/tables/speed_fraction/v12</property>
      <property value="0.866667">fsim/tables/speed_fraction/v13</property>
      <property value="0.933333">fsim/tables/speed_fraction/v14</property>
      <property value="1">fsim/tables/speed_fraction/v15</property>
      <property value="0.133333">fsim/tables/speed_fraction/v2</property>
      <property value="0.2">fsim/tables/speed_fraction/v3</property>
      <property value="0.266667">fsim/tables/speed_fraction/v4</property>
      <property value="0.333333">fsim/tables/speed_fraction/v5</property>
      <property value="0.4">fsim/tables/speed_fraction/v6</property>
      <property value="0.466667">fsim/tables/speed_fraction/v7</property>
      <property value="0.533333">fsim/tables/speed_fraction/v8</property>
      <property value="0.6">fsim/tables/speed_fraction/v9</property>
      <property value="13.4709">fsim/tables/stall_cas_ms/h0/w0</property>
      <property value="13.4534">fsim/tables/stall_cas_ms/h1/w0</property>
      <property value="13.4353">fsim/tables/stall_cas_ms/h2/w0</property>
      <property value="13.4269">fsim/tables/stall_cas_ms/h3/w0</property>
      <property value="13.406">fsim/tables/stall_cas_ms/h4/w0</property>
      <property value="13.3987">fsim/tables/stall_cas_ms/h5/w0</property>
      <property value="13.3941">fsim/tables/stall_cas_ms/h6/w0</property>
      <property value="23">fsim/tables/weight_kg/w0</property>
      <channel name="Pitch">
        <summer name="fcs/pitch-trim-sum">
          <input>fcs/elevator-cmd-norm</input>
          <input>fcs/pitch-trim-cmd-norm</input>
          <clipto> <min>-1</min> <max>1</max> </clipto>
        </summer>
        <aerosurface_scale name="fcs/elevator-control">
          <input>fcs/pitch-trim-sum</input>
          <range> <min>-25.00</min> <max>25.00</max> </range>
          <gain>0.0174533</gain>
        </aerosurface_scale>
        <actuator name="fcs/elevator-actuator">
          <input>fcs/elevator-control</input>
          <rate_limit>2.0</rate_limit>
          <output>fcs/elevator-pos-rad</output>
        </actuator>
      </channel>
      <channel name="Roll">
        <summer name="fcs/roll-trim-sum">
          <input>fcs/aileron-cmd-norm</input>
          <input>fcs/roll-trim-cmd-norm</input>
          <clipto> <min>-1</min> <max>1</max> </clipto>
        </summer>
        <aerosurface_scale name="fcs/left-aileron-control">
          <input>fcs/roll-trim-sum</input>
          <range> <min>-20.00</min> <max>20.00</max> </range>
          <gain>0.0174533</gain>
        </aerosurface_scale>
        <actuator name="fcs/left-aileron-actuator">
          <input>fcs/left-aileron-control</input>
          <rate_limit>2.0</rate_limit>
          <output>fcs/left-aileron-pos-rad</output>
        </actuator>
        <pure_gain name="fcs/right-aileron">
          <input>fcs/left-aileron-pos-rad</input>
          <gain>-1</gain>
          <output>fcs/right-aileron-pos-rad</output>
        </pure_gain>
      </channel>
      <channel name="Yaw">
        <summer name="fcs/yaw-trim-sum">
          <input>fcs/rudder-cmd-norm</input>
          <input>fcs/yaw-trim-cmd-norm</input>
          <clipto> <min>-1</min> <max>1</max> </clipto>
        </summer>
        <aerosurface_scale name="fcs/rudder-control">
          <input>fcs/yaw-trim-sum</input>
          <range> <min>-25.00</min> <max>25.00</max> </range>
          <gain>0.0174533</gain>
        </aerosurface_scale>
        <actuator name="fcs/rudder-actuator">
          <input>fcs/rudder-control</input>
          <rate_limit>2.0</rate_limit>
          <output>fcs/rudder-pos-rad</output>
        </actuator>
        <!-- the nose or tail wheel steers with the rudder pedals (JSBSim steers from
             fcs/steer-cmd-norm, positive right; the rudder command is positive left) -->
        <pure_gain name="fcs/steer-from-rudder">
          <input>fcs/yaw-trim-sum</input>
          <gain>-1</gain>
          <output>fcs/steer-cmd-norm</output>
        </pure_gain>
      </channel>
      <channel name="Flaps">
        <kinematic name="fcs/flaps-control">
          <input>fcs/flap-cmd-norm</input>
          <traverse>
            <setting> <position>0.0</position> <time>0.0</time> </setting>
            <setting> <position>8.8</position> <time>2.0</time> </setting>
            <setting> <position>17.5</position> <time>2.0</time> </setting>
            <setting> <position>26.2</position> <time>2.0</time> </setting>
            <setting> <position>35.0</position> <time>2.0</time> </setting>
          </traverse>
          <output>fcs/flap-pos-deg</output>
        </kinematic>
        <pure_gain name="fcs/flaps-normalized">
          <input>fcs/flap-pos-deg</input>
          <gain>0.0285714</gain>
          <output>fcs/flap-pos-norm</output>
        </pure_gain>
      </channel>
      <property value="4.212e+06">fsim/battery/capacity-j</property>
      <channel name="Battery">
        <!-- 1170 Wh: the power the motors drew, the energy used, the charge left, their supply while there is some -->
        <fcs_function name="fsim/battery/power-w">
          <function>
            <product> <value>44.4</value> <property>fcs/throttle-supplied-0</property>
              <max> <value>0</value> <property>propulsion/engine[0]/current-amperes</property> </max> </product>
          </function>
        </fcs_function>
        <integrator name="fsim/battery/used-j"> <input> fsim/battery/power-w </input> <c1> 1 </c1> </integrator>
        <fcs_function name="fsim/battery/charge-j">
          <function> <max> <value> 0 </value> <difference> <property> fsim/battery/capacity-j </property>
            <property> fsim/battery/used-j </property> </difference> </max> </function>
        </fcs_function>
        <fcs_function name="fsim/battery/supply">
          <function> <gt> <property> fsim/battery/charge-j </property> <value> 0 </value> </gt> </function>
        </fcs_function>
        <fcs_function name="fcs/throttle-supplied-0">
          <function> <product> <property>fcs/throttle-pos-norm[0]</property> <property>fsim/battery/supply</property> </product> </function>
          <output>fcs/throttle-pos-norm[0]</output>
        </fcs_function>
      </channel>
    </flight_control>
    <aerodynamics>
        <function name="aero/function/mach-lift">
          <description>lift, and damping, over its low-speed value (hangar: aero/mach.py)</description>
          <table>
            <independentVar lookup="row">velocities/mach</independentVar>
            <tableData>
                 0.000     1.000000
                 0.300     1.038095
                 0.500     1.119474
                 0.600     1.189432
                 0.700     1.294287
                 0.800     1.462932
                 0.850     1.584660
                 0.900     1.562230
            </tableData>
          </table>
        </function>
        <function name="aero/function/mach-side">
          <description>side force, rolling and yawing moment over their low-speed values</description>
          <table>
            <independentVar lookup="row">velocities/mach</independentVar>
            <tableData>
                 0.000     1.000000
                 0.300     1.019448
                 0.500     1.061401
                 0.600     1.098323
                 0.700     1.156011
                 0.800     1.258092
                 0.850     1.347259
                 0.900     1.499681
            </tableData>
          </table>
        </function>
        <function name="aero/function/mach-dCm-dCL">
          <description>pitching moment per unit low-speed lift: the neutral point's move</description>
          <table>
            <independentVar lookup="row">velocities/mach</independentVar>
            <tableData>
                 0.000     0.000000
                 0.300    -0.022171
                 0.500    -0.069194
                 0.600    -0.109271
                 0.700    -0.168897
                 0.800    -0.262671
                 0.850    -0.325270
                 0.900    -0.183719
            </tableData>
          </table>
        </function>
        <function name="aero/function/mach-dCD0">
          <description>zero-lift drag's change: friction and wave drag</description>
          <table>
            <independentVar lookup="row">velocities/mach</independentVar>
            <tableData>
                 0.000     0.000000
                 0.300    -0.000186
                 0.500    -0.000506
                 0.600    -0.000719
                 0.700    -0.000190
                 0.800     0.024448
                 0.850     0.058206
                 0.900     0.097560
            </tableData>
          </table>
        </function>
        <function name="aero/function/mach-dK">
          <description>induced-drag factor's change (per CL^2)</description>
          <table>
            <independentVar lookup="row">velocities/mach</independentVar>
            <tableData>
                 0.000     0.000000
                 0.300     0.002873
                 0.500     0.008057
                 0.600     0.011689
                 0.700     0.016071
                 0.800     0.021243
                 0.850     0.023995
                 0.900     0.023536
            </tableData>
          </table>
        </function>
        <function name="aero/function/mach-aileron">
          <description>aileron power over its low-speed value</description>
          <table>
            <independentVar lookup="row">velocities/mach</independentVar>
            <tableData>
                 0.000     1.000000
                 0.300     1.032660
                 0.500     1.101302
                 0.600     1.159174
                 0.700     1.244227
                 0.800     1.378770
                 0.850     1.480949
                 0.900     1.621820
            </tableData>
          </table>
        </function>
        <function name="aero/function/mach-elevator">
          <description>elevator power over its low-speed value</description>
          <table>
            <independentVar lookup="row">velocities/mach</independentVar>
            <tableData>
                 0.000     1.000000
                 0.300     1.031686
                 0.500     1.098317
                 0.600     1.154531
                 0.700     1.237231
                 0.800     1.368442
                 0.850     1.467952
                 0.900     1.600862
            </tableData>
          </table>
        </function>
        <function name="aero/function/mach-flap">
          <description>flap power over its low-speed value</description>
          <table>
            <independentVar lookup="row">velocities/mach</independentVar>
            <tableData>
                 0.000     1.000000
                 0.300     1.037863
                 0.500     1.118716
                 0.600     1.188232
                 0.700     1.292580
                 0.800     1.461755
                 0.850     1.588112
                 0.900     1.681641
            </tableData>
          </table>
        </function>
        <function name="aero/function/mach-rudder">
          <description>rudder power over its low-speed value</description>
          <table>
            <independentVar lookup="row">velocities/mach</independentVar>
            <tableData>
                 0.000     1.000000
                 0.300     1.016037
                 0.500     1.048326
                 0.600     1.074157
                 0.700     1.109998
                 0.800     1.162063
                 0.850     1.198410
                 0.900     1.247127
            </tableData>
          </table>
        </function>
        <function name="aero/function/CL-base">
          <description>CL over alpha and beta at low speed</description>
          <table>
            <independentVar lookup="row">aero/alpha-deg</independentVar>
            <independentVar lookup="column">aero/beta-deg</independentVar>
            <tableData>
                        -90.00    -70.00    -50.00    -40.00    -30.00    -25.00    -20.00    -15.00    -10.00     -6.00     -3.00      0.00      3.00      6.00     10.00     15.00     20.00     25.00     30.00     40.00     50.00     70.00     90.00
             -180.00   0.00000  -0.00501   0.04154   0.06218   0.08073   0.08874   0.09562   0.10119   0.10528   0.10741   0.10832   0.10863   0.10832   0.10741   0.10528   0.10119   0.09562   0.08874   0.08073   0.06218   0.04154  -0.00501   0.00000
             -120.00  -0.00000   0.12046   0.34487   0.46852   0.58210   0.63118   0.67329   0.70728   0.73224   0.74594   0.75163   0.75244   0.75163   0.74594   0.73224   0.70728   0.67329   0.63118   0.58210   0.46852   0.34487   0.12046  -0.00000
              -70.00  -0.00000  -0.09961  -0.29270  -0.40044  -0.49998  -0.54314  -0.58024  -0.61023  -0.63227  -0.64376  -0.64843  -0.64845  -0.64843  -0.64376  -0.63227  -0.61023  -0.58024  -0.54314  -0.49998  -0.40044  -0.29270  -0.09961  -0.00000
              -46.00  -0.00000  -0.16352  -0.48021  -0.65580  -0.82077  -0.89365  -0.95704  -1.00941  -1.04835  -1.06377  -1.07035  -1.07273  -1.07035  -1.06377  -1.04835  -1.00941  -0.95704  -0.89365  -0.82077  -0.65580  -0.48021  -0.16352  -0.00000
              -32.00  -0.00000  -0.16596  -0.49122  -0.67494  -0.84789  -0.92299  -0.98711  -1.03691  -1.07356  -1.09247  -1.09941  -1.10197  -1.09941  -1.09247  -1.07356  -1.03691  -0.98711  -0.92299  -0.84789  -0.67494  -0.49122  -0.16596  -0.00000
              -22.00  -0.00000  -0.15622  -0.51446  -0.69947  -0.86503  -0.93116  -0.98348  -1.02452  -1.05444  -1.07038  -1.07752  -1.07970  -1.07752  -1.07038  -1.05444  -1.02452  -0.98348  -0.93116  -0.86503  -0.69947  -0.51446  -0.15622  -0.00000
              -17.00  -0.00000  -0.12079  -0.47257  -0.70918  -0.89793  -0.97642  -1.04934  -1.11020  -1.15590  -1.17996  -1.19020  -1.19372  -1.19020  -1.17996  -1.15590  -1.11020  -1.04934  -0.97642  -0.89793  -0.70918  -0.47257  -0.12079  -0.00000
              -13.00  -0.00000  -0.09605  -0.41213  -0.53960  -0.64205  -0.70008  -0.74688  -0.78382  -0.81026  -0.82366  -0.82924  -0.83108  -0.82924  -0.82366  -0.81026  -0.78382  -0.74688  -0.70008  -0.64205  -0.53960  -0.41213  -0.09605  -0.00000
               -9.00  -0.00000  -0.07600  -0.23854  -0.29114  -0.34100  -0.36913  -0.39208  -0.40985  -0.42216  -0.42811  -0.43047  -0.43122  -0.43047  -0.42811  -0.42216  -0.40985  -0.39208  -0.36913  -0.34100  -0.29114  -0.23854  -0.07600  -0.00000
               -5.00  -0.00000  -0.01610  -0.03022  -0.03319  -0.03352  -0.03392  -0.03337  -0.03229  -0.03084  -0.02958  -0.02881  -0.02848  -0.02881  -0.02958  -0.03084  -0.03229  -0.03337  -0.03392  -0.03352  -0.03319  -0.03022  -0.01610  -0.00000
               -1.00  -0.00000   0.05056   0.17046   0.21885   0.26929   0.29595   0.31940   0.33871   0.35326   0.36113   0.36466   0.36590   0.36466   0.36113   0.35326   0.33871   0.31940   0.29595   0.26929   0.21885   0.17046   0.05056  -0.00000
                3.00   0.00000   0.09092   0.37675   0.47927   0.57924   0.63349   0.68033   0.71823   0.74606   0.76052   0.76667   0.76873   0.76667   0.76052   0.74606   0.71823   0.68033   0.63349   0.57924   0.47927   0.37675   0.09092   0.00000
                7.00   0.00000   0.11291   0.54830   0.74113   0.88735   0.96880   1.03906   1.09565   1.13693   1.15819   1.16708   1.17000   1.16708   1.15819   1.13693   1.09565   1.03906   0.96880   0.88735   0.74113   0.54830   0.11291   0.00000
               11.00   0.00000   0.14926   0.58013   0.82472   1.08229   1.20261   1.30704   1.39174   1.45388   1.48604   1.49957   1.50407   1.49957   1.48604   1.45388   1.39174   1.30704   1.20261   1.08229   0.82472   0.58013   0.14926   0.00000
               15.00   0.00000   0.17586   0.58500   0.80322   0.99023   1.07388   1.13915   1.18622   1.21411   1.22579   1.22993   1.23162   1.22993   1.22579   1.21411   1.18622   1.13915   1.07388   0.99023   0.80322   0.58500   0.17586   0.00000
               19.00   0.00000   0.17928   0.50013   0.70454   0.88067   0.95533   1.02557   1.08331   1.12557   1.14719   1.15659   1.16003   1.15659   1.14719   1.12557   1.08331   1.02557   0.95533   0.88067   0.70454   0.50013   0.17928   0.00000
               23.00   0.00000   0.16437   0.49169   0.67488   0.85059   0.92433   0.98369   1.02954   1.06265   1.07956   1.08688   1.08924   1.08688   1.07956   1.06265   1.02954   0.98369   0.92433   0.85059   0.67488   0.49169   0.16437   0.00000
               27.00   0.00000   0.16498   0.49232   0.67304   0.83993   0.91079   0.96973   1.01602   1.04969   1.06726   1.07447   1.07689   1.07447   1.06726   1.04969   1.01602   0.96973   0.91079   0.83993   0.67304   0.49232   0.16498   0.00000
               32.00   0.00000   0.16693   0.49548   0.67607   0.84070   0.91087   0.97141   1.01802   1.05246   1.06949   1.07663   1.07912   1.07663   1.06949   1.05246   1.01802   0.97141   0.91087   0.84070   0.67607   0.49548   0.16693   0.00000
               46.00   0.00000   0.16216   0.47579   0.64900   0.80582   0.87279   0.93015   0.97604   1.01063   1.02362   1.02929   1.03126   1.02929   1.02362   1.01063   0.97604   0.93015   0.87279   0.80582   0.64900   0.47579   0.16216   0.00000
               70.00   0.00000   0.09347   0.27144   0.37032   0.46153   0.50105   0.53501   0.56245   0.58261   0.59311   0.59737   0.59725   0.59737   0.59311   0.58261   0.56245   0.53501   0.50105   0.46153   0.37032   0.27144   0.09347   0.00000
              120.00   0.00000  -0.12416  -0.35753  -0.48645  -0.60497  -0.65621  -0.70019  -0.73569  -0.76176  -0.77605  -0.78199  -0.78288  -0.78199  -0.77605  -0.76176  -0.73569  -0.70019  -0.65621  -0.60497  -0.48645  -0.35753  -0.12416   0.00000
              180.00   0.00000  -0.00501   0.04154   0.06218   0.08073   0.08874   0.09562   0.10119   0.10528   0.10741   0.10832   0.10863   0.10832   0.10741   0.10528   0.10119   0.09562   0.08874   0.08073   0.06218   0.04154  -0.00501   0.00000
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            </tableData>
          </table>
        </function>
      <axis name="DRAG">
        <function name="aero/coefficient/CD_base">
          <description>CD over alpha and beta (hangar)</description>
          <product>
            <property>aero/qbar-psf</property>
            <property>metrics/Sw-sqft</property>
          <table>
            <independentVar lookup="row">aero/alpha-deg</independentVar>
            <independentVar lookup="column">aero/beta-deg</independentVar>
            <tableData>
                        -90.00    -70.00    -50.00    -40.00    -30.00    -25.00    -20.00    -15.00    -10.00     -6.00     -3.00      0.00      3.00      6.00     10.00     15.00     20.00     25.00     30.00     40.00     50.00     70.00     90.00
             -180.00   0.44287   0.35693   0.20416   0.13484   0.08309   0.06503   0.05206   0.04365   0.03774   0.03749   0.03748   0.03750   0.03748   0.03749   0.03774   0.04365   0.05206   0.06503   0.08309   0.13484   0.20416   0.35693   0.44287
             -120.00   0.44287   0.44789   0.62896   0.80265   1.00218   1.09963   1.18851   1.26378   1.32104   1.35140   1.36467   1.36915   1.36467   1.35140   1.32104   1.26378   1.18851   1.09963   1.00218   0.80265   0.62896   0.44789   0.44287
              -70.00   0.44287   0.47938   0.72657   0.94389   1.18787   1.30585   1.41302   1.50354   1.57232   1.60892   1.62460   1.62994   1.62460   1.60892   1.57232   1.50354   1.41302   1.30585   1.18787   0.94389   0.72657   0.47938   0.44287
              -46.00   0.44287   0.44673   0.52735   0.61572   0.72455   0.78157   0.83587   0.88455   0.92017   0.93842   0.94661   0.94934   0.94661   0.93842   0.92017   0.88455   0.83587   0.78157   0.72455   0.61572   0.52735   0.44673   0.44287
              -32.00   0.44287   0.42417   0.39738   0.40152   0.43149   0.45499   0.47566   0.49105   0.50380   0.50991   0.51250   0.51337   0.51250   0.50991   0.50380   0.49105   0.47566   0.45499   0.43149   0.40152   0.39738   0.42417   0.44287
              -22.00   0.44287   0.40999   0.31305   0.26909   0.25638   0.25449   0.25115   0.24949   0.24886   0.24914   0.24881   0.24865   0.24881   0.24914   0.24886   0.24949   0.25115   0.25449   0.25638   0.26909   0.31305   0.40999   0.44287
              -17.00   0.44287   0.40516   0.28009   0.21223   0.17537   0.16156   0.14769   0.13743   0.13071   0.12755   0.12616   0.12563   0.12616   0.12755   0.13071   0.13743   0.14769   0.16156   0.17537   0.21223   0.28009   0.40516   0.44287
              -13.00   0.44287   0.40172   0.25945   0.18856   0.14417   0.12655   0.10911   0.09602   0.08719   0.08293   0.08120   0.08063   0.08120   0.08293   0.08719   0.09602   0.10911   0.12655   0.14417   0.18856   0.25945   0.40172   0.44287
               -9.00   0.44287   0.39851   0.25011   0.17263   0.12465   0.10084   0.08089   0.06592   0.05585   0.05103   0.04908   0.04845   0.04908   0.05103   0.05585   0.06592   0.08089   0.10084   0.12465   0.17263   0.25011   0.39851   0.44287
               -5.00   0.44287   0.39736   0.24403   0.16358   0.11332   0.08763   0.06651   0.05073   0.04021   0.03525   0.03330   0.03267   0.03330   0.03525   0.04021   0.05073   0.06651   0.08763   0.11332   0.16358   0.24403   0.39736   0.44287
               -1.00   0.44287   0.39703   0.24240   0.16200   0.11259   0.08669   0.06561   0.04996   0.03964   0.03487   0.03305   0.03249   0.03305   0.03487   0.03964   0.04996   0.06561   0.08669   0.11259   0.16200   0.24240   0.39703   0.44287
                3.00   0.44287   0.39760   0.24519   0.16843   0.12354   0.09903   0.07926   0.06472   0.05525   0.05094   0.04932   0.04883   0.04932   0.05094   0.05525   0.06472   0.07926   0.09903   0.12354   0.16843   0.24519   0.39760   0.44287
                7.00   0.44287   0.39938   0.25242   0.18373   0.14573   0.12416   0.10694   0.09448   0.08650   0.08292   0.08158   0.08116   0.08158   0.08292   0.08650   0.09448   0.10694   0.12416   0.14573   0.18373   0.25242   0.39938   0.44287
               11.00   0.44287   0.40157   0.26598   0.20157   0.17279   0.15641   0.14346   0.13447   0.12902   0.12668   0.12582   0.12555   0.12582   0.12668   0.12902   0.13447   0.14346   0.15641   0.17279   0.20157   0.26598   0.40157   0.44287
               15.00   0.44287   0.40461   0.28348   0.22869   0.20440   0.19537   0.18535   0.17805   0.17334   0.17136   0.17053   0.17053   0.17053   0.17136   0.17334   0.17805   0.18535   0.19537   0.20440   0.22869   0.28348   0.40461   0.44287
               19.00   0.44287   0.40861   0.30868   0.26326   0.24841   0.24457   0.23984   0.23731   0.23623   0.23580   0.23548   0.23580   0.23548   0.23580   0.23623   0.23731   0.23984   0.24457   0.24841   0.26326   0.30868   0.40861   0.44287
               23.00   0.44287   0.41364   0.33639   0.30465   0.30288   0.30602   0.30679   0.30837   0.31023   0.31154   0.31209   0.31222   0.31209   0.31154   0.31023   0.30837   0.30679   0.30602   0.30288   0.30465   0.33639   0.41364   0.44287
               27.00   0.44287   0.41900   0.36806   0.35377   0.36663   0.37721   0.38692   0.39453   0.40117   0.40510   0.40632   0.40674   0.40632   0.40510   0.40117   0.39453   0.38692   0.37721   0.36663   0.35377   0.36806   0.41900   0.44287
               32.00   0.44287   0.42641   0.41177   0.42324   0.45714   0.48108   0.50241   0.51918   0.53303   0.53934   0.54200   0.54291   0.54200   0.53934   0.53303   0.51918   0.50241   0.48108   0.45714   0.42324   0.41177   0.42641   0.44287
               46.00   0.44287   0.44921   0.54345   0.64240   0.75698   0.81437   0.86811   0.91347   0.94769   0.96533   0.97280   0.97530   0.97280   0.96533   0.94769   0.91347   0.86811   0.81437   0.75698   0.64240   0.54345   0.44921   0.44287
               70.00   0.44287   0.48097   0.73691   0.96135   1.21307   1.33472   1.44519   1.53847   1.60933   1.64704   1.66319   1.66869   1.66319   1.64704   1.60933   1.53847   1.44519   1.33472   1.21307   0.96135   0.73691   0.48097   0.44287
              120.00   0.44287   0.44575   0.61503   0.77912   0.96822   1.06073   1.14517   1.21671   1.27117   1.30004   1.31267   1.31693   1.31267   1.30004   1.27117   1.21671   1.14517   1.06073   0.96822   0.77912   0.61503   0.44575   0.44287
              180.00   0.44287   0.35693   0.20416   0.13484   0.08309   0.06503   0.05206   0.04365   0.03774   0.03749   0.03748   0.03750   0.03748   0.03749   0.03774   0.04365   0.05206   0.06503   0.08309   0.13484   0.20416   0.35693   0.44287
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            </tableData>
          </table>
          </product>
        </function>
        <function name="aero/coefficient/CD_mach">
          <description>zero-lift drag's change with Mach: friction, wave drag</description>
          <product>
            <property>aero/qbar-psf</property>
            <property>metrics/Sw-sqft</property>
            <property>aero/function/mach-dCD0</property>
          </product>
        </function>
        <function name="aero/coefficient/CD_induced_mach">
          <description>induced drag's change with Mach (leading-edge suction lost)</description>
          <product>
            <property>aero/qbar-psf</property>
            <property>metrics/Sw-sqft</property>
            <property>aero/cl-squared</property>
            <property>aero/function/mach-dK</property>
          </product>
        </function>
        <function name="aero/coefficient/CD_aileron">
          <description>CD increment from aileron (deg), over alpha</description>
          <product>
            <property>aero/qbar-psf</property>
            <property>metrics/Sw-sqft</property>
            <property>aero/function/mach-aileron</property>
          <table>
            <independentVar lookup="row">aero/alpha-deg</independentVar>
            <independentVar lookup="column">fcs/left-aileron-pos-deg</independentVar>
            <tableData>
                        -20.00    -15.00    -10.00     -5.00      0.00      5.00     10.00     15.00     20.00
             -180.00   0.00720   0.00412   0.00185   0.00047   0.00000   0.00047   0.00185   0.00412   0.00720
             -120.00   0.00717   0.00411   0.00185   0.00047   0.00000   0.00047   0.00185   0.00411   0.00717
              -70.00   0.00717   0.00411   0.00185   0.00047   0.00000   0.00047   0.00185   0.00411   0.00717
              -46.00   0.01356   0.00838   0.00406   0.00107   0.00000   0.00107   0.00406   0.00838   0.01356
              -32.00   0.02425   0.01550   0.00774   0.00208   0.00000   0.00208   0.00774   0.01550   0.02425
              -22.00   0.01450   0.00878   0.00517   0.00198   0.00000   0.00198   0.00517   0.00878   0.01450
              -17.00   0.01770   0.01192   0.00649   0.00203   0.00000   0.00203   0.00649   0.01192   0.01770
              -13.00   0.02168   0.01453   0.00758   0.00209   0.00000   0.00209   0.00758   0.01453   0.02168
               -9.00   0.02219   0.01488   0.00773   0.00212   0.00000   0.00212   0.00773   0.01488   0.02219
               -5.00   0.02236   0.01499   0.00779   0.00214   0.00000   0.00214   0.00779   0.01499   0.02236
               -1.00   0.02243   0.01505   0.00782   0.00215   0.00000   0.00215   0.00782   0.01505   0.02243
                3.00   0.02242   0.01504   0.00782   0.00215   0.00000   0.00215   0.00782   0.01504   0.02242
                7.00   0.02229   0.01494   0.00777   0.00213   0.00000   0.00213   0.00777   0.01494   0.02229
               11.00   0.02443   0.01630   0.00841   0.00229   0.00000   0.00229   0.00841   0.01630   0.02443
               15.00   0.04464   0.02907   0.01457   0.00373   0.00000   0.00373   0.01457   0.02907   0.04464
               19.00   0.03573   0.02267   0.01123   0.00300   0.00000   0.00300   0.01123   0.02267   0.03573
               23.00   0.03279   0.02086   0.01037   0.00278   0.00000   0.00278   0.01037   0.02086   0.03279
               27.00   0.03120   0.01986   0.00986   0.00264   0.00000   0.00264   0.00986   0.01986   0.03120
               32.00   0.02955   0.01879   0.00933   0.00250   0.00000   0.00250   0.00933   0.01879   0.02955
               46.00   0.01510   0.00937   0.00455   0.00120   0.00000   0.00120   0.00455   0.00937   0.01510
               70.00   0.00717   0.00411   0.00185   0.00047   0.00000   0.00047   0.00185   0.00411   0.00717
              120.00   0.00717   0.00411   0.00185   0.00047   0.00000   0.00047   0.00185   0.00411   0.00717
              180.00   0.00720   0.00412   0.00185   0.00047   0.00000   0.00047   0.00185   0.00412   0.00720
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            </tableData>
          </table>
          </product>
        </function>
        <function name="aero/coefficient/CD_elevator">
          <description>CD increment from elevator (deg), over alpha</description>
          <product>
            <property>aero/qbar-psf</property>
            <property>metrics/Sw-sqft</property>
            <property>aero/function/mach-elevator</property>
          <table>
            <independentVar lookup="row">aero/alpha-deg</independentVar>
            <independentVar lookup="column">fcs/elevator-pos-deg</independentVar>
            <tableData>
                        -25.00    -20.00    -15.00    -10.00     -5.00      0.00      5.00     10.00     15.00     20.00     25.00
             -180.00   0.00704   0.00461   0.00264   0.00119   0.00030   0.00000   0.00030   0.00119   0.00264   0.00461   0.00704
             -120.00   0.00704   0.00461   0.00264   0.00119   0.00030   0.00000   0.00030   0.00119   0.00264   0.00461   0.00704
              -70.00   0.00704   0.00461   0.00264   0.00119   0.00030   0.00000   0.00030   0.00119   0.00264   0.00461   0.00704
              -46.00  -0.00036  -0.00174  -0.00259  -0.00275  -0.00197   0.00000   0.00326   0.00765   0.01274   0.01824   0.02415
              -32.00   0.01000   0.00688   0.00423   0.00184   0.00013   0.00000   0.00224   0.00702   0.01363   0.02126   0.02958
              -22.00   0.01958   0.01500   0.01097   0.00694   0.00301   0.00000  -0.00086   0.00127   0.00598   0.01233   0.01971
              -17.00   0.02324   0.01829   0.01408   0.00970   0.00496   0.00000  -0.00540  -0.01013  -0.01225  -0.01232  -0.01116
              -13.00   0.02849   0.02356   0.01924   0.01416   0.00748   0.00000  -0.00596  -0.00928  -0.01010  -0.00924  -0.00737
               -9.00   0.03182   0.02646   0.02066   0.01371   0.00626   0.00000  -0.00399  -0.00545  -0.00486  -0.00301  -0.00041
               -5.00   0.02664   0.02136   0.01584   0.00988   0.00416   0.00000  -0.00182  -0.00136   0.00069   0.00354   0.00686
               -1.00   0.01905   0.01446   0.00991   0.00545   0.00179   0.00000   0.00055   0.00310   0.00670   0.01059   0.01467
                3.00   0.01198   0.00808   0.00450   0.00144  -0.00034   0.00000   0.00267   0.00708   0.01205   0.01689   0.02164
                7.00   0.00516   0.00196  -0.00069  -0.00238  -0.00237   0.00000   0.00468   0.01085   0.01712   0.02284   0.02824
               11.00  -0.00138  -0.00390  -0.00563  -0.00591  -0.00435   0.00000   0.00661   0.01445   0.02194   0.02848   0.03445
               15.00  -0.00824  -0.00887  -0.01188  -0.01048  -0.00652   0.00000   0.00861   0.01808   0.02674   0.03402   0.04048
               19.00  -0.01475  -0.01543  -0.01480  -0.01223  -0.00729   0.00000   0.00919   0.01904   0.02790   0.03532   0.04191
               23.00   0.02350   0.01425   0.00607  -0.00007  -0.00246   0.00000   0.00653   0.01490   0.02311   0.03052   0.03751
               27.00   0.02741   0.01836   0.01015   0.00346  -0.00026   0.00000   0.00400   0.01049   0.01753   0.02419   0.03081
               32.00   0.03120   0.02213   0.01375   0.00650   0.00157   0.00000   0.00175   0.00588   0.01102   0.01650   0.02223
               46.00   0.02429   0.01820   0.01255   0.00738   0.00303   0.00000  -0.00155  -0.00178  -0.00104   0.00034   0.00219
               70.00   0.00704   0.00461   0.00264   0.00119   0.00030   0.00000   0.00030   0.00119   0.00264   0.00461   0.00704
              120.00   0.00704   0.00461   0.00264   0.00119   0.00030   0.00000   0.00030   0.00119   0.00264   0.00461   0.00704
              180.00   0.00704   0.00461   0.00264   0.00119   0.00030   0.00000   0.00030   0.00119   0.00264   0.00461   0.00704
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            </tableData>
          </table>
          </product>
        </function>
        <function name="aero/coefficient/CD_flap">
          <description>CD increment from flap (deg), over alpha</description>
          <product>
            <property>aero/qbar-psf</property>
            <property>metrics/Sw-sqft</property>
            <property>aero/function/mach-flap</property>
          <table>
            <independentVar lookup="row">aero/alpha-deg</independentVar>
            <independentVar lookup="column">fcs/flap-pos-deg</independentVar>
            <tableData>
                          0.00      5.00     10.00     15.00     20.00     25.00     30.00     35.00
             -180.00   0.00000   0.00028   0.00109   0.00243   0.00424   0.00647   0.00906   0.01193
             -120.00   0.00000   0.00027   0.00109   0.00242   0.00423   0.00645   0.00903   0.01189
              -70.00   0.00000   0.00027   0.00109   0.00242   0.00422   0.00645   0.00903   0.01188
              -46.00   0.00000   0.00731   0.01577   0.02515   0.03517   0.04555   0.05621   0.06719
              -32.00   0.00000   0.00900   0.02083   0.03488   0.05031   0.06641   0.08291   0.09982
              -22.00   0.00000  -0.00052  -0.00766  -0.02164  -0.03683  -0.04693  -0.05086  -0.05036
              -17.00   0.00000  -0.00797  -0.01230  -0.01298  -0.01100  -0.00723  -0.00223   0.00373
              -13.00   0.00000  -0.00437  -0.00550  -0.00378   0.00009   0.00540   0.01173   0.01892
               -9.00   0.00000  -0.00121   0.00078   0.00544   0.01193   0.01951   0.02776   0.03657
               -5.00   0.00000   0.00178   0.00662   0.01387   0.02261   0.03210   0.04201   0.05230
               -1.00   0.00000   0.00433   0.01148   0.02072   0.03110   0.04195   0.05305   0.06464
                3.00   0.00000   0.00768   0.01812   0.03041   0.04347   0.05664   0.06973   0.08297
                7.00   0.00000   0.01104   0.02476   0.04023   0.05647   0.07274   0.08885   0.10499
               11.00   0.00000   0.01311   0.03022   0.05017   0.07115   0.09183   0.11183   0.13158
               15.00   0.00000   0.00629   0.01744   0.03237   0.04997   0.06958   0.09093   0.11376
               19.00   0.00000   0.00333   0.01079   0.02131   0.03367   0.04707   0.06126   0.07614
               23.00   0.00000   0.00030   0.00477   0.01247   0.02227   0.03332   0.04517   0.05764
               27.00   0.00000  -0.00243  -0.00076   0.00421   0.01145   0.02014   0.02979   0.04020
               32.00   0.00000  -0.00557  -0.00714  -0.00534  -0.00109   0.00481   0.01186   0.01980
               46.00   0.00000  -0.00717  -0.01242  -0.01586  -0.01778  -0.01853  -0.01840  -0.01762
               70.00   0.00000   0.00027   0.00109   0.00242   0.00422   0.00645   0.00903   0.01188
              120.00   0.00000   0.00027   0.00109   0.00242   0.00423   0.00645   0.00903   0.01189
              180.00   0.00000   0.00028   0.00109   0.00243   0.00424   0.00647   0.00906   0.01193
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            </tableData>
          </table>
          </product>
        </function>
        <function name="aero/coefficient/CD_rudder">
          <description>CD increment from rudder (deg), over alpha</description>
          <product>
            <property>aero/qbar-psf</property>
            <property>metrics/Sw-sqft</property>
            <property>aero/function/mach-rudder</property>
          <table>
            <independentVar lookup="row">aero/alpha-deg</independentVar>
            <independentVar lookup="column">fcs/rudder-pos-deg</independentVar>
            <tableData>
                        -25.00    -20.00    -15.00    -10.00     -5.00      0.00      5.00     10.00     15.00     20.00     25.00
             -180.00   0.00535   0.00350   0.00201   0.00090   0.00023   0.00000   0.00023   0.00090   0.00201   0.00350   0.00535
             -120.00   0.00067   0.00044   0.00025   0.00011   0.00003   0.00000   0.00003   0.00011   0.00025   0.00044   0.00067
              -70.00   0.00025   0.00017   0.00010   0.00005   0.00001   0.00000   0.00001   0.00005   0.00010   0.00017   0.00025
              -46.00   0.00473   0.00338   0.00217   0.00110   0.00030   0.00000   0.00030   0.00110   0.00217   0.00338   0.00473
              -32.00   0.00583   0.00490   0.00416   0.00184   0.00047   0.00000   0.00047   0.00184   0.00416   0.00490   0.00583
              -22.00   0.00994   0.00742   0.00492   0.00273   0.00066   0.00000   0.00066   0.00273   0.00492   0.00742   0.00994
              -17.00   0.01090   0.00815   0.00549   0.00297   0.00080   0.00000   0.00080   0.00297   0.00549   0.00815   0.01090
              -13.00   0.01145   0.00849   0.00563   0.00290   0.00079   0.00000   0.00079   0.00290   0.00563   0.00849   0.01145
               -9.00   0.01194   0.00886   0.00587   0.00302   0.00082   0.00000   0.00082   0.00302   0.00587   0.00886   0.01194
               -5.00   0.01226   0.00910   0.00602   0.00310   0.00085   0.00000   0.00085   0.00310   0.00602   0.00910   0.01226
               -1.00   0.01240   0.00920   0.00609   0.00313   0.00086   0.00000   0.00086   0.00313   0.00609   0.00920   0.01240
                3.00   0.01236   0.00917   0.00607   0.00312   0.00085   0.00000   0.00085   0.00312   0.00607   0.00917   0.01236
                7.00   0.01213   0.00900   0.00596   0.00307   0.00084   0.00000   0.00084   0.00307   0.00596   0.00900   0.01213
               11.00   0.01173   0.00870   0.00576   0.00296   0.00080   0.00000   0.00080   0.00296   0.00576   0.00870   0.01173
               15.00   0.01097   0.00810   0.00530   0.00262   0.00062   0.00000   0.00062   0.00262   0.00530   0.00810   0.01097
               19.00   0.00974   0.00706   0.00445   0.00200   0.00060   0.00000   0.00060   0.00200   0.00445   0.00706   0.00974
               23.00   0.00980   0.00732   0.00489   0.00252   0.00067   0.00000   0.00067   0.00252   0.00489   0.00732   0.00980
               27.00   0.00919   0.00692   0.00458   0.00220   0.00058   0.00000   0.00058   0.00220   0.00458   0.00692   0.00919
               32.00   0.00802   0.00575   0.00356   0.00175   0.00048   0.00000   0.00048   0.00175   0.00356   0.00575   0.00802
               46.00   0.00394   0.00299   0.00203   0.00107   0.00030   0.00000   0.00030   0.00107   0.00203   0.00299   0.00394
               70.00   0.00025   0.00017   0.00010   0.00005   0.00001   0.00000   0.00001   0.00005   0.00010   0.00017   0.00025
              120.00   0.00067   0.00044   0.00025   0.00011   0.00003   0.00000   0.00003   0.00011   0.00025   0.00044   0.00067
              180.00   0.00535   0.00350   0.00201   0.00090   0.00023   0.00000   0.00023   0.00090   0.00201   0.00350   0.00535
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            </tableData>
          </table>
          </product>
        </function>
        <function name="aero/coefficient/CD_ground">
          <description>Induced drag change in ground effect</description>
          <product>
            <property>aero/qbar-psf</property>
            <property>metrics/Sw-sqft</property>
            <property>aero/cl-squared</property>
            <value>0.03037</value>
          <table>
            <independentVar lookup="row">aero/h_b-mac-ft</independentVar>
            <tableData>
                    0.00   -1.00000
                    0.10   -0.28090
                    0.15   -0.14793
                    0.20   -0.08897
                    0.30   -0.04160
                    0.40   -0.02383
                    0.50   -0.01538
                    0.60   -0.01073
                    0.70   -0.00791
                    0.80   -0.00607
                    0.90   -0.00480
                    1.00   -0.00389
                    1.10   -0.00322
            </tableData>
          </table>
          </product>
        </function>
      </axis>
      <axis name="SIDE">
        <function name="aero/coefficient/CY_base">
          <description>CY over alpha and beta (hangar)</description>
          <product>
            <property>aero/qbar-psf</property>
            <property>metrics/Sw-sqft</property>
            <property>aero/function/mach-side</property>
          <table>
            <independentVar lookup="row">aero/alpha-deg</independentVar>
            <independentVar lookup="column">aero/beta-deg</independentVar>
            <tableData>
                        -90.00    -70.00    -50.00    -40.00    -30.00    -25.00    -20.00    -15.00    -10.00     -6.00     -3.00      0.00      3.00      6.00     10.00     15.00     20.00     25.00     30.00     40.00     50.00     70.00     90.00
             -180.00  -0.00000   0.13141   0.15907   0.13358   0.09387   0.07235   0.05168   0.03319   0.04356   0.04885   0.02537  -0.00000  -0.02537  -0.04885  -0.04356  -0.03319  -0.05168  -0.07235  -0.09387  -0.13358  -0.15907  -0.13141   0.00000
             -120.00  -0.00000  -0.06812  -0.28827  -0.36648  -0.37940  -0.35634  -0.31361  -0.25297  -0.17754  -0.10673  -0.04519  -0.00000   0.04519   0.10673   0.17754   0.25297   0.31361   0.35634   0.37940   0.36648   0.28827   0.06812   0.00000
              -70.00   0.00000  -0.09773  -0.35592  -0.44360  -0.45417  -0.42494  -0.37268  -0.29929  -0.20791  -0.12402  -0.05582  -0.00000   0.05582   0.12402   0.20791   0.29929   0.37268   0.42494   0.45417   0.44360   0.35592   0.09773  -0.00000
              -46.00   0.00000   0.00337  -0.11371  -0.16476  -0.18462  -0.17620  -0.15302  -0.10882  -0.05978  -0.03539  -0.01957  -0.00000   0.01957   0.03539   0.05978   0.10882   0.15302   0.17620   0.18462   0.16476   0.11371  -0.00337  -0.00000
              -32.00   0.00000   0.06721   0.03519  -0.00318  -0.02577  -0.02070  -0.01822  -0.02052  -0.01087   0.00469  -0.00191  -0.00000   0.00191  -0.00469   0.01087   0.02052   0.01822   0.02070   0.02577   0.00318  -0.03519  -0.06721  -0.00000
              -22.00   0.00000   0.10619   0.12105   0.09460   0.07953   0.07103   0.05309   0.03749   0.02447   0.02293   0.01077  -0.00000  -0.01077  -0.02293  -0.02447  -0.03749  -0.05309  -0.07103  -0.07953  -0.09460  -0.12105  -0.10619  -0.00000
              -17.00   0.00000   0.12375   0.15922   0.14219   0.12549   0.11265   0.08947   0.06578   0.04275   0.02601   0.01362  -0.00000  -0.01362  -0.02601  -0.04275  -0.06578  -0.08947  -0.11265  -0.12549  -0.14219  -0.15922  -0.12375  -0.00000
              -13.00   0.00000   0.13723   0.18824   0.16495   0.14628   0.13201   0.10528   0.07760   0.05043   0.02967   0.01474  -0.00000  -0.01474  -0.02967  -0.05043  -0.07760  -0.10528  -0.13201  -0.14628  -0.16495  -0.18824  -0.13723  -0.00000
               -9.00   0.00000   0.15099   0.19832   0.17813   0.16840   0.14350   0.11439   0.08413   0.05439   0.03177   0.01565  -0.00000  -0.01565  -0.03177  -0.05439  -0.08413  -0.11439  -0.14350  -0.16840  -0.17813  -0.19832  -0.15099  -0.00000
               -5.00   0.00000   0.15523   0.20407   0.18535   0.17584   0.14916   0.11866   0.08691   0.05573   0.03221   0.01571  -0.00000  -0.01571  -0.03221  -0.05573  -0.08691  -0.11866  -0.14916  -0.17584  -0.18535  -0.20407  -0.15523  -0.00000
               -1.00   0.00000   0.15620   0.20561   0.18658   0.17681   0.14946   0.11854   0.08644   0.05498   0.03140   0.01510  -0.00000  -0.01510  -0.03140  -0.05498  -0.08644  -0.11854  -0.14946  -0.17681  -0.18658  -0.20561  -0.15620  -0.00000
                3.00   0.00000   0.15068   0.20211   0.18086   0.17144   0.14431   0.11397   0.08271   0.05233   0.02972   0.01419  -0.00000  -0.01419  -0.02972  -0.05233  -0.08271  -0.11397  -0.14431  -0.17144  -0.18086  -0.20211  -0.15068  -0.00000
                7.00   0.00000   0.13927   0.19258   0.16953   0.16000   0.13387   0.10510   0.07586   0.04781   0.02716   0.01302  -0.00000  -0.01302  -0.02716  -0.04781  -0.07586  -0.10510  -0.13387  -0.16000  -0.16953  -0.19258  -0.13927  -0.00000
               11.00   0.00000   0.12925   0.16488   0.14350   0.13941   0.11584   0.09025   0.06467   0.04059   0.02309   0.01107  -0.00000  -0.01107  -0.02309  -0.04059  -0.06467  -0.09025  -0.11584  -0.13941  -0.14350  -0.16488  -0.12925  -0.00000
               15.00   0.00000   0.11736   0.14533   0.11789   0.10445   0.09266   0.07175   0.05148   0.03275   0.01864   0.00646  -0.00000  -0.00646  -0.01864  -0.03275  -0.05148  -0.07175  -0.09266  -0.10445  -0.11789  -0.14533  -0.11736  -0.00000
               19.00   0.00000   0.10635   0.12462   0.09724   0.08318   0.07437   0.05682   0.04023   0.02518   0.01313   0.00230  -0.00000  -0.00230  -0.01313  -0.02518  -0.04023  -0.05682  -0.07437  -0.08318  -0.09724  -0.12462  -0.10635  -0.00000
               23.00   0.00000   0.09559   0.09696   0.06717   0.05377   0.04815   0.03357   0.02233   0.01337   0.00894   0.00476  -0.00000  -0.00476  -0.00894  -0.01337  -0.02233  -0.03357  -0.04815  -0.05377  -0.06717  -0.09696  -0.09559  -0.00000
               27.00   0.00000   0.08147   0.06448   0.03080   0.01819   0.01320   0.00808   0.00156   0.00084   0.00651   0.00178  -0.00000  -0.00178  -0.00651  -0.00084  -0.00156  -0.00808  -0.01320  -0.01819  -0.03080  -0.06448  -0.08147  -0.00000
               32.00   0.00000   0.06127   0.01836  -0.02071  -0.04058  -0.03529  -0.02830  -0.02593  -0.01012  -0.00491  -0.00405  -0.00000   0.00405   0.00491   0.01012   0.02593   0.02830   0.03529   0.04058   0.02071  -0.01836  -0.06127  -0.00000
               46.00   0.00000  -0.00335  -0.13281  -0.18708  -0.20354  -0.19157  -0.16444  -0.12324  -0.05958  -0.03709  -0.01957  -0.00000   0.01957   0.03709   0.05958   0.12324   0.16444   0.19157   0.20354   0.18708   0.13281   0.00335  -0.00000
               70.00   0.00000  -0.10204  -0.36820  -0.45821  -0.46869  -0.43837  -0.38437  -0.30864  -0.21443  -0.12802  -0.05784  -0.00000   0.05784   0.12802   0.21443   0.30864   0.38437   0.43837   0.46869   0.45821   0.36820   0.10204  -0.00000
              120.00  -0.00000  -0.06230  -0.27173  -0.34678  -0.35983  -0.33823  -0.29786  -0.24038  -0.16876  -0.10134  -0.04247  -0.00000   0.04247   0.10134   0.16876   0.24038   0.29786   0.33823   0.35983   0.34678   0.27173   0.06230   0.00000
              180.00  -0.00000   0.13141   0.15907   0.13358   0.09387   0.07235   0.05168   0.03319   0.04356   0.04885   0.02537  -0.00000  -0.02537  -0.04885  -0.04356  -0.03319  -0.05168  -0.07235  -0.09387  -0.13358  -0.15907  -0.13141   0.00000
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            </tableData>
          </table>
          </product>
        </function>
        <function name="aero/coefficient/CY_aileron">
          <description>CY increment from aileron (deg), over alpha</description>
          <product>
            <property>aero/qbar-psf</property>
            <property>metrics/Sw-sqft</property>
            <property>aero/function/mach-aileron</property>
          <table>
            <independentVar lookup="row">aero/alpha-deg</independentVar>
            <independentVar lookup="column">fcs/left-aileron-pos-deg</independentVar>
            <tableData>
                        -20.00    -15.00    -10.00     -5.00      0.00      5.00     10.00     15.00     20.00
             -180.00  -0.00000   0.00000   0.00000   0.00000   0.00000   0.00000   0.00000   0.00000  -0.00000
             -120.00   0.00134   0.00114   0.00084   0.00045   0.00000  -0.00045  -0.00084  -0.00114  -0.00134
              -70.00  -0.00051  -0.00043  -0.00032  -0.00017   0.00000   0.00017   0.00032   0.00043   0.00051
              -46.00  -0.00066  -0.00067  -0.00056  -0.00032   0.00000   0.00032   0.00056   0.00067   0.00066
              -32.00  -0.00097  -0.00097  -0.00079  -0.00043   0.00000   0.00043   0.00079   0.00097   0.00097
              -22.00  -0.00587  -0.00501  -0.00368  -0.00192   0.00000   0.00192   0.00368   0.00501   0.00587
              -17.00  -0.00964  -0.00830  -0.00623  -0.00334   0.00000   0.00334   0.00623   0.00830   0.00964
              -13.00  -0.01045  -0.00895  -0.00667  -0.00356   0.00000   0.00356   0.00667   0.00895   0.01045
               -9.00  -0.01062  -0.00909  -0.00678  -0.00361   0.00000   0.00361   0.00678   0.00909   0.01062
               -5.00  -0.01088  -0.00931  -0.00693  -0.00370   0.00000   0.00370   0.00693   0.00931   0.01088
               -1.00  -0.01160  -0.00992  -0.00738  -0.00394   0.00000   0.00394   0.00738   0.00992   0.01160
                3.00  -0.01345  -0.01151  -0.00858  -0.00457   0.00000   0.00457   0.00858   0.01151   0.01345
                7.00  -0.01648  -0.01414  -0.01056  -0.00564   0.00000   0.00564   0.01056   0.01414   0.01648
               11.00  -0.01770  -0.01521  -0.01138  -0.00609   0.00000   0.00609   0.01138   0.01521   0.01770
               15.00  -0.01734  -0.01475  -0.01099  -0.00580   0.00000   0.00580   0.01099   0.01475   0.01734
               19.00  -0.01062  -0.00903  -0.00680  -0.00368   0.00000   0.00368   0.00680   0.00903   0.01062
               23.00  -0.00993  -0.00859  -0.00648  -0.00350   0.00000   0.00350   0.00648   0.00859   0.00993
               27.00  -0.00811  -0.00709  -0.00539  -0.00291   0.00000   0.00291   0.00539   0.00709   0.00811
               32.00  -0.00595  -0.00530  -0.00407  -0.00221   0.00000   0.00221   0.00407   0.00530   0.00595
               46.00  -0.00233  -0.00212  -0.00165  -0.00090   0.00000   0.00090   0.00165   0.00212   0.00233
               70.00  -0.00044  -0.00038  -0.00028  -0.00015   0.00000   0.00015   0.00028   0.00038   0.00044
              120.00   0.00152   0.00129   0.00096   0.00051   0.00000  -0.00051  -0.00096  -0.00129  -0.00152
              180.00  -0.00000  -0.00000  -0.00000  -0.00000   0.00000  -0.00000  -0.00000  -0.00000  -0.00000
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            </tableData>
          </table>
          </product>
        </function>
        <function name="aero/coefficient/CY_rudder">
          <description>CY increment from rudder (deg), over alpha</description>
          <product>
            <property>aero/qbar-psf</property>
            <property>metrics/Sw-sqft</property>
            <property>aero/function/mach-rudder</property>
          <table>
            <independentVar lookup="row">aero/alpha-deg</independentVar>
            <independentVar lookup="column">fcs/rudder-pos-deg</independentVar>
            <tableData>
                        -25.00    -20.00    -15.00    -10.00     -5.00      0.00      5.00     10.00     15.00     20.00     25.00
             -180.00   0.00000   0.00000   0.00000   0.00000   0.00000   0.00000   0.00000   0.00000   0.00000   0.00000   0.00000
             -120.00  -0.00000  -0.00000  -0.00000  -0.00000  -0.00000   0.00000  -0.00000  -0.00000  -0.00000  -0.00000  -0.00000
              -70.00  -0.01736  -0.01567  -0.01333  -0.00988  -0.00525   0.00000   0.00525   0.00988   0.01333   0.01567   0.01736
              -46.00  -0.03925  -0.03075  -0.02421  -0.01800  -0.00977   0.00000   0.00977   0.01800   0.02421   0.03075   0.03925
              -32.00  -0.04815  -0.04800  -0.03167  -0.01553  -0.00744   0.00000   0.00744   0.01553   0.03167   0.04800   0.04815
              -22.00  -0.04340  -0.04133  -0.03966  -0.02843  -0.01079   0.00000   0.01079   0.02843   0.03966   0.04133   0.04340
              -17.00  -0.04368  -0.03913  -0.03371  -0.02589  -0.01282   0.00000   0.01282   0.02589   0.03371   0.03913   0.04368
              -13.00  -0.04837  -0.04333  -0.03660  -0.02703  -0.01433   0.00000   0.01433   0.02703   0.03660   0.04333   0.04837
               -9.00  -0.04996  -0.04475  -0.03778  -0.02785  -0.01478   0.00000   0.01478   0.02785   0.03778   0.04475   0.04996
               -5.00  -0.05096  -0.04564  -0.03853  -0.02840  -0.01507   0.00000   0.01507   0.02840   0.03853   0.04564   0.05096
               -1.00  -0.05139  -0.04603  -0.03885  -0.02864  -0.01519   0.00000   0.01519   0.02864   0.03885   0.04603   0.05139
                3.00  -0.05128  -0.04593  -0.03876  -0.02857  -0.01515   0.00000   0.01515   0.02857   0.03876   0.04593   0.05128
                7.00  -0.05075  -0.04546  -0.03837  -0.02828  -0.01500   0.00000   0.01500   0.02828   0.03837   0.04546   0.05075
               11.00  -0.04976  -0.04458  -0.03764  -0.02772  -0.01463   0.00000   0.01463   0.02772   0.03764   0.04458   0.04976
               15.00  -0.04853  -0.04351  -0.03665  -0.02617  -0.01313   0.00000   0.01313   0.02617   0.03665   0.04351   0.04853
               19.00  -0.04452  -0.03966  -0.03281  -0.02259  -0.01302   0.00000   0.01302   0.02259   0.03281   0.03966   0.04452
               23.00  -0.04185  -0.03748  -0.03200  -0.02341  -0.01186   0.00000   0.01186   0.02341   0.03200   0.03748   0.04185
               27.00  -0.04247  -0.03779  -0.03079  -0.02032  -0.01033   0.00000   0.01033   0.02032   0.03079   0.03779   0.04247
               32.00  -0.03551  -0.02931  -0.02262  -0.01614  -0.00876   0.00000   0.00876   0.01614   0.02262   0.02931   0.03551
               46.00  -0.03015  -0.02887  -0.02603  -0.02021  -0.01104   0.00000   0.01104   0.02021   0.02603   0.02887   0.03015
               70.00  -0.01736  -0.01567  -0.01333  -0.00988  -0.00525   0.00000   0.00525   0.00988   0.01333   0.01567   0.01736
              120.00   0.00000   0.00000   0.00000   0.00000   0.00000   0.00000   0.00000   0.00000   0.00000   0.00000   0.00000
              180.00  -0.00000  -0.00000  -0.00000  -0.00000  -0.00000   0.00000  -0.00000  -0.00000  -0.00000  -0.00000  -0.00000
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            </tableData>
          </table>
          </product>
        </function>
        <function name="aero/coefficient/CYp">
          <description>CY per p (non-dimensional), over alpha</description>
          <product>
            <property>aero/qbar-psf</property>
            <property>metrics/Sw-sqft</property>
            <property>aero/bi2vel</property>
            <property>velocities/p-aero-rad_sec</property>
            <property>aero/function/mach-lift</property>
          <table>
            <independentVar lookup="row">aero/alpha-deg</independentVar>
            <tableData>
                 -180.00   -0.15602
                 -165.00   -0.06783
                 -105.00   -0.05873
                  -60.00   -0.06163
                  -42.00   -0.05848
                  -30.00   -0.06341
                  -20.00   -0.07027
                  -16.00   -0.07362
                  -12.00   -0.08137
                   -8.00   -0.08276
                   -4.00   -0.08325
                    0.00   -0.08678
                    4.00   -0.10115
                    8.00   -0.12594
                   12.00   -0.00090
                   16.00    0.04026
                   20.00    0.05385
                   24.00   -0.01596
                   28.00   -0.02987
                   35.00   -0.04061
                   50.00   -0.05595
                   80.00   -0.05600
                  135.00   -0.06543
                  180.00   -0.15602
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            </tableData>
          </table>
          </product>
        </function>
        <function name="aero/coefficient/CYr">
          <description>CY per r (non-dimensional), over alpha</description>
          <product>
            <property>aero/qbar-psf</property>
            <property>metrics/Sw-sqft</property>
            <property>aero/bi2vel</property>
            <property>velocities/r-aero-rad_sec</property>
            <property>aero/function/mach-lift</property>
          <table>
            <independentVar lookup="row">aero/alpha-deg</independentVar>
            <tableData>
                 -180.00    0.41317
                 -165.00    0.42120
                 -105.00    0.17947
                  -60.00    0.30113
                  -42.00    0.23048
                  -30.00    0.20885
                  -20.00    0.20116
                  -16.00    0.17477
                  -12.00    0.18114
                   -8.00    0.18874
                   -4.00    0.19567
                    0.00    0.20122
                    4.00    0.20781
                    8.00    0.22166
                   12.00    0.25731
                   16.00    0.20272
                   20.00    0.21375
                   24.00    0.25899
                   28.00    0.26730
                   35.00    0.27574
                   50.00    0.34629
                   80.00    0.16568
                  135.00    0.32201
                  180.00    0.41317
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            </tableData>
          </table>
          </product>
        </function>
      </axis>
      <axis name="LIFT">
        <function name="aero/coefficient/CL_base">
          <description>CL over alpha and beta, ground effect, compressibility (hangar)</description>
          <product>
            <property>aero/qbar-psf</property>
            <property>metrics/Sw-sqft</property>
            <property>aero/function/CL-base</property>
            <property>aero/function/mach-lift</property>
          <table>
            <independentVar lookup="row">aero/h_b-mac-ft</independentVar>
            <tableData>
                    0.00    1.20000
                    0.10    1.08692
                    0.15    1.05730
                    0.20    1.03778
                    0.30    1.01642
                    0.40    1.00713
                    0.50    1.00310
                    0.60    1.00135
                    0.70    1.00059
                    0.80    1.00025
                    0.90    1.00011
                    1.00    1.00005
                    1.10    1.00000
            </tableData>
          </table>
          </product>
        </function>
        <function name="aero/coefficient/CL_elevator">
          <description>CL increment from elevator (deg), over alpha</description>
          <product>
            <property>aero/qbar-psf</property>
            <property>metrics/Sw-sqft</property>
            <property>aero/function/mach-elevator</property>
          <table>
            <independentVar lookup="row">aero/alpha-deg</independentVar>
            <independentVar lookup="column">fcs/elevator-pos-deg</independentVar>
            <tableData>
                        -25.00    -20.00    -15.00    -10.00     -5.00      0.00      5.00     10.00     15.00     20.00     25.00
             -180.00   0.00000   0.00000   0.00000   0.00000   0.00000   0.00000   0.00000   0.00000   0.00000   0.00000   0.00000
             -120.00  -0.02941  -0.02653  -0.02255  -0.01671  -0.00889   0.00000   0.00889   0.01671   0.02255   0.02653   0.02941
              -70.00  -0.01015  -0.00920  -0.00793  -0.00600  -0.00328   0.00000   0.00347   0.00669   0.00920   0.01096   0.01227
              -46.00  -0.03508  -0.03237  -0.02852  -0.02192  -0.01207   0.00000   0.01264   0.02388   0.03184   0.03652   0.03913
              -32.00  -0.04520  -0.04296  -0.03939  -0.03150  -0.01795   0.00000   0.01947   0.03669   0.04824   0.05407   0.05620
              -22.00  -0.05298  -0.05046  -0.04727  -0.03912  -0.02331   0.00000   0.02757   0.05370   0.07245   0.08346   0.08938
              -17.00  -0.03373  -0.03145  -0.02988  -0.02348  -0.01205   0.00000   0.02101   0.05236   0.07896   0.09687   0.10936
              -13.00  -0.07337  -0.07149  -0.07032  -0.06137  -0.03774   0.00000   0.04263   0.08097   0.10929   0.12799   0.14095
               -9.00  -0.13126  -0.12292  -0.10862  -0.08226  -0.04427   0.00000   0.04490   0.08443   0.11346   0.13257   0.14577
               -5.00  -0.14442  -0.13197  -0.11369  -0.08519  -0.04561   0.00000   0.04581   0.08596   0.11537   0.13467   0.14797
               -1.00  -0.14770  -0.13462  -0.11560  -0.08634  -0.04611   0.00000   0.04614   0.08646   0.11590   0.13517   0.14840
                3.00  -0.14905  -0.13566  -0.11623  -0.08663  -0.04619   0.00000   0.04612   0.08637   0.11570   0.13482   0.14790
                7.00  -0.14878  -0.13530  -0.11583  -0.08627  -0.04595   0.00000   0.04581   0.08565   0.11459   0.13339   0.14618
               11.00  -0.14000  -0.12705  -0.10856  -0.07938  -0.04391   0.00000   0.04334   0.08084   0.10806   0.12582   0.13804
               15.00  -0.10769  -0.06988  -0.11622  -0.08574  -0.04445   0.00000   0.04264   0.07921   0.10624   0.12484   0.13866
               19.00  -0.14577  -0.12959  -0.10759  -0.07751  -0.04040   0.00000   0.03970   0.07403   0.09909   0.11585   0.12778
               23.00  -0.12602  -0.12041  -0.10775  -0.08347  -0.04601   0.00000   0.04427   0.08022   0.10523   0.12160   0.13330
               27.00  -0.10179  -0.09722  -0.08675  -0.06668  -0.03620   0.00000   0.03658   0.06800   0.09024   0.10458   0.11493
               32.00  -0.08113  -0.07797  -0.06990  -0.05391  -0.02933   0.00000   0.02938   0.05453   0.07261   0.08484   0.09356
               46.00  -0.05431  -0.05054  -0.04405  -0.03315  -0.01769   0.00000   0.01737   0.03212   0.04257   0.04922   0.05368
               70.00  -0.01726  -0.01545  -0.01299  -0.00948  -0.00494   0.00000   0.00470   0.00866   0.01150   0.01338   0.01472
              120.00  -0.02606  -0.02351  -0.01998  -0.01481  -0.00787   0.00000   0.00787   0.01481   0.01998   0.02351   0.02606
              180.00   0.00000   0.00000   0.00000   0.00000   0.00000   0.00000   0.00000   0.00000   0.00000   0.00000   0.00000
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            </tableData>
          </table>
          </product>
        </function>
        <function name="aero/coefficient/CL_flap">
          <description>CL increment from flap (deg), over alpha</description>
          <product>
            <property>aero/qbar-psf</property>
            <property>metrics/Sw-sqft</property>
            <property>aero/function/mach-flap</property>
          <table>
            <independentVar lookup="row">aero/alpha-deg</independentVar>
            <independentVar lookup="column">fcs/flap-pos-deg</independentVar>
            <tableData>
                          0.00      5.00     10.00     15.00     20.00     25.00     30.00     35.00
             -180.00   0.00000   0.00000   0.00000   0.00000   0.00000   0.00000   0.00000   0.00000
             -120.00   0.00000   0.01439   0.02824   0.04081   0.05168   0.06087   0.06878   0.07587
              -70.00   0.00000   0.00951   0.01913   0.02828   0.03653   0.04377   0.05019   0.05611
              -46.00   0.00000   0.02856   0.05710   0.08347   0.10606   0.12466   0.14001   0.15315
              -32.00   0.00000   0.04179   0.08340   0.12106   0.15230   0.17682   0.19578   0.21084
              -22.00   0.00000   0.05343   0.08292   0.08229   0.06823   0.06824   0.08430   0.10830
              -17.00   0.00000   0.10851   0.21764   0.31637   0.39899   0.46708   0.52480   0.57677
              -13.00   0.00000   0.09873   0.19497   0.28389   0.36232   0.43000   0.48932   0.54355
               -9.00   0.00000   0.09729   0.19072   0.27512   0.34731   0.40755   0.45862   0.50399
               -5.00   0.00000   0.09632   0.18855   0.27159   0.34233   0.40108   0.45059   0.49421
               -1.00   0.00000   0.09240   0.18066   0.25994   0.32733   0.38332   0.43097   0.47451
                3.00   0.00000   0.09334   0.18232   0.26202   0.32945   0.38497   0.43124   0.47125
                7.00   0.00000   0.09203   0.17913   0.25423   0.31391   0.36012   0.39680   0.42757
               11.00   0.00000   0.07439   0.13537   0.18520   0.22610   0.25989   0.28846   0.31324
               15.00   0.00000   0.07294   0.14183   0.20300   0.25679   0.30501   0.34987   0.39193
               19.00   0.00000   0.06700   0.12705   0.17706   0.21640   0.24673   0.27051   0.28978
               23.00   0.00000   0.05855   0.11239   0.15834   0.19522   0.22400   0.24662   0.26486
               27.00   0.00000   0.04932   0.09492   0.13396   0.16520   0.18932   0.20796   0.22263
               32.00   0.00000   0.04007   0.07768   0.11026   0.13654   0.15693   0.17273   0.18526
               46.00   0.00000   0.02490   0.04828   0.06877   0.08566   0.09921   0.11021   0.11954
               70.00   0.00000   0.00652   0.01251   0.01773   0.02206   0.02560   0.02854   0.03111
              120.00   0.00000   0.01833   0.03597   0.05199   0.06583   0.07755   0.08762   0.09666
              180.00   0.00000   0.00000   0.00000   0.00000   0.00000   0.00000   0.00000   0.00000
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            </tableData>
          </table>
          <table>
            <independentVar lookup="row">aero/h_b-mac-ft</independentVar>
            <tableData>
                    0.00    1.20000
                    0.10    1.08692
                    0.15    1.05730
                    0.20    1.03778
                    0.30    1.01642
                    0.40    1.00713
                    0.50    1.00310
                    0.60    1.00135
                    0.70    1.00059
                    0.80    1.00025
                    0.90    1.00011
                    1.00    1.00005
                    1.10    1.00000
            </tableData>
          </table>
          </product>
        </function>
        <function name="aero/coefficient/CLq">
          <description>CL per q (non-dimensional), over alpha</description>
          <product>
            <property>aero/qbar-psf</property>
            <property>metrics/Sw-sqft</property>
            <property>aero/ci2vel</property>
            <property>velocities/q-aero-rad_sec</property>
            <property>aero/function/mach-lift</property>
          <table>
            <independentVar lookup="row">aero/alpha-deg</independentVar>
            <tableData>
                 -180.00   -2.24555
                 -165.00   -2.79907
                 -105.00   -1.47655
                  -60.00    2.39115
                  -42.00    3.24215
                  -30.00    2.60175
                  -20.00    0.83090
                  -16.00    8.72740
                  -12.00    9.47914
                   -8.00   10.01219
                   -4.00   10.59994
                    0.00   11.03726
                    4.00   12.32448
                    8.00   11.34337
                   12.00    2.71135
                   16.00    1.86489
                   20.00    3.36475
                   24.00    3.24535
                   28.00    3.24895
                   35.00    2.85368
                   50.00    3.14619
                   80.00    1.06470
                  135.00   -2.95953
                  180.00   -2.24555
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            </tableData>
          </table>
          </product>
        </function>
        <function name="aero/coefficient/CLadot">
          <description>CL per alpha-dot (downwash lag at the tail)</description>
          <product>
            <property>aero/qbar-psf</property>
            <property>metrics/Sw-sqft</property>
            <property>aero/ci2vel</property>
            <property>aero/alphadot-rad_sec</property>
            <value>0.07998</value>
            <property>aero/function/mach-lift</property>
          </product>
        </function>
      </axis>
      <axis name="ROLL">
        <function name="aero/coefficient/Cl_base">
          <description>Cl over alpha and beta (hangar)</description>
          <product>
            <property>aero/qbar-psf</property>
            <property>metrics/Sw-sqft</property>
            <property>metrics/bw-ft</property>
            <property>aero/function/mach-side</property>
          <table>
            <independentVar lookup="row">aero/alpha-deg</independentVar>
            <independentVar lookup="column">aero/beta-deg</independentVar>
            <tableData>
                        -90.00    -70.00    -50.00    -40.00    -30.00    -25.00    -20.00    -15.00    -10.00     -6.00     -3.00      0.00      3.00      6.00     10.00     15.00     20.00     25.00     30.00     40.00     50.00     70.00     90.00
             -180.00  -0.00236   0.01144   0.02854   0.02965   0.02675   0.02392   0.02028   0.01593   0.01175   0.00794   0.00406  -0.00000  -0.00406  -0.00794  -0.01175  -0.01593  -0.02028  -0.02392  -0.02675  -0.02965  -0.02854  -0.01144   0.00236
             -120.00  -0.00236   0.00652   0.01202   0.01234   0.01100   0.00976   0.00821   0.00639   0.00437   0.00274   0.00164  -0.00000  -0.00164  -0.00274  -0.00437  -0.00639  -0.00821  -0.00976  -0.01100  -0.01234  -0.01202  -0.00652   0.00236
              -70.00  -0.00236   0.00630   0.01155   0.01181   0.01047   0.00928   0.00780   0.00609   0.00422   0.00268   0.00155  -0.00000  -0.00155  -0.00268  -0.00422  -0.00609  -0.00780  -0.00928  -0.01047  -0.01181  -0.01155  -0.00630   0.00236
              -46.00  -0.00236   0.00389   0.00829   0.00890   0.00893   0.00852   0.00775   0.00675   0.00542   0.00364   0.00180  -0.00000  -0.00180  -0.00364  -0.00542  -0.00675  -0.00775  -0.00852  -0.00893  -0.00890  -0.00829  -0.00389   0.00236
              -32.00  -0.00236   0.00147   0.00529   0.00839   0.01053   0.01077   0.01001   0.00800   0.00567   0.00408   0.00193  -0.00000  -0.00193  -0.00408  -0.00567  -0.00800  -0.01001  -0.01077  -0.01053  -0.00839  -0.00529  -0.00147   0.00236
              -22.00  -0.00236  -0.00087  -0.00312   0.00081   0.00444   0.00549   0.00527   0.00445   0.00325   0.00234   0.00117  -0.00000  -0.00117  -0.00234  -0.00325  -0.00445  -0.00527  -0.00549  -0.00444  -0.00081   0.00312   0.00087   0.00236
              -17.00  -0.00236   0.00499   0.00747   0.01901   0.02558   0.02360   0.02001   0.01581   0.01100   0.00677   0.00347  -0.00000  -0.00347  -0.00677  -0.01100  -0.01581  -0.02001  -0.02360  -0.02558  -0.01901  -0.00747  -0.00499   0.00236
              -13.00  -0.00236   0.01063   0.03008   0.03183   0.03084   0.02808   0.02363   0.01843   0.01265   0.00771   0.00388  -0.00000  -0.00388  -0.00771  -0.01265  -0.01843  -0.02363  -0.02808  -0.03084  -0.03183  -0.03008  -0.01063   0.00236
               -9.00  -0.00236   0.01810   0.03109   0.03210   0.03189   0.02842   0.02390   0.01865   0.01281   0.00781   0.00394  -0.00000  -0.00394  -0.00781  -0.01281  -0.01865  -0.02390  -0.02842  -0.03189  -0.03210  -0.03109  -0.01810   0.00236
               -5.00  -0.00236   0.02019   0.03236   0.03325   0.03216   0.02856   0.02402   0.01876   0.01290   0.00788   0.00397  -0.00000  -0.00397  -0.00788  -0.01290  -0.01876  -0.02402  -0.02856  -0.03216  -0.03325  -0.03236  -0.02019   0.00236
               -1.00  -0.00236   0.02027   0.03399   0.03412   0.03224   0.02861   0.02406   0.01879   0.01292   0.00790   0.00399  -0.00000  -0.00399  -0.00790  -0.01292  -0.01879  -0.02406  -0.02861  -0.03224  -0.03412  -0.03399  -0.02027   0.00236
                3.00  -0.00236   0.01511   0.03381   0.03426   0.03229   0.02864   0.02408   0.01880   0.01293   0.00790   0.00398  -0.00000  -0.00398  -0.00790  -0.01293  -0.01880  -0.02408  -0.02864  -0.03229  -0.03426  -0.03381  -0.01511   0.00236
                7.00  -0.00236   0.00495   0.02723   0.03316   0.03216   0.02855   0.02401   0.01875   0.01288   0.00787   0.00397  -0.00000  -0.00397  -0.00787  -0.01288  -0.01875  -0.02401  -0.02855  -0.03216  -0.03316  -0.02723  -0.00495   0.00236
               11.00  -0.00236  -0.00108  -0.00879   0.00598   0.01971   0.01864   0.01620   0.01296   0.00906   0.00558   0.00282  -0.00000  -0.00282  -0.00558  -0.00906  -0.01296  -0.01620  -0.01864  -0.01971  -0.00598   0.00879   0.00108   0.00236
               15.00  -0.00236  -0.00623  -0.01615  -0.01430  -0.01007  -0.00884  -0.00800  -0.00650  -0.00440  -0.00259  -0.00132  -0.00000   0.00132   0.00259   0.00440   0.00650   0.00800   0.00884   0.01007   0.01430   0.01615   0.00623   0.00236
               19.00  -0.00236  -0.00669  -0.00052   0.00218   0.00577   0.00594   0.00529   0.00439   0.00318   0.00199   0.00087  -0.00000  -0.00087  -0.00199  -0.00318  -0.00439  -0.00529  -0.00594  -0.00577  -0.00218   0.00052   0.00669   0.00236
               23.00  -0.00236  -0.00127   0.00253   0.00645   0.00833   0.00815   0.00685   0.00527   0.00358   0.00223   0.00112  -0.00000  -0.00112  -0.00223  -0.00358  -0.00527  -0.00685  -0.00815  -0.00833  -0.00645  -0.00253   0.00127   0.00236
               27.00  -0.00236   0.00035   0.00420   0.00771   0.00984   0.00970   0.00886   0.00701   0.00486   0.00325   0.00156  -0.00000  -0.00156  -0.00325  -0.00486  -0.00701  -0.00886  -0.00970  -0.00984  -0.00771  -0.00420  -0.00035   0.00236
               32.00  -0.00236   0.00168   0.00555   0.00826   0.00991   0.01003   0.00934   0.00758   0.00565   0.00357   0.00174  -0.00000  -0.00174  -0.00357  -0.00565  -0.00758  -0.00934  -0.01003  -0.00991  -0.00826  -0.00555  -0.00168   0.00236
               46.00  -0.00236   0.00400   0.00845   0.00903   0.00880   0.00824   0.00737   0.00627   0.00540   0.00341   0.00171  -0.00000  -0.00171  -0.00341  -0.00540  -0.00627  -0.00737  -0.00824  -0.00880  -0.00903  -0.00845  -0.00400   0.00236
               70.00  -0.00236   0.00636   0.01165   0.01190   0.01056   0.00936   0.00786   0.00614   0.00425   0.00270   0.00157  -0.00000  -0.00157  -0.00270  -0.00425  -0.00614  -0.00786  -0.00936  -0.01056  -0.01190  -0.01165  -0.00636   0.00236
              120.00  -0.00236   0.00643   0.01189   0.01221   0.01088   0.00966   0.00812   0.00632   0.00433   0.00271   0.00163  -0.00000  -0.00163  -0.00271  -0.00433  -0.00632  -0.00812  -0.00966  -0.01088  -0.01221  -0.01189  -0.00643   0.00236
              180.00  -0.00236   0.01144   0.02854   0.02965   0.02675   0.02392   0.02028   0.01593   0.01175   0.00794   0.00406  -0.00000  -0.00406  -0.00794  -0.01175  -0.01593  -0.02028  -0.02392  -0.02675  -0.02965  -0.02854  -0.01144   0.00236
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            </tableData>
          </table>
          </product>
        </function>
        <function name="aero/coefficient/Cl_aileron">
          <description>Cl increment from aileron (deg), over alpha</description>
          <product>
            <property>aero/qbar-psf</property>
            <property>metrics/Sw-sqft</property>
            <property>metrics/bw-ft</property>
            <property>aero/function/mach-aileron</property>
          <table>
            <independentVar lookup="row">aero/alpha-deg</independentVar>
            <independentVar lookup="column">fcs/left-aileron-pos-deg</independentVar>
            <tableData>
                        -20.00    -15.00    -10.00     -5.00      0.00      5.00     10.00     15.00     20.00
             -180.00  -0.00000  -0.00000  -0.00000  -0.00000   0.00000  -0.00000  -0.00000  -0.00000  -0.00000
              -35.00  -0.02430  -0.02203  -0.01712  -0.00935   0.00000   0.00935   0.01712   0.02203   0.02430
              -11.00  -0.09888  -0.08464  -0.06307  -0.03364   0.00000   0.03364   0.06307   0.08464   0.09888
                4.00  -0.09842  -0.08440  -0.06296  -0.03360   0.00000   0.03360   0.06296   0.08440   0.09842
               19.00  -0.07951  -0.06744  -0.05004  -0.02668   0.00000   0.02668   0.05004   0.06744   0.07951
               42.00  -0.01524  -0.01426  -0.01131  -0.00624   0.00000   0.00624   0.01131   0.01426   0.01524
              180.00   0.00000   0.00000   0.00000   0.00000   0.00000   0.00000   0.00000   0.00000   0.00000
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            </tableData>
          </table>
          </product>
        </function>
        <function name="aero/coefficient/Cl_rudder">
          <description>Cl increment from rudder (deg), over alpha</description>
          <product>
            <property>aero/qbar-psf</property>
            <property>metrics/Sw-sqft</property>
            <property>metrics/bw-ft</property>
            <property>aero/function/mach-rudder</property>
          <table>
            <independentVar lookup="row">aero/alpha-deg</independentVar>
            <independentVar lookup="column">fcs/rudder-pos-deg</independentVar>
            <tableData>
                        -25.00    -20.00    -15.00    -10.00     -5.00      0.00      5.00     10.00     15.00     20.00     25.00
             -180.00  -0.00000  -0.00000  -0.00000  -0.00000  -0.00000   0.00000  -0.00000  -0.00000  -0.00000  -0.00000  -0.00000
              -35.00  -0.00110  -0.00113  -0.00094  -0.00058  -0.00031   0.00000   0.00031   0.00058   0.00094   0.00113   0.00110
              -11.00  -0.00238  -0.00216  -0.00184  -0.00137  -0.00073   0.00000   0.00073   0.00137   0.00184   0.00216   0.00238
                4.00  -0.00246  -0.00223  -0.00191  -0.00142  -0.00076   0.00000   0.00076   0.00142   0.00191   0.00223   0.00246
               19.00  -0.00209  -0.00189  -0.00163  -0.00123  -0.00064   0.00000   0.00064   0.00123   0.00163   0.00189   0.00209
               42.00  -0.00108  -0.00104  -0.00094  -0.00074  -0.00041   0.00000   0.00041   0.00074   0.00094   0.00104   0.00108
              180.00   0.00000   0.00000   0.00000   0.00000   0.00000   0.00000   0.00000   0.00000   0.00000   0.00000   0.00000
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            </tableData>
          </table>
          </product>
        </function>
        <function name="aero/coefficient/Clp">
          <description>Cl per p (non-dimensional), over alpha</description>
          <product>
            <property>aero/qbar-psf</property>
            <property>metrics/Sw-sqft</property>
            <property>metrics/bw-ft</property>
            <property>aero/bi2vel</property>
            <property>velocities/p-aero-rad_sec</property>
            <property>aero/function/mach-lift</property>
          <table>
            <independentVar lookup="row">aero/alpha-deg</independentVar>
            <tableData>
                 -180.00   -0.72479
                 -165.00   -0.21076
                  -32.00   -0.21642
                  -10.00   -0.59369
                    5.00   -0.59937
                   20.00    0.02288
                   46.00   -0.27272
                  180.00   -0.72479
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            </tableData>
          </table>
          </product>
        </function>
        <function name="aero/coefficient/Clr">
          <description>Cl per r (non-dimensional), over alpha</description>
          <product>
            <property>aero/qbar-psf</property>
            <property>metrics/Sw-sqft</property>
            <property>metrics/bw-ft</property>
            <property>aero/bi2vel</property>
            <property>velocities/r-aero-rad_sec</property>
            <property>aero/function/mach-lift</property>
          <table>
            <independentVar lookup="row">aero/alpha-deg</independentVar>
            <tableData>
                 -180.00    0.03396
                 -165.00    0.06861
                  -32.00   -0.18526
                  -10.00    0.00989
                    5.00    0.19218
                   20.00    0.31297
                   46.00    0.18132
                  180.00    0.03396
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            </tableData>
          </table>
          </product>
        </function>
      </axis>
      <axis name="PITCH">
        <function name="aero/coefficient/Cm_base">
          <description>Cm over alpha and beta (hangar)</description>
          <product>
            <property>aero/qbar-psf</property>
            <property>metrics/Sw-sqft</property>
            <property>metrics/cbarw-ft</property>
          <table>
            <independentVar lookup="row">aero/alpha-deg</independentVar>
            <independentVar lookup="column">aero/beta-deg</independentVar>
            <tableData>
                        -90.00    -70.00    -50.00    -40.00    -30.00    -25.00    -20.00    -15.00    -10.00     -6.00     -3.00      0.00      3.00      6.00     10.00     15.00     20.00     25.00     30.00     40.00     50.00     70.00     90.00
             -180.00  -0.00000  -0.01002  -0.00422  -0.00427  -0.00477  -0.00505  -0.00531  -0.00553  -0.00362  -0.00433  -0.00566  -0.00613  -0.00566  -0.00433  -0.00362  -0.00553  -0.00531  -0.00505  -0.00477  -0.00427  -0.00422  -0.01002  -0.00000
              -35.00  -0.00000   0.15894   0.41011   0.52906   0.62354   0.65925   0.69710   0.72358   0.74265   0.74857   0.75291   0.75442   0.75291   0.74857   0.74265   0.72358   0.69710   0.65925   0.62354   0.52906   0.41011   0.15894  -0.00000
              -11.00  -0.00000   0.10995   0.32438   0.37112   0.38485   0.43137   0.45944   0.48088   0.49569   0.50291   0.50582   0.50674   0.50582   0.50291   0.49569   0.48088   0.45944   0.43137   0.38485   0.37112   0.32438   0.10995  -0.00000
                4.00  -0.00000  -0.04676  -0.11919  -0.09851  -0.08745  -0.09349  -0.09911  -0.10369  -0.10708  -0.10883  -0.10952  -0.10965  -0.10952  -0.10883  -0.10708  -0.10369  -0.09911  -0.09349  -0.08745  -0.09851  -0.11919  -0.04676  -0.00000
               19.00  -0.00000  -0.11927  -0.32449  -0.48508  -0.56775  -0.60471  -0.67018  -0.72941  -0.77383  -0.79603  -0.80636  -0.81127  -0.80636  -0.79603  -0.77383  -0.72941  -0.67018  -0.60471  -0.56775  -0.48508  -0.32449  -0.11927  -0.00000
               42.00  -0.00000  -0.18471  -0.47927  -0.62773  -0.74764  -0.79500  -0.83417  -0.87110  -0.88882  -0.89643  -0.90064  -0.90212  -0.90064  -0.89643  -0.88882  -0.87110  -0.83417  -0.79500  -0.74764  -0.62773  -0.47927  -0.18471  -0.00000
              180.00  -0.00000  -0.01002  -0.00422  -0.00427  -0.00477  -0.00505  -0.00531  -0.00553  -0.00362  -0.00433  -0.00566  -0.00613  -0.00566  -0.00433  -0.00362  -0.00553  -0.00531  -0.00505  -0.00477  -0.00427  -0.00422  -0.01002  -0.00000
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            </tableData>
          </table>
          </product>
        </function>
        <function name="aero/coefficient/Cm_mach">
          <description>Cm from the neutral point's move with Mach</description>
          <product>
            <property>aero/qbar-psf</property>
            <property>metrics/Sw-sqft</property>
            <property>metrics/cbarw-ft</property>
            <property>aero/function/CL-base</property>
            <property>aero/function/mach-dCm-dCL</property>
          </product>
        </function>
        <function name="aero/coefficient/Cm_elevator">
          <description>Cm increment from elevator (deg), over alpha</description>
          <product>
            <property>aero/qbar-psf</property>
            <property>metrics/Sw-sqft</property>
            <property>metrics/cbarw-ft</property>
            <property>aero/function/mach-elevator</property>
          <table>
            <independentVar lookup="row">aero/alpha-deg</independentVar>
            <independentVar lookup="column">fcs/elevator-pos-deg</independentVar>
            <tableData>
                        -25.00    -20.00    -15.00    -10.00     -5.00      0.00      5.00     10.00     15.00     20.00     25.00
             -180.00   0.00099   0.00065   0.00037   0.00017   0.00004   0.00000   0.00004   0.00017   0.00037   0.00065   0.00099
              -35.00   0.17802   0.16292   0.14377   0.11052   0.06027   0.00000  -0.05878  -0.10348  -0.12459  -0.12395  -0.10902
              -11.00   0.48294   0.46220   0.42822   0.34316   0.19083   0.00000  -0.19496  -0.36619  -0.49134  -0.57318  -0.62923
                4.00   0.64851   0.59083   0.50677   0.37826   0.20208   0.00000  -0.20285  -0.38082  -0.51151  -0.59776  -0.65764
               19.00   0.65743   0.58841   0.49195   0.35699   0.18745   0.00000  -0.18712  -0.35181  -0.47464  -0.55914  -0.62146
               42.00   0.09822   0.11182   0.11307   0.09513   0.05527   0.00000  -0.06117  -0.11801  -0.16185  -0.19306  -0.21724
              180.00   0.00099   0.00065   0.00037   0.00017   0.00004   0.00000   0.00004   0.00017   0.00037   0.00065   0.00099
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            </tableData>
          </table>
          </product>
        </function>
        <function name="aero/coefficient/Cm_flap">
          <description>Cm increment from flap (deg), over alpha</description>
          <product>
            <property>aero/qbar-psf</property>
            <property>metrics/Sw-sqft</property>
            <property>metrics/cbarw-ft</property>
            <property>aero/function/mach-flap</property>
          <table>
            <independentVar lookup="row">aero/alpha-deg</independentVar>
            <independentVar lookup="column">fcs/flap-pos-deg</independentVar>
            <tableData>
                          0.00      5.00     10.00     15.00     20.00     25.00     30.00     35.00
             -180.00   0.00000   0.00003   0.00012   0.00026   0.00045   0.00068   0.00096   0.00126
              -35.00   0.00000  -0.00646  -0.01281  -0.01851  -0.02314  -0.02663  -0.02914  -0.03091
              -11.00   0.00000   0.01832   0.03511   0.04848   0.05696   0.06050   0.05977   0.05524
                4.00   0.00000   0.02401   0.04711   0.06816   0.08613   0.10103   0.11339   0.12396
               19.00   0.00000  -0.00584  -0.00709  -0.00449   0.00047   0.00649   0.01274   0.01838
               42.00   0.00000  -0.00086  -0.00191  -0.00303  -0.00405  -0.00489  -0.00561  -0.00628
              180.00   0.00000   0.00003   0.00012   0.00026   0.00045   0.00068   0.00096   0.00126
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            </tableData>
          </table>
          </product>
        </function>
        <function name="aero/coefficient/Cmq">
          <description>Cm per q (non-dimensional), over alpha</description>
          <product>
            <property>aero/qbar-psf</property>
            <property>metrics/Sw-sqft</property>
            <property>metrics/cbarw-ft</property>
            <property>aero/ci2vel</property>
            <property>velocities/q-aero-rad_sec</property>
            <property>aero/function/mach-lift</property>
          <table>
            <independentVar lookup="row">aero/alpha-deg</independentVar>
            <tableData>
                 -180.00  -10.37939
                 -165.00  -13.30183
                  -32.00   -9.55419
                  -10.00  -19.20301
                    5.00  -29.79483
                   20.00  -15.99203
                   46.00  -17.59375
                  180.00  -10.37939
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            </tableData>
          </table>
          </product>
        </function>
        <function name="aero/coefficient/Cmadot">
          <description>Cm per alpha-dot (downwash lag at the tail)</description>
          <product>
            <property>aero/qbar-psf</property>
            <property>metrics/Sw-sqft</property>
            <property>metrics/cbarw-ft</property>
            <property>aero/ci2vel</property>
            <property>aero/alphadot-rad_sec</property>
            <value>-0.35868</value>
            <property>aero/function/mach-lift</property>
          </product>
        </function>
      </axis>
      <axis name="YAW">
        <function name="aero/coefficient/Cn_base">
          <description>Cn over alpha and beta (hangar)</description>
          <product>
            <property>aero/qbar-psf</property>
            <property>metrics/Sw-sqft</property>
            <property>metrics/bw-ft</property>
            <property>aero/function/mach-side</property>
          <table>
            <independentVar lookup="row">aero/alpha-deg</independentVar>
            <independentVar lookup="column">aero/beta-deg</independentVar>
            <tableData>
                        -90.00    -70.00    -50.00    -40.00    -30.00    -25.00    -20.00    -15.00    -10.00     -6.00     -3.00      0.00      3.00      6.00     10.00     15.00     20.00     25.00     30.00     40.00     50.00     70.00     90.00
             -180.00  -0.08675  -0.08616  -0.07021  -0.05793  -0.04374  -0.03623  -0.02863  -0.02108  -0.02369  -0.02399  -0.01266  -0.00000   0.01266   0.02399   0.02369   0.02108   0.02863   0.03623   0.04374   0.05793   0.07021   0.08616   0.08675
              -35.00  -0.08675  -0.07452  -0.05290  -0.03825  -0.02771  -0.02822  -0.02615  -0.01912  -0.01562  -0.01246  -0.00501  -0.00000   0.00501   0.01246   0.01562   0.01912   0.02615   0.02822   0.02771   0.03825   0.05290   0.07452   0.08675
              -11.00  -0.08675  -0.07729  -0.05552  -0.04039  -0.03756  -0.03461  -0.02796  -0.02099  -0.01393  -0.00831  -0.00415  -0.00000   0.00415   0.00831   0.01393   0.02099   0.02796   0.03461   0.03756   0.04039   0.05552   0.07729   0.08675
                4.00  -0.08675  -0.07063  -0.04061  -0.02934  -0.03254  -0.02721  -0.02148  -0.01571  -0.01009  -0.00583  -0.00281  -0.00000   0.00281   0.00583   0.01009   0.01571   0.02148   0.02721   0.03254   0.02934   0.04061   0.07063   0.08675
               19.00  -0.08675  -0.07458  -0.04936  -0.03546  -0.03185  -0.02936  -0.02363  -0.01774  -0.01176  -0.00653  -0.00177  -0.00000   0.00177   0.00653   0.01176   0.01774   0.02363   0.02936   0.03185   0.03546   0.04936   0.07458   0.08675
               42.00  -0.08675  -0.07486  -0.05337  -0.04068  -0.02891  -0.02499  -0.02503  -0.02360  -0.02140  -0.01252  -0.00600  -0.00000   0.00600   0.01252   0.02140   0.02360   0.02503   0.02499   0.02891   0.04068   0.05337   0.07486   0.08675
              180.00  -0.08675  -0.08616  -0.07021  -0.05793  -0.04374  -0.03623  -0.02863  -0.02108  -0.02369  -0.02399  -0.01266  -0.00000   0.01266   0.02399   0.02369   0.02108   0.02863   0.03623   0.04374   0.05793   0.07021   0.08616   0.08675
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            </tableData>
          </table>
          </product>
        </function>
        <function name="aero/coefficient/Cn_aileron">
          <description>Cn increment from aileron (deg), over alpha</description>
          <product>
            <property>aero/qbar-psf</property>
            <property>metrics/Sw-sqft</property>
            <property>metrics/bw-ft</property>
            <property>aero/function/mach-aileron</property>
          <table>
            <independentVar lookup="row">aero/alpha-deg</independentVar>
            <independentVar lookup="column">fcs/left-aileron-pos-deg</independentVar>
            <tableData>
                        -20.00    -15.00    -10.00     -5.00      0.00      5.00     10.00     15.00     20.00
             -180.00   0.00000   0.00000  -0.00000  -0.00000   0.00000  -0.00000  -0.00000   0.00000   0.00000
              -35.00   0.03028   0.02585   0.01923   0.01026   0.00000  -0.01026  -0.01923  -0.02585  -0.03028
              -11.00   0.01066   0.00915   0.00683   0.00364   0.00000  -0.00364  -0.00683  -0.00915  -0.01066
                4.00   0.00249   0.00200   0.00141   0.00073   0.00000  -0.00073  -0.00141  -0.00200  -0.00249
               19.00  -0.02500  -0.02129  -0.01578  -0.00839   0.00000   0.00839   0.01578   0.02129   0.02500
               42.00  -0.02982  -0.02539  -0.01886  -0.01005   0.00000   0.01005   0.01886   0.02539   0.02982
              180.00   0.00000   0.00000  -0.00000  -0.00000   0.00000  -0.00000  -0.00000   0.00000   0.00000
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            </tableData>
          </table>
          </product>
        </function>
        <function name="aero/coefficient/Cn_rudder">
          <description>Cn increment from rudder (deg), over alpha</description>
          <product>
            <property>aero/qbar-psf</property>
            <property>metrics/Sw-sqft</property>
            <property>metrics/bw-ft</property>
            <property>aero/function/mach-rudder</property>
          <table>
            <independentVar lookup="row">aero/alpha-deg</independentVar>
            <independentVar lookup="column">fcs/rudder-pos-deg</independentVar>
            <tableData>
                        -25.00    -20.00    -15.00    -10.00     -5.00      0.00      5.00     10.00     15.00     20.00     25.00
             -180.00   0.00000   0.00000   0.00000   0.00000   0.00000   0.00000   0.00000   0.00000   0.00000   0.00000   0.00000
              -35.00   0.01962   0.01695   0.01070   0.00586   0.00297   0.00000  -0.00297  -0.00586  -0.01070  -0.01695  -0.01962
              -11.00   0.01963   0.01759   0.01486   0.01096   0.00582   0.00000  -0.00582  -0.01096  -0.01486  -0.01759  -0.01963
                4.00   0.02037   0.01825   0.01541   0.01136   0.00603   0.00000  -0.00603  -0.01136  -0.01541  -0.01825  -0.02037
               19.00   0.01784   0.01592   0.01321   0.00918   0.00522   0.00000  -0.00522  -0.00918  -0.01321  -0.01592  -0.01784
               42.00   0.01070   0.01018   0.00919   0.00716   0.00392   0.00000  -0.00392  -0.00716  -0.00919  -0.01018  -0.01070
              180.00  -0.00000  -0.00000  -0.00000  -0.00000  -0.00000   0.00000  -0.00000  -0.00000  -0.00000  -0.00000  -0.00000
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            </tableData>
          </table>
          </product>
        </function>
        <function name="aero/coefficient/Cnp">
          <description>Cn per p (non-dimensional), over alpha</description>
          <product>
            <property>aero/qbar-psf</property>
            <property>metrics/Sw-sqft</property>
            <property>metrics/bw-ft</property>
            <property>aero/bi2vel</property>
            <property>velocities/p-aero-rad_sec</property>
            <property>aero/function/mach-lift</property>
          <table>
            <independentVar lookup="row">aero/alpha-deg</independentVar>
            <tableData>
                 -180.00    0.00907
                 -165.00    0.01981
                  -32.00    0.01574
                  -10.00    0.11211
                    5.00   -0.10106
                   20.00   -0.01054
                   46.00    0.01254
                  180.00    0.00907
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            </tableData>
          </table>
          </product>
        </function>
        <function name="aero/coefficient/Cnr">
          <description>Cn per r (non-dimensional), over alpha</description>
          <product>
            <property>aero/qbar-psf</property>
            <property>metrics/Sw-sqft</property>
            <property>metrics/bw-ft</property>
            <property>aero/bi2vel</property>
            <property>velocities/r-aero-rad_sec</property>
            <property>aero/function/mach-lift</property>
          <table>
            <independentVar lookup="row">aero/alpha-deg</independentVar>
            <tableData>
                 -180.00   -0.16769
                 -165.00   -0.16603
                  -32.00   -0.03978
                  -10.00   -0.08204
                    5.00   -0.07175
                   20.00   -0.01335
                   46.00   -0.07237
                  180.00   -0.16769
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            </tableData>
          </table>
          </product>
        </function>
      </axis>
    </aerodynamics>
</fdm_config>
