<?xml version="1.0"?>
<?xml-stylesheet type="text/xsl" href="http://jsbsim.sourceforge.net/JSBSim.xsl"?>
<!-- Generated by hangar 0.1.0 from su25.toml on 2026-10-01. Edit the design and rebuild; changes
     made here are overwritten.  -->
<fdm_config name="su25" version="2.0" release="ALPHA"
            xmlns:xsi="http://www.w3.org/2001/XMLSchema-instance"
            xsi:noNamespaceSchemaLocation="http://jsbsim.sourceforge.net/JSBSim.xsd">
    <fileheader>
      <author>hangar</author>
      <filecreationdate>2026-10-01</filecreationdate>
      <version>0.1.0</version>
      <description>Sukhoi Su-25 Frogfoot, late production (hangar build)</description>
      <note>Aerodynamics: vortex lattice with viscous section polars, full-envelope
        strip model, slender-body fuselage (hangar). Mass: Raymer component
        weights on the geometry. Propeller: blade-element momentum theory.</note>
      <reference refID="fsim/applicability/aerobatic" author="the design" title="Wikipedia and Russian Wikipedia, Sukhoi Su-25: +6.5 g (fsim/envelope/clean/n_max), flown in loops and rolls" date="n/a"/>
      <reference refID="fsim/applicability/carrier" author="the design" title="Wikipedia and Russian Wikipedia, Sukhoi Su-25: a land-based attack aircraft (the Su-25UTG naval trainer is a different type)" date="n/a"/>
      <reference refID="fsim/applicability/drag_devices" author="the design" title="Wikipedia and Russian Wikipedia, Sukhoi Su-25: split airbrakes in the wing-tip pods" date="n/a"/>
      <reference refID="fsim/applicability/flaps" author="the design" title="Wikipedia and Russian Wikipedia, Sukhoi Su-25: trailing-edge flaps" date="n/a"/>
      <reference refID="fsim/applicability/ground_contact" author="the design" title="Wikipedia and Russian Wikipedia, Sukhoi Su-25: tricycle wheeled gear" date="n/a"/>
      <reference refID="fsim/applicability/releasable_stores" author="the design" title="Wikipedia and Russian Wikipedia, Sukhoi Su-25: ten underwing hardpoints" date="n/a"/>
      <reference refID="fsim/applicability/retractable_gear" author="the design" title="Wikipedia and Russian Wikipedia, Sukhoi Su-25: retractable gear" date="n/a"/>
      <reference refID="fsim/applicability/vertical_flight" author="the design" title="Wikipedia and Russian Wikipedia, Sukhoi Su-25: a conventional take-off and landing jet. Conventional take-off and landing: no rotors, lift fans or vectored lift to hover" date="n/a"/>
    </fileheader>
    <metrics>
      <wingarea unit="M2"> 29.9350 </wingarea>
      <wingspan unit="M"> 13.8200 </wingspan>
      <chord unit="M"> 2.4348 </chord>
      <htailarea unit="M2"> 5.8419 </htailarea>
      <htailarm unit="M"> 4.7781 </htailarm>
      <vtailarea unit="M2"> 3.9240 </vtailarea>
      <vtailarm unit="M"> 4.2415 </vtailarm>
      <location name="AERORP" unit="M">
        <x> 7.0639 </x>
        <y> 0.0000 </y>
        <z> -0.1202 </z>
      </location>
      <location name="EYEPOINT" unit="M">
        <x> 3.1000 </x>
        <y> 0.0000 </y>
        <z> 0.2000 </z>
      </location>
      <location name="VRP" unit="M">
        <x> 7.1200 </x>
        <y> 0.0012 </y>
        <z> -0.4500 </z>
      </location>
    </metrics>
    <mass_balance negated_crossproduct_inertia="false">
      <ixx unit="KG*M2"> 18047.03 </ixx>
      <iyy unit="KG*M2"> 77729.39 </iyy>
      <izz unit="KG*M2"> 89353.79 </izz>
      <ixy unit="KG*M2"> -38.849 </ixy>
      <ixz unit="KG*M2"> 3848.024 </ixz>
      <iyz unit="KG*M2"> -22.442 </iyz>
      <emptywt unit="KG"> 9800.00 </emptywt>
      <location name="CG" unit="M">
        <x> 7.1200 </x>
        <y> 0.0012 </y>
        <z> -0.4500 </z>
      </location>
      <pointmass name="pilot">
        <weight unit="KG"> 100.00 </weight>
        <location unit="M">
          <x> 3.1000 </x>
          <y> 0.0000 </y>
          <z> -0.5000 </z>
        </location>
      </pointmass>
      <pointmass name="gun ammunition">
        <weight unit="KG"> 210.00 </weight>
        <location unit="M">
          <x> 3.6000 </x>
          <y> -0.3000 </y>
          <z> -1.1000 </z>
        </location>
      </pointmass>
    </mass_balance>
    <ground_reactions>
      <contact type="BOGEY" name="Nose Gear">
        <location unit="M">
          <x> 3.7600 </x>
          <y> 0.1000 </y>
          <z> -2.7200 </z>
        </location>
        <static_friction> 0.8 </static_friction>
        <dynamic_friction> 0.5 </dynamic_friction>
        <rolling_friction> 0.02 </rolling_friction>
        <spring_coeff unit="N/M"> 148780 </spring_coeff>
        <damping_coeff unit="N/M/SEC"> 15024 </damping_coeff>
        <damping_coeff_rebound unit="N/M/SEC"> 30048 </damping_coeff_rebound>
        <max_steer unit="DEG"> 60.0 </max_steer>
        <brake_group> NONE </brake_group>
        <retractable> 1 </retractable>
      </contact>
      <contact type="BOGEY" name="Left Main Gear">
        <location unit="M">
          <x> 7.3300 </x>
          <y> -1.2550 </y>
          <z> -2.4200 </z>
        </location>
        <static_friction> 0.8 </static_friction>
        <dynamic_friction> 0.5 </dynamic_friction>
        <rolling_friction> 0.02 </rolling_friction>
        <spring_coeff unit="N/M"> 473656 </spring_coeff>
        <damping_coeff unit="N/M/SEC"> 52395 </damping_coeff>
        <damping_coeff_rebound unit="N/M/SEC"> 104791 </damping_coeff_rebound>
        <max_steer unit="DEG"> 0.0 </max_steer>
        <brake_group> LEFT </brake_group>
        <retractable> 1 </retractable>
      </contact>
      <contact type="BOGEY" name="Right Main Gear">
        <location unit="M">
          <x> 7.3300 </x>
          <y> 1.2550 </y>
          <z> -2.4200 </z>
        </location>
        <static_friction> 0.8 </static_friction>
        <dynamic_friction> 0.5 </dynamic_friction>
        <rolling_friction> 0.02 </rolling_friction>
        <spring_coeff unit="N/M"> 473656 </spring_coeff>
        <damping_coeff unit="N/M/SEC"> 52395 </damping_coeff>
        <damping_coeff_rebound unit="N/M/SEC"> 104791 </damping_coeff_rebound>
        <max_steer unit="DEG"> 0.0 </max_steer>
        <brake_group> RIGHT </brake_group>
        <retractable> 1 </retractable>
      </contact>
      <contact type="STRUCTURE" name="fin rear">
        <location unit="M">
          <x> 12.4700 </x>
          <y> 0.0000 </y>
          <z> 2.7000 </z>
        </location>
        <static_friction> 0.8 </static_friction>
        <dynamic_friction> 0.6 </dynamic_friction>
        <spring_coeff unit="N/M"> 1001032 </spring_coeff>
        <damping_coeff unit="N/M/SEC"> 33368 </damping_coeff>
        <damping_coeff_rebound unit="N/M/SEC"> 33368 </damping_coeff_rebound>
      </contact>
      <contact type="STRUCTURE" name="fuselage front">
        <location unit="M">
          <x> 1.8000 </x>
          <y> -0.0000 </y>
          <z> -1.4300 </z>
        </location>
        <static_friction> 0.8 </static_friction>
        <dynamic_friction> 0.6 </dynamic_friction>
        <spring_coeff unit="N/M"> 1880830 </spring_coeff>
        <damping_coeff unit="N/M/SEC"> 62694 </damping_coeff>
        <damping_coeff_rebound unit="N/M/SEC"> 62694 </damping_coeff_rebound>
      </contact>
      <contact type="STRUCTURE" name="fuselage rear">
        <location unit="M">
          <x> 14.1500 </x>
          <y> 0.0000 </y>
          <z> 0.0100 </z>
        </location>
        <static_friction> 0.8 </static_friction>
        <dynamic_friction> 0.6 </dynamic_friction>
        <spring_coeff unit="N/M"> 1215279 </spring_coeff>
        <damping_coeff unit="N/M/SEC"> 40509 </damping_coeff>
        <damping_coeff_rebound unit="N/M/SEC"> 40509 </damping_coeff_rebound>
      </contact>
      <contact type="STRUCTURE" name="nacelle left rear">
        <location unit="M">
          <x> 9.0623 </x>
          <y> -0.8100 </y>
          <z> -1.3978 </z>
        </location>
        <static_friction> 0.8 </static_friction>
        <dynamic_friction> 0.6 </dynamic_friction>
        <spring_coeff unit="N/M"> 3704204 </spring_coeff>
        <damping_coeff unit="N/M/SEC"> 123473 </damping_coeff>
        <damping_coeff_rebound unit="N/M/SEC"> 123473 </damping_coeff_rebound>
      </contact>
      <contact type="STRUCTURE" name="nacelle right rear">
        <location unit="M">
          <x> 9.0623 </x>
          <y> 0.8100 </y>
          <z> -1.3978 </z>
        </location>
        <static_friction> 0.8 </static_friction>
        <dynamic_friction> 0.6 </dynamic_friction>
        <spring_coeff unit="N/M"> 3704396 </spring_coeff>
        <damping_coeff unit="N/M/SEC"> 123480 </damping_coeff>
        <damping_coeff_rebound unit="N/M/SEC"> 123480 </damping_coeff_rebound>
      </contact>
      <contact type="STRUCTURE" name="pitot front">
        <location unit="M">
          <x> -1.1400 </x>
          <y> 0.0000 </y>
          <z> -0.8500 </z>
        </location>
        <static_friction> 0.8 </static_friction>
        <dynamic_friction> 0.6 </dynamic_friction>
        <spring_coeff unit="N/M"> 916628 </spring_coeff>
        <damping_coeff unit="N/M/SEC"> 30554 </damping_coeff>
        <damping_coeff_rebound unit="N/M/SEC"> 30554 </damping_coeff_rebound>
      </contact>
      <contact type="STRUCTURE" name="tip pod left rear">
        <location unit="M">
          <x> 9.4013 </x>
          <y> -7.1296 </y>
          <z> -0.3000 </z>
        </location>
        <static_friction> 0.8 </static_friction>
        <dynamic_friction> 0.6 </dynamic_friction>
        <spring_coeff unit="N/M"> 298154 </spring_coeff>
        <damping_coeff unit="N/M/SEC"> 9938 </damping_coeff>
        <damping_coeff_rebound unit="N/M/SEC"> 9938 </damping_coeff_rebound>
      </contact>
      <contact type="STRUCTURE" name="tip pod left bottom">
        <location unit="M">
          <x> 7.3500 </x>
          <y> -6.9100 </y>
          <z> -0.3100 </z>
        </location>
        <static_friction> 0.8 </static_friction>
        <dynamic_friction> 0.6 </dynamic_friction>
        <spring_coeff unit="N/M"> 323629 </spring_coeff>
        <damping_coeff unit="N/M/SEC"> 10788 </damping_coeff>
        <damping_coeff_rebound unit="N/M/SEC"> 10788 </damping_coeff_rebound>
      </contact>
      <contact type="STRUCTURE" name="tip pod right bottom">
        <location unit="M">
          <x> 7.3500 </x>
          <y> 6.9100 </y>
          <z> -0.3100 </z>
        </location>
        <static_friction> 0.8 </static_friction>
        <dynamic_friction> 0.6 </dynamic_friction>
        <spring_coeff unit="N/M"> 323820 </spring_coeff>
        <damping_coeff unit="N/M/SEC"> 10794 </damping_coeff>
        <damping_coeff_rebound unit="N/M/SEC"> 10794 </damping_coeff_rebound>
      </contact>
      <contact type="STRUCTURE" name="tip pod right rear">
        <location unit="M">
          <x> 9.4013 </x>
          <y> 7.1296 </y>
          <z> -0.3000 </z>
        </location>
        <static_friction> 0.8 </static_friction>
        <dynamic_friction> 0.6 </dynamic_friction>
        <spring_coeff unit="N/M"> 298155 </spring_coeff>
        <damping_coeff unit="N/M/SEC"> 9938 </damping_coeff>
        <damping_coeff_rebound unit="N/M/SEC"> 9938 </damping_coeff_rebound>
      </contact>
    </ground_reactions>
    <propulsion>
      <engine file="su25_engine0">
        <location unit="M">
          <x> 8.9000 </x>
          <y> -0.8100 </y>
          <z> -0.7800 </z>
        </location>
        <feed>0</feed>
        <feed>1</feed>
        <feed>2</feed>
        <feed>3</feed>
        <feed>4</feed>
        <thruster file="su25_nozzle0">
          <location unit="M">
            <x> 10.3600 </x>
            <y> -0.8100 </y>
            <z> -0.7800 </z>
          </location>
          <orient unit="DEG"> <roll>0.00</roll> <pitch>0.00</pitch> <yaw>0.00</yaw> </orient>

        </thruster>
      </engine>
      <engine file="su25_engine0">
        <location unit="M">
          <x> 8.9000 </x>
          <y> 0.8100 </y>
          <z> -0.7800 </z>
        </location>
        <feed>0</feed>
        <feed>1</feed>
        <feed>2</feed>
        <feed>3</feed>
        <feed>4</feed>
        <thruster file="su25_nozzle0">
          <location unit="M">
            <x> 10.3600 </x>
            <y> 0.8100 </y>
            <z> -0.7800 </z>
          </location>
          <orient unit="DEG"> <roll>0.00</roll> <pitch>0.00</pitch> <yaw>0.00</yaw> </orient>

        </thruster>
      </engine>
      <tank type="FUEL">
        <location unit="M">
          <x> 4.9000 </x>
          <y> 0.0000 </y>
          <z> -0.5000 </z>
        </location>
        <capacity unit="KG"> 650.00 </capacity>
        <contents unit="KG"> 650.00 </contents>
      </tank>
      <tank type="FUEL">
        <location unit="M">
          <x> 6.3000 </x>
          <y> 0.0000 </y>
          <z> -0.4500 </z>
        </location>
        <capacity unit="KG"> 700.00 </capacity>
        <contents unit="KG"> 700.00 </contents>
      </tank>
      <tank type="FUEL">
        <location unit="M">
          <x> 7.8000 </x>
          <y> 0.0000 </y>
          <z> -0.4500 </z>
        </location>
        <capacity unit="KG"> 605.00 </capacity>
        <contents unit="KG"> 605.00 </contents>
      </tank>
      <tank type="FUEL">
        <location unit="M">
          <x> 7.2000 </x>
          <y> -2.2000 </y>
          <z> -0.0500 </z>
        </location>
        <capacity unit="KG"> 522.00 </capacity>
        <contents unit="KG"> 522.00 </contents>
      </tank>
      <tank type="FUEL">
        <location unit="M">
          <x> 7.2000 </x>
          <y> 2.2000 </y>
          <z> -0.0500 </z>
        </location>
        <capacity unit="KG"> 522.00 </capacity>
        <contents unit="KG"> 522.00 </contents>
      </tank>
    </propulsion>
    <flight_control name="su25">
      <!-- the aircraft's profile for the platform (docs/control-architecture.md, section 7): what
           hangar knows of it - its design, its flight tests, its identified responses -->
      <property value="1">fsim/identity/version</property>
      <property value="1">fsim/identity/provenance</property>
      <property value="3">fsim/identity/class</property>
      <property value="1">fsim/identity/family</property>
      <property value="1">fsim/effectors/version</property>
      <property value="1">fsim/effectors/provenance</property>
      <property value="1">fsim/effectors/flaps</property>
      <property value="8">fsim/effectors/flaps_transit_s</property>
      <property value="0.0">fsim/effectors/neutral</property>
      <property value="0.0">fsim/effectors/pitch</property>
      <property value="1">fsim/effectors/pitch_trim</property>
      <property value="1">fsim/effectors/retractable_gear</property>
      <property value="0.0">fsim/effectors/roll</property>
      <property value="1">fsim/effectors/speedbrake</property>
      <property value="1">fsim/effectors/speedbrake_approach</property>
      <property value="1">fsim/effectors/wheel_brakes</property>
      <property value="0.0">fsim/effectors/yaw</property>
      <property value="1">fsim/envelope/version</property>
      <property value="1">fsim/envelope/provenance</property>
      <property value="14.7915">fsim/envelope/clean/alpha_max_deg</property>
      <property value="72.4206">fsim/envelope/clean/cas_min_ms</property>
      <property value="6.5">fsim/envelope/clean/n_max</property>
      <property value="15.43">fsim/envelope/crosswind_max_ms</property>
      <property value="18.71">fsim/envelope/ground_pitch_max_deg</property>
      <property value="2.61">fsim/envelope/ground_turn_radius_m</property>
      <property value="0.0909">fsim/envelope/ground_yaw_accel_rad_s2</property>
      <property value="1">fsim/propulsion/version</property>
      <property value="1">fsim/propulsion/provenance</property>
      <property value="0.0">fsim/propulsion/afterburner</property>
      <property value="2">fsim/propulsion/engines</property>
      <property value="0.125206">fsim/propulsion/spool_s</property>
      <property value="2">fsim/propulsion/type</property>
      <property value="1">fsim/plant/version</property>
      <property value="1">fsim/plant/provenance</property>
      <property value="-1.31316">fsim/plant/alpha_zero_lift_deg</property>
      <property value="3000">fsim/plant/altitude_m</property>
      <property value="142.833">fsim/plant/eas_ms</property>
      <property value="-0.148324">fsim/plant/elevator_trim</property>
      <property value="-0.161426">fsim/plant/elevator_trim_lift</property>
      <property value="7.43295">fsim/plant/pitch/gain</property>
      <property value="0.448615">fsim/plant/pitch/tau_s</property>
      <property value="3.49206">fsim/plant/roll/gain</property>
      <property value="0.172886">fsim/plant/roll/tau_s</property>
      <property value="4.60746">fsim/plant/speed/gain</property>
      <property value="0.125206">fsim/plant/speed/tau_s</property>
      <property value="164.283">fsim/plant/tas_ms</property>
      <property value="0.365129">fsim/plant/throttle_trim</property>
      <property value="1.26944">fsim/plant/yaw/gain</property>
      <property value="1">fsim/performance/version</property>
      <property value="1">fsim/performance/provenance</property>
      <property value="15780.9">fsim/performance/ceiling_m</property>
      <property value="278.008">fsim/performance/max_tas_ms</property>
      <property value="72.4206">fsim/performance/stall_cas_ms</property>
      <property value="1">fsim/applicability/version</property>
      <property value="1">fsim/applicability/provenance</property>
      <property value="1">fsim/applicability/aerobatic</property>
      <property value="1">fsim/applicability/carrier</property>
      <property value="2">fsim/applicability/drag_devices</property>
      <property value="1">fsim/applicability/flaps</property>
      <property value="1">fsim/applicability/ground_contact</property>
      <property value="2">fsim/applicability/releasable_stores</property>
      <property value="1">fsim/applicability/retractable_gear</property>
      <property value="0.0">fsim/applicability/vertical_flight</property>
      <property value="1">fsim/tables/version</property>
      <property value="1">fsim/tables/provenance</property>
      <property value="100">fsim/tables/altitude_m/h0</property>
      <property value="3160">fsim/tables/altitude_m/h1</property>
      <property value="6310">fsim/tables/altitude_m/h2</property>
      <property value="9470">fsim/tables/altitude_m/h3</property>
      <property value="11840">fsim/tables/altitude_m/h4</property>
      <property value="13410">fsim/tables/altitude_m/h5</property>
      <property value="14990">fsim/tables/altitude_m/h6</property>
      <property value="0.32217">fsim/tables/best_endurance_fuel_kg_s/h0/w0</property>
      <property value="0.341405">fsim/tables/best_endurance_fuel_kg_s/h0/w1</property>
      <property value="0.365609">fsim/tables/best_endurance_fuel_kg_s/h0/w2</property>
      <property value="0.270237">fsim/tables/best_endurance_fuel_kg_s/h1/w0</property>
      <property value="0.298639">fsim/tables/best_endurance_fuel_kg_s/h1/w1</property>
      <property value="0.325931">fsim/tables/best_endurance_fuel_kg_s/h1/w2</property>
      <property value="0.240204">fsim/tables/best_endurance_fuel_kg_s/h2/w0</property>
      <property value="0.264663">fsim/tables/best_endurance_fuel_kg_s/h2/w1</property>
      <property value="0.288226">fsim/tables/best_endurance_fuel_kg_s/h2/w2</property>
      <property value="0.210067">fsim/tables/best_endurance_fuel_kg_s/h3/w0</property>
      <property value="0.231323">fsim/tables/best_endurance_fuel_kg_s/h3/w1</property>
      <property value="0.252111">fsim/tables/best_endurance_fuel_kg_s/h3/w2</property>
      <property value="0.189946">fsim/tables/best_endurance_fuel_kg_s/h4/w0</property>
      <property value="0.21202">fsim/tables/best_endurance_fuel_kg_s/h4/w1</property>
      <property value="0.234938">fsim/tables/best_endurance_fuel_kg_s/h4/w2</property>
      <property value="0.186405">fsim/tables/best_endurance_fuel_kg_s/h5/w0</property>
      <property value="0.211752">fsim/tables/best_endurance_fuel_kg_s/h5/w1</property>
      <property value="0.240381">fsim/tables/best_endurance_fuel_kg_s/h5/w2</property>
      <property value="0.188065">fsim/tables/best_endurance_fuel_kg_s/h6/w0</property>
      <property value="0.221619">fsim/tables/best_endurance_fuel_kg_s/h6/w1</property>
      <property value="0.258373">fsim/tables/best_endurance_fuel_kg_s/h6/w2</property>
      <property value="133.765">fsim/tables/best_endurance_tas_ms/h0/w0</property>
      <property value="131.954">fsim/tables/best_endurance_tas_ms/h0/w1</property>
      <property value="130.993">fsim/tables/best_endurance_tas_ms/h0/w2</property>
      <property value="130.788">fsim/tables/best_endurance_tas_ms/h1/w0</property>
      <property value="131.261">fsim/tables/best_endurance_tas_ms/h1/w1</property>
      <property value="143.215">fsim/tables/best_endurance_tas_ms/h1/w2</property>
      <property value="148.751">fsim/tables/best_endurance_tas_ms/h2/w0</property>
      <property value="159.314">fsim/tables/best_endurance_tas_ms/h2/w1</property>
      <property value="169.961">fsim/tables/best_endurance_tas_ms/h2/w2</property>
      <property value="179.115">fsim/tables/best_endurance_tas_ms/h3/w0</property>
      <property value="189.148">fsim/tables/best_endurance_tas_ms/h3/w1</property>
      <property value="198.541">fsim/tables/best_endurance_tas_ms/h3/w2</property>
      <property value="201.902">fsim/tables/best_endurance_tas_ms/h4/w0</property>
      <property value="203.395">fsim/tables/best_endurance_tas_ms/h4/w1</property>
      <property value="205.269">fsim/tables/best_endurance_tas_ms/h4/w2</property>
      <property value="205.108">fsim/tables/best_endurance_tas_ms/h5/w0</property>
      <property value="205.719">fsim/tables/best_endurance_tas_ms/h5/w1</property>
      <property value="206.367">fsim/tables/best_endurance_tas_ms/h5/w2</property>
      <property value="206.801">fsim/tables/best_endurance_tas_ms/h6/w0</property>
      <property value="210.894">fsim/tables/best_endurance_tas_ms/h6/w1</property>
      <property value="220.748">fsim/tables/best_endurance_tas_ms/h6/w2</property>
      <property value="0.376706">fsim/tables/best_range_fuel_kg_s/h0/w0</property>
      <property value="0.425953">fsim/tables/best_range_fuel_kg_s/h0/w1</property>
      <property value="0.464647">fsim/tables/best_range_fuel_kg_s/h0/w2</property>
      <property value="0.345624">fsim/tables/best_range_fuel_kg_s/h1/w0</property>
      <property value="0.376567">fsim/tables/best_range_fuel_kg_s/h1/w1</property>
      <property value="0.410414">fsim/tables/best_range_fuel_kg_s/h1/w2</property>
      <property value="0.28863">fsim/tables/best_range_fuel_kg_s/h2/w0</property>
      <property value="0.302467">fsim/tables/best_range_fuel_kg_s/h2/w1</property>
      <property value="0.317172">fsim/tables/best_range_fuel_kg_s/h2/w2</property>
      <property value="0.219518">fsim/tables/best_range_fuel_kg_s/h3/w0</property>
      <property value="0.234872">fsim/tables/best_range_fuel_kg_s/h3/w1</property>
      <property value="0.254009">fsim/tables/best_range_fuel_kg_s/h3/w2</property>
      <property value="0.192119">fsim/tables/best_range_fuel_kg_s/h4/w0</property>
      <property value="0.21273">fsim/tables/best_range_fuel_kg_s/h4/w1</property>
      <property value="0.236954">fsim/tables/best_range_fuel_kg_s/h4/w2</property>
      <property value="0.18691">fsim/tables/best_range_fuel_kg_s/h5/w0</property>
      <property value="0.21373">fsim/tables/best_range_fuel_kg_s/h5/w1</property>
      <property value="0.246534">fsim/tables/best_range_fuel_kg_s/h5/w2</property>
      <property value="0.193222">fsim/tables/best_range_fuel_kg_s/h6/w0</property>
      <property value="0.227276">fsim/tables/best_range_fuel_kg_s/h6/w1</property>
      <property value="0.264155">fsim/tables/best_range_fuel_kg_s/h6/w2</property>
      <property value="161.096">fsim/tables/best_range_tas_ms/h0/w0</property>
      <property value="175.515">fsim/tables/best_range_tas_ms/h0/w1</property>
      <property value="185.507">fsim/tables/best_range_tas_ms/h0/w2</property>
      <property value="191.616">fsim/tables/best_range_tas_ms/h1/w0</property>
      <property value="201.219">fsim/tables/best_range_tas_ms/h1/w1</property>
      <property value="212.248">fsim/tables/best_range_tas_ms/h1/w2</property>
      <property value="212.183">fsim/tables/best_range_tas_ms/h2/w0</property>
      <property value="213.055">fsim/tables/best_range_tas_ms/h2/w1</property>
      <property value="214.395">fsim/tables/best_range_tas_ms/h2/w2</property>
      <property value="207.044">fsim/tables/best_range_tas_ms/h3/w0</property>
      <property value="207.572">fsim/tables/best_range_tas_ms/h3/w1</property>
      <property value="209.009">fsim/tables/best_range_tas_ms/h3/w2</property>
      <property value="205.072">fsim/tables/best_range_tas_ms/h4/w0</property>
      <property value="206.619">fsim/tables/best_range_tas_ms/h4/w1</property>
      <property value="207.29">fsim/tables/best_range_tas_ms/h4/w2</property>
      <property value="207.556">fsim/tables/best_range_tas_ms/h5/w0</property>
      <property value="208.881">fsim/tables/best_range_tas_ms/h5/w1</property>
      <property value="212.817">fsim/tables/best_range_tas_ms/h5/w2</property>
      <property value="213.506">fsim/tables/best_range_tas_ms/h6/w0</property>
      <property value="218.762">fsim/tables/best_range_tas_ms/h6/w1</property>
      <property value="226.104">fsim/tables/best_range_tas_ms/h6/w2</property>
      <property value="223.661">fsim/tables/climb_tas_ms/h0/w0</property>
      <property value="224.761">fsim/tables/climb_tas_ms/h0/w1</property>
      <property value="226.153">fsim/tables/climb_tas_ms/h0/w2</property>
      <property value="228.351">fsim/tables/climb_tas_ms/h1/w0</property>
      <property value="229.657">fsim/tables/climb_tas_ms/h1/w1</property>
      <property value="229.095">fsim/tables/climb_tas_ms/h1/w2</property>
      <property value="220.747">fsim/tables/climb_tas_ms/h2/w0</property>
      <property value="221.428">fsim/tables/climb_tas_ms/h2/w1</property>
      <property value="221.136">fsim/tables/climb_tas_ms/h2/w2</property>
      <property value="213.131">fsim/tables/climb_tas_ms/h3/w0</property>
      <property value="212.488">fsim/tables/climb_tas_ms/h3/w1</property>
      <property value="212.879">fsim/tables/climb_tas_ms/h3/w2</property>
      <property value="208.305">fsim/tables/climb_tas_ms/h4/w0</property>
      <property value="209.084">fsim/tables/climb_tas_ms/h4/w1</property>
      <property value="208.492">fsim/tables/climb_tas_ms/h4/w2</property>
      <property value="208.831">fsim/tables/climb_tas_ms/h5/w0</property>
      <property value="208.964">fsim/tables/climb_tas_ms/h5/w1</property>
      <property value="207.369">fsim/tables/climb_tas_ms/h5/w2</property>
      <property value="207.405">fsim/tables/climb_tas_ms/h6/w0</property>
      <property value="212.032">fsim/tables/climb_tas_ms/h6/w1</property>
      <property value="221.116">fsim/tables/climb_tas_ms/h6/w2</property>
      <property value="2999">fsim/tables/fuel_capacity_kg</property>
      <property value="0.322159">fsim/tables/fuel_kg_s/h0/w0/v0</property>
      <property value="0.336238">fsim/tables/fuel_kg_s/h0/w0/v1</property>
      <property value="0.560273">fsim/tables/fuel_kg_s/h0/w0/v10</property>
      <property value="0.588841">fsim/tables/fuel_kg_s/h0/w0/v11</property>
      <property value="0.688075">fsim/tables/fuel_kg_s/h0/w0/v12</property>
      <property value="0.856752">fsim/tables/fuel_kg_s/h0/w0/v13</property>
      <property value="1.03307">fsim/tables/fuel_kg_s/h0/w0/v14</property>
      <property value="1.22239">fsim/tables/fuel_kg_s/h0/w0/v15</property>
      <property value="0.3555">fsim/tables/fuel_kg_s/h0/w0/v2</property>
      <property value="0.376363">fsim/tables/fuel_kg_s/h0/w0/v3</property>
      <property value="0.397908">fsim/tables/fuel_kg_s/h0/w0/v4</property>
      <property value="0.422295">fsim/tables/fuel_kg_s/h0/w0/v5</property>
      <property value="0.449242">fsim/tables/fuel_kg_s/h0/w0/v6</property>
      <property value="0.476814">fsim/tables/fuel_kg_s/h0/w0/v7</property>
      <property value="0.504737">fsim/tables/fuel_kg_s/h0/w0/v8</property>
      <property value="0.532323">fsim/tables/fuel_kg_s/h0/w0/v9</property>
      <property value="0.341393">fsim/tables/fuel_kg_s/h0/w1/v0</property>
      <property value="0.354576">fsim/tables/fuel_kg_s/h0/w1/v1</property>
      <property value="0.576909">fsim/tables/fuel_kg_s/h0/w1/v10</property>
      <property value="0.606434">fsim/tables/fuel_kg_s/h0/w1/v11</property>
      <property value="0.754256">fsim/tables/fuel_kg_s/h0/w1/v12</property>
      <property value="0.933342">fsim/tables/fuel_kg_s/h0/w1/v13</property>
      <property value="1.12316">fsim/tables/fuel_kg_s/h0/w1/v14</property>
      <property value="1.55802">fsim/tables/fuel_kg_s/h0/w1/v15</property>
      <property value="0.369884">fsim/tables/fuel_kg_s/h0/w1/v2</property>
      <property value="0.390041">fsim/tables/fuel_kg_s/h0/w1/v3</property>
      <property value="0.412534">fsim/tables/fuel_kg_s/h0/w1/v4</property>
      <property value="0.435345">fsim/tables/fuel_kg_s/h0/w1/v5</property>
      <property value="0.461024">fsim/tables/fuel_kg_s/h0/w1/v6</property>
      <property value="0.489907">fsim/tables/fuel_kg_s/h0/w1/v7</property>
      <property value="0.518943">fsim/tables/fuel_kg_s/h0/w1/v8</property>
      <property value="0.547739">fsim/tables/fuel_kg_s/h0/w1/v9</property>
      <property value="0.365601">fsim/tables/fuel_kg_s/h0/w2/v0</property>
      <property value="0.373672">fsim/tables/fuel_kg_s/h0/w2/v1</property>
      <property value="0.582164">fsim/tables/fuel_kg_s/h0/w2/v10</property>
      <property value="0.611402">fsim/tables/fuel_kg_s/h0/w2/v11</property>
      <property value="0.740145">fsim/tables/fuel_kg_s/h0/w2/v12</property>
      <property value="0.914231">fsim/tables/fuel_kg_s/h0/w2/v13</property>
      <property value="1.10162">fsim/tables/fuel_kg_s/h0/w2/v14</property>
      <property value="1.41554">fsim/tables/fuel_kg_s/h0/w2/v15</property>
      <property value="0.388063">fsim/tables/fuel_kg_s/h0/w2/v2</property>
      <property value="0.403848">fsim/tables/fuel_kg_s/h0/w2/v3</property>
      <property value="0.424431">fsim/tables/fuel_kg_s/h0/w2/v4</property>
      <property value="0.447143">fsim/tables/fuel_kg_s/h0/w2/v5</property>
      <property value="0.47037">fsim/tables/fuel_kg_s/h0/w2/v6</property>
      <property value="0.495738">fsim/tables/fuel_kg_s/h0/w2/v7</property>
      <property value="0.524712">fsim/tables/fuel_kg_s/h0/w2/v8</property>
      <property value="0.553265">fsim/tables/fuel_kg_s/h0/w2/v9</property>
      <property value="0.270234">fsim/tables/fuel_kg_s/h1/w0/v0</property>
      <property value="0.275312">fsim/tables/fuel_kg_s/h1/w0/v1</property>
      <property value="0.412455">fsim/tables/fuel_kg_s/h1/w0/v10</property>
      <property value="0.450965">fsim/tables/fuel_kg_s/h1/w0/v11</property>
      <property value="0.571085">fsim/tables/fuel_kg_s/h1/w0/v12</property>
      <property value="0.697308">fsim/tables/fuel_kg_s/h1/w0/v13</property>
      <property value="0.831888">fsim/tables/fuel_kg_s/h1/w0/v14</property>
      <property value="1.3131">fsim/tables/fuel_kg_s/h1/w0/v15</property>
      <property value="0.282511">fsim/tables/fuel_kg_s/h1/w0/v2</property>
      <property value="0.292943">fsim/tables/fuel_kg_s/h1/w0/v3</property>
      <property value="0.304167">fsim/tables/fuel_kg_s/h1/w0/v4</property>
      <property value="0.319366">fsim/tables/fuel_kg_s/h1/w0/v5</property>
      <property value="0.334951">fsim/tables/fuel_kg_s/h1/w0/v6</property>
      <property value="0.350941">fsim/tables/fuel_kg_s/h1/w0/v7</property>
      <property value="0.369916">fsim/tables/fuel_kg_s/h1/w0/v8</property>
      <property value="0.390929">fsim/tables/fuel_kg_s/h1/w0/v9</property>
      <property value="0.298639">fsim/tables/fuel_kg_s/h1/w1/v0</property>
      <property value="0.298971">fsim/tables/fuel_kg_s/h1/w1/v1</property>
      <property value="0.420649">fsim/tables/fuel_kg_s/h1/w1/v10</property>
      <property value="0.454981">fsim/tables/fuel_kg_s/h1/w1/v11</property>
      <property value="0.573193">fsim/tables/fuel_kg_s/h1/w1/v12</property>
      <property value="0.697501">fsim/tables/fuel_kg_s/h1/w1/v13</property>
      <property value="0.829719">fsim/tables/fuel_kg_s/h1/w1/v14</property>
      <property value="1.26107">fsim/tables/fuel_kg_s/h1/w1/v15</property>
      <property value="0.304342">fsim/tables/fuel_kg_s/h1/w1/v2</property>
      <property value="0.311869">fsim/tables/fuel_kg_s/h1/w1/v3</property>
      <property value="0.322461">fsim/tables/fuel_kg_s/h1/w1/v4</property>
      <property value="0.333251">fsim/tables/fuel_kg_s/h1/w1/v5</property>
      <property value="0.348687">fsim/tables/fuel_kg_s/h1/w1/v6</property>
      <property value="0.364466">fsim/tables/fuel_kg_s/h1/w1/v7</property>
      <property value="0.380985">fsim/tables/fuel_kg_s/h1/w1/v8</property>
      <property value="0.399388">fsim/tables/fuel_kg_s/h1/w1/v9</property>
      <property value="0.329677">fsim/tables/fuel_kg_s/h1/w2/v0</property>
      <property value="0.326035">fsim/tables/fuel_kg_s/h1/w2/v1</property>
      <property value="0.429112">fsim/tables/fuel_kg_s/h1/w2/v10</property>
      <property value="0.460065">fsim/tables/fuel_kg_s/h1/w2/v11</property>
      <property value="0.575601">fsim/tables/fuel_kg_s/h1/w2/v12</property>
      <property value="0.697127">fsim/tables/fuel_kg_s/h1/w2/v13</property>
      <property value="0.82634">fsim/tables/fuel_kg_s/h1/w2/v14</property>
      <property value="1.19933">fsim/tables/fuel_kg_s/h1/w2/v15</property>
      <property value="0.327596">fsim/tables/fuel_kg_s/h1/w2/v2</property>
      <property value="0.333096">fsim/tables/fuel_kg_s/h1/w2/v3</property>
      <property value="0.34131">fsim/tables/fuel_kg_s/h1/w2/v4</property>
      <property value="0.351832">fsim/tables/fuel_kg_s/h1/w2/v5</property>
      <property value="0.362754">fsim/tables/fuel_kg_s/h1/w2/v6</property>
      <property value="0.378283">fsim/tables/fuel_kg_s/h1/w2/v7</property>
      <property value="0.394511">fsim/tables/fuel_kg_s/h1/w2/v8</property>
      <property value="0.411244">fsim/tables/fuel_kg_s/h1/w2/v9</property>
      <property value="0.244229">fsim/tables/fuel_kg_s/h2/w0/v0</property>
      <property value="0.240918">fsim/tables/fuel_kg_s/h2/w0/v1</property>
      <property value="0.29347">fsim/tables/fuel_kg_s/h2/w0/v10</property>
      <property value="0.327976">fsim/tables/fuel_kg_s/h2/w0/v11</property>
      <property value="0.398737">fsim/tables/fuel_kg_s/h2/w0/v12</property>
      <property value="0.473736">fsim/tables/fuel_kg_s/h2/w0/v13</property>
      <property value="0.553231">fsim/tables/fuel_kg_s/h2/w0/v14</property>
      <property value="0.824547">fsim/tables/fuel_kg_s/h2/w0/v15</property>
      <property value="0.240299">fsim/tables/fuel_kg_s/h2/w0/v2</property>
      <property value="0.242341">fsim/tables/fuel_kg_s/h2/w0/v3</property>
      <property value="0.245093">fsim/tables/fuel_kg_s/h2/w0/v4</property>
      <property value="0.250455">fsim/tables/fuel_kg_s/h2/w0/v5</property>
      <property value="0.256767">fsim/tables/fuel_kg_s/h2/w0/v6</property>
      <property value="0.263246">fsim/tables/fuel_kg_s/h2/w0/v7</property>
      <property value="0.272999">fsim/tables/fuel_kg_s/h2/w0/v8</property>
      <property value="0.283109">fsim/tables/fuel_kg_s/h2/w0/v9</property>
      <property value="0.274619">fsim/tables/fuel_kg_s/h2/w1/v0</property>
      <property value="0.268724">fsim/tables/fuel_kg_s/h2/w1/v1</property>
      <property value="0.306965">fsim/tables/fuel_kg_s/h2/w1/v10</property>
      <property value="0.343338">fsim/tables/fuel_kg_s/h2/w1/v11</property>
      <property value="0.409503">fsim/tables/fuel_kg_s/h2/w1/v12</property>
      <property value="0.480535">fsim/tables/fuel_kg_s/h2/w1/v13</property>
      <property value="0.557317">fsim/tables/fuel_kg_s/h2/w1/v14</property>
      <property value="0.801336">fsim/tables/fuel_kg_s/h2/w1/v15</property>
      <property value="0.265496">fsim/tables/fuel_kg_s/h2/w1/v2</property>
      <property value="0.264762">fsim/tables/fuel_kg_s/h2/w1/v3</property>
      <property value="0.267038">fsim/tables/fuel_kg_s/h2/w1/v4</property>
      <property value="0.269798">fsim/tables/fuel_kg_s/h2/w1/v5</property>
      <property value="0.274994">fsim/tables/fuel_kg_s/h2/w1/v6</property>
      <property value="0.281348">fsim/tables/fuel_kg_s/h2/w1/v7</property>
      <property value="0.287905">fsim/tables/fuel_kg_s/h2/w1/v8</property>
      <property value="0.296947">fsim/tables/fuel_kg_s/h2/w1/v9</property>
      <property value="0.305279">fsim/tables/fuel_kg_s/h2/w2/v0</property>
      <property value="0.297428">fsim/tables/fuel_kg_s/h2/w2/v1</property>
      <property value="0.320537">fsim/tables/fuel_kg_s/h2/w2/v10</property>
      <property value="0.360039">fsim/tables/fuel_kg_s/h2/w2/v11</property>
      <property value="0.423552">fsim/tables/fuel_kg_s/h2/w2/v12</property>
      <property value="0.490814">fsim/tables/fuel_kg_s/h2/w2/v13</property>
      <property value="0.562668">fsim/tables/fuel_kg_s/h2/w2/v14</property>
      <property value="0.783357">fsim/tables/fuel_kg_s/h2/w2/v15</property>
      <property value="0.292142">fsim/tables/fuel_kg_s/h2/w2/v2</property>
      <property value="0.289422">fsim/tables/fuel_kg_s/h2/w2/v3</property>
      <property value="0.28832">fsim/tables/fuel_kg_s/h2/w2/v4</property>
      <property value="0.29114">fsim/tables/fuel_kg_s/h2/w2/v5</property>
      <property value="0.293853">fsim/tables/fuel_kg_s/h2/w2/v6</property>
      <property value="0.299203">fsim/tables/fuel_kg_s/h2/w2/v7</property>
      <property value="0.305588">fsim/tables/fuel_kg_s/h2/w2/v8</property>
      <property value="0.312074">fsim/tables/fuel_kg_s/h2/w2/v9</property>
      <property value="0.224396">fsim/tables/fuel_kg_s/h3/w0/v0</property>
      <property value="0.218669">fsim/tables/fuel_kg_s/h3/w0/v1</property>
      <property value="0.227034">fsim/tables/fuel_kg_s/h3/w0/v10</property>
      <property value="0.258869">fsim/tables/fuel_kg_s/h3/w0/v11</property>
      <property value="0.294152">fsim/tables/fuel_kg_s/h3/w0/v12</property>
      <property value="0.331912">fsim/tables/fuel_kg_s/h3/w0/v13</property>
      <property value="0.371964">fsim/tables/fuel_kg_s/h3/w0/v14</property>
      <property value="0.521573">fsim/tables/fuel_kg_s/h3/w0/v15</property>
      <property value="0.214748">fsim/tables/fuel_kg_s/h3/w0/v2</property>
      <property value="0.211855">fsim/tables/fuel_kg_s/h3/w0/v3</property>
      <property value="0.211027">fsim/tables/fuel_kg_s/h3/w0/v4</property>
      <property value="0.210074">fsim/tables/fuel_kg_s/h3/w0/v5</property>
      <property value="0.211382">fsim/tables/fuel_kg_s/h3/w0/v6</property>
      <property value="0.212665">fsim/tables/fuel_kg_s/h3/w0/v7</property>
      <property value="0.214665">fsim/tables/fuel_kg_s/h3/w0/v8</property>
      <property value="0.218108">fsim/tables/fuel_kg_s/h3/w0/v9</property>
      <property value="0.252125">fsim/tables/fuel_kg_s/h3/w1/v0</property>
      <property value="0.245676">fsim/tables/fuel_kg_s/h3/w1/v1</property>
      <property value="0.24952">fsim/tables/fuel_kg_s/h3/w1/v10</property>
      <property value="0.279222">fsim/tables/fuel_kg_s/h3/w1/v11</property>
      <property value="0.310793">fsim/tables/fuel_kg_s/h3/w1/v12</property>
      <property value="0.344661">fsim/tables/fuel_kg_s/h3/w1/v13</property>
      <property value="0.382101">fsim/tables/fuel_kg_s/h3/w1/v14</property>
      <property value="0.515759">fsim/tables/fuel_kg_s/h3/w1/v15</property>
      <property value="0.240064">fsim/tables/fuel_kg_s/h3/w1/v2</property>
      <property value="0.236467">fsim/tables/fuel_kg_s/h3/w1/v3</property>
      <property value="0.233129">fsim/tables/fuel_kg_s/h3/w1/v4</property>
      <property value="0.232312">fsim/tables/fuel_kg_s/h3/w1/v5</property>
      <property value="0.231324">fsim/tables/fuel_kg_s/h3/w1/v6</property>
      <property value="0.23242">fsim/tables/fuel_kg_s/h3/w1/v7</property>
      <property value="0.233688">fsim/tables/fuel_kg_s/h3/w1/v8</property>
      <property value="0.234937">fsim/tables/fuel_kg_s/h3/w1/v9</property>
      <property value="0.279013">fsim/tables/fuel_kg_s/h3/w2/v0</property>
      <property value="0.271674">fsim/tables/fuel_kg_s/h3/w2/v1</property>
      <property value="0.272658">fsim/tables/fuel_kg_s/h3/w2/v10</property>
      <property value="0.299576">fsim/tables/fuel_kg_s/h3/w2/v11</property>
      <property value="0.328969">fsim/tables/fuel_kg_s/h3/w2/v12</property>
      <property value="0.360181">fsim/tables/fuel_kg_s/h3/w2/v13</property>
      <property value="0.393376">fsim/tables/fuel_kg_s/h3/w2/v14</property>
      <property value="0.511076">fsim/tables/fuel_kg_s/h3/w2/v15</property>
      <property value="0.2662">fsim/tables/fuel_kg_s/h3/w2/v2</property>
      <property value="0.261494">fsim/tables/fuel_kg_s/h3/w2/v3</property>
      <property value="0.257937">fsim/tables/fuel_kg_s/h3/w2/v4</property>
      <property value="0.254825">fsim/tables/fuel_kg_s/h3/w2/v5</property>
      <property value="0.25314">fsim/tables/fuel_kg_s/h3/w2/v6</property>
      <property value="0.252113">fsim/tables/fuel_kg_s/h3/w2/v7</property>
      <property value="0.252968">fsim/tables/fuel_kg_s/h3/w2/v8</property>
      <property value="0.254188">fsim/tables/fuel_kg_s/h3/w2/v9</property>
      <property value="0.209683">fsim/tables/fuel_kg_s/h4/w0/v0</property>
      <property value="0.204781">fsim/tables/fuel_kg_s/h4/w0/v1</property>
      <property value="0.212183">fsim/tables/fuel_kg_s/h4/w0/v10</property>
      <property value="0.227949">fsim/tables/fuel_kg_s/h4/w0/v11</property>
      <property value="0.245228">fsim/tables/fuel_kg_s/h4/w0/v12</property>
      <property value="0.264363">fsim/tables/fuel_kg_s/h4/w0/v13</property>
      <property value="0.284632">fsim/tables/fuel_kg_s/h4/w0/v14</property>
      <property value="0.366441">fsim/tables/fuel_kg_s/h4/w0/v15</property>
      <property value="0.201105">fsim/tables/fuel_kg_s/h4/w0/v2</property>
      <property value="0.197439">fsim/tables/fuel_kg_s/h4/w0/v3</property>
      <property value="0.195253">fsim/tables/fuel_kg_s/h4/w0/v4</property>
      <property value="0.19308">fsim/tables/fuel_kg_s/h4/w0/v5</property>
      <property value="0.19209">fsim/tables/fuel_kg_s/h4/w0/v6</property>
      <property value="0.191344">fsim/tables/fuel_kg_s/h4/w0/v7</property>
      <property value="0.190547">fsim/tables/fuel_kg_s/h4/w0/v8</property>
      <property value="0.197414">fsim/tables/fuel_kg_s/h4/w0/v9</property>
      <property value="0.234205">fsim/tables/fuel_kg_s/h4/w1/v0</property>
      <property value="0.229515">fsim/tables/fuel_kg_s/h4/w1/v1</property>
      <property value="0.236131">fsim/tables/fuel_kg_s/h4/w1/v10</property>
      <property value="0.250275">fsim/tables/fuel_kg_s/h4/w1/v11</property>
      <property value="0.265279">fsim/tables/fuel_kg_s/h4/w1/v12</property>
      <property value="0.28119">fsim/tables/fuel_kg_s/h4/w1/v13</property>
      <property value="0.298309">fsim/tables/fuel_kg_s/h4/w1/v14</property>
      <property value="0.366483">fsim/tables/fuel_kg_s/h4/w1/v15</property>
      <property value="0.225388">fsim/tables/fuel_kg_s/h4/w1/v2</property>
      <property value="0.221789">fsim/tables/fuel_kg_s/h4/w1/v3</property>
      <property value="0.218436">fsim/tables/fuel_kg_s/h4/w1/v4</property>
      <property value="0.216095">fsim/tables/fuel_kg_s/h4/w1/v5</property>
      <property value="0.213655">fsim/tables/fuel_kg_s/h4/w1/v6</property>
      <property value="0.212058">fsim/tables/fuel_kg_s/h4/w1/v7</property>
      <property value="0.212812">fsim/tables/fuel_kg_s/h4/w1/v8</property>
      <property value="0.223879">fsim/tables/fuel_kg_s/h4/w1/v9</property>
      <property value="0.258423">fsim/tables/fuel_kg_s/h4/w2/v0</property>
      <property value="0.253914">fsim/tables/fuel_kg_s/h4/w2/v1</property>
      <property value="0.261862">fsim/tables/fuel_kg_s/h4/w2/v10</property>
      <property value="0.273201">fsim/tables/fuel_kg_s/h4/w2/v11</property>
      <property value="0.285814">fsim/tables/fuel_kg_s/h4/w2/v12</property>
      <property value="0.299863">fsim/tables/fuel_kg_s/h4/w2/v13</property>
      <property value="0.314696">fsim/tables/fuel_kg_s/h4/w2/v14</property>
      <property value="0.368595">fsim/tables/fuel_kg_s/h4/w2/v15</property>
      <property value="0.24929">fsim/tables/fuel_kg_s/h4/w2/v2</property>
      <property value="0.246026">fsim/tables/fuel_kg_s/h4/w2/v3</property>
      <property value="0.242668">fsim/tables/fuel_kg_s/h4/w2/v4</property>
      <property value="0.239621">fsim/tables/fuel_kg_s/h4/w2/v5</property>
      <property value="0.23746">fsim/tables/fuel_kg_s/h4/w2/v6</property>
      <property value="0.235229">fsim/tables/fuel_kg_s/h4/w2/v7</property>
      <property value="0.242058">fsim/tables/fuel_kg_s/h4/w2/v8</property>
      <property value="0.251406">fsim/tables/fuel_kg_s/h4/w2/v9</property>
      <property value="0.201999">fsim/tables/fuel_kg_s/h5/w0/v0</property>
      <property value="0.198413">fsim/tables/fuel_kg_s/h5/w0/v1</property>
      <property value="0.209052">fsim/tables/fuel_kg_s/h5/w0/v10</property>
      <property value="0.217732">fsim/tables/fuel_kg_s/h5/w0/v11</property>
      <property value="0.227594">fsim/tables/fuel_kg_s/h5/w0/v12</property>
      <property value="0.238317">fsim/tables/fuel_kg_s/h5/w0/v13</property>
      <property value="0.249624">fsim/tables/fuel_kg_s/h5/w0/v14</property>
      <property value="0.296388">fsim/tables/fuel_kg_s/h5/w0/v15</property>
      <property value="0.195236">fsim/tables/fuel_kg_s/h5/w0/v2</property>
      <property value="0.192617">fsim/tables/fuel_kg_s/h5/w0/v3</property>
      <property value="0.189915">fsim/tables/fuel_kg_s/h5/w0/v4</property>
      <property value="0.187987">fsim/tables/fuel_kg_s/h5/w0/v5</property>
      <property value="0.186537">fsim/tables/fuel_kg_s/h5/w0/v6</property>
      <property value="0.186689">fsim/tables/fuel_kg_s/h5/w0/v7</property>
      <property value="0.193229">fsim/tables/fuel_kg_s/h5/w0/v8</property>
      <property value="0.200889">fsim/tables/fuel_kg_s/h5/w0/v9</property>
      <property value="0.225033">fsim/tables/fuel_kg_s/h5/w1/v0</property>
      <property value="0.221963">fsim/tables/fuel_kg_s/h5/w1/v1</property>
      <property value="0.234879">fsim/tables/fuel_kg_s/h5/w1/v10</property>
      <property value="0.242223">fsim/tables/fuel_kg_s/h5/w1/v11</property>
      <property value="0.249953">fsim/tables/fuel_kg_s/h5/w1/v12</property>
      <property value="0.258085">fsim/tables/fuel_kg_s/h5/w1/v13</property>
      <property value="0.266636">fsim/tables/fuel_kg_s/h5/w1/v14</property>
      <property value="0.29886">fsim/tables/fuel_kg_s/h5/w1/v15</property>
      <property value="0.218825">fsim/tables/fuel_kg_s/h5/w1/v2</property>
      <property value="0.216341">fsim/tables/fuel_kg_s/h5/w1/v3</property>
      <property value="0.21408">fsim/tables/fuel_kg_s/h5/w1/v4</property>
      <property value="0.211764">fsim/tables/fuel_kg_s/h5/w1/v5</property>
      <property value="0.213465">fsim/tables/fuel_kg_s/h5/w1/v6</property>
      <property value="0.218067">fsim/tables/fuel_kg_s/h5/w1/v7</property>
      <property value="0.223008">fsim/tables/fuel_kg_s/h5/w1/v8</property>
      <property value="0.228425">fsim/tables/fuel_kg_s/h5/w1/v9</property>
      <property value="0.248248">fsim/tables/fuel_kg_s/h5/w2/v0</property>
      <property value="0.245678">fsim/tables/fuel_kg_s/h5/w2/v1</property>
      <property value="0.263708">fsim/tables/fuel_kg_s/h5/w2/v10</property>
      <property value="0.268617">fsim/tables/fuel_kg_s/h5/w2/v11</property>
      <property value="0.273777">fsim/tables/fuel_kg_s/h5/w2/v12</property>
      <property value="0.279757">fsim/tables/fuel_kg_s/h5/w2/v13</property>
      <property value="0.286497">fsim/tables/fuel_kg_s/h5/w2/v14</property>
      <property value="0.303106">fsim/tables/fuel_kg_s/h5/w2/v15</property>
      <property value="0.243064">fsim/tables/fuel_kg_s/h5/w2/v2</property>
      <property value="0.240426">fsim/tables/fuel_kg_s/h5/w2/v3</property>
      <property value="0.241855">fsim/tables/fuel_kg_s/h5/w2/v4</property>
      <property value="0.244586">fsim/tables/fuel_kg_s/h5/w2/v5</property>
      <property value="0.247522">fsim/tables/fuel_kg_s/h5/w2/v6</property>
      <property value="0.250677">fsim/tables/fuel_kg_s/h5/w2/v7</property>
      <property value="0.254619">fsim/tables/fuel_kg_s/h5/w2/v8</property>
      <property value="0.259045">fsim/tables/fuel_kg_s/h5/w2/v9</property>
      <property value="0.19285">fsim/tables/fuel_kg_s/h6/w0/v0</property>
      <property value="0.190862">fsim/tables/fuel_kg_s/h6/w0/v1</property>
      <property value="0.207048">fsim/tables/fuel_kg_s/h6/w0/v10</property>
      <property value="0.210855">fsim/tables/fuel_kg_s/h6/w0/v11</property>
      <property value="0.21484">fsim/tables/fuel_kg_s/h6/w0/v12</property>
      <property value="0.219425">fsim/tables/fuel_kg_s/h6/w0/v13</property>
      <property value="0.224353">fsim/tables/fuel_kg_s/h6/w0/v14</property>
      <property value="0.231657">fsim/tables/fuel_kg_s/h6/w0/v15</property>
      <property value="0.188847">fsim/tables/fuel_kg_s/h6/w0/v2</property>
      <property value="0.188129">fsim/tables/fuel_kg_s/h6/w0/v3</property>
      <property value="0.19">fsim/tables/fuel_kg_s/h6/w0/v4</property>
      <property value="0.192013">fsim/tables/fuel_kg_s/h6/w0/v5</property>
      <property value="0.194176">fsim/tables/fuel_kg_s/h6/w0/v6</property>
      <property value="0.196651">fsim/tables/fuel_kg_s/h6/w0/v7</property>
      <property value="0.199952">fsim/tables/fuel_kg_s/h6/w0/v8</property>
      <property value="0.203415">fsim/tables/fuel_kg_s/h6/w0/v9</property>
      <property value="0.221615">fsim/tables/fuel_kg_s/h6/w1/v0</property>
      <property value="0.222514">fsim/tables/fuel_kg_s/h6/w1/v1</property>
      <property value="0.236507">fsim/tables/fuel_kg_s/h6/w1/v10</property>
      <property value="0.238726">fsim/tables/fuel_kg_s/h6/w1/v11</property>
      <property value="0.241253">fsim/tables/fuel_kg_s/h6/w1/v12</property>
      <property value="0.243842">fsim/tables/fuel_kg_s/h6/w1/v13</property>
      <property value="0.246497">fsim/tables/fuel_kg_s/h6/w1/v14</property>
      <property value="0.249284">fsim/tables/fuel_kg_s/h6/w1/v15</property>
      <property value="0.223471">fsim/tables/fuel_kg_s/h6/w1/v2</property>
      <property value="0.224492">fsim/tables/fuel_kg_s/h6/w1/v3</property>
      <property value="0.225734">fsim/tables/fuel_kg_s/h6/w1/v4</property>
      <property value="0.227357">fsim/tables/fuel_kg_s/h6/w1/v5</property>
      <property value="0.229047">fsim/tables/fuel_kg_s/h6/w1/v6</property>
      <property value="0.230805">fsim/tables/fuel_kg_s/h6/w1/v7</property>
      <property value="0.232633">fsim/tables/fuel_kg_s/h6/w1/v8</property>
      <property value="0.234532">fsim/tables/fuel_kg_s/h6/w1/v9</property>
      <property value="0.258373">fsim/tables/fuel_kg_s/h6/w2/v0</property>
      <property value="0.259214">fsim/tables/fuel_kg_s/h6/w2/v1</property>
      <property value="0.268307">fsim/tables/fuel_kg_s/h6/w2/v10</property>
      <property value="0.269602">fsim/tables/fuel_kg_s/h6/w2/v11</property>
      <property value="0.270915">fsim/tables/fuel_kg_s/h6/w2/v12</property>
      <property value="0.272246">fsim/tables/fuel_kg_s/h6/w2/v13</property>
      <property value="0.273595">fsim/tables/fuel_kg_s/h6/w2/v14</property>
      <property value="0.274963">fsim/tables/fuel_kg_s/h6/w2/v15</property>
      <property value="0.260068">fsim/tables/fuel_kg_s/h6/w2/v2</property>
      <property value="0.260935">fsim/tables/fuel_kg_s/h6/w2/v3</property>
      <property value="0.261817">fsim/tables/fuel_kg_s/h6/w2/v4</property>
      <property value="0.262713">fsim/tables/fuel_kg_s/h6/w2/v5</property>
      <property value="0.263624">fsim/tables/fuel_kg_s/h6/w2/v6</property>
      <property value="0.264561">fsim/tables/fuel_kg_s/h6/w2/v7</property>
      <property value="0.265768">fsim/tables/fuel_kg_s/h6/w2/v8</property>
      <property value="0.267029">fsim/tables/fuel_kg_s/h6/w2/v9</property>
      <property value="162.34">fsim/tables/max_climb_ms/h0/w0</property>
      <property value="143.461">fsim/tables/max_climb_ms/h0/w1</property>
      <property value="128.35">fsim/tables/max_climb_ms/h0/w2</property>
      <property value="126.727">fsim/tables/max_climb_ms/h1/w0</property>
      <property value="111.874">fsim/tables/max_climb_ms/h1/w1</property>
      <property value="100.026">fsim/tables/max_climb_ms/h1/w2</property>
      <property value="87.2158">fsim/tables/max_climb_ms/h2/w0</property>
      <property value="76.4322">fsim/tables/max_climb_ms/h2/w1</property>
      <property value="67.784">fsim/tables/max_climb_ms/h2/w2</property>
      <property value="56.0997">fsim/tables/max_climb_ms/h3/w0</property>
      <property value="48.4173">fsim/tables/max_climb_ms/h3/w1</property>
      <property value="42.2141">fsim/tables/max_climb_ms/h3/w2</property>
      <property value="36.5901">fsim/tables/max_climb_ms/h4/w0</property>
      <property value="30.6166">fsim/tables/max_climb_ms/h4/w1</property>
      <property value="25.715">fsim/tables/max_climb_ms/h4/w2</property>
      <property value="25.9483">fsim/tables/max_climb_ms/h5/w0</property>
      <property value="20.6484">fsim/tables/max_climb_ms/h5/w1</property>
      <property value="16.0899">fsim/tables/max_climb_ms/h5/w2</property>
      <property value="15.1225">fsim/tables/max_climb_ms/h6/w0</property>
      <property value="10.6745">fsim/tables/max_climb_ms/h6/w1</property>
      <property value="6.53514">fsim/tables/max_climb_ms/h6/w2</property>
      <property value="278.051">fsim/tables/max_tas_ms/h0/w0</property>
      <property value="282.849">fsim/tables/max_tas_ms/h0/w1</property>
      <property value="281.558">fsim/tables/max_tas_ms/h0/w2</property>
      <property value="275.903">fsim/tables/max_tas_ms/h1/w0</property>
      <property value="275.215">fsim/tables/max_tas_ms/h1/w1</property>
      <property value="274.343">fsim/tables/max_tas_ms/h1/w2</property>
      <property value="264.564">fsim/tables/max_tas_ms/h2/w0</property>
      <property value="263.977">fsim/tables/max_tas_ms/h2/w1</property>
      <property value="263.482">fsim/tables/max_tas_ms/h2/w2</property>
      <property value="253.136">fsim/tables/max_tas_ms/h3/w0</property>
      <property value="252.633">fsim/tables/max_tas_ms/h3/w1</property>
      <property value="252.154">fsim/tables/max_tas_ms/h3/w2</property>
      <property value="246.805">fsim/tables/max_tas_ms/h4/w0</property>
      <property value="246.175">fsim/tables/max_tas_ms/h4/w1</property>
      <property value="245.563">fsim/tables/max_tas_ms/h4/w2</property>
      <property value="245.919">fsim/tables/max_tas_ms/h5/w0</property>
      <property value="245.021">fsim/tables/max_tas_ms/h5/w1</property>
      <property value="244.048">fsim/tables/max_tas_ms/h5/w2</property>
      <property value="243.527">fsim/tables/max_tas_ms/h6/w0</property>
      <property value="241.977">fsim/tables/max_tas_ms/h6/w1</property>
      <property value="240.102">fsim/tables/max_tas_ms/h6/w2</property>
      <property value="133.765">fsim/tables/min_tas_ms/h0/w0</property>
      <property value="131.954">fsim/tables/min_tas_ms/h0/w1</property>
      <property value="130.993">fsim/tables/min_tas_ms/h0/w2</property>
      <property value="130.788">fsim/tables/min_tas_ms/h1/w0</property>
      <property value="131.261">fsim/tables/min_tas_ms/h1/w1</property>
      <property value="132.536">fsim/tables/min_tas_ms/h1/w2</property>
      <property value="134.664">fsim/tables/min_tas_ms/h2/w0</property>
      <property value="137.657">fsim/tables/min_tas_ms/h2/w1</property>
      <property value="141.108">fsim/tables/min_tas_ms/h2/w2</property>
      <property value="146.668">fsim/tables/min_tas_ms/h3/w0</property>
      <property value="152.136">fsim/tables/min_tas_ms/h3/w1</property>
      <property value="157.747">fsim/tables/min_tas_ms/h3/w2</property>
      <property value="163.322">fsim/tables/min_tas_ms/h4/w0</property>
      <property value="170.887">fsim/tables/min_tas_ms/h4/w1</property>
      <property value="178.353">fsim/tables/min_tas_ms/h4/w2</property>
      <property value="180.167">fsim/tables/min_tas_ms/h5/w0</property>
      <property value="189.368">fsim/tables/min_tas_ms/h5/w1</property>
      <property value="198.321">fsim/tables/min_tas_ms/h5/w2</property>
      <property value="200.102">fsim/tables/min_tas_ms/h6/w0</property>
      <property value="210.894">fsim/tables/min_tas_ms/h6/w1</property>
      <property value="220.614">fsim/tables/min_tas_ms/h6/w2</property>
      <property value="108.584">fsim/tables/ps_full_ms/h0/w0/v0</property>
      <property value="115.186">fsim/tables/ps_full_ms/h0/w0/v1</property>
      <property value="162.32">fsim/tables/ps_full_ms/h0/w0/v10</property>
      <property value="160.606">fsim/tables/ps_full_ms/h0/w0/v11</property>
      <property value="154.228">fsim/tables/ps_full_ms/h0/w0/v12</property>
      <property value="141.735">fsim/tables/ps_full_ms/h0/w0/v13</property>
      <property value="123.124">fsim/tables/ps_full_ms/h0/w0/v14</property>
      <property value="91.2939">fsim/tables/ps_full_ms/h0/w0/v15</property>
      <property value="121.774">fsim/tables/ps_full_ms/h0/w0/v2</property>
      <property value="128.388">fsim/tables/ps_full_ms/h0/w0/v3</property>
      <property value="134.996">fsim/tables/ps_full_ms/h0/w0/v4</property>
      <property value="141.523">fsim/tables/ps_full_ms/h0/w0/v5</property>
      <property value="147.796">fsim/tables/ps_full_ms/h0/w0/v6</property>
      <property value="153.351">fsim/tables/ps_full_ms/h0/w0/v7</property>
      <property value="157.758">fsim/tables/ps_full_ms/h0/w0/v8</property>
      <property value="160.879">fsim/tables/ps_full_ms/h0/w0/v9</property>
      <property value="94.2321">fsim/tables/ps_full_ms/h0/w1/v0</property>
      <property value="100.383">fsim/tables/ps_full_ms/h0/w1/v1</property>
      <property value="143.436">fsim/tables/ps_full_ms/h0/w1/v10</property>
      <property value="141.049">fsim/tables/ps_full_ms/h0/w1/v11</property>
      <property value="133.231">fsim/tables/ps_full_ms/h0/w1/v12</property>
      <property value="118.81">fsim/tables/ps_full_ms/h0/w1/v13</property>
      <property value="98.7478">fsim/tables/ps_full_ms/h0/w1/v14</property>
      <property value="53.7546">fsim/tables/ps_full_ms/h0/w1/v15</property>
      <property value="106.533">fsim/tables/ps_full_ms/h0/w1/v2</property>
      <property value="112.703">fsim/tables/ps_full_ms/h0/w1/v3</property>
      <property value="118.866">fsim/tables/ps_full_ms/h0/w1/v4</property>
      <property value="124.959">fsim/tables/ps_full_ms/h0/w1/v5</property>
      <property value="130.853">fsim/tables/ps_full_ms/h0/w1/v6</property>
      <property value="136.014">fsim/tables/ps_full_ms/h0/w1/v7</property>
      <property value="139.915">fsim/tables/ps_full_ms/h0/w1/v8</property>
      <property value="142.463">fsim/tables/ps_full_ms/h0/w1/v9</property>
      <property value="83.4558">fsim/tables/ps_full_ms/h0/w2/v0</property>
      <property value="88.8872">fsim/tables/ps_full_ms/h0/w2/v1</property>
      <property value="128.323">fsim/tables/ps_full_ms/h0/w2/v10</property>
      <property value="126.917">fsim/tables/ps_full_ms/h0/w2/v11</property>
      <property value="120.64">fsim/tables/ps_full_ms/h0/w2/v12</property>
      <property value="108.147">fsim/tables/ps_full_ms/h0/w2/v13</property>
      <property value="91.2951">fsim/tables/ps_full_ms/h0/w2/v14</property>
      <property value="56.9328">fsim/tables/ps_full_ms/h0/w2/v15</property>
      <property value="94.3216">fsim/tables/ps_full_ms/h0/w2/v2</property>
      <property value="99.8089">fsim/tables/ps_full_ms/h0/w2/v3</property>
      <property value="105.318">fsim/tables/ps_full_ms/h0/w2/v4</property>
      <property value="110.816">fsim/tables/ps_full_ms/h0/w2/v5</property>
      <property value="116.223">fsim/tables/ps_full_ms/h0/w2/v6</property>
      <property value="121.111">fsim/tables/ps_full_ms/h0/w2/v7</property>
      <property value="124.812">fsim/tables/ps_full_ms/h0/w2/v8</property>
      <property value="127.151">fsim/tables/ps_full_ms/h0/w2/v9</property>
      <property value="77.2761">fsim/tables/ps_full_ms/h1/w0/v0</property>
      <property value="82.307">fsim/tables/ps_full_ms/h1/w0/v1</property>
      <property value="125.714">fsim/tables/ps_full_ms/h1/w0/v10</property>
      <property value="126.569">fsim/tables/ps_full_ms/h1/w0/v11</property>
      <property value="123.093">fsim/tables/ps_full_ms/h1/w0/v12</property>
      <property value="115.491">fsim/tables/ps_full_ms/h1/w0/v13</property>
      <property value="99.4439">fsim/tables/ps_full_ms/h1/w0/v14</property>
      <property value="52.1004">fsim/tables/ps_full_ms/h1/w0/v15</property>
      <property value="87.3729">fsim/tables/ps_full_ms/h1/w0/v2</property>
      <property value="92.4828">fsim/tables/ps_full_ms/h1/w0/v3</property>
      <property value="97.5905">fsim/tables/ps_full_ms/h1/w0/v4</property>
      <property value="102.651">fsim/tables/ps_full_ms/h1/w0/v5</property>
      <property value="107.634">fsim/tables/ps_full_ms/h1/w0/v6</property>
      <property value="112.525">fsim/tables/ps_full_ms/h1/w0/v7</property>
      <property value="117.301">fsim/tables/ps_full_ms/h1/w0/v8</property>
      <property value="121.941">fsim/tables/ps_full_ms/h1/w0/v9</property>
      <property value="67.9117">fsim/tables/ps_full_ms/h1/w1/v0</property>
      <property value="72.2919">fsim/tables/ps_full_ms/h1/w1/v1</property>
      <property value="110.794">fsim/tables/ps_full_ms/h1/w1/v10</property>
      <property value="111.759">fsim/tables/ps_full_ms/h1/w1/v11</property>
      <property value="108.726">fsim/tables/ps_full_ms/h1/w1/v12</property>
      <property value="102.072">fsim/tables/ps_full_ms/h1/w1/v13</property>
      <property value="89.9829">fsim/tables/ps_full_ms/h1/w1/v14</property>
      <property value="50.8828">fsim/tables/ps_full_ms/h1/w1/v15</property>
      <property value="76.6702">fsim/tables/ps_full_ms/h1/w1/v2</property>
      <property value="81.0949">fsim/tables/ps_full_ms/h1/w1/v3</property>
      <property value="85.5769">fsim/tables/ps_full_ms/h1/w1/v4</property>
      <property value="90.0602">fsim/tables/ps_full_ms/h1/w1/v5</property>
      <property value="94.4696">fsim/tables/ps_full_ms/h1/w1/v6</property>
      <property value="98.8102">fsim/tables/ps_full_ms/h1/w1/v7</property>
      <property value="103.091">fsim/tables/ps_full_ms/h1/w1/v8</property>
      <property value="107.232">fsim/tables/ps_full_ms/h1/w1/v9</property>
      <property value="60.7646">fsim/tables/ps_full_ms/h1/w2/v0</property>
      <property value="64.589">fsim/tables/ps_full_ms/h1/w2/v1</property>
      <property value="98.8801">fsim/tables/ps_full_ms/h1/w2/v10</property>
      <property value="99.9366">fsim/tables/ps_full_ms/h1/w2/v11</property>
      <property value="97.2438">fsim/tables/ps_full_ms/h1/w2/v12</property>
      <property value="91.3779">fsim/tables/ps_full_ms/h1/w2/v13</property>
      <property value="82.1475">fsim/tables/ps_full_ms/h1/w2/v14</property>
      <property value="50.7202">fsim/tables/ps_full_ms/h1/w2/v15</property>
      <property value="68.366">fsim/tables/ps_full_ms/h1/w2/v2</property>
      <property value="72.2241">fsim/tables/ps_full_ms/h1/w2/v3</property>
      <property value="76.1692">fsim/tables/ps_full_ms/h1/w2/v4</property>
      <property value="80.1745">fsim/tables/ps_full_ms/h1/w2/v5</property>
      <property value="84.1414">fsim/tables/ps_full_ms/h1/w2/v6</property>
      <property value="88.0054">fsim/tables/ps_full_ms/h1/w2/v7</property>
      <property value="91.8192">fsim/tables/ps_full_ms/h1/w2/v8</property>
      <property value="95.5553">fsim/tables/ps_full_ms/h1/w2/v9</property>
      <property value="54.7155">fsim/tables/ps_full_ms/h2/w0/v0</property>
      <property value="57.9805">fsim/tables/ps_full_ms/h2/w0/v1</property>
      <property value="86.6294">fsim/tables/ps_full_ms/h2/w0/v10</property>
      <property value="86.9976">fsim/tables/ps_full_ms/h2/w0/v11</property>
      <property value="84.4142">fsim/tables/ps_full_ms/h2/w0/v12</property>
      <property value="79.9112">fsim/tables/ps_full_ms/h2/w0/v13</property>
      <property value="72.0237">fsim/tables/ps_full_ms/h2/w0/v14</property>
      <property value="44.5789">fsim/tables/ps_full_ms/h2/w0/v15</property>
      <property value="61.2027">fsim/tables/ps_full_ms/h2/w0/v2</property>
      <property value="64.4756">fsim/tables/ps_full_ms/h2/w0/v3</property>
      <property value="67.8008">fsim/tables/ps_full_ms/h2/w0/v4</property>
      <property value="71.1279">fsim/tables/ps_full_ms/h2/w0/v5</property>
      <property value="74.4303">fsim/tables/ps_full_ms/h2/w0/v6</property>
      <property value="77.6949">fsim/tables/ps_full_ms/h2/w0/v7</property>
      <property value="80.8945">fsim/tables/ps_full_ms/h2/w0/v8</property>
      <property value="84.0262">fsim/tables/ps_full_ms/h2/w0/v9</property>
      <property value="48.4812">fsim/tables/ps_full_ms/h2/w1/v0</property>
      <property value="51.2658">fsim/tables/ps_full_ms/h2/w1/v1</property>
      <property value="75.971">fsim/tables/ps_full_ms/h2/w1/v10</property>
      <property value="76.1965">fsim/tables/ps_full_ms/h2/w1/v11</property>
      <property value="73.8774">fsim/tables/ps_full_ms/h2/w1/v12</property>
      <property value="70.0473">fsim/tables/ps_full_ms/h2/w1/v13</property>
      <property value="63.9638">fsim/tables/ps_full_ms/h2/w1/v14</property>
      <property value="41.5397">fsim/tables/ps_full_ms/h2/w1/v15</property>
      <property value="53.9658">fsim/tables/ps_full_ms/h2/w1/v2</property>
      <property value="56.7295">fsim/tables/ps_full_ms/h2/w1/v3</property>
      <property value="59.5797">fsim/tables/ps_full_ms/h2/w1/v4</property>
      <property value="62.4812">fsim/tables/ps_full_ms/h2/w1/v5</property>
      <property value="65.3461">fsim/tables/ps_full_ms/h2/w1/v6</property>
      <property value="68.2091">fsim/tables/ps_full_ms/h2/w1/v7</property>
      <property value="71.0399">fsim/tables/ps_full_ms/h2/w1/v8</property>
      <property value="73.7313">fsim/tables/ps_full_ms/h2/w1/v9</property>
      <property value="43.5585">fsim/tables/ps_full_ms/h2/w2/v0</property>
      <property value="45.9785">fsim/tables/ps_full_ms/h2/w2/v1</property>
      <property value="67.4875">fsim/tables/ps_full_ms/h2/w2/v10</property>
      <property value="67.4424">fsim/tables/ps_full_ms/h2/w2/v11</property>
      <property value="65.2585">fsim/tables/ps_full_ms/h2/w2/v12</property>
      <property value="61.9969">fsim/tables/ps_full_ms/h2/w2/v13</property>
      <property value="57.2207">fsim/tables/ps_full_ms/h2/w2/v14</property>
      <property value="38.6413">fsim/tables/ps_full_ms/h2/w2/v15</property>
      <property value="48.2364">fsim/tables/ps_full_ms/h2/w2/v2</property>
      <property value="50.5788">fsim/tables/ps_full_ms/h2/w2/v3</property>
      <property value="53.0624">fsim/tables/ps_full_ms/h2/w2/v4</property>
      <property value="55.6131">fsim/tables/ps_full_ms/h2/w2/v5</property>
      <property value="58.1724">fsim/tables/ps_full_ms/h2/w2/v6</property>
      <property value="60.6887">fsim/tables/ps_full_ms/h2/w2/v7</property>
      <property value="63.1807">fsim/tables/ps_full_ms/h2/w2/v8</property>
      <property value="65.5777">fsim/tables/ps_full_ms/h2/w2/v9</property>
      <property value="38.0086">fsim/tables/ps_full_ms/h3/w0/v0</property>
      <property value="39.8926">fsim/tables/ps_full_ms/h3/w0/v1</property>
      <property value="56.0886">fsim/tables/ps_full_ms/h3/w0/v10</property>
      <property value="55.3821">fsim/tables/ps_full_ms/h3/w0/v11</property>
      <property value="53.692">fsim/tables/ps_full_ms/h3/w0/v12</property>
      <property value="51.3701">fsim/tables/ps_full_ms/h3/w0/v13</property>
      <property value="47.4968">fsim/tables/ps_full_ms/h3/w0/v14</property>
      <property value="31.7826">fsim/tables/ps_full_ms/h3/w0/v15</property>
      <property value="41.7154">fsim/tables/ps_full_ms/h3/w0/v2</property>
      <property value="43.5825">fsim/tables/ps_full_ms/h3/w0/v3</property>
      <property value="45.5076">fsim/tables/ps_full_ms/h3/w0/v4</property>
      <property value="47.4729">fsim/tables/ps_full_ms/h3/w0/v5</property>
      <property value="49.4596">fsim/tables/ps_full_ms/h3/w0/v6</property>
      <property value="51.4696">fsim/tables/ps_full_ms/h3/w0/v7</property>
      <property value="53.3917">fsim/tables/ps_full_ms/h3/w0/v8</property>
      <property value="55.1877">fsim/tables/ps_full_ms/h3/w0/v9</property>
      <property value="33.5662">fsim/tables/ps_full_ms/h3/w1/v0</property>
      <property value="35.1866">fsim/tables/ps_full_ms/h3/w1/v1</property>
      <property value="48.3754">fsim/tables/ps_full_ms/h3/w1/v10</property>
      <property value="47.53">fsim/tables/ps_full_ms/h3/w1/v11</property>
      <property value="46.1513">fsim/tables/ps_full_ms/h3/w1/v12</property>
      <property value="44.222">fsim/tables/ps_full_ms/h3/w1/v13</property>
      <property value="41.2381">fsim/tables/ps_full_ms/h3/w1/v14</property>
      <property value="28.5549">fsim/tables/ps_full_ms/h3/w1/v15</property>
      <property value="36.6383">fsim/tables/ps_full_ms/h3/w1/v2</property>
      <property value="38.1432">fsim/tables/ps_full_ms/h3/w1/v3</property>
      <property value="39.7237">fsim/tables/ps_full_ms/h3/w1/v4</property>
      <property value="41.3927">fsim/tables/ps_full_ms/h3/w1/v5</property>
      <property value="43.1328">fsim/tables/ps_full_ms/h3/w1/v6</property>
      <property value="44.8242">fsim/tables/ps_full_ms/h3/w1/v7</property>
      <property value="46.4827">fsim/tables/ps_full_ms/h3/w1/v8</property>
      <property value="47.9689">fsim/tables/ps_full_ms/h3/w1/v9</property>
      <property value="29.8718">fsim/tables/ps_full_ms/h3/w2/v0</property>
      <property value="31.2588">fsim/tables/ps_full_ms/h3/w2/v1</property>
      <property value="42.0675">fsim/tables/ps_full_ms/h3/w2/v10</property>
      <property value="41.1979">fsim/tables/ps_full_ms/h3/w2/v11</property>
      <property value="39.9516">fsim/tables/ps_full_ms/h3/w2/v12</property>
      <property value="38.3327">fsim/tables/ps_full_ms/h3/w2/v13</property>
      <property value="36.0942">fsim/tables/ps_full_ms/h3/w2/v14</property>
      <property value="25.9045">fsim/tables/ps_full_ms/h3/w2/v15</property>
      <property value="32.4683">fsim/tables/ps_full_ms/h3/w2/v2</property>
      <property value="33.7002">fsim/tables/ps_full_ms/h3/w2/v3</property>
      <property value="35.0618">fsim/tables/ps_full_ms/h3/w2/v4</property>
      <property value="36.5145">fsim/tables/ps_full_ms/h3/w2/v5</property>
      <property value="38.0177">fsim/tables/ps_full_ms/h3/w2/v6</property>
      <property value="39.4975">fsim/tables/ps_full_ms/h3/w2/v7</property>
      <property value="40.8744">fsim/tables/ps_full_ms/h3/w2/v8</property>
      <property value="42.0224">fsim/tables/ps_full_ms/h3/w2/v9</property>
      <property value="27.1508">fsim/tables/ps_full_ms/h4/w0/v0</property>
      <property value="28.2717">fsim/tables/ps_full_ms/h4/w0/v1</property>
      <property value="36.1982">fsim/tables/ps_full_ms/h4/w0/v10</property>
      <property value="35.5408">fsim/tables/ps_full_ms/h4/w0/v11</property>
      <property value="34.5582">fsim/tables/ps_full_ms/h4/w0/v12</property>
      <property value="33.2709">fsim/tables/ps_full_ms/h4/w0/v13</property>
      <property value="31.3029">fsim/tables/ps_full_ms/h4/w0/v14</property>
      <property value="22.4327">fsim/tables/ps_full_ms/h4/w0/v15</property>
      <property value="29.2878">fsim/tables/ps_full_ms/h4/w0/v2</property>
      <property value="30.3389">fsim/tables/ps_full_ms/h4/w0/v3</property>
      <property value="31.4973">fsim/tables/ps_full_ms/h4/w0/v4</property>
      <property value="32.7222">fsim/tables/ps_full_ms/h4/w0/v5</property>
      <property value="33.9123">fsim/tables/ps_full_ms/h4/w0/v6</property>
      <property value="35.1052">fsim/tables/ps_full_ms/h4/w0/v7</property>
      <property value="36.2037">fsim/tables/ps_full_ms/h4/w0/v8</property>
      <property value="36.5823">fsim/tables/ps_full_ms/h4/w0/v9</property>
      <property value="23.5116">fsim/tables/ps_full_ms/h4/w1/v0</property>
      <property value="24.4507">fsim/tables/ps_full_ms/h4/w1/v1</property>
      <property value="30.119">fsim/tables/ps_full_ms/h4/w1/v10</property>
      <property value="29.5033">fsim/tables/ps_full_ms/h4/w1/v11</property>
      <property value="28.708">fsim/tables/ps_full_ms/h4/w1/v12</property>
      <property value="27.7337">fsim/tables/ps_full_ms/h4/w1/v13</property>
      <property value="26.3392">fsim/tables/ps_full_ms/h4/w1/v14</property>
      <property value="19.6935">fsim/tables/ps_full_ms/h4/w1/v15</property>
      <property value="25.2355">fsim/tables/ps_full_ms/h4/w1/v2</property>
      <property value="26.1127">fsim/tables/ps_full_ms/h4/w1/v3</property>
      <property value="27.0467">fsim/tables/ps_full_ms/h4/w1/v4</property>
      <property value="28.0077">fsim/tables/ps_full_ms/h4/w1/v5</property>
      <property value="28.9993">fsim/tables/ps_full_ms/h4/w1/v6</property>
      <property value="29.9409">fsim/tables/ps_full_ms/h4/w1/v7</property>
      <property value="30.569">fsim/tables/ps_full_ms/h4/w1/v8</property>
      <property value="30.5105">fsim/tables/ps_full_ms/h4/w1/v9</property>
      <property value="20.4646">fsim/tables/ps_full_ms/h4/w2/v0</property>
      <property value="21.2676">fsim/tables/ps_full_ms/h4/w2/v1</property>
      <property value="25.0766">fsim/tables/ps_full_ms/h4/w2/v10</property>
      <property value="24.5927">fsim/tables/ps_full_ms/h4/w2/v11</property>
      <property value="23.9217">fsim/tables/ps_full_ms/h4/w2/v12</property>
      <property value="23.1026">fsim/tables/ps_full_ms/h4/w2/v13</property>
      <property value="22.0939">fsim/tables/ps_full_ms/h4/w2/v14</property>
      <property value="17.339">fsim/tables/ps_full_ms/h4/w2/v15</property>
      <property value="21.8608">fsim/tables/ps_full_ms/h4/w2/v2</property>
      <property value="22.4876">fsim/tables/ps_full_ms/h4/w2/v3</property>
      <property value="23.2382">fsim/tables/ps_full_ms/h4/w2/v4</property>
      <property value="24.0466">fsim/tables/ps_full_ms/h4/w2/v5</property>
      <property value="24.879">fsim/tables/ps_full_ms/h4/w2/v6</property>
      <property value="25.5885">fsim/tables/ps_full_ms/h4/w2/v7</property>
      <property value="25.6738">fsim/tables/ps_full_ms/h4/w2/v8</property>
      <property value="25.4328">fsim/tables/ps_full_ms/h4/w2/v9</property>
      <property value="20.988">fsim/tables/ps_full_ms/h5/w0/v0</property>
      <property value="21.8278">fsim/tables/ps_full_ms/h5/w0/v1</property>
      <property value="25.3196">fsim/tables/ps_full_ms/h5/w0/v10</property>
      <property value="24.8533">fsim/tables/ps_full_ms/h5/w0/v11</property>
      <property value="24.2024">fsim/tables/ps_full_ms/h5/w0/v12</property>
      <property value="23.4208">fsim/tables/ps_full_ms/h5/w0/v13</property>
      <property value="22.3501">fsim/tables/ps_full_ms/h5/w0/v14</property>
      <property value="17.1924">fsim/tables/ps_full_ms/h5/w0/v15</property>
      <property value="22.4941">fsim/tables/ps_full_ms/h5/w0/v2</property>
      <property value="23.172">fsim/tables/ps_full_ms/h5/w0/v3</property>
      <property value="23.8982">fsim/tables/ps_full_ms/h5/w0/v4</property>
      <property value="24.6365">fsim/tables/ps_full_ms/h5/w0/v5</property>
      <property value="25.3974">fsim/tables/ps_full_ms/h5/w0/v6</property>
      <property value="25.9109">fsim/tables/ps_full_ms/h5/w0/v7</property>
      <property value="25.874">fsim/tables/ps_full_ms/h5/w0/v8</property>
      <property value="25.6516">fsim/tables/ps_full_ms/h5/w0/v9</property>
      <property value="17.8059">fsim/tables/ps_full_ms/h5/w1/v0</property>
      <property value="18.4508">fsim/tables/ps_full_ms/h5/w1/v1</property>
      <property value="20.0135">fsim/tables/ps_full_ms/h5/w1/v10</property>
      <property value="19.6081">fsim/tables/ps_full_ms/h5/w1/v11</property>
      <property value="19.1414">fsim/tables/ps_full_ms/h5/w1/v12</property>
      <property value="18.6109">fsim/tables/ps_full_ms/h5/w1/v13</property>
      <property value="17.9673">fsim/tables/ps_full_ms/h5/w1/v14</property>
      <property value="14.7856">fsim/tables/ps_full_ms/h5/w1/v15</property>
      <property value="18.9034">fsim/tables/ps_full_ms/h5/w1/v2</property>
      <property value="19.3385">fsim/tables/ps_full_ms/h5/w1/v3</property>
      <property value="19.8563">fsim/tables/ps_full_ms/h5/w1/v4</property>
      <property value="20.4123">fsim/tables/ps_full_ms/h5/w1/v5</property>
      <property value="20.6458">fsim/tables/ps_full_ms/h5/w1/v6</property>
      <property value="20.6209">fsim/tables/ps_full_ms/h5/w1/v7</property>
      <property value="20.5208">fsim/tables/ps_full_ms/h5/w1/v8</property>
      <property value="20.3318">fsim/tables/ps_full_ms/h5/w1/v9</property>
      <property value="15.1026">fsim/tables/ps_full_ms/h5/w2/v0</property>
      <property value="15.5683">fsim/tables/ps_full_ms/h5/w2/v1</property>
      <property value="15.5545">fsim/tables/ps_full_ms/h5/w2/v10</property>
      <property value="15.3079">fsim/tables/ps_full_ms/h5/w2/v11</property>
      <property value="14.9944">fsim/tables/ps_full_ms/h5/w2/v12</property>
      <property value="14.5829">fsim/tables/ps_full_ms/h5/w2/v13</property>
      <property value="14.1307">fsim/tables/ps_full_ms/h5/w2/v14</property>
      <property value="12.6209">fsim/tables/ps_full_ms/h5/w2/v15</property>
      <property value="15.8528">fsim/tables/ps_full_ms/h5/w2/v2</property>
      <property value="16.0619">fsim/tables/ps_full_ms/h5/w2/v3</property>
      <property value="16.0707">fsim/tables/ps_full_ms/h5/w2/v4</property>
      <property value="16.0406">fsim/tables/ps_full_ms/h5/w2/v5</property>
      <property value="16.05">fsim/tables/ps_full_ms/h5/w2/v6</property>
      <property value="16.0323">fsim/tables/ps_full_ms/h5/w2/v7</property>
      <property value="15.9261">fsim/tables/ps_full_ms/h5/w2/v8</property>
      <property value="15.762">fsim/tables/ps_full_ms/h5/w2/v9</property>
      <property value="14.1534">fsim/tables/ps_full_ms/h6/w0/v0</property>
      <property value="14.6172">fsim/tables/ps_full_ms/h6/w0/v1</property>
      <property value="14.3193">fsim/tables/ps_full_ms/h6/w0/v10</property>
      <property value="14.0682">fsim/tables/ps_full_ms/h6/w0/v11</property>
      <property value="13.7752">fsim/tables/ps_full_ms/h6/w0/v12</property>
      <property value="13.4027">fsim/tables/ps_full_ms/h6/w0/v13</property>
      <property value="12.9868">fsim/tables/ps_full_ms/h6/w0/v14</property>
      <property value="12.0095">fsim/tables/ps_full_ms/h6/w0/v15</property>
      <property value="14.9653">fsim/tables/ps_full_ms/h6/w0/v2</property>
      <property value="15.1216">fsim/tables/ps_full_ms/h6/w0/v3</property>
      <property value="15.0899">fsim/tables/ps_full_ms/h6/w0/v4</property>
      <property value="15.0552">fsim/tables/ps_full_ms/h6/w0/v5</property>
      <property value="14.9968">fsim/tables/ps_full_ms/h6/w0/v6</property>
      <property value="14.8985">fsim/tables/ps_full_ms/h6/w0/v7</property>
      <property value="14.7341">fsim/tables/ps_full_ms/h6/w0/v8</property>
      <property value="14.5417">fsim/tables/ps_full_ms/h6/w0/v9</property>
      <property value="10.6085">fsim/tables/ps_full_ms/h6/w1/v0</property>
      <property value="10.6712">fsim/tables/ps_full_ms/h6/w1/v1</property>
      <property value="9.7581">fsim/tables/ps_full_ms/h6/w1/v10</property>
      <property value="9.60942">fsim/tables/ps_full_ms/h6/w1/v11</property>
      <property value="9.43088">fsim/tables/ps_full_ms/h6/w1/v12</property>
      <property value="9.23211">fsim/tables/ps_full_ms/h6/w1/v13</property>
      <property value="9.00965">fsim/tables/ps_full_ms/h6/w1/v14</property>
      <property value="8.77517">fsim/tables/ps_full_ms/h6/w1/v15</property>
      <property value="10.5859">fsim/tables/ps_full_ms/h6/w1/v2</property>
      <property value="10.4451">fsim/tables/ps_full_ms/h6/w1/v3</property>
      <property value="10.3006">fsim/tables/ps_full_ms/h6/w1/v4</property>
      <property value="10.1806">fsim/tables/ps_full_ms/h6/w1/v5</property>
      <property value="10.0921">fsim/tables/ps_full_ms/h6/w1/v6</property>
      <property value="10.0197">fsim/tables/ps_full_ms/h6/w1/v7</property>
      <property value="9.94636">fsim/tables/ps_full_ms/h6/w1/v8</property>
      <property value="9.8625">fsim/tables/ps_full_ms/h6/w1/v9</property>
      <property value="6.49933">fsim/tables/ps_full_ms/h6/w2/v0</property>
      <property value="6.52334">fsim/tables/ps_full_ms/h6/w2/v1</property>
      <property value="5.71976">fsim/tables/ps_full_ms/h6/w2/v10</property>
      <property value="5.65994">fsim/tables/ps_full_ms/h6/w2/v11</property>
      <property value="5.59019">fsim/tables/ps_full_ms/h6/w2/v12</property>
      <property value="5.51363">fsim/tables/ps_full_ms/h6/w2/v13</property>
      <property value="5.43214">fsim/tables/ps_full_ms/h6/w2/v14</property>
      <property value="5.34855">fsim/tables/ps_full_ms/h6/w2/v15</property>
      <property value="6.41862">fsim/tables/ps_full_ms/h6/w2/v2</property>
      <property value="6.26979">fsim/tables/ps_full_ms/h6/w2/v3</property>
      <property value="6.12678">fsim/tables/ps_full_ms/h6/w2/v4</property>
      <property value="6.0102">fsim/tables/ps_full_ms/h6/w2/v5</property>
      <property value="5.93103">fsim/tables/ps_full_ms/h6/w2/v6</property>
      <property value="5.87181">fsim/tables/ps_full_ms/h6/w2/v7</property>
      <property value="5.81891">fsim/tables/ps_full_ms/h6/w2/v8</property>
      <property value="5.77162">fsim/tables/ps_full_ms/h6/w2/v9</property>
      <property value="-8.48288">fsim/tables/ps_idle_ms/h0/w0/v0</property>
      <property value="-9.97776">fsim/tables/ps_idle_ms/h0/w0/v1</property>
      <property value="-37.0792">fsim/tables/ps_idle_ms/h0/w0/v10</property>
      <property value="-41.7465">fsim/tables/ps_idle_ms/h0/w0/v11</property>
      <property value="-53.9643">fsim/tables/ps_idle_ms/h0/w0/v12</property>
      <property value="-75.06">fsim/tables/ps_idle_ms/h0/w0/v13</property>
      <property value="-100.426">fsim/tables/ps_idle_ms/h0/w0/v14</property>
      <property value="-118.589">fsim/tables/ps_idle_ms/h0/w0/v15</property>
      <property value="-11.8248">fsim/tables/ps_idle_ms/h0/w0/v2</property>
      <property value="-13.9266">fsim/tables/ps_idle_ms/h0/w0/v3</property>
      <property value="-16.2418">fsim/tables/ps_idle_ms/h0/w0/v4</property>
      <property value="-18.8896">fsim/tables/ps_idle_ms/h0/w0/v5</property>
      <property value="-21.924">fsim/tables/ps_idle_ms/h0/w0/v6</property>
      <property value="-25.2366">fsim/tables/ps_idle_ms/h0/w0/v7</property>
      <property value="-28.8534">fsim/tables/ps_idle_ms/h0/w0/v8</property>
      <property value="-32.8109">fsim/tables/ps_idle_ms/h0/w0/v9</property>
      <property value="-8.04325">fsim/tables/ps_idle_ms/h0/w1/v0</property>
      <property value="-9.40599">fsim/tables/ps_idle_ms/h0/w1/v1</property>
      <property value="-34.5805">fsim/tables/ps_idle_ms/h0/w1/v10</property>
      <property value="-39.4643">fsim/tables/ps_idle_ms/h0/w1/v11</property>
      <property value="-54.5522">fsim/tables/ps_idle_ms/h0/w1/v12</property>
      <property value="-75.4588">fsim/tables/ps_idle_ms/h0/w1/v13</property>
      <property value="-101.906">fsim/tables/ps_idle_ms/h0/w1/v14</property>
      <property value="-115.929">fsim/tables/ps_idle_ms/h0/w1/v15</property>
      <property value="-10.9796">fsim/tables/ps_idle_ms/h0/w1/v2</property>
      <property value="-12.8832">fsim/tables/ps_idle_ms/h0/w1/v3</property>
      <property value="-15.0749">fsim/tables/ps_idle_ms/h0/w1/v4</property>
      <property value="-17.4622">fsim/tables/ps_idle_ms/h0/w1/v5</property>
      <property value="-20.1758">fsim/tables/ps_idle_ms/h0/w1/v6</property>
      <property value="-23.3112">fsim/tables/ps_idle_ms/h0/w1/v7</property>
      <property value="-26.7479">fsim/tables/ps_idle_ms/h0/w1/v8</property>
      <property value="-30.5128">fsim/tables/ps_idle_ms/h0/w1/v9</property>
      <property value="-7.91167">fsim/tables/ps_idle_ms/h0/w2/v0</property>
      <property value="-9.02503">fsim/tables/ps_idle_ms/h0/w2/v1</property>
      <property value="-31.1509">fsim/tables/ps_idle_ms/h0/w2/v10</property>
      <property value="-35.1711">fsim/tables/ps_idle_ms/h0/w2/v11</property>
      <property value="-47.3375">fsim/tables/ps_idle_ms/h0/w2/v12</property>
      <property value="-65.4163">fsim/tables/ps_idle_ms/h0/w2/v13</property>
      <property value="-87.6485">fsim/tables/ps_idle_ms/h0/w2/v14</property>
      <property value="-104.912">fsim/tables/ps_idle_ms/h0/w2/v15</property>
      <property value="-10.4354">fsim/tables/ps_idle_ms/h0/w2/v2</property>
      <property value="-12.0228">fsim/tables/ps_idle_ms/h0/w2/v3</property>
      <property value="-13.9251">fsim/tables/ps_idle_ms/h0/w2/v4</property>
      <property value="-16.0888">fsim/tables/ps_idle_ms/h0/w2/v5</property>
      <property value="-18.4434">fsim/tables/ps_idle_ms/h0/w2/v6</property>
      <property value="-21.0669">fsim/tables/ps_idle_ms/h0/w2/v7</property>
      <property value="-24.1393">fsim/tables/ps_idle_ms/h0/w2/v8</property>
      <property value="-27.5081">fsim/tables/ps_idle_ms/h0/w2/v9</property>
      <property value="-8.00959">fsim/tables/ps_idle_ms/h1/w0/v0</property>
      <property value="-9.00199">fsim/tables/ps_idle_ms/h1/w0/v1</property>
      <property value="-27.9904">fsim/tables/ps_idle_ms/h1/w0/v10</property>
      <property value="-33.1668">fsim/tables/ps_idle_ms/h1/w0/v11</property>
      <property value="-46.4631">fsim/tables/ps_idle_ms/h1/w0/v12</property>
      <property value="-62.7996">fsim/tables/ps_idle_ms/h1/w0/v13</property>
      <property value="-87.0714">fsim/tables/ps_idle_ms/h1/w0/v14</property>
      <property value="-105.366">fsim/tables/ps_idle_ms/h1/w0/v15</property>
      <property value="-10.1618">fsim/tables/ps_idle_ms/h1/w0/v2</property>
      <property value="-11.579">fsim/tables/ps_idle_ms/h1/w0/v3</property>
      <property value="-13.1293">fsim/tables/ps_idle_ms/h1/w0/v4</property>
      <property value="-15.0287">fsim/tables/ps_idle_ms/h1/w0/v5</property>
      <property value="-17.0944">fsim/tables/ps_idle_ms/h1/w0/v6</property>
      <property value="-19.3327">fsim/tables/ps_idle_ms/h1/w0/v7</property>
      <property value="-21.9067">fsim/tables/ps_idle_ms/h1/w0/v8</property>
      <property value="-24.834">fsim/tables/ps_idle_ms/h1/w0/v9</property>
      <property value="-8.23647">fsim/tables/ps_idle_ms/h1/w1/v0</property>
      <property value="-8.98098">fsim/tables/ps_idle_ms/h1/w1/v1</property>
      <property value="-25.347">fsim/tables/ps_idle_ms/h1/w1/v10</property>
      <property value="-29.6286">fsim/tables/ps_idle_ms/h1/w1/v11</property>
      <property value="-41.1572">fsim/tables/ps_idle_ms/h1/w1/v12</property>
      <property value="-55.3379">fsim/tables/ps_idle_ms/h1/w1/v13</property>
      <property value="-74.4058">fsim/tables/ps_idle_ms/h1/w1/v14</property>
      <property value="-95.6912">fsim/tables/ps_idle_ms/h1/w1/v15</property>
      <property value="-10.0014">fsim/tables/ps_idle_ms/h1/w1/v2</property>
      <property value="-11.1684">fsim/tables/ps_idle_ms/h1/w1/v3</property>
      <property value="-12.5758">fsim/tables/ps_idle_ms/h1/w1/v4</property>
      <property value="-14.081">fsim/tables/ps_idle_ms/h1/w1/v5</property>
      <property value="-15.9294">fsim/tables/ps_idle_ms/h1/w1/v6</property>
      <property value="-17.9421">fsim/tables/ps_idle_ms/h1/w1/v7</property>
      <property value="-20.1208">fsim/tables/ps_idle_ms/h1/w1/v8</property>
      <property value="-22.5433">fsim/tables/ps_idle_ms/h1/w1/v9</property>
      <property value="-8.64644">fsim/tables/ps_idle_ms/h1/w2/v0</property>
      <property value="-9.24252">fsim/tables/ps_idle_ms/h1/w2/v1</property>
      <property value="-23.2911">fsim/tables/ps_idle_ms/h1/w2/v10</property>
      <property value="-26.9162">fsim/tables/ps_idle_ms/h1/w2/v11</property>
      <property value="-36.9868">fsim/tables/ps_idle_ms/h1/w2/v12</property>
      <property value="-49.3771">fsim/tables/ps_idle_ms/h1/w2/v13</property>
      <property value="-64.7961">fsim/tables/ps_idle_ms/h1/w2/v14</property>
      <property value="-87.1992">fsim/tables/ps_idle_ms/h1/w2/v15</property>
      <property value="-10.0045">fsim/tables/ps_idle_ms/h1/w2/v2</property>
      <property value="-11.0321">fsim/tables/ps_idle_ms/h1/w2/v3</property>
      <property value="-12.2228">fsim/tables/ps_idle_ms/h1/w2/v4</property>
      <property value="-13.6075">fsim/tables/ps_idle_ms/h1/w2/v5</property>
      <property value="-15.0889">fsim/tables/ps_idle_ms/h1/w2/v6</property>
      <property value="-16.9013">fsim/tables/ps_idle_ms/h1/w2/v7</property>
      <property value="-18.8719">fsim/tables/ps_idle_ms/h1/w2/v8</property>
      <property value="-20.9885">fsim/tables/ps_idle_ms/h1/w2/v9</property>
      <property value="-8.9986">fsim/tables/ps_idle_ms/h2/w0/v0</property>
      <property value="-9.45282">fsim/tables/ps_idle_ms/h2/w0/v1</property>
      <property value="-20.3871">fsim/tables/ps_idle_ms/h2/w0/v10</property>
      <property value="-24.4959">fsim/tables/ps_idle_ms/h2/w0/v11</property>
      <property value="-32.6098">fsim/tables/ps_idle_ms/h2/w0/v12</property>
      <property value="-42.366">fsim/tables/ps_idle_ms/h2/w0/v13</property>
      <property value="-54.8388">fsim/tables/ps_idle_ms/h2/w0/v14</property>
      <property value="-77.9215">fsim/tables/ps_idle_ms/h2/w0/v15</property>
      <property value="-10.1011">fsim/tables/ps_idle_ms/h2/w0/v2</property>
      <property value="-10.9012">fsim/tables/ps_idle_ms/h2/w0/v3</property>
      <property value="-11.7897">fsim/tables/ps_idle_ms/h2/w0/v4</property>
      <property value="-12.8629">fsim/tables/ps_idle_ms/h2/w0/v5</property>
      <property value="-14.0683">fsim/tables/ps_idle_ms/h2/w0/v6</property>
      <property value="-15.3456">fsim/tables/ps_idle_ms/h2/w0/v7</property>
      <property value="-16.899">fsim/tables/ps_idle_ms/h2/w0/v8</property>
      <property value="-18.5844">fsim/tables/ps_idle_ms/h2/w0/v9</property>
      <property value="-9.63709">fsim/tables/ps_idle_ms/h2/w1/v0</property>
      <property value="-9.99433">fsim/tables/ps_idle_ms/h2/w1/v1</property>
      <property value="-19.1476">fsim/tables/ps_idle_ms/h2/w1/v10</property>
      <property value="-23.002">fsim/tables/ps_idle_ms/h2/w1/v11</property>
      <property value="-29.8463">fsim/tables/ps_idle_ms/h2/w1/v12</property>
      <property value="-38.113">fsim/tables/ps_idle_ms/h2/w1/v13</property>
      <property value="-48.39">fsim/tables/ps_idle_ms/h2/w1/v14</property>
      <property value="-70.4419">fsim/tables/ps_idle_ms/h2/w1/v15</property>
      <property value="-10.4495">fsim/tables/ps_idle_ms/h2/w1/v2</property>
      <property value="-11.0523">fsim/tables/ps_idle_ms/h2/w1/v3</property>
      <property value="-11.844">fsim/tables/ps_idle_ms/h2/w1/v4</property>
      <property value="-12.7071">fsim/tables/ps_idle_ms/h2/w1/v5</property>
      <property value="-13.735">fsim/tables/ps_idle_ms/h2/w1/v6</property>
      <property value="-14.8955">fsim/tables/ps_idle_ms/h2/w1/v7</property>
      <property value="-16.1146">fsim/tables/ps_idle_ms/h2/w1/v8</property>
      <property value="-17.543">fsim/tables/ps_idle_ms/h2/w1/v9</property>
      <property value="-10.282">fsim/tables/ps_idle_ms/h2/w2/v0</property>
      <property value="-10.5459">fsim/tables/ps_idle_ms/h2/w2/v1</property>
      <property value="-18.2088">fsim/tables/ps_idle_ms/h2/w2/v10</property>
      <property value="-21.9643">fsim/tables/ps_idle_ms/h2/w2/v11</property>
      <property value="-27.9651">fsim/tables/ps_idle_ms/h2/w2/v12</property>
      <property value="-35.1053">fsim/tables/ps_idle_ms/h2/w2/v13</property>
      <property value="-43.7809">fsim/tables/ps_idle_ms/h2/w2/v14</property>
      <property value="-64.224">fsim/tables/ps_idle_ms/h2/w2/v15</property>
      <property value="-10.9408">fsim/tables/ps_idle_ms/h2/w2/v2</property>
      <property value="-11.4299">fsim/tables/ps_idle_ms/h2/w2/v3</property>
      <property value="-11.959">fsim/tables/ps_idle_ms/h2/w2/v4</property>
      <property value="-12.7573">fsim/tables/ps_idle_ms/h2/w2/v5</property>
      <property value="-13.5962">fsim/tables/ps_idle_ms/h2/w2/v6</property>
      <property value="-14.5904">fsim/tables/ps_idle_ms/h2/w2/v7</property>
      <property value="-15.7067">fsim/tables/ps_idle_ms/h2/w2/v8</property>
      <property value="-16.8648">fsim/tables/ps_idle_ms/h2/w2/v9</property>
      <property value="-10.9419">fsim/tables/ps_idle_ms/h3/w0/v0</property>
      <property value="-11.1182">fsim/tables/ps_idle_ms/h3/w0/v1</property>
      <property value="-16.9694">fsim/tables/ps_idle_ms/h3/w0/v10</property>
      <property value="-20.682">fsim/tables/ps_idle_ms/h3/w0/v11</property>
      <property value="-25.1042">fsim/tables/ps_idle_ms/h3/w0/v12</property>
      <property value="-30.381">fsim/tables/ps_idle_ms/h3/w0/v13</property>
      <property value="-36.9824">fsim/tables/ps_idle_ms/h3/w0/v14</property>
      <property value="-55.4723">fsim/tables/ps_idle_ms/h3/w0/v15</property>
      <property value="-11.3538">fsim/tables/ps_idle_ms/h3/w0/v2</property>
      <property value="-11.6553">fsim/tables/ps_idle_ms/h3/w0/v3</property>
      <property value="-12.1277">fsim/tables/ps_idle_ms/h3/w0/v4</property>
      <property value="-12.6121">fsim/tables/ps_idle_ms/h3/w0/v5</property>
      <property value="-13.2403">fsim/tables/ps_idle_ms/h3/w0/v6</property>
      <property value="-13.9045">fsim/tables/ps_idle_ms/h3/w0/v7</property>
      <property value="-14.6196">fsim/tables/ps_idle_ms/h3/w0/v8</property>
      <property value="-15.5058">fsim/tables/ps_idle_ms/h3/w0/v9</property>
      <property value="-11.8102">fsim/tables/ps_idle_ms/h3/w1/v0</property>
      <property value="-11.9145">fsim/tables/ps_idle_ms/h3/w1/v1</property>
      <property value="-17.0337">fsim/tables/ps_idle_ms/h3/w1/v10</property>
      <property value="-20.2618">fsim/tables/ps_idle_ms/h3/w1/v11</property>
      <property value="-23.9031">fsim/tables/ps_idle_ms/h3/w1/v12</property>
      <property value="-28.2459">fsim/tables/ps_idle_ms/h3/w1/v13</property>
      <property value="-33.6875">fsim/tables/ps_idle_ms/h3/w1/v14</property>
      <property value="-49.6903">fsim/tables/ps_idle_ms/h3/w1/v15</property>
      <property value="-12.0685">fsim/tables/ps_idle_ms/h3/w1/v2</property>
      <property value="-12.3313">fsim/tables/ps_idle_ms/h3/w1/v3</property>
      <property value="-12.6026">fsim/tables/ps_idle_ms/h3/w1/v4</property>
      <property value="-12.9905">fsim/tables/ps_idle_ms/h3/w1/v5</property>
      <property value="-13.4286">fsim/tables/ps_idle_ms/h3/w1/v6</property>
      <property value="-14.0029">fsim/tables/ps_idle_ms/h3/w1/v7</property>
      <property value="-14.6148">fsim/tables/ps_idle_ms/h3/w1/v8</property>
      <property value="-15.261">fsim/tables/ps_idle_ms/h3/w1/v9</property>
      <property value="-12.5917">fsim/tables/ps_idle_ms/h3/w2/v0</property>
      <property value="-12.6538">fsim/tables/ps_idle_ms/h3/w2/v1</property>
      <property value="-17.2624">fsim/tables/ps_idle_ms/h3/w2/v10</property>
      <property value="-19.9861">fsim/tables/ps_idle_ms/h3/w2/v11</property>
      <property value="-23.1194">fsim/tables/ps_idle_ms/h3/w2/v12</property>
      <property value="-26.8431">fsim/tables/ps_idle_ms/h3/w2/v13</property>
      <property value="-31.3565">fsim/tables/ps_idle_ms/h3/w2/v14</property>
      <property value="-44.5424">fsim/tables/ps_idle_ms/h3/w2/v15</property>
      <property value="-12.8033">fsim/tables/ps_idle_ms/h3/w2/v2</property>
      <property value="-12.9732">fsim/tables/ps_idle_ms/h3/w2/v3</property>
      <property value="-13.2339">fsim/tables/ps_idle_ms/h3/w2/v4</property>
      <property value="-13.4835">fsim/tables/ps_idle_ms/h3/w2/v5</property>
      <property value="-13.8466">fsim/tables/ps_idle_ms/h3/w2/v6</property>
      <property value="-14.1818">fsim/tables/ps_idle_ms/h3/w2/v7</property>
      <property value="-14.687">fsim/tables/ps_idle_ms/h3/w2/v8</property>
      <property value="-15.2973">fsim/tables/ps_idle_ms/h3/w2/v9</property>
      <property value="-13.0098">fsim/tables/ps_idle_ms/h4/w0/v0</property>
      <property value="-13.0344">fsim/tables/ps_idle_ms/h4/w0/v1</property>
      <property value="-17.6315">fsim/tables/ps_idle_ms/h4/w0/v10</property>
      <property value="-19.7741">fsim/tables/ps_idle_ms/h4/w0/v11</property>
      <property value="-22.2584">fsim/tables/ps_idle_ms/h4/w0/v12</property>
      <property value="-25.2969">fsim/tables/ps_idle_ms/h4/w0/v13</property>
      <property value="-29.1006">fsim/tables/ps_idle_ms/h4/w0/v14</property>
      <property value="-40.4175">fsim/tables/ps_idle_ms/h4/w0/v15</property>
      <property value="-13.1517">fsim/tables/ps_idle_ms/h4/w0/v2</property>
      <property value="-13.2476">fsim/tables/ps_idle_ms/h4/w0/v3</property>
      <property value="-13.4175">fsim/tables/ps_idle_ms/h4/w0/v4</property>
      <property value="-13.6091">fsim/tables/ps_idle_ms/h4/w0/v5</property>
      <property value="-13.8974">fsim/tables/ps_idle_ms/h4/w0/v6</property>
      <property value="-14.2336">fsim/tables/ps_idle_ms/h4/w0/v7</property>
      <property value="-14.5897">fsim/tables/ps_idle_ms/h4/w0/v8</property>
      <property value="-15.6717">fsim/tables/ps_idle_ms/h4/w0/v9</property>
      <property value="-13.9843">fsim/tables/ps_idle_ms/h4/w1/v0</property>
      <property value="-14.0312">fsim/tables/ps_idle_ms/h4/w1/v1</property>
      <property value="-18.0846">fsim/tables/ps_idle_ms/h4/w1/v10</property>
      <property value="-19.8569">fsim/tables/ps_idle_ms/h4/w1/v11</property>
      <property value="-21.8925">fsim/tables/ps_idle_ms/h4/w1/v12</property>
      <property value="-24.3281">fsim/tables/ps_idle_ms/h4/w1/v13</property>
      <property value="-27.2985">fsim/tables/ps_idle_ms/h4/w1/v14</property>
      <property value="-35.654">fsim/tables/ps_idle_ms/h4/w1/v15</property>
      <property value="-14.0562">fsim/tables/ps_idle_ms/h4/w1/v2</property>
      <property value="-14.148">fsim/tables/ps_idle_ms/h4/w1/v3</property>
      <property value="-14.2283">fsim/tables/ps_idle_ms/h4/w1/v4</property>
      <property value="-14.3891">fsim/tables/ps_idle_ms/h4/w1/v5</property>
      <property value="-14.546">fsim/tables/ps_idle_ms/h4/w1/v6</property>
      <property value="-14.741">fsim/tables/ps_idle_ms/h4/w1/v7</property>
      <property value="-15.1909">fsim/tables/ps_idle_ms/h4/w1/v8</property>
      <property value="-16.5533">fsim/tables/ps_idle_ms/h4/w1/v9</property>
      <property value="-14.8965">fsim/tables/ps_idle_ms/h4/w2/v0</property>
      <property value="-14.9129">fsim/tables/ps_idle_ms/h4/w2/v1</property>
      <property value="-18.7114">fsim/tables/ps_idle_ms/h4/w2/v10</property>
      <property value="-20.0475">fsim/tables/ps_idle_ms/h4/w2/v11</property>
      <property value="-21.6982">fsim/tables/ps_idle_ms/h4/w2/v12</property>
      <property value="-23.7338">fsim/tables/ps_idle_ms/h4/w2/v13</property>
      <property value="-26.1007">fsim/tables/ps_idle_ms/h4/w2/v14</property>
      <property value="-32.1634">fsim/tables/ps_idle_ms/h4/w2/v15</property>
      <property value="-14.9219">fsim/tables/ps_idle_ms/h4/w2/v2</property>
      <property value="-14.9773">fsim/tables/ps_idle_ms/h4/w2/v3</property>
      <property value="-15.0452">fsim/tables/ps_idle_ms/h4/w2/v4</property>
      <property value="-15.1152">fsim/tables/ps_idle_ms/h4/w2/v5</property>
      <property value="-15.2876">fsim/tables/ps_idle_ms/h4/w2/v6</property>
      <property value="-15.5244">fsim/tables/ps_idle_ms/h4/w2/v7</property>
      <property value="-16.393">fsim/tables/ps_idle_ms/h4/w2/v8</property>
      <property value="-17.5193">fsim/tables/ps_idle_ms/h4/w2/v9</property>
      <property value="-14.7891">fsim/tables/ps_idle_ms/h5/w0/v0</property>
      <property value="-14.7941">fsim/tables/ps_idle_ms/h5/w0/v1</property>
      <property value="-18.8544">fsim/tables/ps_idle_ms/h5/w0/v10</property>
      <property value="-20.2271">fsim/tables/ps_idle_ms/h5/w0/v11</property>
      <property value="-21.8821">fsim/tables/ps_idle_ms/h5/w0/v12</property>
      <property value="-23.8684">fsim/tables/ps_idle_ms/h5/w0/v13</property>
      <property value="-26.295">fsim/tables/ps_idle_ms/h5/w0/v14</property>
      <property value="-32.682">fsim/tables/ps_idle_ms/h5/w0/v15</property>
      <property value="-14.794">fsim/tables/ps_idle_ms/h5/w0/v2</property>
      <property value="-14.8581">fsim/tables/ps_idle_ms/h5/w0/v3</property>
      <property value="-14.9112">fsim/tables/ps_idle_ms/h5/w0/v4</property>
      <property value="-14.9979">fsim/tables/ps_idle_ms/h5/w0/v5</property>
      <property value="-15.1515">fsim/tables/ps_idle_ms/h5/w0/v6</property>
      <property value="-15.4941">fsim/tables/ps_idle_ms/h5/w0/v7</property>
      <property value="-16.4696">fsim/tables/ps_idle_ms/h5/w0/v8</property>
      <property value="-17.6205">fsim/tables/ps_idle_ms/h5/w0/v9</property>
      <property value="-15.8498">fsim/tables/ps_idle_ms/h5/w1/v0</property>
      <property value="-15.8526">fsim/tables/ps_idle_ms/h5/w1/v1</property>
      <property value="-19.5788">fsim/tables/ps_idle_ms/h5/w1/v10</property>
      <property value="-20.6794">fsim/tables/ps_idle_ms/h5/w1/v11</property>
      <property value="-21.991">fsim/tables/ps_idle_ms/h5/w1/v12</property>
      <property value="-23.489">fsim/tables/ps_idle_ms/h5/w1/v13</property>
      <property value="-25.184">fsim/tables/ps_idle_ms/h5/w1/v14</property>
      <property value="-29.2026">fsim/tables/ps_idle_ms/h5/w1/v15</property>
      <property value="-15.8475">fsim/tables/ps_idle_ms/h5/w1/v2</property>
      <property value="-15.8723">fsim/tables/ps_idle_ms/h5/w1/v3</property>
      <property value="-15.9611">fsim/tables/ps_idle_ms/h5/w1/v4</property>
      <property value="-16.0504">fsim/tables/ps_idle_ms/h5/w1/v5</property>
      <property value="-16.4598">fsim/tables/ps_idle_ms/h5/w1/v6</property>
      <property value="-17.172">fsim/tables/ps_idle_ms/h5/w1/v7</property>
      <property value="-17.9222">fsim/tables/ps_idle_ms/h5/w1/v8</property>
      <property value="-18.6974">fsim/tables/ps_idle_ms/h5/w1/v9</property>
      <property value="-16.8464">fsim/tables/ps_idle_ms/h5/w2/v0</property>
      <property value="-16.8811">fsim/tables/ps_idle_ms/h5/w2/v1</property>
      <property value="-20.5916">fsim/tables/ps_idle_ms/h5/w2/v10</property>
      <property value="-21.4445">fsim/tables/ps_idle_ms/h5/w2/v11</property>
      <property value="-22.4158">fsim/tables/ps_idle_ms/h5/w2/v12</property>
      <property value="-23.4604">fsim/tables/ps_idle_ms/h5/w2/v13</property>
      <property value="-24.5563">fsim/tables/ps_idle_ms/h5/w2/v14</property>
      <property value="-26.8107">fsim/tables/ps_idle_ms/h5/w2/v15</property>
      <property value="-16.9202">fsim/tables/ps_idle_ms/h5/w2/v2</property>
      <property value="-16.9616">fsim/tables/ps_idle_ms/h5/w2/v3</property>
      <property value="-17.246">fsim/tables/ps_idle_ms/h5/w2/v4</property>
      <property value="-17.7108">fsim/tables/ps_idle_ms/h5/w2/v5</property>
      <property value="-18.1858">fsim/tables/ps_idle_ms/h5/w2/v6</property>
      <property value="-18.6701">fsim/tables/ps_idle_ms/h5/w2/v7</property>
      <property value="-19.2143">fsim/tables/ps_idle_ms/h5/w2/v8</property>
      <property value="-19.8557">fsim/tables/ps_idle_ms/h5/w2/v9</property>
      <property value="-16.784">fsim/tables/ps_idle_ms/h6/w0/v0</property>
      <property value="-16.8073">fsim/tables/ps_idle_ms/h6/w0/v1</property>
      <property value="-20.496">fsim/tables/ps_idle_ms/h6/w0/v10</property>
      <property value="-21.3228">fsim/tables/ps_idle_ms/h6/w0/v11</property>
      <property value="-22.2472">fsim/tables/ps_idle_ms/h6/w0/v12</property>
      <property value="-23.2386">fsim/tables/ps_idle_ms/h6/w0/v13</property>
      <property value="-24.2482">fsim/tables/ps_idle_ms/h6/w0/v14</property>
      <property value="-26.0571">fsim/tables/ps_idle_ms/h6/w0/v15</property>
      <property value="-16.8145">fsim/tables/ps_idle_ms/h6/w0/v2</property>
      <property value="-16.9315">fsim/tables/ps_idle_ms/h6/w0/v3</property>
      <property value="-17.2958">fsim/tables/ps_idle_ms/h6/w0/v4</property>
      <property value="-17.72">fsim/tables/ps_idle_ms/h6/w0/v5</property>
      <property value="-18.1532">fsim/tables/ps_idle_ms/h6/w0/v6</property>
      <property value="-18.6107">fsim/tables/ps_idle_ms/h6/w0/v7</property>
      <property value="-19.1437">fsim/tables/ps_idle_ms/h6/w0/v8</property>
      <property value="-19.7721">fsim/tables/ps_idle_ms/h6/w0/v9</property>
      <property value="-18.5697">fsim/tables/ps_idle_ms/h6/w1/v0</property>
      <property value="-18.789">fsim/tables/ps_idle_ms/h6/w1/v1</property>
      <property value="-21.8756">fsim/tables/ps_idle_ms/h6/w1/v10</property>
      <property value="-22.3954">fsim/tables/ps_idle_ms/h6/w1/v11</property>
      <property value="-22.9351">fsim/tables/ps_idle_ms/h6/w1/v12</property>
      <property value="-23.474">fsim/tables/ps_idle_ms/h6/w1/v13</property>
      <property value="-23.9709">fsim/tables/ps_idle_ms/h6/w1/v14</property>
      <property value="-24.5312">fsim/tables/ps_idle_ms/h6/w1/v15</property>
      <property value="-19.0134">fsim/tables/ps_idle_ms/h6/w1/v2</property>
      <property value="-19.2466">fsim/tables/ps_idle_ms/h6/w1/v3</property>
      <property value="-19.5037">fsim/tables/ps_idle_ms/h6/w1/v4</property>
      <property value="-19.8006">fsim/tables/ps_idle_ms/h6/w1/v5</property>
      <property value="-20.1414">fsim/tables/ps_idle_ms/h6/w1/v6</property>
      <property value="-20.5187">fsim/tables/ps_idle_ms/h6/w1/v7</property>
      <property value="-20.9329">fsim/tables/ps_idle_ms/h6/w1/v8</property>
      <property value="-21.3858">fsim/tables/ps_idle_ms/h6/w1/v9</property>
      <property value="-21.065">fsim/tables/ps_idle_ms/h6/w2/v0</property>
      <property value="-21.2376">fsim/tables/ps_idle_ms/h6/w2/v1</property>
      <property value="-23.1135">fsim/tables/ps_idle_ms/h6/w2/v10</property>
      <property value="-23.3388">fsim/tables/ps_idle_ms/h6/w2/v11</property>
      <property value="-23.5583">fsim/tables/ps_idle_ms/h6/w2/v12</property>
      <property value="-23.7643">fsim/tables/ps_idle_ms/h6/w2/v13</property>
      <property value="-23.9513">fsim/tables/ps_idle_ms/h6/w2/v14</property>
      <property value="-24.1087">fsim/tables/ps_idle_ms/h6/w2/v15</property>
      <property value="-21.4188">fsim/tables/ps_idle_ms/h6/w2/v2</property>
      <property value="-21.6081">fsim/tables/ps_idle_ms/h6/w2/v3</property>
      <property value="-21.8056">fsim/tables/ps_idle_ms/h6/w2/v4</property>
      <property value="-22.0108">fsim/tables/ps_idle_ms/h6/w2/v5</property>
      <property value="-22.2221">fsim/tables/ps_idle_ms/h6/w2/v6</property>
      <property value="-22.439">fsim/tables/ps_idle_ms/h6/w2/v7</property>
      <property value="-22.6608">fsim/tables/ps_idle_ms/h6/w2/v8</property>
      <property value="-22.8863">fsim/tables/ps_idle_ms/h6/w2/v9</property>
      <property value="278.051">fsim/tables/reach_tas_ms/h0/w0</property>
      <property value="282.849">fsim/tables/reach_tas_ms/h0/w1</property>
      <property value="281.558">fsim/tables/reach_tas_ms/h0/w2</property>
      <property value="275.903">fsim/tables/reach_tas_ms/h1/w0</property>
      <property value="275.215">fsim/tables/reach_tas_ms/h1/w1</property>
      <property value="274.343">fsim/tables/reach_tas_ms/h1/w2</property>
      <property value="264.564">fsim/tables/reach_tas_ms/h2/w0</property>
      <property value="263.977">fsim/tables/reach_tas_ms/h2/w1</property>
      <property value="263.482">fsim/tables/reach_tas_ms/h2/w2</property>
      <property value="253.136">fsim/tables/reach_tas_ms/h3/w0</property>
      <property value="252.633">fsim/tables/reach_tas_ms/h3/w1</property>
      <property value="252.154">fsim/tables/reach_tas_ms/h3/w2</property>
      <property value="246.805">fsim/tables/reach_tas_ms/h4/w0</property>
      <property value="246.175">fsim/tables/reach_tas_ms/h4/w1</property>
      <property value="245.563">fsim/tables/reach_tas_ms/h4/w2</property>
      <property value="245.919">fsim/tables/reach_tas_ms/h5/w0</property>
      <property value="245.021">fsim/tables/reach_tas_ms/h5/w1</property>
      <property value="244.048">fsim/tables/reach_tas_ms/h5/w2</property>
      <property value="243.527">fsim/tables/reach_tas_ms/h6/w0</property>
      <property value="241.977">fsim/tables/reach_tas_ms/h6/w1</property>
      <property value="240.102">fsim/tables/reach_tas_ms/h6/w2</property>
      <property value="0.0">fsim/tables/speed_fraction/v0</property>
      <property value="0.0666667">fsim/tables/speed_fraction/v1</property>
      <property value="0.666667">fsim/tables/speed_fraction/v10</property>
      <property value="0.733333">fsim/tables/speed_fraction/v11</property>
      <property value="0.8">fsim/tables/speed_fraction/v12</property>
      <property value="0.866667">fsim/tables/speed_fraction/v13</property>
      <property value="0.933333">fsim/tables/speed_fraction/v14</property>
      <property value="1">fsim/tables/speed_fraction/v15</property>
      <property value="0.133333">fsim/tables/speed_fraction/v2</property>
      <property value="0.2">fsim/tables/speed_fraction/v3</property>
      <property value="0.266667">fsim/tables/speed_fraction/v4</property>
      <property value="0.333333">fsim/tables/speed_fraction/v5</property>
      <property value="0.4">fsim/tables/speed_fraction/v6</property>
      <property value="0.466667">fsim/tables/speed_fraction/v7</property>
      <property value="0.533333">fsim/tables/speed_fraction/v8</property>
      <property value="0.6">fsim/tables/speed_fraction/v9</property>
      <property value="65.3821">fsim/tables/stall_cas_ms/h0/w0</property>
      <property value="69.4911">fsim/tables/stall_cas_ms/h0/w1</property>
      <property value="73.3703">fsim/tables/stall_cas_ms/h0/w2</property>
      <property value="65.4228">fsim/tables/stall_cas_ms/h1/w0</property>
      <property value="69.5343">fsim/tables/stall_cas_ms/h1/w1</property>
      <property value="73.416">fsim/tables/stall_cas_ms/h1/w2</property>
      <property value="65.6907">fsim/tables/stall_cas_ms/h2/w0</property>
      <property value="69.8191">fsim/tables/stall_cas_ms/h2/w1</property>
      <property value="73.7166">fsim/tables/stall_cas_ms/h2/w2</property>
      <property value="65.3645">fsim/tables/stall_cas_ms/h3/w0</property>
      <property value="69.4724">fsim/tables/stall_cas_ms/h3/w1</property>
      <property value="73.3506">fsim/tables/stall_cas_ms/h3/w2</property>
      <property value="65.2817">fsim/tables/stall_cas_ms/h4/w0</property>
      <property value="69.3844">fsim/tables/stall_cas_ms/h4/w1</property>
      <property value="73.2576">fsim/tables/stall_cas_ms/h4/w2</property>
      <property value="65.2385">fsim/tables/stall_cas_ms/h5/w0</property>
      <property value="69.3385">fsim/tables/stall_cas_ms/h5/w1</property>
      <property value="73.2092">fsim/tables/stall_cas_ms/h5/w2</property>
      <property value="64.9423">fsim/tables/stall_cas_ms/h6/w0</property>
      <property value="69.0236">fsim/tables/stall_cas_ms/h6/w1</property>
      <property value="72.8767">fsim/tables/stall_cas_ms/h6/w2</property>
      <property value="10409.9">fsim/tables/weight_kg/w0</property>
      <property value="11759.5">fsim/tables/weight_kg/w1</property>
      <property value="13109">fsim/tables/weight_kg/w2</property>
      <channel name="Pitch">
        <summer name="fcs/pitch-trim-sum">
          <input>fcs/elevator-cmd-norm</input>
          <input>fcs/pitch-trim-cmd-norm</input>
          <clipto> <min>-1</min> <max>1</max> </clipto>
        </summer>
        <aerosurface_scale name="fcs/elevator-control">
          <input>fcs/pitch-trim-sum</input>
          <range> <min>-25.00</min> <max>15.00</max> </range>
          <gain>0.0174533</gain>
        </aerosurface_scale>
        <actuator name="fcs/elevator-actuator">
          <input>fcs/elevator-control</input>
          <rate_limit>2.0</rate_limit>
          <output>fcs/elevator-pos-rad</output>
        </actuator>
      </channel>
      <channel name="Roll">
        <summer name="fcs/roll-trim-sum">
          <input>fcs/aileron-cmd-norm</input>
          <input>fcs/roll-trim-cmd-norm</input>
          <clipto> <min>-1</min> <max>1</max> </clipto>
        </summer>
        <aerosurface_scale name="fcs/left-aileron-control">
          <input>fcs/roll-trim-sum</input>
          <range> <min>-23.00</min> <max>23.00</max> </range>
          <gain>0.0174533</gain>
        </aerosurface_scale>
        <actuator name="fcs/left-aileron-actuator">
          <input>fcs/left-aileron-control</input>
          <rate_limit>2.0</rate_limit>
          <output>fcs/left-aileron-pos-rad</output>
        </actuator>
        <pure_gain name="fcs/right-aileron">
          <input>fcs/left-aileron-pos-rad</input>
          <gain>-1</gain>
          <output>fcs/right-aileron-pos-rad</output>
        </pure_gain>
      </channel>
      <channel name="Yaw">
        <summer name="fcs/yaw-trim-sum">
          <input>fcs/rudder-cmd-norm</input>
          <input>fcs/yaw-trim-cmd-norm</input>
          <clipto> <min>-1</min> <max>1</max> </clipto>
        </summer>
        <aerosurface_scale name="fcs/rudder-control">
          <input>fcs/yaw-trim-sum</input>
          <range> <min>-25.00</min> <max>25.00</max> </range>
          <gain>0.0174533</gain>
        </aerosurface_scale>
        <actuator name="fcs/rudder-actuator">
          <input>fcs/rudder-control</input>
          <rate_limit>2.0</rate_limit>
          <output>fcs/rudder-pos-rad</output>
        </actuator>
        <!-- the nose or tail wheel steers with the rudder pedals (JSBSim steers from
             fcs/steer-cmd-norm, positive right; the rudder command is positive left) -->
        <pure_gain name="fcs/steer-from-rudder">
          <input>fcs/yaw-trim-sum</input>
          <gain>-1</gain>
          <output>fcs/steer-cmd-norm</output>
        </pure_gain>
      </channel>
      <channel name="Flaps">
        <kinematic name="fcs/flaps-control">
          <input>fcs/flap-cmd-norm</input>
          <traverse>
            <setting> <position>0.0</position> <time>0.0</time> </setting>
            <setting> <position>10.0</position> <time>2.0</time> </setting>
            <setting> <position>20.0</position> <time>2.0</time> </setting>
            <setting> <position>30.0</position> <time>2.0</time> </setting>
            <setting> <position>40.0</position> <time>2.0</time> </setting>
          </traverse>
          <output>fcs/flap-pos-deg</output>
        </kinematic>
        <pure_gain name="fcs/flaps-normalized">
          <input>fcs/flap-pos-deg</input>
          <gain>0.025</gain>
          <output>fcs/flap-pos-norm</output>
        </pure_gain>
      </channel>
      <channel name="Speedbrake">
        <kinematic name="fcs/speedbrake-control">
          <input>fcs/speedbrake-cmd-norm</input>
          <traverse>
            <setting> <position>0</position> <time>0</time> </setting>
            <setting> <position>1</position> <time>2.00</time> </setting>
          </traverse>
          <output>fcs/speedbrake-pos-norm</output>
        </kinematic>
      </channel>
      <channel name="Leading-Edge Flaps">
        <fcs_function name="fcs/lef-schedule">
          <function>
            <sum>
              <product> <value>1.2</value> <property>aero/alpha-deg</property> </product>
              <product> <value>-0</value>
                <quotient> <property>aero/qbar-psf</property> <property>atmosphere/P-psf</property> </quotient>
              </product>
              <value>-6</value>
            </sum>
          </function>
          <clipto> <min>0</min> <max>12</max> </clipto>
        </fcs_function>
        <actuator name="fcs/lef-actuator">
          <input>fcs/lef-schedule</input>
          <lag>7.35</lag>
          <rate_limit>25</rate_limit>
          <output>fcs/lef-pos-deg</output>
        </actuator>
      </channel>
      <channel name="Landing Gear">
        <kinematic name="fcs/gear-control">
          <input>gear/gear-cmd-norm</input>
          <traverse>
            <setting> <position>0</position> <time>0</time> </setting>
            <setting> <position>1</position> <time>5</time> </setting>
          </traverse>
          <output>gear/gear-pos-norm</output>
        </kinematic>
      </channel>
    </flight_control>
    <aerodynamics>
        <function name="aero/function/mach-lift">
          <description>lift, and damping, over its low-speed value (hangar: aero/mach.py)</description>
          <table>
            <independentVar lookup="row">velocities/mach</independentVar>
            <tableData>
                 0.000     1.000000
                 0.300     1.028692
                 0.500     1.088164
                 0.600     1.137386
                 0.700     1.208106
                 0.800     1.315829
                 0.850     1.394498
                 0.900     1.504063
            </tableData>
          </table>
        </function>
        <function name="aero/function/mach-side">
          <description>side force, rolling and yawing moment over their low-speed values</description>
          <table>
            <independentVar lookup="row">velocities/mach</independentVar>
            <tableData>
                 0.000     1.000000
                 0.300     1.012515
                 0.500     1.037233
                 0.600     1.056486
                 0.700     1.082294
                 0.800     1.117430
                 0.850     1.139811
                 0.900     1.166063
            </tableData>
          </table>
        </function>
        <function name="aero/function/mach-dCm-dCL">
          <description>pitching moment per unit low-speed lift: the neutral point's move</description>
          <table>
            <independentVar lookup="row">velocities/mach</independentVar>
            <tableData>
                 0.000     0.000000
                 0.300    -0.002216
                 0.500    -0.006429
                 0.600    -0.009526
                 0.700    -0.013360
                 0.800    -0.017825
                 0.850    -0.020069
                 0.900    -0.021853
            </tableData>
          </table>
        </function>
        <function name="aero/function/mach-dCD0">
          <description>zero-lift drag's change: friction and wave drag</description>
          <table>
            <independentVar lookup="row">velocities/mach</independentVar>
            <tableData>
                 0.000     0.000000
                 0.300    -0.000122
                 0.500    -0.000334
                 0.600    -0.000475
                 0.700    -0.000475
                 0.800     0.018424
                 0.850     0.081059
                 0.900     0.168584
            </tableData>
          </table>
        </function>
        <function name="aero/function/mach-dK">
          <description>induced-drag factor's change (per CL^2)</description>
          <table>
            <independentVar lookup="row">velocities/mach</independentVar>
            <tableData>
                 0.000     0.000000
                 0.300     0.003967
                 0.500     0.011214
                 0.600     0.016373
                 0.700     0.022709
                 0.800     0.030470
                 0.850     0.035037
                 0.900     0.040244
            </tableData>
          </table>
        </function>
        <function name="aero/function/mach-aileron">
          <description>aileron power over its low-speed value</description>
          <table>
            <independentVar lookup="row">velocities/mach</independentVar>
            <tableData>
                 0.000     1.000000
                 0.300     1.028032
                 0.500     1.086165
                 0.600     1.134403
                 0.700     1.204134
                 0.800     1.312095
                 0.850     1.393090
                 0.900     1.510635
            </tableData>
          </table>
        </function>
        <function name="aero/function/mach-elevator">
          <description>elevator power over its low-speed value</description>
          <table>
            <independentVar lookup="row">velocities/mach</independentVar>
            <tableData>
                 0.000     1.000000
                 0.300     1.026983
                 0.500     1.082743
                 0.600     1.128763
                 0.700     1.194790
                 0.800     1.295564
                 0.850     1.369745
                 0.900     1.474766
            </tableData>
          </table>
        </function>
        <function name="aero/function/mach-flap">
          <description>flap power over its low-speed value</description>
          <table>
            <independentVar lookup="row">velocities/mach</independentVar>
            <tableData>
                 0.000     1.000000
                 0.300     1.033958
                 0.500     1.105449
                 0.600     1.165836
                 0.700     1.254766
                 0.800     1.396012
                 0.850     1.504579
                 0.900     1.665708
            </tableData>
          </table>
        </function>
        <function name="aero/function/mach-rudder">
          <description>rudder power over its low-speed value</description>
          <table>
            <independentVar lookup="row">velocities/mach</independentVar>
            <tableData>
                 0.000     1.000000
                 0.300     1.020690
                 0.500     1.063052
                 0.600     1.097682
                 0.700     1.146962
                 0.800     1.221567
                 0.850     1.276251
                 0.900     1.353669
            </tableData>
          </table>
        </function>
        <function name="aero/function/CL-base">
          <description>CL over alpha and beta at low speed</description>
          <table>
            <independentVar lookup="row">aero/alpha-deg</independentVar>
            <independentVar lookup="column">aero/beta-deg</independentVar>
            <tableData>
                        -90.00    -70.00    -50.00    -40.00    -30.00    -25.00    -20.00    -15.00    -10.00     -6.00     -3.00      0.00      3.00      6.00     10.00     15.00     20.00     25.00     30.00     40.00     50.00     70.00     90.00
             -180.00   0.00000  -0.00058  -0.01024  -0.01484  -0.01909  -0.02094  -0.02253  -0.02382  -0.02477  -0.02527  -0.02548  -0.02555  -0.02548  -0.02527  -0.02477  -0.02382  -0.02253  -0.02094  -0.01909  -0.01484  -0.01024  -0.00058   0.00000
             -120.00  -0.00000   0.12595   0.34863   0.46938   0.57921   0.62630   0.66648   0.69874   0.72232   0.73525   0.74097   0.74139   0.74097   0.73525   0.72232   0.69874   0.66648   0.62630   0.57921   0.46938   0.34863   0.12595  -0.00000
              -70.00  -0.00000  -0.10196  -0.28994  -0.39329  -0.48797  -0.52877  -0.56368  -0.59180  -0.61239  -0.62402  -0.62603  -0.62553  -0.62603  -0.62402  -0.61239  -0.59180  -0.56368  -0.52877  -0.48797  -0.39329  -0.28994  -0.10196  -0.00000
              -46.00  -0.00000  -0.17759  -0.51169  -0.69531  -0.86759  -0.94372  -1.01000  -1.06609  -1.09777  -1.11451  -1.12173  -1.12412  -1.12173  -1.11451  -1.09777  -1.06609  -1.01000  -0.94372  -0.86759  -0.69531  -0.51169  -0.17759  -0.00000
              -32.00  -0.00000  -0.18703  -0.54865  -0.75157  -0.94054  -1.03284  -1.09926  -1.15435  -1.19416  -1.20646  -1.21457  -1.21729  -1.21457  -1.20646  -1.19416  -1.15435  -1.09926  -1.03284  -0.94054  -0.75157  -0.54865  -0.18703  -0.00000
              -22.00  -0.00000  -0.20482  -0.58989  -0.84625  -1.03075  -1.10406  -1.16931  -1.22613  -1.26737  -1.28743  -1.28336  -1.27528  -1.28336  -1.28743  -1.26737  -1.22613  -1.16931  -1.10406  -1.03075  -0.84625  -0.58989  -0.20482  -0.00000
              -17.00  -0.00000  -0.17399  -0.63077  -0.91547  -1.09180  -1.17303  -1.24656  -1.30737  -1.35118  -1.37349  -1.38278  -1.38584  -1.38278  -1.37349  -1.35118  -1.30737  -1.24656  -1.17303  -1.09180  -0.91547  -0.63077  -0.17399  -0.00000
              -13.00  -0.00000  -0.14156  -0.59453  -0.72708  -0.84483  -0.91045  -0.96495  -1.00933  -1.04103  -1.05695  -1.06348  -1.06560  -1.06348  -1.05695  -1.04103  -1.00933  -0.96495  -0.91045  -0.84483  -0.72708  -0.59453  -0.14156  -0.00000
               -9.00  -0.00000  -0.12079  -0.40903  -0.48500  -0.56759  -0.61241  -0.64765  -0.67574  -0.69548  -0.70514  -0.70894  -0.71013  -0.70894  -0.70514  -0.69548  -0.67574  -0.64765  -0.61241  -0.56759  -0.48500  -0.40903  -0.12079  -0.00000
               -5.00  -0.00000  -0.06994  -0.20489  -0.24871  -0.28900  -0.31042  -0.32618  -0.33830  -0.34648  -0.35016  -0.35139  -0.35166  -0.35139  -0.35016  -0.34648  -0.33830  -0.32618  -0.31042  -0.28900  -0.24871  -0.20489  -0.06994  -0.00000
               -1.00  -0.00000   0.00171   0.00833  -0.00444  -0.01063  -0.00838  -0.00448  -0.00116   0.00153   0.00315   0.00403   0.00447   0.00403   0.00315   0.00153  -0.00116  -0.00448  -0.00838  -0.01063  -0.00444   0.00833   0.00171  -0.00000
                3.00   0.00000   0.07399   0.21463   0.23957   0.26697   0.29200   0.31533   0.33387   0.34713   0.35372   0.35633   0.35711   0.35633   0.35372   0.34713   0.33387   0.31533   0.29200   0.26697   0.23957   0.21463   0.07399   0.00000
                7.00   0.00000   0.13817   0.42458   0.48430   0.54180   0.58924   0.63250   0.66655   0.69091   0.70312   0.70807   0.70963   0.70807   0.70312   0.69091   0.66655   0.63250   0.58924   0.54180   0.48430   0.42458   0.13817   0.00000
               11.00   0.00000   0.15169   0.63343   0.72288   0.81197   0.88097   0.94529   0.99515   1.03101   1.04919   1.05668   1.05910   1.05668   1.04919   1.03101   0.99515   0.94529   0.88097   0.81197   0.72288   0.63343   0.15169   0.00000
               15.00   0.00000   0.17945   0.68813   0.94993   1.07767   1.16314   1.24886   1.31466   1.36220   1.38648   1.39660   1.39992   1.39660   1.38648   1.36220   1.31466   1.24886   1.16314   1.07767   0.94993   0.68813   0.17945   0.00000
               19.00   0.00000   0.21158   0.69145   0.93441   1.14037   1.36129   1.46326   1.54129   1.59776   1.62671   1.63885   1.64286   1.63885   1.62671   1.59776   1.54129   1.46326   1.36129   1.14037   0.93441   0.69145   0.21158   0.00000
               23.00   0.00000   0.20910   0.59777   0.85512   1.07374   1.15249   1.22501   1.28109   1.29859   1.31147   1.31962   1.32233   1.31962   1.31147   1.29859   1.28109   1.22501   1.15249   1.07374   0.85512   0.59777   0.20910   0.00000
               27.00   0.00000   0.19375   0.57493   0.79130   1.01668   1.12077   1.18863   1.24103   1.28075   1.30116   1.30973   1.31259   1.30973   1.30116   1.28075   1.24103   1.18863   1.12077   1.01668   0.79130   0.57493   0.19375   0.00000
               32.00   0.00000   0.19125   0.56267   0.76888   0.96394   1.05992   1.12671   1.17847   1.21620   1.23569   1.24403   1.23701   1.24403   1.23569   1.21620   1.17847   1.12671   1.05992   0.96394   0.76888   0.56267   0.19125   0.00000
               46.00   0.00000   0.18001   0.52011   0.70698   0.87945   0.95436   1.01884   1.07365   1.10368   1.11897   1.12555   1.12772   1.12555   1.11897   1.10368   1.07365   1.01884   0.95436   0.87945   0.70698   0.52011   0.18001   0.00000
               70.00   0.00000   0.10363   0.29580   0.40162   0.49860   0.54040   0.57619   0.60502   0.62613   0.63803   0.64015   0.63970   0.64015   0.63803   0.62613   0.60502   0.57619   0.54040   0.49860   0.40162   0.29580   0.10363   0.00000
              120.00   0.00000  -0.12519  -0.34600  -0.46566  -0.57446  -0.62110  -0.66089  -0.69284  -0.71618  -0.72899  -0.73466  -0.73506  -0.73466  -0.72899  -0.71618  -0.69284  -0.66089  -0.62110  -0.57446  -0.46566  -0.34600  -0.12519   0.00000
              180.00   0.00000  -0.00058  -0.01024  -0.01484  -0.01909  -0.02094  -0.02253  -0.02382  -0.02477  -0.02527  -0.02548  -0.02555  -0.02548  -0.02527  -0.02477  -0.02382  -0.02253  -0.02094  -0.01909  -0.01484  -0.01024  -0.00058   0.00000
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            </tableData>
          </table>
        </function>
      <axis name="DRAG">
        <function name="aero/coefficient/CD_base">
          <description>CD over alpha and beta (hangar)</description>
          <product>
            <property>aero/qbar-psf</property>
            <property>metrics/Sw-sqft</property>
          <table>
            <independentVar lookup="row">aero/alpha-deg</independentVar>
            <independentVar lookup="column">aero/beta-deg</independentVar>
            <tableData>
                        -90.00    -70.00    -50.00    -40.00    -30.00    -25.00    -20.00    -15.00    -10.00     -6.00     -3.00      0.00      3.00      6.00     10.00     15.00     20.00     25.00     30.00     40.00     50.00     70.00     90.00
             -180.00   0.52219   0.38852   0.19428   0.11441   0.05945   0.04193   0.03041   0.02392   0.01925   0.01994   0.02091   0.02128   0.02091   0.01994   0.01925   0.02392   0.03041   0.04193   0.05945   0.11441   0.19428   0.38852   0.52219
             -120.00   0.52219   0.50231   0.64126   0.78811   0.96037   1.04522   1.12288   1.18879   1.23899   1.26559   1.27716   1.28117   1.27716   1.26559   1.23899   1.18879   1.12288   1.04522   0.96037   0.78811   0.64126   0.50231   0.52219
              -70.00   0.52219   0.56786   0.80488   1.00859   1.23601   1.34569   1.44519   1.52915   1.59289   1.62667   1.64127   1.64626   1.64127   1.62667   1.59289   1.52915   1.44519   1.34569   1.23601   1.00859   0.80488   0.56786   0.52219
              -46.00   0.52219   0.54384   0.61671   0.69253   0.78787   0.83898   0.88850   0.93344   0.96449   0.98110   0.98828   0.99070   0.98828   0.98110   0.96449   0.93344   0.88850   0.83898   0.78787   0.69253   0.61671   0.54384   0.52219
              -32.00   0.52219   0.52343   0.48528   0.47597   0.49219   0.51650   0.52571   0.53439   0.54112   0.54206   0.54345   0.54391   0.54345   0.54206   0.54112   0.53439   0.52571   0.51650   0.49219   0.47597   0.48528   0.52343   0.52219
              -22.00   0.52219   0.50946   0.40146   0.34821   0.33000   0.31411   0.30031   0.29073   0.28456   0.28179   0.28084   0.28151   0.28084   0.28179   0.28456   0.29073   0.30031   0.31411   0.33000   0.34821   0.40146   0.50946   0.52219
              -17.00   0.52219   0.50466   0.36544   0.29608   0.26083   0.23461   0.21086   0.19260   0.17989   0.17357   0.17094   0.17007   0.17094   0.17357   0.17989   0.19260   0.21086   0.23461   0.26083   0.29608   0.36544   0.50466   0.52219
              -13.00   0.52219   0.50161   0.34461   0.26519   0.21335   0.18071   0.15219   0.13010   0.11471   0.10707   0.10391   0.10286   0.10391   0.10707   0.11471   0.13010   0.15219   0.18071   0.21335   0.26519   0.34461   0.50161   0.52219
               -9.00   0.52219   0.49829   0.33169   0.24056   0.17755   0.14100   0.10944   0.08500   0.06805   0.05970   0.05627   0.05514   0.05627   0.05970   0.06805   0.08500   0.10944   0.14100   0.17755   0.24056   0.33169   0.49829   0.52219
               -5.00   0.52219   0.49674   0.32372   0.22441   0.15466   0.11613   0.08309   0.05756   0.03997   0.03140   0.02794   0.02682   0.02794   0.03140   0.03997   0.05756   0.08309   0.11613   0.15466   0.22441   0.32372   0.49674   0.52219
               -1.00   0.52219   0.49637   0.32023   0.21756   0.14548   0.10661   0.07344   0.04784   0.03030   0.02186   0.01851   0.01745   0.01851   0.02186   0.03030   0.04784   0.07344   0.10661   0.14548   0.21756   0.32023   0.49637   0.52219
                3.00   0.52219   0.49650   0.32158   0.22059   0.15021   0.11252   0.08044   0.05570   0.03877   0.03060   0.02735   0.02632   0.02735   0.03060   0.03877   0.05570   0.08044   0.11252   0.15021   0.22059   0.32158   0.49650   0.52219
                7.00   0.52219   0.49731   0.32783   0.23414   0.16889   0.13375   0.10401   0.08109   0.06535   0.05770   0.05462   0.05361   0.05462   0.05770   0.06535   0.08109   0.10401   0.13375   0.16889   0.23414   0.32783   0.49731   0.52219
               11.00   0.52219   0.50011   0.33819   0.25637   0.20102   0.17010   0.14415   0.12411   0.11036   0.10364   0.10091   0.10001   0.10091   0.10364   0.11036   0.12411   0.14415   0.17010   0.20102   0.25637   0.33819   0.50011   0.52219
               15.00   0.52219   0.50294   0.35602   0.28662   0.24608   0.22126   0.20057   0.18462   0.17376   0.16848   0.16632   0.16561   0.16632   0.16848   0.17376   0.18462   0.20057   0.22126   0.24608   0.28662   0.35602   0.50294   0.52219
               19.00   0.52219   0.50614   0.37915   0.31870   0.29047   0.28253   0.26841   0.25756   0.25041   0.24701   0.24563   0.24518   0.24563   0.24701   0.25041   0.25756   0.26841   0.28253   0.29047   0.31870   0.37915   0.50614   0.52219
               23.00   0.52219   0.51072   0.40856   0.35855   0.34764   0.33304   0.32124   0.31186   0.30202   0.29847   0.29716   0.29674   0.29716   0.29847   0.30202   0.31186   0.32124   0.33304   0.34764   0.35855   0.40856   0.51072   0.52219
               27.00   0.52219   0.51619   0.43939   0.40205   0.39602   0.40242   0.39812   0.39475   0.39292   0.39218   0.39191   0.39183   0.39191   0.39218   0.39292   0.39475   0.39812   0.40242   0.39602   0.40205   0.43939   0.51619   0.52219
               32.00   0.52219   0.52297   0.48236   0.46968   0.47882   0.50026   0.50636   0.51093   0.51489   0.51707   0.51796   0.51542   0.51796   0.51707   0.51489   0.51093   0.50636   0.50026   0.47882   0.46968   0.48236   0.52297   0.52219
               46.00   0.52219   0.54332   0.61336   0.68671   0.77647   0.82317   0.86757   0.90758   0.93462   0.94888   0.95502   0.95709   0.95502   0.94888   0.93462   0.90758   0.86757   0.82317   0.77647   0.68671   0.61336   0.54332   0.52219
               70.00   0.52219   0.56753   0.80272   1.00495   1.23075   1.33967   1.43848   1.52186   1.58517   1.61871   1.63322   1.63818   1.63322   1.61871   1.58517   1.52186   1.43848   1.33967   1.23075   1.00495   0.80272   0.56753   0.52219
              120.00   0.52219   0.50275   0.64416   0.79301   0.96745   1.05334   1.13192   1.19861   1.24940   1.27631   1.28801   1.29206   1.28801   1.27631   1.24940   1.19861   1.13192   1.05334   0.96745   0.79301   0.64416   0.50275   0.52219
              180.00   0.52219   0.38852   0.19428   0.11441   0.05945   0.04193   0.03041   0.02392   0.01925   0.01994   0.02091   0.02128   0.02091   0.01994   0.01925   0.02392   0.03041   0.04193   0.05945   0.11441   0.19428   0.38852   0.52219
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            </tableData>
          </table>
          </product>
        </function>
        <function name="aero/coefficient/CD_mach">
          <description>zero-lift drag's change with Mach: friction, wave drag</description>
          <product>
            <property>aero/qbar-psf</property>
            <property>metrics/Sw-sqft</property>
            <property>aero/function/mach-dCD0</property>
          </product>
        </function>
        <function name="aero/coefficient/CD_induced_mach">
          <description>induced drag's change with Mach (leading-edge suction lost)</description>
          <product>
            <property>aero/qbar-psf</property>
            <property>metrics/Sw-sqft</property>
            <property>aero/cl-squared</property>
            <property>aero/function/mach-dK</property>
          </product>
        </function>
        <function name="aero/coefficient/CD_aileron">
          <description>CD increment from aileron (deg), over alpha</description>
          <product>
            <property>aero/qbar-psf</property>
            <property>metrics/Sw-sqft</property>
            <property>aero/function/mach-aileron</property>
          <table>
            <independentVar lookup="row">aero/alpha-deg</independentVar>
            <independentVar lookup="column">fcs/left-aileron-pos-deg</independentVar>
            <tableData>
                        -23.00    -20.00    -15.00    -10.00     -5.00      0.00      5.00     10.00     15.00     20.00     23.00
             -180.00   0.00499   0.00382   0.00219   0.00098   0.00025   0.00000   0.00025   0.00098   0.00219   0.00382   0.00499
             -120.00   0.00497   0.00381   0.00218   0.00098   0.00025   0.00000   0.00025   0.00098   0.00218   0.00381   0.00497
              -70.00   0.00497   0.00381   0.00218   0.00098   0.00025   0.00000   0.00025   0.00098   0.00218   0.00381   0.00497
              -46.00   0.00957   0.00762   0.00469   0.00227   0.00060   0.00000   0.00060   0.00227   0.00469   0.00762   0.00957
              -32.00   0.01729   0.01411   0.00900   0.00448   0.00120   0.00000   0.00120   0.00448   0.00900   0.01411   0.01729
              -22.00   0.01591   0.01291   0.00810   0.00363   0.00090   0.00000   0.00090   0.00363   0.00810   0.01291   0.01591
              -17.00   0.00854   0.00690   0.00436   0.00213   0.00056   0.00000   0.00056   0.00213   0.00436   0.00690   0.00854
              -13.00   0.01352   0.01129   0.00756   0.00391   0.00107   0.00000   0.00107   0.00391   0.00756   0.01129   0.01352
               -9.00   0.01400   0.01170   0.00785   0.00409   0.00112   0.00000   0.00112   0.00409   0.00785   0.01170   0.01400
               -5.00   0.01420   0.01188   0.00798   0.00415   0.00114   0.00000   0.00114   0.00415   0.00798   0.01188   0.01420
               -1.00   0.01429   0.01195   0.00803   0.00418   0.00115   0.00000   0.00115   0.00418   0.00803   0.01195   0.01429
                3.00   0.01429   0.01195   0.00803   0.00418   0.00115   0.00000   0.00115   0.00418   0.00803   0.01195   0.01429
                7.00   0.01419   0.01186   0.00797   0.00415   0.00114   0.00000   0.00114   0.00415   0.00797   0.01186   0.01419
               11.00   0.01397   0.01167   0.00783   0.00407   0.00112   0.00000   0.00112   0.00407   0.00783   0.01167   0.01397
               15.00   0.01564   0.01301   0.00859   0.00434   0.00115   0.00000   0.00115   0.00434   0.00859   0.01301   0.01564
               19.00   0.02763   0.02375   0.01675   0.00913   0.00259   0.00000   0.00259   0.00913   0.01675   0.02375   0.02763
               23.00   0.03203   0.02699   0.01865   0.00841   0.00210   0.00000   0.00210   0.00841   0.01865   0.02699   0.03203
               27.00   0.02428   0.01984   0.01281   0.00644   0.00174   0.00000   0.00174   0.00644   0.01281   0.01984   0.02428
               32.00   0.02502   0.02090   0.01442   0.00862   0.00160   0.00000   0.00160   0.00862   0.01442   0.02090   0.02502
               46.00   0.01052   0.00840   0.00521   0.00253   0.00067   0.00000   0.00067   0.00253   0.00521   0.00840   0.01052
               70.00   0.00497   0.00381   0.00218   0.00098   0.00025   0.00000   0.00025   0.00098   0.00218   0.00381   0.00497
              120.00   0.00497   0.00381   0.00218   0.00098   0.00025   0.00000   0.00025   0.00098   0.00218   0.00381   0.00497
              180.00   0.00499   0.00382   0.00219   0.00098   0.00025   0.00000   0.00025   0.00098   0.00219   0.00382   0.00499
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            </tableData>
          </table>
          </product>
        </function>
        <function name="aero/coefficient/CD_elevator">
          <description>CD increment from elevator (deg), over alpha</description>
          <product>
            <property>aero/qbar-psf</property>
            <property>metrics/Sw-sqft</property>
            <property>aero/function/mach-elevator</property>
          <table>
            <independentVar lookup="row">aero/alpha-deg</independentVar>
            <independentVar lookup="column">fcs/elevator-pos-deg</independentVar>
            <tableData>
                        -25.00    -20.00    -15.00    -10.00     -5.00      0.00      5.00     10.00     15.00
             -180.00   0.00575   0.00377   0.00216   0.00097   0.00024   0.00000   0.00024   0.00097   0.00216
             -120.00   0.00574   0.00376   0.00215   0.00097   0.00024   0.00000   0.00024   0.00097   0.00215
              -70.00   0.00573   0.00376   0.00215   0.00097   0.00024   0.00000   0.00024   0.00097   0.00215
              -46.00   0.00423   0.00257   0.00119   0.00013  -0.00037   0.00000   0.00144   0.00392   0.00715
              -32.00   0.02424   0.02008   0.01566   0.01058   0.00497   0.00000  -0.00307  -0.00368  -0.00218
              -22.00   0.04672   0.04048   0.03282   0.02298   0.01142   0.00000  -0.00971  -0.01670  -0.02062
              -17.00   0.04025   0.03427   0.02733   0.01877   0.00909   0.00000  -0.00716  -0.01174  -0.01376
              -13.00   0.03488   0.02936   0.02310   0.01558   0.00736   0.00000  -0.00537  -0.00831  -0.00908
               -9.00   0.02906   0.02406   0.01853   0.01216   0.00552   0.00000  -0.00347  -0.00472  -0.00419
               -5.00   0.02280   0.01836   0.01365   0.00851   0.00356   0.00000  -0.00149  -0.00097   0.00089
               -1.00   0.01622   0.01240   0.00856   0.00472   0.00154   0.00000   0.00054   0.00286   0.00605
                3.00   0.00949   0.00632   0.00339   0.00089  -0.00050   0.00000   0.00258   0.00667   0.01118
                7.00   0.00278   0.00028  -0.00174  -0.00290  -0.00251   0.00000   0.00456   0.01037   0.01613
               11.00  -0.00377  -0.00560  -0.00671  -0.00656  -0.00444   0.00000   0.00645   0.01388   0.02081
               15.00  -0.00996  -0.01114  -0.01138  -0.01000  -0.00624   0.00000   0.00819   0.01710   0.02509
               19.00  -0.01519  -0.01623  -0.01563  -0.01306  -0.00782   0.00000   0.00966   0.01979   0.02867
               23.00  -0.02577  -0.02468  -0.02237  -0.01777  -0.01017   0.00000   0.01177   0.02364   0.03383
               27.00  -0.03120  -0.02971  -0.02671  -0.02102  -0.01191   0.00000   0.01346   0.02668   0.03774
               32.00  -0.00169  -0.00494  -0.00754  -0.00861  -0.00656   0.00000   0.01138   0.02647   0.04022
               46.00   0.01579   0.01138   0.00739   0.00392   0.00133   0.00000  -0.00001   0.00105   0.00271
               70.00   0.00573   0.00376   0.00215   0.00097   0.00024   0.00000   0.00024   0.00097   0.00215
              120.00   0.00574   0.00376   0.00215   0.00097   0.00024   0.00000   0.00024   0.00097   0.00215
              180.00   0.00575   0.00377   0.00216   0.00097   0.00024   0.00000   0.00024   0.00097   0.00216
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            </tableData>
          </table>
          </product>
        </function>
        <function name="aero/coefficient/CD_flap">
          <description>CD increment from flap (deg), over alpha</description>
          <product>
            <property>aero/qbar-psf</property>
            <property>metrics/Sw-sqft</property>
            <property>aero/function/mach-flap</property>
          <table>
            <independentVar lookup="row">aero/alpha-deg</independentVar>
            <independentVar lookup="column">fcs/flap-pos-deg</independentVar>
            <tableData>
                          0.00      5.00     10.00     15.00     20.00     25.00     30.00     35.00     40.00
             -180.00   0.00000   0.00037   0.00146   0.00324   0.00565   0.00863   0.01208   0.01590   0.01997
             -120.00   0.00000   0.00037   0.00145   0.00323   0.00564   0.00861   0.01206   0.01587   0.01993
              -70.00   0.00000   0.00037   0.00145   0.00323   0.00564   0.00861   0.01205   0.01586   0.01992
              -46.00   0.00000   0.01103   0.02476   0.04074   0.05836   0.07718   0.09707   0.11802   0.13589
              -32.00   0.00000   0.01122   0.02846   0.05082   0.07681   0.10513   0.13286   0.15531   0.17722
              -22.00   0.00000   0.00014   0.00367  -0.02181  -0.04273  -0.05695  -0.06573  -0.06974  -0.06944
              -17.00   0.00000  -0.01750  -0.03045  -0.03837  -0.04169  -0.04128  -0.03801  -0.03244  -0.02484
              -13.00   0.00000  -0.01220  -0.01986  -0.02277  -0.02147  -0.01689  -0.00982  -0.00067   0.01045
               -9.00   0.00000  -0.00712  -0.00960  -0.00751  -0.00166   0.00698   0.01773   0.03034   0.04483
               -5.00   0.00000  -0.00202   0.00064   0.00762   0.01791   0.03048   0.04476   0.06066   0.07833
               -1.00   0.00000   0.00307   0.01083   0.02261   0.03720   0.05356   0.07123   0.09026   0.11095
                3.00   0.00000   0.00822   0.02108   0.03763   0.05648   0.07656   0.09752   0.11959   0.14318
                7.00   0.00000   0.01343   0.03143   0.05276   0.07584   0.09960   0.12382   0.14890   0.17546
               11.00   0.00000   0.01856   0.04156   0.06750   0.09470   0.12223   0.15011   0.17889   0.20933
               15.00   0.00000   0.02358   0.05171   0.08287   0.11533   0.14798   0.18059   0.21380   0.24854
               19.00   0.00000   0.02961   0.06469   0.10218   0.13954   0.17579   0.21144   0.24762   0.28550
               23.00   0.00000   0.01229   0.03708   0.07607   0.12822   0.18408   0.23597   0.28572   0.33536
               27.00   0.00000   0.00377   0.01705   0.03872   0.06672   0.09924   0.13566   0.17771   0.22568
               32.00   0.00000  -0.00171   0.00586   0.02347   0.04567   0.06930   0.09485   0.12233   0.15161
               46.00   0.00000  -0.00853  -0.01407  -0.01674  -0.01697  -0.01530  -0.01216  -0.00784  -0.00250
               70.00   0.00000   0.00037   0.00145   0.00323   0.00564   0.00861   0.01205   0.01586   0.01992
              120.00   0.00000   0.00037   0.00145   0.00323   0.00564   0.00861   0.01206   0.01587   0.01993
              180.00   0.00000   0.00037   0.00146   0.00324   0.00565   0.00863   0.01208   0.01590   0.01997
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            </tableData>
          </table>
          </product>
        </function>
        <function name="aero/coefficient/CD_rudder">
          <description>CD increment from rudder (deg), over alpha</description>
          <product>
            <property>aero/qbar-psf</property>
            <property>metrics/Sw-sqft</property>
            <property>aero/function/mach-rudder</property>
          <table>
            <independentVar lookup="row">aero/alpha-deg</independentVar>
            <independentVar lookup="column">fcs/rudder-pos-deg</independentVar>
            <tableData>
                        -25.00    -20.00    -15.00    -10.00     -5.00      0.00      5.00     10.00     15.00     20.00     25.00
             -180.00   0.00341   0.00223   0.00128   0.00058   0.00014   0.00000   0.00014   0.00058   0.00128   0.00223   0.00341
             -120.00   0.00043   0.00028   0.00016   0.00007   0.00002   0.00000   0.00002   0.00007   0.00016   0.00028   0.00043
              -70.00   0.00015   0.00010   0.00006   0.00003   0.00001   0.00000   0.00001   0.00003   0.00006   0.00010   0.00015
              -46.00   0.00298   0.00224   0.00151   0.00079   0.00021   0.00000   0.00021   0.00079   0.00151   0.00224   0.00298
              -32.00   0.00883   0.00726   0.00343   0.00171   0.00047   0.00000   0.00047   0.00171   0.00343   0.00726   0.00883
              -22.00   0.00721   0.00542   0.00364   0.00189   0.00052   0.00000   0.00052   0.00189   0.00364   0.00542   0.00721
              -17.00   0.00794   0.00597   0.00401   0.00209   0.00057   0.00000   0.00057   0.00209   0.00401   0.00597   0.00794
              -13.00   0.00840   0.00632   0.00424   0.00221   0.00061   0.00000   0.00061   0.00221   0.00424   0.00632   0.00840
               -9.00   0.00874   0.00657   0.00441   0.00230   0.00063   0.00000   0.00063   0.00230   0.00441   0.00657   0.00874
               -5.00   0.00896   0.00674   0.00452   0.00235   0.00065   0.00000   0.00065   0.00235   0.00452   0.00674   0.00896
               -1.00   0.00905   0.00680   0.00457   0.00238   0.00065   0.00000   0.00065   0.00238   0.00457   0.00680   0.00905
                3.00   0.00900   0.00677   0.00454   0.00236   0.00065   0.00000   0.00065   0.00236   0.00454   0.00677   0.00900
                7.00   0.00883   0.00663   0.00445   0.00232   0.00064   0.00000   0.00064   0.00232   0.00445   0.00663   0.00883
               11.00   0.00853   0.00641   0.00430   0.00224   0.00061   0.00000   0.00061   0.00224   0.00430   0.00641   0.00853
               15.00   0.00811   0.00609   0.00409   0.00213   0.00058   0.00000   0.00058   0.00213   0.00409   0.00609   0.00811
               19.00   0.00759   0.00570   0.00382   0.00199   0.00055   0.00000   0.00055   0.00199   0.00382   0.00570   0.00759
               23.00   0.00697   0.00524   0.00351   0.00183   0.00050   0.00000   0.00050   0.00183   0.00351   0.00524   0.00697
               27.00   0.00624   0.00468   0.00314   0.00163   0.00045   0.00000   0.00045   0.00163   0.00314   0.00468   0.00624
               32.00   0.00820   0.00684   0.00548   0.00416   0.00313   0.00000   0.00313   0.00416   0.00548   0.00684   0.00820
               46.00   0.00278   0.00208   0.00140   0.00073   0.00020   0.00000   0.00020   0.00073   0.00140   0.00208   0.00278
               70.00   0.00015   0.00010   0.00006   0.00003   0.00001   0.00000   0.00001   0.00003   0.00006   0.00010   0.00015
              120.00   0.00043   0.00028   0.00016   0.00007   0.00002   0.00000   0.00002   0.00007   0.00016   0.00028   0.00043
              180.00   0.00341   0.00223   0.00128   0.00058   0.00014   0.00000   0.00014   0.00058   0.00128   0.00223   0.00341
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            </tableData>
          </table>
          </product>
        </function>
        <function name="aero/coefficient/CD_ground">
          <description>Induced drag change in ground effect</description>
          <product>
            <property>aero/qbar-psf</property>
            <property>metrics/Sw-sqft</property>
            <property>aero/cl-squared</property>
            <value>0.05869</value>
          <table>
            <independentVar lookup="row">aero/h_b-mac-ft</independentVar>
            <tableData>
                    0.00   -1.00000
                    0.10   -0.28090
                    0.15   -0.14793
                    0.20   -0.08897
                    0.30   -0.04160
                    0.40   -0.02383
                    0.50   -0.01538
                    0.60   -0.01073
                    0.70   -0.00791
                    0.80   -0.00607
                    0.90   -0.00480
                    1.00   -0.00389
                    1.10   -0.00322
            </tableData>
          </table>
          </product>
        </function>
        <function name="aero/coefficient/CD_airbrakes">
          <description>airbrakes: drag of its airbrake plates, 1.55 m2 opened to 60 deg (hangar)</description>
          <product>
            <property>aero/qbar-psf</property>
            <property>metrics/Sw-sqft</property>
            <value>0.0621747</value>
            <pow>
              <sin>
                <product>
                  <property>fcs/speedbrake-pos-norm</property>
                  <value>1.0472</value>
                </product>
              </sin>
              <value>2</value>
            </pow>
          </product>
        </function>
        <function name="aero/coefficient/CD_gear">
          <description>the gear extended: its wheels' and struts' drag by Raymer's components, 0.379 m2 (hangar)</description>
          <product>
            <property>aero/qbar-psf</property>
            <property>metrics/Sw-sqft</property>
            <value>0.0126491</value>
            <property>gear/gear-pos-norm</property>
          </product>
        </function>
      </axis>
      <axis name="SIDE">
        <function name="aero/coefficient/CY_base">
          <description>CY over alpha and beta (hangar)</description>
          <product>
            <property>aero/qbar-psf</property>
            <property>metrics/Sw-sqft</property>
            <property>aero/function/mach-side</property>
          <table>
            <independentVar lookup="row">aero/alpha-deg</independentVar>
            <independentVar lookup="column">aero/beta-deg</independentVar>
            <tableData>
                        -90.00    -70.00    -50.00    -40.00    -30.00    -25.00    -20.00    -15.00    -10.00     -6.00     -3.00      0.00      3.00      6.00     10.00     15.00     20.00     25.00     30.00     40.00     50.00     70.00     90.00
             -180.00  -0.00000   0.14695   0.15992   0.12417   0.07705   0.05391   0.03338   0.01688   0.03156   0.04743   0.02520  -0.00000  -0.02520  -0.04743  -0.03156  -0.01688  -0.03338  -0.05391  -0.07705  -0.12417  -0.15992  -0.14695   0.00000
             -120.00  -0.00000  -0.04935  -0.24891  -0.32301  -0.33851  -0.31932  -0.28199  -0.22808  -0.16037  -0.09649  -0.03824  -0.00000   0.03824   0.09649   0.16037   0.22808   0.28199   0.31932   0.33851   0.32301   0.24891   0.04935   0.00000
              -70.00   0.00000  -0.08148  -0.31988  -0.40307  -0.41528  -0.38922  -0.34150  -0.27366  -0.18818  -0.10608  -0.04897  -0.00000   0.04897   0.10608   0.18818   0.27366   0.34150   0.38922   0.41528   0.40307   0.31988   0.08148  -0.00000
              -46.00   0.00000   0.02683  -0.06621  -0.11162  -0.13170  -0.12494  -0.10296  -0.05137  -0.04015  -0.02633  -0.01317  -0.00000   0.01317   0.02633   0.04015   0.05137   0.10296   0.12494   0.13170   0.11162   0.06621  -0.02683  -0.00000
              -32.00   0.00000   0.09674   0.09376   0.06480   0.04983   0.07164   0.04944   0.03026   0.01709   0.00953   0.00452  -0.00000  -0.00452  -0.00953  -0.01709  -0.03026  -0.04944  -0.07164  -0.04983  -0.06480  -0.09376  -0.09674  -0.00000
              -22.00   0.00000   0.13809   0.18416   0.16390   0.17309   0.14516   0.11287   0.08047   0.04856   0.02434   0.01161  -0.00000  -0.01161  -0.02434  -0.04856  -0.08047  -0.11287  -0.14516  -0.17309  -0.16390  -0.18416  -0.13809  -0.00000
              -17.00   0.00000   0.15664   0.22348   0.22052   0.23541   0.20587   0.16800   0.12607   0.08327   0.04942   0.02452  -0.00000  -0.02452  -0.04942  -0.08327  -0.12607  -0.16800  -0.20587  -0.23541  -0.22052  -0.22348  -0.15664  -0.00000
              -13.00   0.00000   0.17067   0.26039   0.24987   0.26092   0.22982   0.18778   0.14103   0.09312   0.05519   0.02736  -0.00000  -0.02736  -0.05519  -0.09312  -0.14103  -0.18778  -0.22982  -0.26092  -0.24987  -0.26039  -0.17067  -0.00000
               -9.00   0.00000   0.18689   0.27543   0.26776   0.27628   0.24401   0.19937   0.14951   0.09843   0.05814   0.02874  -0.00000  -0.02874  -0.05814  -0.09843  -0.14951  -0.19937  -0.24401  -0.27628  -0.26776  -0.27543  -0.18689  -0.00000
               -5.00   0.00000   0.19454   0.28255   0.27785   0.28372   0.25074   0.20485   0.15323   0.10042   0.05897   0.02899  -0.00000  -0.02899  -0.05897  -0.10042  -0.15323  -0.20485  -0.25074  -0.28372  -0.27785  -0.28255  -0.19454  -0.00000
               -1.00   0.00000   0.19593   0.28537   0.28030   0.28417   0.25122   0.20535   0.15328   0.09999   0.05830   0.02837  -0.00000  -0.02837  -0.05830  -0.09999  -0.15328  -0.20535  -0.25122  -0.28417  -0.28030  -0.28537  -0.19593  -0.00000
                3.00   0.00000   0.19550   0.28254   0.27495   0.27796   0.24595   0.20146   0.15041   0.09823   0.05742   0.02806  -0.00000  -0.02806  -0.05742  -0.09823  -0.15041  -0.20146  -0.24595  -0.27796  -0.27495  -0.28254  -0.19550  -0.00000
                7.00   0.00000   0.19182   0.27600   0.26328   0.26504   0.23469   0.19285   0.14423   0.09453   0.05555   0.02731  -0.00000  -0.02731  -0.05555  -0.09453  -0.14423  -0.19285  -0.23469  -0.26504  -0.26328  -0.27600  -0.19182  -0.00000
               11.00   0.00000   0.17612   0.26558   0.24521   0.24527   0.21681   0.17865   0.13372   0.08778   0.05174   0.02552  -0.00000  -0.02552  -0.05174  -0.08778  -0.13372  -0.17865  -0.21681  -0.24527  -0.24521  -0.26558  -0.17612  -0.00000
               15.00   0.00000   0.16219   0.23672   0.21999   0.21870   0.19175   0.15818   0.11821   0.07750   0.04570   0.02257  -0.00000  -0.02257  -0.04570  -0.07750  -0.11821  -0.15818  -0.19175  -0.21870  -0.21999  -0.23672  -0.16219  -0.00000
               19.00   0.00000   0.14799   0.20614   0.18809   0.19307   0.16033   0.13100   0.09720   0.06329   0.03719   0.01832  -0.00000  -0.01832  -0.03719  -0.06329  -0.09720  -0.13100  -0.16033  -0.19307  -0.18809  -0.20614  -0.14799  -0.00000
               23.00   0.00000   0.13424   0.17864   0.15955   0.17347   0.14149   0.11006   0.08000   0.05397   0.03242   0.01599  -0.00000  -0.01599  -0.03242  -0.05397  -0.08000  -0.11006  -0.14149  -0.17347  -0.15955  -0.17864  -0.13424  -0.00000
               27.00   0.00000   0.11927   0.14572   0.12560   0.11526   0.11842   0.09077   0.06524   0.04219   0.02480   0.01228  -0.00000  -0.01228  -0.02480  -0.04219  -0.06524  -0.09077  -0.11842  -0.11526  -0.12560  -0.14572  -0.11927  -0.00000
               32.00   0.00000   0.09786   0.09758   0.07203   0.05611   0.08094   0.05974   0.03920   0.02317   0.01289   0.00592  -0.00000  -0.00592  -0.01289  -0.02317  -0.03920  -0.05974  -0.08094  -0.05611  -0.07203  -0.09758  -0.09786  -0.00000
               46.00   0.00000   0.02819  -0.06226  -0.10657  -0.12410  -0.11645  -0.09466  -0.04264  -0.03112  -0.02067  -0.01028  -0.00000   0.01028   0.02067   0.03112   0.04264   0.09466   0.11645   0.12410   0.10657   0.06226  -0.02819  -0.00000
               70.00   0.00000  -0.08059  -0.31732  -0.40003  -0.41226  -0.38642  -0.33906  -0.27171  -0.18682  -0.10525  -0.04855  -0.00000   0.04855   0.10525   0.18682   0.27171   0.33906   0.38642   0.41226   0.40003   0.31732   0.08059  -0.00000
              120.00  -0.00000  -0.05055  -0.25236  -0.32712  -0.34259  -0.32310  -0.28528  -0.23071  -0.16220  -0.09762  -0.03880  -0.00000   0.03880   0.09762   0.16220   0.23071   0.28528   0.32310   0.34259   0.32712   0.25236   0.05055   0.00000
              180.00  -0.00000   0.14695   0.15992   0.12417   0.07705   0.05391   0.03338   0.01688   0.03156   0.04743   0.02520  -0.00000  -0.02520  -0.04743  -0.03156  -0.01688  -0.03338  -0.05391  -0.07705  -0.12417  -0.15992  -0.14695   0.00000
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            </tableData>
          </table>
          </product>
        </function>
        <function name="aero/coefficient/CY_aileron">
          <description>CY increment from aileron (deg), over alpha</description>
          <product>
            <property>aero/qbar-psf</property>
            <property>metrics/Sw-sqft</property>
            <property>aero/function/mach-aileron</property>
          <table>
            <independentVar lookup="row">aero/alpha-deg</independentVar>
            <independentVar lookup="column">fcs/left-aileron-pos-deg</independentVar>
            <tableData>
                        -23.00    -20.00    -15.00    -10.00     -5.00      0.00      5.00     10.00     15.00     20.00     23.00
             -180.00   0.00000   0.00000   0.00000   0.00000   0.00000   0.00000   0.00000   0.00000   0.00000   0.00000   0.00000
             -120.00  -0.00067  -0.00062  -0.00053  -0.00039  -0.00021   0.00000   0.00021   0.00039   0.00053   0.00062   0.00067
              -70.00   0.00017   0.00016   0.00014   0.00010   0.00005   0.00000  -0.00005  -0.00010  -0.00014  -0.00016  -0.00017
              -46.00   0.00119   0.00114   0.00101   0.00077   0.00042   0.00000  -0.00042  -0.00077  -0.00101  -0.00114  -0.00119
              -32.00   0.00293   0.00282   0.00252   0.00196   0.00108   0.00000  -0.00108  -0.00196  -0.00252  -0.00282  -0.00293
              -22.00  -0.01838  -0.01815  -0.01752  -0.01610  -0.00313   0.00000   0.00313   0.01610   0.01752   0.01815   0.01838
              -17.00   0.00350   0.00334   0.00291   0.00218   0.00115   0.00000  -0.00115  -0.00218  -0.00291  -0.00334  -0.00350
              -13.00   0.00856   0.00807   0.00693   0.00517   0.00276   0.00000  -0.00276  -0.00517  -0.00693  -0.00807  -0.00856
               -9.00   0.00933   0.00879   0.00755   0.00563   0.00301   0.00000  -0.00301  -0.00563  -0.00755  -0.00879  -0.00933
               -5.00   0.00995   0.00938   0.00805   0.00601   0.00321   0.00000  -0.00321  -0.00601  -0.00805  -0.00938  -0.00995
               -1.00   0.01042   0.00982   0.00843   0.00629   0.00335   0.00000  -0.00335  -0.00629  -0.00843  -0.00982  -0.01042
                3.00   0.01086   0.01024   0.00879   0.00657   0.00351   0.00000  -0.00351  -0.00657  -0.00879  -0.01024  -0.01086
                7.00   0.01110   0.01047   0.00900   0.00672   0.00359   0.00000  -0.00359  -0.00672  -0.00900  -0.01047  -0.01110
               11.00   0.01088   0.01027   0.00883   0.00660   0.00352   0.00000  -0.00352  -0.00660  -0.00883  -0.01027  -0.01088
               15.00   0.01119   0.01050   0.00891   0.00653   0.00341   0.00000  -0.00341  -0.00653  -0.00891  -0.01050  -0.01119
               19.00   0.01170   0.01111   0.00970   0.00744   0.00409   0.00000  -0.00409  -0.00744  -0.00970  -0.01111  -0.01170
               23.00   0.01951   0.01848   0.01638   0.00998   0.00405   0.00000  -0.00405  -0.00998  -0.01638  -0.01848  -0.01951
               27.00   0.00361   0.00340   0.00292   0.00219   0.00117   0.00000  -0.00117  -0.00219  -0.00292  -0.00340  -0.00361
               32.00  -0.00122  -0.00090  -0.00032   0.00036  -0.00080   0.00000   0.00080  -0.00036   0.00032   0.00090   0.00122
               46.00  -0.00200  -0.00180  -0.00143  -0.00101  -0.00052   0.00000   0.00052   0.00101   0.00143   0.00180   0.00200
               70.00   0.00025   0.00023   0.00020   0.00015   0.00008   0.00000  -0.00008  -0.00015  -0.00020  -0.00023  -0.00025
              120.00  -0.00059  -0.00055  -0.00047  -0.00035  -0.00018   0.00000   0.00018   0.00035   0.00047   0.00055   0.00059
              180.00   0.00000   0.00000   0.00000   0.00000   0.00000   0.00000   0.00000   0.00000   0.00000   0.00000   0.00000
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            </tableData>
          </table>
          </product>
        </function>
        <function name="aero/coefficient/CY_rudder">
          <description>CY increment from rudder (deg), over alpha</description>
          <product>
            <property>aero/qbar-psf</property>
            <property>metrics/Sw-sqft</property>
            <property>aero/function/mach-rudder</property>
          <table>
            <independentVar lookup="row">aero/alpha-deg</independentVar>
            <independentVar lookup="column">fcs/rudder-pos-deg</independentVar>
            <tableData>
                        -25.00    -20.00    -15.00    -10.00     -5.00      0.00      5.00     10.00     15.00     20.00     25.00
             -180.00   0.00000   0.00000   0.00000   0.00000   0.00000   0.00000   0.00000   0.00000   0.00000   0.00000   0.00000
             -120.00   0.00000   0.00000   0.00000   0.00000   0.00000   0.00000   0.00000   0.00000   0.00000   0.00000   0.00000
              -70.00  -0.01528  -0.01378  -0.01171  -0.00868  -0.00461   0.00000   0.00461   0.00868   0.01171   0.01378   0.01527
              -46.00  -0.04551  -0.04112  -0.03500  -0.02593  -0.01372   0.00000   0.01372   0.02593   0.03500   0.04112   0.04551
              -32.00  -0.03926  -0.03524  -0.03042  -0.02259  -0.01202   0.00000   0.01202   0.02259   0.03042   0.03524   0.03926
              -22.00  -0.05008  -0.04494  -0.03800  -0.02806  -0.01490   0.00000   0.01490   0.02806   0.03800   0.04494   0.05008
              -17.00  -0.05501  -0.04941  -0.04183  -0.03091  -0.01641   0.00000   0.01641   0.03091   0.04183   0.04941   0.05501
              -13.00  -0.05766  -0.05179  -0.04384  -0.03239  -0.01720   0.00000   0.01720   0.03239   0.04384   0.05179   0.05766
               -9.00  -0.05964  -0.05356  -0.04534  -0.03350  -0.01778   0.00000   0.01778   0.03350   0.04534   0.05356   0.05964
               -5.00  -0.06093  -0.05472  -0.04632  -0.03422  -0.01817   0.00000   0.01817   0.03422   0.04632   0.05472   0.06093
               -1.00  -0.06153  -0.05526  -0.04678  -0.03457  -0.01836   0.00000   0.01836   0.03457   0.04678   0.05526   0.06153
                3.00  -0.06146  -0.05520  -0.04673  -0.03454  -0.01835   0.00000   0.01835   0.03454   0.04673   0.05520   0.06146
                7.00  -0.06080  -0.05460  -0.04622  -0.03415  -0.01814   0.00000   0.01814   0.03415   0.04622   0.05460   0.06080
               11.00  -0.05951  -0.05344  -0.04523  -0.03342  -0.01775   0.00000   0.01775   0.03342   0.04523   0.05344   0.05951
               15.00  -0.05759  -0.05170  -0.04375  -0.03232  -0.01716   0.00000   0.01716   0.03232   0.04375   0.05170   0.05759
               19.00  -0.05491  -0.04929  -0.04170  -0.03079  -0.01635   0.00000   0.01635   0.03079   0.04170   0.04929   0.05491
               23.00  -0.05180  -0.04650  -0.03933  -0.02905  -0.01542   0.00000   0.01542   0.02905   0.03933   0.04650   0.05180
               27.00  -0.04855  -0.04360  -0.03690  -0.02726  -0.01447   0.00000   0.01447   0.02726   0.03690   0.04360   0.04855
               32.00  -0.04135  -0.03689  -0.03086  -0.02225  -0.01086   0.00000   0.01086   0.02225   0.03086   0.03689   0.04135
               46.00  -0.04751  -0.04287  -0.03643  -0.02690  -0.01421   0.00000   0.01421   0.02690   0.03643   0.04287   0.04751
               70.00  -0.01528  -0.01378  -0.01171  -0.00868  -0.00461   0.00000   0.00461   0.00868   0.01171   0.01378   0.01527
              120.00   0.00000   0.00000   0.00000   0.00000   0.00000   0.00000   0.00000   0.00000   0.00000   0.00000   0.00000
              180.00   0.00000   0.00000   0.00000   0.00000   0.00000   0.00000   0.00000   0.00000   0.00000   0.00000   0.00000
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            </tableData>
          </table>
          </product>
        </function>
        <function name="aero/coefficient/CYp">
          <description>CY per p (non-dimensional), over alpha</description>
          <product>
            <property>aero/qbar-psf</property>
            <property>metrics/Sw-sqft</property>
            <property>aero/bi2vel</property>
            <property>velocities/p-aero-rad_sec</property>
            <property>aero/function/mach-lift</property>
          <table>
            <independentVar lookup="row">aero/alpha-deg</independentVar>
            <tableData>
                 -180.00   -0.05620
                 -165.00   -0.11164
                 -105.00    0.02276
                  -60.00   -0.02281
                  -42.00   -0.07225
                  -30.00   -0.12178
                  -20.00   -1.12185
                  -16.00    0.02842
                  -12.00    0.07624
                   -8.00    0.07933
                   -4.00    0.08264
                    0.00    0.08618
                    4.00    0.09410
                    8.00    0.09692
                   12.00    0.09075
                   16.00    0.05044
                   20.00   -1.22333
                   24.00   -0.16204
                   28.00   -0.01664
                   35.00    0.06279
                   50.00   -0.00891
                   80.00    0.03310
                  135.00   -0.05192
                  180.00   -0.05620
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            </tableData>
          </table>
          </product>
        </function>
        <function name="aero/coefficient/CYr">
          <description>CY per r (non-dimensional), over alpha</description>
          <product>
            <property>aero/qbar-psf</property>
            <property>metrics/Sw-sqft</property>
            <property>aero/bi2vel</property>
            <property>velocities/r-aero-rad_sec</property>
            <property>aero/function/mach-lift</property>
          <table>
            <independentVar lookup="row">aero/alpha-deg</independentVar>
            <tableData>
                 -180.00    0.46271
                 -165.00    0.43039
                 -105.00    0.08097
                  -60.00    0.20408
                  -42.00    0.20928
                  -30.00    0.26184
                  -20.00    0.86190
                  -16.00    0.19821
                  -12.00    0.19129
                   -8.00    0.19674
                   -4.00    0.20005
                    0.00    0.19945
                    4.00    0.18667
                    8.00    0.17198
                   12.00    0.15661
                   16.00    0.13186
                   20.00   -0.02914
                   24.00    0.06019
                   28.00    0.13279
                   35.00    0.17852
                   50.00    0.20175
                   80.00    0.04102
                  135.00    0.31239
                  180.00    0.46271
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            </tableData>
          </table>
          </product>
        </function>
      </axis>
      <axis name="LIFT">
        <function name="aero/coefficient/CL_base">
          <description>CL over alpha and beta, ground effect, compressibility (hangar)</description>
          <product>
            <property>aero/qbar-psf</property>
            <property>metrics/Sw-sqft</property>
            <property>aero/function/CL-base</property>
            <property>aero/function/mach-lift</property>
          <table>
            <independentVar lookup="row">aero/h_b-mac-ft</independentVar>
            <tableData>
                    0.00    1.20000
                    0.10    1.08692
                    0.15    1.05730
                    0.20    1.03778
                    0.30    1.01642
                    0.40    1.00713
                    0.50    1.00310
                    0.60    1.00135
                    0.70    1.00059
                    0.80    1.00025
                    0.90    1.00011
                    1.00    1.00005
                    1.10    1.00000
            </tableData>
          </table>
          </product>
        </function>
        <function name="aero/coefficient/CL_elevator">
          <description>CL increment from elevator (deg), over alpha</description>
          <product>
            <property>aero/qbar-psf</property>
            <property>metrics/Sw-sqft</property>
            <property>aero/function/mach-elevator</property>
          <table>
            <independentVar lookup="row">aero/alpha-deg</independentVar>
            <independentVar lookup="column">fcs/elevator-pos-deg</independentVar>
            <tableData>
                        -25.00    -20.00    -15.00    -10.00     -5.00      0.00      5.00     10.00     15.00
             -180.00   0.00000   0.00000   0.00000   0.00000   0.00000   0.00000   0.00000   0.00000   0.00000
             -120.00  -0.02373  -0.02140  -0.01819  -0.01348  -0.00717   0.00000   0.00717   0.01348   0.01819
              -70.00  -0.00922  -0.00840  -0.00724  -0.00547  -0.00298   0.00000   0.00315   0.00607   0.00834
              -46.00  -0.03256  -0.03027  -0.02657  -0.02039  -0.01123   0.00000   0.01183   0.02249   0.03028
              -32.00  -0.04594  -0.04386  -0.03981  -0.03192  -0.01841   0.00000   0.02064   0.03989   0.05442
              -22.00  -0.09309  -0.08401  -0.07138  -0.05309  -0.02854   0.00000   0.02962   0.05692   0.07862
              -17.00  -0.10152  -0.09274  -0.07982  -0.05987  -0.03219   0.00000   0.03277   0.06195   0.08374
              -13.00  -0.10948  -0.09998  -0.08599  -0.06440  -0.03455   0.00000   0.03496   0.06590   0.08884
               -9.00  -0.11369  -0.10367  -0.08902  -0.06656  -0.03564   0.00000   0.03593   0.06761   0.09101
               -5.00  -0.11665  -0.10622  -0.09108  -0.06799  -0.03634   0.00000   0.03650   0.06857   0.09217
               -1.00  -0.11834  -0.10761  -0.09215  -0.06868  -0.03664   0.00000   0.03667   0.06877   0.09231
                3.00  -0.11886  -0.10795  -0.09231  -0.06870  -0.03659   0.00000   0.03648   0.06830   0.09156
                7.00  -0.11815  -0.10719  -0.09155  -0.06803  -0.03618   0.00000   0.03594   0.06717   0.08989
               11.00  -0.11619  -0.10530  -0.08983  -0.06666  -0.03539   0.00000   0.03502   0.06534   0.08730
               15.00  -0.11269  -0.10200  -0.08691  -0.06449  -0.03418   0.00000   0.03368   0.06272   0.08365
               19.00  -0.10034  -0.09310  -0.07887  -0.05806  -0.03055   0.00000   0.02974   0.05520   0.07366
               23.00  -0.12724  -0.11011  -0.08978  -0.06385  -0.03270   0.00000   0.03097   0.05768   0.07838
               27.00  -0.12481  -0.10816  -0.08826  -0.06293  -0.03231   0.00000   0.03056   0.05674   0.07677
               32.00  -0.10637  -0.09766  -0.08466  -0.06419  -0.03502   0.00000   0.03798   0.07562   0.10273
               46.00  -0.05184  -0.04772  -0.04121  -0.03083  -0.01642   0.00000   0.01615   0.02997   0.03988
               70.00  -0.01375  -0.01230  -0.01034  -0.00755  -0.00393   0.00000   0.00375   0.00690   0.00917
              120.00  -0.02372  -0.02140  -0.01819  -0.01348  -0.00717   0.00000   0.00717   0.01348   0.01819
              180.00   0.00000   0.00000   0.00000   0.00000   0.00000   0.00000   0.00000   0.00000   0.00000
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            </tableData>
          </table>
          </product>
        </function>
        <function name="aero/coefficient/CL_flap">
          <description>CL increment from flap (deg), over alpha</description>
          <product>
            <property>aero/qbar-psf</property>
            <property>metrics/Sw-sqft</property>
            <property>aero/function/mach-flap</property>
          <table>
            <independentVar lookup="row">aero/alpha-deg</independentVar>
            <independentVar lookup="column">fcs/flap-pos-deg</independentVar>
            <tableData>
                          0.00      5.00     10.00     15.00     20.00     25.00     30.00     35.00     40.00
             -180.00   0.00000   0.00000   0.00000   0.00000   0.00000   0.00000   0.00000   0.00000   0.00000
             -120.00   0.00000   0.02205   0.04406   0.06484   0.08356   0.10014   0.11509   0.12910   0.14277
              -70.00   0.00000   0.00959   0.01966   0.02965   0.03907   0.04776   0.05590   0.06380   0.07178
              -46.00   0.00000   0.03050   0.06121   0.08984   0.11468   0.13532   0.15243   0.16714   0.18233
              -32.00   0.00000   0.04808   0.09535   0.13772   0.17232   0.19873   0.21975   0.23919   0.25496
              -22.00   0.00000   0.06161   0.11007   0.01634   0.00654   0.02767   0.06453   0.11105   0.16478
              -17.00   0.00000   0.09638   0.20110   0.30441   0.39939   0.48427   0.56106   0.63320   0.70390
              -13.00   0.00000   0.11516   0.23100   0.34089   0.44008   0.52791   0.60697   0.68101   0.75338
               -9.00   0.00000   0.11836   0.23701   0.34925   0.45033   0.53966   0.61991   0.69493   0.76813
               -5.00   0.00000   0.12042   0.24085   0.35451   0.45667   0.54678   0.62759   0.70300   0.77646
               -1.00   0.00000   0.12160   0.24293   0.35722   0.45977   0.55009   0.63097   0.70636   0.77969
                3.00   0.00000   0.12227   0.24405   0.35853   0.46105   0.55117   0.63173   0.70668   0.77946
                7.00   0.00000   0.12104   0.24131   0.35411   0.45488   0.54323   0.62199   0.69494   0.76525
               11.00   0.00000   0.11712   0.23315   0.34150   0.43739   0.51977   0.59101   0.65480   0.71431
               15.00   0.00000   0.10901   0.21129   0.29957   0.37261   0.43269   0.48310   0.52701   0.56647
               19.00   0.00000   0.09384   0.17435   0.23968   0.28968   0.32670   0.35422   0.37588   0.39484
               23.00   0.00000   0.10611   0.21996   0.34435   0.47071   0.57436   0.64768   0.70413   0.75131
               27.00   0.00000   0.08281   0.16622   0.24487   0.31545   0.37796   0.43497   0.49310   0.55179
               32.00   0.00000   0.07298   0.15228   0.23757   0.30781   0.36027   0.40271   0.43852   0.46905
               46.00   0.00000   0.04008   0.07960   0.11601   0.14775   0.17478   0.19811   0.21897   0.23830
               70.00   0.00000   0.01135   0.02216   0.03189   0.04028   0.04741   0.05360   0.05919   0.06446
              120.00   0.00000   0.02135   0.04266   0.06278   0.08091   0.09697   0.11145   0.12501   0.13825
              180.00   0.00000   0.00000   0.00000   0.00000   0.00000   0.00000   0.00000   0.00000  -0.00000
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            </tableData>
          </table>
          <table>
            <independentVar lookup="row">aero/h_b-mac-ft</independentVar>
            <tableData>
                    0.00    1.20000
                    0.10    1.08692
                    0.15    1.05730
                    0.20    1.03778
                    0.30    1.01642
                    0.40    1.00713
                    0.50    1.00310
                    0.60    1.00135
                    0.70    1.00059
                    0.80    1.00025
                    0.90    1.00011
                    1.00    1.00005
                    1.10    1.00000
            </tableData>
          </table>
          </product>
        </function>
        <function name="aero/coefficient/CLq">
          <description>CL per q (non-dimensional), over alpha</description>
          <product>
            <property>aero/qbar-psf</property>
            <property>metrics/Sw-sqft</property>
            <property>aero/ci2vel</property>
            <property>velocities/q-aero-rad_sec</property>
            <property>aero/function/mach-lift</property>
          <table>
            <independentVar lookup="row">aero/alpha-deg</independentVar>
            <tableData>
                 -180.00   -3.42424
                 -165.00    0.15745
                 -105.00   -0.35242
                  -60.00    0.57141
                  -42.00    1.05699
                  -30.00    0.28827
                  -20.00   -0.27944
                  -16.00    6.77156
                  -12.00    7.69799
                   -8.00    7.69013
                   -4.00    7.68129
                    0.00    7.66498
                    4.00    7.64332
                    8.00    7.61927
                   12.00    7.60717
                   16.00    6.93739
                   20.00   -1.94802
                   24.00    1.66820
                   28.00    0.47586
                   35.00   -0.43773
                   50.00    0.72743
                   80.00    0.24646
                  135.00   -0.91098
                  180.00   -3.42424
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            </tableData>
          </table>
          </product>
        </function>
        <function name="aero/coefficient/CLadot">
          <description>CL per alpha-dot (downwash lag at the tail)</description>
          <product>
            <property>aero/qbar-psf</property>
            <property>metrics/Sw-sqft</property>
            <property>aero/ci2vel</property>
            <property>aero/alphadot-rad_sec</property>
            <value>0.69019</value>
            <property>aero/function/mach-lift</property>
          </product>
        </function>
      </axis>
      <axis name="ROLL">
        <function name="aero/coefficient/Cl_base">
          <description>Cl over alpha and beta (hangar)</description>
          <product>
            <property>aero/qbar-psf</property>
            <property>metrics/Sw-sqft</property>
            <property>metrics/bw-ft</property>
            <property>aero/function/mach-side</property>
          <table>
            <independentVar lookup="row">aero/alpha-deg</independentVar>
            <independentVar lookup="column">aero/beta-deg</independentVar>
            <tableData>
                        -90.00    -70.00    -50.00    -40.00    -30.00    -25.00    -20.00    -15.00    -10.00     -6.00     -3.00      0.00      3.00      6.00     10.00     15.00     20.00     25.00     30.00     40.00     50.00     70.00     90.00
             -180.00   0.00292  -0.00406  -0.01035  -0.01030  -0.00877  -0.00757  -0.00618  -0.00464  -0.00057   0.00275   0.00165  -0.00000  -0.00165  -0.00275   0.00057   0.00464   0.00618   0.00757   0.00877   0.01030   0.01035   0.00406  -0.00292
              -35.00   0.00292  -0.00229  -0.00496  -0.00337  -0.00152   0.00214   0.00287   0.00220   0.00151   0.00092   0.00047  -0.00000  -0.00047  -0.00092  -0.00151  -0.00220  -0.00287  -0.00214   0.00152   0.00337   0.00496   0.00229  -0.00292
              -11.00   0.00292  -0.00811  -0.01619  -0.01369  -0.01406  -0.01451  -0.01213  -0.00935  -0.00634  -0.00382  -0.00191  -0.00000   0.00191   0.00382   0.00634   0.00935   0.01213   0.01451   0.01406   0.01369   0.01619   0.00811  -0.00292
                4.00   0.00292  -0.01519  -0.01564  -0.00101   0.01164   0.01369   0.01217   0.00959   0.00665   0.00409   0.00207  -0.00000  -0.00207  -0.00409  -0.00665  -0.00959  -0.01217  -0.01369  -0.01164   0.00101   0.01564   0.01519  -0.00292
               19.00   0.00292   0.00434   0.01479   0.03402   0.05808   0.04859   0.04309   0.03370   0.02311   0.01407   0.00708  -0.00000  -0.00708  -0.01407  -0.02311  -0.03370  -0.04309  -0.04859  -0.05808  -0.03402  -0.01479  -0.00434  -0.00292
               42.00   0.00292  -0.00297  -0.00642  -0.00591  -0.00331  -0.00153   0.00141   0.00360   0.00263   0.00160   0.00084  -0.00000  -0.00084  -0.00160  -0.00263  -0.00360  -0.00141   0.00153   0.00331   0.00591   0.00642   0.00297  -0.00292
              180.00   0.00292  -0.00406  -0.01035  -0.01030  -0.00877  -0.00757  -0.00618  -0.00464  -0.00057   0.00275   0.00165  -0.00000  -0.00165  -0.00275   0.00057   0.00464   0.00618   0.00757   0.00877   0.01030   0.01035   0.00406  -0.00292
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            </tableData>
          </table>
          </product>
        </function>
        <function name="aero/coefficient/Cl_aileron">
          <description>Cl increment from aileron (deg), over alpha</description>
          <product>
            <property>aero/qbar-psf</property>
            <property>metrics/Sw-sqft</property>
            <property>metrics/bw-ft</property>
            <property>aero/function/mach-aileron</property>
          <table>
            <independentVar lookup="row">aero/alpha-deg</independentVar>
            <independentVar lookup="column">fcs/left-aileron-pos-deg</independentVar>
            <tableData>
                        -23.00    -20.00    -15.00    -10.00     -5.00      0.00      5.00     10.00     15.00     20.00     23.00
             -180.00   0.00000   0.00000   0.00000   0.00000   0.00000   0.00000   0.00000   0.00000   0.00000   0.00000   0.00000
              -35.00  -0.00950  -0.00951  -0.00895  -0.00718  -0.00399   0.00000   0.00399   0.00718   0.00895   0.00951   0.00950
              -11.00  -0.05161  -0.04842  -0.04130  -0.03069  -0.01635   0.00000   0.01635   0.03069   0.04130   0.04842   0.05161
                4.00  -0.05263  -0.04938  -0.04210  -0.03128  -0.01666   0.00000   0.01666   0.03128   0.04210   0.04938   0.05263
               19.00  -0.06859  -0.06468  -0.05578  -0.04209  -0.02276   0.00000   0.02276   0.04209   0.05578   0.06468   0.06859
               42.00  -0.01180  -0.01159  -0.01054  -0.00821  -0.00449   0.00000   0.00449   0.00821   0.01054   0.01159   0.01180
              180.00   0.00000   0.00000   0.00000   0.00000   0.00000   0.00000   0.00000   0.00000   0.00000   0.00000   0.00000
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            </tableData>
          </table>
          </product>
        </function>
        <function name="aero/coefficient/Cl_rudder">
          <description>Cl increment from rudder (deg), over alpha</description>
          <product>
            <property>aero/qbar-psf</property>
            <property>metrics/Sw-sqft</property>
            <property>metrics/bw-ft</property>
            <property>aero/function/mach-rudder</property>
          <table>
            <independentVar lookup="row">aero/alpha-deg</independentVar>
            <independentVar lookup="column">fcs/rudder-pos-deg</independentVar>
            <tableData>
                        -25.00    -20.00    -15.00    -10.00     -5.00      0.00      5.00     10.00     15.00     20.00     25.00
             -180.00   0.00000   0.00000   0.00000   0.00000   0.00000   0.00000   0.00000   0.00000   0.00000   0.00000   0.00000
              -35.00  -0.00402  -0.00362  -0.00307  -0.00227  -0.00120   0.00000   0.00120   0.00227   0.00307   0.00362   0.00402
              -11.00  -0.00538  -0.00483  -0.00408  -0.00301  -0.00160   0.00000   0.00160   0.00301   0.00408   0.00483   0.00538
                4.00  -0.00575  -0.00515  -0.00435  -0.00321  -0.00171   0.00000   0.00171   0.00321   0.00435   0.00515   0.00575
               19.00  -0.00560  -0.00504  -0.00427  -0.00315  -0.00168   0.00000   0.00168   0.00315   0.00427   0.00504   0.00560
               42.00  -0.00480  -0.00431  -0.00366  -0.00270  -0.00143   0.00000   0.00143   0.00270   0.00366   0.00431   0.00480
              180.00   0.00000   0.00000   0.00000   0.00000   0.00000   0.00000   0.00000   0.00000   0.00000   0.00000   0.00000
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            </tableData>
          </table>
          </product>
        </function>
        <function name="aero/coefficient/Clp">
          <description>Cl per p (non-dimensional), over alpha</description>
          <product>
            <property>aero/qbar-psf</property>
            <property>metrics/Sw-sqft</property>
            <property>metrics/bw-ft</property>
            <property>aero/bi2vel</property>
            <property>velocities/p-aero-rad_sec</property>
            <property>aero/function/mach-lift</property>
          <table>
            <independentVar lookup="row">aero/alpha-deg</independentVar>
            <tableData>
                 -180.00   -0.58890
                 -165.00   -0.10893
                  -32.00   -0.20897
                  -10.00   -0.45138
                    5.00   -0.44521
                   20.00    0.60935
                   46.00   -0.25140
                  180.00   -0.58890
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            </tableData>
          </table>
          </product>
        </function>
        <function name="aero/coefficient/Clr">
          <description>Cl per r (non-dimensional), over alpha</description>
          <product>
            <property>aero/qbar-psf</property>
            <property>metrics/Sw-sqft</property>
            <property>metrics/bw-ft</property>
            <property>aero/bi2vel</property>
            <property>velocities/r-aero-rad_sec</property>
            <property>aero/function/mach-lift</property>
          <table>
            <independentVar lookup="row">aero/alpha-deg</independentVar>
            <tableData>
                 -180.00    0.01963
                 -165.00    0.07730
                  -32.00   -0.14810
                  -10.00   -0.06826
                    5.00    0.09141
                   20.00    0.54440
                   46.00    0.17352
                  180.00    0.01963
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            </tableData>
          </table>
          </product>
        </function>
      </axis>
      <axis name="PITCH">
        <function name="aero/coefficient/Cm_base">
          <description>Cm over alpha and beta (hangar)</description>
          <product>
            <property>aero/qbar-psf</property>
            <property>metrics/Sw-sqft</property>
            <property>metrics/cbarw-ft</property>
          <table>
            <independentVar lookup="row">aero/alpha-deg</independentVar>
            <independentVar lookup="column">aero/beta-deg</independentVar>
            <tableData>
                        -90.00    -70.00    -50.00    -40.00    -30.00    -25.00    -20.00    -15.00    -10.00     -6.00     -3.00      0.00      3.00      6.00     10.00     15.00     20.00     25.00     30.00     40.00     50.00     70.00     90.00
             -180.00   0.00000  -0.00001  -0.00610  -0.00910  -0.01187  -0.01309  -0.01414  -0.01499  -0.01206  -0.01285  -0.01543  -0.01637  -0.01543  -0.01285  -0.01206  -0.01499  -0.01414  -0.01309  -0.01187  -0.00910  -0.00610  -0.00001   0.00000
              -35.00   0.00000   0.00875   0.07997   0.12030   0.15734   0.17536   0.19563   0.21342   0.22628   0.23298   0.23583   0.23680   0.23583   0.23298   0.22628   0.21342   0.19563   0.17536   0.15734   0.12030   0.07997   0.00875   0.00000
              -11.00   0.00000   0.01041   0.08385   0.05038   0.03056   0.03948   0.05087   0.06116   0.06955   0.07436   0.07650   0.07721   0.07650   0.07436   0.06955   0.06116   0.05087   0.03948   0.03056   0.05038   0.08385   0.01041   0.00000
                4.00   0.00000  -0.02090  -0.05676  -0.04855  -0.03854  -0.04090  -0.04176  -0.04185  -0.04234  -0.04306  -0.04371  -0.04408  -0.04371  -0.04306  -0.04234  -0.04185  -0.04176  -0.04090  -0.03854  -0.04855  -0.05676  -0.02090   0.00000
               19.00   0.00000  -0.03083  -0.15490  -0.19151  -0.14832  -0.10609  -0.11526  -0.12288  -0.12878  -0.13202  -0.13337  -0.13380  -0.13337  -0.13202  -0.12878  -0.12288  -0.11526  -0.10609  -0.14832  -0.19151  -0.15490  -0.03083   0.00000
               42.00   0.00000  -0.01319  -0.10534  -0.16471  -0.21482  -0.23576  -0.25567  -0.26885  -0.27315  -0.27526  -0.27620  -0.27651  -0.27620  -0.27526  -0.27315  -0.26885  -0.25567  -0.23576  -0.21482  -0.16471  -0.10534  -0.01319   0.00000
              180.00   0.00000  -0.00001  -0.00610  -0.00910  -0.01187  -0.01309  -0.01414  -0.01499  -0.01206  -0.01285  -0.01543  -0.01637  -0.01543  -0.01285  -0.01206  -0.01499  -0.01414  -0.01309  -0.01187  -0.00910  -0.00610  -0.00001   0.00000
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            </tableData>
          </table>
          </product>
        </function>
        <function name="aero/coefficient/Cm_mach">
          <description>Cm from the neutral point's move with Mach</description>
          <product>
            <property>aero/qbar-psf</property>
            <property>metrics/Sw-sqft</property>
            <property>metrics/cbarw-ft</property>
            <property>aero/function/CL-base</property>
            <property>aero/function/mach-dCm-dCL</property>
          </product>
        </function>
        <function name="aero/coefficient/Cm_elevator">
          <description>Cm increment from elevator (deg), over alpha</description>
          <product>
            <property>aero/qbar-psf</property>
            <property>metrics/Sw-sqft</property>
            <property>metrics/cbarw-ft</property>
            <property>aero/function/mach-elevator</property>
          <table>
            <independentVar lookup="row">aero/alpha-deg</independentVar>
            <independentVar lookup="column">fcs/elevator-pos-deg</independentVar>
            <tableData>
                        -25.00    -20.00    -15.00    -10.00     -5.00      0.00      5.00     10.00     15.00
             -180.00  -0.00114  -0.00074  -0.00043  -0.00019  -0.00005   0.00000  -0.00005  -0.00019  -0.00043
              -35.00   0.08859   0.08084   0.06999   0.05326   0.02904   0.00000  -0.02907  -0.05304  -0.06816
              -11.00   0.21968   0.19845   0.16884   0.12511   0.06643   0.00000  -0.06596  -0.12340  -0.16545
                4.00   0.22442   0.20293   0.17281   0.12814   0.06807   0.00000  -0.06767  -0.12667  -0.16997
               19.00   0.20331   0.18929   0.16103   0.11921   0.06318   0.00000  -0.06264  -0.11737  -0.15799
               42.00   0.07812   0.07697   0.07054   0.05561   0.03105   0.00000  -0.03309  -0.06339  -0.08671
              180.00  -0.00114  -0.00074  -0.00043  -0.00019  -0.00005   0.00000  -0.00005  -0.00019  -0.00043
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            </tableData>
          </table>
          </product>
        </function>
        <function name="aero/coefficient/Cm_flap">
          <description>Cm increment from flap (deg), over alpha</description>
          <product>
            <property>aero/qbar-psf</property>
            <property>metrics/Sw-sqft</property>
            <property>metrics/cbarw-ft</property>
            <property>aero/function/mach-flap</property>
          <table>
            <independentVar lookup="row">aero/alpha-deg</independentVar>
            <independentVar lookup="column">fcs/flap-pos-deg</independentVar>
            <tableData>
                          0.00      5.00     10.00     15.00     20.00     25.00     30.00     35.00     40.00
             -180.00   0.00000  -0.00000  -0.00001  -0.00002  -0.00003  -0.00004  -0.00006  -0.00008  -0.00010
              -35.00   0.00000  -0.00613  -0.01178  -0.01641  -0.01964  -0.02137  -0.02214  -0.02209  -0.02143
              -11.00   0.00000  -0.01443  -0.02918  -0.04361  -0.05718  -0.06975  -0.08157  -0.09306  -0.10462
                4.00   0.00000  -0.02060  -0.04122  -0.06099  -0.07928  -0.09603  -0.11162  -0.12660  -0.14147
               19.00   0.00000  -0.00800  -0.01772  -0.02966  -0.04390  -0.05971  -0.07603  -0.09264  -0.10942
               42.00   0.00000  -0.00498  -0.01017  -0.01508  -0.01941  -0.02309  -0.02627  -0.02920  -0.03208
              180.00   0.00000  -0.00000  -0.00001  -0.00002  -0.00003  -0.00004  -0.00006  -0.00008  -0.00010
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            </tableData>
          </table>
          </product>
        </function>
        <function name="aero/coefficient/Cmq">
          <description>Cm per q (non-dimensional), over alpha</description>
          <product>
            <property>aero/qbar-psf</property>
            <property>metrics/Sw-sqft</property>
            <property>metrics/cbarw-ft</property>
            <property>aero/ci2vel</property>
            <property>velocities/q-aero-rad_sec</property>
            <property>aero/function/mach-lift</property>
          <table>
            <independentVar lookup="row">aero/alpha-deg</independentVar>
            <tableData>
                 -180.00   -7.13615
                 -165.00   -0.01581
                  -32.00   -2.12570
                  -10.00   -6.69879
                    5.00   -6.41436
                   20.00   -8.01786
                   46.00   -4.84527
                  180.00   -7.13615
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            </tableData>
          </table>
          </product>
        </function>
        <function name="aero/coefficient/Cmadot">
          <description>Cm per alpha-dot (downwash lag at the tail)</description>
          <product>
            <property>aero/qbar-psf</property>
            <property>metrics/Sw-sqft</property>
            <property>metrics/cbarw-ft</property>
            <property>aero/ci2vel</property>
            <property>aero/alphadot-rad_sec</property>
            <value>-1.35441</value>
            <property>aero/function/mach-lift</property>
          </product>
        </function>
        <function name="aero/coefficient/Cm_airbrakes">
          <description>airbrakes: its drag's pitching moment, -0.18 m from the reference point's height</description>
          <product>
            <property>aero/qbar-psf</property>
            <property>metrics/Sw-sqft</property>
            <property>metrics/cbarw-ft</property>
            <value>-0.00459234</value>
            <pow>
              <sin>
                <product>
                  <property>fcs/speedbrake-pos-norm</property>
                  <value>1.0472</value>
                </product>
              </sin>
              <value>2</value>
            </pow>
          </product>
        </function>
        <function name="aero/coefficient/Cm_gear">
          <description>the gear's drag's pitching moment, -1.66 m from the reference point's height</description>
          <product>
            <property>aero/qbar-psf</property>
            <property>metrics/Sw-sqft</property>
            <property>metrics/cbarw-ft</property>
            <value>-0.00861799</value>
            <property>gear/gear-pos-norm</property>
          </product>
        </function>
      </axis>
      <axis name="YAW">
        <function name="aero/coefficient/Cn_base">
          <description>Cn over alpha and beta (hangar)</description>
          <product>
            <property>aero/qbar-psf</property>
            <property>metrics/Sw-sqft</property>
            <property>metrics/bw-ft</property>
            <property>aero/function/mach-side</property>
          <table>
            <independentVar lookup="row">aero/alpha-deg</independentVar>
            <independentVar lookup="column">aero/beta-deg</independentVar>
            <tableData>
                        -90.00    -70.00    -50.00    -40.00    -30.00    -25.00    -20.00    -15.00    -10.00     -6.00     -3.00      0.00      3.00      6.00     10.00     15.00     20.00     25.00     30.00     40.00     50.00     70.00     90.00
             -180.00  -0.02389  -0.05156  -0.06624  -0.06499  -0.05713  -0.05077  -0.04290  -0.03369  -0.03285  -0.03185  -0.01703  -0.00000   0.01703   0.03185   0.03285   0.03369   0.04290   0.05077   0.05713   0.06499   0.06624   0.05156   0.02389
              -35.00  -0.02389  -0.00114   0.01267   0.01660   0.01301  -0.00039  -0.00087   0.00042   0.00073   0.00055   0.00028  -0.00000  -0.00028  -0.00055  -0.00073  -0.00042   0.00087   0.00039  -0.01301  -0.01660  -0.01267   0.00114   0.02389
              -11.00  -0.02389   0.00462   0.02417   0.02387   0.00522   0.00235   0.00104   0.00045   0.00013   0.00004   0.00002  -0.00000  -0.00002  -0.00004  -0.00013  -0.00045  -0.00104  -0.00235  -0.00522  -0.02387  -0.02417  -0.00462   0.02389
                4.00  -0.02389  -0.00028   0.01586   0.01686  -0.00115  -0.00485  -0.00587  -0.00522  -0.00396  -0.00257  -0.00133  -0.00000   0.00133   0.00257   0.00396   0.00522   0.00587   0.00485   0.00115  -0.01686  -0.01586   0.00028   0.02389
               19.00  -0.02389   0.00211   0.02117   0.02479   0.01135   0.00622   0.00369   0.00249   0.00163   0.00101   0.00053  -0.00000  -0.00053  -0.00101  -0.00163  -0.00249  -0.00369  -0.00622  -0.01135  -0.02479  -0.02117  -0.00211   0.02389
               42.00  -0.02389  -0.00279   0.01086   0.01317   0.01102   0.00719  -0.00188  -0.00612  -0.00384  -0.00218  -0.00118  -0.00000   0.00118   0.00218   0.00384   0.00612   0.00188  -0.00719  -0.01102  -0.01317  -0.01086   0.00279   0.02389
              180.00  -0.02389  -0.05156  -0.06624  -0.06499  -0.05713  -0.05077  -0.04290  -0.03369  -0.03285  -0.03185  -0.01703  -0.00000   0.01703   0.03185   0.03285   0.03369   0.04290   0.05077   0.05713   0.06499   0.06624   0.05156   0.02389
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            </tableData>
          </table>
          </product>
        </function>
        <function name="aero/coefficient/Cn_aileron">
          <description>Cn increment from aileron (deg), over alpha</description>
          <product>
            <property>aero/qbar-psf</property>
            <property>metrics/Sw-sqft</property>
            <property>metrics/bw-ft</property>
            <property>aero/function/mach-aileron</property>
          <table>
            <independentVar lookup="row">aero/alpha-deg</independentVar>
            <independentVar lookup="column">fcs/left-aileron-pos-deg</independentVar>
            <tableData>
                        -23.00    -20.00    -15.00    -10.00     -5.00      0.00      5.00     10.00     15.00     20.00     23.00
             -180.00  -0.00000  -0.00000  -0.00000  -0.00000  -0.00000   0.00000  -0.00000  -0.00000  -0.00000  -0.00000  -0.00000
              -35.00   0.01570   0.01478   0.01264   0.00942   0.00503   0.00000  -0.00503  -0.00942  -0.01264  -0.01478  -0.01570
              -11.00   0.00084   0.00077   0.00064   0.00046   0.00024   0.00000  -0.00024  -0.00046  -0.00064  -0.00077  -0.00084
                4.00  -0.00188  -0.00178  -0.00154  -0.00116  -0.00062   0.00000   0.00062   0.00116   0.00154   0.00178   0.00188
               19.00  -0.01535  -0.01441  -0.01231  -0.00919  -0.00492   0.00000   0.00492   0.00919   0.01231   0.01441   0.01535
               42.00  -0.01803  -0.01694  -0.01448  -0.01078  -0.00575   0.00000   0.00575   0.01078   0.01448   0.01694   0.01803
              180.00  -0.00000  -0.00000  -0.00000  -0.00000  -0.00000   0.00000  -0.00000  -0.00000  -0.00000  -0.00000  -0.00000
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            </tableData>
          </table>
          </product>
        </function>
        <function name="aero/coefficient/Cn_rudder">
          <description>Cn increment from rudder (deg), over alpha</description>
          <product>
            <property>aero/qbar-psf</property>
            <property>metrics/Sw-sqft</property>
            <property>metrics/bw-ft</property>
            <property>aero/function/mach-rudder</property>
          <table>
            <independentVar lookup="row">aero/alpha-deg</independentVar>
            <independentVar lookup="column">fcs/rudder-pos-deg</independentVar>
            <tableData>
                        -25.00    -20.00    -15.00    -10.00     -5.00      0.00      5.00     10.00     15.00     20.00     25.00
             -180.00  -0.00000  -0.00000  -0.00000  -0.00000  -0.00000   0.00000  -0.00000  -0.00000  -0.00000  -0.00000  -0.00000
              -35.00   0.01401   0.01262   0.01071   0.00793   0.00421   0.00000  -0.00421  -0.00793  -0.01071  -0.01262  -0.01401
              -11.00   0.02060   0.01849   0.01565   0.01156   0.00613   0.00000  -0.00613  -0.01156  -0.01565  -0.01849  -0.02060
                4.00   0.02175   0.01955   0.01655   0.01223   0.00650   0.00000  -0.00650  -0.01223  -0.01655  -0.01955  -0.02175
               19.00   0.01977   0.01775   0.01502   0.01109   0.00589   0.00000  -0.00589  -0.01109  -0.01502  -0.01775  -0.01977
               42.00   0.01618   0.01457   0.01236   0.00912   0.00482   0.00000  -0.00482  -0.00912  -0.01236  -0.01457  -0.01618
              180.00  -0.00000  -0.00000  -0.00000  -0.00000  -0.00000   0.00000  -0.00000  -0.00000  -0.00000  -0.00000  -0.00000
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            </tableData>
          </table>
          </product>
        </function>
        <function name="aero/coefficient/Cnp">
          <description>Cn per p (non-dimensional), over alpha</description>
          <product>
            <property>aero/qbar-psf</property>
            <property>metrics/Sw-sqft</property>
            <property>metrics/bw-ft</property>
            <property>aero/bi2vel</property>
            <property>velocities/p-aero-rad_sec</property>
            <property>aero/function/mach-lift</property>
          <table>
            <independentVar lookup="row">aero/alpha-deg</independentVar>
            <tableData>
                 -180.00    0.04284
                 -165.00    0.06309
                  -32.00    0.05313
                  -10.00    0.10267
                    5.00   -0.05647
                   20.00    0.58069
                   46.00    0.01297
                  180.00    0.04284
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            </tableData>
          </table>
          </product>
        </function>
        <function name="aero/coefficient/Cnr">
          <description>Cn per r (non-dimensional), over alpha</description>
          <product>
            <property>aero/qbar-psf</property>
            <property>metrics/Sw-sqft</property>
            <property>metrics/bw-ft</property>
            <property>aero/bi2vel</property>
            <property>velocities/r-aero-rad_sec</property>
            <property>aero/function/mach-lift</property>
          <table>
            <independentVar lookup="row">aero/alpha-deg</independentVar>
            <tableData>
                 -180.00   -0.12710
                 -165.00   -0.12533
                  -32.00   -0.08825
                  -10.00   -0.11263
                    5.00   -0.11404
                   20.00    0.04673
                   46.00   -0.09829
                  180.00   -0.12710
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            </tableData>
          </table>
          </product>
        </function>
      </axis>
    </aerodynamics>
</fdm_config>
