<?xml version="1.0"?>
<?xml-stylesheet type="text/xsl" href="http://jsbsim.sourceforge.net/JSBSim.xsl"?>
<!-- Generated by hangar 0.1.0 from su27s.toml on 2026-10-01. Edit the design and rebuild; changes
     made here are overwritten.  -->
<fdm_config name="su27s" version="2.0" release="ALPHA"
            xmlns:xsi="http://www.w3.org/2001/XMLSchema-instance"
            xsi:noNamespaceSchemaLocation="http://jsbsim.sourceforge.net/JSBSim.xsd">
    <fileheader>
      <author>hangar</author>
      <filecreationdate>2026-10-01</filecreationdate>
      <version>0.1.0</version>
      <description>Sukhoi Su-27S Flanker-B (hangar build)</description>
      <note>Aerodynamics: vortex lattice with viscous section polars, full-envelope
        strip model, slender-body fuselage (hangar). Mass: Raymer component
        weights on the geometry. Propeller: blade-element momentum theory.</note>
      <reference refID="fsim/applicability/aerobatic" author="the design" title="Sukhoi data: +9 g (fsim/envelope/clean/n_max)" date="n/a"/>
      <reference refID="fsim/applicability/carrier" author="the design" title="Jane's: a land-based fighter (the Su-33 is the naval type)" date="n/a"/>
      <reference refID="fsim/applicability/drag_devices" author="the design" title="Jane's: a dorsal airbrake" date="n/a"/>
      <reference refID="fsim/applicability/flaps" author="the design" title="Jane's: flaperons give the flap function" date="n/a"/>
      <reference refID="fsim/applicability/ground_contact" author="the design" title="Jane's: tricycle wheeled gear" date="n/a"/>
      <reference refID="fsim/applicability/releasable_stores" author="the design" title="Jane's: ten hardpoints" date="n/a"/>
      <reference refID="fsim/applicability/retractable_gear" author="the design" title="Jane's: retractable gear" date="n/a"/>
      <reference refID="fsim/applicability/vertical_flight" author="the design" title="Sukhoi data and Jane's: a conventional take-off and landing fighter. Conventional take-off and landing: no rotors, lift fans or vectored lift to hover" date="n/a"/>
    </fileheader>
    <metrics>
      <wingarea unit="M2"> 62.6460 </wingarea>
      <wingspan unit="M"> 14.4000 </wingspan>
      <chord unit="M"> 4.7379 </chord>
      <htailarea unit="M2"> 31.5695 </htailarea>
      <htailarm unit="M"> 4.3743 </htailarm>
      <vtailarea unit="M2"> 15.0984 </vtailarea>
      <vtailarm unit="M"> 3.5772 </vtailarm>
      <location name="AERORP" unit="M">
        <x> 12.8300 </x>
        <y> 0.0000 </y>
        <z> 0.0000 </z>
      </location>
      <location name="EYEPOINT" unit="M">
        <x> 6.3000 </x>
        <y> 0.0000 </y>
        <z> 1.4500 </z>
      </location>
      <location name="VRP" unit="M">
        <x> 12.8400 </x>
        <y> 0.0000 </y>
        <z> -0.4500 </z>
      </location>
    </metrics>
    <mass_balance negated_crossproduct_inertia="false">
      <ixx unit="KG*M2"> 59630.80 </ixx>
      <iyy unit="KG*M2"> 364305.81 </iyy>
      <izz unit="KG*M2"> 408855.29 </izz>
      <ixy unit="KG*M2"> 0.243 </ixy>
      <ixz unit="KG*M2"> 15673.031 </ixz>
      <iyz unit="KG*M2"> 0.502 </iyz>
      <emptywt unit="KG"> 16380.00 </emptywt>
      <location name="CG" unit="M">
        <x> 12.8400 </x>
        <y> 0.0000 </y>
        <z> -0.4500 </z>
      </location>
      <pointmass name="pilot">
        <weight unit="KG"> 100.00 </weight>
        <location unit="M">
          <x> 6.3000 </x>
          <y> 0.0000 </y>
          <z> 0.7500 </z>
        </location>
      </pointmass>
      <pointmass name="gun ammunition">
        <weight unit="KG"> 70.00 </weight>
        <location unit="M">
          <x> 10.1900 </x>
          <y> 1.0000 </y>
          <z> 0.0000 </z>
        </location>
      </pointmass>
    </mass_balance>
    <ground_reactions>
      <contact type="BOGEY" name="Nose Gear">
        <location unit="M">
          <x> 7.9000 </x>
          <y> 0.0000 </y>
          <z> -2.2370 </z>
        </location>
        <static_friction> 0.8 </static_friction>
        <dynamic_friction> 0.5 </dynamic_friction>
        <rolling_friction> 0.02 </rolling_friction>
        <spring_coeff unit="N/M"> 240712 </spring_coeff>
        <damping_coeff unit="N/M/SEC"> 29770 </damping_coeff>
        <damping_coeff_rebound unit="N/M/SEC"> 59541 </damping_coeff_rebound>
        <max_steer unit="DEG"> 45.0 </max_steer>
        <brake_group> NONE </brake_group>
        <retractable> 1 </retractable>
      </contact>
      <contact type="BOGEY" name="Left Main Gear">
        <location unit="M">
          <x> 13.7700 </x>
          <y> -2.1700 </y>
          <z> -2.2670 </z>
        </location>
        <static_friction> 0.8 </static_friction>
        <dynamic_friction> 0.5 </dynamic_friction>
        <rolling_friction> 0.02 </rolling_friction>
        <spring_coeff unit="N/M"> 494095 </spring_coeff>
        <damping_coeff unit="N/M/SEC"> 66940 </damping_coeff>
        <damping_coeff_rebound unit="N/M/SEC"> 133880 </damping_coeff_rebound>
        <max_steer unit="DEG"> 0.0 </max_steer>
        <brake_group> LEFT </brake_group>
        <retractable> 1 </retractable>
      </contact>
      <contact type="BOGEY" name="Right Main Gear">
        <location unit="M">
          <x> 13.7700 </x>
          <y> 2.1700 </y>
          <z> -2.2670 </z>
        </location>
        <static_friction> 0.8 </static_friction>
        <dynamic_friction> 0.5 </dynamic_friction>
        <rolling_friction> 0.02 </rolling_friction>
        <spring_coeff unit="N/M"> 494095 </spring_coeff>
        <damping_coeff unit="N/M/SEC"> 66940 </damping_coeff>
        <damping_coeff_rebound unit="N/M/SEC"> 133880 </damping_coeff_rebound>
        <max_steer unit="DEG"> 0.0 </max_steer>
        <brake_group> RIGHT </brake_group>
        <retractable> 1 </retractable>
      </contact>
      <contact type="STRUCTURE" name="canopy front">
        <location unit="M">
          <x> 4.9976 </x>
          <y> 0.0000 </y>
          <z> 1.3975 </z>
        </location>
        <static_friction> 0.8 </static_friction>
        <dynamic_friction> 0.6 </dynamic_friction>
        <spring_coeff unit="N/M"> 3107232 </spring_coeff>
        <damping_coeff unit="N/M/SEC"> 103574 </damping_coeff>
        <damping_coeff_rebound unit="N/M/SEC"> 103574 </damping_coeff_rebound>
      </contact>
      <contact type="STRUCTURE" name="fin left rear">
        <location unit="M">
          <x> 18.4200 </x>
          <y> -2.2001 </y>
          <z> 3.8450 </z>
        </location>
        <static_friction> 0.8 </static_friction>
        <dynamic_friction> 0.6 </dynamic_friction>
        <spring_coeff unit="N/M"> 1786070 </spring_coeff>
        <damping_coeff unit="N/M/SEC"> 59536 </damping_coeff>
        <damping_coeff_rebound unit="N/M/SEC"> 59536 </damping_coeff_rebound>
      </contact>
      <contact type="STRUCTURE" name="fin right rear">
        <location unit="M">
          <x> 18.4200 </x>
          <y> 2.2001 </y>
          <z> 3.8450 </z>
        </location>
        <static_friction> 0.8 </static_friction>
        <dynamic_friction> 0.6 </dynamic_friction>
        <spring_coeff unit="N/M"> 1786074 </spring_coeff>
        <damping_coeff unit="N/M/SEC"> 59536 </damping_coeff>
        <damping_coeff_rebound unit="N/M/SEC"> 59536 </damping_coeff_rebound>
      </contact>
      <contact type="STRUCTURE" name="fuselage front">
        <location unit="M">
          <x> 0.0000 </x>
          <y> 0.0000 </y>
          <z> -0.6000 </z>
        </location>
        <static_friction> 0.8 </static_friction>
        <dynamic_friction> 0.6 </dynamic_friction>
        <spring_coeff unit="N/M"> 1752135 </spring_coeff>
        <damping_coeff unit="N/M/SEC"> 58404 </damping_coeff>
        <damping_coeff_rebound unit="N/M/SEC"> 58404 </damping_coeff_rebound>
      </contact>
      <contact type="STRUCTURE" name="fuselage rear">
        <location unit="M">
          <x> 21.9350 </x>
          <y> 0.0000 </y>
          <z> -0.2100 </z>
        </location>
        <static_friction> 0.8 </static_friction>
        <dynamic_friction> 0.6 </dynamic_friction>
        <spring_coeff unit="N/M"> 3122100 </spring_coeff>
        <damping_coeff unit="N/M/SEC"> 104070 </damping_coeff>
        <damping_coeff_rebound unit="N/M/SEC"> 104070 </damping_coeff_rebound>
      </contact>
      <contact type="STRUCTURE" name="htail left rear">
        <location unit="M">
          <x> 19.8800 </x>
          <y> -4.8000 </y>
          <z> -0.6451 </z>
        </location>
        <static_friction> 0.8 </static_friction>
        <dynamic_friction> 0.6 </dynamic_friction>
        <spring_coeff unit="N/M"> 1520986 </spring_coeff>
        <damping_coeff unit="N/M/SEC"> 50700 </damping_coeff>
        <damping_coeff_rebound unit="N/M/SEC"> 50700 </damping_coeff_rebound>
      </contact>
      <contact type="STRUCTURE" name="htail right rear">
        <location unit="M">
          <x> 19.8800 </x>
          <y> 4.8000 </y>
          <z> -0.6451 </z>
        </location>
        <static_friction> 0.8 </static_friction>
        <dynamic_friction> 0.6 </dynamic_friction>
        <spring_coeff unit="N/M"> 1520994 </spring_coeff>
        <damping_coeff unit="N/M/SEC"> 50700 </damping_coeff>
        <damping_coeff_rebound unit="N/M/SEC"> 50700 </damping_coeff_rebound>
      </contact>
      <contact type="STRUCTURE" name="tip rail left rear">
        <location unit="M">
          <x> 13.7000 </x>
          <y> -7.2800 </y>
          <z> -0.1000 </z>
        </location>
        <static_friction> 0.8 </static_friction>
        <dynamic_friction> 0.6 </dynamic_friction>
        <spring_coeff unit="N/M"> 933457 </spring_coeff>
        <damping_coeff unit="N/M/SEC"> 31115 </damping_coeff>
        <damping_coeff_rebound unit="N/M/SEC"> 31115 </damping_coeff_rebound>
      </contact>
      <contact type="STRUCTURE" name="tip rail left rear 2">
        <location unit="M">
          <x> 17.3000 </x>
          <y> -7.2800 </y>
          <z> -0.0800 </z>
        </location>
        <static_friction> 0.8 </static_friction>
        <dynamic_friction> 0.6 </dynamic_friction>
        <spring_coeff unit="N/M"> 886001 </spring_coeff>
        <damping_coeff unit="N/M/SEC"> 29533 </damping_coeff>
        <damping_coeff_rebound unit="N/M/SEC"> 29533 </damping_coeff_rebound>
      </contact>
      <contact type="STRUCTURE" name="tip rail right rear">
        <location unit="M">
          <x> 13.7000 </x>
          <y> 7.2800 </y>
          <z> -0.1000 </z>
        </location>
        <static_friction> 0.8 </static_friction>
        <dynamic_friction> 0.6 </dynamic_friction>
        <spring_coeff unit="N/M"> 933460 </spring_coeff>
        <damping_coeff unit="N/M/SEC"> 31115 </damping_coeff>
        <damping_coeff_rebound unit="N/M/SEC"> 31115 </damping_coeff_rebound>
      </contact>
      <contact type="STRUCTURE" name="tip rail right rear 2">
        <location unit="M">
          <x> 17.3000 </x>
          <y> 7.2800 </y>
          <z> -0.0800 </z>
        </location>
        <static_friction> 0.8 </static_friction>
        <dynamic_friction> 0.6 </dynamic_friction>
        <spring_coeff unit="N/M"> 886004 </spring_coeff>
        <damping_coeff unit="N/M/SEC"> 29533 </damping_coeff>
        <damping_coeff_rebound unit="N/M/SEC"> 29533 </damping_coeff_rebound>
      </contact>
      <contact type="STRUCTURE" name="ventral left rear">
        <location unit="M">
          <x> 17.3000 </x>
          <y> -2.3000 </y>
          <z> -1.5000 </z>
        </location>
        <static_friction> 0.8 </static_friction>
        <dynamic_friction> 0.6 </dynamic_friction>
        <spring_coeff unit="N/M"> 3923963 </spring_coeff>
        <damping_coeff unit="N/M/SEC"> 130799 </damping_coeff>
        <damping_coeff_rebound unit="N/M/SEC"> 130799 </damping_coeff_rebound>
      </contact>
      <contact type="STRUCTURE" name="ventral right rear">
        <location unit="M">
          <x> 17.3000 </x>
          <y> 2.3000 </y>
          <z> -1.5000 </z>
        </location>
        <static_friction> 0.8 </static_friction>
        <dynamic_friction> 0.6 </dynamic_friction>
        <spring_coeff unit="N/M"> 3923985 </spring_coeff>
        <damping_coeff unit="N/M/SEC"> 130799 </damping_coeff>
        <damping_coeff_rebound unit="N/M/SEC"> 130799 </damping_coeff_rebound>
      </contact>
    </ground_reactions>
    <propulsion>
      <engine file="su27s_engine0">
        <location unit="M">
          <x> 17.3000 </x>
          <y> -1.1500 </y>
          <z> -0.5000 </z>
        </location>
        <feed>0</feed>
        <feed>1</feed>
        <feed>2</feed>
        <thruster file="su27s_nozzle0">
          <location unit="M">
            <x> 20.1000 </x>
            <y> -1.1500 </y>
            <z> -0.5000 </z>
          </location>
          <orient unit="DEG"> <roll>0.00</roll> <pitch>0.00</pitch> <yaw>0.00</yaw> </orient>

        </thruster>
      </engine>
      <engine file="su27s_engine0">
        <location unit="M">
          <x> 17.3000 </x>
          <y> 1.1500 </y>
          <z> -0.5000 </z>
        </location>
        <feed>0</feed>
        <feed>1</feed>
        <feed>2</feed>
        <thruster file="su27s_nozzle0">
          <location unit="M">
            <x> 20.1000 </x>
            <y> 1.1500 </y>
            <z> -0.5000 </z>
          </location>
          <orient unit="DEG"> <roll>0.00</roll> <pitch>0.00</pitch> <yaw>0.00</yaw> </orient>

        </thruster>
      </engine>
      <tank type="FUEL">
        <location unit="M">
          <x> 10.6900 </x>
          <y> 0.0000 </y>
          <z> -0.2000 </z>
        </location>
        <capacity unit="KG"> 2000.00 </capacity>
        <contents unit="KG"> 2000.00 </contents>
      </tank>
      <tank type="FUEL">
        <location unit="M">
          <x> 13.1900 </x>
          <y> 0.0000 </y>
          <z> -0.1500 </z>
        </location>
        <capacity unit="KG"> 2200.00 </capacity>
        <contents unit="KG"> 2200.00 </contents>
      </tank>
      <tank type="FUEL">
        <location unit="M">
          <x> 15.6900 </x>
          <y> 0.0000 </y>
          <z> -0.1000 </z>
        </location>
        <capacity unit="KG"> 1070.00 </capacity>
        <contents unit="KG"> 1070.00 </contents>
      </tank>
    </propulsion>
    <flight_control name="su27s">
      <!-- the aircraft's profile for the platform (docs/control-architecture.md, section 7): what
           hangar knows of it - its design, its flight tests, its identified responses -->
      <property value="1">fsim/identity/version</property>
      <property value="1">fsim/identity/provenance</property>
      <property value="2">fsim/identity/class</property>
      <property value="2">fsim/identity/family</property>
      <property value="1">fsim/effectors/version</property>
      <property value="1">fsim/effectors/provenance</property>
      <property value="1">fsim/effectors/flaps</property>
      <property value="8">fsim/effectors/flaps_transit_s</property>
      <property value="1">fsim/effectors/neutral</property>
      <property value="1">fsim/effectors/pitch</property>
      <property value="0.0">fsim/effectors/pitch_trim</property>
      <property value="1">fsim/effectors/retractable_gear</property>
      <property value="1">fsim/effectors/roll</property>
      <property value="1">fsim/effectors/speedbrake</property>
      <property value="1">fsim/effectors/speedbrake_approach</property>
      <property value="1">fsim/effectors/wheel_brakes</property>
      <property value="0.0">fsim/effectors/yaw</property>
      <property value="1">fsim/envelope/version</property>
      <property value="1">fsim/envelope/provenance</property>
      <property value="26">fsim/envelope/clean/alpha_max_deg</property>
      <property value="62.4406">fsim/envelope/clean/cas_min_ms</property>
      <property value="9">fsim/envelope/clean/n_max</property>
      <property value="-3">fsim/envelope/clean/n_min</property>
      <property value="270">fsim/envelope/clean/roll_rate_max_deg_s</property>
      <property value="15.43">fsim/envelope/crosswind_max_ms</property>
      <property value="9.44">fsim/envelope/ground_pitch_max_deg</property>
      <property value="6.25">fsim/envelope/ground_turn_radius_m</property>
      <property value="0.2649">fsim/envelope/ground_yaw_accel_rad_s2</property>
      <property value="1">fsim/envelope/law_alpha</property>
      <property value="1">fsim/envelope/law_load_factor</property>
      <property value="1">fsim/envelope/law_roll_rate</property>
      <property value="1">fsim/propulsion/version</property>
      <property value="1">fsim/propulsion/provenance</property>
      <property value="1">fsim/propulsion/afterburner</property>
      <property value="2">fsim/propulsion/engines</property>
      <property value="0.189934">fsim/propulsion/spool_s</property>
      <property value="2">fsim/propulsion/type</property>
      <property value="1">fsim/plant/version</property>
      <property value="1">fsim/plant/provenance</property>
      <property value="-0.111554">fsim/plant/alpha_zero_lift_deg</property>
      <property value="3000">fsim/plant/altitude_m</property>
      <property value="128.233">fsim/plant/eas_ms</property>
      <property value="0.0">fsim/plant/elevator_trim</property>
      <property value="0.0">fsim/plant/elevator_trim_lift</property>
      <property value="9.39885">fsim/plant/pitch/gain</property>
      <property value="0.665595">fsim/plant/pitch/tau_s</property>
      <property value="2.7051">fsim/plant/roll/gain</property>
      <property value="0.181037">fsim/plant/roll/tau_s</property>
      <property value="6.4194">fsim/plant/speed/gain</property>
      <property value="0.189934">fsim/plant/speed/tau_s</property>
      <property value="146.514">fsim/plant/tas_ms</property>
      <property value="0.313639">fsim/plant/throttle_trim</property>
      <property value="0.128151">fsim/plant/yaw/gain</property>
      <property value="1">fsim/performance/version</property>
      <property value="1">fsim/performance/provenance</property>
      <property value="19991.8">fsim/performance/ceiling_m</property>
      <property value="326.784">fsim/performance/climb_ms</property>
      <property value="507.663">fsim/performance/max_tas_ms</property>
      <property value="1">fsim/applicability/version</property>
      <property value="1">fsim/applicability/provenance</property>
      <property value="1">fsim/applicability/aerobatic</property>
      <property value="1">fsim/applicability/carrier</property>
      <property value="2">fsim/applicability/drag_devices</property>
      <property value="1">fsim/applicability/flaps</property>
      <property value="1">fsim/applicability/ground_contact</property>
      <property value="2">fsim/applicability/releasable_stores</property>
      <property value="1">fsim/applicability/retractable_gear</property>
      <property value="0.0">fsim/applicability/vertical_flight</property>
      <property value="1">fsim/tables/version</property>
      <property value="1">fsim/tables/provenance</property>
      <property value="100">fsim/tables/altitude_m/h0</property>
      <property value="4000">fsim/tables/altitude_m/h1</property>
      <property value="8000">fsim/tables/altitude_m/h2</property>
      <property value="10972.8">fsim/tables/altitude_m/h3</property>
      <property value="12000">fsim/tables/altitude_m/h4</property>
      <property value="14990">fsim/tables/altitude_m/h5</property>
      <property value="16990">fsim/tables/altitude_m/h6</property>
      <property value="18990">fsim/tables/altitude_m/h7</property>
      <property value="0.82873">fsim/tables/best_endurance_fuel_kg_s/h0/w0</property>
      <property value="0.80614">fsim/tables/best_endurance_fuel_kg_s/h0/w1</property>
      <property value="0.80385">fsim/tables/best_endurance_fuel_kg_s/h0/w2</property>
      <property value="0.558634">fsim/tables/best_endurance_fuel_kg_s/h1/w0</property>
      <property value="0.57546">fsim/tables/best_endurance_fuel_kg_s/h1/w1</property>
      <property value="0.559686">fsim/tables/best_endurance_fuel_kg_s/h1/w2</property>
      <property value="0.414365">fsim/tables/best_endurance_fuel_kg_s/h2/w0</property>
      <property value="0.446566">fsim/tables/best_endurance_fuel_kg_s/h2/w1</property>
      <property value="0.478683">fsim/tables/best_endurance_fuel_kg_s/h2/w2</property>
      <property value="0.34948">fsim/tables/best_endurance_fuel_kg_s/h3/w0</property>
      <property value="0.385479">fsim/tables/best_endurance_fuel_kg_s/h3/w1</property>
      <property value="0.419181">fsim/tables/best_endurance_fuel_kg_s/h3/w2</property>
      <property value="0.335615">fsim/tables/best_endurance_fuel_kg_s/h4/w0</property>
      <property value="0.366913">fsim/tables/best_endurance_fuel_kg_s/h4/w1</property>
      <property value="0.403602">fsim/tables/best_endurance_fuel_kg_s/h4/w2</property>
      <property value="0.290435">fsim/tables/best_endurance_fuel_kg_s/h5/w0</property>
      <property value="0.333652">fsim/tables/best_endurance_fuel_kg_s/h5/w1</property>
      <property value="0.387134">fsim/tables/best_endurance_fuel_kg_s/h5/w2</property>
      <property value="0.220528">fsim/tables/best_endurance_fuel_kg_s/h6/w0</property>
      <property value="1.0505">fsim/tables/best_endurance_fuel_kg_s/h6/w1</property>
      <property value="1.29031">fsim/tables/best_endurance_fuel_kg_s/h6/w2</property>
      <property value="1.04776">fsim/tables/best_endurance_fuel_kg_s/h7/w0</property>
      <property value="1.34022">fsim/tables/best_endurance_fuel_kg_s/h7/w1</property>
      <property value="1.56979">fsim/tables/best_endurance_fuel_kg_s/h7/w2</property>
      <property value="199.267">fsim/tables/best_endurance_tas_ms/h0/w0</property>
      <property value="191.602">fsim/tables/best_endurance_tas_ms/h0/w1</property>
      <property value="186.539">fsim/tables/best_endurance_tas_ms/h0/w2</property>
      <property value="192.84">fsim/tables/best_endurance_tas_ms/h1/w0</property>
      <property value="189.62">fsim/tables/best_endurance_tas_ms/h1/w1</property>
      <property value="155.54">fsim/tables/best_endurance_tas_ms/h1/w2</property>
      <property value="197.936">fsim/tables/best_endurance_tas_ms/h2/w0</property>
      <property value="199.316">fsim/tables/best_endurance_tas_ms/h2/w1</property>
      <property value="193.298">fsim/tables/best_endurance_tas_ms/h2/w2</property>
      <property value="211.423">fsim/tables/best_endurance_tas_ms/h3/w0</property>
      <property value="216.459">fsim/tables/best_endurance_tas_ms/h3/w1</property>
      <property value="228.882">fsim/tables/best_endurance_tas_ms/h3/w2</property>
      <property value="218.056">fsim/tables/best_endurance_tas_ms/h4/w0</property>
      <property value="233.708">fsim/tables/best_endurance_tas_ms/h4/w1</property>
      <property value="239.221">fsim/tables/best_endurance_tas_ms/h4/w2</property>
      <property value="257.955">fsim/tables/best_endurance_tas_ms/h5/w0</property>
      <property value="259.815">fsim/tables/best_endurance_tas_ms/h5/w1</property>
      <property value="261.916">fsim/tables/best_endurance_tas_ms/h5/w2</property>
      <property value="272.734">fsim/tables/best_endurance_tas_ms/h6/w0</property>
      <property value="275.467">fsim/tables/best_endurance_tas_ms/h6/w1</property>
      <property value="276.2">fsim/tables/best_endurance_tas_ms/h6/w2</property>
      <property value="277.778">fsim/tables/best_endurance_tas_ms/h7/w0</property>
      <property value="271.565">fsim/tables/best_endurance_tas_ms/h7/w1</property>
      <property value="284.795">fsim/tables/best_endurance_tas_ms/h7/w2</property>
      <property value="0.82873">fsim/tables/best_range_fuel_kg_s/h0/w0</property>
      <property value="0.80614">fsim/tables/best_range_fuel_kg_s/h0/w1</property>
      <property value="0.80385">fsim/tables/best_range_fuel_kg_s/h0/w2</property>
      <property value="0.558634">fsim/tables/best_range_fuel_kg_s/h1/w0</property>
      <property value="0.646179">fsim/tables/best_range_fuel_kg_s/h1/w1</property>
      <property value="0.714709">fsim/tables/best_range_fuel_kg_s/h1/w2</property>
      <property value="0.492015">fsim/tables/best_range_fuel_kg_s/h2/w0</property>
      <property value="0.526543">fsim/tables/best_range_fuel_kg_s/h2/w1</property>
      <property value="0.567724">fsim/tables/best_range_fuel_kg_s/h2/w2</property>
      <property value="0.387732">fsim/tables/best_range_fuel_kg_s/h3/w0</property>
      <property value="0.4184">fsim/tables/best_range_fuel_kg_s/h3/w1</property>
      <property value="0.445262">fsim/tables/best_range_fuel_kg_s/h3/w2</property>
      <property value="0.362854">fsim/tables/best_range_fuel_kg_s/h4/w0</property>
      <property value="0.397786">fsim/tables/best_range_fuel_kg_s/h4/w1</property>
      <property value="0.430902">fsim/tables/best_range_fuel_kg_s/h4/w2</property>
      <property value="0.309503">fsim/tables/best_range_fuel_kg_s/h5/w0</property>
      <property value="0.347075">fsim/tables/best_range_fuel_kg_s/h5/w1</property>
      <property value="0.405387">fsim/tables/best_range_fuel_kg_s/h5/w2</property>
      <property value="0.321697">fsim/tables/best_range_fuel_kg_s/h6/w0</property>
      <property value="1.09419">fsim/tables/best_range_fuel_kg_s/h6/w1</property>
      <property value="1.32664">fsim/tables/best_range_fuel_kg_s/h6/w2</property>
      <property value="1.07696">fsim/tables/best_range_fuel_kg_s/h7/w0</property>
      <property value="1.34032">fsim/tables/best_range_fuel_kg_s/h7/w1</property>
      <property value="2.35742">fsim/tables/best_range_fuel_kg_s/h7/w2</property>
      <property value="199.267">fsim/tables/best_range_tas_ms/h0/w0</property>
      <property value="191.602">fsim/tables/best_range_tas_ms/h0/w1</property>
      <property value="186.539">fsim/tables/best_range_tas_ms/h0/w2</property>
      <property value="192.84">fsim/tables/best_range_tas_ms/h1/w0</property>
      <property value="216.107">fsim/tables/best_range_tas_ms/h1/w1</property>
      <property value="231.996">fsim/tables/best_range_tas_ms/h1/w2</property>
      <property value="249.522">fsim/tables/best_range_tas_ms/h2/w0</property>
      <property value="256.954">fsim/tables/best_range_tas_ms/h2/w1</property>
      <property value="265.369">fsim/tables/best_range_tas_ms/h2/w2</property>
      <property value="259.019">fsim/tables/best_range_tas_ms/h3/w0</property>
      <property value="263.941">fsim/tables/best_range_tas_ms/h3/w1</property>
      <property value="265.505">fsim/tables/best_range_tas_ms/h3/w2</property>
      <property value="265.344">fsim/tables/best_range_tas_ms/h4/w0</property>
      <property value="265.148">fsim/tables/best_range_tas_ms/h4/w1</property>
      <property value="269.402">fsim/tables/best_range_tas_ms/h4/w2</property>
      <property value="268.11">fsim/tables/best_range_tas_ms/h5/w0</property>
      <property value="270.378">fsim/tables/best_range_tas_ms/h5/w1</property>
      <property value="273.725">fsim/tables/best_range_tas_ms/h5/w2</property>
      <property value="276.248">fsim/tables/best_range_tas_ms/h6/w0</property>
      <property value="283.301">fsim/tables/best_range_tas_ms/h6/w1</property>
      <property value="284.234">fsim/tables/best_range_tas_ms/h6/w2</property>
      <property value="285.978">fsim/tables/best_range_tas_ms/h7/w0</property>
      <property value="291.919">fsim/tables/best_range_tas_ms/h7/w1</property>
      <property value="433.177">fsim/tables/best_range_tas_ms/h7/w2</property>
      <property value="313.433">fsim/tables/climb_tas_ms/h0/w0</property>
      <property value="315.101">fsim/tables/climb_tas_ms/h0/w1</property>
      <property value="317.114">fsim/tables/climb_tas_ms/h0/w2</property>
      <property value="303.183">fsim/tables/climb_tas_ms/h1/w0</property>
      <property value="304.348">fsim/tables/climb_tas_ms/h1/w1</property>
      <property value="308.559">fsim/tables/climb_tas_ms/h1/w2</property>
      <property value="295.759">fsim/tables/climb_tas_ms/h2/w0</property>
      <property value="294.694">fsim/tables/climb_tas_ms/h2/w1</property>
      <property value="297.128">fsim/tables/climb_tas_ms/h2/w2</property>
      <property value="571.284">fsim/tables/climb_tas_ms/h3/w0</property>
      <property value="566.269">fsim/tables/climb_tas_ms/h3/w1</property>
      <property value="562.748">fsim/tables/climb_tas_ms/h3/w2</property>
      <property value="568.126">fsim/tables/climb_tas_ms/h4/w0</property>
      <property value="566.596">fsim/tables/climb_tas_ms/h4/w1</property>
      <property value="556.75">fsim/tables/climb_tas_ms/h4/w2</property>
      <property value="575.431">fsim/tables/climb_tas_ms/h5/w0</property>
      <property value="504.435">fsim/tables/climb_tas_ms/h5/w1</property>
      <property value="290.119">fsim/tables/climb_tas_ms/h5/w2</property>
      <property value="570.401">fsim/tables/climb_tas_ms/h6/w0</property>
      <property value="292.259">fsim/tables/climb_tas_ms/h6/w1</property>
      <property value="292.355">fsim/tables/climb_tas_ms/h6/w2</property>
      <property value="298.118">fsim/tables/climb_tas_ms/h7/w0</property>
      <property value="283.231">fsim/tables/climb_tas_ms/h7/w1</property>
      <property value="294.529">fsim/tables/climb_tas_ms/h7/w2</property>
      <property value="5270">fsim/tables/fuel_capacity_kg</property>
      <property value="0.82873">fsim/tables/fuel_kg_s/h0/w0/v0</property>
      <property value="0.932704">fsim/tables/fuel_kg_s/h0/w0/v1</property>
      <property value="3.68276">fsim/tables/fuel_kg_s/h0/w0/v10</property>
      <property value="3.23327">fsim/tables/fuel_kg_s/h0/w0/v11</property>
      <property value="3.87146">fsim/tables/fuel_kg_s/h0/w0/v12</property>
      <property value="11.9325">fsim/tables/fuel_kg_s/h0/w0/v13</property>
      <property value="13.815">fsim/tables/fuel_kg_s/h0/w0/v14</property>
      <property value="16.2679">fsim/tables/fuel_kg_s/h0/w0/v15</property>
      <property value="1.04219">fsim/tables/fuel_kg_s/h0/w0/v2</property>
      <property value="1.16673">fsim/tables/fuel_kg_s/h0/w0/v3</property>
      <property value="1.2961">fsim/tables/fuel_kg_s/h0/w0/v4</property>
      <property value="1.43547">fsim/tables/fuel_kg_s/h0/w0/v5</property>
      <property value="1.61106">fsim/tables/fuel_kg_s/h0/w0/v6</property>
      <property value="2.09597">fsim/tables/fuel_kg_s/h0/w0/v7</property>
      <property value="3.52699">fsim/tables/fuel_kg_s/h0/w0/v8</property>
      <property value="3.78824">fsim/tables/fuel_kg_s/h0/w0/v9</property>
      <property value="0.80614">fsim/tables/fuel_kg_s/h0/w1/v0</property>
      <property value="0.909969">fsim/tables/fuel_kg_s/h0/w1/v1</property>
      <property value="11.5226">fsim/tables/fuel_kg_s/h0/w1/v10</property>
      <property value="12.6589">fsim/tables/fuel_kg_s/h0/w1/v11</property>
      <property value="4.06956">fsim/tables/fuel_kg_s/h0/w1/v12</property>
      <property value="11.8605">fsim/tables/fuel_kg_s/h0/w1/v13</property>
      <property value="13.7881">fsim/tables/fuel_kg_s/h0/w1/v14</property>
      <property value="16.2759">fsim/tables/fuel_kg_s/h0/w1/v15</property>
      <property value="1.01924">fsim/tables/fuel_kg_s/h0/w1/v2</property>
      <property value="1.13313">fsim/tables/fuel_kg_s/h0/w1/v3</property>
      <property value="1.26363">fsim/tables/fuel_kg_s/h0/w1/v4</property>
      <property value="1.40186">fsim/tables/fuel_kg_s/h0/w1/v5</property>
      <property value="1.56859">fsim/tables/fuel_kg_s/h0/w1/v6</property>
      <property value="1.96214">fsim/tables/fuel_kg_s/h0/w1/v7</property>
      <property value="3.18433">fsim/tables/fuel_kg_s/h0/w1/v8</property>
      <property value="10.4154">fsim/tables/fuel_kg_s/h0/w1/v9</property>
      <property value="0.803846">fsim/tables/fuel_kg_s/h0/w2/v0</property>
      <property value="0.900671">fsim/tables/fuel_kg_s/h0/w2/v1</property>
      <property value="11.4363">fsim/tables/fuel_kg_s/h0/w2/v10</property>
      <property value="12.5957">fsim/tables/fuel_kg_s/h0/w2/v11</property>
      <property value="13.7194">fsim/tables/fuel_kg_s/h0/w2/v12</property>
      <property value="14.8767">fsim/tables/fuel_kg_s/h0/w2/v13</property>
      <property value="16.0663">fsim/tables/fuel_kg_s/h0/w2/v14</property>
      <property value="17.3286">fsim/tables/fuel_kg_s/h0/w2/v15</property>
      <property value="1.00989">fsim/tables/fuel_kg_s/h0/w2/v2</property>
      <property value="1.12404">fsim/tables/fuel_kg_s/h0/w2/v3</property>
      <property value="1.24444">fsim/tables/fuel_kg_s/h0/w2/v4</property>
      <property value="1.38196">fsim/tables/fuel_kg_s/h0/w2/v5</property>
      <property value="1.54249">fsim/tables/fuel_kg_s/h0/w2/v6</property>
      <property value="1.87595">fsim/tables/fuel_kg_s/h0/w2/v7</property>
      <property value="2.96737">fsim/tables/fuel_kg_s/h0/w2/v8</property>
      <property value="10.3133">fsim/tables/fuel_kg_s/h0/w2/v9</property>
      <property value="0.558634">fsim/tables/fuel_kg_s/h1/w0/v0</property>
      <property value="0.629218">fsim/tables/fuel_kg_s/h1/w0/v1</property>
      <property value="2.59004">fsim/tables/fuel_kg_s/h1/w0/v10</property>
      <property value="2.46914">fsim/tables/fuel_kg_s/h1/w0/v11</property>
      <property value="2.83286">fsim/tables/fuel_kg_s/h1/w0/v12</property>
      <property value="9.34502">fsim/tables/fuel_kg_s/h1/w0/v13</property>
      <property value="11.1705">fsim/tables/fuel_kg_s/h1/w0/v14</property>
      <property value="13.4387">fsim/tables/fuel_kg_s/h1/w0/v15</property>
      <property value="0.713292">fsim/tables/fuel_kg_s/h1/w0/v2</property>
      <property value="0.801686">fsim/tables/fuel_kg_s/h1/w0/v3</property>
      <property value="0.902637">fsim/tables/fuel_kg_s/h1/w0/v4</property>
      <property value="1.10095">fsim/tables/fuel_kg_s/h1/w0/v5</property>
      <property value="1.91466">fsim/tables/fuel_kg_s/h1/w0/v6</property>
      <property value="2.39742">fsim/tables/fuel_kg_s/h1/w0/v7</property>
      <property value="2.52633">fsim/tables/fuel_kg_s/h1/w0/v8</property>
      <property value="2.58364">fsim/tables/fuel_kg_s/h1/w0/v9</property>
      <property value="0.57546">fsim/tables/fuel_kg_s/h1/w1/v0</property>
      <property value="0.638262">fsim/tables/fuel_kg_s/h1/w1/v1</property>
      <property value="9.22398">fsim/tables/fuel_kg_s/h1/w1/v10</property>
      <property value="10.1376">fsim/tables/fuel_kg_s/h1/w1/v11</property>
      <property value="11.1226">fsim/tables/fuel_kg_s/h1/w1/v12</property>
      <property value="9.3339">fsim/tables/fuel_kg_s/h1/w1/v13</property>
      <property value="11.1632">fsim/tables/fuel_kg_s/h1/w1/v14</property>
      <property value="13.4373">fsim/tables/fuel_kg_s/h1/w1/v15</property>
      <property value="0.717832">fsim/tables/fuel_kg_s/h1/w1/v2</property>
      <property value="0.805764">fsim/tables/fuel_kg_s/h1/w1/v3</property>
      <property value="0.902186">fsim/tables/fuel_kg_s/h1/w1/v4</property>
      <property value="1.06173">fsim/tables/fuel_kg_s/h1/w1/v5</property>
      <property value="1.80613">fsim/tables/fuel_kg_s/h1/w1/v6</property>
      <property value="2.37985">fsim/tables/fuel_kg_s/h1/w1/v7</property>
      <property value="7.46765">fsim/tables/fuel_kg_s/h1/w1/v8</property>
      <property value="8.3404">fsim/tables/fuel_kg_s/h1/w1/v9</property>
      <property value="0.614518">fsim/tables/fuel_kg_s/h1/w2/v0</property>
      <property value="0.561119">fsim/tables/fuel_kg_s/h1/w2/v1</property>
      <property value="8.40109">fsim/tables/fuel_kg_s/h1/w2/v10</property>
      <property value="9.45635">fsim/tables/fuel_kg_s/h1/w2/v11</property>
      <property value="10.5695">fsim/tables/fuel_kg_s/h1/w2/v12</property>
      <property value="11.762">fsim/tables/fuel_kg_s/h1/w2/v13</property>
      <property value="13.0054">fsim/tables/fuel_kg_s/h1/w2/v14</property>
      <property value="14.2959">fsim/tables/fuel_kg_s/h1/w2/v15</property>
      <property value="0.584792">fsim/tables/fuel_kg_s/h1/w2/v2</property>
      <property value="0.644692">fsim/tables/fuel_kg_s/h1/w2/v3</property>
      <property value="0.725433">fsim/tables/fuel_kg_s/h1/w2/v4</property>
      <property value="0.829377">fsim/tables/fuel_kg_s/h1/w2/v5</property>
      <property value="0.947569">fsim/tables/fuel_kg_s/h1/w2/v6</property>
      <property value="1.29545">fsim/tables/fuel_kg_s/h1/w2/v7</property>
      <property value="2.28624">fsim/tables/fuel_kg_s/h1/w2/v8</property>
      <property value="7.35834">fsim/tables/fuel_kg_s/h1/w2/v9</property>
      <property value="0.414365">fsim/tables/fuel_kg_s/h2/w0/v0</property>
      <property value="0.451652">fsim/tables/fuel_kg_s/h2/w0/v1</property>
      <property value="7.15107">fsim/tables/fuel_kg_s/h2/w0/v10</property>
      <property value="1.8161">fsim/tables/fuel_kg_s/h2/w0/v11</property>
      <property value="1.9117">fsim/tables/fuel_kg_s/h2/w0/v12</property>
      <property value="6.80649">fsim/tables/fuel_kg_s/h2/w0/v13</property>
      <property value="8.40534">fsim/tables/fuel_kg_s/h2/w0/v14</property>
      <property value="10.1489">fsim/tables/fuel_kg_s/h2/w0/v15</property>
      <property value="0.500015">fsim/tables/fuel_kg_s/h2/w0/v2</property>
      <property value="0.572874">fsim/tables/fuel_kg_s/h2/w0/v3</property>
      <property value="0.846115">fsim/tables/fuel_kg_s/h2/w0/v4</property>
      <property value="1.32987">fsim/tables/fuel_kg_s/h2/w0/v5</property>
      <property value="4.49009">fsim/tables/fuel_kg_s/h2/w0/v6</property>
      <property value="5.09482">fsim/tables/fuel_kg_s/h2/w0/v7</property>
      <property value="5.73377">fsim/tables/fuel_kg_s/h2/w0/v8</property>
      <property value="6.42224">fsim/tables/fuel_kg_s/h2/w0/v9</property>
      <property value="0.446566">fsim/tables/fuel_kg_s/h2/w1/v0</property>
      <property value="0.476045">fsim/tables/fuel_kg_s/h2/w1/v1</property>
      <property value="7.18486">fsim/tables/fuel_kg_s/h2/w1/v10</property>
      <property value="7.94133">fsim/tables/fuel_kg_s/h2/w1/v11</property>
      <property value="8.72606">fsim/tables/fuel_kg_s/h2/w1/v12</property>
      <property value="9.53975">fsim/tables/fuel_kg_s/h2/w1/v13</property>
      <property value="10.3814">fsim/tables/fuel_kg_s/h2/w1/v14</property>
      <property value="11.2496">fsim/tables/fuel_kg_s/h2/w1/v15</property>
      <property value="0.522502">fsim/tables/fuel_kg_s/h2/w1/v2</property>
      <property value="0.590343">fsim/tables/fuel_kg_s/h2/w1/v3</property>
      <property value="0.881645">fsim/tables/fuel_kg_s/h2/w1/v4</property>
      <property value="1.3506">fsim/tables/fuel_kg_s/h2/w1/v5</property>
      <property value="4.55779">fsim/tables/fuel_kg_s/h2/w1/v6</property>
      <property value="5.16344">fsim/tables/fuel_kg_s/h2/w1/v7</property>
      <property value="5.78717">fsim/tables/fuel_kg_s/h2/w1/v8</property>
      <property value="6.45944">fsim/tables/fuel_kg_s/h2/w1/v9</property>
      <property value="0.660128">fsim/tables/fuel_kg_s/h2/w2/v0</property>
      <property value="0.510865">fsim/tables/fuel_kg_s/h2/w2/v1</property>
      <property value="6.5767">fsim/tables/fuel_kg_s/h2/w2/v10</property>
      <property value="7.43402">fsim/tables/fuel_kg_s/h2/w2/v11</property>
      <property value="8.32329">fsim/tables/fuel_kg_s/h2/w2/v12</property>
      <property value="9.25899">fsim/tables/fuel_kg_s/h2/w2/v13</property>
      <property value="10.2449">fsim/tables/fuel_kg_s/h2/w2/v14</property>
      <property value="11.2682">fsim/tables/fuel_kg_s/h2/w2/v15</property>
      <property value="0.47913">fsim/tables/fuel_kg_s/h2/w2/v2</property>
      <property value="0.497475">fsim/tables/fuel_kg_s/h2/w2/v3</property>
      <property value="0.543396">fsim/tables/fuel_kg_s/h2/w2/v4</property>
      <property value="0.620809">fsim/tables/fuel_kg_s/h2/w2/v5</property>
      <property value="1.17767">fsim/tables/fuel_kg_s/h2/w2/v6</property>
      <property value="1.47729">fsim/tables/fuel_kg_s/h2/w2/v7</property>
      <property value="5.04556">fsim/tables/fuel_kg_s/h2/w2/v8</property>
      <property value="5.78122">fsim/tables/fuel_kg_s/h2/w2/v9</property>
      <property value="0.34948">fsim/tables/fuel_kg_s/h3/w0/v0</property>
      <property value="0.365773">fsim/tables/fuel_kg_s/h3/w0/v1</property>
      <property value="5.82893">fsim/tables/fuel_kg_s/h3/w0/v10</property>
      <property value="6.42523">fsim/tables/fuel_kg_s/h3/w0/v11</property>
      <property value="1.38967">fsim/tables/fuel_kg_s/h3/w0/v12</property>
      <property value="4.92313">fsim/tables/fuel_kg_s/h3/w0/v13</property>
      <property value="6.00552">fsim/tables/fuel_kg_s/h3/w0/v14</property>
      <property value="8.00457">fsim/tables/fuel_kg_s/h3/w0/v15</property>
      <property value="0.406198">fsim/tables/fuel_kg_s/h3/w0/v2</property>
      <property value="0.675085">fsim/tables/fuel_kg_s/h3/w0/v3</property>
      <property value="0.905499">fsim/tables/fuel_kg_s/h3/w0/v4</property>
      <property value="3.21906">fsim/tables/fuel_kg_s/h3/w0/v5</property>
      <property value="3.67976">fsim/tables/fuel_kg_s/h3/w0/v6</property>
      <property value="4.16918">fsim/tables/fuel_kg_s/h3/w0/v7</property>
      <property value="4.69971">fsim/tables/fuel_kg_s/h3/w0/v8</property>
      <property value="5.25399">fsim/tables/fuel_kg_s/h3/w0/v9</property>
      <property value="0.385479">fsim/tables/fuel_kg_s/h3/w1/v0</property>
      <property value="0.39692">fsim/tables/fuel_kg_s/h3/w1/v1</property>
      <property value="5.92103">fsim/tables/fuel_kg_s/h3/w1/v10</property>
      <property value="6.51333">fsim/tables/fuel_kg_s/h3/w1/v11</property>
      <property value="7.12635">fsim/tables/fuel_kg_s/h3/w1/v12</property>
      <property value="7.75777">fsim/tables/fuel_kg_s/h3/w1/v13</property>
      <property value="8.40829">fsim/tables/fuel_kg_s/h3/w1/v14</property>
      <property value="9.0802">fsim/tables/fuel_kg_s/h3/w1/v15</property>
      <property value="0.435266">fsim/tables/fuel_kg_s/h3/w1/v2</property>
      <property value="0.768111">fsim/tables/fuel_kg_s/h3/w1/v3</property>
      <property value="0.943627">fsim/tables/fuel_kg_s/h3/w1/v4</property>
      <property value="3.31881">fsim/tables/fuel_kg_s/h3/w1/v5</property>
      <property value="3.78096">fsim/tables/fuel_kg_s/h3/w1/v6</property>
      <property value="4.27024">fsim/tables/fuel_kg_s/h3/w1/v7</property>
      <property value="4.79845">fsim/tables/fuel_kg_s/h3/w1/v8</property>
      <property value="5.34923">fsim/tables/fuel_kg_s/h3/w1/v9</property>
      <property value="0.661609">fsim/tables/fuel_kg_s/h3/w2/v0</property>
      <property value="0.477285">fsim/tables/fuel_kg_s/h3/w2/v1</property>
      <property value="5.46627">fsim/tables/fuel_kg_s/h3/w2/v10</property>
      <property value="6.14519">fsim/tables/fuel_kg_s/h3/w2/v11</property>
      <property value="6.84936">fsim/tables/fuel_kg_s/h3/w2/v12</property>
      <property value="7.58341">fsim/tables/fuel_kg_s/h3/w2/v13</property>
      <property value="8.34146">fsim/tables/fuel_kg_s/h3/w2/v14</property>
      <property value="9.12951">fsim/tables/fuel_kg_s/h3/w2/v15</property>
      <property value="0.426161">fsim/tables/fuel_kg_s/h3/w2/v2</property>
      <property value="0.422603">fsim/tables/fuel_kg_s/h3/w2/v3</property>
      <property value="0.459397">fsim/tables/fuel_kg_s/h3/w2/v4</property>
      <property value="0.856328">fsim/tables/fuel_kg_s/h3/w2/v5</property>
      <property value="3.1377">fsim/tables/fuel_kg_s/h3/w2/v6</property>
      <property value="3.64861">fsim/tables/fuel_kg_s/h3/w2/v7</property>
      <property value="4.20408">fsim/tables/fuel_kg_s/h3/w2/v8</property>
      <property value="4.8181">fsim/tables/fuel_kg_s/h3/w2/v9</property>
      <property value="0.335615">fsim/tables/fuel_kg_s/h4/w0/v0</property>
      <property value="0.344536">fsim/tables/fuel_kg_s/h4/w0/v1</property>
      <property value="5.07101">fsim/tables/fuel_kg_s/h4/w0/v10</property>
      <property value="5.57496">fsim/tables/fuel_kg_s/h4/w0/v11</property>
      <property value="6.09677">fsim/tables/fuel_kg_s/h4/w0/v12</property>
      <property value="6.63396">fsim/tables/fuel_kg_s/h4/w0/v13</property>
      <property value="7.18743">fsim/tables/fuel_kg_s/h4/w0/v14</property>
      <property value="7.75922">fsim/tables/fuel_kg_s/h4/w0/v15</property>
      <property value="0.377347">fsim/tables/fuel_kg_s/h4/w0/v2</property>
      <property value="0.684077">fsim/tables/fuel_kg_s/h4/w0/v3</property>
      <property value="0.813787">fsim/tables/fuel_kg_s/h4/w0/v4</property>
      <property value="2.85424">fsim/tables/fuel_kg_s/h4/w0/v5</property>
      <property value="3.24791">fsim/tables/fuel_kg_s/h4/w0/v6</property>
      <property value="3.66543">fsim/tables/fuel_kg_s/h4/w0/v7</property>
      <property value="4.11547">fsim/tables/fuel_kg_s/h4/w0/v8</property>
      <property value="4.58406">fsim/tables/fuel_kg_s/h4/w0/v9</property>
      <property value="0.538736">fsim/tables/fuel_kg_s/h4/w1/v0</property>
      <property value="0.411402">fsim/tables/fuel_kg_s/h4/w1/v1</property>
      <property value="4.73091">fsim/tables/fuel_kg_s/h4/w1/v10</property>
      <property value="5.30278">fsim/tables/fuel_kg_s/h4/w1/v11</property>
      <property value="5.89403">fsim/tables/fuel_kg_s/h4/w1/v12</property>
      <property value="6.51037">fsim/tables/fuel_kg_s/h4/w1/v13</property>
      <property value="7.14651">fsim/tables/fuel_kg_s/h4/w1/v14</property>
      <property value="7.8077">fsim/tables/fuel_kg_s/h4/w1/v15</property>
      <property value="0.374377">fsim/tables/fuel_kg_s/h4/w1/v2</property>
      <property value="0.37419">fsim/tables/fuel_kg_s/h4/w1/v3</property>
      <property value="0.432969">fsim/tables/fuel_kg_s/h4/w1/v4</property>
      <property value="0.762038">fsim/tables/fuel_kg_s/h4/w1/v5</property>
      <property value="2.77634">fsim/tables/fuel_kg_s/h4/w1/v6</property>
      <property value="3.20336">fsim/tables/fuel_kg_s/h4/w1/v7</property>
      <property value="3.66719">fsim/tables/fuel_kg_s/h4/w1/v8</property>
      <property value="4.18606">fsim/tables/fuel_kg_s/h4/w1/v9</property>
      <property value="0.692539">fsim/tables/fuel_kg_s/h4/w2/v0</property>
      <property value="0.481054">fsim/tables/fuel_kg_s/h4/w2/v1</property>
      <property value="4.76698">fsim/tables/fuel_kg_s/h4/w2/v10</property>
      <property value="5.3405">fsim/tables/fuel_kg_s/h4/w2/v11</property>
      <property value="5.93405">fsim/tables/fuel_kg_s/h4/w2/v12</property>
      <property value="6.55312">fsim/tables/fuel_kg_s/h4/w2/v13</property>
      <property value="7.19147">fsim/tables/fuel_kg_s/h4/w2/v14</property>
      <property value="7.85585">fsim/tables/fuel_kg_s/h4/w2/v15</property>
      <property value="0.417734">fsim/tables/fuel_kg_s/h4/w2/v2</property>
      <property value="0.405848">fsim/tables/fuel_kg_s/h4/w2/v3</property>
      <property value="0.449245">fsim/tables/fuel_kg_s/h4/w2/v4</property>
      <property value="0.777422">fsim/tables/fuel_kg_s/h4/w2/v5</property>
      <property value="2.83404">fsim/tables/fuel_kg_s/h4/w2/v6</property>
      <property value="3.26923">fsim/tables/fuel_kg_s/h4/w2/v7</property>
      <property value="3.72529">fsim/tables/fuel_kg_s/h4/w2/v8</property>
      <property value="4.23238">fsim/tables/fuel_kg_s/h4/w2/v9</property>
      <property value="0.509906">fsim/tables/fuel_kg_s/h5/w0/v0</property>
      <property value="0.348036">fsim/tables/fuel_kg_s/h5/w0/v1</property>
      <property value="3.21121">fsim/tables/fuel_kg_s/h5/w0/v10</property>
      <property value="3.54516">fsim/tables/fuel_kg_s/h5/w0/v11</property>
      <property value="3.88383">fsim/tables/fuel_kg_s/h5/w0/v12</property>
      <property value="4.23576">fsim/tables/fuel_kg_s/h5/w0/v13</property>
      <property value="4.59667">fsim/tables/fuel_kg_s/h5/w0/v14</property>
      <property value="4.98962">fsim/tables/fuel_kg_s/h5/w0/v15</property>
      <property value="0.31259">fsim/tables/fuel_kg_s/h5/w0/v2</property>
      <property value="0.308886">fsim/tables/fuel_kg_s/h5/w0/v3</property>
      <property value="0.467344">fsim/tables/fuel_kg_s/h5/w0/v4</property>
      <property value="1.78576">fsim/tables/fuel_kg_s/h5/w0/v5</property>
      <property value="2.04619">fsim/tables/fuel_kg_s/h5/w0/v6</property>
      <property value="2.30028">fsim/tables/fuel_kg_s/h5/w0/v7</property>
      <property value="2.58346">fsim/tables/fuel_kg_s/h5/w0/v8</property>
      <property value="2.89518">fsim/tables/fuel_kg_s/h5/w0/v9</property>
      <property value="1.81574">fsim/tables/fuel_kg_s/h5/w1/v0</property>
      <property value="0.424943">fsim/tables/fuel_kg_s/h5/w1/v1</property>
      <property value="3.29368">fsim/tables/fuel_kg_s/h5/w1/v10</property>
      <property value="3.62732">fsim/tables/fuel_kg_s/h5/w1/v11</property>
      <property value="3.96751">fsim/tables/fuel_kg_s/h5/w1/v12</property>
      <property value="4.32315">fsim/tables/fuel_kg_s/h5/w1/v13</property>
      <property value="4.68235">fsim/tables/fuel_kg_s/h5/w1/v14</property>
      <property value="5.05795">fsim/tables/fuel_kg_s/h5/w1/v15</property>
      <property value="0.364025">fsim/tables/fuel_kg_s/h5/w1/v2</property>
      <property value="0.345927">fsim/tables/fuel_kg_s/h5/w1/v3</property>
      <property value="0.490436">fsim/tables/fuel_kg_s/h5/w1/v4</property>
      <property value="1.9083">fsim/tables/fuel_kg_s/h5/w1/v5</property>
      <property value="2.17924">fsim/tables/fuel_kg_s/h5/w1/v6</property>
      <property value="2.41411">fsim/tables/fuel_kg_s/h5/w1/v7</property>
      <property value="2.67437">fsim/tables/fuel_kg_s/h5/w1/v8</property>
      <property value="2.98202">fsim/tables/fuel_kg_s/h5/w1/v9</property>
      <property value="1.61853">fsim/tables/fuel_kg_s/h5/w2/v1</property>
      <property value="3.39582">fsim/tables/fuel_kg_s/h5/w2/v10</property>
      <property value="3.71042">fsim/tables/fuel_kg_s/h5/w2/v11</property>
      <property value="4.03357">fsim/tables/fuel_kg_s/h5/w2/v12</property>
      <property value="4.38216">fsim/tables/fuel_kg_s/h5/w2/v13</property>
      <property value="4.72369">fsim/tables/fuel_kg_s/h5/w2/v14</property>
      <property value="5.09734">fsim/tables/fuel_kg_s/h5/w2/v15</property>
      <property value="0.429754">fsim/tables/fuel_kg_s/h5/w2/v2</property>
      <property value="0.390352">fsim/tables/fuel_kg_s/h5/w2/v3</property>
      <property value="0.489522">fsim/tables/fuel_kg_s/h5/w2/v4</property>
      <property value="2.02011">fsim/tables/fuel_kg_s/h5/w2/v5</property>
      <property value="2.30134">fsim/tables/fuel_kg_s/h5/w2/v6</property>
      <property value="2.52969">fsim/tables/fuel_kg_s/h5/w2/v7</property>
      <property value="2.78908">fsim/tables/fuel_kg_s/h5/w2/v8</property>
      <property value="3.09207">fsim/tables/fuel_kg_s/h5/w2/v9</property>
      <property value="1.49748">fsim/tables/fuel_kg_s/h6/w0/v0</property>
      <property value="1.11144">fsim/tables/fuel_kg_s/h6/w0/v1</property>
      <property value="2.62137">fsim/tables/fuel_kg_s/h6/w0/v10</property>
      <property value="2.84806">fsim/tables/fuel_kg_s/h6/w0/v11</property>
      <property value="3.06361">fsim/tables/fuel_kg_s/h6/w0/v12</property>
      <property value="3.29885">fsim/tables/fuel_kg_s/h6/w0/v13</property>
      <property value="3.53945">fsim/tables/fuel_kg_s/h6/w0/v14</property>
      <property value="3.79299">fsim/tables/fuel_kg_s/h6/w0/v15</property>
      <property value="0.31862">fsim/tables/fuel_kg_s/h6/w0/v2</property>
      <property value="0.323675">fsim/tables/fuel_kg_s/h6/w0/v3</property>
      <property value="1.44747">fsim/tables/fuel_kg_s/h6/w0/v4</property>
      <property value="1.66924">fsim/tables/fuel_kg_s/h6/w0/v5</property>
      <property value="1.83436">fsim/tables/fuel_kg_s/h6/w0/v6</property>
      <property value="1.99512">fsim/tables/fuel_kg_s/h6/w0/v7</property>
      <property value="2.18896">fsim/tables/fuel_kg_s/h6/w0/v8</property>
      <property value="2.41376">fsim/tables/fuel_kg_s/h6/w0/v9</property>
      <property value="1.42666">fsim/tables/fuel_kg_s/h6/w1/v1</property>
      <property value="2.75443">fsim/tables/fuel_kg_s/h6/w1/v10</property>
      <property value="2.98274">fsim/tables/fuel_kg_s/h6/w1/v11</property>
      <property value="3.20448">fsim/tables/fuel_kg_s/h6/w1/v12</property>
      <property value="3.43785">fsim/tables/fuel_kg_s/h6/w1/v13</property>
      <property value="3.66179">fsim/tables/fuel_kg_s/h6/w1/v14</property>
      <property value="3.89461">fsim/tables/fuel_kg_s/h6/w1/v15</property>
      <property value="1.17863">fsim/tables/fuel_kg_s/h6/w1/v2</property>
      <property value="1.08637">fsim/tables/fuel_kg_s/h6/w1/v3</property>
      <property value="1.59403">fsim/tables/fuel_kg_s/h6/w1/v4</property>
      <property value="1.82589">fsim/tables/fuel_kg_s/h6/w1/v5</property>
      <property value="1.98995">fsim/tables/fuel_kg_s/h6/w1/v6</property>
      <property value="2.1531">fsim/tables/fuel_kg_s/h6/w1/v7</property>
      <property value="2.33169">fsim/tables/fuel_kg_s/h6/w1/v8</property>
      <property value="2.54671">fsim/tables/fuel_kg_s/h6/w1/v9</property>
      <property value="1.66922">fsim/tables/fuel_kg_s/h6/w2/v0</property>
      <property value="1.39701">fsim/tables/fuel_kg_s/h6/w2/v1</property>
      <property value="2.98951">fsim/tables/fuel_kg_s/h6/w2/v10</property>
      <property value="3.19117">fsim/tables/fuel_kg_s/h6/w2/v11</property>
      <property value="3.37625">fsim/tables/fuel_kg_s/h6/w2/v12</property>
      <property value="3.5882">fsim/tables/fuel_kg_s/h6/w2/v13</property>
      <property value="3.79848">fsim/tables/fuel_kg_s/h6/w2/v14</property>
      <property value="4.00622">fsim/tables/fuel_kg_s/h6/w2/v15</property>
      <property value="1.32249">fsim/tables/fuel_kg_s/h6/w2/v2</property>
      <property value="1.75879">fsim/tables/fuel_kg_s/h6/w2/v3</property>
      <property value="1.96752">fsim/tables/fuel_kg_s/h6/w2/v4</property>
      <property value="2.14112">fsim/tables/fuel_kg_s/h6/w2/v5</property>
      <property value="2.27575">fsim/tables/fuel_kg_s/h6/w2/v6</property>
      <property value="2.42081">fsim/tables/fuel_kg_s/h6/w2/v7</property>
      <property value="2.60038">fsim/tables/fuel_kg_s/h6/w2/v8</property>
      <property value="2.80911">fsim/tables/fuel_kg_s/h6/w2/v9</property>
      <property value="1.32282">fsim/tables/fuel_kg_s/h7/w0/v0</property>
      <property value="1.11092">fsim/tables/fuel_kg_s/h7/w0/v1</property>
      <property value="2.22235">fsim/tables/fuel_kg_s/h7/w0/v10</property>
      <property value="2.35801">fsim/tables/fuel_kg_s/h7/w0/v11</property>
      <property value="2.498">fsim/tables/fuel_kg_s/h7/w0/v12</property>
      <property value="2.6287">fsim/tables/fuel_kg_s/h7/w0/v13</property>
      <property value="2.76514">fsim/tables/fuel_kg_s/h7/w0/v14</property>
      <property value="2.92269">fsim/tables/fuel_kg_s/h7/w0/v15</property>
      <property value="1.07447">fsim/tables/fuel_kg_s/h7/w0/v2</property>
      <property value="1.38148">fsim/tables/fuel_kg_s/h7/w0/v3</property>
      <property value="1.52441">fsim/tables/fuel_kg_s/h7/w0/v4</property>
      <property value="1.65365">fsim/tables/fuel_kg_s/h7/w0/v5</property>
      <property value="1.74343">fsim/tables/fuel_kg_s/h7/w0/v6</property>
      <property value="1.84053">fsim/tables/fuel_kg_s/h7/w0/v7</property>
      <property value="1.95045">fsim/tables/fuel_kg_s/h7/w0/v8</property>
      <property value="2.08842">fsim/tables/fuel_kg_s/h7/w0/v9</property>
      <property value="1.34022">fsim/tables/fuel_kg_s/h7/w1/v1</property>
      <property value="2.49633">fsim/tables/fuel_kg_s/h7/w1/v10</property>
      <property value="2.57903">fsim/tables/fuel_kg_s/h7/w1/v11</property>
      <property value="2.65958">fsim/tables/fuel_kg_s/h7/w1/v12</property>
      <property value="2.74268">fsim/tables/fuel_kg_s/h7/w1/v13</property>
      <property value="2.83454">fsim/tables/fuel_kg_s/h7/w1/v14</property>
      <property value="2.92435">fsim/tables/fuel_kg_s/h7/w1/v15</property>
      <property value="1.34033">fsim/tables/fuel_kg_s/h7/w1/v2</property>
      <property value="1.62319">fsim/tables/fuel_kg_s/h7/w1/v3</property>
      <property value="1.78276">fsim/tables/fuel_kg_s/h7/w1/v4</property>
      <property value="1.89176">fsim/tables/fuel_kg_s/h7/w1/v5</property>
      <property value="1.95942">fsim/tables/fuel_kg_s/h7/w1/v6</property>
      <property value="2.02685">fsim/tables/fuel_kg_s/h7/w1/v7</property>
      <property value="2.11147">fsim/tables/fuel_kg_s/h7/w1/v8</property>
      <property value="2.21223">fsim/tables/fuel_kg_s/h7/w1/v9</property>
      <property value="2.17534">fsim/tables/fuel_kg_s/h7/w2/v10</property>
      <property value="2.21101">fsim/tables/fuel_kg_s/h7/w2/v11</property>
      <property value="2.2462">fsim/tables/fuel_kg_s/h7/w2/v12</property>
      <property value="2.2808">fsim/tables/fuel_kg_s/h7/w2/v13</property>
      <property value="2.31886">fsim/tables/fuel_kg_s/h7/w2/v14</property>
      <property value="2.35742">fsim/tables/fuel_kg_s/h7/w2/v15</property>
      <property value="1.56979">fsim/tables/fuel_kg_s/h7/w2/v2</property>
      <property value="1.62144">fsim/tables/fuel_kg_s/h7/w2/v3</property>
      <property value="1.84971">fsim/tables/fuel_kg_s/h7/w2/v4</property>
      <property value="2.03327">fsim/tables/fuel_kg_s/h7/w2/v5</property>
      <property value="2.0578">fsim/tables/fuel_kg_s/h7/w2/v6</property>
      <property value="2.0829">fsim/tables/fuel_kg_s/h7/w2/v7</property>
      <property value="2.10764">fsim/tables/fuel_kg_s/h7/w2/v8</property>
      <property value="2.13961">fsim/tables/fuel_kg_s/h7/w2/v9</property>
      <property value="399.194">fsim/tables/max_climb_ms/h0/w0</property>
      <property value="353.067">fsim/tables/max_climb_ms/h0/w1</property>
      <property value="316.114">fsim/tables/max_climb_ms/h0/w2</property>
      <property value="310.832">fsim/tables/max_climb_ms/h1/w0</property>
      <property value="274.1">fsim/tables/max_climb_ms/h1/w1</property>
      <property value="246.512">fsim/tables/max_climb_ms/h1/w2</property>
      <property value="228.213">fsim/tables/max_climb_ms/h2/w0</property>
      <property value="200.095">fsim/tables/max_climb_ms/h2/w1</property>
      <property value="178.578">fsim/tables/max_climb_ms/h2/w2</property>
      <property value="199.262">fsim/tables/max_climb_ms/h3/w0</property>
      <property value="170.728">fsim/tables/max_climb_ms/h3/w1</property>
      <property value="148.493">fsim/tables/max_climb_ms/h3/w2</property>
      <property value="166.165">fsim/tables/max_climb_ms/h4/w0</property>
      <property value="136.356">fsim/tables/max_climb_ms/h4/w1</property>
      <property value="122.905">fsim/tables/max_climb_ms/h4/w2</property>
      <property value="91.4121">fsim/tables/max_climb_ms/h5/w0</property>
      <property value="74.8909">fsim/tables/max_climb_ms/h5/w1</property>
      <property value="65.1457">fsim/tables/max_climb_ms/h5/w2</property>
      <property value="55.712">fsim/tables/max_climb_ms/h6/w0</property>
      <property value="44.2238">fsim/tables/max_climb_ms/h6/w1</property>
      <property value="36.2263">fsim/tables/max_climb_ms/h6/w2</property>
      <property value="29.1736">fsim/tables/max_climb_ms/h7/w0</property>
      <property value="20.2156">fsim/tables/max_climb_ms/h7/w1</property>
      <property value="11.9589">fsim/tables/max_climb_ms/h7/w2</property>
      <property value="508.046">fsim/tables/max_tas_ms/h0/w0</property>
      <property value="507.566">fsim/tables/max_tas_ms/h0/w1</property>
      <property value="507.088">fsim/tables/max_tas_ms/h0/w2</property>
      <property value="568.67">fsim/tables/max_tas_ms/h1/w0</property>
      <property value="567.94">fsim/tables/max_tas_ms/h1/w1</property>
      <property value="567.209">fsim/tables/max_tas_ms/h1/w2</property>
      <property value="638.81">fsim/tables/max_tas_ms/h2/w0</property>
      <property value="638.159">fsim/tables/max_tas_ms/h2/w1</property>
      <property value="637.586">fsim/tables/max_tas_ms/h2/w2</property>
      <property value="694.809">fsim/tables/max_tas_ms/h3/w0</property>
      <property value="693.678">fsim/tables/max_tas_ms/h3/w1</property>
      <property value="691.856">fsim/tables/max_tas_ms/h3/w2</property>
      <property value="693.958">fsim/tables/max_tas_ms/h4/w0</property>
      <property value="691.729">fsim/tables/max_tas_ms/h4/w1</property>
      <property value="689.734">fsim/tables/max_tas_ms/h4/w2</property>
      <property value="686.343">fsim/tables/max_tas_ms/h5/w0</property>
      <property value="682.452">fsim/tables/max_tas_ms/h5/w1</property>
      <property value="674.745">fsim/tables/max_tas_ms/h5/w2</property>
      <property value="674.929">fsim/tables/max_tas_ms/h6/w0</property>
      <property value="666.244">fsim/tables/max_tas_ms/h6/w1</property>
      <property value="654.858">fsim/tables/max_tas_ms/h6/w2</property>
      <property value="634.615">fsim/tables/max_tas_ms/h7/w0</property>
      <property value="604.504">fsim/tables/max_tas_ms/h7/w1</property>
      <property value="453.95">fsim/tables/max_tas_ms/h7/w2</property>
      <property value="199.265">fsim/tables/min_tas_ms/h0/w0</property>
      <property value="191.601">fsim/tables/min_tas_ms/h0/w1</property>
      <property value="186.539">fsim/tables/min_tas_ms/h0/w2</property>
      <property value="192.839">fsim/tables/min_tas_ms/h1/w0</property>
      <property value="189.619">fsim/tables/min_tas_ms/h1/w1</property>
      <property value="121.453">fsim/tables/min_tas_ms/h1/w2</property>
      <property value="197.933">fsim/tables/min_tas_ms/h2/w0</property>
      <property value="199.313">fsim/tables/min_tas_ms/h2/w1</property>
      <property value="122.791">fsim/tables/min_tas_ms/h2/w2</property>
      <property value="211.417">fsim/tables/min_tas_ms/h3/w0</property>
      <property value="216.452">fsim/tables/min_tas_ms/h3/w1</property>
      <property value="136.659">fsim/tables/min_tas_ms/h3/w2</property>
      <property value="218.05">fsim/tables/min_tas_ms/h4/w0</property>
      <property value="146.111">fsim/tables/min_tas_ms/h4/w1</property>
      <property value="144.221">fsim/tables/min_tas_ms/h4/w2</property>
      <property value="175.492">fsim/tables/min_tas_ms/h5/w0</property>
      <property value="175.044">fsim/tables/min_tas_ms/h5/w1</property>
      <property value="172.435">fsim/tables/min_tas_ms/h5/w2</property>
      <property value="196.584">fsim/tables/min_tas_ms/h6/w0</property>
      <property value="195.728">fsim/tables/min_tas_ms/h6/w1</property>
      <property value="231.928">fsim/tables/min_tas_ms/h6/w2</property>
      <property value="237.18">fsim/tables/min_tas_ms/h7/w0</property>
      <property value="248.998">fsim/tables/min_tas_ms/h7/w1</property>
      <property value="260.575">fsim/tables/min_tas_ms/h7/w2</property>
      <property value="276.443">fsim/tables/ps_full_ms/h0/w0/v0</property>
      <property value="301.439">fsim/tables/ps_full_ms/h0/w0/v1</property>
      <property value="224.862">fsim/tables/ps_full_ms/h0/w0/v10</property>
      <property value="202.389">fsim/tables/ps_full_ms/h0/w0/v11</property>
      <property value="179.356">fsim/tables/ps_full_ms/h0/w0/v12</property>
      <property value="151.324">fsim/tables/ps_full_ms/h0/w0/v13</property>
      <property value="118.42">fsim/tables/ps_full_ms/h0/w0/v14</property>
      <property value="56.9409">fsim/tables/ps_full_ms/h0/w0/v15</property>
      <property value="325.758">fsim/tables/ps_full_ms/h0/w0/v2</property>
      <property value="349.42">fsim/tables/ps_full_ms/h0/w0/v3</property>
      <property value="372.314">fsim/tables/ps_full_ms/h0/w0/v4</property>
      <property value="392.295">fsim/tables/ps_full_ms/h0/w0/v5</property>
      <property value="397.702">fsim/tables/ps_full_ms/h0/w0/v6</property>
      <property value="368.52">fsim/tables/ps_full_ms/h0/w0/v7</property>
      <property value="299.735">fsim/tables/ps_full_ms/h0/w0/v8</property>
      <property value="244.769">fsim/tables/ps_full_ms/h0/w0/v9</property>
      <property value="233.327">fsim/tables/ps_full_ms/h0/w1/v0</property>
      <property value="255.925">fsim/tables/ps_full_ms/h0/w1/v1</property>
      <property value="199.241">fsim/tables/ps_full_ms/h0/w1/v10</property>
      <property value="178.973">fsim/tables/ps_full_ms/h0/w1/v11</property>
      <property value="158.482">fsim/tables/ps_full_ms/h0/w1/v12</property>
      <property value="133.391">fsim/tables/ps_full_ms/h0/w1/v13</property>
      <property value="104.455">fsim/tables/ps_full_ms/h0/w1/v14</property>
      <property value="49.8874">fsim/tables/ps_full_ms/h0/w1/v15</property>
      <property value="278.122">fsim/tables/ps_full_ms/h0/w1/v2</property>
      <property value="299.751">fsim/tables/ps_full_ms/h0/w1/v3</property>
      <property value="320.765">fsim/tables/ps_full_ms/h0/w1/v4</property>
      <property value="340.648">fsim/tables/ps_full_ms/h0/w1/v5</property>
      <property value="352.727">fsim/tables/ps_full_ms/h0/w1/v6</property>
      <property value="336.586">fsim/tables/ps_full_ms/h0/w1/v7</property>
      <property value="275.45">fsim/tables/ps_full_ms/h0/w1/v8</property>
      <property value="216.762">fsim/tables/ps_full_ms/h0/w1/v9</property>
      <property value="202.202">fsim/tables/ps_full_ms/h0/w2/v0</property>
      <property value="222.622">fsim/tables/ps_full_ms/h0/w2/v1</property>
      <property value="178.499">fsim/tables/ps_full_ms/h0/w2/v10</property>
      <property value="160.06">fsim/tables/ps_full_ms/h0/w2/v11</property>
      <property value="141.554">fsim/tables/ps_full_ms/h0/w2/v12</property>
      <property value="118.958">fsim/tables/ps_full_ms/h0/w2/v13</property>
      <property value="93.0709">fsim/tables/ps_full_ms/h0/w2/v14</property>
      <property value="44.3813">fsim/tables/ps_full_ms/h0/w2/v15</property>
      <property value="242.728">fsim/tables/ps_full_ms/h0/w2/v2</property>
      <property value="262.507">fsim/tables/ps_full_ms/h0/w2/v3</property>
      <property value="281.859">fsim/tables/ps_full_ms/h0/w2/v4</property>
      <property value="300.457">fsim/tables/ps_full_ms/h0/w2/v5</property>
      <property value="314.684">fsim/tables/ps_full_ms/h0/w2/v6</property>
      <property value="307.113">fsim/tables/ps_full_ms/h0/w2/v7</property>
      <property value="253.552">fsim/tables/ps_full_ms/h0/w2/v8</property>
      <property value="194.157">fsim/tables/ps_full_ms/h0/w2/v9</property>
      <property value="206.476">fsim/tables/ps_full_ms/h1/w0/v0</property>
      <property value="231.432">fsim/tables/ps_full_ms/h1/w0/v1</property>
      <property value="210.852">fsim/tables/ps_full_ms/h1/w0/v10</property>
      <property value="196.569">fsim/tables/ps_full_ms/h1/w0/v11</property>
      <property value="178.66">fsim/tables/ps_full_ms/h1/w0/v12</property>
      <property value="156.308">fsim/tables/ps_full_ms/h1/w0/v13</property>
      <property value="118.085">fsim/tables/ps_full_ms/h1/w0/v14</property>
      <property value="52.1073">fsim/tables/ps_full_ms/h1/w0/v15</property>
      <property value="255.907">fsim/tables/ps_full_ms/h1/w0/v2</property>
      <property value="280.475">fsim/tables/ps_full_ms/h1/w0/v3</property>
      <property value="303.449">fsim/tables/ps_full_ms/h1/w0/v4</property>
      <property value="307.985">fsim/tables/ps_full_ms/h1/w0/v5</property>
      <property value="268.977">fsim/tables/ps_full_ms/h1/w0/v6</property>
      <property value="235.775">fsim/tables/ps_full_ms/h1/w0/v7</property>
      <property value="228.807">fsim/tables/ps_full_ms/h1/w0/v8</property>
      <property value="220.901">fsim/tables/ps_full_ms/h1/w0/v9</property>
      <property value="177.373">fsim/tables/ps_full_ms/h1/w1/v0</property>
      <property value="199.557">fsim/tables/ps_full_ms/h1/w1/v1</property>
      <property value="184.66">fsim/tables/ps_full_ms/h1/w1/v10</property>
      <property value="172.019">fsim/tables/ps_full_ms/h1/w1/v11</property>
      <property value="156.34">fsim/tables/ps_full_ms/h1/w1/v12</property>
      <property value="136.594">fsim/tables/ps_full_ms/h1/w1/v13</property>
      <property value="103.852">fsim/tables/ps_full_ms/h1/w1/v14</property>
      <property value="45.6268">fsim/tables/ps_full_ms/h1/w1/v15</property>
      <property value="221.143">fsim/tables/ps_full_ms/h1/w1/v2</property>
      <property value="242.828">fsim/tables/ps_full_ms/h1/w1/v3</property>
      <property value="264.316">fsim/tables/ps_full_ms/h1/w1/v4</property>
      <property value="273.302">fsim/tables/ps_full_ms/h1/w1/v5</property>
      <property value="239.497">fsim/tables/ps_full_ms/h1/w1/v6</property>
      <property value="206.597">fsim/tables/ps_full_ms/h1/w1/v7</property>
      <property value="200.471">fsim/tables/ps_full_ms/h1/w1/v8</property>
      <property value="193.455">fsim/tables/ps_full_ms/h1/w1/v9</property>
      <property value="103.989">fsim/tables/ps_full_ms/h1/w2/v0</property>
      <property value="122.822">fsim/tables/ps_full_ms/h1/w2/v1</property>
      <property value="171.272">fsim/tables/ps_full_ms/h1/w2/v10</property>
      <property value="161.209">fsim/tables/ps_full_ms/h1/w2/v11</property>
      <property value="146.901">fsim/tables/ps_full_ms/h1/w2/v12</property>
      <property value="127.897">fsim/tables/ps_full_ms/h1/w2/v13</property>
      <property value="100.934">fsim/tables/ps_full_ms/h1/w2/v14</property>
      <property value="40.5176">fsim/tables/ps_full_ms/h1/w2/v15</property>
      <property value="143.661">fsim/tables/ps_full_ms/h1/w2/v2</property>
      <property value="171.814">fsim/tables/ps_full_ms/h1/w2/v3</property>
      <property value="188.231">fsim/tables/ps_full_ms/h1/w2/v4</property>
      <property value="215.648">fsim/tables/ps_full_ms/h1/w2/v5</property>
      <property value="241">fsim/tables/ps_full_ms/h1/w2/v6</property>
      <property value="237.482">fsim/tables/ps_full_ms/h1/w2/v7</property>
      <property value="186.633">fsim/tables/ps_full_ms/h1/w2/v8</property>
      <property value="179.099">fsim/tables/ps_full_ms/h1/w2/v9</property>
      <property value="155.73">fsim/tables/ps_full_ms/h2/w0/v0</property>
      <property value="178.908">fsim/tables/ps_full_ms/h2/w0/v1</property>
      <property value="202.475">fsim/tables/ps_full_ms/h2/w0/v10</property>
      <property value="196.214">fsim/tables/ps_full_ms/h2/w0/v11</property>
      <property value="187.889">fsim/tables/ps_full_ms/h2/w0/v12</property>
      <property value="168.541">fsim/tables/ps_full_ms/h2/w0/v13</property>
      <property value="127.963">fsim/tables/ps_full_ms/h2/w0/v14</property>
      <property value="74.476">fsim/tables/ps_full_ms/h2/w0/v15</property>
      <property value="202.084">fsim/tables/ps_full_ms/h2/w0/v2</property>
      <property value="223.793">fsim/tables/ps_full_ms/h2/w0/v3</property>
      <property value="219.936">fsim/tables/ps_full_ms/h2/w0/v4</property>
      <property value="198.601">fsim/tables/ps_full_ms/h2/w0/v5</property>
      <property value="202.163">fsim/tables/ps_full_ms/h2/w0/v6</property>
      <property value="206.276">fsim/tables/ps_full_ms/h2/w0/v7</property>
      <property value="207.553">fsim/tables/ps_full_ms/h2/w0/v8</property>
      <property value="206.498">fsim/tables/ps_full_ms/h2/w0/v9</property>
      <property value="136.292">fsim/tables/ps_full_ms/h2/w1/v0</property>
      <property value="156.581">fsim/tables/ps_full_ms/h2/w1/v1</property>
      <property value="176.347">fsim/tables/ps_full_ms/h2/w1/v10</property>
      <property value="170.759">fsim/tables/ps_full_ms/h2/w1/v11</property>
      <property value="163.337">fsim/tables/ps_full_ms/h2/w1/v12</property>
      <property value="146.572">fsim/tables/ps_full_ms/h2/w1/v13</property>
      <property value="111.023">fsim/tables/ps_full_ms/h2/w1/v14</property>
      <property value="65.2287">fsim/tables/ps_full_ms/h2/w1/v15</property>
      <property value="176.916">fsim/tables/ps_full_ms/h2/w1/v2</property>
      <property value="196.236">fsim/tables/ps_full_ms/h2/w1/v3</property>
      <property value="191.669">fsim/tables/ps_full_ms/h2/w1/v4</property>
      <property value="172.872">fsim/tables/ps_full_ms/h2/w1/v5</property>
      <property value="175.628">fsim/tables/ps_full_ms/h2/w1/v6</property>
      <property value="179.14">fsim/tables/ps_full_ms/h2/w1/v7</property>
      <property value="180.564">fsim/tables/ps_full_ms/h2/w1/v8</property>
      <property value="179.978">fsim/tables/ps_full_ms/h2/w1/v9</property>
      <property value="64.126">fsim/tables/ps_full_ms/h2/w2/v0</property>
      <property value="96.2131">fsim/tables/ps_full_ms/h2/w2/v1</property>
      <property value="157.871">fsim/tables/ps_full_ms/h2/w2/v10</property>
      <property value="153.578">fsim/tables/ps_full_ms/h2/w2/v11</property>
      <property value="148.145">fsim/tables/ps_full_ms/h2/w2/v12</property>
      <property value="138.16">fsim/tables/ps_full_ms/h2/w2/v13</property>
      <property value="104.299">fsim/tables/ps_full_ms/h2/w2/v14</property>
      <property value="58.1585">fsim/tables/ps_full_ms/h2/w2/v15</property>
      <property value="107.991">fsim/tables/ps_full_ms/h2/w2/v2</property>
      <property value="137.085">fsim/tables/ps_full_ms/h2/w2/v3</property>
      <property value="149.824">fsim/tables/ps_full_ms/h2/w2/v4</property>
      <property value="176.09">fsim/tables/ps_full_ms/h2/w2/v5</property>
      <property value="160.159">fsim/tables/ps_full_ms/h2/w2/v6</property>
      <property value="154.308">fsim/tables/ps_full_ms/h2/w2/v7</property>
      <property value="156.686">fsim/tables/ps_full_ms/h2/w2/v8</property>
      <property value="158.686">fsim/tables/ps_full_ms/h2/w2/v9</property>
      <property value="127.63">fsim/tables/ps_full_ms/h3/w0/v0</property>
      <property value="148.678">fsim/tables/ps_full_ms/h3/w0/v1</property>
      <property value="196.523">fsim/tables/ps_full_ms/h3/w0/v10</property>
      <property value="198.48">fsim/tables/ps_full_ms/h3/w0/v11</property>
      <property value="199.129">fsim/tables/ps_full_ms/h3/w0/v12</property>
      <property value="186.704">fsim/tables/ps_full_ms/h3/w0/v13</property>
      <property value="164.977">fsim/tables/ps_full_ms/h3/w0/v14</property>
      <property value="77.0603">fsim/tables/ps_full_ms/h3/w0/v15</property>
      <property value="168.696">fsim/tables/ps_full_ms/h3/w0/v2</property>
      <property value="165.318">fsim/tables/ps_full_ms/h3/w0/v3</property>
      <property value="163.215">fsim/tables/ps_full_ms/h3/w0/v4</property>
      <property value="170.858">fsim/tables/ps_full_ms/h3/w0/v5</property>
      <property value="178.863">fsim/tables/ps_full_ms/h3/w0/v6</property>
      <property value="185.395">fsim/tables/ps_full_ms/h3/w0/v7</property>
      <property value="190.174">fsim/tables/ps_full_ms/h3/w0/v8</property>
      <property value="193.912">fsim/tables/ps_full_ms/h3/w0/v9</property>
      <property value="113.079">fsim/tables/ps_full_ms/h3/w1/v0</property>
      <property value="131.529">fsim/tables/ps_full_ms/h3/w1/v1</property>
      <property value="168.976">fsim/tables/ps_full_ms/h3/w1/v10</property>
      <property value="170.336">fsim/tables/ps_full_ms/h3/w1/v11</property>
      <property value="170.424">fsim/tables/ps_full_ms/h3/w1/v12</property>
      <property value="159.244">fsim/tables/ps_full_ms/h3/w1/v13</property>
      <property value="140.468">fsim/tables/ps_full_ms/h3/w1/v14</property>
      <property value="66.6634">fsim/tables/ps_full_ms/h3/w1/v15</property>
      <property value="148.291">fsim/tables/ps_full_ms/h3/w1/v2</property>
      <property value="140.5">fsim/tables/ps_full_ms/h3/w1/v3</property>
      <property value="142.047">fsim/tables/ps_full_ms/h3/w1/v4</property>
      <property value="148.78">fsim/tables/ps_full_ms/h3/w1/v5</property>
      <property value="155.19">fsim/tables/ps_full_ms/h3/w1/v6</property>
      <property value="160.563">fsim/tables/ps_full_ms/h3/w1/v7</property>
      <property value="164.255">fsim/tables/ps_full_ms/h3/w1/v8</property>
      <property value="167.194">fsim/tables/ps_full_ms/h3/w1/v9</property>
      <property value="24.4742">fsim/tables/ps_full_ms/h3/w2/v0</property>
      <property value="77.7403">fsim/tables/ps_full_ms/h3/w2/v1</property>
      <property value="146.31">fsim/tables/ps_full_ms/h3/w2/v10</property>
      <property value="147.409">fsim/tables/ps_full_ms/h3/w2/v11</property>
      <property value="148.49">fsim/tables/ps_full_ms/h3/w2/v12</property>
      <property value="143.561">fsim/tables/ps_full_ms/h3/w2/v13</property>
      <property value="124.971">fsim/tables/ps_full_ms/h3/w2/v14</property>
      <property value="59.3103">fsim/tables/ps_full_ms/h3/w2/v15</property>
      <property value="91.4774">fsim/tables/ps_full_ms/h3/w2/v2</property>
      <property value="117.499">fsim/tables/ps_full_ms/h3/w2/v3</property>
      <property value="125.736">fsim/tables/ps_full_ms/h3/w2/v4</property>
      <property value="122.451">fsim/tables/ps_full_ms/h3/w2/v5</property>
      <property value="125.996">fsim/tables/ps_full_ms/h3/w2/v6</property>
      <property value="133.884">fsim/tables/ps_full_ms/h3/w2/v7</property>
      <property value="139.53">fsim/tables/ps_full_ms/h3/w2/v8</property>
      <property value="143.549">fsim/tables/ps_full_ms/h3/w2/v9</property>
      <property value="110.301">fsim/tables/ps_full_ms/h4/w0/v0</property>
      <property value="128.254">fsim/tables/ps_full_ms/h4/w0/v1</property>
      <property value="164.409">fsim/tables/ps_full_ms/h4/w0/v10</property>
      <property value="165.816">fsim/tables/ps_full_ms/h4/w0/v11</property>
      <property value="165.946">fsim/tables/ps_full_ms/h4/w0/v12</property>
      <property value="155.245">fsim/tables/ps_full_ms/h4/w0/v13</property>
      <property value="137.958">fsim/tables/ps_full_ms/h4/w0/v14</property>
      <property value="64.8929">fsim/tables/ps_full_ms/h4/w0/v15</property>
      <property value="144.292">fsim/tables/ps_full_ms/h4/w0/v2</property>
      <property value="135.255">fsim/tables/ps_full_ms/h4/w0/v3</property>
      <property value="138.019">fsim/tables/ps_full_ms/h4/w0/v4</property>
      <property value="144.765">fsim/tables/ps_full_ms/h4/w0/v5</property>
      <property value="150.957">fsim/tables/ps_full_ms/h4/w0/v6</property>
      <property value="156.179">fsim/tables/ps_full_ms/h4/w0/v7</property>
      <property value="159.761">fsim/tables/ps_full_ms/h4/w0/v8</property>
      <property value="162.67">fsim/tables/ps_full_ms/h4/w0/v9</property>
      <property value="15.5411">fsim/tables/ps_full_ms/h4/w1/v0</property>
      <property value="78.1606">fsim/tables/ps_full_ms/h4/w1/v1</property>
      <property value="134.49">fsim/tables/ps_full_ms/h4/w1/v10</property>
      <property value="135.293">fsim/tables/ps_full_ms/h4/w1/v11</property>
      <property value="136.356">fsim/tables/ps_full_ms/h4/w1/v12</property>
      <property value="131.731">fsim/tables/ps_full_ms/h4/w1/v13</property>
      <property value="115.994">fsim/tables/ps_full_ms/h4/w1/v14</property>
      <property value="55.5224">fsim/tables/ps_full_ms/h4/w1/v15</property>
      <property value="95.8202">fsim/tables/ps_full_ms/h4/w1/v2</property>
      <property value="112.145">fsim/tables/ps_full_ms/h4/w1/v3</property>
      <property value="126.004">fsim/tables/ps_full_ms/h4/w1/v4</property>
      <property value="113.171">fsim/tables/ps_full_ms/h4/w1/v5</property>
      <property value="118.149">fsim/tables/ps_full_ms/h4/w1/v6</property>
      <property value="124.488">fsim/tables/ps_full_ms/h4/w1/v7</property>
      <property value="129.325">fsim/tables/ps_full_ms/h4/w1/v8</property>
      <property value="132.251">fsim/tables/ps_full_ms/h4/w1/v9</property>
      <property value="34.6413">fsim/tables/ps_full_ms/h4/w2/v0</property>
      <property value="62.9461">fsim/tables/ps_full_ms/h4/w2/v1</property>
      <property value="121.837">fsim/tables/ps_full_ms/h4/w2/v10</property>
      <property value="122.338">fsim/tables/ps_full_ms/h4/w2/v11</property>
      <property value="122.846">fsim/tables/ps_full_ms/h4/w2/v12</property>
      <property value="118.526">fsim/tables/ps_full_ms/h4/w2/v13</property>
      <property value="103.264">fsim/tables/ps_full_ms/h4/w2/v14</property>
      <property value="50.395">fsim/tables/ps_full_ms/h4/w2/v15</property>
      <property value="77.5836">fsim/tables/ps_full_ms/h4/w2/v2</property>
      <property value="99.8539">fsim/tables/ps_full_ms/h4/w2/v3</property>
      <property value="108.928">fsim/tables/ps_full_ms/h4/w2/v4</property>
      <property value="101.766">fsim/tables/ps_full_ms/h4/w2/v5</property>
      <property value="104.751">fsim/tables/ps_full_ms/h4/w2/v6</property>
      <property value="111.255">fsim/tables/ps_full_ms/h4/w2/v7</property>
      <property value="116.2">fsim/tables/ps_full_ms/h4/w2/v8</property>
      <property value="119.598">fsim/tables/ps_full_ms/h4/w2/v9</property>
      <property value="55.2218">fsim/tables/ps_full_ms/h5/w0/v0</property>
      <property value="59.1449">fsim/tables/ps_full_ms/h5/w0/v1</property>
      <property value="88.8105">fsim/tables/ps_full_ms/h5/w0/v10</property>
      <property value="89.9728">fsim/tables/ps_full_ms/h5/w0/v11</property>
      <property value="91.1692">fsim/tables/ps_full_ms/h5/w0/v12</property>
      <property value="88.1457">fsim/tables/ps_full_ms/h5/w0/v13</property>
      <property value="77.1755">fsim/tables/ps_full_ms/h5/w0/v14</property>
      <property value="40.0552">fsim/tables/ps_full_ms/h5/w0/v15</property>
      <property value="70.932">fsim/tables/ps_full_ms/h5/w0/v2</property>
      <property value="80.8533">fsim/tables/ps_full_ms/h5/w0/v3</property>
      <property value="76.1634">fsim/tables/ps_full_ms/h5/w0/v4</property>
      <property value="75.6544">fsim/tables/ps_full_ms/h5/w0/v5</property>
      <property value="78.7971">fsim/tables/ps_full_ms/h5/w0/v6</property>
      <property value="82.2838">fsim/tables/ps_full_ms/h5/w0/v7</property>
      <property value="85.1281">fsim/tables/ps_full_ms/h5/w0/v8</property>
      <property value="86.6382">fsim/tables/ps_full_ms/h5/w0/v9</property>
      <property value="39.7753">fsim/tables/ps_full_ms/h5/w1/v0</property>
      <property value="46.099">fsim/tables/ps_full_ms/h5/w1/v1</property>
      <property value="74.8733">fsim/tables/ps_full_ms/h5/w1/v10</property>
      <property value="74.347">fsim/tables/ps_full_ms/h5/w1/v11</property>
      <property value="74.3681">fsim/tables/ps_full_ms/h5/w1/v12</property>
      <property value="71.5105">fsim/tables/ps_full_ms/h5/w1/v13</property>
      <property value="61.7537">fsim/tables/ps_full_ms/h5/w1/v14</property>
      <property value="34.4123">fsim/tables/ps_full_ms/h5/w1/v15</property>
      <property value="59.0989">fsim/tables/ps_full_ms/h5/w1/v2</property>
      <property value="68.2053">fsim/tables/ps_full_ms/h5/w1/v3</property>
      <property value="65.5686">fsim/tables/ps_full_ms/h5/w1/v4</property>
      <property value="64.1176">fsim/tables/ps_full_ms/h5/w1/v5</property>
      <property value="66.6101">fsim/tables/ps_full_ms/h5/w1/v6</property>
      <property value="70.2676">fsim/tables/ps_full_ms/h5/w1/v7</property>
      <property value="73.2425">fsim/tables/ps_full_ms/h5/w1/v8</property>
      <property value="73.9294">fsim/tables/ps_full_ms/h5/w1/v9</property>
      <property value="27.3559">fsim/tables/ps_full_ms/h5/w2/v0</property>
      <property value="30.9678">fsim/tables/ps_full_ms/h5/w2/v1</property>
      <property value="60.3501">fsim/tables/ps_full_ms/h5/w2/v10</property>
      <property value="60.3202">fsim/tables/ps_full_ms/h5/w2/v11</property>
      <property value="60.2376">fsim/tables/ps_full_ms/h5/w2/v12</property>
      <property value="58.8172">fsim/tables/ps_full_ms/h5/w2/v13</property>
      <property value="50.6894">fsim/tables/ps_full_ms/h5/w2/v14</property>
      <property value="34.1855">fsim/tables/ps_full_ms/h5/w2/v15</property>
      <property value="43.703">fsim/tables/ps_full_ms/h5/w2/v2</property>
      <property value="56.6749">fsim/tables/ps_full_ms/h5/w2/v3</property>
      <property value="51.1859">fsim/tables/ps_full_ms/h5/w2/v4</property>
      <property value="54.4717">fsim/tables/ps_full_ms/h5/w2/v5</property>
      <property value="54.6018">fsim/tables/ps_full_ms/h5/w2/v6</property>
      <property value="57.3664">fsim/tables/ps_full_ms/h5/w2/v7</property>
      <property value="59.366">fsim/tables/ps_full_ms/h5/w2/v8</property>
      <property value="59.7886">fsim/tables/ps_full_ms/h5/w2/v9</property>
      <property value="28.3549">fsim/tables/ps_full_ms/h6/w0/v0</property>
      <property value="38.1851">fsim/tables/ps_full_ms/h6/w0/v1</property>
      <property value="55.1195">fsim/tables/ps_full_ms/h6/w0/v10</property>
      <property value="54.7149">fsim/tables/ps_full_ms/h6/w0/v11</property>
      <property value="55.6694">fsim/tables/ps_full_ms/h6/w0/v12</property>
      <property value="54.1837">fsim/tables/ps_full_ms/h6/w0/v13</property>
      <property value="46.9299">fsim/tables/ps_full_ms/h6/w0/v14</property>
      <property value="32.2958">fsim/tables/ps_full_ms/h6/w0/v15</property>
      <property value="47.2342">fsim/tables/ps_full_ms/h6/w0/v2</property>
      <property value="54.5815">fsim/tables/ps_full_ms/h6/w0/v3</property>
      <property value="47.7346">fsim/tables/ps_full_ms/h6/w0/v4</property>
      <property value="47.6486">fsim/tables/ps_full_ms/h6/w0/v5</property>
      <property value="50.8336">fsim/tables/ps_full_ms/h6/w0/v6</property>
      <property value="53.1468">fsim/tables/ps_full_ms/h6/w0/v7</property>
      <property value="54.5986">fsim/tables/ps_full_ms/h6/w0/v8</property>
      <property value="54.1954">fsim/tables/ps_full_ms/h6/w0/v9</property>
      <property value="13.5014">fsim/tables/ps_full_ms/h6/w1/v0</property>
      <property value="24.1263">fsim/tables/ps_full_ms/h6/w1/v1</property>
      <property value="40.1296">fsim/tables/ps_full_ms/h6/w1/v10</property>
      <property value="39.0352">fsim/tables/ps_full_ms/h6/w1/v11</property>
      <property value="38.7178">fsim/tables/ps_full_ms/h6/w1/v12</property>
      <property value="37.6327">fsim/tables/ps_full_ms/h6/w1/v13</property>
      <property value="32.4034">fsim/tables/ps_full_ms/h6/w1/v14</property>
      <property value="25.1948">fsim/tables/ps_full_ms/h6/w1/v15</property>
      <property value="36.3172">fsim/tables/ps_full_ms/h6/w1/v2</property>
      <property value="43.9574">fsim/tables/ps_full_ms/h6/w1/v3</property>
      <property value="41.3755">fsim/tables/ps_full_ms/h6/w1/v4</property>
      <property value="37.1738">fsim/tables/ps_full_ms/h6/w1/v5</property>
      <property value="38.2416">fsim/tables/ps_full_ms/h6/w1/v6</property>
      <property value="39.6902">fsim/tables/ps_full_ms/h6/w1/v7</property>
      <property value="40.8433">fsim/tables/ps_full_ms/h6/w1/v8</property>
      <property value="40.2943">fsim/tables/ps_full_ms/h6/w1/v9</property>
      <property value="21.0541">fsim/tables/ps_full_ms/h6/w2/v0</property>
      <property value="29.9643">fsim/tables/ps_full_ms/h6/w2/v1</property>
      <property value="27.1737">fsim/tables/ps_full_ms/h6/w2/v10</property>
      <property value="25.9412">fsim/tables/ps_full_ms/h6/w2/v11</property>
      <property value="25.7872">fsim/tables/ps_full_ms/h6/w2/v12</property>
      <property value="24.2383">fsim/tables/ps_full_ms/h6/w2/v13</property>
      <property value="19.9918">fsim/tables/ps_full_ms/h6/w2/v14</property>
      <property value="13.7955">fsim/tables/ps_full_ms/h6/w2/v15</property>
      <property value="35.1612">fsim/tables/ps_full_ms/h6/w2/v2</property>
      <property value="29.561">fsim/tables/ps_full_ms/h6/w2/v3</property>
      <property value="27.2542">fsim/tables/ps_full_ms/h6/w2/v4</property>
      <property value="27.0823">fsim/tables/ps_full_ms/h6/w2/v5</property>
      <property value="28.3441">fsim/tables/ps_full_ms/h6/w2/v6</property>
      <property value="29.0168">fsim/tables/ps_full_ms/h6/w2/v7</property>
      <property value="28.8456">fsim/tables/ps_full_ms/h6/w2/v8</property>
      <property value="27.2289">fsim/tables/ps_full_ms/h6/w2/v9</property>
      <property value="16.7536">fsim/tables/ps_full_ms/h7/w0/v0</property>
      <property value="24.9261">fsim/tables/ps_full_ms/h7/w0/v1</property>
      <property value="18.6476">fsim/tables/ps_full_ms/h7/w0/v10</property>
      <property value="17.4236">fsim/tables/ps_full_ms/h7/w0/v11</property>
      <property value="15.9386">fsim/tables/ps_full_ms/h7/w0/v12</property>
      <property value="15.1932">fsim/tables/ps_full_ms/h7/w0/v13</property>
      <property value="13.5675">fsim/tables/ps_full_ms/h7/w0/v14</property>
      <property value="8.65532">fsim/tables/ps_full_ms/h7/w0/v15</property>
      <property value="28.4876">fsim/tables/ps_full_ms/h7/w0/v2</property>
      <property value="24.2487">fsim/tables/ps_full_ms/h7/w0/v3</property>
      <property value="20.7258">fsim/tables/ps_full_ms/h7/w0/v4</property>
      <property value="20.1395">fsim/tables/ps_full_ms/h7/w0/v5</property>
      <property value="20.8461">fsim/tables/ps_full_ms/h7/w0/v6</property>
      <property value="21.3176">fsim/tables/ps_full_ms/h7/w0/v7</property>
      <property value="21.3546">fsim/tables/ps_full_ms/h7/w0/v8</property>
      <property value="19.7566">fsim/tables/ps_full_ms/h7/w0/v9</property>
      <property value="11.0562">fsim/tables/ps_full_ms/h7/w1/v0</property>
      <property value="17.0741">fsim/tables/ps_full_ms/h7/w1/v1</property>
      <property value="5.86326">fsim/tables/ps_full_ms/h7/w1/v10</property>
      <property value="5.30578">fsim/tables/ps_full_ms/h7/w1/v11</property>
      <property value="3.82645">fsim/tables/ps_full_ms/h7/w1/v12</property>
      <property value="3.4315">fsim/tables/ps_full_ms/h7/w1/v13</property>
      <property value="3.50046">fsim/tables/ps_full_ms/h7/w1/v14</property>
      <property value="3.2195">fsim/tables/ps_full_ms/h7/w1/v15</property>
      <property value="18.2771">fsim/tables/ps_full_ms/h7/w1/v2</property>
      <property value="14.337">fsim/tables/ps_full_ms/h7/w1/v3</property>
      <property value="10.9197">fsim/tables/ps_full_ms/h7/w1/v4</property>
      <property value="8.36238">fsim/tables/ps_full_ms/h7/w1/v5</property>
      <property value="9.05242">fsim/tables/ps_full_ms/h7/w1/v6</property>
      <property value="9.73347">fsim/tables/ps_full_ms/h7/w1/v7</property>
      <property value="9.48101">fsim/tables/ps_full_ms/h7/w1/v8</property>
      <property value="8.24347">fsim/tables/ps_full_ms/h7/w1/v9</property>
      <property value="6.0095">fsim/tables/ps_full_ms/h7/w2/v0</property>
      <property value="8.11431">fsim/tables/ps_full_ms/h7/w2/v1</property>
      <property value="2.40794">fsim/tables/ps_full_ms/h7/w2/v10</property>
      <property value="2.32046">fsim/tables/ps_full_ms/h7/w2/v11</property>
      <property value="2.26147">fsim/tables/ps_full_ms/h7/w2/v12</property>
      <property value="2.1656">fsim/tables/ps_full_ms/h7/w2/v13</property>
      <property value="1.91946">fsim/tables/ps_full_ms/h7/w2/v14</property>
      <property value="1.02101">fsim/tables/ps_full_ms/h7/w2/v15</property>
      <property value="10.2191">fsim/tables/ps_full_ms/h7/w2/v2</property>
      <property value="11.5011">fsim/tables/ps_full_ms/h7/w2/v3</property>
      <property value="8.75434">fsim/tables/ps_full_ms/h7/w2/v4</property>
      <property value="6.03101">fsim/tables/ps_full_ms/h7/w2/v5</property>
      <property value="4.55584">fsim/tables/ps_full_ms/h7/w2/v6</property>
      <property value="3.08068">fsim/tables/ps_full_ms/h7/w2/v7</property>
      <property value="2.63014">fsim/tables/ps_full_ms/h7/w2/v8</property>
      <property value="2.51904">fsim/tables/ps_full_ms/h7/w2/v9</property>
      <property value="-33.9439">fsim/tables/ps_idle_ms/h0/w0/v0</property>
      <property value="-44.3727">fsim/tables/ps_idle_ms/h0/w0/v1</property>
      <property value="-526.855">fsim/tables/ps_idle_ms/h0/w0/v10</property>
      <property value="-604.977">fsim/tables/ps_idle_ms/h0/w0/v11</property>
      <property value="-688.946">fsim/tables/ps_idle_ms/h0/w0/v12</property>
      <property value="-770.644">fsim/tables/ps_idle_ms/h0/w0/v13</property>
      <property value="-810.42">fsim/tables/ps_idle_ms/h0/w0/v14</property>
      <property value="-848.299">fsim/tables/ps_idle_ms/h0/w0/v15</property>
      <property value="-56.6805">fsim/tables/ps_idle_ms/h0/w0/v2</property>
      <property value="-71.659">fsim/tables/ps_idle_ms/h0/w0/v3</property>
      <property value="-88.9383">fsim/tables/ps_idle_ms/h0/w0/v4</property>
      <property value="-109.038">fsim/tables/ps_idle_ms/h0/w0/v5</property>
      <property value="-136.21">fsim/tables/ps_idle_ms/h0/w0/v6</property>
      <property value="-215.983">fsim/tables/ps_idle_ms/h0/w0/v7</property>
      <property value="-350.192">fsim/tables/ps_idle_ms/h0/w0/v8</property>
      <property value="-448.129">fsim/tables/ps_idle_ms/h0/w0/v9</property>
      <property value="-27.3575">fsim/tables/ps_idle_ms/h0/w1/v0</property>
      <property value="-36.2384">fsim/tables/ps_idle_ms/h0/w1/v1</property>
      <property value="-453.05">fsim/tables/ps_idle_ms/h0/w1/v10</property>
      <property value="-522.634">fsim/tables/ps_idle_ms/h0/w1/v11</property>
      <property value="-597.292">fsim/tables/ps_idle_ms/h0/w1/v12</property>
      <property value="-676.82">fsim/tables/ps_idle_ms/h0/w1/v13</property>
      <property value="-723.404">fsim/tables/ps_idle_ms/h0/w1/v14</property>
      <property value="-758.43">fsim/tables/ps_idle_ms/h0/w1/v15</property>
      <property value="-46.7402">fsim/tables/ps_idle_ms/h0/w1/v2</property>
      <property value="-59.0023">fsim/tables/ps_idle_ms/h0/w1/v3</property>
      <property value="-73.8687">fsim/tables/ps_idle_ms/h0/w1/v4</property>
      <property value="-91.1518">fsim/tables/ps_idle_ms/h0/w1/v5</property>
      <property value="-112.808">fsim/tables/ps_idle_ms/h0/w1/v6</property>
      <property value="-163.573">fsim/tables/ps_idle_ms/h0/w1/v7</property>
      <property value="-288.863">fsim/tables/ps_idle_ms/h0/w1/v8</property>
      <property value="-382.789">fsim/tables/ps_idle_ms/h0/w1/v9</property>
      <property value="-23.5187">fsim/tables/ps_idle_ms/h0/w2/v0</property>
      <property value="-31.0057">fsim/tables/ps_idle_ms/h0/w2/v1</property>
      <property value="-398.18">fsim/tables/ps_idle_ms/h0/w2/v10</property>
      <property value="-460.789">fsim/tables/ps_idle_ms/h0/w2/v11</property>
      <property value="-527.771">fsim/tables/ps_idle_ms/h0/w2/v12</property>
      <property value="-600.184">fsim/tables/ps_idle_ms/h0/w2/v13</property>
      <property value="-653.084">fsim/tables/ps_idle_ms/h0/w2/v14</property>
      <property value="-685.526">fsim/tables/ps_idle_ms/h0/w2/v15</property>
      <property value="-40.2339">fsim/tables/ps_idle_ms/h0/w2/v2</property>
      <property value="-51.0366">fsim/tables/ps_idle_ms/h0/w2/v3</property>
      <property value="-63.5772">fsim/tables/ps_idle_ms/h0/w2/v4</property>
      <property value="-78.7506">fsim/tables/ps_idle_ms/h0/w2/v5</property>
      <property value="-97.4139">fsim/tables/ps_idle_ms/h0/w2/v6</property>
      <property value="-134.671">fsim/tables/ps_idle_ms/h0/w2/v7</property>
      <property value="-244.177">fsim/tables/ps_idle_ms/h0/w2/v8</property>
      <property value="-334.884">fsim/tables/ps_idle_ms/h0/w2/v9</property>
      <property value="-23.5612">fsim/tables/ps_idle_ms/h1/w0/v0</property>
      <property value="-31.5742">fsim/tables/ps_idle_ms/h1/w0/v1</property>
      <property value="-455.115">fsim/tables/ps_idle_ms/h1/w0/v10</property>
      <property value="-528.487">fsim/tables/ps_idle_ms/h1/w0/v11</property>
      <property value="-609.689">fsim/tables/ps_idle_ms/h1/w0/v12</property>
      <property value="-698.667">fsim/tables/ps_idle_ms/h1/w0/v13</property>
      <property value="-773.56">fsim/tables/ps_idle_ms/h1/w0/v14</property>
      <property value="-813.219">fsim/tables/ps_idle_ms/h1/w0/v15</property>
      <property value="-41.8743">fsim/tables/ps_idle_ms/h1/w0/v2</property>
      <property value="-54.0861">fsim/tables/ps_idle_ms/h1/w0/v3</property>
      <property value="-69.066">fsim/tables/ps_idle_ms/h1/w0/v4</property>
      <property value="-97.364">fsim/tables/ps_idle_ms/h1/w0/v5</property>
      <property value="-197.02">fsim/tables/ps_idle_ms/h1/w0/v6</property>
      <property value="-271.791">fsim/tables/ps_idle_ms/h1/w0/v7</property>
      <property value="-328.027">fsim/tables/ps_idle_ms/h1/w0/v8</property>
      <property value="-388.878">fsim/tables/ps_idle_ms/h1/w0/v9</property>
      <property value="-21.0594">fsim/tables/ps_idle_ms/h1/w1/v0</property>
      <property value="-27.7841">fsim/tables/ps_idle_ms/h1/w1/v1</property>
      <property value="-396.536">fsim/tables/ps_idle_ms/h1/w1/v10</property>
      <property value="-460.927">fsim/tables/ps_idle_ms/h1/w1/v11</property>
      <property value="-532.371">fsim/tables/ps_idle_ms/h1/w1/v12</property>
      <property value="-610.766">fsim/tables/ps_idle_ms/h1/w1/v13</property>
      <property value="-687.763">fsim/tables/ps_idle_ms/h1/w1/v14</property>
      <property value="-723.534">fsim/tables/ps_idle_ms/h1/w1/v15</property>
      <property value="-36.5451">fsim/tables/ps_idle_ms/h1/w1/v2</property>
      <property value="-47.2401">fsim/tables/ps_idle_ms/h1/w1/v3</property>
      <property value="-60.0212">fsim/tables/ps_idle_ms/h1/w1/v4</property>
      <property value="-81.3758">fsim/tables/ps_idle_ms/h1/w1/v5</property>
      <property value="-164.828">fsim/tables/ps_idle_ms/h1/w1/v6</property>
      <property value="-235.305">fsim/tables/ps_idle_ms/h1/w1/v7</property>
      <property value="-284.786">fsim/tables/ps_idle_ms/h1/w1/v8</property>
      <property value="-338.352">fsim/tables/ps_idle_ms/h1/w1/v9</property>
      <property value="-12.3066">fsim/tables/ps_idle_ms/h1/w2/v0</property>
      <property value="-13.7866">fsim/tables/ps_idle_ms/h1/w2/v1</property>
      <property value="-304.242">fsim/tables/ps_idle_ms/h1/w2/v10</property>
      <property value="-366.615">fsim/tables/ps_idle_ms/h1/w2/v11</property>
      <property value="-437.075">fsim/tables/ps_idle_ms/h1/w2/v12</property>
      <property value="-516.427">fsim/tables/ps_idle_ms/h1/w2/v13</property>
      <property value="-604.286">fsim/tables/ps_idle_ms/h1/w2/v14</property>
      <property value="-651.545">fsim/tables/ps_idle_ms/h1/w2/v15</property>
      <property value="-17.8756">fsim/tables/ps_idle_ms/h1/w2/v2</property>
      <property value="-24.2008">fsim/tables/ps_idle_ms/h1/w2/v3</property>
      <property value="-32.6984">fsim/tables/ps_idle_ms/h1/w2/v4</property>
      <property value="-44.14">fsim/tables/ps_idle_ms/h1/w2/v5</property>
      <property value="-58.511">fsim/tables/ps_idle_ms/h1/w2/v6</property>
      <property value="-97.0215">fsim/tables/ps_idle_ms/h1/w2/v7</property>
      <property value="-195.276">fsim/tables/ps_idle_ms/h1/w2/v8</property>
      <property value="-247.679">fsim/tables/ps_idle_ms/h1/w2/v9</property>
      <property value="-20.3353">fsim/tables/ps_idle_ms/h2/w0/v0</property>
      <property value="-26.4071">fsim/tables/ps_idle_ms/h2/w0/v1</property>
      <property value="-388.912">fsim/tables/ps_idle_ms/h2/w0/v10</property>
      <property value="-455.452">fsim/tables/ps_idle_ms/h2/w0/v11</property>
      <property value="-528.62">fsim/tables/ps_idle_ms/h2/w0/v12</property>
      <property value="-608.69">fsim/tables/ps_idle_ms/h2/w0/v13</property>
      <property value="-695.553">fsim/tables/ps_idle_ms/h2/w0/v14</property>
      <property value="-743.962">fsim/tables/ps_idle_ms/h2/w0/v15</property>
      <property value="-34.2564">fsim/tables/ps_idle_ms/h2/w0/v2</property>
      <property value="-45.5606">fsim/tables/ps_idle_ms/h2/w0/v3</property>
      <property value="-83.3818">fsim/tables/ps_idle_ms/h2/w0/v4</property>
      <property value="-148.41">fsim/tables/ps_idle_ms/h2/w0/v5</property>
      <property value="-186.756">fsim/tables/ps_idle_ms/h2/w0/v6</property>
      <property value="-228.377">fsim/tables/ps_idle_ms/h2/w0/v7</property>
      <property value="-275.199">fsim/tables/ps_idle_ms/h2/w0/v8</property>
      <property value="-328.744">fsim/tables/ps_idle_ms/h2/w0/v9</property>
      <property value="-19.8266">fsim/tables/ps_idle_ms/h2/w1/v0</property>
      <property value="-24.9454">fsim/tables/ps_idle_ms/h2/w1/v1</property>
      <property value="-342.958">fsim/tables/ps_idle_ms/h2/w1/v10</property>
      <property value="-401.112">fsim/tables/ps_idle_ms/h2/w1/v11</property>
      <property value="-465.089">fsim/tables/ps_idle_ms/h2/w1/v12</property>
      <property value="-535.105">fsim/tables/ps_idle_ms/h2/w1/v13</property>
      <property value="-611.344">fsim/tables/ps_idle_ms/h2/w1/v14</property>
      <property value="-660.282">fsim/tables/ps_idle_ms/h2/w1/v15</property>
      <property value="-31.9636">fsim/tables/ps_idle_ms/h2/w1/v2</property>
      <property value="-41.687">fsim/tables/ps_idle_ms/h2/w1/v3</property>
      <property value="-76.5094">fsim/tables/ps_idle_ms/h2/w1/v4</property>
      <property value="-132.701">fsim/tables/ps_idle_ms/h2/w1/v5</property>
      <property value="-166.674">fsim/tables/ps_idle_ms/h2/w1/v6</property>
      <property value="-203.366">fsim/tables/ps_idle_ms/h2/w1/v7</property>
      <property value="-244.178">fsim/tables/ps_idle_ms/h2/w1/v8</property>
      <property value="-290.572">fsim/tables/ps_idle_ms/h2/w1/v9</property>
      <property value="-18.3784">fsim/tables/ps_idle_ms/h2/w2/v0</property>
      <property value="-16.2457">fsim/tables/ps_idle_ms/h2/w2/v1</property>
      <property value="-264.842">fsim/tables/ps_idle_ms/h2/w2/v10</property>
      <property value="-321.284">fsim/tables/ps_idle_ms/h2/w2/v11</property>
      <property value="-384.097">fsim/tables/ps_idle_ms/h2/w2/v12</property>
      <property value="-454.197">fsim/tables/ps_idle_ms/h2/w2/v13</property>
      <property value="-532.338">fsim/tables/ps_idle_ms/h2/w2/v14</property>
      <property value="-593.675">fsim/tables/ps_idle_ms/h2/w2/v15</property>
      <property value="-18.2941">fsim/tables/ps_idle_ms/h2/w2/v2</property>
      <property value="-22.9574">fsim/tables/ps_idle_ms/h2/w2/v3</property>
      <property value="-29.9192">fsim/tables/ps_idle_ms/h2/w2/v4</property>
      <property value="-40.2892">fsim/tables/ps_idle_ms/h2/w2/v5</property>
      <property value="-95.4791">fsim/tables/ps_idle_ms/h2/w2/v6</property>
      <property value="-135.467">fsim/tables/ps_idle_ms/h2/w2/v7</property>
      <property value="-173.467">fsim/tables/ps_idle_ms/h2/w2/v8</property>
      <property value="-215.798">fsim/tables/ps_idle_ms/h2/w2/v9</property>
      <property value="-20.827">fsim/tables/ps_idle_ms/h3/w0/v0</property>
      <property value="-25.5652">fsim/tables/ps_idle_ms/h3/w0/v1</property>
      <property value="-343.352">fsim/tables/ps_idle_ms/h3/w0/v10</property>
      <property value="-400.748">fsim/tables/ps_idle_ms/h3/w0/v11</property>
      <property value="-463.963">fsim/tables/ps_idle_ms/h3/w0/v12</property>
      <property value="-532.739">fsim/tables/ps_idle_ms/h3/w0/v13</property>
      <property value="-607.52">fsim/tables/ps_idle_ms/h3/w0/v14</property>
      <property value="-664.953">fsim/tables/ps_idle_ms/h3/w0/v15</property>
      <property value="-33.1341">fsim/tables/ps_idle_ms/h3/w0/v2</property>
      <property value="-69.093">fsim/tables/ps_idle_ms/h3/w0/v3</property>
      <property value="-104.268">fsim/tables/ps_idle_ms/h3/w0/v4</property>
      <property value="-133.375">fsim/tables/ps_idle_ms/h3/w0/v5</property>
      <property value="-165.294">fsim/tables/ps_idle_ms/h3/w0/v6</property>
      <property value="-201.848">fsim/tables/ps_idle_ms/h3/w0/v7</property>
      <property value="-244.02">fsim/tables/ps_idle_ms/h3/w0/v8</property>
      <property value="-291.101">fsim/tables/ps_idle_ms/h3/w0/v9</property>
      <property value="-21.2813">fsim/tables/ps_idle_ms/h3/w1/v0</property>
      <property value="-25.4101">fsim/tables/ps_idle_ms/h3/w1/v1</property>
      <property value="-306.717">fsim/tables/ps_idle_ms/h3/w1/v10</property>
      <property value="-356.932">fsim/tables/ps_idle_ms/h3/w1/v11</property>
      <property value="-412.182">fsim/tables/ps_idle_ms/h3/w1/v12</property>
      <property value="-472.169">fsim/tables/ps_idle_ms/h3/w1/v13</property>
      <property value="-537.513">fsim/tables/ps_idle_ms/h3/w1/v14</property>
      <property value="-591.212">fsim/tables/ps_idle_ms/h3/w1/v15</property>
      <property value="-32.235">fsim/tables/ps_idle_ms/h3/w1/v2</property>
      <property value="-70.0791">fsim/tables/ps_idle_ms/h3/w1/v3</property>
      <property value="-96.5895">fsim/tables/ps_idle_ms/h3/w1/v4</property>
      <property value="-121.759">fsim/tables/ps_idle_ms/h3/w1/v5</property>
      <property value="-150.031">fsim/tables/ps_idle_ms/h3/w1/v6</property>
      <property value="-182.373">fsim/tables/ps_idle_ms/h3/w1/v7</property>
      <property value="-219.52">fsim/tables/ps_idle_ms/h3/w1/v8</property>
      <property value="-260.855">fsim/tables/ps_idle_ms/h3/w1/v9</property>
      <property value="-23.9503">fsim/tables/ps_idle_ms/h3/w2/v0</property>
      <property value="-19.9297">fsim/tables/ps_idle_ms/h3/w2/v1</property>
      <property value="-238.821">fsim/tables/ps_idle_ms/h3/w2/v10</property>
      <property value="-287.923">fsim/tables/ps_idle_ms/h3/w2/v11</property>
      <property value="-342.424">fsim/tables/ps_idle_ms/h3/w2/v12</property>
      <property value="-403.066">fsim/tables/ps_idle_ms/h3/w2/v13</property>
      <property value="-469.968">fsim/tables/ps_idle_ms/h3/w2/v14</property>
      <property value="-531.665">fsim/tables/ps_idle_ms/h3/w2/v15</property>
      <property value="-20.7544">fsim/tables/ps_idle_ms/h3/w2/v2</property>
      <property value="-24.2018">fsim/tables/ps_idle_ms/h3/w2/v3</property>
      <property value="-31.048">fsim/tables/ps_idle_ms/h3/w2/v4</property>
      <property value="-72.3333">fsim/tables/ps_idle_ms/h3/w2/v5</property>
      <property value="-97.6011">fsim/tables/ps_idle_ms/h3/w2/v6</property>
      <property value="-125.048">fsim/tables/ps_idle_ms/h3/w2/v7</property>
      <property value="-157.112">fsim/tables/ps_idle_ms/h3/w2/v8</property>
      <property value="-195.314">fsim/tables/ps_idle_ms/h3/w2/v9</property>
      <property value="-21.4177">fsim/tables/ps_idle_ms/h4/w0/v0</property>
      <property value="-25.44">fsim/tables/ps_idle_ms/h4/w0/v1</property>
      <property value="-299.401">fsim/tables/ps_idle_ms/h4/w0/v10</property>
      <property value="-348.213">fsim/tables/ps_idle_ms/h4/w0/v11</property>
      <property value="-401.787">fsim/tables/ps_idle_ms/h4/w0/v12</property>
      <property value="-459.934">fsim/tables/ps_idle_ms/h4/w0/v13</property>
      <property value="-523.189">fsim/tables/ps_idle_ms/h4/w0/v14</property>
      <property value="-575.966">fsim/tables/ps_idle_ms/h4/w0/v15</property>
      <property value="-32.235">fsim/tables/ps_idle_ms/h4/w0/v2</property>
      <property value="-70.8083">fsim/tables/ps_idle_ms/h4/w0/v3</property>
      <property value="-95.2902">fsim/tables/ps_idle_ms/h4/w0/v4</property>
      <property value="-119.731">fsim/tables/ps_idle_ms/h4/w0/v5</property>
      <property value="-147.133">fsim/tables/ps_idle_ms/h4/w0/v6</property>
      <property value="-178.656">fsim/tables/ps_idle_ms/h4/w0/v7</property>
      <property value="-214.766">fsim/tables/ps_idle_ms/h4/w0/v8</property>
      <property value="-254.899">fsim/tables/ps_idle_ms/h4/w0/v9</property>
      <property value="-23.4787">fsim/tables/ps_idle_ms/h4/w1/v0</property>
      <property value="-20.2362">fsim/tables/ps_idle_ms/h4/w1/v1</property>
      <property value="-233.192">fsim/tables/ps_idle_ms/h4/w1/v10</property>
      <property value="-279.782">fsim/tables/ps_idle_ms/h4/w1/v11</property>
      <property value="-331.473">fsim/tables/ps_idle_ms/h4/w1/v12</property>
      <property value="-388.701">fsim/tables/ps_idle_ms/h4/w1/v13</property>
      <property value="-451.77">fsim/tables/ps_idle_ms/h4/w1/v14</property>
      <property value="-510.718">fsim/tables/ps_idle_ms/h4/w1/v15</property>
      <property value="-21.4625">fsim/tables/ps_idle_ms/h4/w1/v2</property>
      <property value="-25.0771">fsim/tables/ps_idle_ms/h4/w1/v3</property>
      <property value="-34.4892">fsim/tables/ps_idle_ms/h4/w1/v4</property>
      <property value="-73.9297">fsim/tables/ps_idle_ms/h4/w1/v5</property>
      <property value="-98.3354">fsim/tables/ps_idle_ms/h4/w1/v6</property>
      <property value="-124.665">fsim/tables/ps_idle_ms/h4/w1/v7</property>
      <property value="-155.272">fsim/tables/ps_idle_ms/h4/w1/v8</property>
      <property value="-191.828">fsim/tables/ps_idle_ms/h4/w1/v9</property>
      <property value="-26.8866">fsim/tables/ps_idle_ms/h4/w2/v0</property>
      <property value="-21.9201">fsim/tables/ps_idle_ms/h4/w2/v1</property>
      <property value="-208.803">fsim/tables/ps_idle_ms/h4/w2/v10</property>
      <property value="-250.201">fsim/tables/ps_idle_ms/h4/w2/v11</property>
      <property value="-296.352">fsim/tables/ps_idle_ms/h4/w2/v12</property>
      <property value="-347.488">fsim/tables/ps_idle_ms/h4/w2/v13</property>
      <property value="-403.831">fsim/tables/ps_idle_ms/h4/w2/v14</property>
      <property value="-459.119">fsim/tables/ps_idle_ms/h4/w2/v15</property>
      <property value="-21.8843">fsim/tables/ps_idle_ms/h4/w2/v2</property>
      <property value="-24.6325">fsim/tables/ps_idle_ms/h4/w2/v3</property>
      <property value="-31.9849">fsim/tables/ps_idle_ms/h4/w2/v4</property>
      <property value="-66.997">fsim/tables/ps_idle_ms/h4/w2/v5</property>
      <property value="-88.9347">fsim/tables/ps_idle_ms/h4/w2/v6</property>
      <property value="-112.818">fsim/tables/ps_idle_ms/h4/w2/v7</property>
      <property value="-140.154">fsim/tables/ps_idle_ms/h4/w2/v8</property>
      <property value="-172.454">fsim/tables/ps_idle_ms/h4/w2/v9</property>
      <property value="-27.2835">fsim/tables/ps_idle_ms/h5/w0/v0</property>
      <property value="-24.1641">fsim/tables/ps_idle_ms/h5/w0/v1</property>
      <property value="-182.423">fsim/tables/ps_idle_ms/h5/w0/v10</property>
      <property value="-214.566">fsim/tables/ps_idle_ms/h5/w0/v11</property>
      <property value="-249.39">fsim/tables/ps_idle_ms/h5/w0/v12</property>
      <property value="-287.387">fsim/tables/ps_idle_ms/h5/w0/v13</property>
      <property value="-328.705">fsim/tables/ps_idle_ms/h5/w0/v14</property>
      <property value="-373.423">fsim/tables/ps_idle_ms/h5/w0/v15</property>
      <property value="-24.5182">fsim/tables/ps_idle_ms/h5/w0/v2</property>
      <property value="-27.5229">fsim/tables/ps_idle_ms/h5/w0/v3</property>
      <property value="-49.215">fsim/tables/ps_idle_ms/h5/w0/v4</property>
      <property value="-68.5638">fsim/tables/ps_idle_ms/h5/w0/v5</property>
      <property value="-86.2582">fsim/tables/ps_idle_ms/h5/w0/v6</property>
      <property value="-105.088">fsim/tables/ps_idle_ms/h5/w0/v7</property>
      <property value="-127.604">fsim/tables/ps_idle_ms/h5/w0/v8</property>
      <property value="-153.756">fsim/tables/ps_idle_ms/h5/w0/v9</property>
      <property value="-31.3822">fsim/tables/ps_idle_ms/h5/w1/v0</property>
      <property value="-26.5665">fsim/tables/ps_idle_ms/h5/w1/v1</property>
      <property value="-163.791">fsim/tables/ps_idle_ms/h5/w1/v10</property>
      <property value="-192.103">fsim/tables/ps_idle_ms/h5/w1/v11</property>
      <property value="-222.333">fsim/tables/ps_idle_ms/h5/w1/v12</property>
      <property value="-255.862">fsim/tables/ps_idle_ms/h5/w1/v13</property>
      <property value="-292.168">fsim/tables/ps_idle_ms/h5/w1/v14</property>
      <property value="-332.777">fsim/tables/ps_idle_ms/h5/w1/v15</property>
      <property value="-25.6751">fsim/tables/ps_idle_ms/h5/w1/v2</property>
      <property value="-27.5508">fsim/tables/ps_idle_ms/h5/w1/v3</property>
      <property value="-45.2454">fsim/tables/ps_idle_ms/h5/w1/v4</property>
      <property value="-64.0151">fsim/tables/ps_idle_ms/h5/w1/v5</property>
      <property value="-80.1398">fsim/tables/ps_idle_ms/h5/w1/v6</property>
      <property value="-96.6677">fsim/tables/ps_idle_ms/h5/w1/v7</property>
      <property value="-115.829">fsim/tables/ps_idle_ms/h5/w1/v8</property>
      <property value="-138.858">fsim/tables/ps_idle_ms/h5/w1/v9</property>
      <property value="-36.6704">fsim/tables/ps_idle_ms/h5/w2/v0</property>
      <property value="-29.7322">fsim/tables/ps_idle_ms/h5/w2/v1</property>
      <property value="-149.065">fsim/tables/ps_idle_ms/h5/w2/v10</property>
      <property value="-173.748">fsim/tables/ps_idle_ms/h5/w2/v11</property>
      <property value="-199.84">fsim/tables/ps_idle_ms/h5/w2/v12</property>
      <property value="-229.124">fsim/tables/ps_idle_ms/h5/w2/v13</property>
      <property value="-260.23">fsim/tables/ps_idle_ms/h5/w2/v14</property>
      <property value="-296.587">fsim/tables/ps_idle_ms/h5/w2/v15</property>
      <property value="-27.2291">fsim/tables/ps_idle_ms/h5/w2/v2</property>
      <property value="-27.828">fsim/tables/ps_idle_ms/h5/w2/v3</property>
      <property value="-39.8201">fsim/tables/ps_idle_ms/h5/w2/v4</property>
      <property value="-59.5866">fsim/tables/ps_idle_ms/h5/w2/v5</property>
      <property value="-74.5963">fsim/tables/ps_idle_ms/h5/w2/v6</property>
      <property value="-89.1673">fsim/tables/ps_idle_ms/h5/w2/v7</property>
      <property value="-106.33">fsim/tables/ps_idle_ms/h5/w2/v8</property>
      <property value="-126.895">fsim/tables/ps_idle_ms/h5/w2/v9</property>
      <property value="-32.9467">fsim/tables/ps_idle_ms/h6/w0/v0</property>
      <property value="-28.9466">fsim/tables/ps_idle_ms/h6/w0/v1</property>
      <property value="-148.986">fsim/tables/ps_idle_ms/h6/w0/v10</property>
      <property value="-171.849">fsim/tables/ps_idle_ms/h6/w0/v11</property>
      <property value="-195.565">fsim/tables/ps_idle_ms/h6/w0/v12</property>
      <property value="-221.059">fsim/tables/ps_idle_ms/h6/w0/v13</property>
      <property value="-248.965">fsim/tables/ps_idle_ms/h6/w0/v14</property>
      <property value="-281.789">fsim/tables/ps_idle_ms/h6/w0/v15</property>
      <property value="-28.0226">fsim/tables/ps_idle_ms/h6/w0/v2</property>
      <property value="-31.9258">fsim/tables/ps_idle_ms/h6/w0/v3</property>
      <property value="-52.1874">fsim/tables/ps_idle_ms/h6/w0/v4</property>
      <property value="-65.9187">fsim/tables/ps_idle_ms/h6/w0/v5</property>
      <property value="-78.8481">fsim/tables/ps_idle_ms/h6/w0/v6</property>
      <property value="-92.5147">fsim/tables/ps_idle_ms/h6/w0/v7</property>
      <property value="-109.139">fsim/tables/ps_idle_ms/h6/w0/v8</property>
      <property value="-128.742">fsim/tables/ps_idle_ms/h6/w0/v9</property>
      <property value="-38.9898">fsim/tables/ps_idle_ms/h6/w1/v0</property>
      <property value="-32.5208">fsim/tables/ps_idle_ms/h6/w1/v1</property>
      <property value="-135.692">fsim/tables/ps_idle_ms/h6/w1/v10</property>
      <property value="-156.093">fsim/tables/ps_idle_ms/h6/w1/v11</property>
      <property value="-177.278">fsim/tables/ps_idle_ms/h6/w1/v12</property>
      <property value="-199.813">fsim/tables/ps_idle_ms/h6/w1/v13</property>
      <property value="-222.985">fsim/tables/ps_idle_ms/h6/w1/v14</property>
      <property value="-251.949">fsim/tables/ps_idle_ms/h6/w1/v15</property>
      <property value="-30.0931">fsim/tables/ps_idle_ms/h6/w1/v2</property>
      <property value="-32.1829">fsim/tables/ps_idle_ms/h6/w1/v3</property>
      <property value="-50.0206">fsim/tables/ps_idle_ms/h6/w1/v4</property>
      <property value="-62.6752">fsim/tables/ps_idle_ms/h6/w1/v5</property>
      <property value="-74.3065">fsim/tables/ps_idle_ms/h6/w1/v6</property>
      <property value="-86.7121">fsim/tables/ps_idle_ms/h6/w1/v7</property>
      <property value="-100.989">fsim/tables/ps_idle_ms/h6/w1/v8</property>
      <property value="-118.183">fsim/tables/ps_idle_ms/h6/w1/v9</property>
      <property value="-35.4522">fsim/tables/ps_idle_ms/h6/w2/v0</property>
      <property value="-32.3307">fsim/tables/ps_idle_ms/h6/w2/v1</property>
      <property value="-132.862">fsim/tables/ps_idle_ms/h6/w2/v10</property>
      <property value="-149.836">fsim/tables/ps_idle_ms/h6/w2/v11</property>
      <property value="-166.511">fsim/tables/ps_idle_ms/h6/w2/v12</property>
      <property value="-184.081">fsim/tables/ps_idle_ms/h6/w2/v13</property>
      <property value="-203.264">fsim/tables/ps_idle_ms/h6/w2/v14</property>
      <property value="-227.677">fsim/tables/ps_idle_ms/h6/w2/v15</property>
      <property value="-33.7802">fsim/tables/ps_idle_ms/h6/w2/v2</property>
      <property value="-48.668">fsim/tables/ps_idle_ms/h6/w2/v3</property>
      <property value="-59.2032">fsim/tables/ps_idle_ms/h6/w2/v4</property>
      <property value="-69.4785">fsim/tables/ps_idle_ms/h6/w2/v5</property>
      <property value="-79.3795">fsim/tables/ps_idle_ms/h6/w2/v6</property>
      <property value="-90.0308">fsim/tables/ps_idle_ms/h6/w2/v7</property>
      <property value="-102.947">fsim/tables/ps_idle_ms/h6/w2/v8</property>
      <property value="-117.994">fsim/tables/ps_idle_ms/h6/w2/v9</property>
      <property value="-37.0025">fsim/tables/ps_idle_ms/h7/w0/v0</property>
      <property value="-33.5969">fsim/tables/ps_idle_ms/h7/w0/v1</property>
      <property value="-122.936">fsim/tables/ps_idle_ms/h7/w0/v10</property>
      <property value="-137.481">fsim/tables/ps_idle_ms/h7/w0/v11</property>
      <property value="-152.606">fsim/tables/ps_idle_ms/h7/w0/v12</property>
      <property value="-166.844">fsim/tables/ps_idle_ms/h7/w0/v13</property>
      <property value="-183.027">fsim/tables/ps_idle_ms/h7/w0/v14</property>
      <property value="-203.763">fsim/tables/ps_idle_ms/h7/w0/v15</property>
      <property value="-35.3499">fsim/tables/ps_idle_ms/h7/w0/v2</property>
      <property value="-49.0259">fsim/tables/ps_idle_ms/h7/w0/v3</property>
      <property value="-58.3848">fsim/tables/ps_idle_ms/h7/w0/v4</property>
      <property value="-68.3042">fsim/tables/ps_idle_ms/h7/w0/v5</property>
      <property value="-76.6147">fsim/tables/ps_idle_ms/h7/w0/v6</property>
      <property value="-86.0483">fsim/tables/ps_idle_ms/h7/w0/v7</property>
      <property value="-96.8169">fsim/tables/ps_idle_ms/h7/w0/v8</property>
      <property value="-109.69">fsim/tables/ps_idle_ms/h7/w0/v9</property>
      <property value="-39.9823">fsim/tables/ps_idle_ms/h7/w1/v0</property>
      <property value="-37.073">fsim/tables/ps_idle_ms/h7/w1/v1</property>
      <property value="-113.193">fsim/tables/ps_idle_ms/h7/w1/v10</property>
      <property value="-123.856">fsim/tables/ps_idle_ms/h7/w1/v11</property>
      <property value="-134.992">fsim/tables/ps_idle_ms/h7/w1/v12</property>
      <property value="-144.766">fsim/tables/ps_idle_ms/h7/w1/v13</property>
      <property value="-157.605">fsim/tables/ps_idle_ms/h7/w1/v14</property>
      <property value="-176.482">fsim/tables/ps_idle_ms/h7/w1/v15</property>
      <property value="-39.825">fsim/tables/ps_idle_ms/h7/w1/v2</property>
      <property value="-51.6992">fsim/tables/ps_idle_ms/h7/w1/v3</property>
      <property value="-60.6402">fsim/tables/ps_idle_ms/h7/w1/v4</property>
      <property value="-69.3409">fsim/tables/ps_idle_ms/h7/w1/v5</property>
      <property value="-75.9364">fsim/tables/ps_idle_ms/h7/w1/v6</property>
      <property value="-82.8957">fsim/tables/ps_idle_ms/h7/w1/v7</property>
      <property value="-91.1259">fsim/tables/ps_idle_ms/h7/w1/v8</property>
      <property value="-101.272">fsim/tables/ps_idle_ms/h7/w1/v9</property>
      <property value="-42.3596">fsim/tables/ps_idle_ms/h7/w2/v0</property>
      <property value="-41.0916">fsim/tables/ps_idle_ms/h7/w2/v1</property>
      <property value="-76.8679">fsim/tables/ps_idle_ms/h7/w2/v10</property>
      <property value="-79.3966">fsim/tables/ps_idle_ms/h7/w2/v11</property>
      <property value="-81.4002">fsim/tables/ps_idle_ms/h7/w2/v12</property>
      <property value="-85.2376">fsim/tables/ps_idle_ms/h7/w2/v13</property>
      <property value="-91.8678">fsim/tables/ps_idle_ms/h7/w2/v14</property>
      <property value="-100.371">fsim/tables/ps_idle_ms/h7/w2/v15</property>
      <property value="-41.3541">fsim/tables/ps_idle_ms/h7/w2/v2</property>
      <property value="-43.904">fsim/tables/ps_idle_ms/h7/w2/v3</property>
      <property value="-50.6902">fsim/tables/ps_idle_ms/h7/w2/v4</property>
      <property value="-55.8589">fsim/tables/ps_idle_ms/h7/w2/v5</property>
      <property value="-60.3418">fsim/tables/ps_idle_ms/h7/w2/v6</property>
      <property value="-65.5408">fsim/tables/ps_idle_ms/h7/w2/v7</property>
      <property value="-70.4594">fsim/tables/ps_idle_ms/h7/w2/v8</property>
      <property value="-73.6717">fsim/tables/ps_idle_ms/h7/w2/v9</property>
      <property value="508.046">fsim/tables/reach_tas_ms/h0/w0</property>
      <property value="507.566">fsim/tables/reach_tas_ms/h0/w1</property>
      <property value="507.088">fsim/tables/reach_tas_ms/h0/w2</property>
      <property value="568.67">fsim/tables/reach_tas_ms/h1/w0</property>
      <property value="567.94">fsim/tables/reach_tas_ms/h1/w1</property>
      <property value="567.209">fsim/tables/reach_tas_ms/h1/w2</property>
      <property value="638.81">fsim/tables/reach_tas_ms/h2/w0</property>
      <property value="638.159">fsim/tables/reach_tas_ms/h2/w1</property>
      <property value="637.586">fsim/tables/reach_tas_ms/h2/w2</property>
      <property value="694.809">fsim/tables/reach_tas_ms/h3/w0</property>
      <property value="693.678">fsim/tables/reach_tas_ms/h3/w1</property>
      <property value="691.856">fsim/tables/reach_tas_ms/h3/w2</property>
      <property value="693.958">fsim/tables/reach_tas_ms/h4/w0</property>
      <property value="691.729">fsim/tables/reach_tas_ms/h4/w1</property>
      <property value="689.734">fsim/tables/reach_tas_ms/h4/w2</property>
      <property value="686.343">fsim/tables/reach_tas_ms/h5/w0</property>
      <property value="682.452">fsim/tables/reach_tas_ms/h5/w1</property>
      <property value="674.745">fsim/tables/reach_tas_ms/h5/w2</property>
      <property value="674.929">fsim/tables/reach_tas_ms/h6/w0</property>
      <property value="666.244">fsim/tables/reach_tas_ms/h6/w1</property>
      <property value="654.858">fsim/tables/reach_tas_ms/h6/w2</property>
      <property value="634.615">fsim/tables/reach_tas_ms/h7/w0</property>
      <property value="523.865">fsim/tables/reach_tas_ms/h7/w1</property>
      <property value="0.0">fsim/tables/speed_fraction/v0</property>
      <property value="0.0666667">fsim/tables/speed_fraction/v1</property>
      <property value="0.666667">fsim/tables/speed_fraction/v10</property>
      <property value="0.733333">fsim/tables/speed_fraction/v11</property>
      <property value="0.8">fsim/tables/speed_fraction/v12</property>
      <property value="0.866667">fsim/tables/speed_fraction/v13</property>
      <property value="0.933333">fsim/tables/speed_fraction/v14</property>
      <property value="1">fsim/tables/speed_fraction/v15</property>
      <property value="0.133333">fsim/tables/speed_fraction/v2</property>
      <property value="0.2">fsim/tables/speed_fraction/v3</property>
      <property value="0.266667">fsim/tables/speed_fraction/v4</property>
      <property value="0.333333">fsim/tables/speed_fraction/v5</property>
      <property value="0.4">fsim/tables/speed_fraction/v6</property>
      <property value="0.466667">fsim/tables/speed_fraction/v7</property>
      <property value="0.533333">fsim/tables/speed_fraction/v8</property>
      <property value="0.6">fsim/tables/speed_fraction/v9</property>
      <property value="55.239">fsim/tables/stall_cas_ms/h0/w0</property>
      <property value="58.9499">fsim/tables/stall_cas_ms/h0/w1</property>
      <property value="62.4406">fsim/tables/stall_cas_ms/h0/w2</property>
      <property value="56.4046">fsim/tables/stall_cas_ms/h1/w0</property>
      <property value="60.1938">fsim/tables/stall_cas_ms/h1/w1</property>
      <property value="63.7582">fsim/tables/stall_cas_ms/h1/w2</property>
      <property value="58.2084">fsim/tables/stall_cas_ms/h2/w0</property>
      <property value="62.1188">fsim/tables/stall_cas_ms/h2/w1</property>
      <property value="65.7972">fsim/tables/stall_cas_ms/h2/w2</property>
      <property value="59.2608">fsim/tables/stall_cas_ms/h3/w0</property>
      <property value="63.2419">fsim/tables/stall_cas_ms/h3/w1</property>
      <property value="66.9868">fsim/tables/stall_cas_ms/h3/w2</property>
      <property value="59.3968">fsim/tables/stall_cas_ms/h4/w0</property>
      <property value="63.387">fsim/tables/stall_cas_ms/h4/w1</property>
      <property value="67.1405">fsim/tables/stall_cas_ms/h4/w2</property>
      <property value="59.7068">fsim/tables/stall_cas_ms/h5/w0</property>
      <property value="63.7179">fsim/tables/stall_cas_ms/h5/w1</property>
      <property value="67.491">fsim/tables/stall_cas_ms/h5/w2</property>
      <property value="60.1212">fsim/tables/stall_cas_ms/h6/w0</property>
      <property value="64.1601">fsim/tables/stall_cas_ms/h6/w1</property>
      <property value="67.9594">fsim/tables/stall_cas_ms/h6/w2</property>
      <property value="59.6845">fsim/tables/stall_cas_ms/h7/w0</property>
      <property value="63.694">fsim/tables/stall_cas_ms/h7/w1</property>
      <property value="67.4657">fsim/tables/stall_cas_ms/h7/w2</property>
      <property value="17077">fsim/tables/weight_kg/w0</property>
      <property value="19448.5">fsim/tables/weight_kg/w1</property>
      <property value="21820">fsim/tables/weight_kg/w2</property>
      <channel name="Pitch (fly-by-wire)">
        <!-- hangar: load factor command, alpha and pitch-rate inner loop (hangar/fcs.py) -->
        <summer name="fcs/pitch-trim-sum">
          <input>fcs/elevator-cmd-norm</input>
          <input>fcs/pitch-trim-cmd-norm</input>
          <clipto> <min>-1</min> <max>1</max> </clipto>
        </summer>
        <!-- the integrators are reset below 60 kt and while a wheel carries weight
             (on the ground, taking off and landing) -->
        <switch name="fcs/fbw/reset">
          <default value="0"/>
          <test logic="OR" value="-1">
            velocities/vc-kts lt 60
            gear/wow gt 0
          </test>
        </switch>
        <fcs_function name="fcs/fbw/k-alpha">
          <function>
            <table>
              <independentVar lookup="row">aero/qbar-psf</independentVar>
              <independentVar lookup="column">velocities/mach</independentVar>
              <tableData>
                       0.150     0.400     0.700     0.900     1.100     1.400     2.000
              10.0  -6.00000  -6.00000  -6.00000  -6.00000  -6.00000  -6.00000  -6.00000
              20.0  -5.37857  -5.86403  -5.34761  -4.42531  -3.95275  -4.89948  -6.00000
              40.0  -2.00164  -2.48038  -2.12363  -1.56177  -0.85420  -1.43256  -2.82407
              80.0  -1.08129  -1.75891  -1.84934  -1.66665  -0.93008  -0.80824  -0.44458
             150.0  -0.88215  -1.59828  -1.74687  -1.57952  -0.86851  -0.77016  -0.48517
             300.0  -0.80537  -1.33217  -1.55871  -1.43151  -0.76225  -0.68432  -0.44268
             600.0  -1.37138  -0.99607  -1.14963  -0.90781  -0.27095  -0.42931  -0.37954
            1200.0  -5.47288  -0.21161  -0.13984  -0.01269   0.70728   0.81958   0.45350
            2400.0  -6.00000  -0.70663   0.10033   0.28145   1.12747   1.40920   1.36325
              </tableData>
            </table>
          </function>
        </fcs_function>
        <fcs_function name="fcs/fbw/k-q">
          <function>
            <table>
              <independentVar lookup="row">aero/qbar-psf</independentVar>
              <independentVar lookup="column">velocities/mach</independentVar>
              <tableData>
                       0.150     0.400     0.700     0.900     1.100     1.400     2.000
              10.0  -3.00000  -3.00000  -3.00000  -3.00000  -3.00000  -3.00000  -3.00000
              20.0  -3.00000  -3.00000  -3.00000  -3.00000  -3.00000  -3.00000  -3.00000
              40.0  -2.34471  -3.00000  -2.69590  -2.16092  -2.25784  -3.00000  -3.00000
              80.0  -0.87279  -1.51198  -1.56826  -1.43014  -1.50536  -1.80303  -2.22390
             150.0  -0.38861  -1.00625  -1.08948  -1.00241  -1.06692  -1.29227  -1.59339
             300.0   0.01801  -0.59926  -0.70430  -0.66008  -0.71535  -0.87902  -1.10391
             600.0   0.37088  -0.30700  -0.40892  -0.37391  -0.42302  -0.57052  -0.75663
            1200.0   1.12120   0.01544  -0.11516  -0.12311  -0.16338  -0.24451  -0.42212
            2400.0   3.00000   0.20841   0.03716   0.00474  -0.03267  -0.08122  -0.18407
              </tableData>
            </table>
          </function>
        </fcs_function>
        <fcs_function name="fcs/fbw/k-ff">
          <function>
            <table>
              <independentVar lookup="row">aero/qbar-psf</independentVar>
              <independentVar lookup="column">velocities/mach</independentVar>
              <tableData>
                       0.150     0.400     0.700     0.900     1.100     1.400     2.000
              10.0  -0.30000  -0.30000  -0.30000  -0.30000  -0.30000  -0.30000  -0.30000
              20.0  -0.30000  -0.30000  -0.30000  -0.30000  -0.30000  -0.30000  -0.30000
              40.0  -0.30000  -0.30000  -0.30000  -0.30000  -0.30000  -0.30000  -0.30000
              80.0  -0.30000  -0.30000  -0.30000  -0.30000  -0.30000  -0.30000  -0.30000
             150.0  -0.30000  -0.30000  -0.27796  -0.24095  -0.29990  -0.30000  -0.30000
             300.0  -0.15766  -0.15298  -0.13948  -0.12078  -0.15056  -0.19938  -0.30000
             600.0  -0.07834  -0.07434  -0.06346  -0.04993  -0.06286  -0.09393  -0.15748
            1200.0  -0.01952  -0.01852  -0.01581  -0.01244  -0.01566  -0.02340  -0.05477
            2400.0  -0.00487  -0.00462  -0.00394  -0.00310  -0.00390  -0.00583  -0.01364
              </tableData>
            </table>
          </function>
        </fcs_function>
        <fcs_function name="fcs/fbw/k-i">
          <function>
            <table>
              <independentVar lookup="row">aero/qbar-psf</independentVar>
              <independentVar lookup="column">velocities/mach</independentVar>
              <tableData>
                       0.150     0.400     0.700     0.900     1.100     1.400     2.000
              10.0  -0.60000  -0.60000  -0.60000  -0.60000  -0.60000  -0.60000  -0.60000
              20.0  -0.60000  -0.60000  -0.60000  -0.60000  -0.60000  -0.60000  -0.60000
              40.0  -0.60000  -0.60000  -0.60000  -0.60000  -0.60000  -0.60000  -0.60000
              80.0  -0.58081  -0.56400  -0.51531  -0.44743  -0.55414  -0.60000  -0.60000
             150.0  -0.31379  -0.30458  -0.27796  -0.24095  -0.29990  -0.39599  -0.60000
             300.0  -0.15766  -0.15298  -0.13948  -0.12078  -0.15056  -0.19938  -0.31320
             600.0  -0.07834  -0.07434  -0.06346  -0.04993  -0.06286  -0.09393  -0.15748
            1200.0  -0.01952  -0.01852  -0.01581  -0.01244  -0.01566  -0.02340  -0.05477
            2400.0  -0.00487  -0.00462  -0.00394  -0.00310  -0.00390  -0.00583  -0.01364
              </tableData>
            </table>
          </function>
        </fcs_function>
        <fcs_function name="fcs/fbw/n-alpha">
          <function>
            <table>
              <independentVar lookup="row">aero/qbar-psf</independentVar>
              <independentVar lookup="column">velocities/mach</independentVar>
              <tableData>
                       0.150     0.400     0.700     0.900     1.100     1.400     2.000
              10.0   1.00000   1.00000   1.00000   1.00000   1.00000   1.00000   1.00000
              20.0   1.00000   1.00000   1.00000   1.00000   1.00000   1.00000   1.00000
              40.0   1.35642   1.45104   1.81379   2.29389   2.24770   1.62907   1.00000
              80.0   4.76326   4.88266   5.24855   5.81465   5.75592   5.05676   3.10141
             150.0   9.14393   9.34769   9.97399  10.96090  10.85695   9.64466   6.51265
             300.0  18.15308  18.55629  19.80075  21.76835  21.56110  19.14423  13.00273
             600.0  36.22192  37.03621  39.54837  43.51842  43.10025  38.22357  25.84888
            1200.0  72.64023  74.27877  79.33380  87.32246  86.48101  76.66801  51.75180
            2400.0 145.74104 149.01810 159.12818 175.10548 173.42260 153.79659 103.88991
              </tableData>
            </table>
          </function>
        </fcs_function>
        <!-- the pitching moment's departures from a straight line through the
             angle-of-attack envelope (-0.158 per rad about the CG), cancelled by the
             elevator: the gains are designed on the line -->
        <fcs_function name="fcs/fbw/moment-comp">
          <function>
            <table>
              <independentVar lookup="row">aero/alpha-rad</independentVar>
              <independentVar lookup="column">velocities/mach</independentVar>
              <tableData>
                       0.150     0.400     0.700     0.900     1.100     1.400     2.000
          -0.17453  -0.02862  -0.02762  -0.02479  -0.02090  -0.02148  -0.02671  -0.03860
          -0.15708  -0.02398  -0.02315  -0.02077  -0.01751  -0.01800  -0.02238  -0.03234
          -0.13963  -0.02033  -0.01962  -0.01760  -0.01484  -0.01526  -0.01897  -0.02742
          -0.12217  -0.00491  -0.00474  -0.00425  -0.00358  -0.00368  -0.00458  -0.00662
          -0.10472   0.00574   0.00554   0.00497   0.00419   0.00431   0.00536   0.00774
          -0.08727   0.01654   0.01596   0.01432   0.01207   0.01241   0.01543   0.02230
          -0.06981   0.02314   0.02233   0.02004   0.01689   0.01736   0.02160   0.03120
          -0.05236   0.01326   0.01280   0.01149   0.00969   0.00995   0.01238   0.01789
          -0.03491   0.00706   0.00682   0.00612   0.00516   0.00530   0.00659   0.00952
          -0.01745   0.00652   0.00630   0.00565   0.00476   0.00490   0.00609   0.00880
           0.00000   0.00582   0.00562   0.00504   0.00425   0.00437   0.00544   0.00786
           0.01745   0.00526   0.00508   0.00456   0.00384   0.00395   0.00491   0.00710
           0.03491   0.00518   0.00500   0.00448   0.00378   0.00388   0.00483   0.00698
           0.05236   0.00484   0.00467   0.00419   0.00353   0.00363   0.00452   0.00653
           0.06981   0.00443   0.00428   0.00384   0.00324   0.00333   0.00414   0.00598
           0.08727   0.00386   0.00373   0.00334   0.00282   0.00290   0.00360   0.00521
           0.10472   0.00313   0.00302   0.00271   0.00229   0.00235   0.00292   0.00422
           0.12217   0.00252   0.00244   0.00219   0.00184   0.00189   0.00236   0.00340
           0.13963   0.00181   0.00174   0.00156   0.00132   0.00136   0.00169   0.00244
           0.15708   0.00093   0.00089   0.00080   0.00068   0.00070   0.00087   0.00125
           0.17453  -0.00010  -0.00009  -0.00008  -0.00007  -0.00007  -0.00009  -0.00013
           0.19199  -0.00101  -0.00098  -0.00088  -0.00074  -0.00076  -0.00095  -0.00137
           0.20944  -0.00204  -0.00197  -0.00177  -0.00149  -0.00153  -0.00191  -0.00275
           0.22689  -0.00218  -0.00211  -0.00189  -0.00159  -0.00164  -0.00204  -0.00294
           0.24435  -0.00223  -0.00215  -0.00193  -0.00163  -0.00167  -0.00208  -0.00301
           0.26180  -0.00338  -0.00326  -0.00293  -0.00247  -0.00254  -0.00316  -0.00456
           0.27925  -0.00463  -0.00447  -0.00401  -0.00338  -0.00347  -0.00432  -0.00624
           0.29671  -0.00515  -0.00497  -0.00446  -0.00376  -0.00386  -0.00481  -0.00694
           0.31416  -0.00546  -0.00527  -0.00473  -0.00399  -0.00410  -0.00510  -0.00737
           0.33161  -0.00631  -0.00609  -0.00546  -0.00460  -0.00473  -0.00589  -0.00850
           0.34907  -0.00669  -0.00646  -0.00579  -0.00489  -0.00502  -0.00625  -0.00902
           0.36652  -0.00618  -0.00597  -0.00535  -0.00451  -0.00464  -0.00577  -0.00834
           0.38397  -0.00487  -0.00470  -0.00422  -0.00355  -0.00365  -0.00454  -0.00656
           0.40143  -0.00266  -0.00257  -0.00230  -0.00194  -0.00199  -0.00248  -0.00358
           0.41888   0.00047   0.00045   0.00040   0.00034   0.00035   0.00043   0.00063
           0.43633   0.00539   0.00520   0.00466   0.00393   0.00404   0.00503   0.00726
           0.45379   0.01111   0.01072   0.00962   0.00811   0.00833   0.01037   0.01498
              </tableData>
            </table>
          </function>
        </fcs_function>
        <!-- the gravity reference: the load factor that holds the flight path -->
        <fcs_function name="fcs/fbw/g-ref">
          <function>
            <product>
              <cos><property>attitude/theta-rad</property></cos>
              <cos><property>attitude/phi-rad</property></cos>
            </product>
          </function>
        </fcs_function>
        <!-- stick to load factor beyond the gravity reference, aft (negative) to n_max,
             no more than the lift at the angle-of-attack limits gives - beyond the
             gravity reference of the moment, so that full aft stick still reaches
             the limit in a steep climb or inverted - through a 0.2 s prefilter and
             a 12 g/s onset limit (a full pull at once pitches an agile airframe
             faster than its nose-down control can stop at the angle-of-attack
             limit) -->
        <fcs_function name="fcs/fbw/dn-stick">
          <function>
            <max>
              <min>
                <table>
                  <independentVar lookup="row">fcs/pitch-trim-sum</independentVar>
                  <tableData>
                    -1.0  8.000
                     0.0  0.0
                     1.0  -4.000
                  </tableData>
                </table>
                <difference><product><property>fcs/fbw/n-alpha</property><value>0.45379</value></product><property>fcs/fbw/g-ref</property></difference>
              </min>
              <difference><product><property>fcs/fbw/n-alpha</property><value>-0.17453</value></product><property>fcs/fbw/g-ref</property></difference>
            </max>
          </function>
        </fcs_function>
        <lag_filter name="fcs/fbw/dn-lag">
          <input>fcs/fbw/dn-stick</input>
          <c1>5.0</c1>
        </lag_filter>
        <actuator name="fcs/fbw/dn-cmd">
          <input>fcs/fbw/dn-lag</input>
          <rate_limit>12.0</rate_limit>
        </actuator>
        <!-- the response the command should produce (the short period's rise): the
             integrator trims away what differs from it, not the rise itself -->
        <lag_filter name="fcs/fbw/dn-model">
          <input>fcs/fbw/dn-cmd</input>
          <c1>2.5</c1>
        </lag_filter>
        <fcs_function name="fcs/fbw/dn">
          <function>
            <difference><property>accelerations/Nz</property><property>fcs/fbw/g-ref</property></difference>
          </function>
        </fcs_function>
        <!-- the angle of attack with its rise over the next 0.35 s counted as spent
             (the rise, not the pitch rate: in a steady pull the nose turns with the
             flight path and the angle of attack holds), and the load factor the
             angle of attack left to each limit gives -->
        <fcs_function name="fcs/fbw/alpha-ahead">
          <function>
            <sum>
              <property>aero/alpha-rad</property>
              <product><value>0.35</value><property>aero/alphadot-rad_sec</property></product>
            </sum>
          </function>
        </fcs_function>
        <fcs_function name="fcs/fbw/dn-room-up">
          <function>
            <product><property>fcs/fbw/n-alpha</property>
              <difference><value>0.45379</value><property>fcs/fbw/alpha-ahead</property></difference></product>
          </function>
        </fcs_function>
        <fcs_function name="fcs/fbw/dn-room-down">
          <function>
            <product><property>fcs/fbw/n-alpha</property>
              <difference><value>-0.17453</value><property>fcs/fbw/alpha-ahead</property></difference></product>
          </function>
        </fcs_function>
        <!-- the command limited to the load factor the aircraft pulls now plus what
             the angle of attack left gives: at a limit the feedforward asks for the
             load factor the airframe gives there, whatever elevator holds it - a
             steady pull on a stable airframe, a push on an unstable one (a
             feedforward faded out past the limit instead took about 10 deg of
             elevator per deg of alpha, on one side of it only: the actuator's rate
             limit could not follow, and the MiG-29A cycled between 24 and 29 deg) -->
        <fcs_function name="fcs/fbw/dn-limited">
          <function>
            <max>
              <min>
                <property>fcs/fbw/dn-cmd</property>
                <sum><property>fcs/fbw/dn</property><property>fcs/fbw/dn-room-up</property></sum>
              </min>
              <sum><property>fcs/fbw/dn</property><property>fcs/fbw/dn-room-down</property></sum>
            </max>
          </function>
        </fcs_function>
        <!-- the integrator's error: the load factor's departure from the model
             response, and at a limit the angle of attack left, counted five times -
             it trims what the airframe needs there beyond the linear design (vortex
             lift, the tail's power at high alpha) in a fraction of a second, not
             over the pull -->
        <fcs_function name="fcs/fbw/pitch-error">
          <function>
            <max>
              <min>
                <difference><property>fcs/fbw/dn-model</property><property>fcs/fbw/dn</property></difference>
                <product><value>5.0</value><property>fcs/fbw/dn-room-up</property></product>
              </min>
              <product><value>5.0</value><property>fcs/fbw/dn-room-down</property></product>
            </max>
          </function>
        </fcs_function>
        <fcs_function name="fcs/fbw/pitch-error-rate">
          <function><product><property>fcs/fbw/k-i</property><property>fcs/fbw/pitch-error</property></product></function>
        </fcs_function>
        <!-- the integrator: reset below 60 kt and on the wheels, held while the
             elevator is at a stop it would push further into (anti-windup) -->
        <switch name="fcs/fbw/pitch-hold">
          <default value="0"/>
          <test logic="OR" value="-1">
            velocities/vc-kts lt 60
            gear/wow gt 0
          </test>
          <test logic="AND" value="1">
            fcs/fbw/elevator-raw gt 0.26180
            fcs/fbw/pitch-error-rate gt 0
          </test>
          <test logic="AND" value="1">
            fcs/fbw/elevator-raw lt -0.34907
            fcs/fbw/pitch-error-rate lt 0
          </test>
        </switch>
        <integrator name="fcs/fbw/pitch-integral">
          <input>fcs/fbw/pitch-error-rate</input>
          <c1>1.0</c1>
          <trigger>fcs/fbw/pitch-hold</trigger>
          <clipto> <min>-0.5</min> <max>0.5</max> </clipto>
        </integrator>
        <!-- past an angle-of-attack limit (the next 0.35 s counted) a push back
             in proportion, all the travel 4 deg beyond: an unstable airframe
             pitching up fast needs it at once, not when an integrator winds -->
        <fcs_function name="fcs/fbw/alpha-push">
          <function>
            <difference>
              <product><value>3.75000</value>
                <max><value>0</value><difference><property>fcs/fbw/alpha-ahead</property><value>0.45379</value></difference></max></product>
              <product><value>5.00000</value>
                <max><value>0</value><difference><value>-0.17453</value><property>fcs/fbw/alpha-ahead</property></difference></max></product>
            </difference>
          </function>
        </fcs_function>
        <lag_filter name="fcs/fbw/ground">
          <input>gear/wow</input>
          <c1>2.0</c1>
        </lag_filter>
        <fcs_function name="fcs/fbw/ground-direct">
          <function>
            <product>
              <property>fcs/fbw/ground</property>
              <table>
                <independentVar lookup="row">fcs/pitch-trim-sum</independentVar>
                <tableData>
                  -1.0  -0.34907
                   0.0  0.0
                   1.0  0.26180
                </tableData>
              </table>
            </product>
          </function>
        </fcs_function>
        <!-- the elevator: the push, the moment compensation, angle-of-attack and
             pitch-rate feedback, the feedforward of the limited command, the
             integrator, the ground mode's direct stick -->
        <fcs_function name="fcs/fbw/elevator-raw">
          <function>
            <sum>
              <property>fcs/fbw/alpha-push</property>
              <property>fcs/fbw/moment-comp</property>
              <product><value>-1</value><property>fcs/fbw/k-alpha</property><property>aero/alpha-rad</property></product>
              <product><value>-1</value><property>fcs/fbw/k-q</property><property>velocities/q-rad_sec</property></product>
              <product><property>fcs/fbw/k-ff</property><property>fcs/fbw/dn-limited</property></product>
              <property>fcs/fbw/pitch-integral</property>
              <property>fcs/fbw/ground-direct</property>
            </sum>
          </function>
        </fcs_function>
        <pure_gain name="fcs/fbw/elevator">
          <input>fcs/fbw/elevator-raw</input>
          <gain>1.0</gain>
          <clipto> <min>-0.34907</min> <max>0.26180</max> </clipto>
        </pure_gain>
        <!-- full travel in 0.83 s: 60 deg/s for a +-25 deg tail, faster for a
             canard's longer throw -->
        <actuator name="fcs/elevator-actuator">
          <input>fcs/fbw/elevator</input>
          <lag>40</lag>
          <rate_limit>1.050</rate_limit>
          <output>fcs/elevator-pos-rad</output>
        </actuator>
      </channel>
      <channel name="Roll (fly-by-wire)">
        <!-- hangar: roll-rate command about the flight path, limited to what the rudder can
             coordinate; bank hold at neutral stick -->
        <summer name="fcs/roll-trim-sum">
          <input>fcs/aileron-cmd-norm</input>
          <input>fcs/roll-trim-cmd-norm</input>
          <clipto> <min>-1</min> <max>1</max> </clipto>
        </summer>
        <fcs_function name="fcs/fbw/k-roll">
          <function>
            <table>
              <independentVar lookup="row">aero/qbar-psf</independentVar>
              <independentVar lookup="column">velocities/mach</independentVar>
              <tableData>
                       0.150     0.400     0.700     0.900     1.100     1.400     2.000
              10.0   1.50000   1.50000   1.50000   1.50000   1.50000   1.50000   1.50000
              20.0   1.50000   1.50000   1.50000   1.50000   1.50000   1.50000   1.50000
              40.0   0.90381   1.10915   1.04694   0.88715   1.50000   1.50000   1.50000
              80.0   0.24350   0.43548   0.44450   0.39418   0.74384   1.24404   1.50000
             150.0   0.00034   0.18351   0.20998   0.19059   0.36775   0.62928   1.09350
             300.0   0.00000   0.03658   0.07439   0.07260   0.15035   0.27805   0.52174
             600.0   0.00000   0.00000   0.00551   0.01279   0.04016   0.09982   0.23187
            1200.0   0.00000   0.00000   0.00000   0.00000   0.00000   0.01000   0.08538
            2400.0   0.00000   0.00000   0.00000   0.00000   0.00000   0.00000   0.01170
              </tableData>
            </table>
          </function>
        </fcs_function>
        <fcs_function name="fcs/fbw/k-roll-ff">
          <function>
            <table>
              <independentVar lookup="row">aero/qbar-psf</independentVar>
              <independentVar lookup="column">velocities/mach</independentVar>
              <tableData>
                       0.150     0.400     0.700     0.900     1.100     1.400     2.000
              10.0   0.39244   0.14651   0.08222   0.06104   0.09118   0.10302   0.07992
              20.0   0.39244   0.14651   0.08222   0.06104   0.09118   0.10302   0.07992
              40.0   0.39244   0.14567   0.07983   0.05756   0.08621   0.10123   0.07992
              80.0   0.33018   0.12266   0.06789   0.04948   0.07403   0.08567   0.07228
             150.0   0.30480   0.11369   0.06371   0.04723   0.07056   0.07986   0.06370
             300.0   0.30375   0.11340   0.06367   0.04729   0.07064   0.07976   0.06179
             600.0   0.30478   0.11379   0.06388   0.04744   0.07086   0.08003   0.06197
            1200.0   0.30550   0.11406   0.06403   0.04755   0.07102   0.08022   0.06214
            2400.0   0.30603   0.11425   0.06413   0.04762   0.07112   0.08035   0.06228
              </tableData>
            </table>
          </function>
        </fcs_function>
        <fcs_function name="fcs/fbw/k-roll-i">
          <function>
            <table>
              <independentVar lookup="row">aero/qbar-psf</independentVar>
              <independentVar lookup="column">velocities/mach</independentVar>
              <tableData>
                       0.150     0.400     0.700     0.900     1.100     1.400     2.000
              10.0   0.46089   0.44877   0.41284   0.35820   0.66027   1.00000   1.00000
              20.0   0.23045   0.22438   0.20642   0.17910   0.33014   0.53515   0.87664
              40.0   0.11522   0.11154   0.10016   0.08397   0.15526   0.26295   0.43832
              80.0   0.05099   0.04961   0.04555   0.03944   0.07270   0.11820   0.19818
             150.0   0.02712   0.02642   0.02433   0.02114   0.03896   0.06303   0.10286
             300.0   0.01369   0.01333   0.01227   0.01066   0.01964   0.03180   0.05187
             600.0   0.00688   0.00670   0.00617   0.00535   0.00987   0.01599   0.02612
            1200.0   0.00345   0.00336   0.00309   0.00269   0.00495   0.00802   0.01311
            2400.0   0.00173   0.00168   0.00155   0.00135   0.00248   0.00402   0.00658
              </tableData>
            </table>
          </function>
        </fcs_function>
        <fcs_function name="fcs/fbw/p-max">
          <function>
            <table>
              <independentVar lookup="row">aero/qbar-psf</independentVar>
              <independentVar lookup="column">velocities/mach</independentVar>
              <tableData>
                       0.150     0.400     0.700     0.900     1.100     1.400     2.000
              10.0   0.71158   1.90608   3.39623   4.57462   3.06263   2.71055   3.49434
              20.0   0.71158   1.90608   3.39623   4.57462   3.06263   2.71055   3.49434
              40.0   0.71158   1.91698   3.49803   4.71239   3.23933   2.75859   3.49434
              80.0   0.84577   2.27669   4.11344   4.71239   3.77227   3.25968   3.86328
             150.0   0.91618   2.45622   4.38346   4.71239   3.95753   3.49675   4.38359
             300.0   0.91936   2.46245   4.38615   4.71239   3.95332   3.50133   4.51912
             600.0   0.91626   2.45414   4.37164   4.71239   3.94102   3.48948   4.50634
            1200.0   0.91407   2.44831   4.36143   4.71239   3.93201   3.48127   4.49399
            2400.0   0.91250   2.44420   4.35456   4.71239   3.92632   3.47560   4.48411
              </tableData>
            </table>
          </function>
        </fcs_function>
        <!-- the stick's rate halves towards alpha_max -->
        <fcs_function name="fcs/fbw/p-stick">
          <function>
            <product>
              <property>fcs/roll-trim-sum</property>
              <property>fcs/fbw/p-max</property>
              <table>
                <independentVar lookup="row">aero/alpha-rad</independentVar>
                <tableData>
                  0.18151 1.0
                  0.45379 0.5
                </tableData>
              </table>
            </product>
          </function>
        </fcs_function>
        <!-- the rudder's yaw acceleration at full travel (1/s^2), and the yaw damping (1/s) -->
        <fcs_function name="fcs/fbw/yaw-accel">
          <function>
            <table>
              <independentVar lookup="row">aero/qbar-psf</independentVar>
              <independentVar lookup="column">velocities/mach</independentVar>
              <tableData>
                       0.150     0.400     0.700     0.900     1.100     1.400     2.000
              10.0   0.03085   0.03163   0.03415   0.03875   0.02076   0.01416   0.00866
              20.0   0.06171   0.06325   0.06830   0.07749   0.04152   0.02831   0.01732
              40.0   0.12342   0.12783   0.14301   0.16743   0.08948   0.05837   0.03463
              80.0   0.28879   0.29653   0.32175   0.36724   0.19668   0.13306   0.07767
             150.0   0.55646   0.57056   0.61656   0.70021   0.37517   0.25550   0.15471
             300.0   1.11504   1.14282   1.23361   1.39886   0.74961   0.51149   0.31312
             600.0   2.22051   2.27565   2.45616   2.78535   1.49259   1.01838   0.62458
            1200.0   4.42652   4.53682   4.89787   5.55614   2.97728   2.03053   1.24376
            2400.0   8.84027   9.06084   9.78280  11.09892   5.94734   4.05550   2.48230
              </tableData>
            </table>
          </function>
        </fcs_function>
        <fcs_function name="fcs/fbw/yaw-damping">
          <function>
            <table>
              <independentVar lookup="row">aero/qbar-psf</independentVar>
              <independentVar lookup="column">velocities/mach</independentVar>
              <tableData>
                       0.150     0.400     0.700     0.900     1.100     1.400     2.000
              10.0   0.02894   0.01110   0.00677   0.00579   0.00469   0.00327   0.00155
              20.0   0.05789   0.02219   0.01354   0.01159   0.00939   0.00654   0.00310
              40.0   0.11577   0.04475   0.02768   0.02324   0.01886   0.01342   0.00620
              80.0   0.22280   0.08544   0.05213   0.04456   0.03612   0.02520   0.01210
             150.0   0.40776   0.15609   0.09476   0.08051   0.06529   0.04592   0.02228
             300.0   0.77650   0.29733   0.18070   0.15378   0.12468   0.08751   0.04252
             600.0   1.50302   0.57583   0.35055   0.29908   0.24243   0.16961   0.08156
            1200.0   2.96175   1.13536   0.69234   0.59202   0.47977   0.33468   0.15926
            2400.0   5.90118   2.26236   1.37989   1.18032   0.95649   0.66697   0.31637
              </tableData>
            </table>
          </function>
        </fcs_function>
        <!-- the rudder's share of the yaw a roll about the flight path needs, per unit of
             its roll acceleration: sin(alpha), less the ailerons' own yaw and what a
             principal axis inclined to the body axis gives -->
        <fcs_function name="fcs/fbw/roll-yaw-share">
          <function>
            <table>
              <independentVar lookup="row">aero/alpha-rad</independentVar>
              <tableData>
                   -0.34907  -0.38604
                   -0.26180  -0.31016
                   -0.17453  -0.23403
                   -0.08727  -0.14212
                    0.00000  -0.05106
                    0.08727   0.04362
                    0.17453   0.12628
                    0.26180   0.19645
                    0.34907   0.27376
                    0.43633   0.35569
                    0.52360   0.43705
                    0.61087   0.52032
                    0.69813   0.59929
                    0.78540   0.67007
                    0.87266   0.72723
              </tableData>
            </table>
          </function>
        </fcs_function>
        <!-- the yaw acceleration each rad/s of roll rate needs while the aircraft pitches
             under it: the pitch rate's inertia coupling, the angle of attack rising, and
             the yaw damping the roll's yaw rate meets -->
        <fcs_function name="fcs/fbw/p-yaw-need">
          <function>
            <abs>
              <sum>
                <product>
                  <sum>
                    <property>aero/alphadot-rad_sec</property>
                    <product><value>0.75842</value><property>velocities/q-rad_sec</property></product>
                  </sum>
                  <cos><property>aero/alpha-rad</property></cos>
                </product>
                <product><property>fcs/fbw/yaw-damping</property><sin><property>aero/alpha-rad</property></sin></product>
              </sum>
            </abs>
          </function>
        </fcs_function>
        <!-- no more roll rate than 0.5 of the rudder's yaw holds: a roll the rudder cannot
             follow turns the angle of attack into sideslip -->
        <fcs_function name="fcs/fbw/p-yaw-max">
          <function>
            <quotient>
              <product><value>0.5</value><property>fcs/fbw/yaw-accel</property></product>
              <max><value>0.001</value><property>fcs/fbw/p-yaw-need</property></max>
            </quotient>
          </function>
        </fcs_function>
        <fcs_function name="fcs/fbw/p-limited">
          <function>
            <max>
              <min><property>fcs/fbw/p-stick</property><property>fcs/fbw/p-yaw-max</property></min>
              <product><value>-1</value><property>fcs/fbw/p-yaw-max</property></product>
            </max>
          </function>
        </fcs_function>
        <!-- and while the rate grows, no faster roll acceleration than all of it
             coordinates, unless the roll asked for could not leave 2.0 deg of sideslip
             even uncoordinated: at worst c^2 p^2 / (8 Y), c the rudder's share, Y its yaw
             acceleration, p the rate asked for -->
        <fcs_function name="fcs/fbw/p-accel">
          <function>
            <product>
              <quotient>
                <property>fcs/fbw/yaw-accel</property>
                <max><value>0.01</value><abs><property>fcs/fbw/roll-yaw-share</property></abs></max>
              </quotient>
              <max>
                <value>1</value>
                <quotient>
                  <product><value>0.27925</value><property>fcs/fbw/yaw-accel</property></product>
                  <sum>
                    <value>1e-9</value>
                    <product>
                      <property>fcs/fbw/roll-yaw-share</property><property>fcs/fbw/roll-yaw-share</property>
                      <property>fcs/fbw/p-limited</property><property>fcs/fbw/p-limited</property>
                    </product>
                  </sum>
                </quotient>
              </max>
            </product>
          </function>
        </fcs_function>
        <!-- a roll is stopped as fast as the ailerons can -->
        <fcs_function name="fcs/fbw/p-accel-up">
          <function>
            <sum><property>fcs/fbw/p-accel</property>
              <product><value>1000</value><lt><property>fcs/fbw/p-cmd</property><value>0</value></lt></product></sum>
          </function>
        </fcs_function>
        <fcs_function name="fcs/fbw/p-accel-down">
          <function>
            <sum><property>fcs/fbw/p-accel</property>
              <product><value>1000</value><gt><property>fcs/fbw/p-cmd</property><value>0</value></gt></product></sum>
          </function>
        </fcs_function>
        <actuator name="fcs/fbw/p-cmd">
          <input>fcs/fbw/p-limited</input>
          <rate_limit sense="incr">fcs/fbw/p-accel-up</rate_limit>
          <rate_limit sense="decr">fcs/fbw/p-accel-down</rate_limit>
        </actuator>
        <fcs_function name="fcs/fbw/p-stability">
          <function>
            <sum>
              <product><property>velocities/p-rad_sec</property><cos><property>aero/alpha-rad</property></cos></product>
              <product><property>velocities/r-rad_sec</property><sin><property>aero/alpha-rad</property></sin></product>
            </sum>
          </function>
        </fcs_function>
        <fcs_function name="fcs/fbw/roll-error-rate">
          <function>
            <product><property>fcs/fbw/k-roll-i</property>
              <difference><property>fcs/fbw/p-cmd</property><property>fcs/fbw/p-stability</property></difference></product>
          </function>
        </fcs_function>
        <integrator name="fcs/fbw/roll-integral">
          <input>fcs/fbw/roll-error-rate</input>
          <c1>1.0</c1>
          <trigger>fcs/fbw/reset</trigger>
          <clipto> <min>-0.17453</min> <max>0.17453</max> </clipto>
        </integrator>
        <fcs_function name="fcs/fbw/aileron">
          <function>
            <sum>
              <product><property>fcs/fbw/k-roll-ff</property><property>fcs/fbw/p-cmd</property></product>
              <product><property>fcs/fbw/k-roll</property>
                <difference><property>fcs/fbw/p-cmd</property><property>fcs/fbw/p-stability</property></difference></product>
              <property>fcs/fbw/roll-integral</property>
            </sum>
          </function>
          <clipto> <min>-0.34907</min> <max>0.34907</max> </clipto>
        </fcs_function>
        <actuator name="fcs/left-aileron-actuator">
          <input>fcs/fbw/aileron</input>
          <lag>40</lag>
          <rate_limit>1.4</rate_limit>
          <output>fcs/left-aileron-pos-rad</output>
        </actuator>
        <pure_gain name="fcs/right-aileron">
          <input>fcs/left-aileron-pos-rad</input>
          <gain>-1</gain>
          <output>fcs/right-aileron-pos-rad</output>
        </pure_gain>
      </channel>
      <channel name="Yaw (fly-by-wire)">
        <!-- hangar: yaw damper, sideslip feedback, pedals command sideslip -->
        <summer name="fcs/yaw-trim-sum">
          <input>fcs/rudder-cmd-norm</input>
          <input>fcs/yaw-trim-cmd-norm</input>
          <clipto> <min>-1</min> <max>1</max> </clipto>
        </summer>
        <fcs_function name="fcs/fbw/k-yaw-r">
          <function>
            <table>
              <independentVar lookup="row">aero/qbar-psf</independentVar>
              <independentVar lookup="column">velocities/mach</independentVar>
              <tableData>
                       0.150     0.400     0.700     0.900     1.100     1.400     2.000
              10.0  -3.00000  -3.00000  -3.00000  -3.00000  -3.00000  -3.00000  -3.00000
              20.0  -3.00000  -3.00000  -3.00000  -3.00000  -3.00000  -3.00000  -3.00000
              40.0  -3.00000  -3.00000  -3.00000  -3.00000  -3.00000  -3.00000  -3.00000
              80.0  -1.77069  -2.05460  -1.92894  -1.69290  -3.00000  -3.00000  -3.00000
             150.0  -0.64887  -0.97780  -0.98107  -0.87507  -1.61665  -2.42832  -3.00000
             300.0  -0.16781  -0.50235  -0.54852  -0.50623  -0.93077  -1.37752  -1.99256
             600.0   0.00000  -0.26400  -0.32669  -0.31154  -0.58252  -0.86912  -1.21707
            1200.0   0.00000  -0.11955  -0.19088  -0.19027  -0.36613  -0.56065  -0.79430
            2400.0   0.00000  -0.02289  -0.09984  -0.10851  -0.22036  -0.35475  -0.52407
              </tableData>
            </table>
          </function>
        </fcs_function>
        <fcs_function name="fcs/fbw/k-yaw-beta">
          <function>
            <table>
              <independentVar lookup="row">aero/qbar-psf</independentVar>
              <independentVar lookup="column">velocities/mach</independentVar>
              <tableData>
                       0.150     0.400     0.700     0.900     1.100     1.400     2.000
              10.0   3.00000   3.00000   3.00000   3.00000   3.00000   3.00000   3.00000
              20.0   3.00000   3.00000   2.91175   2.08825   3.00000   3.00000   3.00000
              40.0   0.00000   0.00000   0.00000   0.00000   0.00000   0.00000   3.00000
              80.0   0.00000   0.00000   0.00000   0.12615   0.60889   0.54186   0.00000
             150.0   0.00000   0.00000   0.00000   0.00000   0.07221   0.14568   1.16725
             300.0   0.00000   0.00000   0.00000   0.00000   0.00000   0.00000   0.03647
             600.0   0.00000   0.00000   0.00000   0.00000   0.00000   0.00000   0.00000
            1200.0   0.00000   0.00000   0.00000   0.00000   0.00000   0.00000   0.00000
            2400.0   0.00000   0.00000   0.00000   0.00000   0.00000   0.00000   0.00000
              </tableData>
            </table>
          </function>
        </fcs_function>
        <fcs_function name="fcs/fbw/k-pedal">
          <function>
            <table>
              <independentVar lookup="row">aero/qbar-psf</independentVar>
              <independentVar lookup="column">velocities/mach</independentVar>
              <tableData>
                       0.150     0.400     0.700     0.900     1.100     1.400     2.000
              10.0   0.03120   0.03087   0.02976   0.02747   0.04674   0.06287   0.06287
              20.0   0.03120   0.03087   0.02976   0.02747   0.04674   0.06287   0.06287
              40.0   0.03120   0.04193   0.07065   0.07875   0.13173   0.13064   0.06287
              80.0   0.13283   0.13324   0.13324   0.12889   0.21833   0.27629   0.21540
             150.0   0.16798   0.16693   0.16272   0.15238   0.25893   0.34184   0.30889
             300.0   0.17956   0.17786   0.17176   0.15880   0.27018   0.36258   0.35522
             600.0   0.18148   0.17963   0.17325   0.16002   0.27228   0.36588   0.36440
            1200.0   0.18227   0.18041   0.17396   0.16063   0.27332   0.36742   0.36665
            2400.0   0.18271   0.18084   0.17434   0.16095   0.27388   0.36826   0.36786
              </tableData>
            </table>
          </function>
        </fcs_function>
        <!-- the yaw damper damps the sideslip's rate, the stability-axis yaw rate less
             the one that coordinates the bank and the side force: in the dutch roll the
             yaw rate itself, and zero in a steady coordinated turn, in a roll about the
             flight path and in a steady sideslip - it coordinates those as long as they
             last (a damper on the washed-out yaw rate stopped coordinating a sustained
             roll, and at low speed the roll turned the angle of attack into sideslip) -->
        <!-- on the wheels (the pitch's ground mode, fcs/fbw/ground) the pedals move the rudder
             directly over its travel, a ground law: the sideslip feedback, there the
             crosswind's, turned the nose into it, and as the C-17A's nose wheel unloaded
             towards its rotation it ran 8.6 m off its line across 10 m/s -->
        <fcs_function name="fcs/fbw/rudder">
          <function>
            <sum>
              <product>
                <difference><value>1</value><property>fcs/fbw/ground</property></difference>
                <sum>
                  <product><property>fcs/fbw/k-pedal</property><property>fcs/yaw-trim-sum</property></product>
                  <product><value>-1</value><property>fcs/fbw/k-yaw-beta</property>
                    <difference><property>aero/beta-rad</property>
                      <product><value>0.17453</value><property>fcs/yaw-trim-sum</property></product></difference></product>
                  <product><property>fcs/fbw/k-yaw-r</property><property>aero/betadot-rad_sec</property></product>
                </sum>
              </product>
              <product><property>fcs/fbw/ground</property><value>0.43633</value><property>fcs/yaw-trim-sum</property></product>
            </sum>
          </function>
          <clipto> <min>-0.43633</min> <max>0.43633</max> </clipto>
        </fcs_function>
        <actuator name="fcs/rudder-actuator">
          <input>fcs/fbw/rudder</input>
          <lag>40</lag>
          <rate_limit>1.4</rate_limit>
          <output>fcs/rudder-pos-rad</output>
        </actuator>
        <!-- the nose wheel steers with the pedals (JSBSim steers from fcs/steer-cmd-norm,
             positive right; the rudder command is positive left) -->
        <pure_gain name="fcs/steer-from-rudder">
          <input>fcs/yaw-trim-sum</input>
          <gain>-1</gain>
          <output>fcs/steer-cmd-norm</output>
        </pure_gain>
      </channel>
      <channel name="Flaps">
        <kinematic name="fcs/flaps-control">
          <input>fcs/flap-cmd-norm</input>
          <traverse>
            <setting> <position>0.0</position> <time>0.0</time> </setting>
            <setting> <position>5.0</position> <time>2.0</time> </setting>
            <setting> <position>10.0</position> <time>2.0</time> </setting>
            <setting> <position>15.0</position> <time>2.0</time> </setting>
            <setting> <position>20.0</position> <time>2.0</time> </setting>
          </traverse>
          <output>fcs/flap-pos-deg</output>
        </kinematic>
        <pure_gain name="fcs/flaps-normalized">
          <input>fcs/flap-pos-deg</input>
          <gain>0.05</gain>
          <output>fcs/flap-pos-norm</output>
        </pure_gain>
      </channel>
      <channel name="Speedbrake">
        <kinematic name="fcs/speedbrake-control">
          <input>fcs/speedbrake-cmd-norm</input>
          <traverse>
            <setting> <position>0</position> <time>0</time> </setting>
            <setting> <position>1</position> <time>2.00</time> </setting>
          </traverse>
          <output>fcs/speedbrake-pos-norm</output>
        </kinematic>
      </channel>
      <channel name="Leading-Edge Flaps">
        <fcs_function name="fcs/lef-schedule">
          <function>
            <sum>
              <product> <value>1.38</value> <property>aero/alpha-deg</property> </product>
              <product> <value>-9.05</value>
                <quotient> <property>aero/qbar-psf</property> <property>atmosphere/P-psf</property> </quotient>
              </product>
              <value>1.45</value>
            </sum>
          </function>
          <clipto> <min>-2</min> <max>30</max> </clipto>
        </fcs_function>
        <actuator name="fcs/lef-actuator">
          <input>fcs/lef-schedule</input>
          <lag>7.35</lag>
          <rate_limit>25</rate_limit>
          <output>fcs/lef-pos-deg</output>
        </actuator>
      </channel>
      <channel name="Throttle 0">
        <fcs_function name="fcs/throttle-lever-0">
          <function>
            <table>
              <independentVar lookup="row">fcs/throttle-cmd-norm[0]</independentVar>
              <tableData>
                0.0  0.0
                0.8  1.0
                1.0  2.0
              </tableData>
            </table>
          </function>
          <output>fcs/throttle-pos-norm[0]</output>
        </fcs_function>
      </channel>
      <channel name="Throttle 1">
        <fcs_function name="fcs/throttle-lever-1">
          <function>
            <table>
              <independentVar lookup="row">fcs/throttle-cmd-norm[1]</independentVar>
              <tableData>
                0.0  0.0
                0.8  1.0
                1.0  2.0
              </tableData>
            </table>
          </function>
          <output>fcs/throttle-pos-norm[1]</output>
        </fcs_function>
      </channel>
      <channel name="Landing Gear">
        <kinematic name="fcs/gear-control">
          <input>gear/gear-cmd-norm</input>
          <traverse>
            <setting> <position>0</position> <time>0</time> </setting>
            <setting> <position>1</position> <time>5</time> </setting>
          </traverse>
          <output>gear/gear-pos-norm</output>
        </kinematic>
      </channel>
    </flight_control>
    <aerodynamics>
        <function name="aero/function/mach-lift">
          <description>lift, and damping, over its low-speed value (hangar: aero/mach.py)</description>
          <table>
            <independentVar lookup="row">velocities/mach</independentVar>
            <tableData>
                 0.000     1.000000
                 0.300     1.015202
                 0.500     1.045170
                 0.600     1.068495
                 0.700     1.099864
                 0.800     1.143394
                 0.850     1.172482
                 0.900     1.209977
                 0.950     1.219306
                 1.000     1.219006
                 1.050     1.211292
                 1.100     1.198379
                 1.200     1.165814
                 1.400     1.063119
                 1.600     0.920639
                 1.800     0.805300
                 2.000     0.719169
                 2.300     0.622858
                 2.600     0.551174
            </tableData>
          </table>
        </function>
        <function name="aero/function/mach-side">
          <description>side force, rolling and yawing moment over their low-speed values</description>
          <table>
            <independentVar lookup="row">velocities/mach</independentVar>
            <tableData>
                 0.000     1.000000
                 0.300     1.009941
                 0.500     1.028929
                 0.600     1.043077
                 0.700     1.061082
                 0.800     1.083709
                 0.850     1.096962
                 0.900     1.111278
                 0.950     1.098911
                 1.000     1.075192
                 1.050     1.045014
                 1.100     1.013272
                 1.200     0.964671
                 1.400     0.929164
                 1.600     0.758309
                 1.800     0.647609
                 2.000     0.568353
                 2.300     0.482903
                 2.600     0.421354
            </tableData>
          </table>
        </function>
        <function name="aero/function/mach-dCm-dCL">
          <description>pitching moment per unit low-speed lift: the neutral point's move</description>
          <table>
            <independentVar lookup="row">velocities/mach</independentVar>
            <tableData>
                 0.000     0.000000
                 0.300    -0.003180
                 0.500    -0.009606
                 0.600    -0.014791
                 0.700    -0.022092
                 0.800    -0.032968
                 0.850    -0.040712
                 0.900    -0.051121
                 0.950    -0.081779
                 1.000    -0.123901
                 1.050    -0.169173
                 1.100    -0.209517
                 1.200    -0.246461
                 1.400    -0.223878
                 1.600    -0.223201
                 1.800    -0.199833
                 2.000    -0.179982
                 2.300    -0.155752
                 2.600    -0.136548
            </tableData>
          </table>
        </function>
        <function name="aero/function/mach-dCD0">
          <description>zero-lift drag's change: friction and wave drag</description>
          <table>
            <independentVar lookup="row">velocities/mach</independentVar>
            <tableData>
                 0.000     0.000000
                 0.300    -0.000124
                 0.500    -0.000339
                 0.600    -0.000482
                 0.700    -0.000646
                 0.800    -0.000830
                 0.850    -0.000929
                 0.900    -0.000880
                 0.950    -0.000336
                 1.000     0.004783
                 1.050     0.018269
                 1.100     0.018153
                 1.200     0.017912
                 1.400     0.016719
                 1.600     0.015860
                 1.800     0.015061
                 2.000     0.014300
                 2.300     0.013224
                 2.600     0.012223
            </tableData>
          </table>
        </function>
        <function name="aero/function/mach-dK">
          <description>induced-drag factor's change (per CL^2)</description>
          <table>
            <independentVar lookup="row">velocities/mach</independentVar>
            <tableData>
                 0.000     0.000000
                 0.300     0.003945
                 0.500     0.011224
                 0.600     0.016471
                 0.700     0.023007
                 0.800     0.031202
                 0.850     0.036177
                 0.900     0.042068
                 0.950     0.043450
                 1.000     0.043406
                 1.050     0.045614
                 1.100     0.052713
                 1.200     0.076426
                 1.400     0.103720
                 1.600     0.098785
                 1.800     0.087294
                 2.000     0.070303
                 2.300     0.035358
                 2.600    -0.010324
            </tableData>
          </table>
        </function>
        <function name="aero/function/mach-aileron">
          <description>aileron power over its low-speed value</description>
          <table>
            <independentVar lookup="row">velocities/mach</independentVar>
            <tableData>
                 0.000     1.000000
                 0.300     1.017936
                 0.500     1.054523
                 0.600     1.084291
                 0.700     1.126408
                 0.800     1.189477
                 0.850     1.235012
                 0.900     1.298218
                 0.950     1.216636
                 1.000     1.067830
                 1.050     0.885736
                 1.100     0.704293
                 1.200     0.479113
                 1.400     0.434480
                 1.600     0.354221
                 1.800     0.302334
                 2.000     0.265231
                 2.300     0.225267
                 2.600     0.196503
            </tableData>
          </table>
        </function>
        <function name="aero/function/mach-elevator">
          <description>elevator power over its low-speed value</description>
          <table>
            <independentVar lookup="row">velocities/mach</independentVar>
            <tableData>
                 0.000     1.000000
                 0.300     1.023998
                 0.500     1.072986
                 0.600     1.112751
                 0.700     1.168628
                 0.800     1.250835
                 0.850     1.308649
                 0.900     1.385972
                 0.950     1.403154
                 1.000     1.399025
                 1.050     1.379002
                 1.100     1.348504
                 1.200     1.277751
                 1.400     1.084207
                 1.600     0.997566
                 1.800     0.853815
                 2.000     0.750409
                 2.300     0.638519
                 2.600     0.557688
            </tableData>
          </table>
        </function>
        <function name="aero/function/mach-flap">
          <description>flap power over its low-speed value</description>
          <table>
            <independentVar lookup="row">velocities/mach</independentVar>
            <tableData>
                 0.000     1.000000
                 0.300     1.023655
                 0.500     1.072763
                 0.600     1.113540
                 0.700     1.172456
                 0.800     1.263332
                 0.850     1.331008
                 0.900     1.428256
                 0.950     1.348124
                 1.000     1.187107
                 1.050     0.984849
                 1.100     0.780998
                 1.200     0.527104
                 1.400     0.478000
                 1.600     0.389702
                 1.800     0.332618
                 2.000     0.291798
                 2.300     0.247831
                 2.600     0.216186
            </tableData>
          </table>
        </function>
        <function name="aero/function/mach-rudder">
          <description>rudder power over its low-speed value</description>
          <table>
            <independentVar lookup="row">velocities/mach</independentVar>
            <tableData>
                 0.000     1.000000
                 0.300     1.016620
                 0.500     1.050381
                 0.600     1.077672
                 0.700     1.115949
                 0.800     1.172370
                 0.850     1.212288
                 0.900     1.266235
                 0.950     1.183074
                 1.000     1.034016
                 1.050     0.854134
                 1.100     0.678502
                 1.200     0.480278
                 1.400     0.462601
                 1.600     0.377537
                 1.800     0.322423
                 2.000     0.282964
                 2.300     0.240422
                 2.600     0.209778
            </tableData>
          </table>
        </function>
        <function name="aero/function/CL-base">
          <description>CL over alpha and beta at low speed</description>
          <table>
            <independentVar lookup="row">aero/alpha-deg</independentVar>
            <independentVar lookup="column">aero/beta-deg</independentVar>
            <tableData>
                        -90.00    -70.00    -50.00    -40.00    -30.00    -25.00    -20.00    -15.00    -10.00     -6.00     -3.00      0.00      3.00      6.00     10.00     15.00     20.00     25.00     30.00     40.00     50.00     70.00     90.00
             -180.00  -0.00000   0.00000   0.00000   0.00000   0.00000   0.00000   0.00000   0.00000   0.00000   0.00000   0.00000   0.00000   0.00000   0.00000   0.00000   0.00000   0.00000   0.00000   0.00000   0.00000   0.00000   0.00000  -0.00000
             -120.00   0.00000   0.15221   0.41405   0.55516   0.68265   0.73689   0.78286   0.81947   0.84611   0.86110   0.86788   0.86735   0.86788   0.86110   0.84611   0.81947   0.78286   0.73689   0.68265   0.55516   0.41405   0.15221   0.00000
              -70.00  -0.00000  -0.12084  -0.33939  -0.45583  -0.56333  -0.60931  -0.64844  -0.67974  -0.70254  -0.71418  -0.72058  -0.71965  -0.72058  -0.71418  -0.70254  -0.67974  -0.64844  -0.60931  -0.56333  -0.45583  -0.33939  -0.12084  -0.00000
              -46.00  -0.00000  -0.38124  -0.82893  -1.09721  -1.38154  -1.50459  -1.60987  -1.69491  -1.76092  -1.79345  -1.80472  -1.80830  -1.80472  -1.79345  -1.76092  -1.69491  -1.60987  -1.50459  -1.38154  -1.09721  -0.82893  -0.38124  -0.00000
              -32.00  -0.00000  -0.47295  -0.84238  -1.12362  -1.40364  -1.53689  -1.65733  -1.76225  -1.84325  -1.87940  -1.89624  -1.90140  -1.89624  -1.87940  -1.84325  -1.76225  -1.65733  -1.53689  -1.40364  -1.12362  -0.84238  -0.47295  -0.00000
              -22.00  -0.00000  -0.37116  -0.67805  -0.91404  -1.16375  -1.26819  -1.35077  -1.42227  -1.47149  -1.49646  -1.50708  -1.51063  -1.50708  -1.49646  -1.47149  -1.42227  -1.35077  -1.26819  -1.16375  -0.91404  -0.67805  -0.37116  -0.00000
              -17.00  -0.00000  -0.29473  -0.55580  -0.75172  -0.95161  -1.03446  -1.09935  -1.15148  -1.18873  -1.20752  -1.21536  -1.21789  -1.21536  -1.20752  -1.18873  -1.15148  -1.09935  -1.03446  -0.95161  -0.75172  -0.55580  -0.29473  -0.00000
              -13.00  -0.00000  -0.22898  -0.43838  -0.58773  -0.74426  -0.80554  -0.85516  -0.89592  -0.92355  -0.93745  -0.94322  -0.94511  -0.94322  -0.93745  -0.92355  -0.89592  -0.85516  -0.80554  -0.74426  -0.58773  -0.43838  -0.22898  -0.00000
               -9.00  -0.00000  -0.15981  -0.30080  -0.40440  -0.51676  -0.55920  -0.59094  -0.62210  -0.64055  -0.64941  -0.65297  -0.65414  -0.65297  -0.64941  -0.64055  -0.62210  -0.59094  -0.55920  -0.51676  -0.40440  -0.30080  -0.15981  -0.00000
               -5.00  -0.00000  -0.08770  -0.17379  -0.23881  -0.30563  -0.32989  -0.34581  -0.36371  -0.37298  -0.37757  -0.37932  -0.37983  -0.37932  -0.37757  -0.37298  -0.36371  -0.34581  -0.32989  -0.30563  -0.23881  -0.17379  -0.08770  -0.00000
               -1.00  -0.00000  -0.01130  -0.03777  -0.05750  -0.07235  -0.07553  -0.07419  -0.07598  -0.07496  -0.07436  -0.07409  -0.07401  -0.07409  -0.07436  -0.07496  -0.07598  -0.07419  -0.07553  -0.07235  -0.05750  -0.03777  -0.01130  -0.00000
                3.00   0.00000   0.06471   0.10704   0.12465   0.15233   0.16895   0.18581   0.20207   0.21363   0.21961   0.22216   0.22293   0.22216   0.21961   0.21363   0.20207   0.18581   0.16895   0.15233   0.12465   0.10704   0.06471   0.00000
                7.00   0.00000   0.14219   0.23872   0.30349   0.37852   0.41717   0.45142   0.48423   0.50627   0.51753   0.52226   0.52383   0.52226   0.51753   0.50627   0.48423   0.45142   0.41717   0.37852   0.30349   0.23872   0.14219   0.00000
               11.00   0.00000   0.21672   0.37574   0.48589   0.60819   0.66693   0.71926   0.76654   0.79963   0.81605   0.82304   0.82543   0.82304   0.81605   0.79963   0.76654   0.71926   0.66693   0.60819   0.48589   0.37574   0.21672   0.00000
               15.00   0.00000   0.28382   0.50414   0.65877   0.82740   0.90579   0.97645   1.03555   1.08200   1.10368   1.11288   1.11602   1.11288   1.10368   1.08200   1.03555   0.97645   0.90579   0.82740   0.65877   0.50414   0.28382   0.00000
               19.00   0.00000   0.34494   0.61249   0.81128   1.02714   1.12481   1.21273   1.28443   1.34198   1.36896   1.38029   1.38415   1.38029   1.36896   1.34198   1.28443   1.21273   1.12481   1.02714   0.81128   0.61249   0.34494   0.00000
               23.00   0.00000   0.39997   0.70715   0.93956   1.19850   1.31849   1.42039   1.50139   1.56332   1.59882   1.61160   1.61589   1.61160   1.59882   1.56332   1.50139   1.42039   1.31849   1.19850   0.93956   0.70715   0.39997   0.00000
               27.00   0.00000   0.44526   0.78627   1.04332   1.33198   1.46755   1.58552   1.67574   1.74060   1.77930   1.79249   1.79686   1.79249   1.77930   1.74060   1.67574   1.58552   1.46755   1.33198   1.04332   0.78627   0.44526   0.00000
               32.00   0.00000   0.48517   0.85567   1.13752   1.43739   1.58185   1.70858   1.81207   1.88811   1.92521   1.94270   1.94723   1.94270   1.92521   1.88811   1.81207   1.70858   1.58185   1.43739   1.13752   0.85567   0.48517   0.00000
               46.00   0.00000   0.37616   0.84892   1.12346   1.41634   1.54395   1.65237   1.74236   1.81040   1.83962   1.85390   1.85820   1.85390   1.83962   1.81040   1.74236   1.65237   1.54395   1.41634   1.12346   0.84892   0.37616   0.00000
               70.00   0.00000   0.12111   0.33919   0.45635   0.56398   0.61003   0.64922   0.68055   0.70337   0.71505   0.72150   0.72055   0.72150   0.71505   0.70337   0.68055   0.64922   0.61003   0.56398   0.45635   0.33919   0.12111   0.00000
              120.00  -0.00000  -0.15221  -0.41405  -0.55516  -0.68265  -0.73689  -0.78286  -0.81947  -0.84611  -0.86110  -0.86788  -0.86735  -0.86788  -0.86110  -0.84611  -0.81947  -0.78286  -0.73689  -0.68265  -0.55516  -0.41405  -0.15221  -0.00000
              180.00   0.00000   0.00000   0.00000   0.00000   0.00000   0.00000   0.00000   0.00000   0.00000   0.00000   0.00000   0.00000   0.00000   0.00000   0.00000   0.00000   0.00000   0.00000   0.00000   0.00000   0.00000   0.00000   0.00000
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            </tableData>
          </table>
        </function>
      <axis name="DRAG">
        <function name="aero/coefficient/CD_base">
          <description>CD over alpha and beta (hangar)</description>
          <product>
            <property>aero/qbar-psf</property>
            <property>metrics/Sw-sqft</property>
          <table>
            <independentVar lookup="row">aero/alpha-deg</independentVar>
            <independentVar lookup="column">aero/beta-deg</independentVar>
            <tableData>
                        -90.00    -70.00    -50.00    -40.00    -30.00    -25.00    -20.00    -15.00    -10.00     -6.00     -3.00      0.00      3.00      6.00     10.00     15.00     20.00     25.00     30.00     40.00     50.00     70.00     90.00
             -180.00   0.73358   0.58490   0.32984   0.21064   0.11732   0.08231   0.05649   0.03908   0.02361   0.02183   0.02222   0.02240   0.02222   0.02183   0.02361   0.03908   0.05649   0.08231   0.11732   0.21064   0.32984   0.58490   0.73358
             -120.00   0.73358   0.70111   0.82509   0.97544   1.15898   1.25108   1.33603   1.40847   1.46372   1.49284   1.50557   1.51001   1.50557   1.49284   1.46372   1.40847   1.33603   1.25108   1.15898   0.97544   0.82509   0.70111   0.73358
              -70.00   0.73358   0.76239   1.00126   1.22355   1.48141   1.60781   1.72333   1.82131   1.89590   1.93562   1.95250   1.95831   1.95250   1.93562   1.89590   1.82131   1.72333   1.60781   1.48141   1.22355   1.00126   0.76239   0.73358
              -46.00   0.73358   0.79664   0.99232   1.15826   1.36890   1.47341   1.56928   1.65107   1.71580   1.74757   1.76238   1.76717   1.76238   1.74757   1.71580   1.65107   1.56928   1.47341   1.36890   1.15826   0.99232   0.79664   0.73358
              -32.00   0.73358   0.77221   0.76986   0.80890   0.88608   0.93709   0.99036   1.03335   1.06803   1.08203   1.08837   1.09038   1.08837   1.08203   1.06803   1.03335   0.99036   0.93709   0.88608   0.80890   0.76986   0.77221   0.73358
              -22.00   0.73358   0.72963   0.59421   0.54389   0.53470   0.53488   0.53683   0.53412   0.53224   0.52955   0.52844   0.52807   0.52844   0.52955   0.53224   0.53412   0.53683   0.53488   0.53470   0.54389   0.59421   0.72963   0.73358
              -17.00   0.73358   0.71249   0.52329   0.43578   0.38101   0.36179   0.34651   0.32839   0.31628   0.30814   0.30470   0.30352   0.30470   0.30814   0.31628   0.32839   0.34651   0.36179   0.38101   0.43578   0.52329   0.71249   0.73358
              -13.00   0.73358   0.70275   0.47665   0.36431   0.28548   0.25098   0.22665   0.20476   0.18419   0.17342   0.16886   0.16734   0.16886   0.17342   0.18419   0.20476   0.22665   0.25098   0.28548   0.36431   0.47665   0.70275   0.73358
               -9.00   0.73358   0.69599   0.44199   0.31309   0.21768   0.17636   0.14668   0.12142   0.09792   0.08599   0.08097   0.07930   0.08097   0.08599   0.09792   0.12142   0.14668   0.17636   0.21768   0.31309   0.44199   0.69599   0.73358
               -5.00   0.73358   0.69260   0.42105   0.28515   0.18094   0.13702   0.10552   0.07860   0.05426   0.04234   0.03752   0.03594   0.03752   0.04234   0.05426   0.07860   0.10552   0.13702   0.18094   0.28515   0.42105   0.69260   0.73358
               -1.00   0.73358   0.69157   0.41081   0.27130   0.16341   0.11907   0.08493   0.06066   0.03636   0.02458   0.01992   0.01846   0.01992   0.02458   0.03636   0.06066   0.08493   0.11907   0.16341   0.27130   0.41081   0.69157   0.73358
                3.00   0.73358   0.69072   0.40900   0.27055   0.16442   0.12133   0.08778   0.06487   0.04144   0.03005   0.02553   0.02406   0.02553   0.03005   0.04144   0.06487   0.08778   0.12133   0.16442   0.27055   0.40900   0.69072   0.73358
                7.00   0.73358   0.69143   0.41704   0.28403   0.18432   0.14408   0.11563   0.09170   0.07017   0.05953   0.05519   0.05376   0.05519   0.05953   0.07017   0.09170   0.11563   0.14408   0.18432   0.28403   0.41704   0.69143   0.73358
               11.00   0.73358   0.69639   0.43915   0.31619   0.22801   0.19333   0.16983   0.14885   0.13136   0.12223   0.11850   0.11729   0.11850   0.12223   0.13136   0.14885   0.16983   0.19333   0.22801   0.31619   0.43915   0.69639   0.73358
               15.00   0.73358   0.70535   0.47619   0.37252   0.30441   0.27913   0.26452   0.24856   0.23862   0.23244   0.22995   0.22918   0.22995   0.23244   0.23862   0.24856   0.26452   0.27913   0.30441   0.37252   0.47619   0.70535   0.73358
               19.00   0.73358   0.71773   0.52378   0.44682   0.41041   0.40018   0.39845   0.39306   0.39122   0.38938   0.38877   0.38863   0.38877   0.38938   0.39122   0.39306   0.39845   0.40018   0.41041   0.44682   0.52378   0.71773   0.73358
               23.00   0.73358   0.73307   0.58122   0.53525   0.53929   0.55040   0.56380   0.57147   0.57870   0.58312   0.58473   0.58531   0.58473   0.58312   0.57870   0.57147   0.56380   0.55040   0.53929   0.53525   0.58122   0.73307   0.73358
               27.00   0.73358   0.75024   0.64607   0.63097   0.67532   0.70960   0.74671   0.77184   0.79070   0.80147   0.80562   0.80703   0.80562   0.80147   0.79070   0.77184   0.74671   0.70960   0.67532   0.63097   0.64607   0.75024   0.73358
               32.00   0.73358   0.77327   0.73461   0.76899   0.86058   0.92058   0.98437   1.03480   1.07321   1.09073   1.09754   1.09995   1.09754   1.09073   1.07321   1.03480   0.98437   0.92058   0.86058   0.76899   0.73461   0.77327   0.73358
               46.00   0.73358   0.79420   0.95636   1.13352   1.36542   1.48120   1.58718   1.67915   1.75083   1.78262   1.79515   1.79961   1.79515   1.78262   1.75083   1.67915   1.58718   1.48120   1.36542   1.13352   0.95636   0.79420   0.73358
               70.00   0.73358   0.76233   1.00077   1.22354   1.48141   1.60781   1.72333   1.82131   1.89590   1.93562   1.95250   1.95831   1.95250   1.93562   1.89590   1.82131   1.72333   1.60781   1.48141   1.22354   1.00077   0.76233   0.73358
              120.00   0.73358   0.70111   0.82509   0.97544   1.15898   1.25108   1.33603   1.40847   1.46372   1.49284   1.50557   1.51001   1.50557   1.49284   1.46372   1.40847   1.33603   1.25108   1.15898   0.97544   0.82509   0.70111   0.73358
              180.00   0.73358   0.58490   0.32984   0.21064   0.11732   0.08231   0.05649   0.03908   0.02361   0.02183   0.02222   0.02240   0.02222   0.02183   0.02361   0.03908   0.05649   0.08231   0.11732   0.21064   0.32984   0.58490   0.73358
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            </tableData>
          </table>
          </product>
        </function>
        <function name="aero/coefficient/CD_mach">
          <description>zero-lift drag's change with Mach: friction, wave drag</description>
          <product>
            <property>aero/qbar-psf</property>
            <property>metrics/Sw-sqft</property>
            <property>aero/function/mach-dCD0</property>
          </product>
        </function>
        <function name="aero/coefficient/CD_induced_mach">
          <description>induced drag's change with Mach (leading-edge suction lost)</description>
          <product>
            <property>aero/qbar-psf</property>
            <property>metrics/Sw-sqft</property>
            <property>aero/cl-squared</property>
            <property>aero/function/mach-dK</property>
          </product>
        </function>
        <function name="aero/coefficient/CD_aileron">
          <description>CD increment from aileron (deg), over alpha</description>
          <product>
            <property>aero/qbar-psf</property>
            <property>metrics/Sw-sqft</property>
            <property>aero/function/mach-aileron</property>
          <table>
            <independentVar lookup="row">aero/alpha-deg</independentVar>
            <independentVar lookup="column">fcs/left-aileron-pos-deg</independentVar>
            <tableData>
                        -20.00    -15.00    -10.00     -5.00      0.00      5.00     10.00     15.00     20.00
             -180.00   0.00656   0.00376   0.00171   0.00043   0.00000   0.00043   0.00171   0.00376   0.00656
             -120.00   0.00397   0.00229   0.00103   0.00026   0.00000   0.00026   0.00103   0.00229   0.00397
              -70.00   0.00303   0.00176   0.00080   0.00020   0.00000   0.00020   0.00080   0.00176   0.00303
              -46.00   0.00080   0.00023  -0.00000  -0.00002   0.00000  -0.00002  -0.00000   0.00023   0.00080
              -32.00   0.00279   0.00105   0.00023   0.00002   0.00000   0.00002   0.00023   0.00105   0.00279
              -22.00   0.00663   0.00327   0.00110   0.00018   0.00000   0.00018   0.00110   0.00327   0.00663
              -17.00   0.01368   0.00845   0.00397   0.00098   0.00000   0.00098   0.00397   0.00845   0.01368
              -13.00   0.01951   0.01323   0.00701   0.00196   0.00000   0.00196   0.00701   0.01323   0.01951
               -9.00   0.01906   0.01291   0.00689   0.00195   0.00000   0.00195   0.00689   0.01291   0.01906
               -5.00   0.01775   0.01145   0.00580   0.00158   0.00000   0.00158   0.00580   0.01145   0.01775
               -1.00   0.01819   0.01176   0.00594   0.00161   0.00000   0.00161   0.00594   0.01176   0.01819
                3.00   0.01875   0.01211   0.00611   0.00165   0.00000   0.00165   0.00611   0.01211   0.01875
                7.00   0.02146   0.01457   0.00770   0.00214   0.00000   0.00214   0.00770   0.01457   0.02146
               11.00   0.02835   0.02076   0.01223   0.00379   0.00000   0.00379   0.01223   0.02076   0.02835
               15.00   0.02533   0.01797   0.01022   0.00313   0.00000   0.00313   0.01022   0.01797   0.02533
               19.00   0.01548   0.00961   0.00436   0.00095   0.00000   0.00095   0.00436   0.00961   0.01548
               23.00   0.00551   0.00185  -0.00031  -0.00046   0.00000  -0.00046  -0.00031   0.00185   0.00551
               27.00  -0.00028  -0.00217  -0.00224  -0.00086   0.00000  -0.00086  -0.00224  -0.00217  -0.00028
               32.00  -0.00355  -0.00399  -0.00280  -0.00088   0.00000  -0.00088  -0.00280  -0.00399  -0.00355
               46.00  -0.00507  -0.00395  -0.00226  -0.00066   0.00000  -0.00066  -0.00226  -0.00395  -0.00507
               70.00   0.00303   0.00176   0.00080   0.00020   0.00000   0.00020   0.00080   0.00176   0.00303
              120.00   0.00397   0.00229   0.00103   0.00026   0.00000   0.00026   0.00103   0.00229   0.00397
              180.00   0.00656   0.00376   0.00171   0.00043   0.00000   0.00043   0.00171   0.00376   0.00656
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            </tableData>
          </table>
          </product>
        </function>
        <function name="aero/coefficient/CD_elevator">
          <description>CD increment from elevator (deg), over alpha</description>
          <product>
            <property>aero/qbar-psf</property>
            <property>metrics/Sw-sqft</property>
            <property>aero/function/mach-elevator</property>
          <table>
            <independentVar lookup="row">aero/alpha-deg</independentVar>
            <independentVar lookup="column">fcs/elevator-pos-deg</independentVar>
            <tableData>
                        -20.00    -15.00    -10.00     -5.00      0.00      5.00     10.00     15.00
             -180.00   0.02090   0.01179   0.00239   0.00036   0.00000   0.00036   0.00239   0.01179
             -120.00  -0.06139  -0.04556  -0.02974  -0.01440   0.00000   0.01301   0.02424   0.03336
              -70.00   0.02132   0.01994   0.01582   0.00911   0.00000  -0.01123  -0.02424  -0.03864
              -46.00   0.11089   0.08619   0.05915   0.03026   0.00000  -0.03147  -0.06304  -0.09323
              -32.00   0.13444   0.09962   0.06486   0.03105   0.00000  -0.02792  -0.05498  -0.07944
              -22.00   0.11891   0.08432   0.05303   0.02506   0.00000  -0.02145  -0.03891  -0.05345
              -17.00   0.10499   0.07265   0.04460   0.02043   0.00000  -0.01567  -0.02807  -0.03749
              -13.00   0.09327   0.06239   0.03645   0.01540   0.00000  -0.01108  -0.01905  -0.02371
               -9.00   0.07830   0.04919   0.02628   0.01011   0.00000  -0.00650  -0.00989  -0.00932
               -5.00   0.06314   0.03653   0.01733   0.00593   0.00000  -0.00266  -0.00213   0.00304
               -1.00   0.04335   0.02204   0.00871   0.00234   0.00000   0.00074   0.00505   0.01550
                3.00   0.02585   0.00974   0.00158  -0.00089   0.00000   0.00399   0.01233   0.02788
                7.00   0.00768  -0.00240  -0.00548  -0.00428   0.00000   0.00761   0.02072   0.04105
               11.00  -0.01286  -0.01624  -0.01411  -0.00859   0.00000   0.01268   0.03129   0.05592
               15.00  -0.03506  -0.03161  -0.02422  -0.01379   0.00000   0.01872   0.04195   0.06975
               19.00  -0.05578  -0.04679  -0.03467  -0.01949   0.00000   0.02327   0.05005   0.08080
               23.00  -0.07461  -0.06113  -0.04466  -0.02435   0.00000   0.02701   0.05781   0.09204
               27.00  -0.09171  -0.07405  -0.05286  -0.02735   0.00000   0.03070   0.06472   0.10047
               32.00  -0.10888  -0.08544  -0.05837  -0.03086   0.00000   0.03399   0.06928   0.10504
               46.00  -0.13783  -0.10383  -0.06877  -0.03378   0.00000   0.03196   0.06201   0.08971
               70.00   0.01342  -0.03864  -0.02424  -0.01123   0.00000   0.00911   0.01582   0.01994
              120.00   0.04007   0.03336   0.02424   0.01301   0.00000  -0.01440  -0.02974  -0.04556
              180.00   0.02090   0.01179   0.00239   0.00036   0.00000   0.00036   0.00239   0.01179
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            </tableData>
          </table>
          </product>
        </function>
        <function name="aero/coefficient/CD_flap">
          <description>CD increment from flap (deg), over alpha</description>
          <product>
            <property>aero/qbar-psf</property>
            <property>metrics/Sw-sqft</property>
            <property>aero/function/mach-flap</property>
          <table>
            <independentVar lookup="row">aero/alpha-deg</independentVar>
            <independentVar lookup="column">fcs/flap-pos-deg</independentVar>
            <tableData>
                        -20.00    -15.00    -10.00     -5.00      0.00      5.00     10.00     15.00     20.00
             -180.00   0.00573   0.00328   0.00148   0.00037   0.00000   0.00037   0.00148   0.00328   0.00573
             -120.00   0.00573   0.00328   0.00148   0.00037   0.00000   0.00037   0.00148   0.00328   0.00573
              -70.00   0.00573   0.00328   0.00148   0.00037   0.00000   0.00037   0.00148   0.00328   0.00573
              -46.00   0.03733   0.03145   0.02321   0.01231   0.00000  -0.01211  -0.02227  -0.02885  -0.03194
              -32.00   0.04608   0.03856   0.02837   0.01507   0.00000  -0.01494  -0.02761  -0.03602  -0.04033
              -22.00   0.03974   0.03148   0.02178   0.01100   0.00000  -0.01070  -0.01989  -0.02593  -0.02874
              -17.00   0.04385   0.03355   0.02171   0.00992   0.00000  -0.00799  -0.01408  -0.01778  -0.01911
              -13.00   0.04790   0.03689   0.02374   0.01041   0.00000  -0.00684  -0.01080  -0.01239  -0.01220
               -9.00   0.04282   0.03330   0.02186   0.00981   0.00000  -0.00626  -0.00929  -0.00983  -0.00867
               -5.00   0.03193   0.02432   0.01566   0.00689   0.00000  -0.00392  -0.00482  -0.00325  -0.00014
               -1.00   0.01885   0.01320   0.00747   0.00258   0.00000   0.00040   0.00340   0.00780   0.01264
                3.00   0.00682   0.00278  -0.00038  -0.00163   0.00000   0.00465   0.01141   0.01860   0.02529
                7.00  -0.00278  -0.00489  -0.00607  -0.00497   0.00000   0.00880   0.01970   0.03014   0.03909
               11.00   0.00036  -0.00111  -0.00262  -0.00359   0.00000   0.01050   0.02494   0.03867   0.04994
               15.00  -0.00352  -0.00335  -0.00243  -0.00171   0.00000   0.00747   0.02123   0.03592   0.04831
               19.00  -0.01178  -0.01004  -0.00671  -0.00292   0.00000   0.00446   0.01400   0.02623   0.03758
               23.00  -0.01995  -0.01710  -0.01197  -0.00557   0.00000   0.00450   0.01056   0.01888   0.02747
               27.00  -0.02589  -0.02225  -0.01585  -0.00767   0.00000   0.00585   0.01087   0.01644   0.02241
               32.00  -0.03125  -0.02691  -0.01943  -0.00964   0.00000   0.00784   0.01352   0.01797   0.02206
               46.00  -0.02560  -0.02268  -0.01689  -0.00870   0.00000   0.00762   0.01340   0.01728   0.02001
               70.00   0.00573   0.00328   0.00148   0.00037   0.00000   0.00037   0.00148   0.00328   0.00573
              120.00   0.00573   0.00328   0.00148   0.00037   0.00000   0.00037   0.00148   0.00328   0.00573
              180.00   0.00573   0.00328   0.00148   0.00037   0.00000   0.00037   0.00148   0.00328   0.00573
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            </tableData>
          </table>
          </product>
        </function>
        <function name="aero/coefficient/CD_rudder">
          <description>CD increment from rudder (deg), over alpha</description>
          <product>
            <property>aero/qbar-psf</property>
            <property>metrics/Sw-sqft</property>
            <property>aero/function/mach-rudder</property>
          <table>
            <independentVar lookup="row">aero/alpha-deg</independentVar>
            <independentVar lookup="column">fcs/rudder-pos-deg</independentVar>
            <tableData>
                        -25.00    -20.00    -15.00    -10.00     -5.00      0.00      5.00     10.00     15.00     20.00     25.00
             -180.00   0.00448   0.00293   0.00168   0.00076   0.00019   0.00000   0.00019   0.00076   0.00168   0.00293   0.00448
             -120.00   0.00056   0.00037   0.00021   0.00009   0.00002   0.00000   0.00002   0.00009   0.00021   0.00037   0.00056
              -70.00   0.00019   0.00013   0.00007   0.00003   0.00001   0.00000   0.00001   0.00003   0.00007   0.00013   0.00019
              -46.00   0.00358   0.00251   0.00156   0.00076   0.00020   0.00000   0.00020   0.00076   0.00156   0.00251   0.00358
              -32.00   0.00734   0.00551   0.00361   0.00186   0.00051   0.00000   0.00051   0.00186   0.00361   0.00551   0.00734
              -22.00   0.00920   0.00688   0.00459   0.00238   0.00065   0.00000   0.00065   0.00238   0.00459   0.00688   0.00920
              -17.00   0.01007   0.00753   0.00502   0.00260   0.00071   0.00000   0.00071   0.00260   0.00502   0.00753   0.01007
              -13.00   0.01060   0.00792   0.00529   0.00274   0.00075   0.00000   0.00075   0.00274   0.00529   0.00792   0.01060
               -9.00   0.01101   0.00823   0.00549   0.00284   0.00078   0.00000   0.00078   0.00284   0.00549   0.00823   0.01101
               -5.00   0.01128   0.00843   0.00562   0.00291   0.00080   0.00000   0.00080   0.00291   0.00562   0.00843   0.01128
               -1.00   0.01138   0.00850   0.00567   0.00293   0.00080   0.00000   0.00080   0.00293   0.00567   0.00850   0.01138
                3.00   0.01131   0.00845   0.00563   0.00291   0.00080   0.00000   0.00080   0.00291   0.00563   0.00845   0.01131
                7.00   0.01107   0.00827   0.00551   0.00285   0.00078   0.00000   0.00078   0.00285   0.00551   0.00827   0.01107
               11.00   0.01068   0.00797   0.00531   0.00275   0.00075   0.00000   0.00075   0.00275   0.00531   0.00797   0.01068
               15.00   0.01016   0.00758   0.00504   0.00260   0.00071   0.00000   0.00071   0.00260   0.00504   0.00758   0.01016
               19.00   0.00951   0.00708   0.00470   0.00242   0.00066   0.00000   0.00066   0.00242   0.00470   0.00708   0.00951
               23.00   0.01044   0.00644   0.00428   0.00221   0.00061   0.00000   0.00061   0.00221   0.00428   0.00644   0.01044
               27.00   0.01006   0.00720   0.00377   0.00198   0.00054   0.00000   0.00054   0.00198   0.00377   0.00720   0.01006
               32.00   0.01179   0.00946   0.00625   0.00253   0.00048   0.00000   0.00048   0.00253   0.00625   0.00946   0.01179
               46.00   0.00788   0.00626   0.00445   0.00251   0.00087   0.00000   0.00087   0.00251   0.00445   0.00626   0.00788
               70.00   0.00019   0.00013   0.00007   0.00003   0.00001   0.00000   0.00001   0.00003   0.00007   0.00013   0.00019
              120.00   0.00056   0.00037   0.00021   0.00009   0.00002   0.00000   0.00002   0.00009   0.00021   0.00037   0.00056
              180.00   0.00448   0.00293   0.00168   0.00076   0.00019   0.00000   0.00019   0.00076   0.00168   0.00293   0.00448
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            </tableData>
          </table>
          </product>
        </function>
        <function name="aero/coefficient/CD_ground">
          <description>Induced drag change in ground effect</description>
          <product>
            <property>aero/qbar-psf</property>
            <property>metrics/Sw-sqft</property>
            <property>aero/cl-squared</property>
            <value>0.11314</value>
          <table>
            <independentVar lookup="row">aero/h_b-mac-ft</independentVar>
            <tableData>
                    0.00   -1.00000
                    0.10   -0.28090
                    0.15   -0.14793
                    0.20   -0.08897
                    0.30   -0.04160
                    0.40   -0.02383
                    0.50   -0.01538
                    0.60   -0.01073
                    0.70   -0.00791
                    0.80   -0.00607
                    0.90   -0.00480
                    1.00   -0.00389
                    1.10   -0.00322
            </tableData>
          </table>
          </product>
        </function>
        <function name="aero/coefficient/CD_airbrake">
          <description>airbrake: drag of its airbrake plates, 3.25 m2 opened to 54 deg (hangar)</description>
          <product>
            <property>aero/qbar-psf</property>
            <property>metrics/Sw-sqft</property>
            <value>0.0621779</value>
            <pow>
              <sin>
                <product>
                  <property>fcs/speedbrake-pos-norm</property>
                  <value>0.942478</value>
                </product>
              </sin>
              <value>2</value>
            </pow>
          </product>
        </function>
      </axis>
      <axis name="SIDE">
        <function name="aero/coefficient/CY_base">
          <description>CY over alpha and beta (hangar)</description>
          <product>
            <property>aero/qbar-psf</property>
            <property>metrics/Sw-sqft</property>
            <property>aero/function/mach-side</property>
          <table>
            <independentVar lookup="row">aero/alpha-deg</independentVar>
            <independentVar lookup="column">aero/beta-deg</independentVar>
            <tableData>
                        -90.00    -70.00    -50.00    -40.00    -30.00    -25.00    -20.00    -15.00    -10.00     -6.00     -3.00      0.00      3.00      6.00     10.00     15.00     20.00     25.00     30.00     40.00     50.00     70.00     90.00
             -180.00   0.00000   0.21082   0.26574   0.23349   0.17755   0.14943   0.12070   0.08787   0.11381   0.12571   0.06619  -0.00000  -0.06619  -0.12571  -0.11381  -0.08787  -0.12070  -0.14943  -0.17755  -0.23349  -0.26574  -0.21082  -0.00000
             -120.00   0.00000  -0.02677  -0.24849  -0.34092  -0.36933  -0.35254  -0.31428  -0.25606  -0.17930  -0.10700  -0.03763  -0.00000   0.03763   0.10700   0.17930   0.25606   0.31428   0.35254   0.36933   0.34092   0.24849   0.02677  -0.00000
              -70.00   0.00000  -0.07330  -0.36502  -0.46978  -0.49568  -0.46921  -0.41563  -0.33668  -0.23537  -0.14367  -0.06008  -0.00000   0.06008   0.14367   0.23537   0.33668   0.41563   0.46921   0.49568   0.46978   0.36502   0.07330  -0.00000
              -46.00   0.00000  -0.11646  -0.22689  -0.28467  -0.32137  -0.30831  -0.27261  -0.21441  -0.12196  -0.05967  -0.03136  -0.00000   0.03136   0.05967   0.12196   0.21441   0.27261   0.30831   0.32137   0.28467   0.22689   0.11646  -0.00000
              -32.00   0.00000  -0.01824   0.01580  -0.03392  -0.06425  -0.06186  -0.03313  -0.03336  -0.00056   0.00065  -0.00059  -0.00000   0.00059  -0.00065   0.00056   0.03336   0.03313   0.06186   0.06425   0.03392  -0.01580   0.01824  -0.00000
              -22.00   0.00000   0.12011   0.19319   0.16008   0.12661   0.11667   0.12081   0.09749   0.08915   0.05382   0.02701  -0.00000  -0.02701  -0.05382  -0.08915  -0.09749  -0.12081  -0.11667  -0.12661  -0.16008  -0.19319  -0.12011  -0.00000
              -17.00   0.00000   0.17725   0.26442   0.23906   0.20252   0.18670   0.18335   0.14713   0.12038   0.07258   0.03645  -0.00000  -0.03645  -0.07258  -0.12038  -0.14713  -0.18335  -0.18670  -0.20252  -0.23906  -0.26442  -0.17725  -0.00000
              -13.00   0.00000   0.21310   0.30685   0.28540   0.24912   0.22323   0.21606   0.19752   0.13603   0.08208   0.04119  -0.00000  -0.04119  -0.08208  -0.13603  -0.19752  -0.21606  -0.22323  -0.24912  -0.28540  -0.30685  -0.21310  -0.00000
               -9.00   0.00000   0.23862   0.33394   0.31274   0.27409   0.24397   0.23449   0.21114   0.14257   0.08576   0.04294  -0.00000  -0.04294  -0.08576  -0.14257  -0.21114  -0.23449  -0.24397  -0.27409  -0.31274  -0.33394  -0.23862  -0.00000
               -5.00   0.00000   0.25131   0.34615   0.32371   0.28101   0.24918   0.23788   0.21274   0.14073   0.08306   0.04119  -0.00000  -0.04119  -0.08306  -0.14073  -0.21274  -0.23788  -0.24918  -0.28101  -0.32371  -0.34615  -0.25131  -0.00000
               -1.00   0.00000   0.25357   0.34816   0.32415   0.27835   0.24614   0.22329   0.21085   0.13817   0.08046   0.03910  -0.00000  -0.03910  -0.08046  -0.13817  -0.21085  -0.22329  -0.24614  -0.27835  -0.32415  -0.34816  -0.25357  -0.00000
                3.00   0.00000   0.25205   0.34336   0.31813   0.27195   0.24032   0.21541   0.20670   0.13590   0.07962   0.03921  -0.00000  -0.03921  -0.07962  -0.13590  -0.20670  -0.21541  -0.24032  -0.27195  -0.31813  -0.34336  -0.25205  -0.00000
                7.00   0.00000   0.24392   0.33089   0.30500   0.26081   0.23031   0.21842   0.19824   0.13259   0.07881   0.03916  -0.00000  -0.03916  -0.07881  -0.13259  -0.19824  -0.21842  -0.23031  -0.26081  -0.30500  -0.33089  -0.24392  -0.00000
               11.00   0.00000   0.22288   0.30764   0.28125   0.23907   0.21081   0.19996   0.17764   0.12457   0.07426   0.03687  -0.00000  -0.03687  -0.07426  -0.12457  -0.17764  -0.19996  -0.21081  -0.23907  -0.28125  -0.30764  -0.22288  -0.00000
               15.00   0.00000   0.19076   0.27026   0.24330   0.20283   0.17749   0.16949   0.13382   0.10800   0.06451   0.03194  -0.00000  -0.03194  -0.06451  -0.10800  -0.13382  -0.16949  -0.17749  -0.20283  -0.24330  -0.27026  -0.19076  -0.00000
               19.00   0.00000   0.15007   0.21861   0.18604   0.14624   0.12680   0.12173   0.09187   0.08075   0.04926   0.02431  -0.00000  -0.02431  -0.04926  -0.08075  -0.09187  -0.12173  -0.12680  -0.14624  -0.18604  -0.21861  -0.15007  -0.00000
               23.00   0.00000   0.10171   0.15429   0.11415   0.07430   0.06170   0.05812   0.03909   0.03215   0.02907   0.01432  -0.00000  -0.01432  -0.02907  -0.03215  -0.03909  -0.05812  -0.06170  -0.07430  -0.11415  -0.15429  -0.10171  -0.00000
               27.00   0.00000   0.04763   0.08034   0.02735  -0.01935  -0.02814  -0.02026  -0.02490  -0.01578   0.00178   0.00063  -0.00000  -0.00063  -0.00178   0.01578   0.02490   0.02026   0.02814   0.01935  -0.02735  -0.08034  -0.04763  -0.00000
               32.00   0.00000  -0.02450  -0.01753  -0.08248  -0.12825  -0.13320  -0.10653  -0.09592  -0.07044  -0.03875  -0.01548  -0.00000   0.01548   0.03875   0.07044   0.09592   0.10653   0.13320   0.12825   0.08248   0.01753   0.02450  -0.00000
               46.00   0.00000  -0.11038  -0.27664  -0.34423  -0.37924  -0.36144  -0.31674  -0.24919  -0.15376  -0.08499  -0.03554  -0.00000   0.03554   0.08499   0.15376   0.24919   0.31674   0.36144   0.37924   0.34423   0.27664   0.11038  -0.00000
               70.00   0.00000  -0.07383  -0.36339  -0.46979  -0.49569  -0.46921  -0.41564  -0.33670  -0.23554  -0.14366  -0.06018  -0.00000   0.06018   0.14366   0.23554   0.33670   0.41564   0.46921   0.49569   0.46979   0.36339   0.07383  -0.00000
              120.00   0.00000  -0.02677  -0.24849  -0.34092  -0.36933  -0.35254  -0.31428  -0.25606  -0.17930  -0.10700  -0.03763  -0.00000   0.03763   0.10700   0.17930   0.25606   0.31428   0.35254   0.36933   0.34092   0.24849   0.02677  -0.00000
              180.00   0.00000   0.21082   0.26574   0.23349   0.17755   0.14943   0.12070   0.08787   0.11381   0.12571   0.06619  -0.00000  -0.06619  -0.12571  -0.11381  -0.08787  -0.12070  -0.14943  -0.17755  -0.23349  -0.26574  -0.21082  -0.00000
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            </tableData>
          </table>
          </product>
        </function>
        <function name="aero/coefficient/CY_aileron">
          <description>CY increment from aileron (deg), over alpha</description>
          <product>
            <property>aero/qbar-psf</property>
            <property>metrics/Sw-sqft</property>
            <property>aero/function/mach-aileron</property>
          <table>
            <independentVar lookup="row">aero/alpha-deg</independentVar>
            <independentVar lookup="column">fcs/left-aileron-pos-deg</independentVar>
            <tableData>
                        -20.00    -15.00    -10.00     -5.00      0.00      5.00     10.00     15.00     20.00
             -180.00  -0.00000  -0.00000  -0.00000  -0.00000   0.00000  -0.00000  -0.00000  -0.00000  -0.00000
              -35.00   0.01616   0.01343   0.00978   0.00516   0.00000  -0.00516  -0.00978  -0.01343  -0.01616
              -11.00   0.02279   0.01861   0.01336   0.00698   0.00000  -0.00698  -0.01336  -0.01861  -0.02279
                4.00   0.02009   0.01657   0.01200   0.00631   0.00000  -0.00631  -0.01200  -0.01657  -0.02009
               19.00   0.02061   0.01675   0.01200   0.00627   0.00000  -0.00627  -0.01200  -0.01675  -0.02061
               42.00  -0.00079   0.00088   0.00134   0.00067   0.00000  -0.00067  -0.00134  -0.00088   0.00079
              180.00  -0.00000  -0.00000  -0.00000  -0.00000   0.00000  -0.00000  -0.00000  -0.00000  -0.00000
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            </tableData>
          </table>
          </product>
        </function>
        <function name="aero/coefficient/CY_rudder">
          <description>CY increment from rudder (deg), over alpha</description>
          <product>
            <property>aero/qbar-psf</property>
            <property>metrics/Sw-sqft</property>
            <property>aero/function/mach-rudder</property>
          <table>
            <independentVar lookup="row">aero/alpha-deg</independentVar>
            <independentVar lookup="column">fcs/rudder-pos-deg</independentVar>
            <tableData>
                        -25.00    -20.00    -15.00    -10.00     -5.00      0.00      5.00     10.00     15.00     20.00     25.00
             -180.00  -0.00000   0.00000  -0.00000  -0.00000  -0.00000   0.00000  -0.00000  -0.00000  -0.00000   0.00000  -0.00000
              -35.00  -0.06068  -0.05032  -0.04001  -0.02881  -0.01514   0.00000   0.01514   0.02881   0.04001   0.05032   0.06068
              -11.00  -0.07776  -0.06966  -0.05882  -0.04338  -0.02301   0.00000   0.02301   0.04338   0.05882   0.06966   0.07776
                4.00  -0.07658  -0.06850  -0.05776  -0.04254  -0.02255   0.00000   0.02255   0.04254   0.05776   0.06850   0.07658
               19.00  -0.06778  -0.06067  -0.05118  -0.03772  -0.02001   0.00000   0.02001   0.03772   0.05118   0.06067   0.06778
               42.00  -0.05558  -0.04972  -0.04209  -0.03171  -0.01836   0.00000   0.01836   0.03171   0.04209   0.04972   0.05558
              180.00   0.00000   0.00000   0.00000  -0.00000  -0.00000   0.00000  -0.00000  -0.00000   0.00000   0.00000   0.00000
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            </tableData>
          </table>
          </product>
        </function>
        <function name="aero/coefficient/CYp">
          <description>CY per p (non-dimensional), over alpha</description>
          <product>
            <property>aero/qbar-psf</property>
            <property>metrics/Sw-sqft</property>
            <property>aero/bi2vel</property>
            <property>velocities/p-aero-rad_sec</property>
            <property>aero/function/mach-lift</property>
          <table>
            <independentVar lookup="row">aero/alpha-deg</independentVar>
            <tableData>
                 -180.00   -0.20948
                 -165.00   -0.23883
                  -32.00   -0.00715
                  -10.00   -0.04307
                    5.00   -0.04733
                   20.00   -0.03834
                   46.00   -0.12691
                  180.00   -0.20948
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            </tableData>
          </table>
          </product>
        </function>
        <function name="aero/coefficient/CYr">
          <description>CY per r (non-dimensional), over alpha</description>
          <product>
            <property>aero/qbar-psf</property>
            <property>metrics/Sw-sqft</property>
            <property>aero/bi2vel</property>
            <property>velocities/r-aero-rad_sec</property>
            <property>aero/function/mach-lift</property>
          <table>
            <independentVar lookup="row">aero/alpha-deg</independentVar>
            <tableData>
                 -180.00    0.72084
                 -165.00    0.61544
                  -32.00    0.28783
                  -10.00    0.39462
                    5.00    0.37925
                   20.00    0.32701
                   46.00    0.28065
                  180.00    0.72084
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            </tableData>
          </table>
          </product>
        </function>
      </axis>
      <axis name="LIFT">
        <function name="aero/coefficient/CL_base">
          <description>CL over alpha and beta, ground effect, compressibility (hangar)</description>
          <product>
            <property>aero/qbar-psf</property>
            <property>metrics/Sw-sqft</property>
            <property>aero/function/CL-base</property>
            <property>aero/function/mach-lift</property>
          <table>
            <independentVar lookup="row">aero/h_b-mac-ft</independentVar>
            <tableData>
                    0.00    1.20000
                    0.10    1.08692
                    0.20    1.03778
                    0.40    1.00713
                    0.60    1.00135
                    0.80    1.00025
                    1.00    1.00005
                    1.10    1.00000
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            </tableData>
          </table>
          </product>
        </function>
        <function name="aero/coefficient/CL_elevator">
          <description>CL increment from elevator (deg), over alpha</description>
          <product>
            <property>aero/qbar-psf</property>
            <property>metrics/Sw-sqft</property>
            <property>aero/function/mach-elevator</property>
          <table>
            <independentVar lookup="row">aero/alpha-deg</independentVar>
            <independentVar lookup="column">fcs/elevator-pos-deg</independentVar>
            <tableData>
                        -20.00    -15.00    -10.00     -5.00      0.00      5.00     10.00     15.00
             -180.00  -0.05885  -0.04578  -0.06460  -0.06334   0.00000   0.06334   0.06460   0.04578
              -35.00  -0.07085  -0.06134  -0.04619  -0.02552   0.00000   0.02740   0.05611   0.09627
              -11.00  -0.21893  -0.16997  -0.11693  -0.05940   0.00000   0.06029   0.12169   0.18458
                4.00  -0.25871  -0.19193  -0.12629  -0.06283   0.00000   0.06222   0.12467   0.18759
               19.00  -0.24029  -0.17735  -0.11601  -0.05645   0.00000   0.04870   0.09217   0.13196
               42.00  -0.09430  -0.06827  -0.04100  -0.01794   0.00000   0.01259   0.01989   0.02212
              180.00  -0.05885  -0.04578  -0.06460  -0.06334   0.00000   0.06334   0.06460   0.04578
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            </tableData>
          </table>
          </product>
        </function>
        <function name="aero/coefficient/CL_flap">
          <description>CL increment from flap (deg), over alpha</description>
          <product>
            <property>aero/qbar-psf</property>
            <property>metrics/Sw-sqft</property>
            <property>aero/function/mach-flap</property>
          <table>
            <independentVar lookup="row">aero/alpha-deg</independentVar>
            <independentVar lookup="column">fcs/flap-pos-deg</independentVar>
            <tableData>
                        -20.00    -15.00    -10.00     -5.00      0.00      5.00     10.00     15.00     20.00
             -180.00  -0.00000   0.00000   0.00000   0.00000   0.00000   0.00000   0.00000   0.00000  -0.00000
              -35.00  -0.09226  -0.07945  -0.05934  -0.03160   0.00000   0.03133   0.05855   0.07835   0.09133
              -11.00  -0.12535  -0.10861  -0.08197  -0.04429   0.00000   0.04514   0.08482   0.11358   0.13215
                4.00  -0.13984  -0.12012  -0.08963  -0.04774   0.00000   0.04735   0.08831   0.11787   0.13693
               19.00  -0.13222  -0.11332  -0.08437  -0.04484   0.00000   0.04337   0.07879   0.10271   0.11721
               42.00  -0.07800  -0.06720  -0.05072  -0.02754   0.00000   0.02860   0.05438   0.07349   0.08590
              180.00   0.00000   0.00000   0.00000  -0.00000   0.00000  -0.00000   0.00000   0.00000   0.00000
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            </tableData>
          </table>
          <table>
            <independentVar lookup="row">aero/h_b-mac-ft</independentVar>
            <tableData>
                    0.00    1.20000
                    0.10    1.08692
                    0.20    1.03778
                    0.40    1.00713
                    0.60    1.00135
                    0.80    1.00025
                    1.00    1.00005
                    1.10    1.00000
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            </tableData>
          </table>
          </product>
        </function>
        <function name="aero/coefficient/CLq">
          <description>CL per q (non-dimensional), over alpha</description>
          <product>
            <property>aero/qbar-psf</property>
            <property>metrics/Sw-sqft</property>
            <property>aero/ci2vel</property>
            <property>velocities/q-aero-rad_sec</property>
            <property>aero/function/mach-lift</property>
          <table>
            <independentVar lookup="row">aero/alpha-deg</independentVar>
            <tableData>
                 -180.00   -3.49970
                 -165.00   -0.26515
                  -32.00    4.39253
                  -10.00    6.56207
                    5.00    6.93493
                   20.00    6.27034
                   46.00    2.90795
                  180.00   -3.49970
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            </tableData>
          </table>
          </product>
        </function>
        <function name="aero/coefficient/CLadot">
          <description>CL per alpha-dot (downwash lag at the tail)</description>
          <product>
            <property>aero/qbar-psf</property>
            <property>metrics/Sw-sqft</property>
            <property>aero/ci2vel</property>
            <property>aero/alphadot-rad_sec</property>
            <value>0.76826</value>
            <property>aero/function/mach-lift</property>
          </product>
        </function>
      </axis>
      <axis name="ROLL">
        <function name="aero/coefficient/Cl_base">
          <description>Cl over alpha and beta (hangar)</description>
          <product>
            <property>aero/qbar-psf</property>
            <property>metrics/Sw-sqft</property>
            <property>metrics/bw-ft</property>
            <property>aero/function/mach-side</property>
          <table>
            <independentVar lookup="row">aero/alpha-deg</independentVar>
            <independentVar lookup="column">aero/beta-deg</independentVar>
            <tableData>
                        -90.00    -70.00    -50.00    -40.00    -30.00    -25.00    -20.00    -15.00    -10.00     -6.00     -3.00      0.00      3.00      6.00     10.00     15.00     20.00     25.00     30.00     40.00     50.00     70.00     90.00
             -180.00   0.02990   0.02486   0.01772   0.01379   0.00968   0.00743   0.00524   0.00354   0.00753   0.01018   0.00553  -0.00000  -0.00553  -0.01018  -0.00753  -0.00354  -0.00524  -0.00743  -0.00968  -0.01379  -0.01772  -0.02486  -0.02990
              -35.00   0.02990   0.03286   0.02746   0.02345   0.00880   0.00329  -0.00018  -0.00169  -0.00376  -0.00350  -0.00224  -0.00000   0.00224   0.00350   0.00376   0.00169   0.00018  -0.00329  -0.00880  -0.02345  -0.02746  -0.03286  -0.02990
              -11.00   0.02990   0.02078   0.01425  -0.00880  -0.03825  -0.04260  -0.03454  -0.02405  -0.01580  -0.00960  -0.00483  -0.00000   0.00483   0.00960   0.01580   0.02405   0.03454   0.04260   0.03825   0.00880  -0.01425  -0.02078  -0.02990
                4.00   0.02990   0.01874   0.01276   0.01167   0.01875   0.01988   0.01731   0.01845   0.01295   0.00791   0.00399  -0.00000  -0.00399  -0.00791  -0.01295  -0.01845  -0.01731  -0.01988  -0.01875  -0.01167  -0.01276  -0.01874  -0.02990
               19.00   0.02990   0.01338   0.00718   0.02431   0.07368   0.08137   0.07437   0.05803   0.04124   0.02565   0.01292  -0.00000  -0.01292  -0.02565  -0.04124  -0.05803  -0.07437  -0.08137  -0.07368  -0.02431  -0.00718  -0.01338  -0.02990
               42.00   0.02990   0.01037  -0.00350  -0.01244  -0.02043  -0.02355  -0.02574  -0.02595  -0.02057  -0.01600  -0.00890  -0.00000   0.00890   0.01600   0.02057   0.02595   0.02574   0.02355   0.02043   0.01244   0.00350  -0.01037  -0.02990
              180.00   0.02990   0.02486   0.01772   0.01379   0.00968   0.00743   0.00524   0.00354   0.00753   0.01018   0.00553  -0.00000  -0.00553  -0.01018  -0.00753  -0.00354  -0.00524  -0.00743  -0.00968  -0.01379  -0.01772  -0.02486  -0.02990
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            </tableData>
          </table>
          </product>
        </function>
        <function name="aero/coefficient/Cl_aileron">
          <description>Cl increment from aileron (deg), over alpha</description>
          <product>
            <property>aero/qbar-psf</property>
            <property>metrics/Sw-sqft</property>
            <property>metrics/bw-ft</property>
            <property>aero/function/mach-aileron</property>
          <table>
            <independentVar lookup="row">aero/alpha-deg</independentVar>
            <independentVar lookup="column">fcs/left-aileron-pos-deg</independentVar>
            <tableData>
                        -20.00    -15.00    -10.00     -5.00      0.00      5.00     10.00     15.00     20.00
             -180.00   0.01797   0.01665   0.01177   0.00596   0.00000  -0.00596  -0.01177  -0.01665  -0.01797
              -35.00  -0.03291  -0.02692  -0.01935  -0.01012   0.00000   0.01012   0.01935   0.02692   0.03291
              -11.00  -0.03947  -0.03208  -0.02295  -0.01197   0.00000   0.01197   0.02295   0.03208   0.03947
                4.00  -0.04298  -0.03497  -0.02505  -0.01308   0.00000   0.01308   0.02505   0.03497   0.04298
               19.00  -0.04131  -0.03370  -0.02417  -0.01261   0.00000   0.01261   0.02417   0.03370   0.04131
               42.00  -0.02784  -0.02265  -0.01623  -0.00848   0.00000   0.00848   0.01623   0.02265   0.02784
              180.00   0.01797   0.01665   0.01177   0.00596   0.00000  -0.00596  -0.01177  -0.01665  -0.01797
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            </tableData>
          </table>
          </product>
        </function>
        <function name="aero/coefficient/Cl_rudder">
          <description>Cl increment from rudder (deg), over alpha</description>
          <product>
            <property>aero/qbar-psf</property>
            <property>metrics/Sw-sqft</property>
            <property>metrics/bw-ft</property>
            <property>aero/function/mach-rudder</property>
          <table>
            <independentVar lookup="row">aero/alpha-deg</independentVar>
            <independentVar lookup="column">fcs/rudder-pos-deg</independentVar>
            <tableData>
                        -25.00    -20.00    -15.00    -10.00     -5.00      0.00      5.00     10.00     15.00     20.00     25.00
             -180.00  -0.00000  -0.00000  -0.00000  -0.00000  -0.00000   0.00000  -0.00000  -0.00000  -0.00000  -0.00000  -0.00000
              -35.00  -0.00482  -0.00383  -0.00289  -0.00201  -0.00103   0.00000   0.00103   0.00201   0.00289   0.00383   0.00482
              -11.00  -0.00601  -0.00526  -0.00433  -0.00314  -0.00165   0.00000   0.00165   0.00314   0.00433   0.00526   0.00601
                4.00  -0.00697  -0.00610  -0.00504  -0.00365  -0.00192   0.00000   0.00192   0.00365   0.00504   0.00610   0.00697
               19.00  -0.00660  -0.00574  -0.00472  -0.00340  -0.00179   0.00000   0.00179   0.00340   0.00472   0.00574   0.00660
               42.00  -0.00544  -0.00474  -0.00391  -0.00288  -0.00164   0.00000   0.00164   0.00288   0.00391   0.00474   0.00544
              180.00  -0.00000  -0.00000  -0.00000  -0.00000  -0.00000   0.00000  -0.00000  -0.00000  -0.00000  -0.00000  -0.00000
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            </tableData>
          </table>
          </product>
        </function>
        <function name="aero/coefficient/Clp">
          <description>Cl per p (non-dimensional), over alpha</description>
          <product>
            <property>aero/qbar-psf</property>
            <property>metrics/Sw-sqft</property>
            <property>metrics/bw-ft</property>
            <property>aero/bi2vel</property>
            <property>velocities/p-aero-rad_sec</property>
            <property>aero/function/mach-lift</property>
          <table>
            <independentVar lookup="row">aero/alpha-deg</independentVar>
            <tableData>
                 -180.00   -0.75573
                 -165.00   -0.21229
                  -32.00   -0.35653
                  -10.00   -0.31760
                    5.00   -0.30452
                   20.00   -0.35103
                   46.00   -0.08999
                  180.00   -0.75573
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            </tableData>
          </table>
          </product>
        </function>
        <function name="aero/coefficient/Clr">
          <description>Cl per r (non-dimensional), over alpha</description>
          <product>
            <property>aero/qbar-psf</property>
            <property>metrics/Sw-sqft</property>
            <property>metrics/bw-ft</property>
            <property>aero/bi2vel</property>
            <property>velocities/r-aero-rad_sec</property>
            <property>aero/function/mach-lift</property>
          <table>
            <independentVar lookup="row">aero/alpha-deg</independentVar>
            <tableData>
                 -180.00    0.05947
                 -165.00    0.10401
                  -32.00   -0.24850
                  -10.00   -0.06514
                    5.00    0.08153
                   20.00    0.22394
                   46.00    0.54787
                  180.00    0.05947
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            </tableData>
          </table>
          </product>
        </function>
      </axis>
      <axis name="PITCH">
        <function name="aero/coefficient/Cm_base">
          <description>Cm over alpha and beta (hangar)</description>
          <product>
            <property>aero/qbar-psf</property>
            <property>metrics/Sw-sqft</property>
            <property>metrics/cbarw-ft</property>
          <table>
            <independentVar lookup="row">aero/alpha-deg</independentVar>
            <independentVar lookup="column">aero/beta-deg</independentVar>
            <tableData>
                        -90.00    -70.00    -50.00    -40.00    -30.00    -25.00    -20.00    -15.00    -10.00     -6.00     -3.00      0.00      3.00      6.00     10.00     15.00     20.00     25.00     30.00     40.00     50.00     70.00     90.00
             -180.00  -0.00000   0.00006   0.00017   0.00009  -0.00009  -0.00037  -0.00045  -0.00022   0.00439   0.00370   0.00106   0.00010   0.00106   0.00370   0.00439  -0.00022  -0.00045  -0.00037  -0.00009   0.00009   0.00017   0.00006  -0.00000
              -35.00  -0.00000   0.04685  -0.02962  -0.04119  -0.04011  -0.04016  -0.03562  -0.03610  -0.03893  -0.03756  -0.03537  -0.03465  -0.03537  -0.03756  -0.03893  -0.03610  -0.03562  -0.04016  -0.04011  -0.04119  -0.02962   0.04685  -0.00000
              -11.00  -0.00000   0.00732  -0.01903  -0.02779  -0.02043  -0.01774  -0.01591  -0.01085  -0.00532  -0.00210  -0.00072  -0.00024  -0.00072  -0.00210  -0.00532  -0.01085  -0.01591  -0.01774  -0.02043  -0.02779  -0.01903   0.00732  -0.00000
                4.00   0.00000  -0.00861   0.00585   0.00989   0.00824   0.00542   0.00237  -0.00479  -0.00627  -0.00754  -0.00844  -0.00879  -0.00844  -0.00754  -0.00627  -0.00479   0.00237   0.00542   0.00824   0.00989   0.00585  -0.00861   0.00000
               19.00   0.00000  -0.02755   0.00929   0.01189  -0.00275  -0.01186  -0.02131  -0.02951  -0.03884  -0.04218  -0.04344  -0.04395  -0.04344  -0.04218  -0.03884  -0.02951  -0.02131  -0.01186  -0.00275   0.01189   0.00929  -0.02755   0.00000
               42.00   0.00000  -0.05311   0.01506   0.02349   0.01008   0.00056  -0.00848  -0.01771  -0.01976  -0.01815  -0.01857  -0.02061  -0.01857  -0.01815  -0.01976  -0.01771  -0.00848   0.00056   0.01008   0.02349   0.01506  -0.05311   0.00000
              180.00  -0.00000   0.00006   0.00017   0.00009  -0.00009  -0.00037  -0.00045  -0.00022   0.00439   0.00370   0.00106   0.00010   0.00106   0.00370   0.00439  -0.00022  -0.00045  -0.00037  -0.00009   0.00009   0.00017   0.00006  -0.00000
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            </tableData>
          </table>
          </product>
        </function>
        <function name="aero/coefficient/Cm_mach">
          <description>Cm from the neutral point's move with Mach</description>
          <product>
            <property>aero/qbar-psf</property>
            <property>metrics/Sw-sqft</property>
            <property>metrics/cbarw-ft</property>
            <property>aero/function/CL-base</property>
            <property>aero/function/mach-dCm-dCL</property>
          </product>
        </function>
        <function name="aero/coefficient/Cm_elevator">
          <description>Cm increment from elevator (deg), over alpha</description>
          <product>
            <property>aero/qbar-psf</property>
            <property>metrics/Sw-sqft</property>
            <property>metrics/cbarw-ft</property>
            <property>aero/function/mach-elevator</property>
          <table>
            <independentVar lookup="row">aero/alpha-deg</independentVar>
            <independentVar lookup="column">fcs/elevator-pos-deg</independentVar>
            <tableData>
                        -20.00    -15.00    -10.00     -5.00      0.00      5.00     10.00     15.00
             -180.00  -0.07997  -0.06280  -0.09037  -0.08896   0.00000   0.08906   0.09102   0.06601
              -35.00   0.09274   0.07647   0.05520   0.02937   0.00000  -0.02903  -0.05583  -0.09305
              -11.00   0.17751   0.13788   0.09516   0.04833   0.00000  -0.04876  -0.09835  -0.14934
                4.00   0.20676   0.15467   0.10216   0.05107   0.00000  -0.05119  -0.10391  -0.15895
               19.00   0.19601   0.14686   0.09768   0.04851   0.00000  -0.04241  -0.08267  -0.12219
               42.00   0.13170   0.10086   0.06530   0.03116   0.00000  -0.02733  -0.05041  -0.06904
              180.00  -0.07997  -0.06280  -0.09037  -0.08896   0.00000   0.08906   0.09102   0.06601
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            </tableData>
          </table>
          </product>
        </function>
        <function name="aero/coefficient/Cm_flap">
          <description>Cm increment from flap (deg), over alpha</description>
          <product>
            <property>aero/qbar-psf</property>
            <property>metrics/Sw-sqft</property>
            <property>metrics/cbarw-ft</property>
            <property>aero/function/mach-flap</property>
          <table>
            <independentVar lookup="row">aero/alpha-deg</independentVar>
            <independentVar lookup="column">fcs/flap-pos-deg</independentVar>
            <tableData>
                        -20.00    -15.00    -10.00     -5.00      0.00      5.00     10.00     15.00     20.00
             -180.00   0.00006   0.00003   0.00002   0.00000   0.00000   0.00000   0.00002   0.00003   0.00006
              -35.00   0.02306   0.01915   0.01393   0.00733   0.00000  -0.00741  -0.01429  -0.01985  -0.02399
              -11.00   0.00561   0.00455   0.00327   0.00174   0.00000  -0.00183  -0.00345  -0.00465  -0.00566
                4.00   0.01311   0.01075   0.00767   0.00393   0.00000  -0.00373  -0.00704  -0.00976  -0.01198
               19.00   0.02310   0.01875   0.01308   0.00647   0.00000  -0.00567  -0.01043  -0.01423  -0.01720
               42.00   0.03083   0.02542   0.01819   0.00931   0.00000  -0.00871  -0.01606  -0.02152  -0.02540
              180.00   0.00006   0.00003   0.00002   0.00000   0.00000   0.00000   0.00002   0.00003   0.00006
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            </tableData>
          </table>
          </product>
        </function>
        <function name="aero/coefficient/Cmq">
          <description>Cm per q (non-dimensional), over alpha</description>
          <product>
            <property>aero/qbar-psf</property>
            <property>metrics/Sw-sqft</property>
            <property>metrics/cbarw-ft</property>
            <property>aero/ci2vel</property>
            <property>velocities/q-aero-rad_sec</property>
            <property>aero/function/mach-lift</property>
          <table>
            <independentVar lookup="row">aero/alpha-deg</independentVar>
            <tableData>
                 -180.00   -5.95714
                 -165.00   -0.89274
                  -32.00   -4.64930
                  -10.00   -4.25577
                    5.00   -4.24068
                   20.00   -4.88301
                   46.00   -4.96681
                  180.00   -5.95714
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            </tableData>
          </table>
          </product>
        </function>
        <function name="aero/coefficient/Cmadot">
          <description>Cm per alpha-dot (downwash lag at the tail)</description>
          <product>
            <property>aero/qbar-psf</property>
            <property>metrics/Sw-sqft</property>
            <property>metrics/cbarw-ft</property>
            <property>aero/ci2vel</property>
            <property>aero/alphadot-rad_sec</property>
            <value>-0.70930</value>
            <property>aero/function/mach-lift</property>
          </product>
        </function>
        <function name="aero/coefficient/Cm_airbrake">
          <description>airbrake: its drag's pitching moment, 1.10 m from the reference point's height</description>
          <product>
            <property>aero/qbar-psf</property>
            <property>metrics/Sw-sqft</property>
            <property>metrics/cbarw-ft</property>
            <value>0.0144358</value>
            <pow>
              <sin>
                <product>
                  <property>fcs/speedbrake-pos-norm</property>
                  <value>0.942478</value>
                </product>
              </sin>
              <value>2</value>
            </pow>
          </product>
        </function>
      </axis>
      <axis name="YAW">
        <function name="aero/coefficient/Cn_base">
          <description>Cn over alpha and beta (hangar)</description>
          <product>
            <property>aero/qbar-psf</property>
            <property>metrics/Sw-sqft</property>
            <property>metrics/bw-ft</property>
            <property>aero/function/mach-side</property>
          <table>
            <independentVar lookup="row">aero/alpha-deg</independentVar>
            <independentVar lookup="column">aero/beta-deg</independentVar>
            <tableData>
                        -90.00    -70.00    -50.00    -40.00    -30.00    -25.00    -20.00    -15.00    -10.00     -6.00     -3.00      0.00      3.00      6.00     10.00     15.00     20.00     25.00     30.00     40.00     50.00     70.00     90.00
             -180.00  -0.04955  -0.07099  -0.08248  -0.08007  -0.07131  -0.06580  -0.05868  -0.04769  -0.05248  -0.05193  -0.02768  -0.00000   0.02768   0.05193   0.05248   0.04769   0.05868   0.06580   0.07131   0.08007   0.08248   0.07099   0.04955
              -35.00  -0.04955  -0.03110  -0.00805   0.00372   0.00904   0.00805   0.00330  -0.00106  -0.00703  -0.00568  -0.00247  -0.00000   0.00247   0.00568   0.00703   0.00106  -0.00330  -0.00805  -0.00904  -0.00372   0.00805   0.03110   0.04955
              -11.00  -0.04955  -0.03306  -0.00750  -0.00037  -0.00257  -0.00414  -0.01223  -0.01977  -0.01471  -0.00915  -0.00467  -0.00000   0.00467   0.00915   0.01471   0.01977   0.01223   0.00414   0.00257   0.00037   0.00750   0.03306   0.04955
                4.00  -0.04955  -0.03390  -0.00416   0.00175  -0.00190  -0.00460  -0.01054  -0.02045  -0.01449  -0.00888  -0.00452  -0.00000   0.00452   0.00888   0.01449   0.02045   0.01054   0.00460   0.00190  -0.00175   0.00416   0.03390   0.04955
               19.00  -0.04955  -0.03173  -0.00538   0.00245   0.00271   0.00158  -0.00487  -0.00399  -0.00684  -0.00463  -0.00224  -0.00000   0.00224   0.00463   0.00684   0.00399   0.00487  -0.00158  -0.00271  -0.00245   0.00538   0.03173   0.04955
               42.00  -0.04955  -0.03075  -0.00267   0.00616   0.01154   0.01134   0.00910   0.00426  -0.00134   0.00052   0.00005  -0.00000  -0.00005  -0.00052   0.00134  -0.00426  -0.00910  -0.01134  -0.01154  -0.00616   0.00267   0.03075   0.04955
              180.00  -0.04955  -0.07099  -0.08248  -0.08007  -0.07131  -0.06580  -0.05868  -0.04769  -0.05248  -0.05193  -0.02768  -0.00000   0.02768   0.05193   0.05248   0.04769   0.05868   0.06580   0.07131   0.08007   0.08248   0.07099   0.04955
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            </tableData>
          </table>
          </product>
        </function>
        <function name="aero/coefficient/Cn_aileron">
          <description>Cn increment from aileron (deg), over alpha</description>
          <product>
            <property>aero/qbar-psf</property>
            <property>metrics/Sw-sqft</property>
            <property>metrics/bw-ft</property>
            <property>aero/function/mach-aileron</property>
          <table>
            <independentVar lookup="row">aero/alpha-deg</independentVar>
            <independentVar lookup="column">fcs/left-aileron-pos-deg</independentVar>
            <tableData>
                        -20.00    -15.00    -10.00     -5.00      0.00      5.00     10.00     15.00     20.00
             -180.00  -0.00000  -0.00000  -0.00000  -0.00000   0.00000   0.00000   0.00000   0.00000   0.00000
              -35.00  -0.00372  -0.00267  -0.00170  -0.00083   0.00000   0.00083   0.00170   0.00267   0.00372
              -11.00  -0.00773  -0.00611  -0.00417  -0.00206   0.00000   0.00206   0.00417   0.00611   0.00773
                4.00  -0.00304  -0.00244  -0.00174  -0.00091   0.00000   0.00091   0.00174   0.00244   0.00304
               19.00  -0.00743  -0.00703  -0.00600  -0.00365   0.00000   0.00365   0.00600   0.00703   0.00743
               42.00  -0.00231  -0.00273  -0.00244  -0.00139   0.00000   0.00139   0.00244   0.00273   0.00231
              180.00  -0.00000  -0.00000  -0.00000  -0.00000   0.00000   0.00000   0.00000   0.00000   0.00000
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            </tableData>
          </table>
          </product>
        </function>
        <function name="aero/coefficient/Cn_rudder">
          <description>Cn increment from rudder (deg), over alpha</description>
          <product>
            <property>aero/qbar-psf</property>
            <property>metrics/Sw-sqft</property>
            <property>metrics/bw-ft</property>
            <property>aero/function/mach-rudder</property>
          <table>
            <independentVar lookup="row">aero/alpha-deg</independentVar>
            <independentVar lookup="column">fcs/rudder-pos-deg</independentVar>
            <tableData>
                        -25.00    -20.00    -15.00    -10.00     -5.00      0.00      5.00     10.00     15.00     20.00     25.00
             -180.00   0.00000   0.00000   0.00000   0.00000   0.00000   0.00000   0.00000   0.00000   0.00000   0.00000   0.00000
              -35.00   0.01811   0.01522   0.01221   0.00882   0.00464   0.00000  -0.00464  -0.00882  -0.01221  -0.01522  -0.01811
              -11.00   0.02481   0.02221   0.01875   0.01382   0.00733   0.00000  -0.00733  -0.01382  -0.01875  -0.02221  -0.02481
                4.00   0.02497   0.02236   0.01887   0.01391   0.00738   0.00000  -0.00738  -0.01391  -0.01887  -0.02236  -0.02497
               19.00   0.02267   0.02031   0.01715   0.01265   0.00671   0.00000  -0.00671  -0.01265  -0.01715  -0.02031  -0.02267
               42.00   0.01719   0.01545   0.01313   0.00986   0.00556   0.00000  -0.00556  -0.00986  -0.01313  -0.01545  -0.01719
              180.00   0.00000   0.00000   0.00000   0.00000   0.00000   0.00000   0.00000   0.00000   0.00000   0.00000   0.00000
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            </tableData>
          </table>
          </product>
        </function>
        <function name="aero/coefficient/Cnp">
          <description>Cn per p (non-dimensional), over alpha</description>
          <product>
            <property>aero/qbar-psf</property>
            <property>metrics/Sw-sqft</property>
            <property>metrics/bw-ft</property>
            <property>aero/bi2vel</property>
            <property>velocities/p-aero-rad_sec</property>
            <property>aero/function/mach-lift</property>
          <table>
            <independentVar lookup="row">aero/alpha-deg</independentVar>
            <tableData>
                 -180.00    0.07367
                 -165.00    0.08848
                  -32.00    0.01296
                  -10.00    0.04257
                    5.00   -0.00613
                   20.00    0.00811
                   46.00    0.02185
                  180.00    0.07367
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            </tableData>
          </table>
          </product>
        </function>
        <function name="aero/coefficient/Cnr">
          <description>Cn per r (non-dimensional), over alpha</description>
          <product>
            <property>aero/qbar-psf</property>
            <property>metrics/Sw-sqft</property>
            <property>metrics/bw-ft</property>
            <property>aero/bi2vel</property>
            <property>velocities/r-aero-rad_sec</property>
            <property>aero/function/mach-lift</property>
          <table>
            <independentVar lookup="row">aero/alpha-deg</independentVar>
            <tableData>
                 -180.00   -0.19327
                 -165.00   -0.20885
                  -32.00   -0.22731
                  -10.00   -0.19716
                    5.00   -0.17676
                   20.00   -0.19144
                   46.00   -0.23715
                  180.00   -0.19327
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            </tableData>
          </table>
          </product>
        </function>
      </axis>
    </aerodynamics>
</fdm_config>
