<?xml version="1.0"?>
<?xml-stylesheet type="text/xsl" href="http://jsbsim.sourceforge.net/JSBSim.xsl"?>
<!-- Generated by hangar 0.1.0 from su57.toml on 2026-10-01. Edit the design and rebuild; changes
     made here are overwritten.  -->
<fdm_config name="su57" version="2.0" release="ALPHA"
            xmlns:xsi="http://www.w3.org/2001/XMLSchema-instance"
            xsi:noNamespaceSchemaLocation="http://jsbsim.sourceforge.net/JSBSim.xsd">
    <fileheader>
      <author>hangar</author>
      <filecreationdate>2026-10-01</filecreationdate>
      <version>0.1.0</version>
      <description>Sukhoi Su-57 (hangar build, from public data and estimates)</description>
      <note>Aerodynamics: vortex lattice with viscous section polars, full-envelope
        strip model, slender-body fuselage (hangar). Mass: Raymer component
        weights on the geometry. Propeller: blade-element momentum theory.</note>
      <reference refID="fsim/applicability/aerobatic" author="the design" title="United Aircraft Corporation data: +9 g (fsim/envelope/clean/n_max)" date="n/a"/>
      <reference refID="fsim/applicability/carrier" author="the design" title="United Aircraft Corporation data: a land-based fighter" date="n/a"/>
      <reference refID="fsim/applicability/drag_devices" author="the design" title="Aviation Week (T-50 innovations, cited by Wikipedia's Su-57 article): no airbrake; ailerons up, flaperons down and the vertical stabilisers toed in to air-brake" date="n/a"/>
      <reference refID="fsim/applicability/flaps" author="the design" title="United Aircraft Corporation data: flaperons on the wing's trailing edge" date="n/a"/>
      <reference refID="fsim/applicability/ground_contact" author="the design" title="United Aircraft Corporation data: tricycle wheeled gear" date="n/a"/>
      <reference refID="fsim/applicability/releasable_stores" author="the design" title="United Aircraft Corporation data: internal weapons bays" date="n/a"/>
      <reference refID="fsim/applicability/retractable_gear" author="the design" title="United Aircraft Corporation data: retractable gear" date="n/a"/>
      <reference refID="fsim/applicability/vertical_flight" author="the design" title="United Aircraft Corporation data: a conventional take-off and landing fighter. Conventional take-off and landing: no rotors, lift fans or vectored lift to hover" date="n/a"/>
    </fileheader>
    <metrics>
      <wingarea unit="M2"> 82.1000 </wingarea>
      <wingspan unit="M"> 14.1000 </wingspan>
      <chord unit="M"> 6.7746 </chord>
      <htailarea unit="M2"> 31.6545 </htailarea>
      <htailarm unit="M"> 4.5695 </htailarm>
      <vtailarea unit="M2"> 7.4264 </vtailarea>
      <vtailarm unit="M"> 4.5010 </vtailarm>
      <location name="AERORP" unit="M">
        <x> 11.4260 </x>
        <y> 0.0000 </y>
        <z> 0.0000 </z>
      </location>
      <location name="EYEPOINT" unit="M">
        <x> 4.6000 </x>
        <y> 0.0000 </y>
        <z> 1.4000 </z>
      </location>
      <location name="VRP" unit="M">
        <x> 11.4590 </x>
        <y> 0.0000 </y>
        <z> -0.4000 </z>
      </location>
    </metrics>
    <mass_balance negated_crossproduct_inertia="false">
      <ixx unit="KG*M2"> 62826.45 </ixx>
      <iyy unit="KG*M2"> 338501.99 </iyy>
      <izz unit="KG*M2"> 399674.20 </izz>
      <ixy unit="KG*M2"> -0.839 </ixy>
      <ixz unit="KG*M2"> 26170.641 </ixz>
      <iyz unit="KG*M2"> 0.615 </iyz>
      <emptywt unit="KG"> 18000.00 </emptywt>
      <location name="CG" unit="M">
        <x> 11.4590 </x>
        <y> 0.0000 </y>
        <z> -0.4000 </z>
      </location>
      <pointmass name="pilot">
        <weight unit="KG"> 100.00 </weight>
        <location unit="M">
          <x> 4.6000 </x>
          <y> 0.0000 </y>
          <z> 0.7000 </z>
        </location>
      </pointmass>
      <pointmass name="internal missiles">
        <weight unit="KG"> 972.00 </weight>
        <location unit="M">
          <x> 11.0090 </x>
          <y> 0.0000 </y>
          <z> -0.7000 </z>
        </location>
      </pointmass>
    </mass_balance>
    <ground_reactions>
      <contact type="BOGEY" name="Nose Gear">
        <location unit="M">
          <x> 6.2000 </x>
          <y> 0.0000 </y>
          <z> -2.3900 </z>
        </location>
        <static_friction> 0.8 </static_friction>
        <dynamic_friction> 0.5 </dynamic_friction>
        <rolling_friction> 0.02 </rolling_friction>
        <spring_coeff unit="N/M"> 352424 </spring_coeff>
        <damping_coeff unit="N/M/SEC"> 43586 </damping_coeff>
        <damping_coeff_rebound unit="N/M/SEC"> 87173 </damping_coeff_rebound>
        <max_steer unit="DEG"> 50.0 </max_steer>
        <brake_group> NONE </brake_group>
        <retractable> 1 </retractable>
      </contact>
      <contact type="BOGEY" name="Left Main Gear">
        <location unit="M">
          <x> 12.6000 </x>
          <y> -2.1000 </y>
          <z> -2.4200 </z>
        </location>
        <static_friction> 0.8 </static_friction>
        <dynamic_friction> 0.5 </dynamic_friction>
        <rolling_friction> 0.02 </rolling_friction>
        <spring_coeff unit="N/M"> 653270 </spring_coeff>
        <damping_coeff unit="N/M/SEC"> 88505 </damping_coeff>
        <damping_coeff_rebound unit="N/M/SEC"> 177010 </damping_coeff_rebound>
        <max_steer unit="DEG"> 0.0 </max_steer>
        <brake_group> LEFT </brake_group>
        <retractable> 1 </retractable>
      </contact>
      <contact type="BOGEY" name="Right Main Gear">
        <location unit="M">
          <x> 12.6000 </x>
          <y> 2.1000 </y>
          <z> -2.4200 </z>
        </location>
        <static_friction> 0.8 </static_friction>
        <dynamic_friction> 0.5 </dynamic_friction>
        <rolling_friction> 0.02 </rolling_friction>
        <spring_coeff unit="N/M"> 653270 </spring_coeff>
        <damping_coeff unit="N/M/SEC"> 88505 </damping_coeff>
        <damping_coeff_rebound unit="N/M/SEC"> 177010 </damping_coeff_rebound>
        <max_steer unit="DEG"> 0.0 </max_steer>
        <brake_group> RIGHT </brake_group>
        <retractable> 1 </retractable>
      </contact>
      <contact type="STRUCTURE" name="canopy front">
        <location unit="M">
          <x> 4.1098 </x>
          <y> 0.0000 </y>
          <z> 1.3076 </z>
        </location>
        <static_friction> 0.8 </static_friction>
        <dynamic_friction> 0.6 </dynamic_friction>
        <spring_coeff unit="N/M"> 3344589 </spring_coeff>
        <damping_coeff unit="N/M/SEC"> 111486 </damping_coeff>
        <damping_coeff_rebound unit="N/M/SEC"> 111486 </damping_coeff_rebound>
      </contact>
      <contact type="STRUCTURE" name="fin left rear">
        <location unit="M">
          <x> 17.1300 </x>
          <y> -3.3300 </y>
          <z> 2.3600 </z>
        </location>
        <static_friction> 0.8 </static_friction>
        <dynamic_friction> 0.6 </dynamic_friction>
        <spring_coeff unit="N/M"> 2128227 </spring_coeff>
        <damping_coeff unit="N/M/SEC"> 70941 </damping_coeff>
        <damping_coeff_rebound unit="N/M/SEC"> 70941 </damping_coeff_rebound>
      </contact>
      <contact type="STRUCTURE" name="fin right rear">
        <location unit="M">
          <x> 17.1300 </x>
          <y> 3.3300 </y>
          <z> 2.3600 </z>
        </location>
        <static_friction> 0.8 </static_friction>
        <dynamic_friction> 0.6 </dynamic_friction>
        <spring_coeff unit="N/M"> 2128210 </spring_coeff>
        <damping_coeff unit="N/M/SEC"> 70940 </damping_coeff>
        <damping_coeff_rebound unit="N/M/SEC"> 70940 </damping_coeff_rebound>
      </contact>
      <contact type="STRUCTURE" name="fuselage front">
        <location unit="M">
          <x> 0.0000 </x>
          <y> 0.0000 </y>
          <z> -0.1450 </z>
        </location>
        <static_friction> 0.8 </static_friction>
        <dynamic_friction> 0.6 </dynamic_friction>
        <spring_coeff unit="N/M"> 2028586 </spring_coeff>
        <damping_coeff unit="N/M/SEC"> 67620 </damping_coeff>
        <damping_coeff_rebound unit="N/M/SEC"> 67620 </damping_coeff_rebound>
      </contact>
      <contact type="STRUCTURE" name="fuselage rear">
        <location unit="M">
          <x> 20.1700 </x>
          <y> 0.0000 </y>
          <z> 0.0700 </z>
        </location>
        <static_friction> 0.8 </static_friction>
        <dynamic_friction> 0.6 </dynamic_friction>
        <spring_coeff unit="N/M"> 3209967 </spring_coeff>
        <damping_coeff unit="N/M/SEC"> 106999 </damping_coeff>
        <damping_coeff_rebound unit="N/M/SEC"> 106999 </damping_coeff_rebound>
      </contact>
      <contact type="STRUCTURE" name="htail left rear">
        <location unit="M">
          <x> 19.0400 </x>
          <y> -4.5000 </y>
          <z> -0.0501 </z>
        </location>
        <static_friction> 0.8 </static_friction>
        <dynamic_friction> 0.6 </dynamic_friction>
        <spring_coeff unit="N/M"> 1608846 </spring_coeff>
        <damping_coeff unit="N/M/SEC"> 53628 </damping_coeff>
        <damping_coeff_rebound unit="N/M/SEC"> 53628 </damping_coeff_rebound>
      </contact>
      <contact type="STRUCTURE" name="htail right rear">
        <location unit="M">
          <x> 19.0400 </x>
          <y> 4.5000 </y>
          <z> -0.0501 </z>
        </location>
        <static_friction> 0.8 </static_friction>
        <dynamic_friction> 0.6 </dynamic_friction>
        <spring_coeff unit="N/M"> 1608831 </spring_coeff>
        <damping_coeff unit="N/M/SEC"> 53628 </damping_coeff>
        <damping_coeff_rebound unit="N/M/SEC"> 53628 </damping_coeff_rebound>
      </contact>
      <contact type="STRUCTURE" name="nacelle left bottom">
        <location unit="M">
          <x> 10.0000 </x>
          <y> -1.4778 </y>
          <z> -0.9883 </z>
        </location>
        <static_friction> 0.8 </static_friction>
        <dynamic_friction> 0.6 </dynamic_friction>
        <spring_coeff unit="N/M"> 8847544 </spring_coeff>
        <damping_coeff unit="N/M/SEC"> 294918 </damping_coeff>
        <damping_coeff_rebound unit="N/M/SEC"> 294918 </damping_coeff_rebound>
      </contact>
      <contact type="STRUCTURE" name="nacelle right bottom">
        <location unit="M">
          <x> 10.0000 </x>
          <y> 1.4778 </y>
          <z> -0.9883 </z>
        </location>
        <static_friction> 0.8 </static_friction>
        <dynamic_friction> 0.6 </dynamic_friction>
        <spring_coeff unit="N/M"> 8847575 </spring_coeff>
        <damping_coeff unit="N/M/SEC"> 294919 </damping_coeff>
        <damping_coeff_rebound unit="N/M/SEC"> 294919 </damping_coeff_rebound>
      </contact>
      <contact type="STRUCTURE" name="wing left rear">
        <location unit="M">
          <x> 14.5700 </x>
          <y> -7.0500 </y>
          <z> 0.0000 </z>
        </location>
        <static_friction> 0.8 </static_friction>
        <dynamic_friction> 0.6 </dynamic_friction>
        <spring_coeff unit="N/M"> 498691 </spring_coeff>
        <damping_coeff unit="N/M/SEC"> 16623 </damping_coeff>
        <damping_coeff_rebound unit="N/M/SEC"> 16623 </damping_coeff_rebound>
      </contact>
      <contact type="STRUCTURE" name="wing left rear 2">
        <location unit="M">
          <x> 16.0200 </x>
          <y> -7.0500 </y>
          <z> -0.0001 </z>
        </location>
        <static_friction> 0.8 </static_friction>
        <dynamic_friction> 0.6 </dynamic_friction>
        <spring_coeff unit="N/M"> 481327 </spring_coeff>
        <damping_coeff unit="N/M/SEC"> 16044 </damping_coeff>
        <damping_coeff_rebound unit="N/M/SEC"> 16044 </damping_coeff_rebound>
      </contact>
      <contact type="STRUCTURE" name="wing right rear">
        <location unit="M">
          <x> 14.5700 </x>
          <y> 7.0500 </y>
          <z> 0.0000 </z>
        </location>
        <static_friction> 0.8 </static_friction>
        <dynamic_friction> 0.6 </dynamic_friction>
        <spring_coeff unit="N/M"> 498689 </spring_coeff>
        <damping_coeff unit="N/M/SEC"> 16623 </damping_coeff>
        <damping_coeff_rebound unit="N/M/SEC"> 16623 </damping_coeff_rebound>
      </contact>
      <contact type="STRUCTURE" name="wing right rear 2">
        <location unit="M">
          <x> 16.0200 </x>
          <y> 7.0500 </y>
          <z> -0.0001 </z>
        </location>
        <static_friction> 0.8 </static_friction>
        <dynamic_friction> 0.6 </dynamic_friction>
        <spring_coeff unit="N/M"> 481325 </spring_coeff>
        <damping_coeff unit="N/M/SEC"> 16044 </damping_coeff>
        <damping_coeff_rebound unit="N/M/SEC"> 16044 </damping_coeff_rebound>
      </contact>
    </ground_reactions>
    <propulsion>
      <engine file="su57_engine0">
        <location unit="M">
          <x> 15.6000 </x>
          <y> -1.2500 </y>
          <z> -0.1500 </z>
        </location>
        <feed>0</feed>
        <feed>1</feed>
        <feed>2</feed>
        <feed>3</feed>
        <feed>4</feed>
        <thruster file="su57_nozzle0">
          <location unit="M">
            <x> 18.7500 </x>
            <y> -1.2500 </y>
            <z> -0.1500 </z>
          </location>
          <orient unit="DEG"> <roll>0.00</roll> <pitch>0.00</pitch> <yaw>0.00</yaw> </orient>

        </thruster>
      </engine>
      <engine file="su57_engine0">
        <location unit="M">
          <x> 15.6000 </x>
          <y> 1.2500 </y>
          <z> -0.1500 </z>
        </location>
        <feed>0</feed>
        <feed>1</feed>
        <feed>2</feed>
        <feed>3</feed>
        <feed>4</feed>
        <thruster file="su57_nozzle0">
          <location unit="M">
            <x> 18.7500 </x>
            <y> 1.2500 </y>
            <z> -0.1500 </z>
          </location>
          <orient unit="DEG"> <roll>0.00</roll> <pitch>0.00</pitch> <yaw>0.00</yaw> </orient>

        </thruster>
      </engine>
      <tank type="FUEL">
        <location unit="M">
          <x> 9.0090 </x>
          <y> 0.0000 </y>
          <z> -0.2000 </z>
        </location>
        <capacity unit="KG"> 3000.00 </capacity>
        <contents unit="KG"> 3000.00 </contents>
      </tank>
      <tank type="FUEL">
        <location unit="M">
          <x> 11.5090 </x>
          <y> 0.0000 </y>
          <z> -0.1500 </z>
        </location>
        <capacity unit="KG"> 3300.00 </capacity>
        <contents unit="KG"> 3300.00 </contents>
      </tank>
      <tank type="FUEL">
        <location unit="M">
          <x> 14.0090 </x>
          <y> 0.0000 </y>
          <z> -0.1000 </z>
        </location>
        <capacity unit="KG"> 2000.00 </capacity>
        <contents unit="KG"> 2000.00 </contents>
      </tank>
      <tank type="FUEL">
        <location unit="M">
          <x> 12.5700 </x>
          <y> -3.5000 </y>
          <z> 0.0000 </z>
        </location>
        <capacity unit="KG"> 1000.00 </capacity>
        <contents unit="KG"> 1000.00 </contents>
      </tank>
      <tank type="FUEL">
        <location unit="M">
          <x> 12.5700 </x>
          <y> 3.5000 </y>
          <z> 0.0000 </z>
        </location>
        <capacity unit="KG"> 1000.00 </capacity>
        <contents unit="KG"> 1000.00 </contents>
      </tank>
    </propulsion>
    <flight_control name="su57">
      <!-- the aircraft's profile for the platform (docs/control-architecture.md, section 7): what
           hangar knows of it - its design, its flight tests, its identified responses -->
      <property value="1">fsim/identity/version</property>
      <property value="1">fsim/identity/provenance</property>
      <property value="2">fsim/identity/class</property>
      <property value="2">fsim/identity/family</property>
      <property value="1">fsim/effectors/version</property>
      <property value="1">fsim/effectors/provenance</property>
      <property value="1">fsim/effectors/flaps</property>
      <property value="8">fsim/effectors/flaps_transit_s</property>
      <property value="1">fsim/effectors/neutral</property>
      <property value="1">fsim/effectors/pitch</property>
      <property value="0.0">fsim/effectors/pitch_trim</property>
      <property value="1">fsim/effectors/retractable_gear</property>
      <property value="1">fsim/effectors/roll</property>
      <property value="1">fsim/effectors/speedbrake</property>
      <property value="1">fsim/effectors/speedbrake_approach</property>
      <property value="1">fsim/effectors/wheel_brakes</property>
      <property value="0.0">fsim/effectors/yaw</property>
      <property value="1">fsim/envelope/version</property>
      <property value="1">fsim/envelope/provenance</property>
      <property value="26">fsim/envelope/clean/alpha_max_deg</property>
      <property value="61.7959">fsim/envelope/clean/cas_min_ms</property>
      <property value="9">fsim/envelope/clean/n_max</property>
      <property value="-3">fsim/envelope/clean/n_min</property>
      <property value="270">fsim/envelope/clean/roll_rate_max_deg_s</property>
      <property value="15.43">fsim/envelope/crosswind_max_ms</property>
      <property value="16.97">fsim/envelope/ground_pitch_max_deg</property>
      <property value="5.82">fsim/envelope/ground_turn_radius_m</property>
      <property value="0.3514">fsim/envelope/ground_yaw_accel_rad_s2</property>
      <property value="1">fsim/envelope/law_alpha</property>
      <property value="1">fsim/envelope/law_load_factor</property>
      <property value="1">fsim/envelope/law_roll_rate</property>
      <property value="1">fsim/propulsion/version</property>
      <property value="1">fsim/propulsion/provenance</property>
      <property value="1">fsim/propulsion/afterburner</property>
      <property value="2">fsim/propulsion/engines</property>
      <property value="0.178957">fsim/propulsion/spool_s</property>
      <property value="2">fsim/propulsion/type</property>
      <property value="1">fsim/plant/version</property>
      <property value="1">fsim/plant/provenance</property>
      <property value="-0.467344">fsim/plant/alpha_zero_lift_deg</property>
      <property value="3000">fsim/plant/altitude_m</property>
      <property value="129.862">fsim/plant/eas_ms</property>
      <property value="0.0">fsim/plant/elevator_trim</property>
      <property value="0.0">fsim/plant/elevator_trim_lift</property>
      <property value="9.77145">fsim/plant/pitch/gain</property>
      <property value="0.924725">fsim/plant/pitch/tau_s</property>
      <property value="4.52065">fsim/plant/roll/gain</property>
      <property value="0.201037">fsim/plant/roll/tau_s</property>
      <property value="5.9344">fsim/plant/speed/gain</property>
      <property value="0.178957">fsim/plant/speed/tau_s</property>
      <property value="148.488">fsim/plant/tas_ms</property>
      <property value="0.332203">fsim/plant/throttle_trim</property>
      <property value="0.117078">fsim/plant/yaw/gain</property>
      <property value="1">fsim/performance/version</property>
      <property value="1">fsim/performance/provenance</property>
      <property value="17694.8">fsim/performance/ceiling_m</property>
      <property value="285.741">fsim/performance/climb_ms</property>
      <property value="420.811">fsim/performance/max_tas_ms</property>
      <property value="1">fsim/applicability/version</property>
      <property value="1">fsim/applicability/provenance</property>
      <property value="1">fsim/applicability/aerobatic</property>
      <property value="1">fsim/applicability/carrier</property>
      <property value="3">fsim/applicability/drag_devices</property>
      <property value="1">fsim/applicability/flaps</property>
      <property value="1">fsim/applicability/ground_contact</property>
      <property value="2">fsim/applicability/releasable_stores</property>
      <property value="1">fsim/applicability/retractable_gear</property>
      <property value="0.0">fsim/applicability/vertical_flight</property>
      <property value="1">fsim/tables/version</property>
      <property value="1">fsim/tables/provenance</property>
      <property value="100">fsim/tables/altitude_m/h0</property>
      <property value="3540">fsim/tables/altitude_m/h1</property>
      <property value="7080">fsim/tables/altitude_m/h2</property>
      <property value="10620">fsim/tables/altitude_m/h3</property>
      <property value="10972.8">fsim/tables/altitude_m/h4</property>
      <property value="13270">fsim/tables/altitude_m/h5</property>
      <property value="15040">fsim/tables/altitude_m/h6</property>
      <property value="16810">fsim/tables/altitude_m/h7</property>
      <property value="0.933419">fsim/tables/best_endurance_fuel_kg_s/h0/w0</property>
      <property value="0.797486">fsim/tables/best_endurance_fuel_kg_s/h0/w1</property>
      <property value="0.890093">fsim/tables/best_endurance_fuel_kg_s/h0/w2</property>
      <property value="0.591038">fsim/tables/best_endurance_fuel_kg_s/h1/w0</property>
      <property value="0.693917">fsim/tables/best_endurance_fuel_kg_s/h1/w1</property>
      <property value="0.790238">fsim/tables/best_endurance_fuel_kg_s/h1/w2</property>
      <property value="0.517124">fsim/tables/best_endurance_fuel_kg_s/h2/w0</property>
      <property value="0.60456">fsim/tables/best_endurance_fuel_kg_s/h2/w1</property>
      <property value="0.688626">fsim/tables/best_endurance_fuel_kg_s/h2/w2</property>
      <property value="0.443322">fsim/tables/best_endurance_fuel_kg_s/h3/w0</property>
      <property value="0.520893">fsim/tables/best_endurance_fuel_kg_s/h3/w1</property>
      <property value="0.580781">fsim/tables/best_endurance_fuel_kg_s/h3/w2</property>
      <property value="0.436506">fsim/tables/best_endurance_fuel_kg_s/h4/w0</property>
      <property value="0.512906">fsim/tables/best_endurance_fuel_kg_s/h4/w1</property>
      <property value="0.591929">fsim/tables/best_endurance_fuel_kg_s/h4/w2</property>
      <property value="0.408497">fsim/tables/best_endurance_fuel_kg_s/h5/w0</property>
      <property value="0.254631">fsim/tables/best_endurance_fuel_kg_s/h5/w1</property>
      <property value="0.353275">fsim/tables/best_endurance_fuel_kg_s/h5/w2</property>
      <property value="0.387477">fsim/tables/best_endurance_fuel_kg_s/h6/w0</property>
      <property value="0.449965">fsim/tables/best_endurance_fuel_kg_s/h6/w1</property>
      <property value="2.043">fsim/tables/best_endurance_fuel_kg_s/h6/w2</property>
      <property value="0.451424">fsim/tables/best_endurance_fuel_kg_s/h7/w0</property>
      <property value="1.82091">fsim/tables/best_endurance_fuel_kg_s/h7/w1</property>
      <property value="206.172">fsim/tables/best_endurance_tas_ms/h0/w0</property>
      <property value="155.099">fsim/tables/best_endurance_tas_ms/h0/w1</property>
      <property value="145.896">fsim/tables/best_endurance_tas_ms/h0/w2</property>
      <property value="149.892">fsim/tables/best_endurance_tas_ms/h1/w0</property>
      <property value="165.004">fsim/tables/best_endurance_tas_ms/h1/w1</property>
      <property value="179.674">fsim/tables/best_endurance_tas_ms/h1/w2</property>
      <property value="180.284">fsim/tables/best_endurance_tas_ms/h2/w0</property>
      <property value="199.231">fsim/tables/best_endurance_tas_ms/h2/w1</property>
      <property value="216.663">fsim/tables/best_endurance_tas_ms/h2/w2</property>
      <property value="222.349">fsim/tables/best_endurance_tas_ms/h3/w0</property>
      <property value="241.278">fsim/tables/best_endurance_tas_ms/h3/w1</property>
      <property value="255.395">fsim/tables/best_endurance_tas_ms/h3/w2</property>
      <property value="226.405">fsim/tables/best_endurance_tas_ms/h4/w0</property>
      <property value="242.781">fsim/tables/best_endurance_tas_ms/h4/w1</property>
      <property value="257.292">fsim/tables/best_endurance_tas_ms/h4/w2</property>
      <property value="255.259">fsim/tables/best_endurance_tas_ms/h5/w0</property>
      <property value="264.344">fsim/tables/best_endurance_tas_ms/h5/w1</property>
      <property value="264.798">fsim/tables/best_endurance_tas_ms/h5/w2</property>
      <property value="263.26">fsim/tables/best_endurance_tas_ms/h6/w0</property>
      <property value="268.265">fsim/tables/best_endurance_tas_ms/h6/w1</property>
      <property value="273.973">fsim/tables/best_endurance_tas_ms/h6/w2</property>
      <property value="276.033">fsim/tables/best_endurance_tas_ms/h7/w0</property>
      <property value="276.333">fsim/tables/best_endurance_tas_ms/h7/w1</property>
      <property value="0.933419">fsim/tables/best_range_fuel_kg_s/h0/w0</property>
      <property value="0.983871">fsim/tables/best_range_fuel_kg_s/h0/w1</property>
      <property value="1.13257">fsim/tables/best_range_fuel_kg_s/h0/w2</property>
      <property value="0.744314">fsim/tables/best_range_fuel_kg_s/h1/w0</property>
      <property value="0.875359">fsim/tables/best_range_fuel_kg_s/h1/w1</property>
      <property value="0.977614">fsim/tables/best_range_fuel_kg_s/h1/w2</property>
      <property value="0.624004">fsim/tables/best_range_fuel_kg_s/h2/w0</property>
      <property value="0.6919">fsim/tables/best_range_fuel_kg_s/h2/w1</property>
      <property value="0.761149">fsim/tables/best_range_fuel_kg_s/h2/w2</property>
      <property value="0.461133">fsim/tables/best_range_fuel_kg_s/h3/w0</property>
      <property value="0.530609">fsim/tables/best_range_fuel_kg_s/h3/w1</property>
      <property value="0.598206">fsim/tables/best_range_fuel_kg_s/h3/w2</property>
      <property value="0.451032">fsim/tables/best_range_fuel_kg_s/h4/w0</property>
      <property value="0.524814">fsim/tables/best_range_fuel_kg_s/h4/w1</property>
      <property value="0.596749">fsim/tables/best_range_fuel_kg_s/h4/w2</property>
      <property value="0.412766">fsim/tables/best_range_fuel_kg_s/h5/w0</property>
      <property value="0.497316">fsim/tables/best_range_fuel_kg_s/h5/w1</property>
      <property value="0.59785">fsim/tables/best_range_fuel_kg_s/h5/w2</property>
      <property value="0.400384">fsim/tables/best_range_fuel_kg_s/h6/w0</property>
      <property value="0.544254">fsim/tables/best_range_fuel_kg_s/h6/w1</property>
      <property value="2.07515">fsim/tables/best_range_fuel_kg_s/h6/w2</property>
      <property value="0.45571">fsim/tables/best_range_fuel_kg_s/h7/w0</property>
      <property value="1.8364">fsim/tables/best_range_fuel_kg_s/h7/w1</property>
      <property value="206.172">fsim/tables/best_range_tas_ms/h0/w0</property>
      <property value="207.855">fsim/tables/best_range_tas_ms/h0/w1</property>
      <property value="228.647">fsim/tables/best_range_tas_ms/h0/w2</property>
      <property value="223.416">fsim/tables/best_range_tas_ms/h1/w0</property>
      <property value="248.585">fsim/tables/best_range_tas_ms/h1/w1</property>
      <property value="265.969">fsim/tables/best_range_tas_ms/h1/w2</property>
      <property value="259.366">fsim/tables/best_range_tas_ms/h2/w0</property>
      <property value="268.52">fsim/tables/best_range_tas_ms/h2/w1</property>
      <property value="275.291">fsim/tables/best_range_tas_ms/h2/w2</property>
      <property value="257.084">fsim/tables/best_range_tas_ms/h3/w0</property>
      <property value="263.155">fsim/tables/best_range_tas_ms/h3/w1</property>
      <property value="266.418">fsim/tables/best_range_tas_ms/h3/w2</property>
      <property value="256.725">fsim/tables/best_range_tas_ms/h4/w0</property>
      <property value="263.797">fsim/tables/best_range_tas_ms/h4/w1</property>
      <property value="266.174">fsim/tables/best_range_tas_ms/h4/w2</property>
      <property value="265.604">fsim/tables/best_range_tas_ms/h5/w0</property>
      <property value="267.157">fsim/tables/best_range_tas_ms/h5/w1</property>
      <property value="267.701">fsim/tables/best_range_tas_ms/h5/w2</property>
      <property value="270.676">fsim/tables/best_range_tas_ms/h6/w0</property>
      <property value="271.989">fsim/tables/best_range_tas_ms/h6/w1</property>
      <property value="280.216">fsim/tables/best_range_tas_ms/h6/w2</property>
      <property value="277.233">fsim/tables/best_range_tas_ms/h7/w0</property>
      <property value="281.011">fsim/tables/best_range_tas_ms/h7/w1</property>
      <property value="306.078">fsim/tables/climb_tas_ms/h0/w0</property>
      <property value="309.342">fsim/tables/climb_tas_ms/h0/w1</property>
      <property value="315.356">fsim/tables/climb_tas_ms/h0/w2</property>
      <property value="300.172">fsim/tables/climb_tas_ms/h1/w0</property>
      <property value="306.196">fsim/tables/climb_tas_ms/h1/w1</property>
      <property value="305.928">fsim/tables/climb_tas_ms/h1/w2</property>
      <property value="293.706">fsim/tables/climb_tas_ms/h2/w0</property>
      <property value="295.307">fsim/tables/climb_tas_ms/h2/w1</property>
      <property value="296.466">fsim/tables/climb_tas_ms/h2/w2</property>
      <property value="283.088">fsim/tables/climb_tas_ms/h3/w0</property>
      <property value="285.473">fsim/tables/climb_tas_ms/h3/w1</property>
      <property value="286.522">fsim/tables/climb_tas_ms/h3/w2</property>
      <property value="283.258">fsim/tables/climb_tas_ms/h4/w0</property>
      <property value="284.139">fsim/tables/climb_tas_ms/h4/w1</property>
      <property value="284.705">fsim/tables/climb_tas_ms/h4/w2</property>
      <property value="285.544">fsim/tables/climb_tas_ms/h5/w0</property>
      <property value="284.886">fsim/tables/climb_tas_ms/h5/w1</property>
      <property value="282.926">fsim/tables/climb_tas_ms/h5/w2</property>
      <property value="283.679">fsim/tables/climb_tas_ms/h6/w0</property>
      <property value="281.996">fsim/tables/climb_tas_ms/h6/w1</property>
      <property value="281.297">fsim/tables/climb_tas_ms/h6/w2</property>
      <property value="280.476">fsim/tables/climb_tas_ms/h7/w0</property>
      <property value="279.262">fsim/tables/climb_tas_ms/h7/w1</property>
      <property value="293.173">fsim/tables/climb_tas_ms/h7/w2</property>
      <property value="10300">fsim/tables/fuel_capacity_kg</property>
      <property value="0.933419">fsim/tables/fuel_kg_s/h0/w0/v0</property>
      <property value="1.00852">fsim/tables/fuel_kg_s/h0/w0/v1</property>
      <property value="2.86287">fsim/tables/fuel_kg_s/h0/w0/v10</property>
      <property value="3.08353">fsim/tables/fuel_kg_s/h0/w0/v11</property>
      <property value="4.14377">fsim/tables/fuel_kg_s/h0/w0/v12</property>
      <property value="13.0942">fsim/tables/fuel_kg_s/h0/w0/v13</property>
      <property value="15.1075">fsim/tables/fuel_kg_s/h0/w0/v14</property>
      <property value="17.2225">fsim/tables/fuel_kg_s/h0/w0/v15</property>
      <property value="1.08604">fsim/tables/fuel_kg_s/h0/w0/v2</property>
      <property value="1.1657">fsim/tables/fuel_kg_s/h0/w0/v3</property>
      <property value="1.24747">fsim/tables/fuel_kg_s/h0/w0/v4</property>
      <property value="1.3369">fsim/tables/fuel_kg_s/h0/w0/v5</property>
      <property value="1.43279">fsim/tables/fuel_kg_s/h0/w0/v6</property>
      <property value="1.53859">fsim/tables/fuel_kg_s/h0/w0/v7</property>
      <property value="1.67747">fsim/tables/fuel_kg_s/h0/w0/v8</property>
      <property value="2.0311">fsim/tables/fuel_kg_s/h0/w0/v9</property>
      <property value="0.797461">fsim/tables/fuel_kg_s/h0/w1/v0</property>
      <property value="0.838296">fsim/tables/fuel_kg_s/h0/w1/v1</property>
      <property value="1.84772">fsim/tables/fuel_kg_s/h0/w1/v10</property>
      <property value="2.78451">fsim/tables/fuel_kg_s/h0/w1/v11</property>
      <property value="14.1671">fsim/tables/fuel_kg_s/h0/w1/v12</property>
      <property value="15.5277">fsim/tables/fuel_kg_s/h0/w1/v13</property>
      <property value="16.9342">fsim/tables/fuel_kg_s/h0/w1/v14</property>
      <property value="18.4005">fsim/tables/fuel_kg_s/h0/w1/v15</property>
      <property value="0.902835">fsim/tables/fuel_kg_s/h0/w1/v2</property>
      <property value="0.973252">fsim/tables/fuel_kg_s/h0/w1/v3</property>
      <property value="1.05994">fsim/tables/fuel_kg_s/h0/w1/v4</property>
      <property value="1.15672">fsim/tables/fuel_kg_s/h0/w1/v5</property>
      <property value="1.2568">fsim/tables/fuel_kg_s/h0/w1/v6</property>
      <property value="1.36032">fsim/tables/fuel_kg_s/h0/w1/v7</property>
      <property value="1.46883">fsim/tables/fuel_kg_s/h0/w1/v8</property>
      <property value="1.60716">fsim/tables/fuel_kg_s/h0/w1/v9</property>
      <property value="0.890087">fsim/tables/fuel_kg_s/h0/w2/v0</property>
      <property value="0.89719">fsim/tables/fuel_kg_s/h0/w2/v1</property>
      <property value="1.77862">fsim/tables/fuel_kg_s/h0/w2/v10</property>
      <property value="2.56203">fsim/tables/fuel_kg_s/h0/w2/v11</property>
      <property value="13.4612">fsim/tables/fuel_kg_s/h0/w2/v12</property>
      <property value="15.4337">fsim/tables/fuel_kg_s/h0/w2/v13</property>
      <property value="16.8888">fsim/tables/fuel_kg_s/h0/w2/v14</property>
      <property value="18.4173">fsim/tables/fuel_kg_s/h0/w2/v15</property>
      <property value="0.939076">fsim/tables/fuel_kg_s/h0/w2/v2</property>
      <property value="0.997953">fsim/tables/fuel_kg_s/h0/w2/v3</property>
      <property value="1.07167">fsim/tables/fuel_kg_s/h0/w2/v4</property>
      <property value="1.15403">fsim/tables/fuel_kg_s/h0/w2/v5</property>
      <property value="1.25554">fsim/tables/fuel_kg_s/h0/w2/v6</property>
      <property value="1.36062">fsim/tables/fuel_kg_s/h0/w2/v7</property>
      <property value="1.47013">fsim/tables/fuel_kg_s/h0/w2/v8</property>
      <property value="1.59224">fsim/tables/fuel_kg_s/h0/w2/v9</property>
      <property value="0.595408">fsim/tables/fuel_kg_s/h1/w0/v0</property>
      <property value="0.595115">fsim/tables/fuel_kg_s/h1/w0/v1</property>
      <property value="2.89714">fsim/tables/fuel_kg_s/h1/w0/v10</property>
      <property value="2.87977">fsim/tables/fuel_kg_s/h1/w0/v11</property>
      <property value="8.7037">fsim/tables/fuel_kg_s/h1/w0/v12</property>
      <property value="10.6233">fsim/tables/fuel_kg_s/h1/w0/v13</property>
      <property value="12.6609">fsim/tables/fuel_kg_s/h1/w0/v14</property>
      <property value="14.7585">fsim/tables/fuel_kg_s/h1/w0/v15</property>
      <property value="0.628599">fsim/tables/fuel_kg_s/h1/w0/v2</property>
      <property value="0.682448">fsim/tables/fuel_kg_s/h1/w0/v3</property>
      <property value="0.743895">fsim/tables/fuel_kg_s/h1/w0/v4</property>
      <property value="0.824105">fsim/tables/fuel_kg_s/h1/w0/v5</property>
      <property value="0.90936">fsim/tables/fuel_kg_s/h1/w0/v6</property>
      <property value="1.00245">fsim/tables/fuel_kg_s/h1/w0/v7</property>
      <property value="1.14009">fsim/tables/fuel_kg_s/h1/w0/v8</property>
      <property value="1.86727">fsim/tables/fuel_kg_s/h1/w0/v9</property>
      <property value="0.703002">fsim/tables/fuel_kg_s/h1/w1/v0</property>
      <property value="0.6947">fsim/tables/fuel_kg_s/h1/w1/v1</property>
      <property value="9.84964">fsim/tables/fuel_kg_s/h1/w1/v10</property>
      <property value="11.0059">fsim/tables/fuel_kg_s/h1/w1/v11</property>
      <property value="12.2239">fsim/tables/fuel_kg_s/h1/w1/v12</property>
      <property value="13.3471">fsim/tables/fuel_kg_s/h1/w1/v13</property>
      <property value="14.5072">fsim/tables/fuel_kg_s/h1/w1/v14</property>
      <property value="15.7031">fsim/tables/fuel_kg_s/h1/w1/v15</property>
      <property value="0.716802">fsim/tables/fuel_kg_s/h1/w1/v2</property>
      <property value="0.757897">fsim/tables/fuel_kg_s/h1/w1/v3</property>
      <property value="0.816816">fsim/tables/fuel_kg_s/h1/w1/v4</property>
      <property value="0.88134">fsim/tables/fuel_kg_s/h1/w1/v5</property>
      <property value="0.963825">fsim/tables/fuel_kg_s/h1/w1/v6</property>
      <property value="1.05565">fsim/tables/fuel_kg_s/h1/w1/v7</property>
      <property value="1.22377">fsim/tables/fuel_kg_s/h1/w1/v8</property>
      <property value="2.14471">fsim/tables/fuel_kg_s/h1/w1/v9</property>
      <property value="0.849438">fsim/tables/fuel_kg_s/h1/w2/v0</property>
      <property value="0.798769">fsim/tables/fuel_kg_s/h1/w2/v1</property>
      <property value="9.77806">fsim/tables/fuel_kg_s/h1/w2/v10</property>
      <property value="10.9489">fsim/tables/fuel_kg_s/h1/w2/v11</property>
      <property value="12.1809">fsim/tables/fuel_kg_s/h1/w2/v12</property>
      <property value="13.3392">fsim/tables/fuel_kg_s/h1/w2/v13</property>
      <property value="14.5183">fsim/tables/fuel_kg_s/h1/w2/v14</property>
      <property value="15.734">fsim/tables/fuel_kg_s/h1/w2/v15</property>
      <property value="0.791222">fsim/tables/fuel_kg_s/h1/w2/v2</property>
      <property value="0.81429">fsim/tables/fuel_kg_s/h1/w2/v3</property>
      <property value="0.855211">fsim/tables/fuel_kg_s/h1/w2/v4</property>
      <property value="0.915816">fsim/tables/fuel_kg_s/h1/w2/v5</property>
      <property value="0.979562">fsim/tables/fuel_kg_s/h1/w2/v6</property>
      <property value="1.0696">fsim/tables/fuel_kg_s/h1/w2/v7</property>
      <property value="1.20337">fsim/tables/fuel_kg_s/h1/w2/v8</property>
      <property value="1.88392">fsim/tables/fuel_kg_s/h1/w2/v9</property>
      <property value="0.585235">fsim/tables/fuel_kg_s/h2/w0/v0</property>
      <property value="0.526444">fsim/tables/fuel_kg_s/h2/w0/v1</property>
      <property value="8.00186">fsim/tables/fuel_kg_s/h2/w0/v10</property>
      <property value="8.92325">fsim/tables/fuel_kg_s/h2/w0/v11</property>
      <property value="7.09986">fsim/tables/fuel_kg_s/h2/w0/v12</property>
      <property value="8.64037">fsim/tables/fuel_kg_s/h2/w0/v13</property>
      <property value="10.2417">fsim/tables/fuel_kg_s/h2/w0/v14</property>
      <property value="12.0987">fsim/tables/fuel_kg_s/h2/w0/v15</property>
      <property value="0.517592">fsim/tables/fuel_kg_s/h2/w0/v2</property>
      <property value="0.536662">fsim/tables/fuel_kg_s/h2/w0/v3</property>
      <property value="0.574077">fsim/tables/fuel_kg_s/h2/w0/v4</property>
      <property value="0.622613">fsim/tables/fuel_kg_s/h2/w0/v5</property>
      <property value="0.694131">fsim/tables/fuel_kg_s/h2/w0/v6</property>
      <property value="0.997477">fsim/tables/fuel_kg_s/h2/w0/v7</property>
      <property value="6.11529">fsim/tables/fuel_kg_s/h2/w0/v8</property>
      <property value="7.0457">fsim/tables/fuel_kg_s/h2/w0/v9</property>
      <property value="0.681416">fsim/tables/fuel_kg_s/h2/w1/v0</property>
      <property value="0.619515">fsim/tables/fuel_kg_s/h2/w1/v1</property>
      <property value="8.23248">fsim/tables/fuel_kg_s/h2/w1/v10</property>
      <property value="9.11962">fsim/tables/fuel_kg_s/h2/w1/v11</property>
      <property value="10.0454">fsim/tables/fuel_kg_s/h2/w1/v12</property>
      <property value="10.9878">fsim/tables/fuel_kg_s/h2/w1/v13</property>
      <property value="11.9554">fsim/tables/fuel_kg_s/h2/w1/v14</property>
      <property value="12.9595">fsim/tables/fuel_kg_s/h2/w1/v15</property>
      <property value="0.604637">fsim/tables/fuel_kg_s/h2/w1/v2</property>
      <property value="0.615543">fsim/tables/fuel_kg_s/h2/w1/v3</property>
      <property value="0.642812">fsim/tables/fuel_kg_s/h2/w1/v4</property>
      <property value="0.689931">fsim/tables/fuel_kg_s/h2/w1/v5</property>
      <property value="0.764751">fsim/tables/fuel_kg_s/h2/w1/v6</property>
      <property value="1.25599">fsim/tables/fuel_kg_s/h2/w1/v7</property>
      <property value="6.41594">fsim/tables/fuel_kg_s/h2/w1/v8</property>
      <property value="7.32662">fsim/tables/fuel_kg_s/h2/w1/v9</property>
      <property value="0.853809">fsim/tables/fuel_kg_s/h2/w2/v0</property>
      <property value="0.744304">fsim/tables/fuel_kg_s/h2/w2/v1</property>
      <property value="8.38194">fsim/tables/fuel_kg_s/h2/w2/v10</property>
      <property value="9.20692">fsim/tables/fuel_kg_s/h2/w2/v11</property>
      <property value="10.1156">fsim/tables/fuel_kg_s/h2/w2/v12</property>
      <property value="11.0217">fsim/tables/fuel_kg_s/h2/w2/v13</property>
      <property value="11.9918">fsim/tables/fuel_kg_s/h2/w2/v14</property>
      <property value="12.9897">fsim/tables/fuel_kg_s/h2/w2/v15</property>
      <property value="0.6982">fsim/tables/fuel_kg_s/h2/w2/v2</property>
      <property value="0.688766">fsim/tables/fuel_kg_s/h2/w2/v3</property>
      <property value="0.703379">fsim/tables/fuel_kg_s/h2/w2/v4</property>
      <property value="0.733793">fsim/tables/fuel_kg_s/h2/w2/v5</property>
      <property value="0.802933">fsim/tables/fuel_kg_s/h2/w2/v6</property>
      <property value="1.1948">fsim/tables/fuel_kg_s/h2/w2/v7</property>
      <property value="6.493">fsim/tables/fuel_kg_s/h2/w2/v8</property>
      <property value="7.40522">fsim/tables/fuel_kg_s/h2/w2/v9</property>
      <property value="0.584354">fsim/tables/fuel_kg_s/h3/w0/v0</property>
      <property value="0.485524">fsim/tables/fuel_kg_s/h3/w0/v1</property>
      <property value="6.61649">fsim/tables/fuel_kg_s/h3/w0/v10</property>
      <property value="7.28458">fsim/tables/fuel_kg_s/h3/w0/v11</property>
      <property value="8.06566">fsim/tables/fuel_kg_s/h3/w0/v12</property>
      <property value="8.90578">fsim/tables/fuel_kg_s/h3/w0/v13</property>
      <property value="9.78098">fsim/tables/fuel_kg_s/h3/w0/v14</property>
      <property value="10.6878">fsim/tables/fuel_kg_s/h3/w0/v15</property>
      <property value="0.449304">fsim/tables/fuel_kg_s/h3/w0/v2</property>
      <property value="0.444217">fsim/tables/fuel_kg_s/h3/w0/v3</property>
      <property value="0.462128">fsim/tables/fuel_kg_s/h3/w0/v4</property>
      <property value="0.565047">fsim/tables/fuel_kg_s/h3/w0/v5</property>
      <property value="3.83151">fsim/tables/fuel_kg_s/h3/w0/v6</property>
      <property value="4.58286">fsim/tables/fuel_kg_s/h3/w0/v7</property>
      <property value="5.32445">fsim/tables/fuel_kg_s/h3/w0/v8</property>
      <property value="5.9763">fsim/tables/fuel_kg_s/h3/w0/v9</property>
      <property value="0.691186">fsim/tables/fuel_kg_s/h3/w1/v0</property>
      <property value="0.580252">fsim/tables/fuel_kg_s/h3/w1/v1</property>
      <property value="6.99424">fsim/tables/fuel_kg_s/h3/w1/v10</property>
      <property value="7.59543">fsim/tables/fuel_kg_s/h3/w1/v11</property>
      <property value="8.25856">fsim/tables/fuel_kg_s/h3/w1/v12</property>
      <property value="9.0238">fsim/tables/fuel_kg_s/h3/w1/v13</property>
      <property value="9.83767">fsim/tables/fuel_kg_s/h3/w1/v14</property>
      <property value="10.6837">fsim/tables/fuel_kg_s/h3/w1/v15</property>
      <property value="0.532805">fsim/tables/fuel_kg_s/h3/w1/v2</property>
      <property value="0.520893">fsim/tables/fuel_kg_s/h3/w1/v3</property>
      <property value="0.532961">fsim/tables/fuel_kg_s/h3/w1/v4</property>
      <property value="0.717363">fsim/tables/fuel_kg_s/h3/w1/v5</property>
      <property value="4.22206">fsim/tables/fuel_kg_s/h3/w1/v6</property>
      <property value="5.06971">fsim/tables/fuel_kg_s/h3/w1/v7</property>
      <property value="5.75282">fsim/tables/fuel_kg_s/h3/w1/v8</property>
      <property value="6.38205">fsim/tables/fuel_kg_s/h3/w1/v9</property>
      <property value="0.878163">fsim/tables/fuel_kg_s/h3/w2/v0</property>
      <property value="0.712801">fsim/tables/fuel_kg_s/h3/w2/v1</property>
      <property value="7.21199">fsim/tables/fuel_kg_s/h3/w2/v10</property>
      <property value="7.73413">fsim/tables/fuel_kg_s/h3/w2/v11</property>
      <property value="8.33769">fsim/tables/fuel_kg_s/h3/w2/v12</property>
      <property value="9.07186">fsim/tables/fuel_kg_s/h3/w2/v13</property>
      <property value="9.84662">fsim/tables/fuel_kg_s/h3/w2/v14</property>
      <property value="10.6346">fsim/tables/fuel_kg_s/h3/w2/v15</property>
      <property value="0.635285">fsim/tables/fuel_kg_s/h3/w2/v2</property>
      <property value="0.602947">fsim/tables/fuel_kg_s/h3/w2/v3</property>
      <property value="0.597985">fsim/tables/fuel_kg_s/h3/w2/v4</property>
      <property value="0.749843">fsim/tables/fuel_kg_s/h3/w2/v5</property>
      <property value="4.39234">fsim/tables/fuel_kg_s/h3/w2/v6</property>
      <property value="5.24138">fsim/tables/fuel_kg_s/h3/w2/v7</property>
      <property value="5.96845">fsim/tables/fuel_kg_s/h3/w2/v8</property>
      <property value="6.60088">fsim/tables/fuel_kg_s/h3/w2/v9</property>
      <property value="0.582051">fsim/tables/fuel_kg_s/h4/w0/v0</property>
      <property value="0.480869">fsim/tables/fuel_kg_s/h4/w0/v1</property>
      <property value="6.51675">fsim/tables/fuel_kg_s/h4/w0/v10</property>
      <property value="7.15091">fsim/tables/fuel_kg_s/h4/w0/v11</property>
      <property value="7.93013">fsim/tables/fuel_kg_s/h4/w0/v12</property>
      <property value="8.7564">fsim/tables/fuel_kg_s/h4/w0/v13</property>
      <property value="9.61509">fsim/tables/fuel_kg_s/h4/w0/v14</property>
      <property value="10.5059">fsim/tables/fuel_kg_s/h4/w0/v15</property>
      <property value="0.44318">fsim/tables/fuel_kg_s/h4/w0/v2</property>
      <property value="0.437169">fsim/tables/fuel_kg_s/h4/w0/v3</property>
      <property value="0.454244">fsim/tables/fuel_kg_s/h4/w0/v4</property>
      <property value="0.604558">fsim/tables/fuel_kg_s/h4/w0/v5</property>
      <property value="3.79366">fsim/tables/fuel_kg_s/h4/w0/v6</property>
      <property value="4.59638">fsim/tables/fuel_kg_s/h4/w0/v7</property>
      <property value="5.26655">fsim/tables/fuel_kg_s/h4/w0/v8</property>
      <property value="5.91049">fsim/tables/fuel_kg_s/h4/w0/v9</property>
      <property value="0.692312">fsim/tables/fuel_kg_s/h4/w1/v0</property>
      <property value="0.575596">fsim/tables/fuel_kg_s/h4/w1/v1</property>
      <property value="6.92826">fsim/tables/fuel_kg_s/h4/w1/v10</property>
      <property value="7.52537">fsim/tables/fuel_kg_s/h4/w1/v11</property>
      <property value="8.22922">fsim/tables/fuel_kg_s/h4/w1/v12</property>
      <property value="8.99772">fsim/tables/fuel_kg_s/h4/w1/v13</property>
      <property value="9.78625">fsim/tables/fuel_kg_s/h4/w1/v14</property>
      <property value="10.6219">fsim/tables/fuel_kg_s/h4/w1/v15</property>
      <property value="0.525781">fsim/tables/fuel_kg_s/h4/w1/v2</property>
      <property value="0.512991">fsim/tables/fuel_kg_s/h4/w1/v3</property>
      <property value="0.530277">fsim/tables/fuel_kg_s/h4/w1/v4</property>
      <property value="0.854885">fsim/tables/fuel_kg_s/h4/w1/v5</property>
      <property value="4.28927">fsim/tables/fuel_kg_s/h4/w1/v6</property>
      <property value="5.13305">fsim/tables/fuel_kg_s/h4/w1/v7</property>
      <property value="5.73684">fsim/tables/fuel_kg_s/h4/w1/v8</property>
      <property value="6.37001">fsim/tables/fuel_kg_s/h4/w1/v9</property>
      <property value="0.884536">fsim/tables/fuel_kg_s/h4/w2/v0</property>
      <property value="0.71084">fsim/tables/fuel_kg_s/h4/w2/v1</property>
      <property value="7.13432">fsim/tables/fuel_kg_s/h4/w2/v10</property>
      <property value="7.6498">fsim/tables/fuel_kg_s/h4/w2/v11</property>
      <property value="8.28951">fsim/tables/fuel_kg_s/h4/w2/v12</property>
      <property value="9.0239">fsim/tables/fuel_kg_s/h4/w2/v13</property>
      <property value="9.79222">fsim/tables/fuel_kg_s/h4/w2/v14</property>
      <property value="10.5684">fsim/tables/fuel_kg_s/h4/w2/v15</property>
      <property value="0.628681">fsim/tables/fuel_kg_s/h4/w2/v2</property>
      <property value="0.595526">fsim/tables/fuel_kg_s/h4/w2/v3</property>
      <property value="0.597074">fsim/tables/fuel_kg_s/h4/w2/v4</property>
      <property value="0.854562">fsim/tables/fuel_kg_s/h4/w2/v5</property>
      <property value="4.49661">fsim/tables/fuel_kg_s/h4/w2/v6</property>
      <property value="5.34594">fsim/tables/fuel_kg_s/h4/w2/v7</property>
      <property value="5.95722">fsim/tables/fuel_kg_s/h4/w2/v8</property>
      <property value="6.58114">fsim/tables/fuel_kg_s/h4/w2/v9</property>
      <property value="0.626453">fsim/tables/fuel_kg_s/h5/w0/v0</property>
      <property value="0.493116">fsim/tables/fuel_kg_s/h5/w0/v1</property>
      <property value="5.06044">fsim/tables/fuel_kg_s/h5/w0/v10</property>
      <property value="5.46096">fsim/tables/fuel_kg_s/h5/w0/v11</property>
      <property value="5.96191">fsim/tables/fuel_kg_s/h5/w0/v12</property>
      <property value="6.5086">fsim/tables/fuel_kg_s/h5/w0/v13</property>
      <property value="7.06848">fsim/tables/fuel_kg_s/h5/w0/v14</property>
      <property value="7.64612">fsim/tables/fuel_kg_s/h5/w0/v15</property>
      <property value="0.433039">fsim/tables/fuel_kg_s/h5/w0/v2</property>
      <property value="0.410314">fsim/tables/fuel_kg_s/h5/w0/v3</property>
      <property value="0.413595">fsim/tables/fuel_kg_s/h5/w0/v4</property>
      <property value="0.639184">fsim/tables/fuel_kg_s/h5/w0/v5</property>
      <property value="3.1848">fsim/tables/fuel_kg_s/h5/w0/v6</property>
      <property value="3.8043">fsim/tables/fuel_kg_s/h5/w0/v7</property>
      <property value="4.22093">fsim/tables/fuel_kg_s/h5/w0/v8</property>
      <property value="4.68588">fsim/tables/fuel_kg_s/h5/w0/v9</property>
      <property value="2.45617">fsim/tables/fuel_kg_s/h5/w1/v0</property>
      <property value="0.622755">fsim/tables/fuel_kg_s/h5/w1/v1</property>
      <property value="5.30817">fsim/tables/fuel_kg_s/h5/w1/v10</property>
      <property value="5.64045">fsim/tables/fuel_kg_s/h5/w1/v11</property>
      <property value="6.0237">fsim/tables/fuel_kg_s/h5/w1/v12</property>
      <property value="6.50141">fsim/tables/fuel_kg_s/h5/w1/v13</property>
      <property value="7.01028">fsim/tables/fuel_kg_s/h5/w1/v14</property>
      <property value="7.53436">fsim/tables/fuel_kg_s/h5/w1/v15</property>
      <property value="0.540879">fsim/tables/fuel_kg_s/h5/w1/v2</property>
      <property value="0.50012">fsim/tables/fuel_kg_s/h5/w1/v3</property>
      <property value="0.495551">fsim/tables/fuel_kg_s/h5/w1/v4</property>
      <property value="2.44007">fsim/tables/fuel_kg_s/h5/w1/v5</property>
      <property value="3.51128">fsim/tables/fuel_kg_s/h5/w1/v6</property>
      <property value="4.23187">fsim/tables/fuel_kg_s/h5/w1/v7</property>
      <property value="4.59">fsim/tables/fuel_kg_s/h5/w1/v8</property>
      <property value="4.96717">fsim/tables/fuel_kg_s/h5/w1/v9</property>
      <property value="2.50795">fsim/tables/fuel_kg_s/h5/w2/v1</property>
      <property value="5.74139">fsim/tables/fuel_kg_s/h5/w2/v10</property>
      <property value="5.89073">fsim/tables/fuel_kg_s/h5/w2/v11</property>
      <property value="6.11027">fsim/tables/fuel_kg_s/h5/w2/v12</property>
      <property value="6.48609">fsim/tables/fuel_kg_s/h5/w2/v13</property>
      <property value="6.94314">fsim/tables/fuel_kg_s/h5/w2/v14</property>
      <property value="7.42428">fsim/tables/fuel_kg_s/h5/w2/v15</property>
      <property value="0.680053">fsim/tables/fuel_kg_s/h5/w2/v2</property>
      <property value="0.612818">fsim/tables/fuel_kg_s/h5/w2/v3</property>
      <property value="0.58933">fsim/tables/fuel_kg_s/h5/w2/v4</property>
      <property value="2.55157">fsim/tables/fuel_kg_s/h5/w2/v5</property>
      <property value="3.7542">fsim/tables/fuel_kg_s/h5/w2/v6</property>
      <property value="4.51976">fsim/tables/fuel_kg_s/h5/w2/v7</property>
      <property value="5.048">fsim/tables/fuel_kg_s/h5/w2/v8</property>
      <property value="5.39824">fsim/tables/fuel_kg_s/h5/w2/v9</property>
      <property value="1.40501">fsim/tables/fuel_kg_s/h6/w0/v1</property>
      <property value="4.07477">fsim/tables/fuel_kg_s/h6/w0/v10</property>
      <property value="4.26129">fsim/tables/fuel_kg_s/h6/w0/v11</property>
      <property value="4.50492">fsim/tables/fuel_kg_s/h6/w0/v12</property>
      <property value="4.82263">fsim/tables/fuel_kg_s/h6/w0/v13</property>
      <property value="5.17951">fsim/tables/fuel_kg_s/h6/w0/v14</property>
      <property value="5.54977">fsim/tables/fuel_kg_s/h6/w0/v15</property>
      <property value="0.453415">fsim/tables/fuel_kg_s/h6/w0/v2</property>
      <property value="0.411939">fsim/tables/fuel_kg_s/h6/w0/v3</property>
      <property value="0.399107">fsim/tables/fuel_kg_s/h6/w0/v4</property>
      <property value="0.526048">fsim/tables/fuel_kg_s/h6/w0/v5</property>
      <property value="2.65623">fsim/tables/fuel_kg_s/h6/w0/v6</property>
      <property value="3.17605">fsim/tables/fuel_kg_s/h6/w0/v7</property>
      <property value="3.57424">fsim/tables/fuel_kg_s/h6/w0/v8</property>
      <property value="3.82403">fsim/tables/fuel_kg_s/h6/w0/v9</property>
      <property value="2.24987">fsim/tables/fuel_kg_s/h6/w1/v1</property>
      <property value="4.53137">fsim/tables/fuel_kg_s/h6/w1/v10</property>
      <property value="4.73775">fsim/tables/fuel_kg_s/h6/w1/v11</property>
      <property value="4.82473">fsim/tables/fuel_kg_s/h6/w1/v12</property>
      <property value="4.97761">fsim/tables/fuel_kg_s/h6/w1/v13</property>
      <property value="5.20025">fsim/tables/fuel_kg_s/h6/w1/v14</property>
      <property value="5.58192">fsim/tables/fuel_kg_s/h6/w1/v15</property>
      <property value="1.92076">fsim/tables/fuel_kg_s/h6/w1/v2</property>
      <property value="0.980935">fsim/tables/fuel_kg_s/h6/w1/v3</property>
      <property value="0.508126">fsim/tables/fuel_kg_s/h6/w1/v4</property>
      <property value="1.92198">fsim/tables/fuel_kg_s/h6/w1/v5</property>
      <property value="2.96687">fsim/tables/fuel_kg_s/h6/w1/v6</property>
      <property value="3.5444">fsim/tables/fuel_kg_s/h6/w1/v7</property>
      <property value="4.06931">fsim/tables/fuel_kg_s/h6/w1/v8</property>
      <property value="4.31756">fsim/tables/fuel_kg_s/h6/w1/v9</property>
      <property value="3.79214">fsim/tables/fuel_kg_s/h6/w2/v0</property>
      <property value="2.26935">fsim/tables/fuel_kg_s/h6/w2/v10</property>
      <property value="2.69491">fsim/tables/fuel_kg_s/h6/w2/v11</property>
      <property value="3.28477">fsim/tables/fuel_kg_s/h6/w2/v12</property>
      <property value="3.54168">fsim/tables/fuel_kg_s/h6/w2/v13</property>
      <property value="3.80563">fsim/tables/fuel_kg_s/h6/w2/v14</property>
      <property value="4.03651">fsim/tables/fuel_kg_s/h6/w2/v15</property>
      <property value="2.27269">fsim/tables/fuel_kg_s/h6/w2/v5</property>
      <property value="2.15667">fsim/tables/fuel_kg_s/h6/w2/v6</property>
      <property value="2.08085">fsim/tables/fuel_kg_s/h6/w2/v7</property>
      <property value="2.04323">fsim/tables/fuel_kg_s/h6/w2/v8</property>
      <property value="2.09379">fsim/tables/fuel_kg_s/h6/w2/v9</property>
      <property value="3.66749">fsim/tables/fuel_kg_s/h7/w0/v10</property>
      <property value="3.74851">fsim/tables/fuel_kg_s/h7/w0/v11</property>
      <property value="3.87732">fsim/tables/fuel_kg_s/h7/w0/v12</property>
      <property value="4.00082">fsim/tables/fuel_kg_s/h7/w0/v13</property>
      <property value="4.11794">fsim/tables/fuel_kg_s/h7/w0/v14</property>
      <property value="4.22678">fsim/tables/fuel_kg_s/h7/w0/v15</property>
      <property value="1.55638">fsim/tables/fuel_kg_s/h7/w0/v2</property>
      <property value="1.40084">fsim/tables/fuel_kg_s/h7/w0/v3</property>
      <property value="0.45525">fsim/tables/fuel_kg_s/h7/w0/v4</property>
      <property value="1.66862">fsim/tables/fuel_kg_s/h7/w0/v5</property>
      <property value="2.41735">fsim/tables/fuel_kg_s/h7/w0/v6</property>
      <property value="2.84145">fsim/tables/fuel_kg_s/h7/w0/v7</property>
      <property value="3.21611">fsim/tables/fuel_kg_s/h7/w0/v8</property>
      <property value="3.58566">fsim/tables/fuel_kg_s/h7/w0/v9</property>
      <property value="2.15227">fsim/tables/fuel_kg_s/h7/w1/v10</property>
      <property value="2.39649">fsim/tables/fuel_kg_s/h7/w1/v11</property>
      <property value="2.68846">fsim/tables/fuel_kg_s/h7/w1/v12</property>
      <property value="1.90162">fsim/tables/fuel_kg_s/h7/w1/v3</property>
      <property value="1.85407">fsim/tables/fuel_kg_s/h7/w1/v4</property>
      <property value="1.83356">fsim/tables/fuel_kg_s/h7/w1/v5</property>
      <property value="1.8211">fsim/tables/fuel_kg_s/h7/w1/v6</property>
      <property value="1.84051">fsim/tables/fuel_kg_s/h7/w1/v7</property>
      <property value="1.91219">fsim/tables/fuel_kg_s/h7/w1/v8</property>
      <property value="1.99327">fsim/tables/fuel_kg_s/h7/w1/v9</property>
      <property value="397.183">fsim/tables/max_climb_ms/h0/w0</property>
      <property value="326.01">fsim/tables/max_climb_ms/h0/w1</property>
      <property value="275.896">fsim/tables/max_climb_ms/h0/w2</property>
      <property value="313.763">fsim/tables/max_climb_ms/h1/w0</property>
      <property value="257.793">fsim/tables/max_climb_ms/h1/w1</property>
      <property value="217.194">fsim/tables/max_climb_ms/h1/w2</property>
      <property value="238.896">fsim/tables/max_climb_ms/h2/w0</property>
      <property value="195.023">fsim/tables/max_climb_ms/h2/w1</property>
      <property value="162.561">fsim/tables/max_climb_ms/h2/w2</property>
      <property value="171.2">fsim/tables/max_climb_ms/h3/w0</property>
      <property value="137.549">fsim/tables/max_climb_ms/h3/w1</property>
      <property value="112.69">fsim/tables/max_climb_ms/h3/w2</property>
      <property value="164.33">fsim/tables/max_climb_ms/h4/w0</property>
      <property value="132.042">fsim/tables/max_climb_ms/h4/w1</property>
      <property value="107.821">fsim/tables/max_climb_ms/h4/w2</property>
      <property value="112.117">fsim/tables/max_climb_ms/h5/w0</property>
      <property value="87.3824">fsim/tables/max_climb_ms/h5/w1</property>
      <property value="68.0076">fsim/tables/max_climb_ms/h5/w2</property>
      <property value="75.6822">fsim/tables/max_climb_ms/h6/w0</property>
      <property value="54.9298">fsim/tables/max_climb_ms/h6/w1</property>
      <property value="38.0591">fsim/tables/max_climb_ms/h6/w2</property>
      <property value="47.641">fsim/tables/max_climb_ms/h7/w0</property>
      <property value="31.5169">fsim/tables/max_climb_ms/h7/w1</property>
      <property value="13.5107">fsim/tables/max_climb_ms/h7/w2</property>
      <property value="422.116">fsim/tables/max_tas_ms/h0/w0</property>
      <property value="421.162">fsim/tables/max_tas_ms/h0/w1</property>
      <property value="420.397">fsim/tables/max_tas_ms/h0/w2</property>
      <property value="468.605">fsim/tables/max_tas_ms/h1/w0</property>
      <property value="466.564">fsim/tables/max_tas_ms/h1/w1</property>
      <property value="464.383">fsim/tables/max_tas_ms/h1/w2</property>
      <property value="521.391">fsim/tables/max_tas_ms/h2/w0</property>
      <property value="518.3">fsim/tables/max_tas_ms/h2/w1</property>
      <property value="515.604">fsim/tables/max_tas_ms/h2/w2</property>
      <property value="588.548">fsim/tables/max_tas_ms/h3/w0</property>
      <property value="583.458">fsim/tables/max_tas_ms/h3/w1</property>
      <property value="570.606">fsim/tables/max_tas_ms/h3/w2</property>
      <property value="597.107">fsim/tables/max_tas_ms/h4/w0</property>
      <property value="594.917">fsim/tables/max_tas_ms/h4/w1</property>
      <property value="580.787">fsim/tables/max_tas_ms/h4/w2</property>
      <property value="594.851">fsim/tables/max_tas_ms/h5/w0</property>
      <property value="572.054">fsim/tables/max_tas_ms/h5/w1</property>
      <property value="547.081">fsim/tables/max_tas_ms/h5/w2</property>
      <property value="553.949">fsim/tables/max_tas_ms/h6/w0</property>
      <property value="527.355">fsim/tables/max_tas_ms/h6/w1</property>
      <property value="347.096">fsim/tables/max_tas_ms/h6/w2</property>
      <property value="516.02">fsim/tables/max_tas_ms/h7/w0</property>
      <property value="333.76">fsim/tables/max_tas_ms/h7/w1</property>
      <property value="308.21">fsim/tables/max_tas_ms/h7/w2</property>
      <property value="206.172">fsim/tables/min_tas_ms/h0/w0</property>
      <property value="155.099">fsim/tables/min_tas_ms/h0/w1</property>
      <property value="145.896">fsim/tables/min_tas_ms/h0/w2</property>
      <property value="139.213">fsim/tables/min_tas_ms/h1/w0</property>
      <property value="149.392">fsim/tables/min_tas_ms/h1/w1</property>
      <property value="144.003">fsim/tables/min_tas_ms/h1/w2</property>
      <property value="135.44">fsim/tables/min_tas_ms/h2/w0</property>
      <property value="150.46">fsim/tables/min_tas_ms/h2/w1</property>
      <property value="148.956">fsim/tables/min_tas_ms/h2/w2</property>
      <property value="145.116">fsim/tables/min_tas_ms/h3/w0</property>
      <property value="160.23">fsim/tables/min_tas_ms/h3/w1</property>
      <property value="163.607">fsim/tables/min_tas_ms/h3/w2</property>
      <property value="146.852">fsim/tables/min_tas_ms/h4/w0</property>
      <property value="161.808">fsim/tables/min_tas_ms/h4/w1</property>
      <property value="165.694">fsim/tables/min_tas_ms/h4/w2</property>
      <property value="161.907">fsim/tables/min_tas_ms/h5/w0</property>
      <property value="175.861">fsim/tables/min_tas_ms/h5/w1</property>
      <property value="183.558">fsim/tables/min_tas_ms/h5/w2</property>
      <property value="176.998">fsim/tables/min_tas_ms/h6/w0</property>
      <property value="187.164">fsim/tables/min_tas_ms/h6/w1</property>
      <property value="203.545">fsim/tables/min_tas_ms/h6/w2</property>
      <property value="196.054">fsim/tables/min_tas_ms/h7/w0</property>
      <property value="245.542">fsim/tables/min_tas_ms/h7/w1</property>
      <property value="261.528">fsim/tables/min_tas_ms/h7/w2</property>
      <property value="282.445">fsim/tables/ps_full_ms/h0/w0/v0</property>
      <property value="300.236">fsim/tables/ps_full_ms/h0/w0/v1</property>
      <property value="316.095">fsim/tables/ps_full_ms/h0/w0/v10</property>
      <property value="213.813">fsim/tables/ps_full_ms/h0/w0/v11</property>
      <property value="132.437">fsim/tables/ps_full_ms/h0/w0/v12</property>
      <property value="107.243">fsim/tables/ps_full_ms/h0/w0/v13</property>
      <property value="79.3077">fsim/tables/ps_full_ms/h0/w0/v14</property>
      <property value="45.5273">fsim/tables/ps_full_ms/h0/w0/v15</property>
      <property value="317.783">fsim/tables/ps_full_ms/h0/w0/v2</property>
      <property value="335.085">fsim/tables/ps_full_ms/h0/w0/v3</property>
      <property value="352.115">fsim/tables/ps_full_ms/h0/w0/v4</property>
      <property value="368.789">fsim/tables/ps_full_ms/h0/w0/v5</property>
      <property value="384.419">fsim/tables/ps_full_ms/h0/w0/v6</property>
      <property value="395.294">fsim/tables/ps_full_ms/h0/w0/v7</property>
      <property value="393.844">fsim/tables/ps_full_ms/h0/w0/v8</property>
      <property value="370.085">fsim/tables/ps_full_ms/h0/w0/v9</property>
      <property value="172.665">fsim/tables/ps_full_ms/h0/w1/v0</property>
      <property value="191.338">fsim/tables/ps_full_ms/h0/w1/v1</property>
      <property value="317.41">fsim/tables/ps_full_ms/h0/w1/v10</property>
      <property value="265.647">fsim/tables/ps_full_ms/h0/w1/v11</property>
      <property value="143.652">fsim/tables/ps_full_ms/h0/w1/v12</property>
      <property value="97.4923">fsim/tables/ps_full_ms/h0/w1/v13</property>
      <property value="69.8242">fsim/tables/ps_full_ms/h0/w1/v14</property>
      <property value="36.6471">fsim/tables/ps_full_ms/h0/w1/v15</property>
      <property value="209.557">fsim/tables/ps_full_ms/h0/w1/v2</property>
      <property value="227.481">fsim/tables/ps_full_ms/h0/w1/v3</property>
      <property value="245.119">fsim/tables/ps_full_ms/h0/w1/v4</property>
      <property value="262.466">fsim/tables/ps_full_ms/h0/w1/v5</property>
      <property value="279.586">fsim/tables/ps_full_ms/h0/w1/v6</property>
      <property value="296.734">fsim/tables/ps_full_ms/h0/w1/v7</property>
      <property value="313.48">fsim/tables/ps_full_ms/h0/w1/v8</property>
      <property value="325.246">fsim/tables/ps_full_ms/h0/w1/v9</property>
      <property value="135.129">fsim/tables/ps_full_ms/h0/w2/v0</property>
      <property value="151.781">fsim/tables/ps_full_ms/h0/w2/v1</property>
      <property value="273.884">fsim/tables/ps_full_ms/h0/w2/v10</property>
      <property value="238.329">fsim/tables/ps_full_ms/h0/w2/v11</property>
      <property value="132.562">fsim/tables/ps_full_ms/h0/w2/v12</property>
      <property value="83.2907">fsim/tables/ps_full_ms/h0/w2/v13</property>
      <property value="59.2154">fsim/tables/ps_full_ms/h0/w2/v14</property>
      <property value="30.4577">fsim/tables/ps_full_ms/h0/w2/v15</property>
      <property value="167.749">fsim/tables/ps_full_ms/h0/w2/v2</property>
      <property value="183.36">fsim/tables/ps_full_ms/h0/w2/v3</property>
      <property value="198.795">fsim/tables/ps_full_ms/h0/w2/v4</property>
      <property value="214.006">fsim/tables/ps_full_ms/h0/w2/v5</property>
      <property value="228.915">fsim/tables/ps_full_ms/h0/w2/v6</property>
      <property value="243.848">fsim/tables/ps_full_ms/h0/w2/v7</property>
      <property value="258.905">fsim/tables/ps_full_ms/h0/w2/v8</property>
      <property value="272.393">fsim/tables/ps_full_ms/h0/w2/v9</property>
      <property value="151.569">fsim/tables/ps_full_ms/h1/w0/v0</property>
      <property value="178.313">fsim/tables/ps_full_ms/h1/w0/v1</property>
      <property value="172.576">fsim/tables/ps_full_ms/h1/w0/v10</property>
      <property value="148.068">fsim/tables/ps_full_ms/h1/w0/v11</property>
      <property value="124.642">fsim/tables/ps_full_ms/h1/w0/v12</property>
      <property value="101.846">fsim/tables/ps_full_ms/h1/w0/v13</property>
      <property value="73.7392">fsim/tables/ps_full_ms/h1/w0/v14</property>
      <property value="41.2165">fsim/tables/ps_full_ms/h1/w0/v15</property>
      <property value="201.382">fsim/tables/ps_full_ms/h1/w0/v2</property>
      <property value="223.426">fsim/tables/ps_full_ms/h1/w0/v3</property>
      <property value="244.767">fsim/tables/ps_full_ms/h1/w0/v4</property>
      <property value="265.73">fsim/tables/ps_full_ms/h1/w0/v5</property>
      <property value="286.828">fsim/tables/ps_full_ms/h1/w0/v6</property>
      <property value="306.795">fsim/tables/ps_full_ms/h1/w0/v7</property>
      <property value="311.404">fsim/tables/ps_full_ms/h1/w0/v8</property>
      <property value="267.519">fsim/tables/ps_full_ms/h1/w0/v9</property>
      <property value="128.877">fsim/tables/ps_full_ms/h1/w1/v0</property>
      <property value="147.398">fsim/tables/ps_full_ms/h1/w1/v1</property>
      <property value="133.133">fsim/tables/ps_full_ms/h1/w1/v10</property>
      <property value="116.223">fsim/tables/ps_full_ms/h1/w1/v11</property>
      <property value="96.1444">fsim/tables/ps_full_ms/h1/w1/v12</property>
      <property value="78.1097">fsim/tables/ps_full_ms/h1/w1/v13</property>
      <property value="55.407">fsim/tables/ps_full_ms/h1/w1/v14</property>
      <property value="30.2771">fsim/tables/ps_full_ms/h1/w1/v15</property>
      <property value="165.271">fsim/tables/ps_full_ms/h1/w1/v2</property>
      <property value="183.048">fsim/tables/ps_full_ms/h1/w1/v3</property>
      <property value="200.656">fsim/tables/ps_full_ms/h1/w1/v4</property>
      <property value="218.062">fsim/tables/ps_full_ms/h1/w1/v5</property>
      <property value="235.745">fsim/tables/ps_full_ms/h1/w1/v6</property>
      <property value="252.542">fsim/tables/ps_full_ms/h1/w1/v7</property>
      <property value="255.601">fsim/tables/ps_full_ms/h1/w1/v8</property>
      <property value="210.319">fsim/tables/ps_full_ms/h1/w1/v9</property>
      <property value="101.688">fsim/tables/ps_full_ms/h1/w2/v0</property>
      <property value="118.16">fsim/tables/ps_full_ms/h1/w2/v1</property>
      <property value="112.748">fsim/tables/ps_full_ms/h1/w2/v10</property>
      <property value="97.2051">fsim/tables/ps_full_ms/h1/w2/v11</property>
      <property value="80.3627">fsim/tables/ps_full_ms/h1/w2/v12</property>
      <property value="64.3668">fsim/tables/ps_full_ms/h1/w2/v13</property>
      <property value="45.0925">fsim/tables/ps_full_ms/h1/w2/v14</property>
      <property value="23.3972">fsim/tables/ps_full_ms/h1/w2/v15</property>
      <property value="133.4">fsim/tables/ps_full_ms/h1/w2/v2</property>
      <property value="148.479">fsim/tables/ps_full_ms/h1/w2/v3</property>
      <property value="163.491">fsim/tables/ps_full_ms/h1/w2/v4</property>
      <property value="178.159">fsim/tables/ps_full_ms/h1/w2/v5</property>
      <property value="193.525">fsim/tables/ps_full_ms/h1/w2/v6</property>
      <property value="208.988">fsim/tables/ps_full_ms/h1/w2/v7</property>
      <property value="216.97">fsim/tables/ps_full_ms/h1/w2/v8</property>
      <property value="188.101">fsim/tables/ps_full_ms/h1/w2/v9</property>
      <property value="95.1959">fsim/tables/ps_full_ms/h2/w0/v0</property>
      <property value="136.128">fsim/tables/ps_full_ms/h2/w0/v1</property>
      <property value="140.579">fsim/tables/ps_full_ms/h2/w0/v10</property>
      <property value="129.653">fsim/tables/ps_full_ms/h2/w0/v11</property>
      <property value="113.281">fsim/tables/ps_full_ms/h2/w0/v12</property>
      <property value="95.7555">fsim/tables/ps_full_ms/h2/w0/v13</property>
      <property value="75.111">fsim/tables/ps_full_ms/h2/w0/v14</property>
      <property value="40.7627">fsim/tables/ps_full_ms/h2/w0/v15</property>
      <property value="157.802">fsim/tables/ps_full_ms/h2/w0/v2</property>
      <property value="177.081">fsim/tables/ps_full_ms/h2/w0/v3</property>
      <property value="196.124">fsim/tables/ps_full_ms/h2/w0/v4</property>
      <property value="216.461">fsim/tables/ps_full_ms/h2/w0/v5</property>
      <property value="235.781">fsim/tables/ps_full_ms/h2/w0/v6</property>
      <property value="226.911">fsim/tables/ps_full_ms/h2/w0/v7</property>
      <property value="165.075">fsim/tables/ps_full_ms/h2/w0/v8</property>
      <property value="151.965">fsim/tables/ps_full_ms/h2/w0/v9</property>
      <property value="94.9393">fsim/tables/ps_full_ms/h2/w1/v0</property>
      <property value="112.441">fsim/tables/ps_full_ms/h2/w1/v1</property>
      <property value="109.693">fsim/tables/ps_full_ms/h2/w1/v10</property>
      <property value="100.39">fsim/tables/ps_full_ms/h2/w1/v11</property>
      <property value="86.9876">fsim/tables/ps_full_ms/h2/w1/v12</property>
      <property value="73.1127">fsim/tables/ps_full_ms/h2/w1/v13</property>
      <property value="56.4024">fsim/tables/ps_full_ms/h2/w1/v14</property>
      <property value="32.8603">fsim/tables/ps_full_ms/h2/w1/v15</property>
      <property value="129.33">fsim/tables/ps_full_ms/h2/w1/v2</property>
      <property value="146.124">fsim/tables/ps_full_ms/h2/w1/v3</property>
      <property value="162.737">fsim/tables/ps_full_ms/h2/w1/v4</property>
      <property value="180.159">fsim/tables/ps_full_ms/h2/w1/v5</property>
      <property value="194.402">fsim/tables/ps_full_ms/h2/w1/v6</property>
      <property value="174.477">fsim/tables/ps_full_ms/h2/w1/v7</property>
      <property value="127.391">fsim/tables/ps_full_ms/h2/w1/v8</property>
      <property value="119.282">fsim/tables/ps_full_ms/h2/w1/v9</property>
      <property value="74.7157">fsim/tables/ps_full_ms/h2/w2/v0</property>
      <property value="90.5099">fsim/tables/ps_full_ms/h2/w2/v1</property>
      <property value="87.6839">fsim/tables/ps_full_ms/h2/w2/v10</property>
      <property value="81">fsim/tables/ps_full_ms/h2/w2/v11</property>
      <property value="70.0251">fsim/tables/ps_full_ms/h2/w2/v12</property>
      <property value="59.0854">fsim/tables/ps_full_ms/h2/w2/v13</property>
      <property value="44.9109">fsim/tables/ps_full_ms/h2/w2/v14</property>
      <property value="27.3779">fsim/tables/ps_full_ms/h2/w2/v15</property>
      <property value="104.691">fsim/tables/ps_full_ms/h2/w2/v2</property>
      <property value="118.869">fsim/tables/ps_full_ms/h2/w2/v3</property>
      <property value="132.842">fsim/tables/ps_full_ms/h2/w2/v4</property>
      <property value="147.986">fsim/tables/ps_full_ms/h2/w2/v5</property>
      <property value="161.304">fsim/tables/ps_full_ms/h2/w2/v6</property>
      <property value="149.221">fsim/tables/ps_full_ms/h2/w2/v7</property>
      <property value="104.498">fsim/tables/ps_full_ms/h2/w2/v8</property>
      <property value="97.2578">fsim/tables/ps_full_ms/h2/w2/v9</property>
      <property value="46.4164">fsim/tables/ps_full_ms/h3/w0/v0</property>
      <property value="108.168">fsim/tables/ps_full_ms/h3/w0/v1</property>
      <property value="122.032">fsim/tables/ps_full_ms/h3/w0/v10</property>
      <property value="117.603">fsim/tables/ps_full_ms/h3/w0/v11</property>
      <property value="108.042">fsim/tables/ps_full_ms/h3/w0/v12</property>
      <property value="94.8874">fsim/tables/ps_full_ms/h3/w0/v13</property>
      <property value="72.2225">fsim/tables/ps_full_ms/h3/w0/v14</property>
      <property value="29.6864">fsim/tables/ps_full_ms/h3/w0/v15</property>
      <property value="124.534">fsim/tables/ps_full_ms/h3/w0/v2</property>
      <property value="140.516">fsim/tables/ps_full_ms/h3/w0/v3</property>
      <property value="159.098">fsim/tables/ps_full_ms/h3/w0/v4</property>
      <property value="170.674">fsim/tables/ps_full_ms/h3/w0/v5</property>
      <property value="135.927">fsim/tables/ps_full_ms/h3/w0/v6</property>
      <property value="129.537">fsim/tables/ps_full_ms/h3/w0/v7</property>
      <property value="125.587">fsim/tables/ps_full_ms/h3/w0/v8</property>
      <property value="124.925">fsim/tables/ps_full_ms/h3/w0/v9</property>
      <property value="67.5195">fsim/tables/ps_full_ms/h3/w1/v0</property>
      <property value="84.2614">fsim/tables/ps_full_ms/h3/w1/v1</property>
      <property value="88.1641">fsim/tables/ps_full_ms/h3/w1/v10</property>
      <property value="85.8844">fsim/tables/ps_full_ms/h3/w1/v11</property>
      <property value="80.3765">fsim/tables/ps_full_ms/h3/w1/v12</property>
      <property value="71.2899">fsim/tables/ps_full_ms/h3/w1/v13</property>
      <property value="56.0135">fsim/tables/ps_full_ms/h3/w1/v14</property>
      <property value="23.7403">fsim/tables/ps_full_ms/h3/w1/v15</property>
      <property value="99.9761">fsim/tables/ps_full_ms/h3/w1/v2</property>
      <property value="115.577">fsim/tables/ps_full_ms/h3/w1/v3</property>
      <property value="131.741">fsim/tables/ps_full_ms/h3/w1/v4</property>
      <property value="133.137">fsim/tables/ps_full_ms/h3/w1/v5</property>
      <property value="103.661">fsim/tables/ps_full_ms/h3/w1/v6</property>
      <property value="97.194">fsim/tables/ps_full_ms/h3/w1/v7</property>
      <property value="94.5093">fsim/tables/ps_full_ms/h3/w1/v8</property>
      <property value="91.2242">fsim/tables/ps_full_ms/h3/w1/v9</property>
      <property value="51.6206">fsim/tables/ps_full_ms/h3/w2/v0</property>
      <property value="67.0066">fsim/tables/ps_full_ms/h3/w2/v1</property>
      <property value="64.8366">fsim/tables/ps_full_ms/h3/w2/v10</property>
      <property value="63.8642">fsim/tables/ps_full_ms/h3/w2/v11</property>
      <property value="59.7749">fsim/tables/ps_full_ms/h3/w2/v12</property>
      <property value="52.2808">fsim/tables/ps_full_ms/h3/w2/v13</property>
      <property value="42.3188">fsim/tables/ps_full_ms/h3/w2/v14</property>
      <property value="21.0167">fsim/tables/ps_full_ms/h3/w2/v15</property>
      <property value="79.9916">fsim/tables/ps_full_ms/h3/w2/v2</property>
      <property value="92.9333">fsim/tables/ps_full_ms/h3/w2/v3</property>
      <property value="106.591">fsim/tables/ps_full_ms/h3/w2/v4</property>
      <property value="110.536">fsim/tables/ps_full_ms/h3/w2/v5</property>
      <property value="82.5046">fsim/tables/ps_full_ms/h3/w2/v6</property>
      <property value="76.446">fsim/tables/ps_full_ms/h3/w2/v7</property>
      <property value="72.0399">fsim/tables/ps_full_ms/h3/w2/v8</property>
      <property value="68.1812">fsim/tables/ps_full_ms/h3/w2/v9</property>
      <property value="42.617">fsim/tables/ps_full_ms/h4/w0/v0</property>
      <property value="105.465">fsim/tables/ps_full_ms/h4/w0/v1</property>
      <property value="119.714">fsim/tables/ps_full_ms/h4/w0/v10</property>
      <property value="116.313">fsim/tables/ps_full_ms/h4/w0/v11</property>
      <property value="106.972">fsim/tables/ps_full_ms/h4/w0/v12</property>
      <property value="93.9863">fsim/tables/ps_full_ms/h4/w0/v13</property>
      <property value="69.4892">fsim/tables/ps_full_ms/h4/w0/v14</property>
      <property value="35.7">fsim/tables/ps_full_ms/h4/w0/v15</property>
      <property value="120.547">fsim/tables/ps_full_ms/h4/w0/v2</property>
      <property value="136.352">fsim/tables/ps_full_ms/h4/w0/v3</property>
      <property value="155.157">fsim/tables/ps_full_ms/h4/w0/v4</property>
      <property value="161.482">fsim/tables/ps_full_ms/h4/w0/v5</property>
      <property value="129.378">fsim/tables/ps_full_ms/h4/w0/v6</property>
      <property value="123.871">fsim/tables/ps_full_ms/h4/w0/v7</property>
      <property value="122.703">fsim/tables/ps_full_ms/h4/w0/v8</property>
      <property value="121.297">fsim/tables/ps_full_ms/h4/w0/v9</property>
      <property value="64.9265">fsim/tables/ps_full_ms/h4/w1/v0</property>
      <property value="81.7114">fsim/tables/ps_full_ms/h4/w1/v1</property>
      <property value="86.4482">fsim/tables/ps_full_ms/h4/w1/v10</property>
      <property value="83.5489">fsim/tables/ps_full_ms/h4/w1/v11</property>
      <property value="77.1086">fsim/tables/ps_full_ms/h4/w1/v12</property>
      <property value="67.4439">fsim/tables/ps_full_ms/h4/w1/v13</property>
      <property value="49.2674">fsim/tables/ps_full_ms/h4/w1/v14</property>
      <property value="23.303">fsim/tables/ps_full_ms/h4/w1/v15</property>
      <property value="97.4927">fsim/tables/ps_full_ms/h4/w1/v2</property>
      <property value="113.221">fsim/tables/ps_full_ms/h4/w1/v3</property>
      <property value="129.055">fsim/tables/ps_full_ms/h4/w1/v4</property>
      <property value="120.761">fsim/tables/ps_full_ms/h4/w1/v5</property>
      <property value="98.8914">fsim/tables/ps_full_ms/h4/w1/v6</property>
      <property value="91.8515">fsim/tables/ps_full_ms/h4/w1/v7</property>
      <property value="91.1598">fsim/tables/ps_full_ms/h4/w1/v8</property>
      <property value="87.2149">fsim/tables/ps_full_ms/h4/w1/v9</property>
      <property value="49.3564">fsim/tables/ps_full_ms/h4/w2/v0</property>
      <property value="64.7848">fsim/tables/ps_full_ms/h4/w2/v1</property>
      <property value="63.1935">fsim/tables/ps_full_ms/h4/w2/v10</property>
      <property value="61.9773">fsim/tables/ps_full_ms/h4/w2/v11</property>
      <property value="57.2007">fsim/tables/ps_full_ms/h4/w2/v12</property>
      <property value="49.2855">fsim/tables/ps_full_ms/h4/w2/v13</property>
      <property value="37.5423">fsim/tables/ps_full_ms/h4/w2/v14</property>
      <property value="17.8895">fsim/tables/ps_full_ms/h4/w2/v15</property>
      <property value="77.8424">fsim/tables/ps_full_ms/h4/w2/v2</property>
      <property value="90.8824">fsim/tables/ps_full_ms/h4/w2/v3</property>
      <property value="104.346">fsim/tables/ps_full_ms/h4/w2/v4</property>
      <property value="100.847">fsim/tables/ps_full_ms/h4/w2/v5</property>
      <property value="77.7755">fsim/tables/ps_full_ms/h4/w2/v6</property>
      <property value="70.9467">fsim/tables/ps_full_ms/h4/w2/v7</property>
      <property value="69.059">fsim/tables/ps_full_ms/h4/w2/v8</property>
      <property value="64.7781">fsim/tables/ps_full_ms/h4/w2/v9</property>
      <property value="21.8023">fsim/tables/ps_full_ms/h5/w0/v0</property>
      <property value="72.833">fsim/tables/ps_full_ms/h5/w0/v1</property>
      <property value="72.2217">fsim/tables/ps_full_ms/h5/w0/v10</property>
      <property value="70.2525">fsim/tables/ps_full_ms/h5/w0/v11</property>
      <property value="64.673">fsim/tables/ps_full_ms/h5/w0/v12</property>
      <property value="56.1368">fsim/tables/ps_full_ms/h5/w0/v13</property>
      <property value="40.4426">fsim/tables/ps_full_ms/h5/w0/v14</property>
      <property value="19.1207">fsim/tables/ps_full_ms/h5/w0/v15</property>
      <property value="80.4043">fsim/tables/ps_full_ms/h5/w0/v2</property>
      <property value="93.6817">fsim/tables/ps_full_ms/h5/w0/v3</property>
      <property value="108.934">fsim/tables/ps_full_ms/h5/w0/v4</property>
      <property value="102.555">fsim/tables/ps_full_ms/h5/w0/v5</property>
      <property value="82.1666">fsim/tables/ps_full_ms/h5/w0/v6</property>
      <property value="75.1871">fsim/tables/ps_full_ms/h5/w0/v7</property>
      <property value="76.1796">fsim/tables/ps_full_ms/h5/w0/v8</property>
      <property value="71.7258">fsim/tables/ps_full_ms/h5/w0/v9</property>
      <property value="38.8466">fsim/tables/ps_full_ms/h5/w1/v0</property>
      <property value="51.417">fsim/tables/ps_full_ms/h5/w1/v1</property>
      <property value="46.308">fsim/tables/ps_full_ms/h5/w1/v10</property>
      <property value="45.4937">fsim/tables/ps_full_ms/h5/w1/v11</property>
      <property value="43.1676">fsim/tables/ps_full_ms/h5/w1/v12</property>
      <property value="37.4987">fsim/tables/ps_full_ms/h5/w1/v13</property>
      <property value="29.5728">fsim/tables/ps_full_ms/h5/w1/v14</property>
      <property value="14.7872">fsim/tables/ps_full_ms/h5/w1/v15</property>
      <property value="62.9486">fsim/tables/ps_full_ms/h5/w1/v2</property>
      <property value="74.6785">fsim/tables/ps_full_ms/h5/w1/v3</property>
      <property value="86.1688">fsim/tables/ps_full_ms/h5/w1/v4</property>
      <property value="75.8629">fsim/tables/ps_full_ms/h5/w1/v5</property>
      <property value="59.6407">fsim/tables/ps_full_ms/h5/w1/v6</property>
      <property value="51.2187">fsim/tables/ps_full_ms/h5/w1/v7</property>
      <property value="49.9588">fsim/tables/ps_full_ms/h5/w1/v8</property>
      <property value="46.9814">fsim/tables/ps_full_ms/h5/w1/v9</property>
      <property value="25.4706">fsim/tables/ps_full_ms/h5/w2/v0</property>
      <property value="37.1918">fsim/tables/ps_full_ms/h5/w2/v1</property>
      <property value="23.0108">fsim/tables/ps_full_ms/h5/w2/v10</property>
      <property value="26.3519">fsim/tables/ps_full_ms/h5/w2/v11</property>
      <property value="27.1627">fsim/tables/ps_full_ms/h5/w2/v12</property>
      <property value="23.9218">fsim/tables/ps_full_ms/h5/w2/v13</property>
      <property value="18.2878">fsim/tables/ps_full_ms/h5/w2/v14</property>
      <property value="11.1399">fsim/tables/ps_full_ms/h5/w2/v15</property>
      <property value="46.8817">fsim/tables/ps_full_ms/h5/w2/v2</property>
      <property value="57.0356">fsim/tables/ps_full_ms/h5/w2/v3</property>
      <property value="66.7671">fsim/tables/ps_full_ms/h5/w2/v4</property>
      <property value="60.6379">fsim/tables/ps_full_ms/h5/w2/v5</property>
      <property value="43.6109">fsim/tables/ps_full_ms/h5/w2/v6</property>
      <property value="34.3662">fsim/tables/ps_full_ms/h5/w2/v7</property>
      <property value="27.9711">fsim/tables/ps_full_ms/h5/w2/v8</property>
      <property value="25.6373">fsim/tables/ps_full_ms/h5/w2/v9</property>
      <property value="12.6226">fsim/tables/ps_full_ms/h6/w0/v0</property>
      <property value="41.8515">fsim/tables/ps_full_ms/h6/w0/v1</property>
      <property value="33.4168">fsim/tables/ps_full_ms/h6/w0/v10</property>
      <property value="34.1321">fsim/tables/ps_full_ms/h6/w0/v11</property>
      <property value="32.6173">fsim/tables/ps_full_ms/h6/w0/v12</property>
      <property value="28.2524">fsim/tables/ps_full_ms/h6/w0/v13</property>
      <property value="21.6663">fsim/tables/ps_full_ms/h6/w0/v14</property>
      <property value="12.3823">fsim/tables/ps_full_ms/h6/w0/v15</property>
      <property value="50.1989">fsim/tables/ps_full_ms/h6/w0/v2</property>
      <property value="62.334">fsim/tables/ps_full_ms/h6/w0/v3</property>
      <property value="73.217">fsim/tables/ps_full_ms/h6/w0/v4</property>
      <property value="70.7023">fsim/tables/ps_full_ms/h6/w0/v5</property>
      <property value="49.3748">fsim/tables/ps_full_ms/h6/w0/v6</property>
      <property value="43.8561">fsim/tables/ps_full_ms/h6/w0/v7</property>
      <property value="36.9969">fsim/tables/ps_full_ms/h6/w0/v8</property>
      <property value="35.6744">fsim/tables/ps_full_ms/h6/w0/v9</property>
      <property value="16.4096">fsim/tables/ps_full_ms/h6/w1/v0</property>
      <property value="25.9086">fsim/tables/ps_full_ms/h6/w1/v1</property>
      <property value="7.36319">fsim/tables/ps_full_ms/h6/w1/v10</property>
      <property value="6.75845">fsim/tables/ps_full_ms/h6/w1/v11</property>
      <property value="9.38139">fsim/tables/ps_full_ms/h6/w1/v12</property>
      <property value="10.6353">fsim/tables/ps_full_ms/h6/w1/v13</property>
      <property value="8.26295">fsim/tables/ps_full_ms/h6/w1/v14</property>
      <property value="3.30038">fsim/tables/ps_full_ms/h6/w1/v15</property>
      <property value="35.098">fsim/tables/ps_full_ms/h6/w1/v2</property>
      <property value="45.1179">fsim/tables/ps_full_ms/h6/w1/v3</property>
      <property value="53.2734">fsim/tables/ps_full_ms/h6/w1/v4</property>
      <property value="51.1809">fsim/tables/ps_full_ms/h6/w1/v5</property>
      <property value="33.0256">fsim/tables/ps_full_ms/h6/w1/v6</property>
      <property value="23.5032">fsim/tables/ps_full_ms/h6/w1/v7</property>
      <property value="13.4597">fsim/tables/ps_full_ms/h6/w1/v8</property>
      <property value="10.7342">fsim/tables/ps_full_ms/h6/w1/v9</property>
      <property value="9.00668">fsim/tables/ps_full_ms/h6/w2/v0</property>
      <property value="11.1532">fsim/tables/ps_full_ms/h6/w2/v1</property>
      <property value="36.022">fsim/tables/ps_full_ms/h6/w2/v10</property>
      <property value="29.7446">fsim/tables/ps_full_ms/h6/w2/v11</property>
      <property value="20.2622">fsim/tables/ps_full_ms/h6/w2/v12</property>
      <property value="16.0879">fsim/tables/ps_full_ms/h6/w2/v13</property>
      <property value="11.5908">fsim/tables/ps_full_ms/h6/w2/v14</property>
      <property value="7.43514">fsim/tables/ps_full_ms/h6/w2/v15</property>
      <property value="14.9261">fsim/tables/ps_full_ms/h6/w2/v2</property>
      <property value="19.6491">fsim/tables/ps_full_ms/h6/w2/v3</property>
      <property value="23.6465">fsim/tables/ps_full_ms/h6/w2/v4</property>
      <property value="27.2912">fsim/tables/ps_full_ms/h6/w2/v5</property>
      <property value="30.8626">fsim/tables/ps_full_ms/h6/w2/v6</property>
      <property value="34.2825">fsim/tables/ps_full_ms/h6/w2/v7</property>
      <property value="36.9612">fsim/tables/ps_full_ms/h6/w2/v8</property>
      <property value="37.914">fsim/tables/ps_full_ms/h6/w2/v9</property>
      <property value="4.50066">fsim/tables/ps_full_ms/h7/w0/v0</property>
      <property value="20.9609">fsim/tables/ps_full_ms/h7/w0/v1</property>
      <property value="1.68698">fsim/tables/ps_full_ms/h7/w0/v10</property>
      <property value="4.06977">fsim/tables/ps_full_ms/h7/w0/v11</property>
      <property value="5.72247">fsim/tables/ps_full_ms/h7/w0/v12</property>
      <property value="7.37517">fsim/tables/ps_full_ms/h7/w0/v13</property>
      <property value="6.24832">fsim/tables/ps_full_ms/h7/w0/v14</property>
      <property value="2.70343">fsim/tables/ps_full_ms/h7/w0/v15</property>
      <property value="31.8736">fsim/tables/ps_full_ms/h7/w0/v2</property>
      <property value="41.2124">fsim/tables/ps_full_ms/h7/w0/v3</property>
      <property value="47.3962">fsim/tables/ps_full_ms/h7/w0/v4</property>
      <property value="43.5849">fsim/tables/ps_full_ms/h7/w0/v5</property>
      <property value="28.2405">fsim/tables/ps_full_ms/h7/w0/v6</property>
      <property value="18.4046">fsim/tables/ps_full_ms/h7/w0/v7</property>
      <property value="7.84693">fsim/tables/ps_full_ms/h7/w0/v8</property>
      <property value="5.29663">fsim/tables/ps_full_ms/h7/w0/v9</property>
      <property value="20.4371">fsim/tables/ps_full_ms/h7/w1/v0</property>
      <property value="22.1502">fsim/tables/ps_full_ms/h7/w1/v1</property>
      <property value="24.2366">fsim/tables/ps_full_ms/h7/w1/v10</property>
      <property value="22.1756">fsim/tables/ps_full_ms/h7/w1/v11</property>
      <property value="18.2681">fsim/tables/ps_full_ms/h7/w1/v12</property>
      <property value="14.2596">fsim/tables/ps_full_ms/h7/w1/v13</property>
      <property value="10.2511">fsim/tables/ps_full_ms/h7/w1/v14</property>
      <property value="6.61124">fsim/tables/ps_full_ms/h7/w1/v15</property>
      <property value="23.8633">fsim/tables/ps_full_ms/h7/w1/v2</property>
      <property value="25.5765">fsim/tables/ps_full_ms/h7/w1/v3</property>
      <property value="27.2896">fsim/tables/ps_full_ms/h7/w1/v4</property>
      <property value="29.0027">fsim/tables/ps_full_ms/h7/w1/v5</property>
      <property value="30.7159">fsim/tables/ps_full_ms/h7/w1/v6</property>
      <property value="30.4196">fsim/tables/ps_full_ms/h7/w1/v7</property>
      <property value="28.3586">fsim/tables/ps_full_ms/h7/w1/v8</property>
      <property value="26.2976">fsim/tables/ps_full_ms/h7/w1/v9</property>
      <property value="10.7974">fsim/tables/ps_full_ms/h7/w2/v0</property>
      <property value="11.0114">fsim/tables/ps_full_ms/h7/w2/v1</property>
      <property value="12.9373">fsim/tables/ps_full_ms/h7/w2/v10</property>
      <property value="13.1513">fsim/tables/ps_full_ms/h7/w2/v11</property>
      <property value="13.3653">fsim/tables/ps_full_ms/h7/w2/v12</property>
      <property value="13.2344">fsim/tables/ps_full_ms/h7/w2/v13</property>
      <property value="11.8225">fsim/tables/ps_full_ms/h7/w2/v14</property>
      <property value="9.30972">fsim/tables/ps_full_ms/h7/w2/v15</property>
      <property value="11.2254">fsim/tables/ps_full_ms/h7/w2/v2</property>
      <property value="11.4394">fsim/tables/ps_full_ms/h7/w2/v3</property>
      <property value="11.6534">fsim/tables/ps_full_ms/h7/w2/v4</property>
      <property value="11.8673">fsim/tables/ps_full_ms/h7/w2/v5</property>
      <property value="12.0813">fsim/tables/ps_full_ms/h7/w2/v6</property>
      <property value="12.2953">fsim/tables/ps_full_ms/h7/w2/v7</property>
      <property value="12.5093">fsim/tables/ps_full_ms/h7/w2/v8</property>
      <property value="12.7233">fsim/tables/ps_full_ms/h7/w2/v9</property>
      <property value="-35.1423">fsim/tables/ps_idle_ms/h0/w0/v0</property>
      <property value="-42.0094">fsim/tables/ps_idle_ms/h0/w0/v1</property>
      <property value="-297.516">fsim/tables/ps_idle_ms/h0/w0/v10</property>
      <property value="-419.049">fsim/tables/ps_idle_ms/h0/w0/v11</property>
      <property value="-509.418">fsim/tables/ps_idle_ms/h0/w0/v12</property>
      <property value="-562.893">fsim/tables/ps_idle_ms/h0/w0/v13</property>
      <property value="-597.883">fsim/tables/ps_idle_ms/h0/w0/v14</property>
      <property value="-623.727">fsim/tables/ps_idle_ms/h0/w0/v15</property>
      <property value="-49.6503">fsim/tables/ps_idle_ms/h0/w0/v2</property>
      <property value="-58.0887">fsim/tables/ps_idle_ms/h0/w0/v3</property>
      <property value="-67.3454">fsim/tables/ps_idle_ms/h0/w0/v4</property>
      <property value="-77.9282">fsim/tables/ps_idle_ms/h0/w0/v5</property>
      <property value="-89.8373">fsim/tables/ps_idle_ms/h0/w0/v6</property>
      <property value="-103.596">fsim/tables/ps_idle_ms/h0/w0/v7</property>
      <property value="-121.511">fsim/tables/ps_idle_ms/h0/w0/v8</property>
      <property value="-168.63">fsim/tables/ps_idle_ms/h0/w0/v9</property>
      <property value="-16.0703">fsim/tables/ps_idle_ms/h0/w1/v0</property>
      <property value="-19.6709">fsim/tables/ps_idle_ms/h0/w1/v1</property>
      <property value="-119.804">fsim/tables/ps_idle_ms/h0/w1/v10</property>
      <property value="-229.245">fsim/tables/ps_idle_ms/h0/w1/v11</property>
      <property value="-360.073">fsim/tables/ps_idle_ms/h0/w1/v12</property>
      <property value="-452.041">fsim/tables/ps_idle_ms/h0/w1/v13</property>
      <property value="-496.12">fsim/tables/ps_idle_ms/h0/w1/v14</property>
      <property value="-522.774">fsim/tables/ps_idle_ms/h0/w1/v15</property>
      <property value="-24.4723">fsim/tables/ps_idle_ms/h0/w1/v2</property>
      <property value="-30.047">fsim/tables/ps_idle_ms/h0/w1/v3</property>
      <property value="-36.9564">fsim/tables/ps_idle_ms/h0/w1/v4</property>
      <property value="-45.111">fsim/tables/ps_idle_ms/h0/w1/v5</property>
      <property value="-54.2999">fsim/tables/ps_idle_ms/h0/w1/v6</property>
      <property value="-64.4958">fsim/tables/ps_idle_ms/h0/w1/v7</property>
      <property value="-76.081">fsim/tables/ps_idle_ms/h0/w1/v8</property>
      <property value="-91.0763">fsim/tables/ps_idle_ms/h0/w1/v9</property>
      <property value="-14.6134">fsim/tables/ps_idle_ms/h0/w2/v0</property>
      <property value="-17.017">fsim/tables/ps_idle_ms/h0/w2/v1</property>
      <property value="-92.9779">fsim/tables/ps_idle_ms/h0/w2/v10</property>
      <property value="-164.593">fsim/tables/ps_idle_ms/h0/w2/v11</property>
      <property value="-293.775">fsim/tables/ps_idle_ms/h0/w2/v12</property>
      <property value="-377.541">fsim/tables/ps_idle_ms/h0/w2/v13</property>
      <property value="-426.25">fsim/tables/ps_idle_ms/h0/w2/v14</property>
      <property value="-450.199">fsim/tables/ps_idle_ms/h0/w2/v15</property>
      <property value="-20.5254">fsim/tables/ps_idle_ms/h0/w2/v2</property>
      <property value="-24.9556">fsim/tables/ps_idle_ms/h0/w2/v3</property>
      <property value="-30.3773">fsim/tables/ps_idle_ms/h0/w2/v4</property>
      <property value="-36.6571">fsim/tables/ps_idle_ms/h0/w2/v5</property>
      <property value="-44.4467">fsim/tables/ps_idle_ms/h0/w2/v6</property>
      <property value="-53.1897">fsim/tables/ps_idle_ms/h0/w2/v7</property>
      <property value="-62.8119">fsim/tables/ps_idle_ms/h0/w2/v8</property>
      <property value="-74.4028">fsim/tables/ps_idle_ms/h0/w2/v9</property>
      <property value="-14.1221">fsim/tables/ps_idle_ms/h1/w0/v0</property>
      <property value="-16.8188">fsim/tables/ps_idle_ms/h1/w0/v1</property>
      <property value="-310.558">fsim/tables/ps_idle_ms/h1/w0/v10</property>
      <property value="-390.475">fsim/tables/ps_idle_ms/h1/w0/v11</property>
      <property value="-458.307">fsim/tables/ps_idle_ms/h1/w0/v12</property>
      <property value="-530.118">fsim/tables/ps_idle_ms/h1/w0/v13</property>
      <property value="-584.508">fsim/tables/ps_idle_ms/h1/w0/v14</property>
      <property value="-616.16">fsim/tables/ps_idle_ms/h1/w0/v15</property>
      <property value="-21.0894">fsim/tables/ps_idle_ms/h1/w0/v2</property>
      <property value="-26.8757">fsim/tables/ps_idle_ms/h1/w0/v3</property>
      <property value="-33.8412">fsim/tables/ps_idle_ms/h1/w0/v4</property>
      <property value="-42.8264">fsim/tables/ps_idle_ms/h1/w0/v5</property>
      <property value="-53.3255">fsim/tables/ps_idle_ms/h1/w0/v6</property>
      <property value="-65.6184">fsim/tables/ps_idle_ms/h1/w0/v7</property>
      <property value="-84.676">fsim/tables/ps_idle_ms/h1/w0/v8</property>
      <property value="-181.881">fsim/tables/ps_idle_ms/h1/w0/v9</property>
      <property value="-15.7114">fsim/tables/ps_idle_ms/h1/w1/v0</property>
      <property value="-18.0017">fsim/tables/ps_idle_ms/h1/w1/v1</property>
      <property value="-265.478">fsim/tables/ps_idle_ms/h1/w1/v10</property>
      <property value="-323.87">fsim/tables/ps_idle_ms/h1/w1/v11</property>
      <property value="-377.741">fsim/tables/ps_idle_ms/h1/w1/v12</property>
      <property value="-433.51">fsim/tables/ps_idle_ms/h1/w1/v13</property>
      <property value="-485.994">fsim/tables/ps_idle_ms/h1/w1/v14</property>
      <property value="-511.186">fsim/tables/ps_idle_ms/h1/w1/v15</property>
      <property value="-21.5134">fsim/tables/ps_idle_ms/h1/w1/v2</property>
      <property value="-26.1228">fsim/tables/ps_idle_ms/h1/w1/v3</property>
      <property value="-32.0797">fsim/tables/ps_idle_ms/h1/w1/v4</property>
      <property value="-38.9681">fsim/tables/ps_idle_ms/h1/w1/v5</property>
      <property value="-47.6329">fsim/tables/ps_idle_ms/h1/w1/v6</property>
      <property value="-57.9091">fsim/tables/ps_idle_ms/h1/w1/v7</property>
      <property value="-77.0341">fsim/tables/ps_idle_ms/h1/w1/v8</property>
      <property value="-165.577">fsim/tables/ps_idle_ms/h1/w1/v9</property>
      <property value="-16.5255">fsim/tables/ps_idle_ms/h1/w2/v0</property>
      <property value="-17.6261">fsim/tables/ps_idle_ms/h1/w2/v1</property>
      <property value="-217.348">fsim/tables/ps_idle_ms/h1/w2/v10</property>
      <property value="-268.545">fsim/tables/ps_idle_ms/h1/w2/v11</property>
      <property value="-315.013">fsim/tables/ps_idle_ms/h1/w2/v12</property>
      <property value="-362.8">fsim/tables/ps_idle_ms/h1/w2/v13</property>
      <property value="-412.457">fsim/tables/ps_idle_ms/h1/w2/v14</property>
      <property value="-436.643">fsim/tables/ps_idle_ms/h1/w2/v15</property>
      <property value="-19.9706">fsim/tables/ps_idle_ms/h1/w2/v2</property>
      <property value="-23.4704">fsim/tables/ps_idle_ms/h1/w2/v3</property>
      <property value="-27.9535">fsim/tables/ps_idle_ms/h1/w2/v4</property>
      <property value="-33.7244">fsim/tables/ps_idle_ms/h1/w2/v5</property>
      <property value="-40.2971">fsim/tables/ps_idle_ms/h1/w2/v6</property>
      <property value="-48.7066">fsim/tables/ps_idle_ms/h1/w2/v7</property>
      <property value="-61.5691">fsim/tables/ps_idle_ms/h1/w2/v8</property>
      <property value="-119.489">fsim/tables/ps_idle_ms/h1/w2/v9</property>
      <property value="-16.7965">fsim/tables/ps_idle_ms/h2/w0/v0</property>
      <property value="-17.4429">fsim/tables/ps_idle_ms/h2/w0/v1</property>
      <property value="-296.313">fsim/tables/ps_idle_ms/h2/w0/v10</property>
      <property value="-352.117">fsim/tables/ps_idle_ms/h2/w0/v11</property>
      <property value="-413.418">fsim/tables/ps_idle_ms/h2/w0/v12</property>
      <property value="-480.021">fsim/tables/ps_idle_ms/h2/w0/v13</property>
      <property value="-550.376">fsim/tables/ps_idle_ms/h2/w0/v14</property>
      <property value="-584.626">fsim/tables/ps_idle_ms/h2/w0/v15</property>
      <property value="-20.1407">fsim/tables/ps_idle_ms/h2/w0/v2</property>
      <property value="-24.4333">fsim/tables/ps_idle_ms/h2/w0/v3</property>
      <property value="-30.3098">fsim/tables/ps_idle_ms/h2/w0/v4</property>
      <property value="-37.6628">fsim/tables/ps_idle_ms/h2/w0/v5</property>
      <property value="-47.7875">fsim/tables/ps_idle_ms/h2/w0/v6</property>
      <property value="-83.5343">fsim/tables/ps_idle_ms/h2/w0/v7</property>
      <property value="-190.757">fsim/tables/ps_idle_ms/h2/w0/v8</property>
      <property value="-244.286">fsim/tables/ps_idle_ms/h2/w0/v9</property>
      <property value="-18.8905">fsim/tables/ps_idle_ms/h2/w1/v0</property>
      <property value="-19.3969">fsim/tables/ps_idle_ms/h2/w1/v1</property>
      <property value="-249.563">fsim/tables/ps_idle_ms/h2/w1/v10</property>
      <property value="-293.336">fsim/tables/ps_idle_ms/h2/w1/v11</property>
      <property value="-341.676">fsim/tables/ps_idle_ms/h2/w1/v12</property>
      <property value="-393.979">fsim/tables/ps_idle_ms/h2/w1/v13</property>
      <property value="-450.177">fsim/tables/ps_idle_ms/h2/w1/v14</property>
      <property value="-482.378">fsim/tables/ps_idle_ms/h2/w1/v15</property>
      <property value="-21.6171">fsim/tables/ps_idle_ms/h2/w1/v2</property>
      <property value="-25.1391">fsim/tables/ps_idle_ms/h2/w1/v3</property>
      <property value="-29.8184">fsim/tables/ps_idle_ms/h2/w1/v4</property>
      <property value="-36.1065">fsim/tables/ps_idle_ms/h2/w1/v5</property>
      <property value="-45.085">fsim/tables/ps_idle_ms/h2/w1/v6</property>
      <property value="-92.5465">fsim/tables/ps_idle_ms/h2/w1/v7</property>
      <property value="-169.629">fsim/tables/ps_idle_ms/h2/w1/v8</property>
      <property value="-208.891">fsim/tables/ps_idle_ms/h2/w1/v9</property>
      <property value="-21.5463">fsim/tables/ps_idle_ms/h2/w2/v0</property>
      <property value="-20.7469">fsim/tables/ps_idle_ms/h2/w2/v1</property>
      <property value="-213.355">fsim/tables/ps_idle_ms/h2/w2/v10</property>
      <property value="-248.975">fsim/tables/ps_idle_ms/h2/w2/v11</property>
      <property value="-288.215">fsim/tables/ps_idle_ms/h2/w2/v12</property>
      <property value="-331.213">fsim/tables/ps_idle_ms/h2/w2/v13</property>
      <property value="-378.364">fsim/tables/ps_idle_ms/h2/w2/v14</property>
      <property value="-410.503">fsim/tables/ps_idle_ms/h2/w2/v15</property>
      <property value="-21.8141">fsim/tables/ps_idle_ms/h2/w2/v2</property>
      <property value="-24.2728">fsim/tables/ps_idle_ms/h2/w2/v3</property>
      <property value="-27.9126">fsim/tables/ps_idle_ms/h2/w2/v4</property>
      <property value="-32.62">fsim/tables/ps_idle_ms/h2/w2/v5</property>
      <property value="-39.9998">fsim/tables/ps_idle_ms/h2/w2/v6</property>
      <property value="-73.4964">fsim/tables/ps_idle_ms/h2/w2/v7</property>
      <property value="-143.175">fsim/tables/ps_idle_ms/h2/w2/v8</property>
      <property value="-177.365">fsim/tables/ps_idle_ms/h2/w2/v9</property>
      <property value="-22.9903">fsim/tables/ps_idle_ms/h3/w0/v0</property>
      <property value="-21.3834">fsim/tables/ps_idle_ms/h3/w0/v1</property>
      <property value="-273.745">fsim/tables/ps_idle_ms/h3/w0/v10</property>
      <property value="-321.424">fsim/tables/ps_idle_ms/h3/w0/v11</property>
      <property value="-378.341">fsim/tables/ps_idle_ms/h3/w0/v12</property>
      <property value="-442.673">fsim/tables/ps_idle_ms/h3/w0/v13</property>
      <property value="-512.703">fsim/tables/ps_idle_ms/h3/w0/v14</property>
      <property value="-559.835">fsim/tables/ps_idle_ms/h3/w0/v15</property>
      <property value="-22.6106">fsim/tables/ps_idle_ms/h3/w0/v2</property>
      <property value="-25.6999">fsim/tables/ps_idle_ms/h3/w0/v3</property>
      <property value="-30.6549">fsim/tables/ps_idle_ms/h3/w0/v4</property>
      <property value="-44.3457">fsim/tables/ps_idle_ms/h3/w0/v5</property>
      <property value="-114.171">fsim/tables/ps_idle_ms/h3/w0/v6</property>
      <property value="-153.013">fsim/tables/ps_idle_ms/h3/w0/v7</property>
      <property value="-192.078">fsim/tables/ps_idle_ms/h3/w0/v8</property>
      <property value="-231.699">fsim/tables/ps_idle_ms/h3/w0/v9</property>
      <property value="-25.65">fsim/tables/ps_idle_ms/h3/w1/v0</property>
      <property value="-23.8042">fsim/tables/ps_idle_ms/h3/w1/v1</property>
      <property value="-236.531">fsim/tables/ps_idle_ms/h3/w1/v10</property>
      <property value="-272.443">fsim/tables/ps_idle_ms/h3/w1/v11</property>
      <property value="-314.571">fsim/tables/ps_idle_ms/h3/w1/v12</property>
      <property value="-364.344">fsim/tables/ps_idle_ms/h3/w1/v13</property>
      <property value="-418.544">fsim/tables/ps_idle_ms/h3/w1/v14</property>
      <property value="-458.84">fsim/tables/ps_idle_ms/h3/w1/v15</property>
      <property value="-24.4412">fsim/tables/ps_idle_ms/h3/w1/v2</property>
      <property value="-26.9138">fsim/tables/ps_idle_ms/h3/w1/v3</property>
      <property value="-30.9946">fsim/tables/ps_idle_ms/h3/w1/v4</property>
      <property value="-50.4879">fsim/tables/ps_idle_ms/h3/w1/v5</property>
      <property value="-106.386">fsim/tables/ps_idle_ms/h3/w1/v6</property>
      <property value="-140.182">fsim/tables/ps_idle_ms/h3/w1/v7</property>
      <property value="-171.176">fsim/tables/ps_idle_ms/h3/w1/v8</property>
      <property value="-203.355">fsim/tables/ps_idle_ms/h3/w1/v9</property>
      <property value="-29.6486">fsim/tables/ps_idle_ms/h3/w2/v0</property>
      <property value="-26.5439">fsim/tables/ps_idle_ms/h3/w2/v1</property>
      <property value="-202.52">fsim/tables/ps_idle_ms/h3/w2/v10</property>
      <property value="-229.809">fsim/tables/ps_idle_ms/h3/w2/v11</property>
      <property value="-262.464">fsim/tables/ps_idle_ms/h3/w2/v12</property>
      <property value="-302.122">fsim/tables/ps_idle_ms/h3/w2/v13</property>
      <property value="-346.86">fsim/tables/ps_idle_ms/h3/w2/v14</property>
      <property value="-382.117">fsim/tables/ps_idle_ms/h3/w2/v15</property>
      <property value="-26.0017">fsim/tables/ps_idle_ms/h3/w2/v2</property>
      <property value="-27.3433">fsim/tables/ps_idle_ms/h3/w2/v3</property>
      <property value="-30.0885">fsim/tables/ps_idle_ms/h3/w2/v4</property>
      <property value="-43.8879">fsim/tables/ps_idle_ms/h3/w2/v5</property>
      <property value="-92.3923">fsim/tables/ps_idle_ms/h3/w2/v6</property>
      <property value="-121.155">fsim/tables/ps_idle_ms/h3/w2/v7</property>
      <property value="-147.656">fsim/tables/ps_idle_ms/h3/w2/v8</property>
      <property value="-174.817">fsim/tables/ps_idle_ms/h3/w2/v9</property>
      <property value="-23.7316">fsim/tables/ps_idle_ms/h4/w0/v0</property>
      <property value="-21.8984">fsim/tables/ps_idle_ms/h4/w0/v1</property>
      <property value="-273.239">fsim/tables/ps_idle_ms/h4/w0/v10</property>
      <property value="-320.061">fsim/tables/ps_idle_ms/h4/w0/v11</property>
      <property value="-377.119">fsim/tables/ps_idle_ms/h4/w0/v12</property>
      <property value="-441.304">fsim/tables/ps_idle_ms/h4/w0/v13</property>
      <property value="-511.233">fsim/tables/ps_idle_ms/h4/w0/v14</property>
      <property value="-560.395">fsim/tables/ps_idle_ms/h4/w0/v15</property>
      <property value="-23.0069">fsim/tables/ps_idle_ms/h4/w0/v2</property>
      <property value="-26.0391">fsim/tables/ps_idle_ms/h4/w0/v3</property>
      <property value="-30.9648">fsim/tables/ps_idle_ms/h4/w0/v4</property>
      <property value="-49.752">fsim/tables/ps_idle_ms/h4/w0/v5</property>
      <property value="-116.796">fsim/tables/ps_idle_ms/h4/w0/v6</property>
      <property value="-155.604">fsim/tables/ps_idle_ms/h4/w0/v7</property>
      <property value="-192.626">fsim/tables/ps_idle_ms/h4/w0/v8</property>
      <property value="-232.14">fsim/tables/ps_idle_ms/h4/w0/v9</property>
      <property value="-26.5174">fsim/tables/ps_idle_ms/h4/w1/v0</property>
      <property value="-24.3924">fsim/tables/ps_idle_ms/h4/w1/v1</property>
      <property value="-238.407">fsim/tables/ps_idle_ms/h4/w1/v10</property>
      <property value="-275.09">fsim/tables/ps_idle_ms/h4/w1/v11</property>
      <property value="-319.242">fsim/tables/ps_idle_ms/h4/w1/v12</property>
      <property value="-370.122">fsim/tables/ps_idle_ms/h4/w1/v13</property>
      <property value="-424.911">fsim/tables/ps_idle_ms/h4/w1/v14</property>
      <property value="-466.491">fsim/tables/ps_idle_ms/h4/w1/v15</property>
      <property value="-24.8959">fsim/tables/ps_idle_ms/h4/w1/v2</property>
      <property value="-27.3293">fsim/tables/ps_idle_ms/h4/w1/v3</property>
      <property value="-31.845">fsim/tables/ps_idle_ms/h4/w1/v4</property>
      <property value="-63.049">fsim/tables/ps_idle_ms/h4/w1/v5</property>
      <property value="-109.912">fsim/tables/ps_idle_ms/h4/w1/v6</property>
      <property value="-143.446">fsim/tables/ps_idle_ms/h4/w1/v7</property>
      <property value="-173.818">fsim/tables/ps_idle_ms/h4/w1/v8</property>
      <property value="-206.079">fsim/tables/ps_idle_ms/h4/w1/v9</property>
      <property value="-30.6226">fsim/tables/ps_idle_ms/h4/w2/v0</property>
      <property value="-27.2587">fsim/tables/ps_idle_ms/h4/w2/v1</property>
      <property value="-203.661">fsim/tables/ps_idle_ms/h4/w2/v10</property>
      <property value="-231.057">fsim/tables/ps_idle_ms/h4/w2/v11</property>
      <property value="-265.137">fsim/tables/ps_idle_ms/h4/w2/v12</property>
      <property value="-305.827">fsim/tables/ps_idle_ms/h4/w2/v13</property>
      <property value="-350.951">fsim/tables/ps_idle_ms/h4/w2/v14</property>
      <property value="-387.214">fsim/tables/ps_idle_ms/h4/w2/v15</property>
      <property value="-26.5637">fsim/tables/ps_idle_ms/h4/w2/v2</property>
      <property value="-27.8628">fsim/tables/ps_idle_ms/h4/w2/v3</property>
      <property value="-31.01">fsim/tables/ps_idle_ms/h4/w2/v4</property>
      <property value="-52.9306">fsim/tables/ps_idle_ms/h4/w2/v5</property>
      <property value="-95.8385">fsim/tables/ps_idle_ms/h4/w2/v6</property>
      <property value="-125.258">fsim/tables/ps_idle_ms/h4/w2/v7</property>
      <property value="-150.23">fsim/tables/ps_idle_ms/h4/w2/v8</property>
      <property value="-177.156">fsim/tables/ps_idle_ms/h4/w2/v9</property>
      <property value="-30.8696">fsim/tables/ps_idle_ms/h5/w0/v0</property>
      <property value="-27.1089">fsim/tables/ps_idle_ms/h5/w0/v1</property>
      <property value="-214.074">fsim/tables/ps_idle_ms/h5/w0/v10</property>
      <property value="-245.112">fsim/tables/ps_idle_ms/h5/w0/v11</property>
      <property value="-283.761">fsim/tables/ps_idle_ms/h5/w0/v12</property>
      <property value="-328.456">fsim/tables/ps_idle_ms/h5/w0/v13</property>
      <property value="-377.07">fsim/tables/ps_idle_ms/h5/w0/v14</property>
      <property value="-416.634">fsim/tables/ps_idle_ms/h5/w0/v15</property>
      <property value="-26.3552">fsim/tables/ps_idle_ms/h5/w0/v2</property>
      <property value="-27.7753">fsim/tables/ps_idle_ms/h5/w0/v3</property>
      <property value="-31.2859">fsim/tables/ps_idle_ms/h5/w0/v4</property>
      <property value="-58.3178">fsim/tables/ps_idle_ms/h5/w0/v5</property>
      <property value="-100.468">fsim/tables/ps_idle_ms/h5/w0/v6</property>
      <property value="-130.889">fsim/tables/ps_idle_ms/h5/w0/v7</property>
      <property value="-157.296">fsim/tables/ps_idle_ms/h5/w0/v8</property>
      <property value="-186.423">fsim/tables/ps_idle_ms/h5/w0/v9</property>
      <property value="-34.8928">fsim/tables/ps_idle_ms/h5/w1/v0</property>
      <property value="-30.8095">fsim/tables/ps_idle_ms/h5/w1/v1</property>
      <property value="-179.158">fsim/tables/ps_idle_ms/h5/w1/v10</property>
      <property value="-200.105">fsim/tables/ps_idle_ms/h5/w1/v11</property>
      <property value="-225.833">fsim/tables/ps_idle_ms/h5/w1/v12</property>
      <property value="-257.935">fsim/tables/ps_idle_ms/h5/w1/v13</property>
      <property value="-294.571">fsim/tables/ps_idle_ms/h5/w1/v14</property>
      <property value="-326.268">fsim/tables/ps_idle_ms/h5/w1/v15</property>
      <property value="-29.2709">fsim/tables/ps_idle_ms/h5/w1/v2</property>
      <property value="-29.6185">fsim/tables/ps_idle_ms/h5/w1/v3</property>
      <property value="-32.1968">fsim/tables/ps_idle_ms/h5/w1/v4</property>
      <property value="-58.4754">fsim/tables/ps_idle_ms/h5/w1/v5</property>
      <property value="-89.9673">fsim/tables/ps_idle_ms/h5/w1/v6</property>
      <property value="-119.684">fsim/tables/ps_idle_ms/h5/w1/v7</property>
      <property value="-139.812">fsim/tables/ps_idle_ms/h5/w1/v8</property>
      <property value="-161.025">fsim/tables/ps_idle_ms/h5/w1/v9</property>
      <property value="-39.8482">fsim/tables/ps_idle_ms/h5/w2/v0</property>
      <property value="-35.0353">fsim/tables/ps_idle_ms/h5/w2/v1</property>
      <property value="-161.704">fsim/tables/ps_idle_ms/h5/w2/v10</property>
      <property value="-172.7">fsim/tables/ps_idle_ms/h5/w2/v11</property>
      <property value="-186.069">fsim/tables/ps_idle_ms/h5/w2/v12</property>
      <property value="-207.861">fsim/tables/ps_idle_ms/h5/w2/v13</property>
      <property value="-236.116">fsim/tables/ps_idle_ms/h5/w2/v14</property>
      <property value="-262.46">fsim/tables/ps_idle_ms/h5/w2/v15</property>
      <property value="-32.555">fsim/tables/ps_idle_ms/h5/w2/v2</property>
      <property value="-31.8296">fsim/tables/ps_idle_ms/h5/w2/v3</property>
      <property value="-33.1908">fsim/tables/ps_idle_ms/h5/w2/v4</property>
      <property value="-51.1104">fsim/tables/ps_idle_ms/h5/w2/v5</property>
      <property value="-80.8233">fsim/tables/ps_idle_ms/h5/w2/v6</property>
      <property value="-107.645">fsim/tables/ps_idle_ms/h5/w2/v7</property>
      <property value="-127.42">fsim/tables/ps_idle_ms/h5/w2/v8</property>
      <property value="-145.226">fsim/tables/ps_idle_ms/h5/w2/v9</property>
      <property value="-37.4663">fsim/tables/ps_idle_ms/h6/w0/v0</property>
      <property value="-32.7984">fsim/tables/ps_idle_ms/h6/w0/v1</property>
      <property value="-167.015">fsim/tables/ps_idle_ms/h6/w0/v10</property>
      <property value="-180.991">fsim/tables/ps_idle_ms/h6/w0/v11</property>
      <property value="-200.999">fsim/tables/ps_idle_ms/h6/w0/v12</property>
      <property value="-227.544">fsim/tables/ps_idle_ms/h6/w0/v13</property>
      <property value="-259.218">fsim/tables/ps_idle_ms/h6/w0/v14</property>
      <property value="-287.762">fsim/tables/ps_idle_ms/h6/w0/v15</property>
      <property value="-30.6822">fsim/tables/ps_idle_ms/h6/w0/v2</property>
      <property value="-30.3762">fsim/tables/ps_idle_ms/h6/w0/v3</property>
      <property value="-32.0527">fsim/tables/ps_idle_ms/h6/w0/v4</property>
      <property value="-47.9459">fsim/tables/ps_idle_ms/h6/w0/v5</property>
      <property value="-82.2461">fsim/tables/ps_idle_ms/h6/w0/v6</property>
      <property value="-108.825">fsim/tables/ps_idle_ms/h6/w0/v7</property>
      <property value="-130.592">fsim/tables/ps_idle_ms/h6/w0/v8</property>
      <property value="-149.631">fsim/tables/ps_idle_ms/h6/w0/v9</property>
      <property value="-43.8659">fsim/tables/ps_idle_ms/h6/w1/v0</property>
      <property value="-38.4305">fsim/tables/ps_idle_ms/h6/w1/v1</property>
      <property value="-150.121">fsim/tables/ps_idle_ms/h6/w1/v10</property>
      <property value="-161.058">fsim/tables/ps_idle_ms/h6/w1/v11</property>
      <property value="-170.75">fsim/tables/ps_idle_ms/h6/w1/v12</property>
      <property value="-185.384">fsim/tables/ps_idle_ms/h6/w1/v13</property>
      <property value="-208.44">fsim/tables/ps_idle_ms/h6/w1/v14</property>
      <property value="-229.003">fsim/tables/ps_idle_ms/h6/w1/v15</property>
      <property value="-35.3018">fsim/tables/ps_idle_ms/h6/w1/v2</property>
      <property value="-33.7666">fsim/tables/ps_idle_ms/h6/w1/v3</property>
      <property value="-34.259">fsim/tables/ps_idle_ms/h6/w1/v4</property>
      <property value="-45.5482">fsim/tables/ps_idle_ms/h6/w1/v5</property>
      <property value="-74.9173">fsim/tables/ps_idle_ms/h6/w1/v6</property>
      <property value="-97.1946">fsim/tables/ps_idle_ms/h6/w1/v7</property>
      <property value="-121.162">fsim/tables/ps_idle_ms/h6/w1/v8</property>
      <property value="-134.551">fsim/tables/ps_idle_ms/h6/w1/v9</property>
      <property value="-47.5612">fsim/tables/ps_idle_ms/h6/w2/v0</property>
      <property value="-44.954">fsim/tables/ps_idle_ms/h6/w2/v1</property>
      <property value="-42.958">fsim/tables/ps_idle_ms/h6/w2/v10</property>
      <property value="-53.88">fsim/tables/ps_idle_ms/h6/w2/v11</property>
      <property value="-68.7386">fsim/tables/ps_idle_ms/h6/w2/v12</property>
      <property value="-79.5639">fsim/tables/ps_idle_ms/h6/w2/v13</property>
      <property value="-90.5623">fsim/tables/ps_idle_ms/h6/w2/v14</property>
      <property value="-99.3473">fsim/tables/ps_idle_ms/h6/w2/v15</property>
      <property value="-42.7993">fsim/tables/ps_idle_ms/h6/w2/v2</property>
      <property value="-41.0761">fsim/tables/ps_idle_ms/h6/w2/v3</property>
      <property value="-39.7271">fsim/tables/ps_idle_ms/h6/w2/v4</property>
      <property value="-38.6893">fsim/tables/ps_idle_ms/h6/w2/v5</property>
      <property value="-37.9293">fsim/tables/ps_idle_ms/h6/w2/v6</property>
      <property value="-37.6673">fsim/tables/ps_idle_ms/h6/w2/v7</property>
      <property value="-37.6393">fsim/tables/ps_idle_ms/h6/w2/v8</property>
      <property value="-38.6036">fsim/tables/ps_idle_ms/h6/w2/v9</property>
      <property value="-44.3062">fsim/tables/ps_idle_ms/h7/w0/v0</property>
      <property value="-39.7989">fsim/tables/ps_idle_ms/h7/w0/v1</property>
      <property value="-144.893">fsim/tables/ps_idle_ms/h7/w0/v10</property>
      <property value="-155.73">fsim/tables/ps_idle_ms/h7/w0/v11</property>
      <property value="-164.46">fsim/tables/ps_idle_ms/h7/w0/v12</property>
      <property value="-176.358">fsim/tables/ps_idle_ms/h7/w0/v13</property>
      <property value="-195.373">fsim/tables/ps_idle_ms/h7/w0/v14</property>
      <property value="-212.549">fsim/tables/ps_idle_ms/h7/w0/v15</property>
      <property value="-36.7769">fsim/tables/ps_idle_ms/h7/w0/v2</property>
      <property value="-35.0972">fsim/tables/ps_idle_ms/h7/w0/v3</property>
      <property value="-36.033">fsim/tables/ps_idle_ms/h7/w0/v4</property>
      <property value="-48.825">fsim/tables/ps_idle_ms/h7/w0/v5</property>
      <property value="-76.1025">fsim/tables/ps_idle_ms/h7/w0/v6</property>
      <property value="-97.2618">fsim/tables/ps_idle_ms/h7/w0/v7</property>
      <property value="-122.305">fsim/tables/ps_idle_ms/h7/w0/v8</property>
      <property value="-133.271">fsim/tables/ps_idle_ms/h7/w0/v9</property>
      <property value="-43.3445">fsim/tables/ps_idle_ms/h7/w1/v0</property>
      <property value="-42.4587">fsim/tables/ps_idle_ms/h7/w1/v1</property>
      <property value="-52.1414">fsim/tables/ps_idle_ms/h7/w1/v10</property>
      <property value="-60.532">fsim/tables/ps_idle_ms/h7/w1/v11</property>
      <property value="-69.154">fsim/tables/ps_idle_ms/h7/w1/v12</property>
      <property value="-76.3318">fsim/tables/ps_idle_ms/h7/w1/v13</property>
      <property value="-82.842">fsim/tables/ps_idle_ms/h7/w1/v14</property>
      <property value="-86.8584">fsim/tables/ps_idle_ms/h7/w1/v15</property>
      <property value="-41.5367">fsim/tables/ps_idle_ms/h7/w1/v2</property>
      <property value="-40.586">fsim/tables/ps_idle_ms/h7/w1/v3</property>
      <property value="-39.893">fsim/tables/ps_idle_ms/h7/w1/v4</property>
      <property value="-39.2995">fsim/tables/ps_idle_ms/h7/w1/v5</property>
      <property value="-38.9757">fsim/tables/ps_idle_ms/h7/w1/v6</property>
      <property value="-40.008">fsim/tables/ps_idle_ms/h7/w1/v7</property>
      <property value="-42.6185">fsim/tables/ps_idle_ms/h7/w1/v8</property>
      <property value="-46.1536">fsim/tables/ps_idle_ms/h7/w1/v9</property>
      <property value="-57.1488">fsim/tables/ps_idle_ms/h7/w2/v10</property>
      <property value="-57.1488">fsim/tables/ps_idle_ms/h7/w2/v11</property>
      <property value="-57.1488">fsim/tables/ps_idle_ms/h7/w2/v12</property>
      <property value="-58.4305">fsim/tables/ps_idle_ms/h7/w2/v13</property>
      <property value="-59.9628">fsim/tables/ps_idle_ms/h7/w2/v14</property>
      <property value="-61.1205">fsim/tables/ps_idle_ms/h7/w2/v15</property>
      <property value="-57.1488">fsim/tables/ps_idle_ms/h7/w2/v9</property>
      <property value="422.116">fsim/tables/reach_tas_ms/h0/w0</property>
      <property value="421.162">fsim/tables/reach_tas_ms/h0/w1</property>
      <property value="420.397">fsim/tables/reach_tas_ms/h0/w2</property>
      <property value="468.605">fsim/tables/reach_tas_ms/h1/w0</property>
      <property value="466.564">fsim/tables/reach_tas_ms/h1/w1</property>
      <property value="464.383">fsim/tables/reach_tas_ms/h1/w2</property>
      <property value="521.391">fsim/tables/reach_tas_ms/h2/w0</property>
      <property value="518.3">fsim/tables/reach_tas_ms/h2/w1</property>
      <property value="515.604">fsim/tables/reach_tas_ms/h2/w2</property>
      <property value="588.548">fsim/tables/reach_tas_ms/h3/w0</property>
      <property value="583.458">fsim/tables/reach_tas_ms/h3/w1</property>
      <property value="570.606">fsim/tables/reach_tas_ms/h3/w2</property>
      <property value="597.107">fsim/tables/reach_tas_ms/h4/w0</property>
      <property value="594.917">fsim/tables/reach_tas_ms/h4/w1</property>
      <property value="580.787">fsim/tables/reach_tas_ms/h4/w2</property>
      <property value="594.851">fsim/tables/reach_tas_ms/h5/w0</property>
      <property value="572.054">fsim/tables/reach_tas_ms/h5/w1</property>
      <property value="547.081">fsim/tables/reach_tas_ms/h5/w2</property>
      <property value="553.949">fsim/tables/reach_tas_ms/h6/w0</property>
      <property value="513.802">fsim/tables/reach_tas_ms/h6/w1</property>
      <property value="347.096">fsim/tables/reach_tas_ms/h6/w2</property>
      <property value="399.554">fsim/tables/reach_tas_ms/h7/w0</property>
      <property value="0.0">fsim/tables/speed_fraction/v0</property>
      <property value="0.0666667">fsim/tables/speed_fraction/v1</property>
      <property value="0.666667">fsim/tables/speed_fraction/v10</property>
      <property value="0.733333">fsim/tables/speed_fraction/v11</property>
      <property value="0.8">fsim/tables/speed_fraction/v12</property>
      <property value="0.866667">fsim/tables/speed_fraction/v13</property>
      <property value="0.933333">fsim/tables/speed_fraction/v14</property>
      <property value="1">fsim/tables/speed_fraction/v15</property>
      <property value="0.133333">fsim/tables/speed_fraction/v2</property>
      <property value="0.2">fsim/tables/speed_fraction/v3</property>
      <property value="0.266667">fsim/tables/speed_fraction/v4</property>
      <property value="0.333333">fsim/tables/speed_fraction/v5</property>
      <property value="0.4">fsim/tables/speed_fraction/v6</property>
      <property value="0.466667">fsim/tables/speed_fraction/v7</property>
      <property value="0.533333">fsim/tables/speed_fraction/v8</property>
      <property value="0.6">fsim/tables/speed_fraction/v9</property>
      <property value="51.1225">fsim/tables/stall_cas_ms/h0/w0</property>
      <property value="56.7109">fsim/tables/stall_cas_ms/h0/w1</property>
      <property value="61.7959">fsim/tables/stall_cas_ms/h0/w2</property>
      <property value="52.2123">fsim/tables/stall_cas_ms/h1/w0</property>
      <property value="57.9197">fsim/tables/stall_cas_ms/h1/w1</property>
      <property value="63.1131">fsim/tables/stall_cas_ms/h1/w2</property>
      <property value="53.4716">fsim/tables/stall_cas_ms/h2/w0</property>
      <property value="59.3167">fsim/tables/stall_cas_ms/h2/w1</property>
      <property value="64.6353">fsim/tables/stall_cas_ms/h2/w2</property>
      <property value="55.3001">fsim/tables/stall_cas_ms/h3/w0</property>
      <property value="61.3451">fsim/tables/stall_cas_ms/h3/w1</property>
      <property value="66.8456">fsim/tables/stall_cas_ms/h3/w2</property>
      <property value="55.1243">fsim/tables/stall_cas_ms/h4/w0</property>
      <property value="61.1501">fsim/tables/stall_cas_ms/h4/w1</property>
      <property value="66.6332">fsim/tables/stall_cas_ms/h4/w2</property>
      <property value="56.1598">fsim/tables/stall_cas_ms/h5/w0</property>
      <property value="62.2988">fsim/tables/stall_cas_ms/h5/w1</property>
      <property value="67.8848">fsim/tables/stall_cas_ms/h5/w2</property>
      <property value="56.7907">fsim/tables/stall_cas_ms/h6/w0</property>
      <property value="62.9986">fsim/tables/stall_cas_ms/h6/w1</property>
      <property value="68.6474">fsim/tables/stall_cas_ms/h6/w2</property>
      <property value="60.0598">fsim/tables/stall_cas_ms/h7/w0</property>
      <property value="66.6251">fsim/tables/stall_cas_ms/h7/w1</property>
      <property value="72.5991">fsim/tables/stall_cas_ms/h7/w2</property>
      <property value="20102">fsim/tables/weight_kg/w0</property>
      <property value="24737">fsim/tables/weight_kg/w1</property>
      <property value="29372">fsim/tables/weight_kg/w2</property>
      <channel name="Pitch (fly-by-wire)">
        <!-- hangar: load factor command, alpha and pitch-rate inner loop (hangar/fcs.py) -->
        <summer name="fcs/pitch-trim-sum">
          <input>fcs/elevator-cmd-norm</input>
          <input>fcs/pitch-trim-cmd-norm</input>
          <clipto> <min>-1</min> <max>1</max> </clipto>
        </summer>
        <!-- the integrators are reset below 60 kt and while a wheel carries weight
             (on the ground, taking off and landing) -->
        <switch name="fcs/fbw/reset">
          <default value="0"/>
          <test logic="OR" value="-1">
            velocities/vc-kts lt 60
            gear/wow gt 0
          </test>
        </switch>
        <!-- the pitch power (1/s^2 per rad of the surface): the surfaces', and with the
             vectoring nozzles' at the thrust the engines make -->
        <fcs_function name="fcs/fbw/md-aero">
          <function>
            <table>
              <independentVar lookup="row">aero/qbar-psf</independentVar>
              <independentVar lookup="column">velocities/mach</independentVar>
              <tableData>
                       0.150     0.400     0.700     0.900     1.100     1.400     2.000
              10.0 -2.149487e-01 -2.229056e-01 -2.497930e-01 -3.042863e-01 -2.764831e-01 -2.548283e-01 -1.559321e-01
              20.0 -4.298974e-01 -4.458111e-01 -4.995861e-01 -6.085726e-01 -5.529662e-01 -5.096566e-01 -3.118641e-01
              40.0 -8.597948e-01 -8.916222e-01 -9.991722e-01 -1.217145e+00 -1.105932e+00 -1.019313e+00 -6.237283e-01
              80.0 -2.075675e+00 -2.161511e+00 -2.450941e+00 -3.034210e+00 -2.736754e+00 -2.456627e+00 -1.393571e+00
             150.0 -4.204969e+00 -4.367347e+00 -4.916082e+00 -6.032555e+00 -5.462933e+00 -4.982021e+00 -2.987827e+00
             300.0 -8.746570e+00 -9.077975e+00 -1.019772e+01 -1.246305e+01 -1.130726e+01 -1.036581e+01 -6.276892e+00
             600.0 -1.779287e+01 -1.845722e+01 -2.070213e+01 -2.525436e+01 -2.293177e+01 -2.109136e+01 -1.285739e+01
            1200.0 -3.585949e+01 -3.719289e+01 -4.169753e+01 -5.081233e+01 -4.616185e+01 -4.250977e+01 -2.596125e+01
            2400.0 -7.187961e+01 -7.454345e+01 -8.354497e+01 -1.017889e+02 -9.248063e+01 -8.521409e+01 -5.211745e+01
              </tableData>
            </table>
          </function>
        </fcs_function>
        <fcs_function name="fcs/fbw/md-total">
          <function>
            <min>
              <sum>
                <property>fcs/fbw/md-aero</property>
                <product><value>-4.389791e-05</value><max><value>0</value><property>propulsion/engine[0]/thrust-lbs</property></max></product>
                <product><value>-4.389791e-05</value><max><value>0</value><property>propulsion/engine[1]/thrust-lbs</property></max></product>
              </sum>
              <value>-0.01</value>
            </min>
          </function>
        </fcs_function>
        <!-- the roll power (1/s^2 per rad of the surface): the surfaces', and with the
             vectoring nozzles' at the thrust the engines make -->
        <fcs_function name="fcs/fbw/lda-aero">
          <function>
            <table>
              <independentVar lookup="row">aero/qbar-psf</independentVar>
              <independentVar lookup="column">velocities/mach</independentVar>
              <tableData>
                       0.150     0.400     0.700     0.900     1.100     1.400     2.000
              10.0  9.017300e-01  9.269859e-01  1.012353e+00  1.186814e+00  6.573383e-01  3.675632e-01  3.031269e-01
              20.0  1.803460e+00  1.853972e+00  2.024707e+00  2.373629e+00  1.314677e+00  7.351263e-01  6.062538e-01
              40.0  3.606920e+00  3.707944e+00  4.049414e+00  4.747257e+00  2.629353e+00  1.470253e+00  1.212508e+00
              80.0  7.647971e+00  7.869072e+00  8.615024e+00  1.013294e+01  5.603191e+00  3.116364e+00  2.515337e+00
             150.0  1.481186e+01  1.524812e+01  1.671954e+01  1.970286e+01  1.088676e+01  6.034188e+00  4.898542e+00
             300.0  3.015971e+01  3.100650e+01  3.386888e+01  3.975719e+01  2.200706e+01  1.229337e+01  1.012408e+01
             600.0  6.066703e+01  6.237394e+01  6.814304e+01  7.995574e+01  4.426720e+01  2.472786e+01  2.036209e+01
            1200.0  1.218730e+02  1.252987e+02  1.368740e+02  1.604893e+02  8.888283e+01  4.967590e+01  4.091838e+01
            2400.0  2.440245e+02  2.508641e+02  2.739820e+02  3.212254e+02  1.779094e+02  9.946850e+01  8.201159e+01
              </tableData>
            </table>
          </function>
        </fcs_function>
        <fcs_function name="fcs/fbw/lda-total">
          <function>
            <max>
              <sum>
                <property>fcs/fbw/lda-aero</property>
                <product><value>1.605268e-05</value><max><value>0</value><property>propulsion/engine[0]/thrust-lbs</property></max></product>
                <product><value>1.605268e-05</value><max><value>0</value><property>propulsion/engine[1]/thrust-lbs</property></max></product>
              </sum>
              <value>0.01</value>
            </max>
          </function>
        </fcs_function>
        <!-- the yaw power (1/s^2 per rad of the surface): the surfaces', and with the
             vectoring nozzles' at the thrust the engines make -->
        <fcs_function name="fcs/fbw/ndr-aero">
          <function>
            <table>
              <independentVar lookup="row">aero/qbar-psf</independentVar>
              <independentVar lookup="column">velocities/mach</independentVar>
              <tableData>
                       0.150     0.400     0.700     0.900     1.100     1.400     2.000
              10.0 -6.395507e-02 -6.475919e-02 -6.690573e-02 -6.865184e-02 -5.692158e-02 -6.788589e-02 -4.349449e-02
              20.0 -1.279101e-01 -1.295184e-01 -1.338115e-01 -1.373037e-01 -1.138432e-01 -1.357718e-01 -8.698898e-02
              40.0 -2.558203e-01 -2.590368e-01 -2.676229e-01 -2.746074e-01 -2.276863e-01 -2.715436e-01 -1.739780e-01
              80.0 -5.113582e-01 -5.171256e-01 -5.324608e-01 -5.435902e-01 -4.517217e-01 -5.430673e-01 -3.507753e-01
             150.0 -9.357523e-01 -9.468521e-01 -9.762224e-01 -9.979631e-01 -8.288721e-01 -9.935472e-01 -6.409786e-01
             300.0 -1.804509e+00 -1.824695e+00 -1.877695e+00 -1.915970e+00 -1.592693e+00 -1.916476e+00 -1.247087e+00
             600.0 -3.493487e+00 -3.534813e+00 -3.644062e+00 -3.721207e+00 -3.092236e+00 -3.709303e+00 -2.397823e+00
            1200.0 -6.814766e+00 -6.896612e+00 -7.114262e+00 -7.289651e+00 -6.048024e+00 -7.235240e+00 -4.667039e+00
            2400.0 -1.351404e+01 -1.368176e+01 -1.412868e+01 -1.448714e+01 -1.201570e+01 -1.434558e+01 -9.209197e+00
              </tableData>
            </table>
          </function>
        </fcs_function>
        <fcs_function name="fcs/fbw/ndr-total">
          <function>
            <min>
              <sum>
                <property>fcs/fbw/ndr-aero</property>
                <product><value>-1.399808e-05</value><max><value>0</value><property>propulsion/engine[0]/thrust-lbs</property></max></product>
                <product><value>-1.399808e-05</value><max><value>0</value><property>propulsion/engine[1]/thrust-lbs</property></max></product>
              </sum>
              <value>-0.01</value>
            </min>
          </function>
        </fcs_function>
        <fcs_function name="fcs/fbw/k-alpha-m">
          <function>
            <table>
              <independentVar lookup="row">aero/qbar-psf</independentVar>
              <independentVar lookup="column">velocities/mach</independentVar>
              <tableData>
                       0.150     0.400     0.700     0.900     1.100     1.400     2.000
              10.0  2.031787e+00  2.124561e+00  2.127447e+00  2.083925e+00  1.813168e+00  1.753359e+00  1.873305e+00
              20.0  1.823249e+00  2.000510e+00  2.005381e+00  1.918180e+00  1.376467e+00  1.256767e+00  1.496630e+00
              40.0  1.435169e+00  1.756568e+00  1.762710e+00  1.587680e+00  5.034540e-01  2.637332e-01  7.433359e-01
              80.0  1.246802e+00  2.038890e+00  2.290690e+00  2.217691e+00 -1.206360e+00 -2.337538e+00 -1.381870e+00
             150.0  2.061628e+00  3.867978e+00  4.421189e+00  4.163639e+00 -2.517789e+00 -4.869023e+00 -3.246533e+00
             300.0  3.180396e+00  6.579613e+00  7.989614e+00  7.528060e+00 -5.512751e+00 -1.002557e+01 -6.725874e+00
             600.0  7.640958e+00  1.033824e+01  1.372003e+01  1.293861e+01 -1.233783e+01 -2.076209e+01 -1.382079e+01
            1200.0  4.237354e+01  5.610155e+00  6.414743e+00 -1.104414e+00 -4.964185e+01 -5.855547e+01 -3.421225e+01
            2400.0  3.305561e+02  7.245462e+00 -1.186442e+01 -3.035998e+01 -1.326481e+02 -1.522541e+02 -1.041215e+02
              </tableData>
            </table>
          </function>
        </fcs_function>
        <fcs_function name="fcs/fbw/k-alpha">
          <function>
            <quotient><property>fcs/fbw/k-alpha-m</property><property>fcs/fbw/md-total</property></quotient>
          </function>
          <clipto> <min>-6.00000</min> <max>6.00000</max> </clipto>
        </fcs_function>
        <fcs_function name="fcs/fbw/k-q-m">
          <function>
            <table>
              <independentVar lookup="row">aero/qbar-psf</independentVar>
              <independentVar lookup="column">velocities/mach</independentVar>
              <tableData>
                       0.150     0.400     0.700     0.900     1.100     1.400     2.000
              10.0  2.146905e+00  2.302224e+00  2.342201e+00  2.352766e+00  2.364338e+00  2.374556e+00  2.383689e+00
              20.0  2.010661e+00  2.248430e+00  2.309545e+00  2.325088e+00  2.344679e+00  2.361686e+00  2.376180e+00
              40.0  1.736659e+00  2.140759e+00  2.244216e+00  2.269724e+00  2.305357e+00  2.335944e+00  2.361161e+00
              80.0  1.463532e+00  2.337528e+00  2.671739e+00  2.925140e+00  2.916428e+00  2.699538e+00  2.329464e+00
             150.0  1.456786e+00  3.097467e+00  3.643427e+00  3.973745e+00  4.030886e+00  3.844617e+00  3.483824e+00
             300.0  5.803126e-01  3.801550e+00  4.790372e+00  5.305130e+00  5.482630e+00  5.309476e+00  4.900650e+00
             600.0 -2.292932e+00  4.228555e+00  6.061365e+00  6.900431e+00  7.330922e+00  7.233423e+00  6.769232e+00
            1200.0 -1.238468e+01  1.955984e+00  4.948359e+00  5.666001e+00  6.895526e+00  7.851629e+00  8.561555e+00
            2400.0 -4.714054e+01 -5.371608e+00  7.200209e-01  2.092470e+00  4.524137e+00  6.374917e+00  7.715268e+00
              </tableData>
            </table>
          </function>
        </fcs_function>
        <fcs_function name="fcs/fbw/k-q">
          <function>
            <quotient><property>fcs/fbw/k-q-m</property><property>fcs/fbw/md-total</property></quotient>
          </function>
          <clipto> <min>-3.00000</min> <max>3.00000</max> </clipto>
        </fcs_function>
        <fcs_function name="fcs/fbw/k-ff-m">
          <function>
            <table>
              <independentVar lookup="row">aero/qbar-psf</independentVar>
              <independentVar lookup="column">velocities/mach</independentVar>
              <tableData>
                       0.150     0.400     0.700     0.900     1.100     1.400     2.000
              10.0  6.640114e+00  6.559373e+00  6.322397e+00  5.974384e+00  7.805384e+00  9.904865e+00  1.116826e+01
              20.0  3.320057e+00  3.279686e+00  3.161199e+00  2.987192e+00  3.902692e+00  4.952433e+00  5.584129e+00
              40.0  1.660028e+00  1.639843e+00  1.580599e+00  1.493596e+00  1.951346e+00  2.476216e+00  2.792065e+00
              80.0  9.622875e-01  9.727808e-01  1.003802e+00  1.058793e+00  1.420142e+00  1.621393e+00  1.355817e+00
             150.0  1.016103e+00  1.023185e+00  1.045233e+00  1.088751e+00  1.483638e+00  1.793512e+00  1.664008e+00
             300.0  1.027814e+00  1.034165e+00  1.054148e+00  1.095035e+00  1.490405e+00  1.809458e+00  1.716946e+00
             600.0  1.030588e+00  1.036781e+00  1.056335e+00  1.096656e+00  1.492808e+00  1.813716e+00  1.724818e+00
            1200.0  7.034955e-01  6.929101e-01  6.622396e-01  6.184542e-01  8.848742e-01  1.247910e+00  1.487761e+00
            2400.0  3.518616e-01  3.465623e-01  3.312094e-01  3.092905e-01  4.423990e-01  6.237702e-01  7.438776e-01
              </tableData>
            </table>
          </function>
        </fcs_function>
        <fcs_function name="fcs/fbw/k-ff">
          <function>
            <quotient><property>fcs/fbw/k-ff-m</property><property>fcs/fbw/md-total</property></quotient>
          </function>
          <clipto> <min>-0.30000</min> <max>0.30000</max> </clipto>
        </fcs_function>
        <fcs_function name="fcs/fbw/k-i-m">
          <function>
            <table>
              <independentVar lookup="row">aero/qbar-psf</independentVar>
              <independentVar lookup="column">velocities/mach</independentVar>
              <tableData>
                       0.150     0.400     0.700     0.900     1.100     1.400     2.000
              10.0  6.640114e+00  6.559373e+00  6.322397e+00  5.974384e+00  7.805384e+00  9.904865e+00  1.116826e+01
              20.0  3.320057e+00  3.279686e+00  3.161199e+00  2.987192e+00  3.902692e+00  4.952433e+00  5.584129e+00
              40.0  1.660028e+00  1.639843e+00  1.580599e+00  1.493596e+00  1.951346e+00  2.476216e+00  2.792065e+00
              80.0  9.622875e-01  9.727808e-01  1.003802e+00  1.058793e+00  1.420142e+00  1.621393e+00  1.355817e+00
             150.0  1.016103e+00  1.023185e+00  1.045233e+00  1.088751e+00  1.483638e+00  1.793512e+00  1.664008e+00
             300.0  1.027814e+00  1.034165e+00  1.054148e+00  1.095035e+00  1.490405e+00  1.809458e+00  1.716946e+00
             600.0  1.030588e+00  1.036781e+00  1.056335e+00  1.096656e+00  1.492808e+00  1.813716e+00  1.724818e+00
            1200.0  7.034955e-01  6.929101e-01  6.622396e-01  6.184542e-01  8.848742e-01  1.247910e+00  1.487761e+00
            2400.0  3.518616e-01  3.465623e-01  3.312094e-01  3.092905e-01  4.423990e-01  6.237702e-01  7.438776e-01
              </tableData>
            </table>
          </function>
        </fcs_function>
        <fcs_function name="fcs/fbw/k-i">
          <function>
            <quotient><property>fcs/fbw/k-i-m</property><property>fcs/fbw/md-total</property></quotient>
          </function>
          <clipto> <min>-0.60000</min> <max>0.60000</max> </clipto>
        </fcs_function>
        <fcs_function name="fcs/fbw/n-alpha">
          <function>
            <table>
              <independentVar lookup="row">aero/qbar-psf</independentVar>
              <independentVar lookup="column">velocities/mach</independentVar>
              <tableData>
                       0.150     0.400     0.700     0.900     1.100     1.400     2.000
              10.0   1.00000   1.00000   1.00000   1.00000   1.00000   1.00000   1.00000
              20.0   1.00000   1.00000   1.00000   1.00000   1.00000   1.00000   1.00000
              40.0   1.10391   1.12746   1.20177   1.33581   1.27055   1.09469   1.00000
              80.0   3.15229   3.24365   3.52967   4.03239   3.78903   3.11651   2.17583
             150.0   6.57352   6.71852   7.17566   7.98678   7.59186   6.51675   5.12060
             300.0  13.19604  13.47687  14.36316  15.96397  15.18457  13.08607  10.45534
             600.0  26.38630  26.94932  28.72611  31.93005  30.37012  26.16583  20.88978
            1200.0  52.77331  53.89891  57.45091  63.85600  60.73751  52.33257  41.78475
            2400.0 105.52442 107.77463 114.87592 127.68610 121.44911 104.64332  83.55685
              </tableData>
            </table>
          </function>
        </fcs_function>
        <!-- the pitching moment's departures from a straight line through the
             angle-of-attack envelope (-0.077 per rad about the CG), cancelled by the
             elevator: the gains are designed on the line -->
        <fcs_function name="fcs/fbw/moment-comp-aero">
          <function>
            <table>
              <independentVar lookup="row">aero/alpha-rad</independentVar>
              <independentVar lookup="column">velocities/mach</independentVar>
              <tableData>
                       0.150     0.400     0.700     0.900     1.100     1.400     2.000
          -0.17453   0.01333   0.01286   0.01147   0.00942   0.01037   0.01125   0.01838
          -0.15708   0.01298   0.01252   0.01117   0.00917   0.01009   0.01095   0.01790
          -0.13963   0.01239   0.01195   0.01066   0.00875   0.00963   0.01045   0.01708
          -0.12217   0.01277   0.01231   0.01099   0.00902   0.00993   0.01077   0.01760
          -0.10472   0.01295   0.01249   0.01115   0.00915   0.01007   0.01092   0.01785
          -0.08727   0.01386   0.01337   0.01193   0.00979   0.01078   0.01169   0.01911
          -0.06981   0.01336   0.01288   0.01149   0.00943   0.01038   0.01127   0.01841
          -0.05236   0.01310   0.01263   0.01127   0.00925   0.01018   0.01105   0.01805
          -0.03491   0.01048   0.01010   0.00902   0.00740   0.00815   0.00884   0.01445
          -0.01745   0.00486   0.00469   0.00418   0.00343   0.00378   0.00410   0.00670
           0.00000  -0.00268  -0.00259  -0.00231  -0.00189  -0.00208  -0.00226  -0.00370
           0.01745  -0.00938  -0.00905  -0.00807  -0.00663  -0.00729  -0.00791  -0.01293
           0.03491  -0.01259  -0.01214  -0.01083  -0.00889  -0.00979  -0.01062  -0.01735
           0.05236  -0.01518  -0.01464  -0.01306  -0.01072  -0.01180  -0.01280  -0.02092
           0.06981  -0.01586  -0.01530  -0.01365  -0.01120  -0.01233  -0.01338  -0.02187
           0.08727  -0.01739  -0.01677  -0.01496  -0.01228  -0.01352  -0.01466  -0.02397
           0.10472  -0.01823  -0.01758  -0.01569  -0.01288  -0.01418  -0.01538  -0.02513
           0.12217  -0.01890  -0.01822  -0.01626  -0.01335  -0.01469  -0.01594  -0.02605
           0.13963  -0.01913  -0.01845  -0.01646  -0.01351  -0.01487  -0.01613  -0.02637
           0.15708  -0.01869  -0.01802  -0.01608  -0.01320  -0.01453  -0.01576  -0.02576
           0.17453  -0.01772  -0.01709  -0.01525  -0.01252  -0.01378  -0.01495  -0.02442
           0.19199  -0.01625  -0.01567  -0.01398  -0.01148  -0.01263  -0.01370  -0.02239
           0.20944  -0.01411  -0.01361  -0.01214  -0.00997  -0.01097  -0.01190  -0.01945
           0.22689  -0.01167  -0.01125  -0.01004  -0.00824  -0.00907  -0.00984  -0.01608
           0.24435  -0.00853  -0.00822  -0.00734  -0.00602  -0.00663  -0.00719  -0.01176
           0.26180  -0.00539  -0.00519  -0.00464  -0.00381  -0.00419  -0.00454  -0.00743
           0.27925  -0.00162  -0.00156  -0.00139  -0.00114  -0.00126  -0.00136  -0.00223
           0.29671   0.00150   0.00144   0.00129   0.00106   0.00116   0.00126   0.00206
           0.31416   0.00511   0.00493   0.00440   0.00361   0.00397   0.00431   0.00705
           0.33161   0.00734   0.00708   0.00631   0.00518   0.00570   0.00619   0.01011
           0.34907   0.00993   0.00958   0.00855   0.00702   0.00772   0.00838   0.01369
           0.36652   0.01149   0.01108   0.00989   0.00812   0.00894   0.00969   0.01584
           0.38397   0.01332   0.01285   0.01147   0.00941   0.01036   0.01124   0.01837
           0.40143   0.01546   0.01491   0.01330   0.01092   0.01202   0.01304   0.02131
           0.41888   0.01795   0.01731   0.01544   0.01268   0.01395   0.01514   0.02474
           0.43633   0.02049   0.01975   0.01763   0.01447   0.01593   0.01728   0.02824
           0.45379   0.02360   0.02275   0.02030   0.01667   0.01834   0.01990   0.03253
              </tableData>
            </table>
          </function>
        </fcs_function>
        <fcs_function name="fcs/fbw/moment-comp">
          <function>
            <product><property>fcs/fbw/moment-comp-aero</property>
              <quotient><property>fcs/fbw/md-aero</property><property>fcs/fbw/md-total</property></quotient></product>
          </function>
        </fcs_function>
        <!-- the gravity reference: the load factor that holds the flight path -->
        <fcs_function name="fcs/fbw/g-ref">
          <function>
            <product>
              <cos><property>attitude/theta-rad</property></cos>
              <cos><property>attitude/phi-rad</property></cos>
            </product>
          </function>
        </fcs_function>
        <!-- stick to load factor beyond the gravity reference, aft (negative) to n_max,
             no more than the lift at the angle-of-attack limits gives - beyond the
             gravity reference of the moment, so that full aft stick still reaches
             the limit in a steep climb or inverted - through a 0.2 s prefilter and
             a 12 g/s onset limit (a full pull at once pitches an agile airframe
             faster than its nose-down control can stop at the angle-of-attack
             limit) -->
        <fcs_function name="fcs/fbw/dn-stick">
          <function>
            <max>
              <min>
                <table>
                  <independentVar lookup="row">fcs/pitch-trim-sum</independentVar>
                  <tableData>
                    -1.0  8.000
                     0.0  0.0
                     1.0  -4.000
                  </tableData>
                </table>
                <difference><product><property>fcs/fbw/n-alpha</property><value>0.45379</value></product><property>fcs/fbw/g-ref</property></difference>
              </min>
              <difference><product><property>fcs/fbw/n-alpha</property><value>-0.17453</value></product><property>fcs/fbw/g-ref</property></difference>
            </max>
          </function>
        </fcs_function>
        <lag_filter name="fcs/fbw/dn-lag">
          <input>fcs/fbw/dn-stick</input>
          <c1>5.0</c1>
        </lag_filter>
        <actuator name="fcs/fbw/dn-cmd">
          <input>fcs/fbw/dn-lag</input>
          <rate_limit>12.0</rate_limit>
        </actuator>
        <!-- the response the command should produce (the short period's rise): the
             integrator trims away what differs from it, not the rise itself -->
        <lag_filter name="fcs/fbw/dn-model">
          <input>fcs/fbw/dn-cmd</input>
          <c1>2.5</c1>
        </lag_filter>
        <fcs_function name="fcs/fbw/dn">
          <function>
            <difference><property>accelerations/Nz</property><property>fcs/fbw/g-ref</property></difference>
          </function>
        </fcs_function>
        <!-- the angle of attack with its rise over the next 0.35 s counted as spent
             (the rise, not the pitch rate: in a steady pull the nose turns with the
             flight path and the angle of attack holds), and the load factor the
             angle of attack left to each limit gives -->
        <fcs_function name="fcs/fbw/alpha-ahead">
          <function>
            <sum>
              <property>aero/alpha-rad</property>
              <product><value>0.35</value><property>aero/alphadot-rad_sec</property></product>
            </sum>
          </function>
        </fcs_function>
        <fcs_function name="fcs/fbw/dn-room-up">
          <function>
            <product><property>fcs/fbw/n-alpha</property>
              <difference><value>0.45379</value><property>fcs/fbw/alpha-ahead</property></difference></product>
          </function>
        </fcs_function>
        <fcs_function name="fcs/fbw/dn-room-down">
          <function>
            <product><property>fcs/fbw/n-alpha</property>
              <difference><value>-0.17453</value><property>fcs/fbw/alpha-ahead</property></difference></product>
          </function>
        </fcs_function>
        <!-- the command limited to the load factor the aircraft pulls now plus what
             the angle of attack left gives: at a limit the feedforward asks for the
             load factor the airframe gives there, whatever elevator holds it - a
             steady pull on a stable airframe, a push on an unstable one (a
             feedforward faded out past the limit instead took about 10 deg of
             elevator per deg of alpha, on one side of it only: the actuator's rate
             limit could not follow, and the MiG-29A cycled between 24 and 29 deg) -->
        <fcs_function name="fcs/fbw/dn-limited">
          <function>
            <max>
              <min>
                <property>fcs/fbw/dn-cmd</property>
                <sum><property>fcs/fbw/dn</property><property>fcs/fbw/dn-room-up</property></sum>
              </min>
              <sum><property>fcs/fbw/dn</property><property>fcs/fbw/dn-room-down</property></sum>
            </max>
          </function>
        </fcs_function>
        <!-- the integrator's error: the load factor's departure from the model
             response, and at a limit the angle of attack left, counted five times -
             it trims what the airframe needs there beyond the linear design (vortex
             lift, the tail's power at high alpha) in a fraction of a second, not
             over the pull -->
        <fcs_function name="fcs/fbw/pitch-error">
          <function>
            <max>
              <min>
                <difference><property>fcs/fbw/dn-model</property><property>fcs/fbw/dn</property></difference>
                <product><value>5.0</value><property>fcs/fbw/dn-room-up</property></product>
              </min>
              <product><value>5.0</value><property>fcs/fbw/dn-room-down</property></product>
            </max>
          </function>
        </fcs_function>
        <fcs_function name="fcs/fbw/pitch-error-rate">
          <function><product><property>fcs/fbw/k-i</property><property>fcs/fbw/pitch-error</property></product></function>
        </fcs_function>
        <!-- the integrator: reset below 60 kt and on the wheels, held while the
             elevator is at a stop it would push further into (anti-windup) -->
        <switch name="fcs/fbw/pitch-hold">
          <default value="0"/>
          <test logic="OR" value="-1">
            velocities/vc-kts lt 60
            gear/wow gt 0
          </test>
          <test logic="AND" value="1">
            fcs/fbw/elevator-raw gt 0.43633
            fcs/fbw/pitch-error-rate gt 0
          </test>
          <test logic="AND" value="1">
            fcs/fbw/elevator-raw lt -0.43633
            fcs/fbw/pitch-error-rate lt 0
          </test>
        </switch>
        <!-- held as a moment: the nozzles' share changes with thrust, the trim does not -->
        <fcs_function name="fcs/fbw/pitch-integral-moment-rate">
          <function><product><property>fcs/fbw/pitch-error-rate</property><property>fcs/fbw/md-total</property></product></function>
        </fcs_function>
        <fcs_function name="fcs/fbw/pitch-integral-limit">
          <function><product><value>-0.50000</value><property>fcs/fbw/md-total</property></product></function>
        </fcs_function>
        <integrator name="fcs/fbw/pitch-integral-moment">
          <input>fcs/fbw/pitch-integral-moment-rate</input>
          <c1>1.0</c1>
          <trigger>fcs/fbw/pitch-hold</trigger>
          <clipto> <min>-fcs/fbw/pitch-integral-limit</min> <max>fcs/fbw/pitch-integral-limit</max> </clipto>
        </integrator>
        <fcs_function name="fcs/fbw/pitch-integral">
          <function><quotient><property>fcs/fbw/pitch-integral-moment</property><property>fcs/fbw/md-total</property></quotient></function>
        </fcs_function>
        <!-- past an angle-of-attack limit (the next 0.35 s counted) a push back
             in proportion, all the travel 4 deg beyond: an unstable airframe
             pitching up fast needs it at once, not when an integrator winds -->
        <fcs_function name="fcs/fbw/alpha-push">
          <function>
            <difference>
              <product><value>6.25000</value>
                <max><value>0</value><difference><property>fcs/fbw/alpha-ahead</property><value>0.45379</value></difference></max></product>
              <product><value>6.25000</value>
                <max><value>0</value><difference><value>-0.17453</value><property>fcs/fbw/alpha-ahead</property></difference></max></product>
            </difference>
          </function>
        </fcs_function>
        <lag_filter name="fcs/fbw/ground">
          <input>gear/wow</input>
          <c1>2.0</c1>
        </lag_filter>
        <fcs_function name="fcs/fbw/ground-direct">
          <function>
            <product>
              <property>fcs/fbw/ground</property>
              <table>
                <independentVar lookup="row">fcs/pitch-trim-sum</independentVar>
                <tableData>
                  -1.0  -0.43633
                   0.0  0.0
                   1.0  0.43633
                </tableData>
              </table>
            </product>
          </function>
        </fcs_function>
        <!-- the elevator: the push, the moment compensation, angle-of-attack and
             pitch-rate feedback, the feedforward of the limited command, the
             integrator, the ground mode's direct stick -->
        <fcs_function name="fcs/fbw/elevator-raw">
          <function>
            <sum>
              <property>fcs/fbw/alpha-push</property>
              <property>fcs/fbw/moment-comp</property>
              <product><value>-1</value><property>fcs/fbw/k-alpha</property><property>aero/alpha-rad</property></product>
              <product><value>-1</value><property>fcs/fbw/k-q</property><property>velocities/q-rad_sec</property></product>
              <product><property>fcs/fbw/k-ff</property><property>fcs/fbw/dn-limited</property></product>
              <property>fcs/fbw/pitch-integral</property>
              <property>fcs/fbw/ground-direct</property>
            </sum>
          </function>
        </fcs_function>
        <pure_gain name="fcs/fbw/elevator">
          <input>fcs/fbw/elevator-raw</input>
          <gain>1.0</gain>
          <clipto> <min>-0.43633</min> <max>0.43633</max> </clipto>
        </pure_gain>
        <!-- full travel in 0.83 s: 60 deg/s for a +-25 deg tail, faster for a
             canard's longer throw -->
        <actuator name="fcs/elevator-actuator">
          <input>fcs/fbw/elevator</input>
          <lag>40</lag>
          <rate_limit>1.051</rate_limit>
          <output>fcs/elevator-pos-rad</output>
        </actuator>
      </channel>
      <channel name="Roll (fly-by-wire)">
        <!-- hangar: roll-rate command about the flight path, limited to what the rudder can
             coordinate; bank hold at neutral stick -->
        <summer name="fcs/roll-trim-sum">
          <input>fcs/aileron-cmd-norm</input>
          <input>fcs/roll-trim-cmd-norm</input>
          <clipto> <min>-1</min> <max>1</max> </clipto>
        </summer>
        <fcs_function name="fcs/fbw/k-roll-m">
          <function>
            <table>
              <independentVar lookup="row">aero/qbar-psf</independentVar>
              <independentVar lookup="column">velocities/mach</independentVar>
              <tableData>
                       0.150     0.400     0.700     0.900     1.100     1.400     2.000
              10.0  4.666949e+00  4.872442e+00  4.922306e+00  4.932831e+00  4.947729e+00  4.964614e+00  4.980222e+00
              20.0  4.333899e+00  4.744884e+00  4.844612e+00  4.865662e+00  4.895457e+00  4.929228e+00  4.960445e+00
              40.0  3.667798e+00  4.489769e+00  4.689224e+00  4.731324e+00  4.790914e+00  4.858456e+00  4.920890e+00
              80.0  2.578923e+00  4.077802e+00  4.447513e+00  4.535650e+00  4.633724e+00  4.742198e+00  4.847090e+00
             150.0  1.271062e+00  3.583217e+00  4.157144e+00  4.297152e+00  4.443782e+00  4.602533e+00  4.758836e+00
             300.0  0.000000e+00  2.566970e+00  3.525159e+00  3.728147e+00  4.009089e+00  4.323469e+00  4.611868e+00
             600.0  0.000000e+00  1.933892e-01  2.072829e+00  2.467057e+00  3.029672e+00  3.666468e+00  4.254068e+00
            1200.0  0.000000e+00  0.000000e+00  0.000000e+00  0.000000e+00  1.042496e+00  2.322655e+00  3.505490e+00
            2400.0  0.000000e+00  0.000000e+00  0.000000e+00  0.000000e+00  0.000000e+00  0.000000e+00  2.002194e+00
              </tableData>
            </table>
          </function>
        </fcs_function>
        <fcs_function name="fcs/fbw/k-roll">
          <function>
            <quotient><property>fcs/fbw/k-roll-m</property><property>fcs/fbw/lda-total</property></quotient>
          </function>
          <clipto> <min>-1.50000</min> <max>1.50000</max> </clipto>
        </fcs_function>
        <fcs_function name="fcs/fbw/k-roll-ff-m">
          <function>
            <table>
              <independentVar lookup="row">aero/qbar-psf</independentVar>
              <independentVar lookup="column">velocities/mach</independentVar>
              <tableData>
                       0.150     0.400     0.700     0.900     1.100     1.400     2.000
              10.0  3.330506e-01  1.275579e-01  7.769412e-02  6.716888e-02  5.227140e-02  3.538597e-02  1.977755e-02
              20.0  6.661012e-01  2.551157e-01  1.553882e-01  1.343378e-01  1.045428e-01  7.077193e-02  3.955510e-02
              40.0  1.332202e+00  5.102315e-01  3.107765e-01  2.686755e-01  2.090856e-01  1.415439e-01  7.911020e-02
              80.0  2.421077e+00  9.221979e-01  5.524873e-01  4.643499e-01  3.662760e-01  2.578019e-01  1.529101e-01
             150.0  3.728938e+00  1.416783e+00  8.428556e-01  7.028485e-01  5.562180e-01  3.974670e-01  2.411640e-01
             300.0  6.363193e+00  2.433030e+00  1.474841e+00  1.271853e+00  9.909106e-01  6.765312e-01  3.881317e-01
             600.0  1.255079e+01  4.806611e+00  2.927171e+00  2.532943e+00  1.970328e+00  1.333532e+00  7.459319e-01
            1200.0  2.520006e+01  9.652580e+00  5.881016e+00  5.086333e+00  3.957504e+00  2.677345e+00  1.494510e+00
            2400.0  5.051110e+01  1.934655e+01  1.178530e+01  1.019077e+01  7.929818e+00  5.366608e+00  2.997806e+00
              </tableData>
            </table>
          </function>
        </fcs_function>
        <fcs_function name="fcs/fbw/k-roll-ff">
          <function>
            <quotient><property>fcs/fbw/k-roll-ff-m</property><property>fcs/fbw/lda-total</property></quotient>
          </function>
          <clipto> <min>-1.50000</min> <max>1.50000</max> </clipto>
        </fcs_function>
        <fcs_function name="fcs/fbw/k-roll-i-m">
          <function>
            <table>
              <independentVar lookup="row">aero/qbar-psf</independentVar>
              <independentVar lookup="column">velocities/mach</independentVar>
              <tableData>
                       0.150     0.400     0.700     0.900     1.100     1.400     2.000
              10.0  4.444444e-01  4.444444e-01  4.444444e-01  4.444444e-01  4.444444e-01  4.444444e-01  4.444444e-01
              20.0  4.444444e-01  4.444444e-01  4.444444e-01  4.444444e-01  4.444444e-01  4.444444e-01  4.444444e-01
              40.0  4.444444e-01  4.444444e-01  4.444444e-01  4.444444e-01  4.444444e-01  4.444444e-01  4.444444e-01
              80.0  4.444444e-01  4.444444e-01  4.444444e-01  4.444444e-01  4.444444e-01  4.444444e-01  4.444444e-01
             150.0  4.444444e-01  4.444444e-01  4.444444e-01  4.444444e-01  4.444444e-01  4.444444e-01  4.444444e-01
             300.0  4.444444e-01  4.444444e-01  4.444444e-01  4.444444e-01  4.444444e-01  4.444444e-01  4.444444e-01
             600.0  4.444444e-01  4.444444e-01  4.444444e-01  4.444444e-01  4.444444e-01  4.444444e-01  4.444444e-01
            1200.0  4.444444e-01  4.444444e-01  4.444444e-01  4.444444e-01  4.444444e-01  4.444444e-01  4.444444e-01
            2400.0  4.444444e-01  4.444444e-01  4.444444e-01  4.444444e-01  4.444444e-01  4.444444e-01  4.444444e-01
              </tableData>
            </table>
          </function>
        </fcs_function>
        <fcs_function name="fcs/fbw/k-roll-i">
          <function>
            <quotient><property>fcs/fbw/k-roll-i-m</property><property>fcs/fbw/lda-total</property></quotient>
          </function>
          <clipto> <min>-1.00000</min> <max>1.00000</max> </clipto>
        </fcs_function>
        <fcs_function name="fcs/fbw/p-per">
          <function>
            <table>
              <independentVar lookup="row">aero/qbar-psf</independentVar>
              <independentVar lookup="column">velocities/mach</independentVar>
              <tableData>
                       0.150     0.400     0.700     0.900     1.100     1.400     2.000
              10.0  1.048087e+00  2.736529e+00  4.492822e+00  5.196839e+00  6.677951e+00  9.864528e+00  1.764960e+01
              20.0  5.240433e-01  1.368265e+00  2.246411e+00  2.598419e+00  3.338976e+00  4.932264e+00  8.824800e+00
              40.0  2.620216e-01  6.841323e-01  1.123206e+00  1.299210e+00  1.669488e+00  2.466132e+00  4.412400e+00
              80.0  1.441779e-01  3.785151e-01  6.318079e-01  7.517302e-01  9.530132e-01  1.354008e+00  2.282817e+00
             150.0  9.361000e-02  2.463791e-01  4.141467e-01  4.966445e-01  6.275702e-01  8.782261e-01  1.447421e+00
             300.0  5.485703e-02  1.434696e-01  2.366804e-01  2.744545e-01  3.522678e-01  5.159641e-01  8.993491e-01
             600.0  2.781227e-02  7.262203e-02  1.192502e-01  1.378104e-01  1.771613e-01  2.617603e-01  4.679594e-01
            1200.0  1.385179e-02  3.616296e-02  5.935468e-02  6.862819e-02  8.820353e-02  1.303776e-01  2.335655e-01
            2400.0  6.910676e-03  1.804280e-02  2.961874e-02  3.425315e-02  4.401940e-02  6.504404e-02  1.164404e-01
              </tableData>
            </table>
          </function>
        </fcs_function>
        <fcs_function name="fcs/fbw/p-max">
          <function>
            <min>
              <value>4.71239</value>
              <product><property>fcs/fbw/p-per</property><property>fcs/fbw/lda-total</property></product>
            </min>
          </function>
        </fcs_function>
        <!-- the stick's rate halves towards alpha_max -->
        <fcs_function name="fcs/fbw/p-stick">
          <function>
            <product>
              <property>fcs/roll-trim-sum</property>
              <property>fcs/fbw/p-max</property>
              <table>
                <independentVar lookup="row">aero/alpha-rad</independentVar>
                <tableData>
                  0.18151 1.0
                  0.45379 0.5
                </tableData>
              </table>
            </product>
          </function>
        </fcs_function>
        <!-- the rudder's yaw acceleration at full travel (1/s^2), and the yaw damping (1/s) -->
        <fcs_function name="fcs/fbw/yaw-accel">
          <function><product><value>-0.34907</value><property>fcs/fbw/ndr-total</property></product></function>
        </fcs_function>
        <fcs_function name="fcs/fbw/yaw-damping">
          <function>
            <table>
              <independentVar lookup="row">aero/qbar-psf</independentVar>
              <independentVar lookup="column">velocities/mach</independentVar>
              <tableData>
                       0.150     0.400     0.700     0.900     1.100     1.400     2.000
              10.0   0.02073   0.00794   0.00484   0.00418   0.00325   0.00220   0.00123
              20.0   0.04146   0.01588   0.00967   0.00836   0.00651   0.00440   0.00246
              40.0   0.08292   0.03176   0.01934   0.01672   0.01301   0.00881   0.00492
              80.0   0.14178   0.05394   0.03223   0.02706   0.02135   0.01510   0.00917
             150.0   0.23388   0.08935   0.05402   0.04611   0.03609   0.02487   0.01433
             300.0   0.42839   0.16364   0.09891   0.08443   0.06609   0.04556   0.02623
             600.0   0.79766   0.30500   0.18488   0.15827   0.12373   0.08481   0.04834
            1200.0   1.51446   0.57936   0.35177   0.30347   0.23639   0.16098   0.09125
            2400.0   2.98667   1.14361   0.69607   0.60112   0.46803   0.31736   0.17790
              </tableData>
            </table>
          </function>
        </fcs_function>
        <!-- the rudder's share of the yaw a roll about the flight path needs, per unit of
             its roll acceleration: sin(alpha), less the ailerons' own yaw and what a
             principal axis inclined to the body axis gives -->
        <fcs_function name="fcs/fbw/roll-yaw-share">
          <function>
            <table>
              <independentVar lookup="row">aero/alpha-rad</independentVar>
              <tableData>
                   -0.34907  -0.38805
                   -0.26180  -0.31175
                   -0.17453  -0.23603
                   -0.08727  -0.15424
                    0.00000  -0.06323
                    0.08727   0.03305
                    0.17453   0.10611
                    0.26180   0.16759
                    0.34907   0.23490
                    0.43633   0.31321
                    0.52360   0.39684
                    0.61087   0.48396
                    0.69813   0.57861
                    0.78540   0.62914
                    0.87266   0.67231
              </tableData>
            </table>
          </function>
        </fcs_function>
        <!-- the yaw acceleration each rad/s of roll rate needs while the aircraft pitches
             under it: the pitch rate's inertia coupling, the angle of attack rising, and
             the yaw damping the roll's yaw rate meets -->
        <fcs_function name="fcs/fbw/p-yaw-need">
          <function>
            <abs>
              <sum>
                <product>
                  <sum>
                    <property>aero/alphadot-rad_sec</property>
                    <product><value>0.62597</value><property>velocities/q-rad_sec</property></product>
                  </sum>
                  <cos><property>aero/alpha-rad</property></cos>
                </product>
                <product><property>fcs/fbw/yaw-damping</property><sin><property>aero/alpha-rad</property></sin></product>
              </sum>
            </abs>
          </function>
        </fcs_function>
        <!-- no more roll rate than 0.5 of the rudder's yaw holds: a roll the rudder cannot
             follow turns the angle of attack into sideslip -->
        <fcs_function name="fcs/fbw/p-yaw-max">
          <function>
            <quotient>
              <product><value>0.5</value><property>fcs/fbw/yaw-accel</property></product>
              <max><value>0.001</value><property>fcs/fbw/p-yaw-need</property></max>
            </quotient>
          </function>
        </fcs_function>
        <fcs_function name="fcs/fbw/p-limited">
          <function>
            <max>
              <min><property>fcs/fbw/p-stick</property><property>fcs/fbw/p-yaw-max</property></min>
              <product><value>-1</value><property>fcs/fbw/p-yaw-max</property></product>
            </max>
          </function>
        </fcs_function>
        <!-- and while the rate grows, no faster roll acceleration than all of it
             coordinates, unless the roll asked for could not leave 2.0 deg of sideslip
             even uncoordinated: at worst c^2 p^2 / (8 Y), c the rudder's share, Y its yaw
             acceleration, p the rate asked for -->
        <fcs_function name="fcs/fbw/p-accel">
          <function>
            <product>
              <quotient>
                <property>fcs/fbw/yaw-accel</property>
                <max><value>0.01</value><abs><property>fcs/fbw/roll-yaw-share</property></abs></max>
              </quotient>
              <max>
                <value>1</value>
                <quotient>
                  <product><value>0.27925</value><property>fcs/fbw/yaw-accel</property></product>
                  <sum>
                    <value>1e-9</value>
                    <product>
                      <property>fcs/fbw/roll-yaw-share</property><property>fcs/fbw/roll-yaw-share</property>
                      <property>fcs/fbw/p-limited</property><property>fcs/fbw/p-limited</property>
                    </product>
                  </sum>
                </quotient>
              </max>
            </product>
          </function>
        </fcs_function>
        <!-- a roll is stopped as fast as the ailerons can -->
        <fcs_function name="fcs/fbw/p-accel-up">
          <function>
            <sum><property>fcs/fbw/p-accel</property>
              <product><value>1000</value><lt><property>fcs/fbw/p-cmd</property><value>0</value></lt></product></sum>
          </function>
        </fcs_function>
        <fcs_function name="fcs/fbw/p-accel-down">
          <function>
            <sum><property>fcs/fbw/p-accel</property>
              <product><value>1000</value><gt><property>fcs/fbw/p-cmd</property><value>0</value></gt></product></sum>
          </function>
        </fcs_function>
        <actuator name="fcs/fbw/p-cmd">
          <input>fcs/fbw/p-limited</input>
          <rate_limit sense="incr">fcs/fbw/p-accel-up</rate_limit>
          <rate_limit sense="decr">fcs/fbw/p-accel-down</rate_limit>
        </actuator>
        <fcs_function name="fcs/fbw/p-stability">
          <function>
            <sum>
              <product><property>velocities/p-rad_sec</property><cos><property>aero/alpha-rad</property></cos></product>
              <product><property>velocities/r-rad_sec</property><sin><property>aero/alpha-rad</property></sin></product>
            </sum>
          </function>
        </fcs_function>
        <fcs_function name="fcs/fbw/roll-error-rate">
          <function>
            <product><property>fcs/fbw/k-roll-i</property>
              <difference><property>fcs/fbw/p-cmd</property><property>fcs/fbw/p-stability</property></difference></product>
          </function>
        </fcs_function>
        <!-- held as a moment: the nozzles' share changes with thrust, the trim does not -->
        <fcs_function name="fcs/fbw/roll-integral-moment-rate">
          <function><product><property>fcs/fbw/roll-error-rate</property><property>fcs/fbw/lda-total</property></product></function>
        </fcs_function>
        <fcs_function name="fcs/fbw/roll-integral-limit">
          <function><product><value>0.21817</value><property>fcs/fbw/lda-total</property></product></function>
        </fcs_function>
        <integrator name="fcs/fbw/roll-integral-moment">
          <input>fcs/fbw/roll-integral-moment-rate</input>
          <c1>1.0</c1>
          <trigger>fcs/fbw/reset</trigger>
          <clipto> <min>-fcs/fbw/roll-integral-limit</min> <max>fcs/fbw/roll-integral-limit</max> </clipto>
        </integrator>
        <fcs_function name="fcs/fbw/roll-integral">
          <function><quotient><property>fcs/fbw/roll-integral-moment</property><property>fcs/fbw/lda-total</property></quotient></function>
        </fcs_function>
        <fcs_function name="fcs/fbw/aileron">
          <function>
            <sum>
              <product><property>fcs/fbw/k-roll-ff</property><property>fcs/fbw/p-cmd</property></product>
              <product><property>fcs/fbw/k-roll</property>
                <difference><property>fcs/fbw/p-cmd</property><property>fcs/fbw/p-stability</property></difference></product>
              <property>fcs/fbw/roll-integral</property>
            </sum>
          </function>
          <clipto> <min>-0.43633</min> <max>0.43633</max> </clipto>
        </fcs_function>
        <actuator name="fcs/left-aileron-actuator">
          <input>fcs/fbw/aileron</input>
          <lag>40</lag>
          <rate_limit>1.4</rate_limit>
          <output>fcs/left-aileron-pos-rad</output>
        </actuator>
        <pure_gain name="fcs/right-aileron">
          <input>fcs/left-aileron-pos-rad</input>
          <gain>-1</gain>
          <output>fcs/right-aileron-pos-rad</output>
        </pure_gain>
      </channel>
      <channel name="Yaw (fly-by-wire)">
        <!-- hangar: yaw damper, sideslip feedback, pedals command sideslip -->
        <summer name="fcs/yaw-trim-sum">
          <input>fcs/rudder-cmd-norm</input>
          <input>fcs/yaw-trim-cmd-norm</input>
          <clipto> <min>-1</min> <max>1</max> </clipto>
        </summer>
        <fcs_function name="fcs/fbw/k-yaw-r-m">
          <function>
            <table>
              <independentVar lookup="row">aero/qbar-psf</independentVar>
              <independentVar lookup="column">velocities/mach</independentVar>
              <tableData>
                       0.150     0.400     0.700     0.900     1.100     1.400     2.000
              10.0  1.480045e+00  1.492353e+00  1.495332e+00  1.495948e+00  1.496834e+00  1.497879e+00  1.498806e+00
              20.0  1.460091e+00  1.484705e+00  1.490665e+00  1.491896e+00  1.493667e+00  1.495759e+00  1.497612e+00
              40.0  1.583118e+00  1.636492e+00  1.655158e+00  1.645392e+00  1.496585e+00  1.643822e+00  1.495223e+00
              80.0  1.502203e+00  1.585306e+00  1.513930e+00  1.463757e+00  1.472665e+00  1.673804e+00  1.712888e+00
             150.0  1.149590e+00  1.366691e+00  1.420589e+00  1.434414e+00  1.450763e+00  1.462804e+00  1.480327e+00
             300.0  8.437448e-01  1.250620e+00  1.351933e+00  1.378408e+00  1.408663e+00  1.430318e+00  1.462790e+00
             600.0  2.781879e-01  1.035424e+00  1.223660e+00  1.272221e+00  1.329168e+00  1.370297e+00  1.431096e+00
            1200.0  0.000000e+00  6.306680e-01  9.782537e-01  1.062219e+00  1.172921e+00  1.263079e+00  1.369823e+00
            2400.0  0.000000e+00  2.905993e-01  9.991848e-01  1.154000e+00  1.191554e+00  1.537911e+00  1.383986e+00
              </tableData>
            </table>
          </function>
        </fcs_function>
        <fcs_function name="fcs/fbw/k-yaw-r">
          <function>
            <quotient><property>fcs/fbw/k-yaw-r-m</property><property>fcs/fbw/ndr-total</property></quotient>
          </function>
          <clipto> <min>-3.00000</min> <max>3.00000</max> </clipto>
        </fcs_function>
        <fcs_function name="fcs/fbw/k-yaw-beta-m">
          <function>
            <table>
              <independentVar lookup="row">aero/qbar-psf</independentVar>
              <independentVar lookup="column">velocities/mach</independentVar>
              <tableData>
                       0.150     0.400     0.700     0.900     1.100     1.400     2.000
              10.0 -1.558660e+00 -1.555210e+00 -1.549574e+00 -1.559772e+00 -1.680541e+00 -1.567473e+00 -1.812705e+00
              20.0 -8.673209e-01 -8.604200e-01 -8.491489e-01 -8.695442e-01 -1.111082e+00 -8.849459e-01 -1.375410e+00
              40.0 -4.440892e-16  0.000000e+00 -4.440892e-16  0.000000e+00 -4.440892e-16  0.000000e+00 -5.008199e-01
              80.0 -4.440892e-16  0.000000e+00  0.000000e+00 -3.147805e-01 -4.874514e-01 -4.440892e-16  0.000000e+00
             150.0 -5.679197e-01 -6.136998e-01 -7.524767e-01 -9.768610e-01 -1.124621e+00 -5.676101e-01 -6.814496e-01
             300.0 -8.196357e-01 -8.413419e-01 -9.116681e-01 -1.056848e+00 -1.218781e+00 -8.263107e-01 -1.095086e+00
             600.0 -6.189881e-01 -6.318075e-01 -6.788520e-01 -7.976479e-01 -1.015784e+00 -6.314106e-01 -1.039737e+00
            1200.0  0.000000e+00  0.000000e+00  0.000000e+00 -5.619489e-02 -4.253598e-01 -4.440892e-16 -6.478341e-01
            2400.0  0.000000e+00  0.000000e+00  0.000000e+00  0.000000e+00 -4.440892e-16  0.000000e+00 -4.440892e-16
              </tableData>
            </table>
          </function>
        </fcs_function>
        <fcs_function name="fcs/fbw/k-yaw-beta">
          <function>
            <quotient><property>fcs/fbw/k-yaw-beta-m</property><property>fcs/fbw/ndr-total</property></quotient>
          </function>
          <clipto> <min>-3.00000</min> <max>3.00000</max> </clipto>
        </fcs_function>
        <fcs_function name="fcs/fbw/k-pedal-m">
          <function>
            <table>
              <independentVar lookup="row">aero/qbar-psf</independentVar>
              <independentVar lookup="column">velocities/mach</independentVar>
              <tableData>
                       0.150     0.400     0.700     0.900     1.100     1.400     2.000
              10.0 -1.287389e-02 -1.293815e-02 -1.304309e-02 -1.285319e-02 -1.060428e-02 -1.270979e-02 -8.143161e-03
              20.0 -2.574778e-02 -2.587629e-02 -2.608618e-02 -2.570638e-02 -2.120855e-02 -2.541958e-02 -1.628632e-02
              40.0 -5.149557e-02 -5.175258e-02 -5.217236e-02 -5.141277e-02 -4.241711e-02 -5.083915e-02 -3.257264e-02
              80.0 -7.036147e-02 -6.930714e-02 -6.558221e-02 -5.869749e-02 -5.064228e-02 -7.002139e-02 -5.537857e-02
             150.0 -8.342859e-02 -8.310630e-02 -8.165129e-02 -7.806272e-02 -6.531592e-02 -8.265777e-02 -5.961472e-02
             300.0 -1.374298e-01 -1.373609e-01 -1.362469e-01 -1.290492e-01 -1.084506e-01 -1.359771e-01 -9.219170e-02
             600.0 -2.189698e-01 -2.187327e-01 -2.165798e-01 -2.059399e-01 -1.727512e-01 -2.167055e-01 -1.490468e-01
            1200.0 -3.594353e-01 -3.595218e-01 -3.579067e-01 -3.513968e-01 -2.904067e-01 -3.555300e-01 -2.408877e-01
            2400.0 -6.947100e-01 -6.978810e-01 -7.026758e-01 -6.911463e-01 -5.707105e-01 -6.859719e-01 -4.417753e-01
              </tableData>
            </table>
          </function>
        </fcs_function>
        <fcs_function name="fcs/fbw/k-pedal">
          <function>
            <quotient><property>fcs/fbw/k-pedal-m</property><property>fcs/fbw/ndr-total</property></quotient>
          </function>
          <clipto> <min>0.00000</min> <max>0.34907</max> </clipto>
        </fcs_function>
        <!-- the yaw damper damps the sideslip's rate, the stability-axis yaw rate less
             the one that coordinates the bank and the side force: in the dutch roll the
             yaw rate itself, and zero in a steady coordinated turn, in a roll about the
             flight path and in a steady sideslip - it coordinates those as long as they
             last (a damper on the washed-out yaw rate stopped coordinating a sustained
             roll, and at low speed the roll turned the angle of attack into sideslip) -->
        <!-- on the wheels (the pitch's ground mode, fcs/fbw/ground) the pedals move the rudder
             directly over its travel, a ground law: the sideslip feedback, there the
             crosswind's, turned the nose into it, and as the C-17A's nose wheel unloaded
             towards its rotation it ran 8.6 m off its line across 10 m/s -->
        <fcs_function name="fcs/fbw/rudder">
          <function>
            <sum>
              <product>
                <difference><value>1</value><property>fcs/fbw/ground</property></difference>
                <sum>
                  <product><property>fcs/fbw/k-pedal</property><property>fcs/yaw-trim-sum</property></product>
                  <product><value>-1</value><property>fcs/fbw/k-yaw-beta</property>
                    <difference><property>aero/beta-rad</property>
                      <product><value>0.17453</value><property>fcs/yaw-trim-sum</property></product></difference></product>
                  <product><property>fcs/fbw/k-yaw-r</property><property>aero/betadot-rad_sec</property></product>
                </sum>
              </product>
              <product><property>fcs/fbw/ground</property><value>0.34907</value><property>fcs/yaw-trim-sum</property></product>
            </sum>
          </function>
          <clipto> <min>-0.34907</min> <max>0.34907</max> </clipto>
        </fcs_function>
        <actuator name="fcs/rudder-actuator">
          <input>fcs/fbw/rudder</input>
          <lag>40</lag>
          <rate_limit>1.4</rate_limit>
          <output>fcs/rudder-pos-rad</output>
        </actuator>
        <!-- the nose wheel steers with the pedals (JSBSim steers from fcs/steer-cmd-norm,
             positive right; the rudder command is positive left) -->
        <pure_gain name="fcs/steer-from-rudder">
          <input>fcs/yaw-trim-sum</input>
          <gain>-1</gain>
          <output>fcs/steer-cmd-norm</output>
        </pure_gain>
      </channel>
      <channel name="Flaps">
        <kinematic name="fcs/flaps-control">
          <input>fcs/flap-cmd-norm</input>
          <traverse>
            <setting> <position>0.0</position> <time>0.0</time> </setting>
            <setting> <position>6.2</position> <time>2.0</time> </setting>
            <setting> <position>12.5</position> <time>2.0</time> </setting>
            <setting> <position>18.8</position> <time>2.0</time> </setting>
            <setting> <position>25.0</position> <time>2.0</time> </setting>
          </traverse>
          <output>fcs/flap-pos-deg</output>
        </kinematic>
        <pure_gain name="fcs/flaps-normalized">
          <input>fcs/flap-pos-deg</input>
          <gain>0.04</gain>
          <output>fcs/flap-pos-norm</output>
        </pure_gain>
      </channel>
      <channel name="Speedbrake">
        <kinematic name="fcs/speedbrake-control">
          <input>fcs/speedbrake-cmd-norm</input>
          <traverse>
            <setting> <position>0</position> <time>0</time> </setting>
            <setting> <position>1</position> <time>2.00</time> </setting>
          </traverse>
          <output>fcs/speedbrake-pos-norm</output>
        </kinematic>
        <pure_gain name="fcs/speedbrake-rudder">
          <input>fcs/speedbrake-pos-norm</input>
          <gain>20</gain>
          <output>fcs/speedbrake-rudder-deg</output>
        </pure_gain>
        <pure_gain name="fcs/speedbrake-aileron">
          <input>fcs/speedbrake-pos-norm</input>
          <gain>20</gain>
          <output>fcs/speedbrake-aileron-deg</output>
        </pure_gain>
      </channel>
      <channel name="Leading-Edge Flaps">
        <fcs_function name="fcs/lef-schedule">
          <function>
            <sum>
              <product> <value>1.38</value> <property>aero/alpha-deg</property> </product>
              <product> <value>-9.05</value>
                <quotient> <property>aero/qbar-psf</property> <property>atmosphere/P-psf</property> </quotient>
              </product>
              <value>1.45</value>
            </sum>
          </function>
          <clipto> <min>-5</min> <max>30</max> </clipto>
        </fcs_function>
        <actuator name="fcs/lef-actuator">
          <input>fcs/lef-schedule</input>
          <lag>7.35</lag>
          <rate_limit>25</rate_limit>
          <output>fcs/lef-pos-deg</output>
        </actuator>
      </channel>
      <channel name="Throttle 0">
        <fcs_function name="fcs/throttle-lever-0">
          <function>
            <table>
              <independentVar lookup="row">fcs/throttle-cmd-norm[0]</independentVar>
              <tableData>
                0.0  0.0
                0.8  1.0
                1.0  2.0
              </tableData>
            </table>
          </function>
          <output>fcs/throttle-pos-norm[0]</output>
        </fcs_function>
      </channel>
      <channel name="Throttle 1">
        <fcs_function name="fcs/throttle-lever-1">
          <function>
            <table>
              <independentVar lookup="row">fcs/throttle-cmd-norm[1]</independentVar>
              <tableData>
                0.0  0.0
                0.8  1.0
                1.0  2.0
              </tableData>
            </table>
          </function>
          <output>fcs/throttle-pos-norm[1]</output>
        </fcs_function>
      </channel>
      <channel name="Landing Gear">
        <kinematic name="fcs/gear-control">
          <input>gear/gear-cmd-norm</input>
          <traverse>
            <setting> <position>0</position> <time>0</time> </setting>
            <setting> <position>1</position> <time>5</time> </setting>
          </traverse>
          <output>gear/gear-pos-norm</output>
        </kinematic>
      </channel>
      <channel name="Thrust Vectoring">
        <!-- hangar: each nozzle turns with the surfaces (hangar/fcs.py): through its
             travel as the elevator goes through its own (a positive deflection
             pushes the tail up, nose down, as the elevator's does), differentially
             through half of it with the ailerons (the left nozzle's tail up rolls
             right) and, in a canted plane, with the rudder -->
        <fcs_function name="fcs/vectoring/nozzle-0-rad">
          <function>
            <sum>
              <product><value>0.600000</value><property>fcs/elevator-pos-rad</property></product>
              <product><value>0.300000</value><property>fcs/left-aileron-pos-rad</property></product>
              <product><value>-0.375000</value><property>fcs/rudder-pos-rad</property></product>
            </sum>
          </function>
          <clipto> <min>-0.261799</min> <max>0.261799</max> </clipto>
        </fcs_function>
        <fcs_function name="fcs/vectoring/pitch-0-rad">
          <function>
            <sum><value>0.000000</value><product><value>0.848048</value><property>fcs/vectoring/nozzle-0-rad</property></product></sum>
          </function>
          <output>propulsion/engine[0]/pitch-angle-rad</output>
        </fcs_function>
        <fcs_function name="fcs/vectoring/yaw-0-rad">
          <function>
            <sum><value>0.000000</value><product><value>-0.529919</value><property>fcs/vectoring/nozzle-0-rad</property></product></sum>
          </function>
          <output>propulsion/engine[0]/yaw-angle-rad</output>
        </fcs_function>
        <fcs_function name="fcs/vectoring/nozzle-1-rad">
          <function>
            <sum>
              <product><value>0.600000</value><property>fcs/elevator-pos-rad</property></product>
              <product><value>-0.300000</value><property>fcs/left-aileron-pos-rad</property></product>
              <product><value>0.375000</value><property>fcs/rudder-pos-rad</property></product>
            </sum>
          </function>
          <clipto> <min>-0.261799</min> <max>0.261799</max> </clipto>
        </fcs_function>
        <fcs_function name="fcs/vectoring/pitch-1-rad">
          <function>
            <sum><value>0.000000</value><product><value>0.848048</value><property>fcs/vectoring/nozzle-1-rad</property></product></sum>
          </function>
          <output>propulsion/engine[1]/pitch-angle-rad</output>
        </fcs_function>
        <fcs_function name="fcs/vectoring/yaw-1-rad">
          <function>
            <sum><value>0.000000</value><product><value>0.529919</value><property>fcs/vectoring/nozzle-1-rad</property></product></sum>
          </function>
          <output>propulsion/engine[1]/yaw-angle-rad</output>
        </fcs_function>
      </channel>
    </flight_control>
    <aerodynamics>
        <function name="aero/function/mach-lift">
          <description>lift, and damping, over its low-speed value (hangar: aero/mach.py)</description>
          <table>
            <independentVar lookup="row">velocities/mach</independentVar>
            <tableData>
                 0.000     1.000000
                 0.300     1.014406
                 0.500     1.042966
                 0.600     1.065479
                 0.700     1.096482
                 0.800     1.141868
                 0.850     1.174361
                 0.900     1.218782
                 0.950     1.222160
                 1.000     1.210216
                 1.050     1.187669
                 1.100     1.159237
                 1.200     1.103591
                 1.400     0.998791
                 1.600     1.001780
                 1.800     0.886214
                 2.000     0.797477
                 2.300     0.698337
                 2.600     0.618684
            </tableData>
          </table>
        </function>
        <function name="aero/function/mach-side">
          <description>side force, rolling and yawing moment over their low-speed values</description>
          <table>
            <independentVar lookup="row">velocities/mach</independentVar>
            <tableData>
                 0.000     1.000000
                 0.300     1.003893
                 0.500     1.010001
                 0.600     1.013190
                 0.700     1.015115
                 0.800     1.013057
                 0.850     1.008761
                 0.900     1.000335
                 0.950     0.968125
                 1.000     0.921903
                 1.050     0.871141
                 1.100     0.825307
                 1.200     0.786304
                 1.400     0.989175
                 1.600     0.827038
                 1.800     0.715849
                 2.000     0.633764
                 2.300     0.543215
                 2.600     0.476792
            </tableData>
          </table>
        </function>
        <function name="aero/function/mach-dCm-dCL">
          <description>pitching moment per unit low-speed lift: the neutral point's move</description>
          <table>
            <independentVar lookup="row">velocities/mach</independentVar>
            <tableData>
                 0.000     0.000000
                 0.300    -0.003129
                 0.500    -0.009489
                 0.600    -0.014663
                 0.700    -0.022127
                 0.800    -0.034287
                 0.850    -0.043924
                 0.900    -0.057477
                 0.950    -0.097363
                 1.000    -0.150040
                 1.050    -0.206022
                 1.100    -0.256768
                 1.200    -0.316432
                 1.400    -0.304198
                 1.600    -0.283644
                 1.800    -0.249932
                 2.000    -0.222698
                 2.300    -0.189551
                 2.600    -0.165611
            </tableData>
          </table>
        </function>
        <function name="aero/function/mach-dCD0">
          <description>zero-lift drag's change: friction and wave drag</description>
          <table>
            <independentVar lookup="row">velocities/mach</independentVar>
            <tableData>
                 0.000     0.000000
                 0.300    -0.000099
                 0.500    -0.000270
                 0.600    -0.000383
                 0.700    -0.000514
                 0.800    -0.000660
                 0.850    -0.000739
                 0.900    -0.000694
                 0.950    -0.000077
                 1.000     0.007053
                 1.050     0.026213
                 1.100     0.026121
                 1.200     0.025929
                 1.400     0.024641
                 1.600     0.023793
                 1.800     0.023026
                 2.000     0.022308
                 2.300     0.021303
                 2.600     0.020375
            </tableData>
          </table>
        </function>
        <function name="aero/function/mach-dK">
          <description>induced-drag factor's change (per CL^2)</description>
          <table>
            <independentVar lookup="row">velocities/mach</independentVar>
            <tableData>
                 0.000     0.000000
                 0.300     0.005808
                 0.500     0.016618
                 0.600     0.024534
                 0.700     0.034648
                 0.800     0.047994
                 0.850     0.056613
                 0.900     0.067300
                 0.950     0.068065
                 1.000     0.065330
                 1.050     0.062105
                 1.100     0.061510
                 1.200     0.071743
                 1.400     0.104910
                 1.600     0.106375
                 1.800     0.089997
                 2.000     0.067587
                 2.300     0.024684
                 2.600    -0.033505
            </tableData>
          </table>
        </function>
        <function name="aero/function/mach-aileron">
          <description>aileron power over its low-speed value</description>
          <table>
            <independentVar lookup="row">velocities/mach</independentVar>
            <tableData>
                 0.000     1.000000
                 0.300     1.018481
                 0.500     1.056534
                 0.600     1.087907
                 0.700     1.133053
                 0.800     1.202601
                 0.850     1.254384
                 0.900     1.328315
                 0.950     1.250024
                 1.000     1.103588
                 1.050     0.921365
                 1.100     0.735711
                 1.200     0.483537
                 1.400     0.411387
                 1.600     0.445853
                 1.800     0.384269
                 2.000     0.339268
                 2.300     0.289998
                 2.600     0.254068
            </tableData>
          </table>
        </function>
        <function name="aero/function/mach-elevator">
          <description>elevator power over its low-speed value</description>
          <table>
            <independentVar lookup="row">velocities/mach</independentVar>
            <tableData>
                 0.000     1.000000
                 0.300     1.024480
                 0.500     1.074941
                 0.600     1.116534
                 0.700     1.176329
                 0.800     1.268517
                 0.850     1.337532
                 0.900     1.432950
                 0.950     1.440147
                 1.000     1.410825
                 1.050     1.359832
                 1.100     1.302019
                 1.200     1.225331
                 1.400     1.200041
                 1.600     0.979565
                 1.800     0.836657
                 2.000     0.734318
                 2.300     0.623961
                 2.600     0.544460
            </tableData>
          </table>
        </function>
        <function name="aero/function/mach-flap">
          <description>flap power over its low-speed value</description>
          <table>
            <independentVar lookup="row">velocities/mach</independentVar>
            <tableData>
                 0.000     1.000000
                 0.300     1.030877
                 0.500     1.098120
                 0.600     1.157531
                 0.700     1.249648
                 0.800     1.407002
                 0.850     1.535931
                 0.900     1.736493
                 0.950     1.657857
                 1.000     1.456773
                 1.050     1.189255
                 1.100     0.911314
                 1.200     0.548214
                 1.400     0.466412
                 1.600     0.505488
                 1.800     0.435667
                 2.000     0.384647
                 2.300     0.328787
                 2.600     0.288052
            </tableData>
          </table>
        </function>
        <function name="aero/function/mach-rudder">
          <description>rudder power over its low-speed value</description>
          <table>
            <independentVar lookup="row">velocities/mach</independentVar>
            <tableData>
                 0.000     1.000000
                 0.300     1.008882
                 0.500     1.025258
                 0.600     1.036893
                 0.700     1.050782
                 0.800     1.066108
                 0.850     1.073312
                 0.900     1.078206
                 0.950     1.050401
                 1.000     1.002517
                 1.050     0.946420
                 1.100     0.893977
                 1.200     0.847513
                 1.400     1.066176
                 1.600     0.891418
                 1.800     0.771573
                 2.000     0.683099
                 2.300     0.585501
                 2.600     0.513907
            </tableData>
          </table>
        </function>
        <function name="aero/function/CL-base">
          <description>CL over alpha and beta at low speed</description>
          <table>
            <independentVar lookup="row">aero/alpha-deg</independentVar>
            <independentVar lookup="column">aero/beta-deg</independentVar>
            <tableData>
                        -90.00    -70.00    -50.00    -40.00    -30.00    -25.00    -20.00    -15.00    -10.00     -6.00     -3.00      0.00      3.00      6.00     10.00     15.00     20.00     25.00     30.00     40.00     50.00     70.00     90.00
             -180.00   0.00000   0.00000   0.00000   0.00000   0.00000   0.00000   0.00000   0.00000   0.00000   0.00000   0.00000   0.00000   0.00000   0.00000   0.00000   0.00000   0.00000   0.00000   0.00000   0.00000   0.00000   0.00000   0.00000
             -120.00   0.00000   0.12067   0.36617   0.50269   0.62770   0.68105   0.72837   0.76407   0.79092   0.80483   0.81072   0.81267   0.81072   0.80483   0.79092   0.76407   0.72837   0.68105   0.62770   0.50269   0.36617   0.12067   0.00000
              -70.00  -0.00000  -0.09439  -0.28922  -0.39805  -0.49787  -0.54070  -0.57782  -0.60732  -0.62891  -0.64012  -0.64487  -0.64645  -0.64487  -0.64012  -0.62891  -0.60732  -0.57782  -0.54070  -0.49787  -0.39805  -0.28922  -0.09439  -0.00000
              -46.00  -0.00000  -0.36220  -0.65134  -0.85018  -1.05680  -1.14359  -1.21774  -1.27808  -1.30666  -1.30737  -1.30154  -1.29929  -1.30154  -1.30737  -1.30666  -1.27808  -1.21774  -1.14359  -1.05680  -0.85018  -0.65134  -0.36220  -0.00000
              -32.00  -0.00000  -0.46256  -0.65333  -0.85450  -1.06070  -1.15180  -1.24213  -1.32840  -1.40116  -1.44336  -1.46246  -1.46636  -1.46246  -1.44336  -1.40116  -1.32840  -1.24213  -1.15180  -1.06070  -0.85450  -0.65333  -0.46256  -0.00000
              -22.00  -0.00000  -0.36555  -0.51353  -0.68168  -0.89078  -0.97646  -1.04871  -1.10426  -1.14371  -1.16341  -1.17176  -1.17454  -1.17176  -1.16341  -1.14371  -1.10426  -1.04871  -0.97646  -0.89078  -0.68168  -0.51353  -0.36555  -0.00000
              -17.00  -0.00000  -0.29689  -0.41485  -0.56434  -0.72742  -0.79159  -0.84329  -0.88618  -0.91634  -0.93192  -0.93854  -0.94075  -0.93854  -0.93192  -0.91634  -0.88618  -0.84329  -0.79159  -0.72742  -0.56434  -0.41485  -0.29689  -0.00000
              -13.00  -0.00000  -0.23799  -0.32822  -0.45132  -0.56423  -0.61359  -0.65413  -0.68740  -0.71033  -0.72214  -0.72714  -0.72882  -0.72714  -0.72214  -0.71033  -0.68740  -0.65413  -0.61359  -0.56423  -0.45132  -0.32822  -0.23799  -0.00000
               -9.00  -0.00000  -0.17702  -0.25596  -0.31632  -0.38647  -0.42236  -0.45301  -0.47555  -0.49107  -0.49892  -0.50221  -0.50331  -0.50221  -0.49892  -0.49107  -0.47555  -0.45301  -0.42236  -0.38647  -0.31632  -0.25596  -0.17702  -0.00000
               -5.00  -0.00000  -0.10320  -0.14431  -0.17351  -0.21097  -0.23262  -0.25070  -0.26309  -0.27198  -0.27621  -0.27786  -0.27839  -0.27786  -0.27621  -0.27198  -0.26309  -0.25070  -0.23262  -0.21097  -0.17351  -0.14431  -0.10320  -0.00000
               -1.00  -0.00000  -0.02049  -0.03008  -0.03772  -0.04718  -0.04997  -0.05455  -0.05525  -0.05569  -0.05596  -0.05612  -0.05619  -0.05612  -0.05596  -0.05569  -0.05525  -0.05455  -0.04997  -0.04718  -0.03772  -0.03008  -0.02049  -0.00000
                3.00   0.00000   0.06203   0.08728   0.10316   0.12300   0.13105   0.14155   0.15256   0.16088   0.16525   0.16694   0.16748   0.16694   0.16525   0.16088   0.15256   0.14155   0.13105   0.12300   0.10316   0.08728   0.06203   0.00000
                7.00   0.00000   0.14587   0.19713   0.23759   0.28944   0.31347   0.33977   0.36155   0.37796   0.38625   0.38971   0.39086   0.38971   0.38625   0.37796   0.36155   0.33977   0.31347   0.28944   0.23759   0.19713   0.14587   0.00000
               11.00   0.00000   0.20966   0.28479   0.36823   0.45792   0.49814   0.53888   0.57085   0.59464   0.60700   0.61224   0.61398   0.61224   0.60700   0.59464   0.57085   0.53888   0.49814   0.45792   0.36823   0.28479   0.20966   0.00000
               15.00   0.00000   0.27258   0.36393   0.49543   0.62214   0.67874   0.72873   0.77120   0.80250   0.81875   0.82566   0.82797   0.82566   0.81875   0.80250   0.77120   0.72873   0.67874   0.62214   0.49543   0.36393   0.27258   0.00000
               19.00   0.00000   0.32974   0.44528   0.59835   0.76965   0.84238   0.90600   0.95786   0.99581   1.01554   1.02393   1.02672   1.02393   1.01554   0.99581   0.95786   0.90600   0.84238   0.76965   0.59835   0.44528   0.32974   0.00000
               23.00   0.00000   0.38315   0.52121   0.68783   0.89211   0.98170   1.06336   1.12793   1.17138   1.19373   1.20319   1.20634   1.20319   1.19373   1.17138   1.12793   1.06336   0.98170   0.89211   0.68783   0.52121   0.38315   0.00000
               27.00   0.00000   0.42774   0.58740   0.76897   0.96602   1.08213   1.18060   1.25873   1.31687   1.34231   1.35257   1.35597   1.35257   1.34231   1.31687   1.25873   1.18060   1.08213   0.96602   0.76897   0.58740   0.42774   0.00000
               32.00   0.00000   0.46844   0.64922   0.84791   1.05474   1.14693   1.23774   1.32247   1.40219   1.44451   1.46389   1.46994   1.46389   1.44451   1.40219   1.32247   1.23774   1.14693   1.05474   0.84791   0.64922   0.46844   0.00000
               46.00   0.00000   0.35864   0.66411   0.86465   1.07340   1.15984   1.23578   1.29695   1.32504   1.32136   1.31374   1.31087   1.31374   1.32136   1.32504   1.29695   1.23578   1.15984   1.07340   0.86465   0.66411   0.35864   0.00000
               70.00   0.00000   0.09448   0.28956   0.39854   0.49851   0.54140   0.57861   0.60814   0.62977   0.64099   0.64575   0.64733   0.64575   0.64099   0.62977   0.60814   0.57861   0.54140   0.49851   0.39854   0.28956   0.09448   0.00000
              120.00  -0.00000  -0.12067  -0.36617  -0.50269  -0.62770  -0.68105  -0.72837  -0.76407  -0.79092  -0.80483  -0.81072  -0.81267  -0.81072  -0.80483  -0.79092  -0.76407  -0.72837  -0.68105  -0.62770  -0.50269  -0.36617  -0.12067  -0.00000
              180.00  -0.00000   0.00000   0.00000   0.00000   0.00000   0.00000   0.00000   0.00000   0.00000   0.00000   0.00000   0.00000   0.00000   0.00000   0.00000   0.00000   0.00000   0.00000   0.00000   0.00000   0.00000   0.00000  -0.00000
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            </tableData>
          </table>
        </function>
      <axis name="DRAG">
        <function name="aero/coefficient/CD_base">
          <description>CD over alpha and beta (hangar)</description>
          <product>
            <property>aero/qbar-psf</property>
            <property>metrics/Sw-sqft</property>
          <table>
            <independentVar lookup="row">aero/alpha-deg</independentVar>
            <independentVar lookup="column">aero/beta-deg</independentVar>
            <tableData>
                        -90.00    -70.00    -50.00    -40.00    -30.00    -25.00    -20.00    -15.00    -10.00     -6.00     -3.00      0.00      3.00      6.00     10.00     15.00     20.00     25.00     30.00     40.00     50.00     70.00     90.00
             -180.00   0.27465   0.20396   0.10399   0.06349   0.03600   0.02738   0.02183   0.01860   0.01620   0.01714   0.01776   0.01801   0.01776   0.01714   0.01620   0.01860   0.02183   0.02738   0.03600   0.06349   0.10399   0.20396   0.27465
             -120.00   0.27465   0.29724   0.54443   0.75917   0.99634   1.10945   1.21122   1.29642   1.36055   1.39445   1.40896   1.41380   1.40896   1.39445   1.36055   1.29642   1.21122   1.10945   0.99634   0.75917   0.54443   0.29724   0.27465
              -70.00   0.27465   0.33970   0.67421   0.94682   1.24264   1.38256   1.50796   1.61259   1.69124   1.73278   1.75054   1.75647   1.75054   1.73278   1.69124   1.61259   1.50796   1.38256   1.24264   0.94682   0.67421   0.33970   0.27465
              -46.00   0.27465   0.38346   0.66995   0.84801   1.03460   1.11845   1.18893   1.24638   1.27235   1.27303   1.26645   1.26390   1.26645   1.27303   1.27235   1.24638   1.18893   1.11845   1.03460   0.84801   0.66995   0.38346   0.27465
              -32.00   0.27465   0.35667   0.46716   0.55211   0.64191   0.68423   0.72603   0.76844   0.80510   0.82683   0.83640   0.83882   0.83640   0.82683   0.80510   0.76844   0.72603   0.68423   0.64191   0.55211   0.46716   0.35667   0.27465
              -22.00   0.27465   0.30970   0.31593   0.33366   0.36950   0.38527   0.39688   0.40454   0.40989   0.41162   0.41234   0.41257   0.41234   0.41162   0.40989   0.40454   0.39688   0.38527   0.36950   0.33366   0.31593   0.30970   0.27465
              -17.00   0.27465   0.29067   0.25756   0.24847   0.25418   0.25310   0.25019   0.24908   0.24606   0.24434   0.24360   0.24335   0.24360   0.24434   0.24606   0.24908   0.25019   0.25310   0.25418   0.24847   0.25756   0.29067   0.27465
              -13.00   0.27465   0.27867   0.22225   0.19416   0.17527   0.16764   0.15873   0.15252   0.14584   0.14227   0.14075   0.14023   0.14075   0.14227   0.14584   0.15252   0.15873   0.16764   0.17527   0.19416   0.22225   0.27867   0.27465
               -9.00   0.27465   0.26950   0.19671   0.15469   0.11908   0.10645   0.09537   0.08441   0.07590   0.07142   0.06952   0.06888   0.06952   0.07142   0.07590   0.08441   0.09537   0.10645   0.11908   0.15469   0.19671   0.26950   0.27465
               -5.00   0.27465   0.26454   0.18167   0.13078   0.08714   0.07178   0.05825   0.04549   0.03660   0.03216   0.03030   0.02968   0.03030   0.03216   0.03660   0.04549   0.05825   0.07178   0.08714   0.13078   0.18167   0.26454   0.27465
               -1.00   0.27465   0.26370   0.17729   0.12313   0.07623   0.05906   0.04433   0.03068   0.02139   0.01699   0.01529   0.01476   0.01529   0.01699   0.02139   0.03068   0.04433   0.05906   0.07623   0.12313   0.17729   0.26370   0.27465
                3.00   0.27465   0.26389   0.17680   0.12418   0.07895   0.06237   0.04848   0.03533   0.02633   0.02201   0.02026   0.01968   0.02026   0.02201   0.02633   0.03533   0.04848   0.06237   0.07895   0.12418   0.17680   0.26389   0.27465
                7.00   0.27465   0.26629   0.18589   0.13863   0.09828   0.08410   0.07112   0.06012   0.05186   0.04764   0.04586   0.04527   0.04586   0.04764   0.05186   0.06012   0.07112   0.08410   0.09828   0.13863   0.18589   0.26629   0.27465
               11.00   0.27465   0.27370   0.20360   0.16662   0.13749   0.12781   0.11901   0.11045   0.10386   0.10043   0.09898   0.09850   0.09898   0.10043   0.10386   0.11045   0.11901   0.12781   0.13749   0.16662   0.20360   0.27370   0.27465
               15.00   0.27465   0.28456   0.23336   0.21103   0.20006   0.19566   0.19450   0.19003   0.18656   0.18477   0.18402   0.18376   0.18402   0.18477   0.18656   0.19003   0.19450   0.19566   0.20006   0.21103   0.23336   0.28456   0.27465
               19.00   0.27465   0.29821   0.27254   0.27071   0.28184   0.28796   0.29530   0.29732   0.29851   0.29912   0.29938   0.29947   0.29938   0.29912   0.29851   0.29732   0.29530   0.28796   0.28184   0.27071   0.27254   0.29821   0.27465
               23.00   0.27465   0.31472   0.32178   0.34338   0.37669   0.39781   0.41618   0.43063   0.43771   0.44126   0.44275   0.44324   0.44275   0.44126   0.43771   0.43063   0.41618   0.39781   0.37669   0.34338   0.32178   0.31472   0.27465
               27.00   0.27465   0.33325   0.38034   0.42774   0.48060   0.51571   0.54993   0.57735   0.59753   0.60503   0.60795   0.60891   0.60795   0.60503   0.59753   0.57735   0.54993   0.51571   0.48060   0.42774   0.38034   0.33325   0.27465
               32.00   0.27465   0.35818   0.46167   0.54555   0.63233   0.67415   0.71543   0.75625   0.79424   0.81609   0.82517   0.82812   0.82517   0.81609   0.79424   0.75625   0.71543   0.67415   0.63233   0.54555   0.46167   0.35818   0.27465
               46.00   0.27465   0.38237   0.67961   0.85932   1.04568   1.12797   1.19914   1.25556   1.28024   1.27820   1.26987   1.26673   1.26987   1.27820   1.28024   1.25556   1.19914   1.12797   1.04568   0.85932   0.67961   0.38237   0.27465
               70.00   0.27465   0.33970   0.67421   0.94682   1.24264   1.38256   1.50796   1.61259   1.69124   1.73278   1.75054   1.75647   1.75054   1.73278   1.69124   1.61259   1.50796   1.38256   1.24264   0.94682   0.67421   0.33970   0.27465
              120.00   0.27465   0.29724   0.54443   0.75917   0.99634   1.10945   1.21122   1.29642   1.36055   1.39445   1.40896   1.41380   1.40896   1.39445   1.36055   1.29642   1.21122   1.10945   0.99634   0.75917   0.54443   0.29724   0.27465
              180.00   0.27465   0.20396   0.10399   0.06349   0.03600   0.02738   0.02183   0.01860   0.01620   0.01714   0.01776   0.01801   0.01776   0.01714   0.01620   0.01860   0.02183   0.02738   0.03600   0.06349   0.10399   0.20396   0.27465
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            </tableData>
          </table>
          </product>
        </function>
        <function name="aero/coefficient/CD_mach">
          <description>zero-lift drag's change with Mach: friction, wave drag</description>
          <product>
            <property>aero/qbar-psf</property>
            <property>metrics/Sw-sqft</property>
            <property>aero/function/mach-dCD0</property>
          </product>
        </function>
        <function name="aero/coefficient/CD_induced_mach">
          <description>induced drag's change with Mach (leading-edge suction lost)</description>
          <product>
            <property>aero/qbar-psf</property>
            <property>metrics/Sw-sqft</property>
            <property>aero/cl-squared</property>
            <property>aero/function/mach-dK</property>
          </product>
        </function>
        <function name="aero/coefficient/CD_aileron">
          <description>CD increment from aileron (deg), over alpha</description>
          <product>
            <property>aero/qbar-psf</property>
            <property>metrics/Sw-sqft</property>
            <property>aero/function/mach-aileron</property>
          <table>
            <independentVar lookup="row">aero/alpha-deg</independentVar>
            <independentVar lookup="column">fcs/left-aileron-pos-deg</independentVar>
            <tableData>
                        -25.00    -20.00    -15.00    -10.00     -5.00      0.00      5.00     10.00     15.00     20.00     25.00
             -180.00   0.01127   0.00740   0.00427   0.00192   0.00048   0.00000   0.00048   0.00192   0.00427   0.00740   0.01127
             -120.00   0.00876   0.00576   0.00331   0.00149   0.00038   0.00000   0.00038   0.00149   0.00331   0.00576   0.00876
              -70.00   0.00782   0.00516   0.00297   0.00134   0.00034   0.00000   0.00034   0.00134   0.00297   0.00516   0.00782
              -46.00   0.00454   0.00274   0.00139   0.00052   0.00010   0.00000   0.00010   0.00052   0.00139   0.00274   0.00454
              -32.00   0.00571   0.00373   0.00214   0.00126   0.00082   0.00000   0.00082   0.00126   0.00214   0.00373   0.00571
              -22.00   0.01166   0.00785   0.00459   0.00201   0.00046   0.00000   0.00046   0.00201   0.00459   0.00785   0.01166
              -17.00   0.01670   0.01208   0.00779   0.00390   0.00104   0.00000   0.00104   0.00390   0.00779   0.01208   0.01670
              -13.00   0.02005   0.01485   0.00983   0.00504   0.00136   0.00000   0.00136   0.00504   0.00983   0.01485   0.02005
               -9.00   0.02235   0.01666   0.01120   0.00587   0.00162   0.00000   0.00162   0.00587   0.01120   0.01666   0.02235
               -5.00   0.02436   0.01819   0.01212   0.00625   0.00171   0.00000   0.00171   0.00625   0.01212   0.01819   0.02436
               -1.00   0.02469   0.01844   0.01234   0.00643   0.00177   0.00000   0.00177   0.00643   0.01234   0.01844   0.02469
                3.00   0.02465   0.01843   0.01233   0.00640   0.00176   0.00000   0.00176   0.00640   0.01233   0.01843   0.02465
                7.00   0.02406   0.01810   0.01252   0.00689   0.00201   0.00000   0.00201   0.00689   0.01252   0.01810   0.02406
               11.00   0.02540   0.02000   0.01434   0.00807   0.00236   0.00000   0.00236   0.00807   0.01434   0.02000   0.02540
               15.00   0.02206   0.01709   0.01205   0.00672   0.00198   0.00000   0.00198   0.00672   0.01205   0.01709   0.02206
               19.00   0.01551   0.01139   0.00754   0.00397   0.00115   0.00000   0.00115   0.00397   0.00754   0.01139   0.01551
               23.00   0.00849   0.00538   0.00282   0.00099   0.00013   0.00000   0.00013   0.00099   0.00282   0.00538   0.00849
               27.00   0.00243   0.00028  -0.00109  -0.00135  -0.00060   0.00000  -0.00060  -0.00135  -0.00109   0.00028   0.00243
               32.00  -0.00217  -0.00310  -0.00312  -0.00197  -0.00032   0.00000  -0.00032  -0.00197  -0.00312  -0.00310  -0.00217
               46.00  -0.00286  -0.00330  -0.00300  -0.00187  -0.00056   0.00000  -0.00056  -0.00187  -0.00300  -0.00330  -0.00286
               70.00   0.00782   0.00516   0.00297   0.00134   0.00034   0.00000   0.00034   0.00134   0.00297   0.00516   0.00782
              120.00   0.00876   0.00576   0.00331   0.00149   0.00038   0.00000   0.00038   0.00149   0.00331   0.00576   0.00876
              180.00   0.01127   0.00740   0.00427   0.00192   0.00048   0.00000   0.00048   0.00192   0.00427   0.00740   0.01127
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            </tableData>
          </table>
          </product>
        </function>
        <function name="aero/coefficient/CD_elevator">
          <description>CD increment from elevator (deg), over alpha</description>
          <product>
            <property>aero/qbar-psf</property>
            <property>metrics/Sw-sqft</property>
            <property>aero/function/mach-elevator</property>
          <table>
            <independentVar lookup="row">aero/alpha-deg</independentVar>
            <independentVar lookup="column">fcs/elevator-pos-deg</independentVar>
            <tableData>
                        -25.00    -20.00    -15.00    -10.00     -5.00      0.00      5.00     10.00     15.00     20.00     25.00
             -180.00   0.03667   0.02386   0.01347   0.00273   0.00038   0.00000   0.00038   0.00273   0.01347   0.02386   0.03667
             -120.00  -0.08751  -0.07001  -0.05196  -0.03392  -0.01642   0.00000   0.01484   0.02765   0.03804   0.04570   0.05038
              -70.00   0.02274   0.02431   0.02274   0.01805   0.01039   0.00000  -0.01281  -0.02765  -0.04407   0.01265   0.11802
              -46.00   0.10774   0.08885   0.06832   0.04633   0.02340   0.00000  -0.02342  -0.04583  -0.06498  -0.08132  -0.09656
              -32.00   0.15130   0.11959   0.08773   0.05638   0.02648   0.00000  -0.02084  -0.03320  -0.04822  -0.06069  -0.06959
              -22.00   0.13979   0.10324   0.06908   0.04269   0.01972   0.00000  -0.01543  -0.02761  -0.03683  -0.04264  -0.04273
              -17.00   0.13222   0.09503   0.06372   0.03754   0.01605   0.00000  -0.01188  -0.02058  -0.02599  -0.02657  -0.02011
              -13.00   0.12569   0.08846   0.05692   0.03155   0.01276   0.00000  -0.00898  -0.01467  -0.01655  -0.01227   0.00018
               -9.00   0.11377   0.07680   0.04662   0.02399   0.00922   0.00000  -0.00562  -0.00775  -0.00534   0.00451   0.02345
               -5.00   0.09534   0.06109   0.03446   0.01618   0.00568   0.00000  -0.00219  -0.00078   0.00590   0.02082   0.04489
               -1.00   0.07677   0.04582   0.02314   0.00924   0.00251   0.00000   0.00093   0.00567   0.01652   0.03604   0.06429
                3.00   0.05541   0.02903   0.01147   0.00247  -0.00063   0.00000   0.00407   0.01246   0.02806   0.05228   0.08456
                7.00   0.03494   0.01322   0.00057  -0.00411  -0.00382   0.00000   0.00731   0.01961   0.03972   0.06798   0.10359
               11.00   0.01088  -0.00443  -0.01125  -0.01134  -0.00734   0.00000   0.01098   0.02773   0.05190   0.08292   0.12016
               15.00  -0.01150  -0.02023  -0.02162  -0.01775  -0.01048   0.00000   0.01447   0.03489   0.06093   0.09233   0.12877
               19.00  -0.03032  -0.03344  -0.03038  -0.02337  -0.01327   0.00000   0.01775   0.04014   0.06635   0.09687   0.13261
               23.00  -0.04714  -0.04539  -0.03872  -0.02887  -0.01614   0.00000   0.02036   0.04355   0.06938   0.10178   0.13761
               27.00  -0.06219  -0.05619  -0.04658  -0.03419  -0.01898   0.00000   0.02184   0.04442   0.07512   0.10815   0.14239
               32.00  -0.06927  -0.06060  -0.04839  -0.03331  -0.01554   0.00000   0.02401   0.05331   0.08421   0.11565   0.14698
               46.00  -0.09817  -0.08307  -0.06739  -0.04652  -0.02366   0.00000   0.02337   0.04618   0.06795   0.08819   0.10673
               70.00   0.11740   0.01245  -0.04407  -0.02765  -0.01281   0.00000   0.01039   0.01805   0.02274   0.02431   0.02274
              120.00   0.05038   0.04570   0.03804   0.02765   0.01484   0.00000  -0.01642  -0.03392  -0.05196  -0.07001  -0.08751
              180.00   0.03667   0.02386   0.01347   0.00273   0.00038   0.00000   0.00038   0.00273   0.01347   0.02386   0.03667
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            </tableData>
          </table>
          </product>
        </function>
        <function name="aero/coefficient/CD_flap">
          <description>CD increment from flap (deg), over alpha</description>
          <product>
            <property>aero/qbar-psf</property>
            <property>metrics/Sw-sqft</property>
            <property>aero/function/mach-flap</property>
          <table>
            <independentVar lookup="row">aero/alpha-deg</independentVar>
            <independentVar lookup="column">fcs/flap-pos-deg</independentVar>
            <tableData>
                        -25.00    -20.00    -15.00    -10.00     -5.00      0.00      5.00     10.00     15.00     20.00     25.00
             -180.00   0.00722   0.00473   0.00271   0.00122   0.00031   0.00000   0.00031   0.00122   0.00271   0.00473   0.00722
             -120.00   0.00722   0.00473   0.00271   0.00122   0.00031   0.00000   0.00031   0.00122   0.00271   0.00473   0.00722
              -70.00   0.00722   0.00473   0.00271   0.00122   0.00031   0.00000   0.00031   0.00122   0.00271   0.00473   0.00722
              -46.00   0.03676   0.03052   0.02393   0.01657   0.00829   0.00000  -0.00797  -0.01493  -0.02016  -0.02368  -0.02604
              -32.00   0.05085   0.04376   0.03266   0.02352   0.01217   0.00000  -0.01096  -0.02024  -0.02671  -0.03065  -0.03299
              -22.00   0.04368   0.03637   0.02815   0.01871   0.00895   0.00000  -0.00793  -0.01451  -0.01912  -0.02179  -0.02316
              -17.00   0.04501   0.03761   0.02897   0.01880   0.00853   0.00000  -0.00658  -0.01133  -0.01405  -0.01505  -0.01488
              -13.00   0.04328   0.03669   0.02874   0.01892   0.00855   0.00000  -0.00614  -0.01011  -0.01196  -0.01203  -0.01091
               -9.00   0.03568   0.03051   0.02426   0.01632   0.00753   0.00000  -0.00520  -0.00807  -0.00873  -0.00756  -0.00507
               -5.00   0.02422   0.02022   0.01572   0.01034   0.00463   0.00000  -0.00273  -0.00342  -0.00226   0.00020   0.00354
               -1.00   0.01571   0.01212   0.00855   0.00492   0.00176   0.00000   0.00011   0.00188   0.00466   0.00790   0.01152
                3.00   0.00717   0.00389   0.00116  -0.00077  -0.00132   0.00000   0.00319   0.00762   0.01215   0.01627   0.02018
                7.00  -0.00046  -0.00314  -0.00482  -0.00522  -0.00385   0.00000   0.00626   0.01368   0.02049   0.02606   0.03085
               11.00  -0.00254  -0.00401  -0.00490  -0.00510  -0.00403   0.00000   0.00792   0.01791   0.02701   0.03421   0.04018
               15.00  -0.00223  -0.00311  -0.00338  -0.00309  -0.00243   0.00000   0.00651   0.01660   0.02679   0.03513   0.04205
               19.00  -0.00539  -0.00536  -0.00463  -0.00325  -0.00179   0.00000   0.00457   0.01301   0.02264   0.03113   0.03852
               23.00  -0.01202  -0.01070  -0.00858  -0.00558  -0.00251   0.00000   0.00345   0.00983   0.01793   0.02569   0.03275
               27.00  -0.02212  -0.01912  -0.01417  -0.00900  -0.00394   0.00000   0.00325   0.00787   0.01409   0.02058   0.02687
               32.00  -0.02308  -0.02096  -0.01772  -0.01294  -0.00693   0.00000   0.00906   0.01360   0.01823   0.02326   0.02846
               46.00  -0.01897  -0.01663  -0.01345  -0.00926  -0.00449   0.00000   0.00376   0.00698   0.01036   0.01408   0.01825
               70.00   0.00722   0.00473   0.00271   0.00122   0.00031   0.00000   0.00031   0.00122   0.00271   0.00473   0.00722
              120.00   0.00722   0.00473   0.00271   0.00122   0.00031   0.00000   0.00031   0.00122   0.00271   0.00473   0.00722
              180.00   0.00722   0.00473   0.00271   0.00122   0.00031   0.00000   0.00031   0.00122   0.00271   0.00473   0.00722
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            </tableData>
          </table>
          </product>
        </function>
        <function name="aero/coefficient/CD_rudder">
          <description>CD increment from rudder (deg), over alpha</description>
          <product>
            <property>aero/qbar-psf</property>
            <property>metrics/Sw-sqft</property>
            <property>aero/function/mach-rudder</property>
          <table>
            <independentVar lookup="row">aero/alpha-deg</independentVar>
            <independentVar lookup="column">fcs/rudder-pos-deg</independentVar>
            <tableData>
                        -20.00    -15.00    -10.00     -5.00      0.00      5.00     10.00     15.00     20.00
             -180.00   0.01186   0.00669   0.00136   0.00021   0.00000   0.00021   0.00136   0.00669   0.01186
              -35.00   0.00634   0.00355   0.00167   0.00045   0.00000   0.00045   0.00167   0.00355   0.00634
              -11.00   0.01030   0.00680   0.00305   0.00076   0.00000   0.00076   0.00305   0.00680   0.01030
                4.00   0.01241   0.00720   0.00321   0.00080   0.00000   0.00080   0.00321   0.00720   0.01241
               19.00   0.01046   0.00612   0.00273   0.00068   0.00000   0.00068   0.00273   0.00612   0.01046
               42.00   0.00439   0.00219   0.00060   0.00022   0.00000   0.00022   0.00060   0.00219   0.00439
              180.00   0.01186   0.00669   0.00136   0.00021   0.00000   0.00021   0.00136   0.00669   0.01186
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            </tableData>
          </table>
          </product>
        </function>
        <function name="aero/coefficient/CD_ground">
          <description>Induced drag change in ground effect</description>
          <product>
            <property>aero/qbar-psf</property>
            <property>metrics/Sw-sqft</property>
            <property>aero/cl-squared</property>
            <value>0.15465</value>
          <table>
            <independentVar lookup="row">aero/h_b-mac-ft</independentVar>
            <tableData>
                    0.00   -1.00000
                    0.10   -0.28090
                    0.20   -0.08897
                    0.40   -0.02383
                    0.60   -0.01073
                    0.80   -0.00607
                    1.00   -0.00389
                    1.10   -0.00322
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            </tableData>
          </table>
          </product>
        </function>
        <function name="aero/coefficient/CD_surfaces_rudder">
          <description>surfaces: the drag of its rudder deflected 20 deg at the full speedbrake, its forces cancelling (hangar)</description>
          <product>
            <property>aero/qbar-psf</property>
            <property>metrics/Sw-sqft</property>
            <table>
              <independentVar lookup="row">aero/alpha-deg</independentVar>
              <independentVar lookup="column">fcs/speedbrake-rudder-deg</independentVar>
              <tableData>
                          -20.00    -15.00    -10.00     -5.00      0.00      5.00     10.00     15.00     20.00
               -180.00   0.01186   0.00669   0.00136   0.00021   0.00000   0.00021   0.00136   0.00669   0.01186
                -35.00   0.00634   0.00355   0.00167   0.00045   0.00000   0.00045   0.00167   0.00355   0.00634
                -11.00   0.01030   0.00680   0.00305   0.00076   0.00000   0.00076   0.00305   0.00680   0.01030
                  4.00   0.01241   0.00720   0.00321   0.00080   0.00000   0.00080   0.00321   0.00720   0.01241
                 19.00   0.01046   0.00612   0.00273   0.00068   0.00000   0.00068   0.00273   0.00612   0.01046
                 42.00   0.00439   0.00219   0.00060   0.00022   0.00000   0.00022   0.00060   0.00219   0.00439
                180.00   0.01186   0.00669   0.00136   0.00021   0.00000   0.00021   0.00136   0.00669   0.01186
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              </tableData>
            </table>
          </product>
        </function>
        <function name="aero/coefficient/CD_surfaces_aileron">
          <description>surfaces: the drag of its aileron deflected 20 deg at the full speedbrake, its forces cancelling (hangar)</description>
          <product>
            <property>aero/qbar-psf</property>
            <property>metrics/Sw-sqft</property>
            <table>
              <independentVar lookup="row">aero/alpha-deg</independentVar>
              <independentVar lookup="column">fcs/speedbrake-aileron-deg</independentVar>
              <tableData>
                          -25.00    -20.00    -15.00    -10.00     -5.00      0.00      5.00     10.00     15.00     20.00     25.00
               -180.00   0.01127   0.00740   0.00427   0.00192   0.00048   0.00000   0.00048   0.00192   0.00427   0.00740   0.01127
                -35.00   0.00428   0.00226   0.00086   0.00017  -0.00002   0.00000  -0.00002   0.00017   0.00086   0.00226   0.00428
                -11.00   0.02132   0.01592   0.01065   0.00552   0.00151   0.00000   0.00151   0.00552   0.01065   0.01592   0.02132
                  4.00   0.02470   0.01845   0.01232   0.00637   0.00175   0.00000   0.00175   0.00637   0.01232   0.01845   0.02470
                 19.00   0.01551   0.01139   0.00754   0.00397   0.00115   0.00000   0.00115   0.00397   0.00754   0.01139   0.01551
                 42.00  -0.00401  -0.00439  -0.00391  -0.00246  -0.00073   0.00000  -0.00073  -0.00246  -0.00391  -0.00439  -0.00401
                180.00   0.01127   0.00740   0.00427   0.00192   0.00048   0.00000   0.00048   0.00192   0.00427   0.00740   0.01127
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              </tableData>
            </table>
          </product>
        </function>
        <function name="aero/coefficient/CD_gear">
          <description>the gear extended: its wheels' and struts' drag by Raymer's components, 0.468 m2 (hangar)</description>
          <product>
            <property>aero/qbar-psf</property>
            <property>metrics/Sw-sqft</property>
            <value>0.00570388</value>
            <property>gear/gear-pos-norm</property>
          </product>
        </function>
      </axis>
      <axis name="SIDE">
        <function name="aero/coefficient/CY_base">
          <description>CY over alpha and beta (hangar)</description>
          <product>
            <property>aero/qbar-psf</property>
            <property>metrics/Sw-sqft</property>
            <property>aero/function/mach-side</property>
          <table>
            <independentVar lookup="row">aero/alpha-deg</independentVar>
            <independentVar lookup="column">aero/beta-deg</independentVar>
            <tableData>
                        -90.00    -70.00    -50.00    -40.00    -30.00    -25.00    -20.00    -15.00    -10.00     -6.00     -3.00      0.00      3.00      6.00     10.00     15.00     20.00     25.00     30.00     40.00     50.00     70.00     90.00
             -180.00   0.00000   0.07178   0.07736   0.05915   0.03545   0.02398   0.01395   0.00717   0.02412   0.02521   0.01279  -0.00000  -0.01279  -0.02521  -0.02412  -0.00717  -0.01395  -0.02398  -0.03545  -0.05915  -0.07736  -0.07178  -0.00000
              -35.00   0.00000  -0.20930  -0.14286  -0.14795  -0.14169  -0.12508  -0.10953  -0.09008  -0.06647  -0.03560  -0.01790  -0.00000   0.01790   0.03560   0.06647   0.09008   0.10953   0.12508   0.14169   0.14795   0.14286   0.20930  -0.00000
              -11.00   0.00000   0.06632   0.12120   0.11612   0.10128   0.09592   0.08225   0.07157   0.04911   0.02980   0.01496  -0.00000  -0.01496  -0.02980  -0.04911  -0.07157  -0.08225  -0.09592  -0.10128  -0.11612  -0.12120  -0.06632  -0.00000
                4.00   0.00000   0.09318   0.14061   0.13453   0.11412   0.10727   0.09581   0.07226   0.04766   0.02842   0.01415  -0.00000  -0.01415  -0.02842  -0.04766  -0.07226  -0.09581  -0.10727  -0.11412  -0.13453  -0.14061  -0.09318  -0.00000
               19.00   0.00000  -0.00131   0.06318   0.06163   0.04917   0.04554   0.05172   0.04125   0.02783   0.01674   0.00836  -0.00000  -0.00836  -0.01674  -0.02783  -0.04125  -0.05172  -0.04554  -0.04917  -0.06163  -0.06318   0.00131  -0.00000
               42.00   0.00000  -0.29133  -0.23351  -0.23990  -0.23120  -0.20379  -0.17984  -0.15108  -0.11169  -0.07430  -0.03337  -0.00000   0.03337   0.07430   0.11169   0.15108   0.17984   0.20379   0.23120   0.23990   0.23351   0.29133  -0.00000
              180.00   0.00000   0.07178   0.07736   0.05915   0.03545   0.02398   0.01395   0.00717   0.02412   0.02521   0.01279  -0.00000  -0.01279  -0.02521  -0.02412  -0.00717  -0.01395  -0.02398  -0.03545  -0.05915  -0.07736  -0.07178  -0.00000
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            </tableData>
          </table>
          </product>
        </function>
        <function name="aero/coefficient/CY_aileron">
          <description>CY increment from aileron (deg), over alpha</description>
          <product>
            <property>aero/qbar-psf</property>
            <property>metrics/Sw-sqft</property>
            <property>aero/function/mach-aileron</property>
          <table>
            <independentVar lookup="row">aero/alpha-deg</independentVar>
            <independentVar lookup="column">fcs/left-aileron-pos-deg</independentVar>
            <tableData>
                        -25.00    -20.00    -15.00    -10.00     -5.00      0.00      5.00     10.00     15.00     20.00     25.00
             -180.00   0.00000   0.00000   0.00000   0.00000   0.00000   0.00000   0.00000   0.00000   0.00000   0.00000   0.00000
              -35.00  -0.00851  -0.00863  -0.00808  -0.00640  -0.00352   0.00000   0.00352   0.00640   0.00808   0.00863   0.00851
              -11.00  -0.00150  -0.00187  -0.00200  -0.00171  -0.00098   0.00000   0.00098   0.00171   0.00200   0.00187   0.00150
                4.00   0.00201   0.00173   0.00136   0.00093   0.00047   0.00000  -0.00047  -0.00093  -0.00136  -0.00173  -0.00201
               19.00   0.02051   0.01665   0.01269   0.00859   0.00434   0.00000  -0.00434  -0.00859  -0.01269  -0.01665  -0.02051
               42.00   0.00638   0.00441   0.00269   0.00140   0.00058   0.00000  -0.00058  -0.00140  -0.00269  -0.00441  -0.00638
              180.00   0.00000   0.00000   0.00000   0.00000   0.00000   0.00000   0.00000   0.00000   0.00000   0.00000   0.00000
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            </tableData>
          </table>
          </product>
        </function>
        <function name="aero/coefficient/CY_rudder">
          <description>CY increment from rudder (deg), over alpha</description>
          <product>
            <property>aero/qbar-psf</property>
            <property>metrics/Sw-sqft</property>
            <property>aero/function/mach-rudder</property>
          <table>
            <independentVar lookup="row">aero/alpha-deg</independentVar>
            <independentVar lookup="column">fcs/rudder-pos-deg</independentVar>
            <tableData>
                        -20.00    -15.00    -10.00     -5.00      0.00      5.00     10.00     15.00     20.00
             -180.00   0.03005   0.02337   0.03334   0.03273   0.00000  -0.03273  -0.03334  -0.02337  -0.03005
              -35.00  -0.02850  -0.02033  -0.01223  -0.01137   0.00000   0.01137   0.01223   0.02033   0.02850
              -11.00  -0.04333  -0.04214  -0.02881  -0.01448   0.00000   0.01448   0.02881   0.04214   0.04333
                4.00  -0.05144  -0.04124  -0.02777  -0.01394   0.00000   0.01394   0.02777   0.04124   0.05144
               19.00  -0.05376  -0.04319  -0.02916  -0.01463   0.00000   0.01463   0.02916   0.04319   0.05376
               42.00  -0.01694  -0.00823   0.00014  -0.00225   0.00000   0.00225  -0.00014   0.00823   0.01694
              180.00   0.03005   0.02337   0.03334   0.03273   0.00000  -0.03273  -0.03334  -0.02337  -0.03005
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            </tableData>
          </table>
          </product>
        </function>
        <function name="aero/coefficient/CYp">
          <description>CY per p (non-dimensional), over alpha</description>
          <product>
            <property>aero/qbar-psf</property>
            <property>metrics/Sw-sqft</property>
            <property>aero/bi2vel</property>
            <property>velocities/p-aero-rad_sec</property>
            <property>aero/function/mach-lift</property>
          <table>
            <independentVar lookup="row">aero/alpha-deg</independentVar>
            <tableData>
                 -180.00   -0.12802
                 -165.00   -0.05215
                  -32.00   -0.11610
                  -10.00   -0.05522
                    5.00   -0.03446
                   20.00   -0.02442
                   46.00   -0.05994
                  180.00   -0.12802
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            </tableData>
          </table>
          </product>
        </function>
        <function name="aero/coefficient/CYr">
          <description>CY per r (non-dimensional), over alpha</description>
          <product>
            <property>aero/qbar-psf</property>
            <property>metrics/Sw-sqft</property>
            <property>aero/bi2vel</property>
            <property>velocities/r-aero-rad_sec</property>
            <property>aero/function/mach-lift</property>
          <table>
            <independentVar lookup="row">aero/alpha-deg</independentVar>
            <tableData>
                 -180.00    0.23780
                 -165.00    0.11575
                  -32.00    0.17852
                  -10.00    0.13456
                    5.00    0.12436
                   20.00    0.18353
                   46.00    0.20806
                  180.00    0.23780
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            </tableData>
          </table>
          </product>
        </function>
      </axis>
      <axis name="LIFT">
        <function name="aero/coefficient/CL_base">
          <description>CL over alpha and beta, ground effect, compressibility (hangar)</description>
          <product>
            <property>aero/qbar-psf</property>
            <property>metrics/Sw-sqft</property>
            <property>aero/function/CL-base</property>
            <property>aero/function/mach-lift</property>
          <table>
            <independentVar lookup="row">aero/h_b-mac-ft</independentVar>
            <tableData>
                    0.00    1.20000
                    0.10    1.08692
                    0.20    1.03778
                    0.40    1.00713
                    0.60    1.00135
                    0.80    1.00025
                    1.00    1.00005
                    1.10    1.00000
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            </tableData>
          </table>
          </product>
        </function>
        <function name="aero/coefficient/CL_elevator">
          <description>CL increment from elevator (deg), over alpha</description>
          <product>
            <property>aero/qbar-psf</property>
            <property>metrics/Sw-sqft</property>
            <property>aero/function/mach-elevator</property>
          <table>
            <independentVar lookup="row">aero/alpha-deg</independentVar>
            <independentVar lookup="column">fcs/elevator-pos-deg</independentVar>
            <tableData>
                        -25.00    -20.00    -15.00    -10.00     -5.00      0.00      5.00     10.00     15.00     20.00     25.00
             -180.00  -0.07996  -0.06710  -0.05219  -0.07317  -0.07219   0.00000   0.07219   0.07317   0.05219   0.06710   0.07996
              -35.00  -0.01563  -0.02230  -0.02415  -0.02089  -0.01239   0.00000   0.01518   0.03477   0.06380   0.12325   0.12597
              -11.00  -0.21844  -0.18181  -0.14034  -0.09503  -0.04758   0.00000   0.04854   0.09826   0.15031   0.20538   0.26090
                4.00  -0.26136  -0.20818  -0.15361  -0.10038  -0.04982   0.00000   0.04922   0.09878   0.14941   0.19845   0.24391
               19.00  -0.24096  -0.18883  -0.13767  -0.08981  -0.04393   0.00000   0.04140   0.07769   0.10849   0.13304   0.14930
               42.00  -0.07772  -0.04596  -0.02796  -0.01822  -0.00761   0.00000   0.00298   0.00125  -0.00492  -0.01516  -0.02908
              180.00  -0.07996  -0.06710  -0.05219  -0.07317  -0.07219   0.00000   0.07219   0.07317   0.05219   0.06710   0.07996
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            </tableData>
          </table>
          </product>
        </function>
        <function name="aero/coefficient/CL_flap">
          <description>CL increment from flap (deg), over alpha</description>
          <product>
            <property>aero/qbar-psf</property>
            <property>metrics/Sw-sqft</property>
            <property>aero/function/mach-flap</property>
          <table>
            <independentVar lookup="row">aero/alpha-deg</independentVar>
            <independentVar lookup="column">fcs/flap-pos-deg</independentVar>
            <tableData>
                        -25.00    -20.00    -15.00    -10.00     -5.00      0.00      5.00     10.00     15.00     20.00     25.00
             -180.00   0.00000   0.00000   0.00000   0.00000   0.00000   0.00000   0.00000   0.00000   0.00000   0.00000   0.00000
              -35.00  -0.07890  -0.07043  -0.05907  -0.04293  -0.02235   0.00000   0.02226   0.04184   0.05691   0.06801   0.07680
              -11.00  -0.08123  -0.07543  -0.06585  -0.05003  -0.02723   0.00000   0.02802   0.05243   0.06935   0.07934   0.08532
                4.00  -0.08272  -0.07829  -0.06928  -0.05262  -0.02817   0.00000   0.02770   0.05106   0.06670   0.07499   0.07866
               19.00  -0.08343  -0.07479  -0.06325  -0.04660  -0.02445   0.00000   0.02253   0.04009   0.05161   0.05857   0.06317
               42.00  -0.05816  -0.05116  -0.04261  -0.03127  -0.01667   0.00000   0.01719   0.03317   0.04583   0.05501   0.06203
              180.00   0.00000   0.00000   0.00000   0.00000   0.00000   0.00000   0.00000   0.00000   0.00000   0.00000   0.00000
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            </tableData>
          </table>
          <table>
            <independentVar lookup="row">aero/h_b-mac-ft</independentVar>
            <tableData>
                    0.00    1.20000
                    0.10    1.08692
                    0.20    1.03778
                    0.40    1.00713
                    0.60    1.00135
                    0.80    1.00025
                    1.00    1.00005
                    1.10    1.00000
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            </tableData>
          </table>
          </product>
        </function>
        <function name="aero/coefficient/CLq">
          <description>CL per q (non-dimensional), over alpha</description>
          <product>
            <property>aero/qbar-psf</property>
            <property>metrics/Sw-sqft</property>
            <property>aero/ci2vel</property>
            <property>velocities/q-aero-rad_sec</property>
            <property>aero/function/mach-lift</property>
          <table>
            <independentVar lookup="row">aero/alpha-deg</independentVar>
            <tableData>
                 -180.00   -2.20789
                 -165.00   -0.42147
                  -32.00    2.45654
                  -10.00    4.19404
                    5.00    4.18975
                   20.00    3.87797
                   46.00    1.47691
                  180.00   -2.20789
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            </tableData>
          </table>
          </product>
        </function>
        <function name="aero/coefficient/CLadot">
          <description>CL per alpha-dot (downwash lag at the tail)</description>
          <product>
            <property>aero/qbar-psf</property>
            <property>metrics/Sw-sqft</property>
            <property>aero/ci2vel</property>
            <property>aero/alphadot-rad_sec</property>
            <value>0.48451</value>
            <property>aero/function/mach-lift</property>
          </product>
        </function>
      </axis>
      <axis name="ROLL">
        <function name="aero/coefficient/Cl_base">
          <description>Cl over alpha and beta (hangar)</description>
          <product>
            <property>aero/qbar-psf</property>
            <property>metrics/Sw-sqft</property>
            <property>metrics/bw-ft</property>
            <property>aero/function/mach-side</property>
          <table>
            <independentVar lookup="row">aero/alpha-deg</independentVar>
            <independentVar lookup="column">aero/beta-deg</independentVar>
            <tableData>
                        -90.00    -70.00    -50.00    -40.00    -30.00    -25.00    -20.00    -15.00    -10.00     -6.00     -3.00      0.00      3.00      6.00     10.00     15.00     20.00     25.00     30.00     40.00     50.00     70.00     90.00
             -180.00   0.01532   0.01445   0.01185   0.00999   0.00779   0.00659   0.00532   0.00420   0.00687   0.00642   0.00336  -0.00000  -0.00336  -0.00642  -0.00687  -0.00420  -0.00532  -0.00659  -0.00779  -0.00999  -0.01185  -0.01445  -0.01532
              -35.00   0.01532   0.03151   0.02379   0.02334   0.01414   0.01162   0.01215   0.01240   0.00828   0.00466   0.00264  -0.00000  -0.00264  -0.00466  -0.00828  -0.01240  -0.01215  -0.01162  -0.01414  -0.02334  -0.02379  -0.03151  -0.01532
              -11.00   0.01532   0.01525   0.00740  -0.01159  -0.03727  -0.04107  -0.03511  -0.02697  -0.01840  -0.01119  -0.00562  -0.00000   0.00562   0.01119   0.01840   0.02697   0.03511   0.04107   0.03727   0.01159  -0.00740  -0.01525  -0.01532
                4.00   0.01532   0.01335   0.00999   0.01034   0.01569   0.01676   0.01390   0.01082   0.00728   0.00438   0.00220  -0.00000  -0.00220  -0.00438  -0.00728  -0.01082  -0.01390  -0.01676  -0.01569  -0.01034  -0.00999  -0.01335  -0.01532
               19.00   0.01532   0.00504  -0.00089   0.01321   0.06266   0.07242   0.06435   0.05024   0.03429   0.02081   0.01045  -0.00000  -0.01045  -0.02081  -0.03429  -0.05024  -0.06435  -0.07242  -0.06266  -0.01321   0.00089  -0.00504  -0.01532
               42.00   0.01532  -0.00861  -0.02379  -0.03469  -0.04232  -0.04383  -0.04656  -0.04927  -0.04891  -0.03662  -0.01968  -0.00000   0.01968   0.03662   0.04891   0.04927   0.04656   0.04383   0.04232   0.03469   0.02379   0.00861  -0.01532
              180.00   0.01532   0.01445   0.01185   0.00999   0.00779   0.00659   0.00532   0.00420   0.00687   0.00642   0.00336  -0.00000  -0.00336  -0.00642  -0.00687  -0.00420  -0.00532  -0.00659  -0.00779  -0.00999  -0.01185  -0.01445  -0.01532
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            </tableData>
          </table>
          </product>
        </function>
        <function name="aero/coefficient/Cl_aileron">
          <description>Cl increment from aileron (deg), over alpha</description>
          <product>
            <property>aero/qbar-psf</property>
            <property>metrics/Sw-sqft</property>
            <property>metrics/bw-ft</property>
            <property>aero/function/mach-aileron</property>
          <table>
            <independentVar lookup="row">aero/alpha-deg</independentVar>
            <independentVar lookup="column">fcs/left-aileron-pos-deg</independentVar>
            <tableData>
                        -25.00    -20.00    -15.00    -10.00     -5.00      0.00      5.00     10.00     15.00     20.00     25.00
             -180.00   0.02161   0.01979   0.01562   0.01060   0.00533   0.00000  -0.00533  -0.01060  -0.01562  -0.01979  -0.02161
              -35.00  -0.04402  -0.03818  -0.03125  -0.02247  -0.01173   0.00000   0.01173   0.02247   0.03125   0.03818   0.04402
              -11.00  -0.05351  -0.04655  -0.03821  -0.02756  -0.01444   0.00000   0.01444   0.02756   0.03821   0.04655   0.05351
                4.00  -0.05066  -0.04422  -0.03642  -0.02634  -0.01382   0.00000   0.01382   0.02634   0.03642   0.04422   0.05066
               19.00  -0.04940  -0.04270  -0.03482  -0.02498  -0.01304   0.00000   0.01304   0.02498   0.03482   0.04270   0.04940
               42.00  -0.02839  -0.02454  -0.02001  -0.01434  -0.00749   0.00000   0.00749   0.01434   0.02001   0.02454   0.02839
              180.00   0.02161   0.01979   0.01562   0.01060   0.00533   0.00000  -0.00533  -0.01060  -0.01562  -0.01979  -0.02161
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            </tableData>
          </table>
          </product>
        </function>
        <function name="aero/coefficient/Cl_rudder">
          <description>Cl increment from rudder (deg), over alpha</description>
          <product>
            <property>aero/qbar-psf</property>
            <property>metrics/Sw-sqft</property>
            <property>metrics/bw-ft</property>
            <property>aero/function/mach-rudder</property>
          <table>
            <independentVar lookup="row">aero/alpha-deg</independentVar>
            <independentVar lookup="column">fcs/rudder-pos-deg</independentVar>
            <tableData>
                        -20.00    -15.00    -10.00     -5.00      0.00      5.00     10.00     15.00     20.00
             -180.00   0.00558   0.00434   0.00620   0.00608   0.00000  -0.00608  -0.00620  -0.00434  -0.00558
              -35.00  -0.00031  -0.00014   0.00011  -0.00018   0.00000   0.00018  -0.00011   0.00014   0.00031
              -11.00  -0.00189  -0.00151  -0.00111  -0.00056   0.00000   0.00056   0.00111   0.00151   0.00189
                4.00  -0.00372  -0.00318  -0.00216  -0.00108   0.00000   0.00108   0.00216   0.00318   0.00372
               19.00  -0.00271  -0.00249  -0.00171  -0.00086   0.00000   0.00086   0.00171   0.00249   0.00271
               42.00  -0.00102  -0.00054  -0.00010  -0.00019   0.00000   0.00019   0.00010   0.00054   0.00102
              180.00   0.00558   0.00434   0.00620   0.00608   0.00000  -0.00608  -0.00620  -0.00434  -0.00558
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            </tableData>
          </table>
          </product>
        </function>
        <function name="aero/coefficient/Clp">
          <description>Cl per p (non-dimensional), over alpha</description>
          <product>
            <property>aero/qbar-psf</property>
            <property>metrics/Sw-sqft</property>
            <property>metrics/bw-ft</property>
            <property>aero/bi2vel</property>
            <property>velocities/p-aero-rad_sec</property>
            <property>aero/function/mach-lift</property>
          <table>
            <independentVar lookup="row">aero/alpha-deg</independentVar>
            <tableData>
                 -180.00   -0.68147
                 -165.00   -0.16387
                  -32.00   -0.35915
                  -10.00   -0.28396
                    5.00   -0.23069
                   20.00   -0.33977
                   46.00   -0.01719
                  180.00   -0.68147
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            </tableData>
          </table>
          </product>
        </function>
        <function name="aero/coefficient/Clr">
          <description>Cl per r (non-dimensional), over alpha</description>
          <product>
            <property>aero/qbar-psf</property>
            <property>metrics/Sw-sqft</property>
            <property>metrics/bw-ft</property>
            <property>aero/bi2vel</property>
            <property>velocities/r-aero-rad_sec</property>
            <property>aero/function/mach-lift</property>
          <table>
            <independentVar lookup="row">aero/alpha-deg</independentVar>
            <tableData>
                 -180.00    0.04176
                 -165.00    0.05887
                  -32.00   -0.20617
                  -10.00   -0.07106
                    5.00    0.05038
                   20.00    0.16534
                   46.00    0.45860
                  180.00    0.04176
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            </tableData>
          </table>
          </product>
        </function>
      </axis>
      <axis name="PITCH">
        <function name="aero/coefficient/Cm_base">
          <description>Cm over alpha and beta (hangar)</description>
          <product>
            <property>aero/qbar-psf</property>
            <property>metrics/Sw-sqft</property>
            <property>metrics/cbarw-ft</property>
          <table>
            <independentVar lookup="row">aero/alpha-deg</independentVar>
            <independentVar lookup="column">aero/beta-deg</independentVar>
            <tableData>
                        -90.00    -70.00    -50.00    -40.00    -30.00    -25.00    -20.00    -15.00    -10.00     -6.00     -3.00      0.00      3.00      6.00     10.00     15.00     20.00     25.00     30.00     40.00     50.00     70.00     90.00
             -180.00  -0.00000  -0.00000  -0.00002  -0.00004  -0.00006  -0.00006  -0.00007   0.00002   0.00094   0.00050   0.00003  -0.00013   0.00003   0.00050   0.00094   0.00002  -0.00007  -0.00006  -0.00006  -0.00004  -0.00002  -0.00000  -0.00000
              -35.00   0.00000   0.02303   0.02150   0.02170   0.01866   0.01688   0.01493   0.01336   0.01343   0.01325   0.01413   0.01462   0.01413   0.01325   0.01343   0.01336   0.01493   0.01688   0.01866   0.02170   0.02150   0.02303   0.00000
              -11.00   0.00000   0.00918   0.01145   0.01223   0.01221   0.01549   0.01801   0.01910   0.02025   0.02085   0.02112   0.02121   0.02112   0.02085   0.02025   0.01910   0.01801   0.01549   0.01221   0.01223   0.01145   0.00918   0.00000
                4.00  -0.00000  -0.00669  -0.01019  -0.00855  -0.00714  -0.00656  -0.00568  -0.00756  -0.00922  -0.01014  -0.01054  -0.01068  -0.01054  -0.01014  -0.00922  -0.00756  -0.00568  -0.00656  -0.00714  -0.00855  -0.01019  -0.00669  -0.00000
               19.00  -0.00000  -0.01096   0.00361  -0.00194  -0.01180  -0.01465  -0.01511  -0.01797  -0.01991  -0.02090  -0.02132  -0.02146  -0.02132  -0.02090  -0.01991  -0.01797  -0.01511  -0.01465  -0.01180  -0.00194   0.00361  -0.01096  -0.00000
               42.00  -0.00000  -0.03168  -0.02664  -0.02798  -0.02187  -0.01664  -0.01483  -0.01474  -0.01313  -0.01042  -0.00828  -0.00756  -0.00828  -0.01042  -0.01313  -0.01474  -0.01483  -0.01664  -0.02187  -0.02798  -0.02664  -0.03168  -0.00000
              180.00  -0.00000  -0.00000  -0.00002  -0.00004  -0.00006  -0.00006  -0.00007   0.00002   0.00094   0.00050   0.00003  -0.00013   0.00003   0.00050   0.00094   0.00002  -0.00007  -0.00006  -0.00006  -0.00004  -0.00002  -0.00000  -0.00000
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            </tableData>
          </table>
          </product>
        </function>
        <function name="aero/coefficient/Cm_mach">
          <description>Cm from the neutral point's move with Mach</description>
          <product>
            <property>aero/qbar-psf</property>
            <property>metrics/Sw-sqft</property>
            <property>metrics/cbarw-ft</property>
            <property>aero/function/CL-base</property>
            <property>aero/function/mach-dCm-dCL</property>
          </product>
        </function>
        <function name="aero/coefficient/Cm_elevator">
          <description>Cm increment from elevator (deg), over alpha</description>
          <product>
            <property>aero/qbar-psf</property>
            <property>metrics/Sw-sqft</property>
            <property>metrics/cbarw-ft</property>
            <property>aero/function/mach-elevator</property>
          <table>
            <independentVar lookup="row">aero/alpha-deg</independentVar>
            <independentVar lookup="column">fcs/elevator-pos-deg</independentVar>
            <tableData>
                        -25.00    -20.00    -15.00    -10.00     -5.00      0.00      5.00     10.00     15.00     20.00     25.00
             -180.00  -0.08189  -0.06873  -0.05348  -0.07489  -0.07400   0.00000   0.07400   0.07493   0.05368   0.06908   0.08243
              -35.00   0.06397   0.05734   0.04738   0.03414   0.01779   0.00000  -0.01782  -0.03718  -0.06140  -0.10794  -0.10856
              -11.00   0.16029   0.13168   0.10036   0.06719   0.03327   0.00000  -0.03348  -0.06736  -0.10241  -0.13863  -0.17374
                4.00   0.18440   0.14809   0.10994   0.07211   0.03588   0.00000  -0.03563  -0.07174  -0.10900  -0.14542  -0.17941
               19.00   0.16091   0.12850   0.09494   0.06272   0.03109   0.00000  -0.03044  -0.05784  -0.08274  -0.10570  -0.12506
               42.00   0.08930   0.06405   0.04635   0.03293   0.01628   0.00000  -0.01400  -0.02523  -0.03355  -0.03898  -0.04161
              180.00  -0.08189  -0.06873  -0.05348  -0.07489  -0.07400   0.00000   0.07400   0.07493   0.05368   0.06908   0.08243
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            </tableData>
          </table>
          </product>
        </function>
        <function name="aero/coefficient/Cm_flap">
          <description>Cm increment from flap (deg), over alpha</description>
          <product>
            <property>aero/qbar-psf</property>
            <property>metrics/Sw-sqft</property>
            <property>metrics/cbarw-ft</property>
            <property>aero/function/mach-flap</property>
          <table>
            <independentVar lookup="row">aero/alpha-deg</independentVar>
            <independentVar lookup="column">fcs/flap-pos-deg</independentVar>
            <tableData>
                        -25.00    -20.00    -15.00    -10.00     -5.00      0.00      5.00     10.00     15.00     20.00     25.00
             -180.00   0.00000   0.00000   0.00000   0.00000   0.00000   0.00000   0.00000   0.00000   0.00000   0.00000   0.00000
              -35.00   0.02148   0.01976   0.01700   0.01241   0.00632   0.00000  -0.00618  -0.01122  -0.01443  -0.01604  -0.01665
              -11.00  -0.00419  -0.00112   0.00106   0.00193   0.00140   0.00000  -0.00147  -0.00198  -0.00056   0.00251   0.00650
                4.00  -0.01277  -0.00759  -0.00351  -0.00117  -0.00035   0.00000   0.00063   0.00210   0.00504   0.00948   0.01499
               19.00  -0.00069   0.00091   0.00201   0.00223   0.00139   0.00000  -0.00115  -0.00150  -0.00068   0.00113   0.00338
               42.00   0.01574   0.01466   0.01274   0.00947   0.00496   0.00000  -0.00475  -0.00895  -0.01204  -0.01403  -0.01539
              180.00   0.00000   0.00000   0.00000   0.00000   0.00000   0.00000   0.00000   0.00000   0.00000   0.00000   0.00000
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            </tableData>
          </table>
          </product>
        </function>
        <function name="aero/coefficient/Cmq">
          <description>Cm per q (non-dimensional), over alpha</description>
          <product>
            <property>aero/qbar-psf</property>
            <property>metrics/Sw-sqft</property>
            <property>metrics/cbarw-ft</property>
            <property>aero/ci2vel</property>
            <property>velocities/q-aero-rad_sec</property>
            <property>aero/function/mach-lift</property>
          <table>
            <independentVar lookup="row">aero/alpha-deg</independentVar>
            <tableData>
                 -180.00   -2.70908
                 -165.00   -0.48394
                  -32.00   -0.99609
                  -10.00   -1.22487
                    5.00   -1.22504
                   20.00   -1.19703
                   46.00   -0.93560
                  180.00   -2.70908
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            </tableData>
          </table>
          </product>
        </function>
        <function name="aero/coefficient/Cmadot">
          <description>Cm per alpha-dot (downwash lag at the tail)</description>
          <product>
            <property>aero/qbar-psf</property>
            <property>metrics/Sw-sqft</property>
            <property>metrics/cbarw-ft</property>
            <property>aero/ci2vel</property>
            <property>aero/alphadot-rad_sec</property>
            <value>-0.32681</value>
            <property>aero/function/mach-lift</property>
          </product>
        </function>
        <function name="aero/coefficient/Cm_gear">
          <description>the gear's drag's pitching moment, -1.56 m from the reference point's height</description>
          <product>
            <property>aero/qbar-psf</property>
            <property>metrics/Sw-sqft</property>
            <property>metrics/cbarw-ft</property>
            <value>-0.00131356</value>
            <property>gear/gear-pos-norm</property>
          </product>
        </function>
      </axis>
      <axis name="YAW">
        <function name="aero/coefficient/Cn_base">
          <description>Cn over alpha and beta (hangar)</description>
          <product>
            <property>aero/qbar-psf</property>
            <property>metrics/Sw-sqft</property>
            <property>metrics/bw-ft</property>
            <property>aero/function/mach-side</property>
          <table>
            <independentVar lookup="row">aero/alpha-deg</independentVar>
            <independentVar lookup="column">aero/beta-deg</independentVar>
            <tableData>
                        -90.00    -70.00    -50.00    -40.00    -30.00    -25.00    -20.00    -15.00    -10.00     -6.00     -3.00      0.00      3.00      6.00     10.00     15.00     20.00     25.00     30.00     40.00     50.00     70.00     90.00
             -180.00  -0.02936  -0.03804  -0.03922  -0.03585  -0.02975  -0.02577  -0.02126  -0.01671  -0.01994  -0.01690  -0.00878  -0.00000   0.00878   0.01690   0.01994   0.01671   0.02126   0.02577   0.02975   0.03585   0.03922   0.03804   0.02936
              -35.00  -0.02936  -0.01931  -0.02294  -0.02340  -0.02113  -0.02008  -0.01679  -0.01317  -0.00885  -0.00739  -0.00389  -0.00000   0.00389   0.00739   0.00885   0.01317   0.01679   0.02008   0.02113   0.02340   0.02294   0.01931   0.02936
              -11.00  -0.02936  -0.01780  -0.00874  -0.00507  -0.00396  -0.00539  -0.00581  -0.00742  -0.00543  -0.00340  -0.00173  -0.00000   0.00173   0.00340   0.00543   0.00742   0.00581   0.00539   0.00396   0.00507   0.00874   0.01780   0.02936
                4.00  -0.02936  -0.01765  -0.00711  -0.00343  -0.00244  -0.00472  -0.00637  -0.00503  -0.00344  -0.00217  -0.00112  -0.00000   0.00112   0.00217   0.00344   0.00503   0.00637   0.00472   0.00244   0.00343   0.00711   0.01765   0.02936
               19.00  -0.02936  -0.01808  -0.01297  -0.01151  -0.01027  -0.01049  -0.01356  -0.01152  -0.00803  -0.00491  -0.00247  -0.00000   0.00247   0.00491   0.00803   0.01152   0.01356   0.01049   0.01027   0.01151   0.01297   0.01808   0.02936
               42.00  -0.02936  -0.01984  -0.03477  -0.03737  -0.03318  -0.03142  -0.02523  -0.01729  -0.01003  -0.00454  -0.00332  -0.00000   0.00332   0.00454   0.01003   0.01729   0.02523   0.03142   0.03318   0.03737   0.03477   0.01984   0.02936
              180.00  -0.02936  -0.03804  -0.03922  -0.03585  -0.02975  -0.02577  -0.02126  -0.01671  -0.01994  -0.01690  -0.00878  -0.00000   0.00878   0.01690   0.01994   0.01671   0.02126   0.02577   0.02975   0.03585   0.03922   0.03804   0.02936
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            </tableData>
          </table>
          </product>
        </function>
        <function name="aero/coefficient/Cn_aileron">
          <description>Cn increment from aileron (deg), over alpha</description>
          <product>
            <property>aero/qbar-psf</property>
            <property>metrics/Sw-sqft</property>
            <property>metrics/bw-ft</property>
            <property>aero/function/mach-aileron</property>
          <table>
            <independentVar lookup="row">aero/alpha-deg</independentVar>
            <independentVar lookup="column">fcs/left-aileron-pos-deg</independentVar>
            <tableData>
                        -25.00    -20.00    -15.00    -10.00     -5.00      0.00      5.00     10.00     15.00     20.00     25.00
             -180.00  -0.00000  -0.00000  -0.00000  -0.00000  -0.00000   0.00000   0.00000   0.00000   0.00000   0.00000   0.00000
              -35.00   0.00046   0.00108   0.00144   0.00137   0.00081   0.00000  -0.00081  -0.00137  -0.00144  -0.00108  -0.00046
              -11.00  -0.00322  -0.00252  -0.00172  -0.00088  -0.00028   0.00000   0.00028   0.00088   0.00172   0.00252   0.00322
                4.00   0.00077   0.00065   0.00054   0.00041   0.00020   0.00000  -0.00020  -0.00041  -0.00054  -0.00065  -0.00077
               19.00  -0.01125  -0.01028  -0.00904  -0.00713  -0.00407   0.00000   0.00407   0.00713   0.00904   0.01028   0.01125
               42.00  -0.00741  -0.00707  -0.00631  -0.00486  -0.00263   0.00000   0.00263   0.00486   0.00631   0.00707   0.00741
              180.00  -0.00000  -0.00000  -0.00000  -0.00000  -0.00000   0.00000   0.00000   0.00000   0.00000   0.00000   0.00000
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            </tableData>
          </table>
          </product>
        </function>
        <function name="aero/coefficient/Cn_rudder">
          <description>Cn increment from rudder (deg), over alpha</description>
          <product>
            <property>aero/qbar-psf</property>
            <property>metrics/Sw-sqft</property>
            <property>metrics/bw-ft</property>
            <property>aero/function/mach-rudder</property>
          <table>
            <independentVar lookup="row">aero/alpha-deg</independentVar>
            <independentVar lookup="column">fcs/rudder-pos-deg</independentVar>
            <tableData>
                        -20.00    -15.00    -10.00     -5.00      0.00      5.00     10.00     15.00     20.00
             -180.00  -0.01185  -0.00922  -0.01311  -0.01289   0.00000   0.01289   0.01311   0.00922   0.01185
              -35.00   0.00852   0.00597   0.00355   0.00325   0.00000  -0.00325  -0.00355  -0.00597  -0.00852
              -11.00   0.01339   0.01241   0.00851   0.00428   0.00000  -0.00428  -0.00851  -0.01241  -0.01339
                4.00   0.01567   0.01280   0.00864   0.00434   0.00000  -0.00434  -0.00864  -0.01280  -0.01567
               19.00   0.01678   0.01373   0.00930   0.00467   0.00000  -0.00467  -0.00930  -0.01373  -0.01678
               42.00   0.00706   0.00426   0.00146   0.00128   0.00000  -0.00128  -0.00146  -0.00426  -0.00706
              180.00  -0.01185  -0.00922  -0.01311  -0.01289   0.00000   0.01289   0.01311   0.00922   0.01185
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            </tableData>
          </table>
          </product>
        </function>
        <function name="aero/coefficient/Cnp">
          <description>Cn per p (non-dimensional), over alpha</description>
          <product>
            <property>aero/qbar-psf</property>
            <property>metrics/Sw-sqft</property>
            <property>metrics/bw-ft</property>
            <property>aero/bi2vel</property>
            <property>velocities/p-aero-rad_sec</property>
            <property>aero/function/mach-lift</property>
          <table>
            <independentVar lookup="row">aero/alpha-deg</independentVar>
            <tableData>
                 -180.00    0.05147
                 -165.00    0.02367
                  -32.00    0.02863
                  -10.00    0.02508
                    5.00   -0.01092
                   20.00   -0.00864
                   46.00   -0.00168
                  180.00    0.05147
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            </tableData>
          </table>
          </product>
        </function>
        <function name="aero/coefficient/Cnr">
          <description>Cn per r (non-dimensional), over alpha</description>
          <product>
            <property>aero/qbar-psf</property>
            <property>metrics/Sw-sqft</property>
            <property>metrics/bw-ft</property>
            <property>aero/bi2vel</property>
            <property>velocities/r-aero-rad_sec</property>
            <property>aero/function/mach-lift</property>
          <table>
            <independentVar lookup="row">aero/alpha-deg</independentVar>
            <tableData>
                 -180.00   -0.06109
                 -165.00   -0.02816
                  -32.00   -0.13035
                  -10.00   -0.09266
                    5.00   -0.08208
                   20.00   -0.10597
                   46.00   -0.13403
                  180.00   -0.06109
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            </tableData>
          </table>
          </product>
        </function>
      </axis>
    </aerodynamics>
</fdm_config>
