<?xml version="1.0"?>
<?xml-stylesheet type="text/xsl" href="http://jsbsim.sourceforge.net/JSBSim.xsl"?>
<!-- Generated by hangar 0.1.0 from typhoon.toml on 2026-10-01. Edit the design and rebuild; changes
     made here are overwritten.  -->
<fdm_config name="typhoon" version="2.0" release="ALPHA"
            xmlns:xsi="http://www.w3.org/2001/XMLSchema-instance"
            xsi:noNamespaceSchemaLocation="http://jsbsim.sourceforge.net/JSBSim.xsd">
    <fileheader>
      <author>hangar</author>
      <filecreationdate>2026-10-01</filecreationdate>
      <version>0.1.0</version>
      <description>Eurofighter Typhoon (hangar build)</description>
      <note>Aerodynamics: vortex lattice with viscous section polars, full-envelope
        strip model, slender-body fuselage (hangar). Mass: Raymer component
        weights on the geometry. Propeller: blade-element momentum theory.</note>
      <reference refID="fsim/applicability/aerobatic" author="the design" title="Eurofighter GmbH: +9 g (fsim/envelope/clean/n_max)" date="n/a"/>
      <reference refID="fsim/applicability/carrier" author="the design" title="Eurofighter GmbH: a land-based fighter (runway arresting hook only)" date="n/a"/>
      <reference refID="fsim/applicability/drag_devices" author="the design" title="Eurofighter GmbH: a dorsal airbrake behind the canopy" date="n/a"/>
      <reference refID="fsim/applicability/ground_contact" author="the design" title="Eurofighter GmbH: tricycle wheeled gear" date="n/a"/>
      <reference refID="fsim/applicability/releasable_stores" author="the design" title="Eurofighter GmbH: thirteen hardpoints" date="n/a"/>
      <reference refID="fsim/applicability/retractable_gear" author="the design" title="Eurofighter GmbH: retractable gear" date="n/a"/>
      <reference refID="fsim/applicability/vertical_flight" author="the design" title="Eurofighter GmbH and Jane's: a conventional take-off and landing fighter. Conventional take-off and landing: no rotors, lift fans or vectored lift to hover" date="n/a"/>
    </fileheader>
    <metrics>
      <wingarea unit="M2"> 51.3279 </wingarea>
      <wingspan unit="M"> 10.6600 </wingspan>
      <chord unit="M"> 5.6998 </chord>
      <htailarea unit="M2"> 0.0000 </htailarea>
      <htailarm unit="M"> 0.0000 </htailarm>
      <vtailarea unit="M2"> 6.1977 </vtailarea>
      <vtailarm unit="M"> 4.4437 </vtailarm>
      <location name="AERORP" unit="M">
        <x> 8.8000 </x>
        <y> 0.0000 </y>
        <z> 0.0000 </z>
      </location>
      <location name="EYEPOINT" unit="M">
        <x> 3.9000 </x>
        <y> 0.0000 </y>
        <z> 2.1000 </z>
      </location>
      <location name="VRP" unit="M">
        <x> 8.8450 </x>
        <y> 0.0000 </y>
        <z> 0.3000 </z>
      </location>
    </metrics>
    <mass_balance negated_crossproduct_inertia="false">
      <ixx unit="KG*M2"> 19531.12 </ixx>
      <iyy unit="KG*M2"> 110677.42 </iyy>
      <izz unit="KG*M2"> 125765.09 </izz>
      <ixy unit="KG*M2"> 0.050 </ixy>
      <ixz unit="KG*M2"> 1886.641 </ixz>
      <iyz unit="KG*M2"> 0.067 </iyz>
      <emptywt unit="KG"> 11000.00 </emptywt>
      <location name="CG" unit="M">
        <x> 8.8450 </x>
        <y> 0.0000 </y>
        <z> 0.3000 </z>
      </location>
      <pointmass name="pilot">
        <weight unit="KG"> 100.00 </weight>
        <location unit="M">
          <x> 3.9000 </x>
          <y> 0.0000 </y>
          <z> 1.4000 </z>
        </location>
      </pointmass>
      <pointmass name="gun ammunition">
        <weight unit="KG"> 80.00 </weight>
        <location unit="M">
          <x> 8.0000 </x>
          <y> 1.0000 </y>
          <z> 0.0000 </z>
        </location>
      </pointmass>
    </mass_balance>
    <ground_reactions>
      <contact type="BOGEY" name="Nose Gear">
        <location unit="M">
          <x> 5.3700 </x>
          <y> 0.0000 </y>
          <z> -1.4900 </z>
        </location>
        <static_friction> 0.8 </static_friction>
        <dynamic_friction> 0.5 </dynamic_friction>
        <rolling_friction> 0.02 </rolling_friction>
        <spring_coeff unit="N/M"> 192066 </spring_coeff>
        <damping_coeff unit="N/M/SEC"> 22948 </damping_coeff>
        <damping_coeff_rebound unit="N/M/SEC"> 45897 </damping_coeff_rebound>
        <max_steer unit="DEG"> 60.0 </max_steer>
        <brake_group> NONE </brake_group>
        <retractable> 1 </retractable>
      </contact>
      <contact type="BOGEY" name="Left Main Gear">
        <location unit="M">
          <x> 9.5000 </x>
          <y> -1.9140 </y>
          <z> -1.5200 </z>
        </location>
        <static_friction> 0.8 </static_friction>
        <dynamic_friction> 0.5 </dynamic_friction>
        <rolling_friction> 0.02 </rolling_friction>
        <spring_coeff unit="N/M"> 387480 </spring_coeff>
        <damping_coeff unit="N/M/SEC"> 51017 </damping_coeff>
        <damping_coeff_rebound unit="N/M/SEC"> 102034 </damping_coeff_rebound>
        <max_steer unit="DEG"> 0.0 </max_steer>
        <brake_group> LEFT </brake_group>
        <retractable> 1 </retractable>
      </contact>
      <contact type="BOGEY" name="Right Main Gear">
        <location unit="M">
          <x> 9.5000 </x>
          <y> 1.9140 </y>
          <z> -1.5200 </z>
        </location>
        <static_friction> 0.8 </static_friction>
        <dynamic_friction> 0.5 </dynamic_friction>
        <rolling_friction> 0.02 </rolling_friction>
        <spring_coeff unit="N/M"> 387480 </spring_coeff>
        <damping_coeff unit="N/M/SEC"> 51017 </damping_coeff>
        <damping_coeff_rebound unit="N/M/SEC"> 102034 </damping_coeff_rebound>
        <max_steer unit="DEG"> 0.0 </max_steer>
        <brake_group> RIGHT </brake_group>
        <retractable> 1 </retractable>
      </contact>
      <contact type="STRUCTURE" name="canopy front">
        <location unit="M">
          <x> 3.4618 </x>
          <y> 0.0000 </y>
          <z> 1.6640 </z>
        </location>
        <static_friction> 0.8 </static_friction>
        <dynamic_friction> 0.6 </dynamic_friction>
        <spring_coeff unit="N/M"> 2101052 </spring_coeff>
        <damping_coeff unit="N/M/SEC"> 70035 </damping_coeff>
        <damping_coeff_rebound unit="N/M/SEC"> 70035 </damping_coeff_rebound>
      </contact>
      <contact type="STRUCTURE" name="fin rear">
        <location unit="M">
          <x> 15.8600 </x>
          <y> 0.0000 </y>
          <z> 3.9300 </z>
        </location>
        <static_friction> 0.8 </static_friction>
        <dynamic_friction> 0.6 </dynamic_friction>
        <spring_coeff unit="N/M"> 804124 </spring_coeff>
        <damping_coeff unit="N/M/SEC"> 26804 </damping_coeff>
        <damping_coeff_rebound unit="N/M/SEC"> 26804 </damping_coeff_rebound>
      </contact>
      <contact type="STRUCTURE" name="fuselage front">
        <location unit="M">
          <x> 0.0000 </x>
          <y> 0.0000 </y>
          <z> 0.3900 </z>
        </location>
        <static_friction> 0.8 </static_friction>
        <dynamic_friction> 0.6 </dynamic_friction>
        <spring_coeff unit="N/M"> 1128035 </spring_coeff>
        <damping_coeff unit="N/M/SEC"> 37601 </damping_coeff>
        <damping_coeff_rebound unit="N/M/SEC"> 37601 </damping_coeff_rebound>
      </contact>
      <contact type="STRUCTURE" name="intake left rear">
        <location unit="M">
          <x> 14.2000 </x>
          <y> -0.5316 </y>
          <z> -0.1774 </z>
        </location>
        <static_friction> 0.8 </static_friction>
        <dynamic_friction> 0.6 </dynamic_friction>
        <spring_coeff unit="N/M"> 1211337 </spring_coeff>
        <damping_coeff unit="N/M/SEC"> 40378 </damping_coeff>
        <damping_coeff_rebound unit="N/M/SEC"> 40378 </damping_coeff_rebound>
      </contact>
      <contact type="STRUCTURE" name="intake left front">
        <location unit="M">
          <x> 4.6500 </x>
          <y> -0.3647 </y>
          <z> -0.5867 </z>
        </location>
        <static_friction> 0.8 </static_friction>
        <dynamic_friction> 0.6 </dynamic_friction>
        <spring_coeff unit="N/M"> 1079060 </spring_coeff>
        <damping_coeff unit="N/M/SEC"> 35969 </damping_coeff>
        <damping_coeff_rebound unit="N/M/SEC"> 35969 </damping_coeff_rebound>
      </contact>
      <contact type="STRUCTURE" name="intake right front">
        <location unit="M">
          <x> 4.6500 </x>
          <y> 0.3647 </y>
          <z> -0.5867 </z>
        </location>
        <static_friction> 0.8 </static_friction>
        <dynamic_friction> 0.6 </dynamic_friction>
        <spring_coeff unit="N/M"> 1079061 </spring_coeff>
        <damping_coeff unit="N/M/SEC"> 35969 </damping_coeff>
        <damping_coeff_rebound unit="N/M/SEC"> 35969 </damping_coeff_rebound>
      </contact>
      <contact type="STRUCTURE" name="intake right rear">
        <location unit="M">
          <x> 14.2000 </x>
          <y> 0.5316 </y>
          <z> -0.1774 </z>
        </location>
        <static_friction> 0.8 </static_friction>
        <dynamic_friction> 0.6 </dynamic_friction>
        <spring_coeff unit="N/M"> 1211340 </spring_coeff>
        <damping_coeff unit="N/M/SEC"> 40378 </damping_coeff>
        <damping_coeff_rebound unit="N/M/SEC"> 40378 </damping_coeff_rebound>
      </contact>
      <contact type="STRUCTURE" name="tip pod left rear">
        <location unit="M">
          <x> 11.4075 </x>
          <y> -5.4658 </y>
          <z> -0.0791 </z>
        </location>
        <static_friction> 0.8 </static_friction>
        <dynamic_friction> 0.6 </dynamic_friction>
        <spring_coeff unit="N/M"> 532124 </spring_coeff>
        <damping_coeff unit="N/M/SEC"> 17737 </damping_coeff>
        <damping_coeff_rebound unit="N/M/SEC"> 17737 </damping_coeff_rebound>
      </contact>
      <contact type="STRUCTURE" name="tip pod left rear 2">
        <location unit="M">
          <x> 13.2000 </x>
          <y> -5.4412 </y>
          <z> 0.0030 </z>
        </location>
        <static_friction> 0.8 </static_friction>
        <dynamic_friction> 0.6 </dynamic_friction>
        <spring_coeff unit="N/M"> 503527 </spring_coeff>
        <damping_coeff unit="N/M/SEC"> 16784 </damping_coeff>
        <damping_coeff_rebound unit="N/M/SEC"> 16784 </damping_coeff_rebound>
      </contact>
      <contact type="STRUCTURE" name="tip pod right rear">
        <location unit="M">
          <x> 13.2000 </x>
          <y> 5.4412 </y>
          <z> 0.0030 </z>
        </location>
        <static_friction> 0.8 </static_friction>
        <dynamic_friction> 0.6 </dynamic_friction>
        <spring_coeff unit="N/M"> 503528 </spring_coeff>
        <damping_coeff unit="N/M/SEC"> 16784 </damping_coeff>
        <damping_coeff_rebound unit="N/M/SEC"> 16784 </damping_coeff_rebound>
      </contact>
      <contact type="STRUCTURE" name="tip pod right rear 2">
        <location unit="M">
          <x> 11.4075 </x>
          <y> 5.4658 </y>
          <z> -0.0791 </z>
        </location>
        <static_friction> 0.8 </static_friction>
        <dynamic_friction> 0.6 </dynamic_friction>
        <spring_coeff unit="N/M"> 532125 </spring_coeff>
        <damping_coeff unit="N/M/SEC"> 17738 </damping_coeff>
        <damping_coeff_rebound unit="N/M/SEC"> 17738 </damping_coeff_rebound>
      </contact>
    </ground_reactions>
    <propulsion>
      <engine file="typhoon_engine0">
        <location unit="M">
          <x> 12.6000 </x>
          <y> -0.4900 </y>
          <z> 0.4500 </z>
        </location>
        <feed>0</feed>
        <feed>1</feed>
        <feed>2</feed>
        <feed>3</feed>
        <thruster file="typhoon_nozzle0">
          <location unit="M">
            <x> 14.7200 </x>
            <y> -0.4900 </y>
            <z> 0.4500 </z>
          </location>
          <orient unit="DEG"> <roll>0.00</roll> <pitch>0.00</pitch> <yaw>0.00</yaw> </orient>

        </thruster>
      </engine>
      <engine file="typhoon_engine0">
        <location unit="M">
          <x> 12.6000 </x>
          <y> 0.4900 </y>
          <z> 0.4500 </z>
        </location>
        <feed>0</feed>
        <feed>1</feed>
        <feed>2</feed>
        <feed>3</feed>
        <thruster file="typhoon_nozzle0">
          <location unit="M">
            <x> 14.7200 </x>
            <y> 0.4900 </y>
            <z> 0.4500 </z>
          </location>
          <orient unit="DEG"> <roll>0.00</roll> <pitch>0.00</pitch> <yaw>0.00</yaw> </orient>

        </thruster>
      </engine>
      <tank type="FUEL">
        <location unit="M">
          <x> 7.5000 </x>
          <y> 0.0000 </y>
          <z> 0.5000 </z>
        </location>
        <capacity unit="KG"> 1800.00 </capacity>
        <contents unit="KG"> 1800.00 </contents>
      </tank>
      <tank type="FUEL">
        <location unit="M">
          <x> 9.3000 </x>
          <y> 0.0000 </y>
          <z> 0.5000 </z>
        </location>
        <capacity unit="KG"> 1596.00 </capacity>
        <contents unit="KG"> 1596.00 </contents>
      </tank>
      <tank type="FUEL">
        <location unit="M">
          <x> 9.8000 </x>
          <y> -2.5000 </y>
          <z> 0.0000 </z>
        </location>
        <capacity unit="KG"> 800.00 </capacity>
        <contents unit="KG"> 800.00 </contents>
      </tank>
      <tank type="FUEL">
        <location unit="M">
          <x> 9.8000 </x>
          <y> 2.5000 </y>
          <z> 0.0000 </z>
        </location>
        <capacity unit="KG"> 800.00 </capacity>
        <contents unit="KG"> 800.00 </contents>
      </tank>
    </propulsion>
    <flight_control name="typhoon">
      <!-- the aircraft's profile for the platform (docs/control-architecture.md, section 7): what
           hangar knows of it - its design, its flight tests, its identified responses -->
      <property value="1">fsim/identity/version</property>
      <property value="1">fsim/identity/provenance</property>
      <property value="2">fsim/identity/class</property>
      <property value="2">fsim/identity/family</property>
      <property value="1">fsim/effectors/version</property>
      <property value="1">fsim/effectors/provenance</property>
      <property value="0.0">fsim/effectors/flaps</property>
      <property value="1">fsim/effectors/neutral</property>
      <property value="1">fsim/effectors/pitch</property>
      <property value="0.0">fsim/effectors/pitch_trim</property>
      <property value="1">fsim/effectors/retractable_gear</property>
      <property value="1">fsim/effectors/roll</property>
      <property value="1">fsim/effectors/speedbrake</property>
      <property value="1">fsim/effectors/speedbrake_approach</property>
      <property value="1">fsim/effectors/wheel_brakes</property>
      <property value="0.0">fsim/effectors/yaw</property>
      <property value="1">fsim/envelope/version</property>
      <property value="1">fsim/envelope/provenance</property>
      <property value="30">fsim/envelope/clean/alpha_max_deg</property>
      <property value="60.163">fsim/envelope/clean/cas_min_ms</property>
      <property value="9">fsim/envelope/clean/n_max</property>
      <property value="-3">fsim/envelope/clean/n_min</property>
      <property value="250">fsim/envelope/clean/roll_rate_max_deg_s</property>
      <property value="15.43">fsim/envelope/crosswind_max_ms</property>
      <property value="14.01">fsim/envelope/ground_pitch_max_deg</property>
      <property value="2.91">fsim/envelope/ground_turn_radius_m</property>
      <property value="0.2142">fsim/envelope/ground_yaw_accel_rad_s2</property>
      <property value="1">fsim/envelope/law_alpha</property>
      <property value="1">fsim/envelope/law_load_factor</property>
      <property value="1">fsim/envelope/law_roll_rate</property>
      <property value="1">fsim/propulsion/version</property>
      <property value="1">fsim/propulsion/provenance</property>
      <property value="1">fsim/propulsion/afterburner</property>
      <property value="2">fsim/propulsion/engines</property>
      <property value="0.168615">fsim/propulsion/spool_s</property>
      <property value="2">fsim/propulsion/type</property>
      <property value="1">fsim/plant/version</property>
      <property value="1">fsim/plant/provenance</property>
      <property value="-0.850407">fsim/plant/alpha_zero_lift_deg</property>
      <property value="3000">fsim/plant/altitude_m</property>
      <property value="121.874">fsim/plant/eas_ms</property>
      <property value="0.0">fsim/plant/elevator_trim</property>
      <property value="0.0">fsim/plant/elevator_trim_lift</property>
      <property value="11.8984">fsim/plant/pitch/gain</property>
      <property value="1.14132">fsim/plant/pitch/tau_s</property>
      <property value="4.52601">fsim/plant/roll/gain</property>
      <property value="0.19887">fsim/plant/roll/tau_s</property>
      <property value="7.02728">fsim/plant/speed/gain</property>
      <property value="0.168615">fsim/plant/speed/tau_s</property>
      <property value="139.366">fsim/plant/tas_ms</property>
      <property value="0.319335">fsim/plant/throttle_trim</property>
      <property value="0.127241">fsim/plant/yaw/gain</property>
      <property value="1">fsim/performance/version</property>
      <property value="1">fsim/performance/provenance</property>
      <property value="18944.7">fsim/performance/ceiling_m</property>
      <property value="368.349">fsim/performance/climb_ms</property>
      <property value="434.976">fsim/performance/max_tas_ms</property>
      <property value="1">fsim/applicability/version</property>
      <property value="1">fsim/applicability/provenance</property>
      <property value="1">fsim/applicability/aerobatic</property>
      <property value="1">fsim/applicability/carrier</property>
      <property value="2">fsim/applicability/drag_devices</property>
      <property value="1">fsim/applicability/ground_contact</property>
      <property value="2">fsim/applicability/releasable_stores</property>
      <property value="1">fsim/applicability/retractable_gear</property>
      <property value="0.0">fsim/applicability/vertical_flight</property>
      <property value="1">fsim/tables/version</property>
      <property value="1">fsim/tables/provenance</property>
      <property value="100">fsim/tables/altitude_m/h0</property>
      <property value="3790">fsim/tables/altitude_m/h1</property>
      <property value="7580">fsim/tables/altitude_m/h2</property>
      <property value="10972.8">fsim/tables/altitude_m/h3</property>
      <property value="11370">fsim/tables/altitude_m/h4</property>
      <property value="14210">fsim/tables/altitude_m/h5</property>
      <property value="16100">fsim/tables/altitude_m/h6</property>
      <property value="18000">fsim/tables/altitude_m/h7</property>
      <property value="0.62899">fsim/tables/best_endurance_fuel_kg_s/h0/w0</property>
      <property value="0.621197">fsim/tables/best_endurance_fuel_kg_s/h0/w1</property>
      <property value="0.632808">fsim/tables/best_endurance_fuel_kg_s/h0/w2</property>
      <property value="0.380546">fsim/tables/best_endurance_fuel_kg_s/h1/w0</property>
      <property value="0.432545">fsim/tables/best_endurance_fuel_kg_s/h1/w1</property>
      <property value="0.483705">fsim/tables/best_endurance_fuel_kg_s/h1/w2</property>
      <property value="0.324917">fsim/tables/best_endurance_fuel_kg_s/h2/w0</property>
      <property value="0.373527">fsim/tables/best_endurance_fuel_kg_s/h2/w1</property>
      <property value="0.418597">fsim/tables/best_endurance_fuel_kg_s/h2/w2</property>
      <property value="0.279354">fsim/tables/best_endurance_fuel_kg_s/h3/w0</property>
      <property value="0.321256">fsim/tables/best_endurance_fuel_kg_s/h3/w1</property>
      <property value="0.354327">fsim/tables/best_endurance_fuel_kg_s/h3/w2</property>
      <property value="0.275873">fsim/tables/best_endurance_fuel_kg_s/h4/w0</property>
      <property value="0.315892">fsim/tables/best_endurance_fuel_kg_s/h4/w1</property>
      <property value="0.345197">fsim/tables/best_endurance_fuel_kg_s/h4/w2</property>
      <property value="0.23431">fsim/tables/best_endurance_fuel_kg_s/h5/w0</property>
      <property value="0.270682">fsim/tables/best_endurance_fuel_kg_s/h5/w1</property>
      <property value="0.203133">fsim/tables/best_endurance_fuel_kg_s/h5/w2</property>
      <property value="0.142876">fsim/tables/best_endurance_fuel_kg_s/h6/w0</property>
      <property value="0.184632">fsim/tables/best_endurance_fuel_kg_s/h6/w1</property>
      <property value="222.231">fsim/tables/best_endurance_tas_ms/h0/w0</property>
      <property value="212.25">fsim/tables/best_endurance_tas_ms/h0/w1</property>
      <property value="206.961">fsim/tables/best_endurance_tas_ms/h0/w2</property>
      <property value="166.545">fsim/tables/best_endurance_tas_ms/h1/w0</property>
      <property value="161.293">fsim/tables/best_endurance_tas_ms/h1/w1</property>
      <property value="180.979">fsim/tables/best_endurance_tas_ms/h1/w2</property>
      <property value="190.261">fsim/tables/best_endurance_tas_ms/h2/w0</property>
      <property value="206.932">fsim/tables/best_endurance_tas_ms/h2/w1</property>
      <property value="221.43">fsim/tables/best_endurance_tas_ms/h2/w2</property>
      <property value="232.453">fsim/tables/best_endurance_tas_ms/h3/w0</property>
      <property value="261.204">fsim/tables/best_endurance_tas_ms/h3/w1</property>
      <property value="271.655">fsim/tables/best_endurance_tas_ms/h3/w2</property>
      <property value="238.598">fsim/tables/best_endurance_tas_ms/h4/w0</property>
      <property value="265.884">fsim/tables/best_endurance_tas_ms/h4/w1</property>
      <property value="274">fsim/tables/best_endurance_tas_ms/h4/w2</property>
      <property value="280.196">fsim/tables/best_endurance_tas_ms/h5/w0</property>
      <property value="285.896">fsim/tables/best_endurance_tas_ms/h5/w1</property>
      <property value="290.794">fsim/tables/best_endurance_tas_ms/h5/w2</property>
      <property value="290.209">fsim/tables/best_endurance_tas_ms/h6/w0</property>
      <property value="297.72">fsim/tables/best_endurance_tas_ms/h6/w1</property>
      <property value="0.62899">fsim/tables/best_range_fuel_kg_s/h0/w0</property>
      <property value="0.621197">fsim/tables/best_range_fuel_kg_s/h0/w1</property>
      <property value="0.681329">fsim/tables/best_range_fuel_kg_s/h0/w2</property>
      <property value="0.474647">fsim/tables/best_range_fuel_kg_s/h1/w0</property>
      <property value="0.541396">fsim/tables/best_range_fuel_kg_s/h1/w1</property>
      <property value="0.633204">fsim/tables/best_range_fuel_kg_s/h1/w2</property>
      <property value="0.39637">fsim/tables/best_range_fuel_kg_s/h2/w0</property>
      <property value="0.434988">fsim/tables/best_range_fuel_kg_s/h2/w1</property>
      <property value="0.467691">fsim/tables/best_range_fuel_kg_s/h2/w2</property>
      <property value="0.29593">fsim/tables/best_range_fuel_kg_s/h3/w0</property>
      <property value="0.333325">fsim/tables/best_range_fuel_kg_s/h3/w1</property>
      <property value="0.370057">fsim/tables/best_range_fuel_kg_s/h3/w2</property>
      <property value="0.289003">fsim/tables/best_range_fuel_kg_s/h4/w0</property>
      <property value="0.328451">fsim/tables/best_range_fuel_kg_s/h4/w1</property>
      <property value="0.354595">fsim/tables/best_range_fuel_kg_s/h4/w2</property>
      <property value="0.249369">fsim/tables/best_range_fuel_kg_s/h5/w0</property>
      <property value="0.293675">fsim/tables/best_range_fuel_kg_s/h5/w1</property>
      <property value="0.342555">fsim/tables/best_range_fuel_kg_s/h5/w2</property>
      <property value="0.245066">fsim/tables/best_range_fuel_kg_s/h6/w0</property>
      <property value="0.298517">fsim/tables/best_range_fuel_kg_s/h6/w1</property>
      <property value="222.231">fsim/tables/best_range_tas_ms/h0/w0</property>
      <property value="212.25">fsim/tables/best_range_tas_ms/h0/w1</property>
      <property value="223.636">fsim/tables/best_range_tas_ms/h0/w2</property>
      <property value="232.935">fsim/tables/best_range_tas_ms/h1/w0</property>
      <property value="253.74">fsim/tables/best_range_tas_ms/h1/w1</property>
      <property value="285.785">fsim/tables/best_range_tas_ms/h1/w2</property>
      <property value="278.869">fsim/tables/best_range_tas_ms/h2/w0</property>
      <property value="290.314">fsim/tables/best_range_tas_ms/h2/w1</property>
      <property value="295.882">fsim/tables/best_range_tas_ms/h2/w2</property>
      <property value="281.883">fsim/tables/best_range_tas_ms/h3/w0</property>
      <property value="287.89">fsim/tables/best_range_tas_ms/h3/w1</property>
      <property value="289.159">fsim/tables/best_range_tas_ms/h3/w2</property>
      <property value="283.683">fsim/tables/best_range_tas_ms/h4/w0</property>
      <property value="290.257">fsim/tables/best_range_tas_ms/h4/w1</property>
      <property value="285.022">fsim/tables/best_range_tas_ms/h4/w2</property>
      <property value="286.427">fsim/tables/best_range_tas_ms/h5/w0</property>
      <property value="290.986">fsim/tables/best_range_tas_ms/h5/w1</property>
      <property value="293.527">fsim/tables/best_range_tas_ms/h5/w2</property>
      <property value="292.947">fsim/tables/best_range_tas_ms/h6/w0</property>
      <property value="300.232">fsim/tables/best_range_tas_ms/h6/w1</property>
      <property value="326.482">fsim/tables/climb_tas_ms/h0/w0</property>
      <property value="331.064">fsim/tables/climb_tas_ms/h0/w1</property>
      <property value="330.715">fsim/tables/climb_tas_ms/h0/w2</property>
      <property value="317.16">fsim/tables/climb_tas_ms/h1/w0</property>
      <property value="320.636">fsim/tables/climb_tas_ms/h1/w1</property>
      <property value="326.174">fsim/tables/climb_tas_ms/h1/w2</property>
      <property value="308.385">fsim/tables/climb_tas_ms/h2/w0</property>
      <property value="313.965">fsim/tables/climb_tas_ms/h2/w1</property>
      <property value="315.252">fsim/tables/climb_tas_ms/h2/w2</property>
      <property value="298.876">fsim/tables/climb_tas_ms/h3/w0</property>
      <property value="300.894">fsim/tables/climb_tas_ms/h3/w1</property>
      <property value="303.564">fsim/tables/climb_tas_ms/h3/w2</property>
      <property value="300.879">fsim/tables/climb_tas_ms/h4/w0</property>
      <property value="301.372">fsim/tables/climb_tas_ms/h4/w1</property>
      <property value="303.058">fsim/tables/climb_tas_ms/h4/w2</property>
      <property value="305.198">fsim/tables/climb_tas_ms/h5/w0</property>
      <property value="306.483">fsim/tables/climb_tas_ms/h5/w1</property>
      <property value="307.23">fsim/tables/climb_tas_ms/h5/w2</property>
      <property value="306.215">fsim/tables/climb_tas_ms/h6/w0</property>
      <property value="307.435">fsim/tables/climb_tas_ms/h6/w1</property>
      <property value="307.764">fsim/tables/climb_tas_ms/h6/w2</property>
      <property value="307.744">fsim/tables/climb_tas_ms/h7/w0</property>
      <property value="308.455">fsim/tables/climb_tas_ms/h7/w1</property>
      <property value="297.914">fsim/tables/climb_tas_ms/h7/w2</property>
      <property value="4996">fsim/tables/fuel_capacity_kg</property>
      <property value="0.628983">fsim/tables/fuel_kg_s/h0/w0/v0</property>
      <property value="0.673692">fsim/tables/fuel_kg_s/h0/w0/v1</property>
      <property value="1.35159">fsim/tables/fuel_kg_s/h0/w0/v10</property>
      <property value="2.59246">fsim/tables/fuel_kg_s/h0/w0/v11</property>
      <property value="7.52272">fsim/tables/fuel_kg_s/h0/w0/v12</property>
      <property value="8.04367">fsim/tables/fuel_kg_s/h0/w0/v13</property>
      <property value="8.57763">fsim/tables/fuel_kg_s/h0/w0/v14</property>
      <property value="9.09094">fsim/tables/fuel_kg_s/h0/w0/v15</property>
      <property value="0.718826">fsim/tables/fuel_kg_s/h0/w0/v2</property>
      <property value="0.770601">fsim/tables/fuel_kg_s/h0/w0/v3</property>
      <property value="0.824574">fsim/tables/fuel_kg_s/h0/w0/v4</property>
      <property value="0.880116">fsim/tables/fuel_kg_s/h0/w0/v5</property>
      <property value="0.936475">fsim/tables/fuel_kg_s/h0/w0/v6</property>
      <property value="0.993533">fsim/tables/fuel_kg_s/h0/w0/v7</property>
      <property value="1.06588">fsim/tables/fuel_kg_s/h0/w0/v8</property>
      <property value="1.17177">fsim/tables/fuel_kg_s/h0/w0/v9</property>
      <property value="0.621185">fsim/tables/fuel_kg_s/h0/w1/v0</property>
      <property value="0.665208">fsim/tables/fuel_kg_s/h0/w1/v1</property>
      <property value="1.30795">fsim/tables/fuel_kg_s/h0/w1/v10</property>
      <property value="2.28532">fsim/tables/fuel_kg_s/h0/w1/v11</property>
      <property value="7.45285">fsim/tables/fuel_kg_s/h0/w1/v12</property>
      <property value="7.99742">fsim/tables/fuel_kg_s/h0/w1/v13</property>
      <property value="8.55891">fsim/tables/fuel_kg_s/h0/w1/v14</property>
      <property value="9.09804">fsim/tables/fuel_kg_s/h0/w1/v15</property>
      <property value="0.71134">fsim/tables/fuel_kg_s/h0/w1/v2</property>
      <property value="0.758907">fsim/tables/fuel_kg_s/h0/w1/v3</property>
      <property value="0.807239">fsim/tables/fuel_kg_s/h0/w1/v4</property>
      <property value="0.862415">fsim/tables/fuel_kg_s/h0/w1/v5</property>
      <property value="0.920309">fsim/tables/fuel_kg_s/h0/w1/v6</property>
      <property value="0.978569">fsim/tables/fuel_kg_s/h0/w1/v7</property>
      <property value="1.0413">fsim/tables/fuel_kg_s/h0/w1/v8</property>
      <property value="1.13555">fsim/tables/fuel_kg_s/h0/w1/v9</property>
      <property value="0.632793">fsim/tables/fuel_kg_s/h0/w2/v0</property>
      <property value="0.673887">fsim/tables/fuel_kg_s/h0/w2/v1</property>
      <property value="1.28545">fsim/tables/fuel_kg_s/h0/w2/v10</property>
      <property value="2.11214">fsim/tables/fuel_kg_s/h0/w2/v11</property>
      <property value="7.41549">fsim/tables/fuel_kg_s/h0/w2/v12</property>
      <property value="7.97102">fsim/tables/fuel_kg_s/h0/w2/v13</property>
      <property value="8.54568">fsim/tables/fuel_kg_s/h0/w2/v14</property>
      <property value="9.09966">fsim/tables/fuel_kg_s/h0/w2/v15</property>
      <property value="0.718907">fsim/tables/fuel_kg_s/h0/w2/v2</property>
      <property value="0.765852">fsim/tables/fuel_kg_s/h0/w2/v3</property>
      <property value="0.814678">fsim/tables/fuel_kg_s/h0/w2/v4</property>
      <property value="0.864331">fsim/tables/fuel_kg_s/h0/w2/v5</property>
      <property value="0.917279">fsim/tables/fuel_kg_s/h0/w2/v6</property>
      <property value="0.975815">fsim/tables/fuel_kg_s/h0/w2/v7</property>
      <property value="1.0354">fsim/tables/fuel_kg_s/h0/w2/v8</property>
      <property value="1.12638">fsim/tables/fuel_kg_s/h0/w2/v9</property>
      <property value="0.380527">fsim/tables/fuel_kg_s/h1/w0/v0</property>
      <property value="0.398639">fsim/tables/fuel_kg_s/h1/w0/v1</property>
      <property value="2.06313">fsim/tables/fuel_kg_s/h1/w0/v10</property>
      <property value="5.40517">fsim/tables/fuel_kg_s/h1/w0/v11</property>
      <property value="5.92895">fsim/tables/fuel_kg_s/h1/w0/v12</property>
      <property value="6.46676">fsim/tables/fuel_kg_s/h1/w0/v13</property>
      <property value="7.02176">fsim/tables/fuel_kg_s/h1/w0/v14</property>
      <property value="7.61007">fsim/tables/fuel_kg_s/h1/w0/v15</property>
      <property value="0.425765">fsim/tables/fuel_kg_s/h1/w0/v2</property>
      <property value="0.462896">fsim/tables/fuel_kg_s/h1/w0/v3</property>
      <property value="0.505607">fsim/tables/fuel_kg_s/h1/w0/v4</property>
      <property value="0.551152">fsim/tables/fuel_kg_s/h1/w0/v5</property>
      <property value="0.598927">fsim/tables/fuel_kg_s/h1/w0/v6</property>
      <property value="0.65031">fsim/tables/fuel_kg_s/h1/w0/v7</property>
      <property value="0.748034">fsim/tables/fuel_kg_s/h1/w0/v8</property>
      <property value="1.32339">fsim/tables/fuel_kg_s/h1/w0/v9</property>
      <property value="0.432539">fsim/tables/fuel_kg_s/h1/w1/v0</property>
      <property value="0.436587">fsim/tables/fuel_kg_s/h1/w1/v1</property>
      <property value="2.0487">fsim/tables/fuel_kg_s/h1/w1/v10</property>
      <property value="5.37704">fsim/tables/fuel_kg_s/h1/w1/v11</property>
      <property value="5.91036">fsim/tables/fuel_kg_s/h1/w1/v12</property>
      <property value="6.45659">fsim/tables/fuel_kg_s/h1/w1/v13</property>
      <property value="7.02104">fsim/tables/fuel_kg_s/h1/w1/v14</property>
      <property value="7.61925">fsim/tables/fuel_kg_s/h1/w1/v15</property>
      <property value="0.454972">fsim/tables/fuel_kg_s/h1/w1/v2</property>
      <property value="0.48301">fsim/tables/fuel_kg_s/h1/w1/v3</property>
      <property value="0.519881">fsim/tables/fuel_kg_s/h1/w1/v4</property>
      <property value="0.563929">fsim/tables/fuel_kg_s/h1/w1/v5</property>
      <property value="0.610584">fsim/tables/fuel_kg_s/h1/w1/v6</property>
      <property value="0.658694">fsim/tables/fuel_kg_s/h1/w1/v7</property>
      <property value="0.736175">fsim/tables/fuel_kg_s/h1/w1/v8</property>
      <property value="1.18256">fsim/tables/fuel_kg_s/h1/w1/v9</property>
      <property value="0.498565">fsim/tables/fuel_kg_s/h1/w2/v0</property>
      <property value="0.484024">fsim/tables/fuel_kg_s/h1/w2/v1</property>
      <property value="2.04276">fsim/tables/fuel_kg_s/h1/w2/v10</property>
      <property value="5.3605">fsim/tables/fuel_kg_s/h1/w2/v11</property>
      <property value="5.89579">fsim/tables/fuel_kg_s/h1/w2/v12</property>
      <property value="6.44905">fsim/tables/fuel_kg_s/h1/w2/v13</property>
      <property value="7.02131">fsim/tables/fuel_kg_s/h1/w2/v14</property>
      <property value="7.62768">fsim/tables/fuel_kg_s/h1/w2/v15</property>
      <property value="0.49112">fsim/tables/fuel_kg_s/h1/w2/v2</property>
      <property value="0.511985">fsim/tables/fuel_kg_s/h1/w2/v3</property>
      <property value="0.540777">fsim/tables/fuel_kg_s/h1/w2/v4</property>
      <property value="0.57914">fsim/tables/fuel_kg_s/h1/w2/v5</property>
      <property value="0.62437">fsim/tables/fuel_kg_s/h1/w2/v6</property>
      <property value="0.67119">fsim/tables/fuel_kg_s/h1/w2/v7</property>
      <property value="0.740975">fsim/tables/fuel_kg_s/h1/w2/v8</property>
      <property value="1.06132">fsim/tables/fuel_kg_s/h1/w2/v9</property>
      <property value="0.33416">fsim/tables/fuel_kg_s/h2/w0/v0</property>
      <property value="0.324968">fsim/tables/fuel_kg_s/h2/w0/v1</property>
      <property value="3.84199">fsim/tables/fuel_kg_s/h2/w0/v10</property>
      <property value="4.25218">fsim/tables/fuel_kg_s/h2/w0/v11</property>
      <property value="4.69081">fsim/tables/fuel_kg_s/h2/w0/v12</property>
      <property value="5.15152">fsim/tables/fuel_kg_s/h2/w0/v13</property>
      <property value="5.63528">fsim/tables/fuel_kg_s/h2/w0/v14</property>
      <property value="6.13741">fsim/tables/fuel_kg_s/h2/w0/v15</property>
      <property value="0.331626">fsim/tables/fuel_kg_s/h2/w0/v2</property>
      <property value="0.350227">fsim/tables/fuel_kg_s/h2/w0/v3</property>
      <property value="0.372737">fsim/tables/fuel_kg_s/h2/w0/v4</property>
      <property value="0.403863">fsim/tables/fuel_kg_s/h2/w0/v5</property>
      <property value="0.448469">fsim/tables/fuel_kg_s/h2/w0/v6</property>
      <property value="0.81055">fsim/tables/fuel_kg_s/h2/w0/v7</property>
      <property value="1.23668">fsim/tables/fuel_kg_s/h2/w0/v8</property>
      <property value="3.45103">fsim/tables/fuel_kg_s/h2/w0/v9</property>
      <property value="0.402793">fsim/tables/fuel_kg_s/h2/w1/v0</property>
      <property value="0.377785">fsim/tables/fuel_kg_s/h2/w1/v1</property>
      <property value="3.86906">fsim/tables/fuel_kg_s/h2/w1/v10</property>
      <property value="4.28144">fsim/tables/fuel_kg_s/h2/w1/v11</property>
      <property value="4.72289">fsim/tables/fuel_kg_s/h2/w1/v12</property>
      <property value="5.18645">fsim/tables/fuel_kg_s/h2/w1/v13</property>
      <property value="5.66702">fsim/tables/fuel_kg_s/h2/w1/v14</property>
      <property value="6.15936">fsim/tables/fuel_kg_s/h2/w1/v15</property>
      <property value="0.373663">fsim/tables/fuel_kg_s/h2/w1/v2</property>
      <property value="0.38136">fsim/tables/fuel_kg_s/h2/w1/v3</property>
      <property value="0.400501">fsim/tables/fuel_kg_s/h2/w1/v4</property>
      <property value="0.423108">fsim/tables/fuel_kg_s/h2/w1/v5</property>
      <property value="0.463262">fsim/tables/fuel_kg_s/h2/w1/v6</property>
      <property value="0.775202">fsim/tables/fuel_kg_s/h2/w1/v7</property>
      <property value="1.24452">fsim/tables/fuel_kg_s/h2/w1/v8</property>
      <property value="3.47423">fsim/tables/fuel_kg_s/h2/w1/v9</property>
      <property value="0.475729">fsim/tables/fuel_kg_s/h2/w2/v0</property>
      <property value="0.435752">fsim/tables/fuel_kg_s/h2/w2/v1</property>
      <property value="3.89779">fsim/tables/fuel_kg_s/h2/w2/v10</property>
      <property value="4.30941">fsim/tables/fuel_kg_s/h2/w2/v11</property>
      <property value="4.74964">fsim/tables/fuel_kg_s/h2/w2/v12</property>
      <property value="5.21253">fsim/tables/fuel_kg_s/h2/w2/v13</property>
      <property value="5.69255">fsim/tables/fuel_kg_s/h2/w2/v14</property>
      <property value="6.18225">fsim/tables/fuel_kg_s/h2/w2/v15</property>
      <property value="0.420276">fsim/tables/fuel_kg_s/h2/w2/v2</property>
      <property value="0.421001">fsim/tables/fuel_kg_s/h2/w2/v3</property>
      <property value="0.431854">fsim/tables/fuel_kg_s/h2/w2/v4</property>
      <property value="0.45089">fsim/tables/fuel_kg_s/h2/w2/v5</property>
      <property value="0.481638">fsim/tables/fuel_kg_s/h2/w2/v6</property>
      <property value="0.76612">fsim/tables/fuel_kg_s/h2/w2/v7</property>
      <property value="1.25625">fsim/tables/fuel_kg_s/h2/w2/v8</property>
      <property value="3.50363">fsim/tables/fuel_kg_s/h2/w2/v9</property>
      <property value="0.314447">fsim/tables/fuel_kg_s/h3/w0/v0</property>
      <property value="0.28958">fsim/tables/fuel_kg_s/h3/w0/v1</property>
      <property value="3.06744">fsim/tables/fuel_kg_s/h3/w0/v10</property>
      <property value="3.41017">fsim/tables/fuel_kg_s/h3/w0/v11</property>
      <property value="3.75914">fsim/tables/fuel_kg_s/h3/w0/v12</property>
      <property value="4.12286">fsim/tables/fuel_kg_s/h3/w0/v13</property>
      <property value="4.50616">fsim/tables/fuel_kg_s/h3/w0/v14</property>
      <property value="4.90616">fsim/tables/fuel_kg_s/h3/w0/v15</property>
      <property value="0.279783">fsim/tables/fuel_kg_s/h3/w0/v2</property>
      <property value="0.282918">fsim/tables/fuel_kg_s/h3/w0/v3</property>
      <property value="0.292858">fsim/tables/fuel_kg_s/h3/w0/v4</property>
      <property value="0.3384">fsim/tables/fuel_kg_s/h3/w0/v5</property>
      <property value="0.726743">fsim/tables/fuel_kg_s/h3/w0/v6</property>
      <property value="0.828013">fsim/tables/fuel_kg_s/h3/w0/v7</property>
      <property value="2.43934">fsim/tables/fuel_kg_s/h3/w0/v8</property>
      <property value="2.74091">fsim/tables/fuel_kg_s/h3/w0/v9</property>
      <property value="0.38382">fsim/tables/fuel_kg_s/h3/w1/v0</property>
      <property value="0.344595">fsim/tables/fuel_kg_s/h3/w1/v1</property>
      <property value="3.1153">fsim/tables/fuel_kg_s/h3/w1/v10</property>
      <property value="3.45689">fsim/tables/fuel_kg_s/h3/w1/v11</property>
      <property value="3.80216">fsim/tables/fuel_kg_s/h3/w1/v12</property>
      <property value="4.16181">fsim/tables/fuel_kg_s/h3/w1/v13</property>
      <property value="4.54114">fsim/tables/fuel_kg_s/h3/w1/v14</property>
      <property value="4.93793">fsim/tables/fuel_kg_s/h3/w1/v15</property>
      <property value="0.326143">fsim/tables/fuel_kg_s/h3/w1/v2</property>
      <property value="0.321458">fsim/tables/fuel_kg_s/h3/w1/v3</property>
      <property value="0.322972">fsim/tables/fuel_kg_s/h3/w1/v4</property>
      <property value="0.36568">fsim/tables/fuel_kg_s/h3/w1/v5</property>
      <property value="0.753252">fsim/tables/fuel_kg_s/h3/w1/v6</property>
      <property value="0.854427">fsim/tables/fuel_kg_s/h3/w1/v7</property>
      <property value="2.499">fsim/tables/fuel_kg_s/h3/w1/v8</property>
      <property value="2.79132">fsim/tables/fuel_kg_s/h3/w1/v9</property>
      <property value="0.453203">fsim/tables/fuel_kg_s/h3/w2/v0</property>
      <property value="0.401887">fsim/tables/fuel_kg_s/h3/w2/v1</property>
      <property value="3.19016">fsim/tables/fuel_kg_s/h3/w2/v10</property>
      <property value="3.52016">fsim/tables/fuel_kg_s/h3/w2/v11</property>
      <property value="3.85075">fsim/tables/fuel_kg_s/h3/w2/v12</property>
      <property value="4.20452">fsim/tables/fuel_kg_s/h3/w2/v13</property>
      <property value="4.57783">fsim/tables/fuel_kg_s/h3/w2/v14</property>
      <property value="4.96885">fsim/tables/fuel_kg_s/h3/w2/v15</property>
      <property value="0.374051">fsim/tables/fuel_kg_s/h3/w2/v2</property>
      <property value="0.361954">fsim/tables/fuel_kg_s/h3/w2/v3</property>
      <property value="0.360199">fsim/tables/fuel_kg_s/h3/w2/v4</property>
      <property value="0.412227">fsim/tables/fuel_kg_s/h3/w2/v5</property>
      <property value="0.785486">fsim/tables/fuel_kg_s/h3/w2/v6</property>
      <property value="2.30898">fsim/tables/fuel_kg_s/h3/w2/v7</property>
      <property value="2.58332">fsim/tables/fuel_kg_s/h3/w2/v8</property>
      <property value="2.87582">fsim/tables/fuel_kg_s/h3/w2/v9</property>
      <property value="0.316067">fsim/tables/fuel_kg_s/h4/w0/v0</property>
      <property value="0.288407">fsim/tables/fuel_kg_s/h4/w0/v1</property>
      <property value="2.90784">fsim/tables/fuel_kg_s/h4/w0/v10</property>
      <property value="3.23072">fsim/tables/fuel_kg_s/h4/w0/v11</property>
      <property value="3.55822">fsim/tables/fuel_kg_s/h4/w0/v12</property>
      <property value="3.89993">fsim/tables/fuel_kg_s/h4/w0/v13</property>
      <property value="4.26044">fsim/tables/fuel_kg_s/h4/w0/v14</property>
      <property value="4.63708">fsim/tables/fuel_kg_s/h4/w0/v15</property>
      <property value="0.277077">fsim/tables/fuel_kg_s/h4/w0/v2</property>
      <property value="0.277683">fsim/tables/fuel_kg_s/h4/w0/v3</property>
      <property value="0.284501">fsim/tables/fuel_kg_s/h4/w0/v4</property>
      <property value="0.328337">fsim/tables/fuel_kg_s/h4/w0/v5</property>
      <property value="0.693031">fsim/tables/fuel_kg_s/h4/w0/v6</property>
      <property value="0.787746">fsim/tables/fuel_kg_s/h4/w0/v7</property>
      <property value="2.31539">fsim/tables/fuel_kg_s/h4/w0/v8</property>
      <property value="2.60021">fsim/tables/fuel_kg_s/h4/w0/v9</property>
      <property value="0.385633">fsim/tables/fuel_kg_s/h4/w1/v0</property>
      <property value="0.344663">fsim/tables/fuel_kg_s/h4/w1/v1</property>
      <property value="2.96014">fsim/tables/fuel_kg_s/h4/w1/v10</property>
      <property value="3.28012">fsim/tables/fuel_kg_s/h4/w1/v11</property>
      <property value="3.60319">fsim/tables/fuel_kg_s/h4/w1/v12</property>
      <property value="3.9402">fsim/tables/fuel_kg_s/h4/w1/v13</property>
      <property value="4.2961">fsim/tables/fuel_kg_s/h4/w1/v14</property>
      <property value="4.66877">fsim/tables/fuel_kg_s/h4/w1/v15</property>
      <property value="0.323203">fsim/tables/fuel_kg_s/h4/w1/v2</property>
      <property value="0.316433">fsim/tables/fuel_kg_s/h4/w1/v3</property>
      <property value="0.31741">fsim/tables/fuel_kg_s/h4/w1/v4</property>
      <property value="0.357045">fsim/tables/fuel_kg_s/h4/w1/v5</property>
      <property value="0.721344">fsim/tables/fuel_kg_s/h4/w1/v6</property>
      <property value="2.12812">fsim/tables/fuel_kg_s/h4/w1/v7</property>
      <property value="2.38651">fsim/tables/fuel_kg_s/h4/w1/v8</property>
      <property value="2.66308">fsim/tables/fuel_kg_s/h4/w1/v9</property>
      <property value="0.455243">fsim/tables/fuel_kg_s/h4/w2/v0</property>
      <property value="0.401128">fsim/tables/fuel_kg_s/h4/w2/v1</property>
      <property value="3.04545">fsim/tables/fuel_kg_s/h4/w2/v10</property>
      <property value="3.35658">fsim/tables/fuel_kg_s/h4/w2/v11</property>
      <property value="3.65676">fsim/tables/fuel_kg_s/h4/w2/v12</property>
      <property value="3.98351">fsim/tables/fuel_kg_s/h4/w2/v13</property>
      <property value="4.33284">fsim/tables/fuel_kg_s/h4/w2/v14</property>
      <property value="4.69934">fsim/tables/fuel_kg_s/h4/w2/v15</property>
      <property value="0.372273">fsim/tables/fuel_kg_s/h4/w2/v2</property>
      <property value="0.358582">fsim/tables/fuel_kg_s/h4/w2/v3</property>
      <property value="0.354439">fsim/tables/fuel_kg_s/h4/w2/v4</property>
      <property value="0.440091">fsim/tables/fuel_kg_s/h4/w2/v5</property>
      <property value="0.755901">fsim/tables/fuel_kg_s/h4/w2/v6</property>
      <property value="2.21485">fsim/tables/fuel_kg_s/h4/w2/v7</property>
      <property value="2.47378">fsim/tables/fuel_kg_s/h4/w2/v8</property>
      <property value="2.74961">fsim/tables/fuel_kg_s/h4/w2/v9</property>
      <property value="0.327822">fsim/tables/fuel_kg_s/h5/w0/v0</property>
      <property value="0.287587">fsim/tables/fuel_kg_s/h5/w0/v1</property>
      <property value="2.02197">fsim/tables/fuel_kg_s/h5/w0/v10</property>
      <property value="2.22044">fsim/tables/fuel_kg_s/h5/w0/v11</property>
      <property value="2.41079">fsim/tables/fuel_kg_s/h5/w0/v12</property>
      <property value="2.60915">fsim/tables/fuel_kg_s/h5/w0/v13</property>
      <property value="2.82328">fsim/tables/fuel_kg_s/h5/w0/v14</property>
      <property value="3.05423">fsim/tables/fuel_kg_s/h5/w0/v15</property>
      <property value="0.265267">fsim/tables/fuel_kg_s/h5/w0/v2</property>
      <property value="0.25425">fsim/tables/fuel_kg_s/h5/w0/v3</property>
      <property value="0.248034">fsim/tables/fuel_kg_s/h5/w0/v4</property>
      <property value="0.375505">fsim/tables/fuel_kg_s/h5/w0/v5</property>
      <property value="0.514573">fsim/tables/fuel_kg_s/h5/w0/v6</property>
      <property value="1.49206">fsim/tables/fuel_kg_s/h5/w0/v7</property>
      <property value="1.653">fsim/tables/fuel_kg_s/h5/w0/v8</property>
      <property value="1.83121">fsim/tables/fuel_kg_s/h5/w0/v9</property>
      <property value="0.349663">fsim/tables/fuel_kg_s/h5/w1/v1</property>
      <property value="2.11023">fsim/tables/fuel_kg_s/h5/w1/v10</property>
      <property value="2.30227">fsim/tables/fuel_kg_s/h5/w1/v11</property>
      <property value="2.48563">fsim/tables/fuel_kg_s/h5/w1/v12</property>
      <property value="2.67689">fsim/tables/fuel_kg_s/h5/w1/v13</property>
      <property value="2.8832">fsim/tables/fuel_kg_s/h5/w1/v14</property>
      <property value="3.10223">fsim/tables/fuel_kg_s/h5/w1/v15</property>
      <property value="0.319483">fsim/tables/fuel_kg_s/h5/w1/v2</property>
      <property value="0.299764">fsim/tables/fuel_kg_s/h5/w1/v3</property>
      <property value="0.291565">fsim/tables/fuel_kg_s/h5/w1/v4</property>
      <property value="0.482291">fsim/tables/fuel_kg_s/h5/w1/v5</property>
      <property value="1.45453">fsim/tables/fuel_kg_s/h5/w1/v6</property>
      <property value="1.60317">fsim/tables/fuel_kg_s/h5/w1/v7</property>
      <property value="1.76162">fsim/tables/fuel_kg_s/h5/w1/v8</property>
      <property value="1.93041">fsim/tables/fuel_kg_s/h5/w1/v9</property>
      <property value="0.417203">fsim/tables/fuel_kg_s/h5/w2/v1</property>
      <property value="2.20805">fsim/tables/fuel_kg_s/h5/w2/v10</property>
      <property value="2.39364">fsim/tables/fuel_kg_s/h5/w2/v11</property>
      <property value="2.55221">fsim/tables/fuel_kg_s/h5/w2/v12</property>
      <property value="2.72402">fsim/tables/fuel_kg_s/h5/w2/v13</property>
      <property value="2.91777">fsim/tables/fuel_kg_s/h5/w2/v14</property>
      <property value="3.12552">fsim/tables/fuel_kg_s/h5/w2/v15</property>
      <property value="0.376344">fsim/tables/fuel_kg_s/h5/w2/v2</property>
      <property value="0.347756">fsim/tables/fuel_kg_s/h5/w2/v3</property>
      <property value="0.339373">fsim/tables/fuel_kg_s/h5/w2/v4</property>
      <property value="1.45958">fsim/tables/fuel_kg_s/h5/w2/v5</property>
      <property value="1.58078">fsim/tables/fuel_kg_s/h5/w2/v6</property>
      <property value="1.7188">fsim/tables/fuel_kg_s/h5/w2/v7</property>
      <property value="1.86537">fsim/tables/fuel_kg_s/h5/w2/v8</property>
      <property value="2.03146">fsim/tables/fuel_kg_s/h5/w2/v9</property>
      <property value="1.62717">fsim/tables/fuel_kg_s/h6/w0/v10</property>
      <property value="1.76457">fsim/tables/fuel_kg_s/h6/w0/v11</property>
      <property value="1.88311">fsim/tables/fuel_kg_s/h6/w0/v12</property>
      <property value="2.0176">fsim/tables/fuel_kg_s/h6/w0/v13</property>
      <property value="2.16435">fsim/tables/fuel_kg_s/h6/w0/v14</property>
      <property value="2.32113">fsim/tables/fuel_kg_s/h6/w0/v15</property>
      <property value="0.267463">fsim/tables/fuel_kg_s/h6/w0/v2</property>
      <property value="0.248492">fsim/tables/fuel_kg_s/h6/w0/v3</property>
      <property value="0.242957">fsim/tables/fuel_kg_s/h6/w0/v4</property>
      <property value="1.06375">fsim/tables/fuel_kg_s/h6/w0/v5</property>
      <property value="1.15328">fsim/tables/fuel_kg_s/h6/w0/v6</property>
      <property value="1.25613">fsim/tables/fuel_kg_s/h6/w0/v7</property>
      <property value="1.3706">fsim/tables/fuel_kg_s/h6/w0/v8</property>
      <property value="1.49549">fsim/tables/fuel_kg_s/h6/w0/v9</property>
      <property value="1.73003">fsim/tables/fuel_kg_s/h6/w1/v10</property>
      <property value="1.86096">fsim/tables/fuel_kg_s/h6/w1/v11</property>
      <property value="1.97399">fsim/tables/fuel_kg_s/h6/w1/v12</property>
      <property value="2.08942">fsim/tables/fuel_kg_s/h6/w1/v13</property>
      <property value="2.21417">fsim/tables/fuel_kg_s/h6/w1/v14</property>
      <property value="2.35345">fsim/tables/fuel_kg_s/h6/w1/v15</property>
      <property value="0.331801">fsim/tables/fuel_kg_s/h6/w1/v2</property>
      <property value="0.303297">fsim/tables/fuel_kg_s/h6/w1/v3</property>
      <property value="0.295558">fsim/tables/fuel_kg_s/h6/w1/v4</property>
      <property value="1.20926">fsim/tables/fuel_kg_s/h6/w1/v5</property>
      <property value="1.28982">fsim/tables/fuel_kg_s/h6/w1/v6</property>
      <property value="1.38761">fsim/tables/fuel_kg_s/h6/w1/v7</property>
      <property value="1.49587">fsim/tables/fuel_kg_s/h6/w1/v8</property>
      <property value="1.61042">fsim/tables/fuel_kg_s/h6/w1/v9</property>
      <property value="2.27839">fsim/tables/fuel_kg_s/h6/w2/v14</property>
      <property value="2.40732">fsim/tables/fuel_kg_s/h6/w2/v15</property>
      <property value="477.458">fsim/tables/max_climb_ms/h0/w0</property>
      <property value="405.962">fsim/tables/max_climb_ms/h0/w1</property>
      <property value="352.904">fsim/tables/max_climb_ms/h0/w2</property>
      <property value="376.443">fsim/tables/max_climb_ms/h1/w0</property>
      <property value="318.197">fsim/tables/max_climb_ms/h1/w1</property>
      <property value="275.146">fsim/tables/max_climb_ms/h1/w2</property>
      <property value="280.189">fsim/tables/max_climb_ms/h2/w0</property>
      <property value="235.399">fsim/tables/max_climb_ms/h2/w1</property>
      <property value="202.119">fsim/tables/max_climb_ms/h2/w2</property>
      <property value="203.536">fsim/tables/max_climb_ms/h3/w0</property>
      <property value="168.83">fsim/tables/max_climb_ms/h3/w1</property>
      <property value="142.887">fsim/tables/max_climb_ms/h3/w2</property>
      <property value="191.811">fsim/tables/max_climb_ms/h4/w0</property>
      <property value="158.575">fsim/tables/max_climb_ms/h4/w1</property>
      <property value="133.848">fsim/tables/max_climb_ms/h4/w2</property>
      <property value="119.608">fsim/tables/max_climb_ms/h5/w0</property>
      <property value="95.8051">fsim/tables/max_climb_ms/h5/w1</property>
      <property value="78.1304">fsim/tables/max_climb_ms/h5/w2</property>
      <property value="80.9139">fsim/tables/max_climb_ms/h6/w0</property>
      <property value="61.5804">fsim/tables/max_climb_ms/h6/w1</property>
      <property value="46.1278">fsim/tables/max_climb_ms/h6/w2</property>
      <property value="47.8003">fsim/tables/max_climb_ms/h7/w0</property>
      <property value="30.5461">fsim/tables/max_climb_ms/h7/w1</property>
      <property value="15.8645">fsim/tables/max_climb_ms/h7/w2</property>
      <property value="435.393">fsim/tables/max_tas_ms/h0/w0</property>
      <property value="435.106">fsim/tables/max_tas_ms/h0/w1</property>
      <property value="434.658">fsim/tables/max_tas_ms/h0/w2</property>
      <property value="485.168">fsim/tables/max_tas_ms/h1/w0</property>
      <property value="484.775">fsim/tables/max_tas_ms/h1/w1</property>
      <property value="484.331">fsim/tables/max_tas_ms/h1/w2</property>
      <property value="541.665">fsim/tables/max_tas_ms/h2/w0</property>
      <property value="541.196">fsim/tables/max_tas_ms/h2/w1</property>
      <property value="539.682">fsim/tables/max_tas_ms/h2/w2</property>
      <property value="598.313">fsim/tables/max_tas_ms/h3/w0</property>
      <property value="596.653">fsim/tables/max_tas_ms/h3/w1</property>
      <property value="594.993">fsim/tables/max_tas_ms/h3/w2</property>
      <property value="598.686">fsim/tables/max_tas_ms/h4/w0</property>
      <property value="596.923">fsim/tables/max_tas_ms/h4/w1</property>
      <property value="595.148">fsim/tables/max_tas_ms/h4/w2</property>
      <property value="597.073">fsim/tables/max_tas_ms/h5/w0</property>
      <property value="593.198">fsim/tables/max_tas_ms/h5/w1</property>
      <property value="586.227">fsim/tables/max_tas_ms/h5/w2</property>
      <property value="588.222">fsim/tables/max_tas_ms/h6/w0</property>
      <property value="579.151">fsim/tables/max_tas_ms/h6/w1</property>
      <property value="569.731">fsim/tables/max_tas_ms/h6/w2</property>
      <property value="569.261">fsim/tables/max_tas_ms/h7/w0</property>
      <property value="555.814">fsim/tables/max_tas_ms/h7/w1</property>
      <property value="537.342">fsim/tables/max_tas_ms/h7/w2</property>
      <property value="222.231">fsim/tables/min_tas_ms/h0/w0</property>
      <property value="212.25">fsim/tables/min_tas_ms/h0/w1</property>
      <property value="206.961">fsim/tables/min_tas_ms/h0/w2</property>
      <property value="166.545">fsim/tables/min_tas_ms/h1/w0</property>
      <property value="161.293">fsim/tables/min_tas_ms/h1/w1</property>
      <property value="156.525">fsim/tables/min_tas_ms/h1/w2</property>
      <property value="164.287">fsim/tables/min_tas_ms/h2/w0</property>
      <property value="162.251">fsim/tables/min_tas_ms/h2/w1</property>
      <property value="162.334">fsim/tables/min_tas_ms/h2/w2</property>
      <property value="170.84">fsim/tables/min_tas_ms/h3/w0</property>
      <property value="173.193">fsim/tables/min_tas_ms/h3/w1</property>
      <property value="177.57">fsim/tables/min_tas_ms/h3/w2</property>
      <property value="171.859">fsim/tables/min_tas_ms/h4/w0</property>
      <property value="175.034">fsim/tables/min_tas_ms/h4/w1</property>
      <property value="180.128">fsim/tables/min_tas_ms/h4/w2</property>
      <property value="187.652">fsim/tables/min_tas_ms/h5/w0</property>
      <property value="196.462">fsim/tables/min_tas_ms/h5/w1</property>
      <property value="206.04">fsim/tables/min_tas_ms/h5/w2</property>
      <property value="204.701">fsim/tables/min_tas_ms/h6/w0</property>
      <property value="217.134">fsim/tables/min_tas_ms/h6/w1</property>
      <property value="229.794">fsim/tables/min_tas_ms/h6/w2</property>
      <property value="227.874">fsim/tables/min_tas_ms/h7/w0</property>
      <property value="244.723">fsim/tables/min_tas_ms/h7/w1</property>
      <property value="256.232">fsim/tables/min_tas_ms/h7/w2</property>
      <property value="339.05">fsim/tables/ps_full_ms/h0/w0/v0</property>
      <property value="359.224">fsim/tables/ps_full_ms/h0/w0/v1</property>
      <property value="409.038">fsim/tables/ps_full_ms/h0/w0/v10</property>
      <property value="327.983">fsim/tables/ps_full_ms/h0/w0/v11</property>
      <property value="200.023">fsim/tables/ps_full_ms/h0/w0/v12</property>
      <property value="150.574">fsim/tables/ps_full_ms/h0/w0/v13</property>
      <property value="109.08">fsim/tables/ps_full_ms/h0/w0/v14</property>
      <property value="56.3889">fsim/tables/ps_full_ms/h0/w0/v15</property>
      <property value="379.263">fsim/tables/ps_full_ms/h0/w0/v2</property>
      <property value="399.203">fsim/tables/ps_full_ms/h0/w0/v3</property>
      <property value="419.083">fsim/tables/ps_full_ms/h0/w0/v4</property>
      <property value="438.841">fsim/tables/ps_full_ms/h0/w0/v5</property>
      <property value="457.776">fsim/tables/ps_full_ms/h0/w0/v6</property>
      <property value="473.078">fsim/tables/ps_full_ms/h0/w0/v7</property>
      <property value="475.519">fsim/tables/ps_full_ms/h0/w0/v8</property>
      <property value="454.914">fsim/tables/ps_full_ms/h0/w0/v9</property>
      <property value="270.393">fsim/tables/ps_full_ms/h0/w1/v0</property>
      <property value="288.415">fsim/tables/ps_full_ms/h0/w1/v1</property>
      <property value="364.702">fsim/tables/ps_full_ms/h0/w1/v10</property>
      <property value="294.885">fsim/tables/ps_full_ms/h0/w1/v11</property>
      <property value="172.452">fsim/tables/ps_full_ms/h0/w1/v12</property>
      <property value="128.765">fsim/tables/ps_full_ms/h0/w1/v13</property>
      <property value="94.0034">fsim/tables/ps_full_ms/h0/w1/v14</property>
      <property value="48.4846">fsim/tables/ps_full_ms/h0/w1/v15</property>
      <property value="306.241">fsim/tables/ps_full_ms/h0/w1/v2</property>
      <property value="323.873">fsim/tables/ps_full_ms/h0/w1/v3</property>
      <property value="341.396">fsim/tables/ps_full_ms/h0/w1/v4</property>
      <property value="358.902">fsim/tables/ps_full_ms/h0/w1/v5</property>
      <property value="376.334">fsim/tables/ps_full_ms/h0/w1/v6</property>
      <property value="392.829">fsim/tables/ps_full_ms/h0/w1/v7</property>
      <property value="405.013">fsim/tables/ps_full_ms/h0/w1/v8</property>
      <property value="399.968">fsim/tables/ps_full_ms/h0/w1/v9</property>
      <property value="225.693">fsim/tables/ps_full_ms/h0/w2/v0</property>
      <property value="241.701">fsim/tables/ps_full_ms/h0/w2/v1</property>
      <property value="327.729">fsim/tables/ps_full_ms/h0/w2/v10</property>
      <property value="265.028">fsim/tables/ps_full_ms/h0/w2/v11</property>
      <property value="150.318">fsim/tables/ps_full_ms/h0/w2/v12</property>
      <property value="112.5">fsim/tables/ps_full_ms/h0/w2/v13</property>
      <property value="82.7933">fsim/tables/ps_full_ms/h0/w2/v14</property>
      <property value="43.1031">fsim/tables/ps_full_ms/h0/w2/v15</property>
      <property value="257.507">fsim/tables/ps_full_ms/h0/w2/v2</property>
      <property value="273.11">fsim/tables/ps_full_ms/h0/w2/v3</property>
      <property value="288.624">fsim/tables/ps_full_ms/h0/w2/v4</property>
      <property value="304.146">fsim/tables/ps_full_ms/h0/w2/v5</property>
      <property value="319.701">fsim/tables/ps_full_ms/h0/w2/v6</property>
      <property value="334.97">fsim/tables/ps_full_ms/h0/w2/v7</property>
      <property value="348.028">fsim/tables/ps_full_ms/h0/w2/v8</property>
      <property value="351.938">fsim/tables/ps_full_ms/h0/w2/v9</property>
      <property value="197.024">fsim/tables/ps_full_ms/h1/w0/v0</property>
      <property value="221.811">fsim/tables/ps_full_ms/h1/w0/v1</property>
      <property value="246.759">fsim/tables/ps_full_ms/h1/w0/v10</property>
      <property value="226.773">fsim/tables/ps_full_ms/h1/w0/v11</property>
      <property value="199.45">fsim/tables/ps_full_ms/h1/w0/v12</property>
      <property value="163.371">fsim/tables/ps_full_ms/h1/w0/v13</property>
      <property value="121.473">fsim/tables/ps_full_ms/h1/w0/v14</property>
      <property value="55.7623">fsim/tables/ps_full_ms/h1/w0/v15</property>
      <property value="246.679">fsim/tables/ps_full_ms/h1/w0/v2</property>
      <property value="271.491">fsim/tables/ps_full_ms/h1/w0/v3</property>
      <property value="296.411">fsim/tables/ps_full_ms/h1/w0/v4</property>
      <property value="321.887">fsim/tables/ps_full_ms/h1/w0/v5</property>
      <property value="347.69">fsim/tables/ps_full_ms/h1/w0/v6</property>
      <property value="370.942">fsim/tables/ps_full_ms/h1/w0/v7</property>
      <property value="370.824">fsim/tables/ps_full_ms/h1/w0/v8</property>
      <property value="325.812">fsim/tables/ps_full_ms/h1/w0/v9</property>
      <property value="157.517">fsim/tables/ps_full_ms/h1/w1/v0</property>
      <property value="179.196">fsim/tables/ps_full_ms/h1/w1/v1</property>
      <property value="205.202">fsim/tables/ps_full_ms/h1/w1/v10</property>
      <property value="191.218">fsim/tables/ps_full_ms/h1/w1/v11</property>
      <property value="168.584">fsim/tables/ps_full_ms/h1/w1/v12</property>
      <property value="138.535">fsim/tables/ps_full_ms/h1/w1/v13</property>
      <property value="103.529">fsim/tables/ps_full_ms/h1/w1/v14</property>
      <property value="47.4452">fsim/tables/ps_full_ms/h1/w1/v15</property>
      <property value="200.608">fsim/tables/ps_full_ms/h1/w1/v2</property>
      <property value="221.833">fsim/tables/ps_full_ms/h1/w1/v3</property>
      <property value="242.817">fsim/tables/ps_full_ms/h1/w1/v4</property>
      <property value="264.214">fsim/tables/ps_full_ms/h1/w1/v5</property>
      <property value="286.202">fsim/tables/ps_full_ms/h1/w1/v6</property>
      <property value="307.375">fsim/tables/ps_full_ms/h1/w1/v7</property>
      <property value="317.616">fsim/tables/ps_full_ms/h1/w1/v8</property>
      <property value="281.065">fsim/tables/ps_full_ms/h1/w1/v9</property>
      <property value="129.195">fsim/tables/ps_full_ms/h1/w2/v0</property>
      <property value="148.598">fsim/tables/ps_full_ms/h1/w2/v1</property>
      <property value="175.846">fsim/tables/ps_full_ms/h1/w2/v10</property>
      <property value="164.627">fsim/tables/ps_full_ms/h1/w2/v11</property>
      <property value="145.821">fsim/tables/ps_full_ms/h1/w2/v12</property>
      <property value="120.387">fsim/tables/ps_full_ms/h1/w2/v13</property>
      <property value="89.2377">fsim/tables/ps_full_ms/h1/w2/v14</property>
      <property value="40.9535">fsim/tables/ps_full_ms/h1/w2/v15</property>
      <property value="167.303">fsim/tables/ps_full_ms/h1/w2/v2</property>
      <property value="185.829">fsim/tables/ps_full_ms/h1/w2/v3</property>
      <property value="204.145">fsim/tables/ps_full_ms/h1/w2/v4</property>
      <property value="222.62">fsim/tables/ps_full_ms/h1/w2/v5</property>
      <property value="241.579">fsim/tables/ps_full_ms/h1/w2/v6</property>
      <property value="260.468">fsim/tables/ps_full_ms/h1/w2/v7</property>
      <property value="274.777">fsim/tables/ps_full_ms/h1/w2/v8</property>
      <property value="249.453">fsim/tables/ps_full_ms/h1/w2/v9</property>
      <property value="142.624">fsim/tables/ps_full_ms/h2/w0/v0</property>
      <property value="166.114">fsim/tables/ps_full_ms/h2/w0/v1</property>
      <property value="214.296">fsim/tables/ps_full_ms/h2/w0/v10</property>
      <property value="211.187">fsim/tables/ps_full_ms/h2/w0/v11</property>
      <property value="192.499">fsim/tables/ps_full_ms/h2/w0/v12</property>
      <property value="163.591">fsim/tables/ps_full_ms/h2/w0/v13</property>
      <property value="122.229">fsim/tables/ps_full_ms/h2/w0/v14</property>
      <property value="52.674">fsim/tables/ps_full_ms/h2/w0/v15</property>
      <property value="189.239">fsim/tables/ps_full_ms/h2/w0/v2</property>
      <property value="212.709">fsim/tables/ps_full_ms/h2/w0/v3</property>
      <property value="237.021">fsim/tables/ps_full_ms/h2/w0/v4</property>
      <property value="261.708">fsim/tables/ps_full_ms/h2/w0/v5</property>
      <property value="280.167">fsim/tables/ps_full_ms/h2/w0/v6</property>
      <property value="254.18">fsim/tables/ps_full_ms/h2/w0/v7</property>
      <property value="212.528">fsim/tables/ps_full_ms/h2/w0/v8</property>
      <property value="213.646">fsim/tables/ps_full_ms/h2/w0/v9</property>
      <property value="114.484">fsim/tables/ps_full_ms/h2/w1/v0</property>
      <property value="135.241">fsim/tables/ps_full_ms/h2/w1/v1</property>
      <property value="177.881">fsim/tables/ps_full_ms/h2/w1/v10</property>
      <property value="175.37">fsim/tables/ps_full_ms/h2/w1/v11</property>
      <property value="158.687">fsim/tables/ps_full_ms/h2/w1/v12</property>
      <property value="133.382">fsim/tables/ps_full_ms/h2/w1/v13</property>
      <property value="101.026">fsim/tables/ps_full_ms/h2/w1/v14</property>
      <property value="43.0311">fsim/tables/ps_full_ms/h2/w1/v15</property>
      <property value="154.88">fsim/tables/ps_full_ms/h2/w1/v2</property>
      <property value="174.475">fsim/tables/ps_full_ms/h2/w1/v3</property>
      <property value="194.815">fsim/tables/ps_full_ms/h2/w1/v4</property>
      <property value="215.882">fsim/tables/ps_full_ms/h2/w1/v5</property>
      <property value="234.1">fsim/tables/ps_full_ms/h2/w1/v6</property>
      <property value="214.918">fsim/tables/ps_full_ms/h2/w1/v7</property>
      <property value="176.338">fsim/tables/ps_full_ms/h2/w1/v8</property>
      <property value="177.135">fsim/tables/ps_full_ms/h2/w1/v9</property>
      <property value="95.1229">fsim/tables/ps_full_ms/h2/w2/v0</property>
      <property value="113.683">fsim/tables/ps_full_ms/h2/w2/v1</property>
      <property value="151.317">fsim/tables/ps_full_ms/h2/w2/v10</property>
      <property value="148.445">fsim/tables/ps_full_ms/h2/w2/v11</property>
      <property value="133.973">fsim/tables/ps_full_ms/h2/w2/v12</property>
      <property value="113.601">fsim/tables/ps_full_ms/h2/w2/v13</property>
      <property value="87.0256">fsim/tables/ps_full_ms/h2/w2/v14</property>
      <property value="36.621">fsim/tables/ps_full_ms/h2/w2/v15</property>
      <property value="130.549">fsim/tables/ps_full_ms/h2/w2/v2</property>
      <property value="147.329">fsim/tables/ps_full_ms/h2/w2/v3</property>
      <property value="164.763">fsim/tables/ps_full_ms/h2/w2/v4</property>
      <property value="182.66">fsim/tables/ps_full_ms/h2/w2/v5</property>
      <property value="199.411">fsim/tables/ps_full_ms/h2/w2/v6</property>
      <property value="185.809">fsim/tables/ps_full_ms/h2/w2/v7</property>
      <property value="150.344">fsim/tables/ps_full_ms/h2/w2/v8</property>
      <property value="150.884">fsim/tables/ps_full_ms/h2/w2/v9</property>
      <property value="105.636">fsim/tables/ps_full_ms/h3/w0/v0</property>
      <property value="126.976">fsim/tables/ps_full_ms/h3/w0/v1</property>
      <property value="192.545">fsim/tables/ps_full_ms/h3/w0/v10</property>
      <property value="192.298">fsim/tables/ps_full_ms/h3/w0/v11</property>
      <property value="190.379">fsim/tables/ps_full_ms/h3/w0/v12</property>
      <property value="186.111">fsim/tables/ps_full_ms/h3/w0/v13</property>
      <property value="132.845">fsim/tables/ps_full_ms/h3/w0/v14</property>
      <property value="55.6914">fsim/tables/ps_full_ms/h3/w0/v15</property>
      <property value="147.855">fsim/tables/ps_full_ms/h3/w0/v2</property>
      <property value="169.689">fsim/tables/ps_full_ms/h3/w0/v3</property>
      <property value="192.298">fsim/tables/ps_full_ms/h3/w0/v4</property>
      <property value="201.092">fsim/tables/ps_full_ms/h3/w0/v5</property>
      <property value="170.941">fsim/tables/ps_full_ms/h3/w0/v6</property>
      <property value="177.991">fsim/tables/ps_full_ms/h3/w0/v7</property>
      <property value="185.293">fsim/tables/ps_full_ms/h3/w0/v8</property>
      <property value="190.007">fsim/tables/ps_full_ms/h3/w0/v9</property>
      <property value="84.8708">fsim/tables/ps_full_ms/h3/w1/v0</property>
      <property value="104.176">fsim/tables/ps_full_ms/h3/w1/v1</property>
      <property value="157.527">fsim/tables/ps_full_ms/h3/w1/v10</property>
      <property value="157.725">fsim/tables/ps_full_ms/h3/w1/v11</property>
      <property value="156.867">fsim/tables/ps_full_ms/h3/w1/v12</property>
      <property value="153.252">fsim/tables/ps_full_ms/h3/w1/v13</property>
      <property value="109.348">fsim/tables/ps_full_ms/h3/w1/v14</property>
      <property value="46.7856">fsim/tables/ps_full_ms/h3/w1/v15</property>
      <property value="121.509">fsim/tables/ps_full_ms/h3/w1/v2</property>
      <property value="139.681">fsim/tables/ps_full_ms/h3/w1/v3</property>
      <property value="158.76">fsim/tables/ps_full_ms/h3/w1/v4</property>
      <property value="166.804">fsim/tables/ps_full_ms/h3/w1/v5</property>
      <property value="140.053">fsim/tables/ps_full_ms/h3/w1/v6</property>
      <property value="146.454">fsim/tables/ps_full_ms/h3/w1/v7</property>
      <property value="152.893">fsim/tables/ps_full_ms/h3/w1/v8</property>
      <property value="156.048">fsim/tables/ps_full_ms/h3/w1/v9</property>
      <property value="70.4019">fsim/tables/ps_full_ms/h3/w2/v0</property>
      <property value="88.008">fsim/tables/ps_full_ms/h3/w2/v1</property>
      <property value="131.596">fsim/tables/ps_full_ms/h3/w2/v10</property>
      <property value="132.737">fsim/tables/ps_full_ms/h3/w2/v11</property>
      <property value="131.937">fsim/tables/ps_full_ms/h3/w2/v12</property>
      <property value="128.122">fsim/tables/ps_full_ms/h3/w2/v13</property>
      <property value="92.8613">fsim/tables/ps_full_ms/h3/w2/v14</property>
      <property value="39.612">fsim/tables/ps_full_ms/h3/w2/v15</property>
      <property value="102.709">fsim/tables/ps_full_ms/h3/w2/v2</property>
      <property value="118.444">fsim/tables/ps_full_ms/h3/w2/v3</property>
      <property value="134.471">fsim/tables/ps_full_ms/h3/w2/v4</property>
      <property value="140.209">fsim/tables/ps_full_ms/h3/w2/v5</property>
      <property value="118.581">fsim/tables/ps_full_ms/h3/w2/v6</property>
      <property value="123.529">fsim/tables/ps_full_ms/h3/w2/v7</property>
      <property value="128.18">fsim/tables/ps_full_ms/h3/w2/v8</property>
      <property value="129.947">fsim/tables/ps_full_ms/h3/w2/v9</property>
      <property value="98.7635">fsim/tables/ps_full_ms/h4/w0/v0</property>
      <property value="118.943">fsim/tables/ps_full_ms/h4/w0/v1</property>
      <property value="181.442">fsim/tables/ps_full_ms/h4/w0/v10</property>
      <property value="181.736">fsim/tables/ps_full_ms/h4/w0/v11</property>
      <property value="181.148">fsim/tables/ps_full_ms/h4/w0/v12</property>
      <property value="177.378">fsim/tables/ps_full_ms/h4/w0/v13</property>
      <property value="125.157">fsim/tables/ps_full_ms/h4/w0/v14</property>
      <property value="53.2349">fsim/tables/ps_full_ms/h4/w0/v15</property>
      <property value="138.742">fsim/tables/ps_full_ms/h4/w0/v2</property>
      <property value="159.472">fsim/tables/ps_full_ms/h4/w0/v3</property>
      <property value="181.108">fsim/tables/ps_full_ms/h4/w0/v4</property>
      <property value="189.018">fsim/tables/ps_full_ms/h4/w0/v5</property>
      <property value="161.012">fsim/tables/ps_full_ms/h4/w0/v6</property>
      <property value="168.205">fsim/tables/ps_full_ms/h4/w0/v7</property>
      <property value="174.994">fsim/tables/ps_full_ms/h4/w0/v8</property>
      <property value="179.025">fsim/tables/ps_full_ms/h4/w0/v9</property>
      <property value="79.1784">fsim/tables/ps_full_ms/h4/w1/v0</property>
      <property value="97.5917">fsim/tables/ps_full_ms/h4/w1/v1</property>
      <property value="148.248">fsim/tables/ps_full_ms/h4/w1/v10</property>
      <property value="149.041">fsim/tables/ps_full_ms/h4/w1/v11</property>
      <property value="148.502">fsim/tables/ps_full_ms/h4/w1/v12</property>
      <property value="145.205">fsim/tables/ps_full_ms/h4/w1/v13</property>
      <property value="103.181">fsim/tables/ps_full_ms/h4/w1/v14</property>
      <property value="44.2365">fsim/tables/ps_full_ms/h4/w1/v15</property>
      <property value="114.001">fsim/tables/ps_full_ms/h4/w1/v2</property>
      <property value="131.289">fsim/tables/ps_full_ms/h4/w1/v3</property>
      <property value="149.344">fsim/tables/ps_full_ms/h4/w1/v4</property>
      <property value="155.969">fsim/tables/ps_full_ms/h4/w1/v5</property>
      <property value="132.114">fsim/tables/ps_full_ms/h4/w1/v6</property>
      <property value="137.908">fsim/tables/ps_full_ms/h4/w1/v7</property>
      <property value="143.494">fsim/tables/ps_full_ms/h4/w1/v8</property>
      <property value="146.268">fsim/tables/ps_full_ms/h4/w1/v9</property>
      <property value="65.5211">fsim/tables/ps_full_ms/h4/w2/v0</property>
      <property value="82.3268">fsim/tables/ps_full_ms/h4/w2/v1</property>
      <property value="123.572">fsim/tables/ps_full_ms/h4/w2/v10</property>
      <property value="124.372">fsim/tables/ps_full_ms/h4/w2/v11</property>
      <property value="124.247">fsim/tables/ps_full_ms/h4/w2/v12</property>
      <property value="121.548">fsim/tables/ps_full_ms/h4/w2/v13</property>
      <property value="87.5771">fsim/tables/ps_full_ms/h4/w2/v14</property>
      <property value="37.5258">fsim/tables/ps_full_ms/h4/w2/v15</property>
      <property value="96.2428">fsim/tables/ps_full_ms/h4/w2/v2</property>
      <property value="111.226">fsim/tables/ps_full_ms/h4/w2/v3</property>
      <property value="126.487">fsim/tables/ps_full_ms/h4/w2/v4</property>
      <property value="129.753">fsim/tables/ps_full_ms/h4/w2/v5</property>
      <property value="111.616">fsim/tables/ps_full_ms/h4/w2/v6</property>
      <property value="116.013">fsim/tables/ps_full_ms/h4/w2/v7</property>
      <property value="119.91">fsim/tables/ps_full_ms/h4/w2/v8</property>
      <property value="121.592">fsim/tables/ps_full_ms/h4/w2/v9</property>
      <property value="59.646">fsim/tables/ps_full_ms/h5/w0/v0</property>
      <property value="73.7618">fsim/tables/ps_full_ms/h5/w0/v1</property>
      <property value="112.098">fsim/tables/ps_full_ms/h5/w0/v10</property>
      <property value="112.464">fsim/tables/ps_full_ms/h5/w0/v11</property>
      <property value="112.617">fsim/tables/ps_full_ms/h5/w0/v12</property>
      <property value="111.521">fsim/tables/ps_full_ms/h5/w0/v13</property>
      <property value="78.6129">fsim/tables/ps_full_ms/h5/w0/v14</property>
      <property value="34.1824">fsim/tables/ps_full_ms/h5/w0/v15</property>
      <property value="86.8565">fsim/tables/ps_full_ms/h5/w0/v2</property>
      <property value="101.112">fsim/tables/ps_full_ms/h5/w0/v3</property>
      <property value="114.998">fsim/tables/ps_full_ms/h5/w0/v4</property>
      <property value="109.218">fsim/tables/ps_full_ms/h5/w0/v5</property>
      <property value="100.763">fsim/tables/ps_full_ms/h5/w0/v6</property>
      <property value="105.137">fsim/tables/ps_full_ms/h5/w0/v7</property>
      <property value="108.158">fsim/tables/ps_full_ms/h5/w0/v8</property>
      <property value="110.152">fsim/tables/ps_full_ms/h5/w0/v9</property>
      <property value="45.8719">fsim/tables/ps_full_ms/h5/w1/v0</property>
      <property value="59.2686">fsim/tables/ps_full_ms/h5/w1/v1</property>
      <property value="88.5287">fsim/tables/ps_full_ms/h5/w1/v10</property>
      <property value="88.1097">fsim/tables/ps_full_ms/h5/w1/v11</property>
      <property value="88.3425">fsim/tables/ps_full_ms/h5/w1/v12</property>
      <property value="87.2787">fsim/tables/ps_full_ms/h5/w1/v13</property>
      <property value="62.9903">fsim/tables/ps_full_ms/h5/w1/v14</property>
      <property value="27.5789">fsim/tables/ps_full_ms/h5/w1/v15</property>
      <property value="69.9824">fsim/tables/ps_full_ms/h5/w1/v2</property>
      <property value="81.8673">fsim/tables/ps_full_ms/h5/w1/v3</property>
      <property value="93.2551">fsim/tables/ps_full_ms/h5/w1/v4</property>
      <property value="80.8715">fsim/tables/ps_full_ms/h5/w1/v5</property>
      <property value="80.3542">fsim/tables/ps_full_ms/h5/w1/v6</property>
      <property value="83.0294">fsim/tables/ps_full_ms/h5/w1/v7</property>
      <property value="85.1763">fsim/tables/ps_full_ms/h5/w1/v8</property>
      <property value="87.1504">fsim/tables/ps_full_ms/h5/w1/v9</property>
      <property value="35.6502">fsim/tables/ps_full_ms/h5/w2/v0</property>
      <property value="47.7334">fsim/tables/ps_full_ms/h5/w2/v1</property>
      <property value="69.7879">fsim/tables/ps_full_ms/h5/w2/v10</property>
      <property value="69.3436">fsim/tables/ps_full_ms/h5/w2/v11</property>
      <property value="70.3164">fsim/tables/ps_full_ms/h5/w2/v12</property>
      <property value="69.7448">fsim/tables/ps_full_ms/h5/w2/v13</property>
      <property value="54.754">fsim/tables/ps_full_ms/h5/w2/v14</property>
      <property value="26.1028">fsim/tables/ps_full_ms/h5/w2/v15</property>
      <property value="56.9535">fsim/tables/ps_full_ms/h5/w2/v2</property>
      <property value="67.0287">fsim/tables/ps_full_ms/h5/w2/v3</property>
      <property value="77.2439">fsim/tables/ps_full_ms/h5/w2/v4</property>
      <property value="61.8561">fsim/tables/ps_full_ms/h5/w2/v5</property>
      <property value="64.1168">fsim/tables/ps_full_ms/h5/w2/v6</property>
      <property value="66.67">fsim/tables/ps_full_ms/h5/w2/v7</property>
      <property value="68.2781">fsim/tables/ps_full_ms/h5/w2/v8</property>
      <property value="69.2588">fsim/tables/ps_full_ms/h5/w2/v9</property>
      <property value="38.3929">fsim/tables/ps_full_ms/h6/w0/v0</property>
      <property value="49.2388">fsim/tables/ps_full_ms/h6/w0/v1</property>
      <property value="71.8318">fsim/tables/ps_full_ms/h6/w0/v10</property>
      <property value="71.3984">fsim/tables/ps_full_ms/h6/w0/v11</property>
      <property value="72.2584">fsim/tables/ps_full_ms/h6/w0/v12</property>
      <property value="71.1457">fsim/tables/ps_full_ms/h6/w0/v13</property>
      <property value="53.8118">fsim/tables/ps_full_ms/h6/w0/v14</property>
      <property value="23.8717">fsim/tables/ps_full_ms/h6/w0/v15</property>
      <property value="58.9066">fsim/tables/ps_full_ms/h6/w0/v2</property>
      <property value="69.4784">fsim/tables/ps_full_ms/h6/w0/v3</property>
      <property value="80.0529">fsim/tables/ps_full_ms/h6/w0/v4</property>
      <property value="63.9933">fsim/tables/ps_full_ms/h6/w0/v5</property>
      <property value="66.1896">fsim/tables/ps_full_ms/h6/w0/v6</property>
      <property value="68.8482">fsim/tables/ps_full_ms/h6/w0/v7</property>
      <property value="70.3119">fsim/tables/ps_full_ms/h6/w0/v8</property>
      <property value="71.317">fsim/tables/ps_full_ms/h6/w0/v9</property>
      <property value="26.4557">fsim/tables/ps_full_ms/h6/w1/v0</property>
      <property value="36.5214">fsim/tables/ps_full_ms/h6/w1/v1</property>
      <property value="52.6015">fsim/tables/ps_full_ms/h6/w1/v10</property>
      <property value="51.7216">fsim/tables/ps_full_ms/h6/w1/v11</property>
      <property value="52.0096">fsim/tables/ps_full_ms/h6/w1/v12</property>
      <property value="51.8682">fsim/tables/ps_full_ms/h6/w1/v13</property>
      <property value="44.553">fsim/tables/ps_full_ms/h6/w1/v14</property>
      <property value="21.9992">fsim/tables/ps_full_ms/h6/w1/v15</property>
      <property value="44.5762">fsim/tables/ps_full_ms/h6/w1/v2</property>
      <property value="53.9516">fsim/tables/ps_full_ms/h6/w1/v3</property>
      <property value="61.3866">fsim/tables/ps_full_ms/h6/w1/v4</property>
      <property value="46.8246">fsim/tables/ps_full_ms/h6/w1/v5</property>
      <property value="49.0307">fsim/tables/ps_full_ms/h6/w1/v6</property>
      <property value="50.916">fsim/tables/ps_full_ms/h6/w1/v7</property>
      <property value="51.632">fsim/tables/ps_full_ms/h6/w1/v8</property>
      <property value="52.4225">fsim/tables/ps_full_ms/h6/w1/v9</property>
      <property value="17.5986">fsim/tables/ps_full_ms/h6/w2/v0</property>
      <property value="26.2323">fsim/tables/ps_full_ms/h6/w2/v1</property>
      <property value="37.0651">fsim/tables/ps_full_ms/h6/w2/v10</property>
      <property value="36.1163">fsim/tables/ps_full_ms/h6/w2/v11</property>
      <property value="36.6082">fsim/tables/ps_full_ms/h6/w2/v12</property>
      <property value="37.0335">fsim/tables/ps_full_ms/h6/w2/v13</property>
      <property value="36.0631">fsim/tables/ps_full_ms/h6/w2/v14</property>
      <property value="18.6289">fsim/tables/ps_full_ms/h6/w2/v15</property>
      <property value="33.6475">fsim/tables/ps_full_ms/h6/w2/v2</property>
      <property value="42.6152">fsim/tables/ps_full_ms/h6/w2/v3</property>
      <property value="41.4739">fsim/tables/ps_full_ms/h6/w2/v4</property>
      <property value="34.1792">fsim/tables/ps_full_ms/h6/w2/v5</property>
      <property value="35.5677">fsim/tables/ps_full_ms/h6/w2/v6</property>
      <property value="36.6607">fsim/tables/ps_full_ms/h6/w2/v7</property>
      <property value="37.3845">fsim/tables/ps_full_ms/h6/w2/v8</property>
      <property value="37.4364">fsim/tables/ps_full_ms/h6/w2/v9</property>
      <property value="19.4882">fsim/tables/ps_full_ms/h7/w0/v0</property>
      <property value="27.2095">fsim/tables/ps_full_ms/h7/w0/v1</property>
      <property value="38.0483">fsim/tables/ps_full_ms/h7/w0/v10</property>
      <property value="37.1014">fsim/tables/ps_full_ms/h7/w0/v11</property>
      <property value="37.4564">fsim/tables/ps_full_ms/h7/w0/v12</property>
      <property value="37.4578">fsim/tables/ps_full_ms/h7/w0/v13</property>
      <property value="36.5239">fsim/tables/ps_full_ms/h7/w0/v14</property>
      <property value="18.9118">fsim/tables/ps_full_ms/h7/w0/v15</property>
      <property value="34.8492">fsim/tables/ps_full_ms/h7/w0/v2</property>
      <property value="43.8685">fsim/tables/ps_full_ms/h7/w0/v3</property>
      <property value="44.4691">fsim/tables/ps_full_ms/h7/w0/v4</property>
      <property value="35.2872">fsim/tables/ps_full_ms/h7/w0/v5</property>
      <property value="36.6022">fsim/tables/ps_full_ms/h7/w0/v6</property>
      <property value="37.8311">fsim/tables/ps_full_ms/h7/w0/v7</property>
      <property value="38.5599">fsim/tables/ps_full_ms/h7/w0/v8</property>
      <property value="38.4038">fsim/tables/ps_full_ms/h7/w0/v9</property>
      <property value="10.4368">fsim/tables/ps_full_ms/h7/w1/v0</property>
      <property value="15.4707">fsim/tables/ps_full_ms/h7/w1/v1</property>
      <property value="21.3189">fsim/tables/ps_full_ms/h7/w1/v10</property>
      <property value="20.3882">fsim/tables/ps_full_ms/h7/w1/v11</property>
      <property value="20.0889">fsim/tables/ps_full_ms/h7/w1/v12</property>
      <property value="20.4355">fsim/tables/ps_full_ms/h7/w1/v13</property>
      <property value="20.5086">fsim/tables/ps_full_ms/h7/w1/v14</property>
      <property value="14.9901">fsim/tables/ps_full_ms/h7/w1/v15</property>
      <property value="23.677">fsim/tables/ps_full_ms/h7/w1/v2</property>
      <property value="29.4638">fsim/tables/ps_full_ms/h7/w1/v3</property>
      <property value="20.2945">fsim/tables/ps_full_ms/h7/w1/v4</property>
      <property value="20.6886">fsim/tables/ps_full_ms/h7/w1/v5</property>
      <property value="21.736">fsim/tables/ps_full_ms/h7/w1/v6</property>
      <property value="22.2506">fsim/tables/ps_full_ms/h7/w1/v7</property>
      <property value="22.2764">fsim/tables/ps_full_ms/h7/w1/v8</property>
      <property value="21.8421">fsim/tables/ps_full_ms/h7/w1/v9</property>
      <property value="1.84963">fsim/tables/ps_full_ms/h7/w2/v0</property>
      <property value="7.78961">fsim/tables/ps_full_ms/h7/w2/v1</property>
      <property value="7.59781">fsim/tables/ps_full_ms/h7/w2/v10</property>
      <property value="6.88283">fsim/tables/ps_full_ms/h7/w2/v11</property>
      <property value="5.37904">fsim/tables/ps_full_ms/h7/w2/v12</property>
      <property value="5.54442">fsim/tables/ps_full_ms/h7/w2/v13</property>
      <property value="6.19046">fsim/tables/ps_full_ms/h7/w2/v14</property>
      <property value="6.70037">fsim/tables/ps_full_ms/h7/w2/v15</property>
      <property value="13.7296">fsim/tables/ps_full_ms/h7/w2/v2</property>
      <property value="13.0847">fsim/tables/ps_full_ms/h7/w2/v3</property>
      <property value="8.74526">fsim/tables/ps_full_ms/h7/w2/v4</property>
      <property value="9.78565">fsim/tables/ps_full_ms/h7/w2/v5</property>
      <property value="10.7723">fsim/tables/ps_full_ms/h7/w2/v6</property>
      <property value="10.4302">fsim/tables/ps_full_ms/h7/w2/v7</property>
      <property value="10.9004">fsim/tables/ps_full_ms/h7/w2/v8</property>
      <property value="8.06588">fsim/tables/ps_full_ms/h7/w2/v9</property>
      <property value="-39.9259">fsim/tables/ps_idle_ms/h0/w0/v0</property>
      <property value="-46.9785">fsim/tables/ps_idle_ms/h0/w0/v1</property>
      <property value="-234.09">fsim/tables/ps_idle_ms/h0/w0/v10</property>
      <property value="-388.217">fsim/tables/ps_idle_ms/h0/w0/v11</property>
      <property value="-488.765">fsim/tables/ps_idle_ms/h0/w0/v12</property>
      <property value="-551.426">fsim/tables/ps_idle_ms/h0/w0/v13</property>
      <property value="-589.348">fsim/tables/ps_idle_ms/h0/w0/v14</property>
      <property value="-615.227">fsim/tables/ps_idle_ms/h0/w0/v15</property>
      <property value="-54.6064">fsim/tables/ps_idle_ms/h0/w0/v2</property>
      <property value="-63.4054">fsim/tables/ps_idle_ms/h0/w0/v3</property>
      <property value="-73.2883">fsim/tables/ps_idle_ms/h0/w0/v4</property>
      <property value="-84.2487">fsim/tables/ps_idle_ms/h0/w0/v5</property>
      <property value="-96.2407">fsim/tables/ps_idle_ms/h0/w0/v6</property>
      <property value="-108.751">fsim/tables/ps_idle_ms/h0/w0/v7</property>
      <property value="-123.704">fsim/tables/ps_idle_ms/h0/w0/v8</property>
      <property value="-146.199">fsim/tables/ps_idle_ms/h0/w0/v9</property>
      <property value="-30.919">fsim/tables/ps_idle_ms/h0/w1/v0</property>
      <property value="-36.6386">fsim/tables/ps_idle_ms/h0/w1/v1</property>
      <property value="-155.08">fsim/tables/ps_idle_ms/h0/w1/v10</property>
      <property value="-300.621">fsim/tables/ps_idle_ms/h0/w1/v11</property>
      <property value="-402.851">fsim/tables/ps_idle_ms/h0/w1/v12</property>
      <property value="-477.146">fsim/tables/ps_idle_ms/h0/w1/v13</property>
      <property value="-508.012">fsim/tables/ps_idle_ms/h0/w1/v14</property>
      <property value="-529.025">fsim/tables/ps_idle_ms/h0/w1/v15</property>
      <property value="-43.1139">fsim/tables/ps_idle_ms/h0/w1/v2</property>
      <property value="-50.172">fsim/tables/ps_idle_ms/h0/w1/v3</property>
      <property value="-57.725">fsim/tables/ps_idle_ms/h0/w1/v4</property>
      <property value="-66.6819">fsim/tables/ps_idle_ms/h0/w1/v5</property>
      <property value="-76.7863">fsim/tables/ps_idle_ms/h0/w1/v6</property>
      <property value="-87.7727">fsim/tables/ps_idle_ms/h0/w1/v7</property>
      <property value="-99.8261">fsim/tables/ps_idle_ms/h0/w1/v8</property>
      <property value="-116.121">fsim/tables/ps_idle_ms/h0/w1/v9</property>
      <property value="-26.294">fsim/tables/ps_idle_ms/h0/w2/v0</property>
      <property value="-31.0765">fsim/tables/ps_idle_ms/h0/w2/v1</property>
      <property value="-121.964">fsim/tables/ps_idle_ms/h0/w2/v10</property>
      <property value="-242.954">fsim/tables/ps_idle_ms/h0/w2/v11</property>
      <property value="-344.269">fsim/tables/ps_idle_ms/h0/w2/v12</property>
      <property value="-412.771">fsim/tables/ps_idle_ms/h0/w2/v13</property>
      <property value="-444.654">fsim/tables/ps_idle_ms/h0/w2/v14</property>
      <property value="-463.501">fsim/tables/ps_idle_ms/h0/w2/v15</property>
      <property value="-36.55">fsim/tables/ps_idle_ms/h0/w2/v2</property>
      <property value="-42.6877">fsim/tables/ps_idle_ms/h0/w2/v3</property>
      <property value="-49.37">fsim/tables/ps_idle_ms/h0/w2/v4</property>
      <property value="-56.4218">fsim/tables/ps_idle_ms/h0/w2/v5</property>
      <property value="-64.6861">fsim/tables/ps_idle_ms/h0/w2/v6</property>
      <property value="-74.2218">fsim/tables/ps_idle_ms/h0/w2/v7</property>
      <property value="-84.6013">fsim/tables/ps_idle_ms/h0/w2/v8</property>
      <property value="-97.9112">fsim/tables/ps_idle_ms/h0/w2/v9</property>
      <property value="-16.8226">fsim/tables/ps_idle_ms/h1/w0/v0</property>
      <property value="-20.8493">fsim/tables/ps_idle_ms/h1/w0/v1</property>
      <property value="-322.593">fsim/tables/ps_idle_ms/h1/w0/v10</property>
      <property value="-388.327">fsim/tables/ps_idle_ms/h1/w0/v11</property>
      <property value="-448.228">fsim/tables/ps_idle_ms/h1/w0/v12</property>
      <property value="-513.2">fsim/tables/ps_idle_ms/h1/w0/v13</property>
      <property value="-567.056">fsim/tables/ps_idle_ms/h1/w0/v14</property>
      <property value="-596.368">fsim/tables/ps_idle_ms/h1/w0/v15</property>
      <property value="-25.987">fsim/tables/ps_idle_ms/h1/w0/v2</property>
      <property value="-32.5515">fsim/tables/ps_idle_ms/h1/w0/v3</property>
      <property value="-40.4376">fsim/tables/ps_idle_ms/h1/w0/v4</property>
      <property value="-49.4466">fsim/tables/ps_idle_ms/h1/w0/v5</property>
      <property value="-59.7381">fsim/tables/ps_idle_ms/h1/w0/v6</property>
      <property value="-71.9471">fsim/tables/ps_idle_ms/h1/w0/v7</property>
      <property value="-91.4849">fsim/tables/ps_idle_ms/h1/w0/v8</property>
      <property value="-204.88">fsim/tables/ps_idle_ms/h1/w0/v9</property>
      <property value="-15.9835">fsim/tables/ps_idle_ms/h1/w1/v0</property>
      <property value="-18.9009">fsim/tables/ps_idle_ms/h1/w1/v1</property>
      <property value="-267.534">fsim/tables/ps_idle_ms/h1/w1/v10</property>
      <property value="-322.351">fsim/tables/ps_idle_ms/h1/w1/v11</property>
      <property value="-372.932">fsim/tables/ps_idle_ms/h1/w1/v12</property>
      <property value="-427.682">fsim/tables/ps_idle_ms/h1/w1/v13</property>
      <property value="-483.632">fsim/tables/ps_idle_ms/h1/w1/v14</property>
      <property value="-509.835">fsim/tables/ps_idle_ms/h1/w1/v15</property>
      <property value="-22.9285">fsim/tables/ps_idle_ms/h1/w1/v2</property>
      <property value="-27.9921">fsim/tables/ps_idle_ms/h1/w1/v3</property>
      <property value="-34.2885">fsim/tables/ps_idle_ms/h1/w1/v4</property>
      <property value="-41.887">fsim/tables/ps_idle_ms/h1/w1/v5</property>
      <property value="-50.4189">fsim/tables/ps_idle_ms/h1/w1/v6</property>
      <property value="-60.2879">fsim/tables/ps_idle_ms/h1/w1/v7</property>
      <property value="-74.6201">fsim/tables/ps_idle_ms/h1/w1/v8</property>
      <property value="-152.059">fsim/tables/ps_idle_ms/h1/w1/v9</property>
      <property value="-16.0202">fsim/tables/ps_idle_ms/h1/w2/v0</property>
      <property value="-17.9957">fsim/tables/ps_idle_ms/h1/w2/v1</property>
      <property value="-228.104">fsim/tables/ps_idle_ms/h1/w2/v10</property>
      <property value="-275.773">fsim/tables/ps_idle_ms/h1/w2/v11</property>
      <property value="-319.1">fsim/tables/ps_idle_ms/h1/w2/v12</property>
      <property value="-366.437">fsim/tables/ps_idle_ms/h1/w2/v13</property>
      <property value="-418.419">fsim/tables/ps_idle_ms/h1/w2/v14</property>
      <property value="-445.008">fsim/tables/ps_idle_ms/h1/w2/v15</property>
      <property value="-21.111">fsim/tables/ps_idle_ms/h1/w2/v2</property>
      <property value="-25.2656">fsim/tables/ps_idle_ms/h1/w2/v3</property>
      <property value="-30.322">fsim/tables/ps_idle_ms/h1/w2/v4</property>
      <property value="-36.6218">fsim/tables/ps_idle_ms/h1/w2/v5</property>
      <property value="-43.9553">fsim/tables/ps_idle_ms/h1/w2/v6</property>
      <property value="-52.3675">fsim/tables/ps_idle_ms/h1/w2/v7</property>
      <property value="-63.9678">fsim/tables/ps_idle_ms/h1/w2/v8</property>
      <property value="-113.716">fsim/tables/ps_idle_ms/h1/w2/v9</property>
      <property value="-17.1787">fsim/tables/ps_idle_ms/h2/w0/v0</property>
      <property value="-19.5686">fsim/tables/ps_idle_ms/h2/w0/v1</property>
      <property value="-286.824">fsim/tables/ps_idle_ms/h2/w0/v10</property>
      <property value="-336.114">fsim/tables/ps_idle_ms/h2/w0/v11</property>
      <property value="-391.036">fsim/tables/ps_idle_ms/h2/w0/v12</property>
      <property value="-452.101">fsim/tables/ps_idle_ms/h2/w0/v13</property>
      <property value="-519.003">fsim/tables/ps_idle_ms/h2/w0/v14</property>
      <property value="-554.516">fsim/tables/ps_idle_ms/h2/w0/v15</property>
      <property value="-23.2324">fsim/tables/ps_idle_ms/h2/w0/v2</property>
      <property value="-28.3431">fsim/tables/ps_idle_ms/h2/w0/v3</property>
      <property value="-34.4563">fsim/tables/ps_idle_ms/h2/w0/v4</property>
      <property value="-42.1549">fsim/tables/ps_idle_ms/h2/w0/v5</property>
      <property value="-52.8117">fsim/tables/ps_idle_ms/h2/w0/v6</property>
      <property value="-120.897">fsim/tables/ps_idle_ms/h2/w0/v7</property>
      <property value="-201.08">fsim/tables/ps_idle_ms/h2/w0/v8</property>
      <property value="-242.127">fsim/tables/ps_idle_ms/h2/w0/v9</property>
      <property value="-18.2267">fsim/tables/ps_idle_ms/h2/w1/v0</property>
      <property value="-19.6689">fsim/tables/ps_idle_ms/h2/w1/v1</property>
      <property value="-241.353">fsim/tables/ps_idle_ms/h2/w1/v10</property>
      <property value="-283.087">fsim/tables/ps_idle_ms/h2/w1/v11</property>
      <property value="-329.38">fsim/tables/ps_idle_ms/h2/w1/v12</property>
      <property value="-380.149">fsim/tables/ps_idle_ms/h2/w1/v13</property>
      <property value="-435.583">fsim/tables/ps_idle_ms/h2/w1/v14</property>
      <property value="-472.078">fsim/tables/ps_idle_ms/h2/w1/v15</property>
      <property value="-22.3627">fsim/tables/ps_idle_ms/h2/w1/v2</property>
      <property value="-26.1274">fsim/tables/ps_idle_ms/h2/w1/v3</property>
      <property value="-31.2658">fsim/tables/ps_idle_ms/h2/w1/v4</property>
      <property value="-37.0305">fsim/tables/ps_idle_ms/h2/w1/v5</property>
      <property value="-45.8404">fsim/tables/ps_idle_ms/h2/w1/v6</property>
      <property value="-95.3036">fsim/tables/ps_idle_ms/h2/w1/v7</property>
      <property value="-168.86">fsim/tables/ps_idle_ms/h2/w1/v8</property>
      <property value="-203.525">fsim/tables/ps_idle_ms/h2/w1/v9</property>
      <property value="-19.6887">fsim/tables/ps_idle_ms/h2/w2/v0</property>
      <property value="-20.4183">fsim/tables/ps_idle_ms/h2/w2/v1</property>
      <property value="-208.586">fsim/tables/ps_idle_ms/h2/w2/v10</property>
      <property value="-244.541">fsim/tables/ps_idle_ms/h2/w2/v11</property>
      <property value="-284.411">fsim/tables/ps_idle_ms/h2/w2/v12</property>
      <property value="-327.952">fsim/tables/ps_idle_ms/h2/w2/v13</property>
      <property value="-375.094">fsim/tables/ps_idle_ms/h2/w2/v14</property>
      <property value="-410.381">fsim/tables/ps_idle_ms/h2/w2/v15</property>
      <property value="-22.3151">fsim/tables/ps_idle_ms/h2/w2/v2</property>
      <property value="-25.3671">fsim/tables/ps_idle_ms/h2/w2/v3</property>
      <property value="-29.3947">fsim/tables/ps_idle_ms/h2/w2/v4</property>
      <property value="-34.2823">fsim/tables/ps_idle_ms/h2/w2/v5</property>
      <property value="-41.2486">fsim/tables/ps_idle_ms/h2/w2/v6</property>
      <property value="-79.9482">fsim/tables/ps_idle_ms/h2/w2/v7</property>
      <property value="-146.227">fsim/tables/ps_idle_ms/h2/w2/v8</property>
      <property value="-176.027">fsim/tables/ps_idle_ms/h2/w2/v9</property>
      <property value="-20.7855">fsim/tables/ps_idle_ms/h3/w0/v0</property>
      <property value="-21.6993">fsim/tables/ps_idle_ms/h3/w0/v1</property>
      <property value="-250.166">fsim/tables/ps_idle_ms/h3/w0/v10</property>
      <property value="-295.136">fsim/tables/ps_idle_ms/h3/w0/v11</property>
      <property value="-343.758">fsim/tables/ps_idle_ms/h3/w0/v12</property>
      <property value="-396.678">fsim/tables/ps_idle_ms/h3/w0/v13</property>
      <property value="-454.902">fsim/tables/ps_idle_ms/h3/w0/v14</property>
      <property value="-500.33">fsim/tables/ps_idle_ms/h3/w0/v15</property>
      <property value="-24.0042">fsim/tables/ps_idle_ms/h3/w0/v2</property>
      <property value="-27.6565">fsim/tables/ps_idle_ms/h3/w0/v3</property>
      <property value="-32.3633">fsim/tables/ps_idle_ms/h3/w0/v4</property>
      <property value="-43.0057">fsim/tables/ps_idle_ms/h3/w0/v5</property>
      <property value="-115.11">fsim/tables/ps_idle_ms/h3/w0/v6</property>
      <property value="-142.866">fsim/tables/ps_idle_ms/h3/w0/v7</property>
      <property value="-174.124">fsim/tables/ps_idle_ms/h3/w0/v8</property>
      <property value="-209.622">fsim/tables/ps_idle_ms/h3/w0/v9</property>
      <property value="-23.1042">fsim/tables/ps_idle_ms/h3/w1/v0</property>
      <property value="-23.126">fsim/tables/ps_idle_ms/h3/w1/v1</property>
      <property value="-212.598">fsim/tables/ps_idle_ms/h3/w1/v10</property>
      <property value="-250.363">fsim/tables/ps_idle_ms/h3/w1/v11</property>
      <property value="-290.998">fsim/tables/ps_idle_ms/h3/w1/v12</property>
      <property value="-335.055">fsim/tables/ps_idle_ms/h3/w1/v13</property>
      <property value="-383.183">fsim/tables/ps_idle_ms/h3/w1/v14</property>
      <property value="-425.02">fsim/tables/ps_idle_ms/h3/w1/v15</property>
      <property value="-24.6635">fsim/tables/ps_idle_ms/h3/w1/v2</property>
      <property value="-27.3618">fsim/tables/ps_idle_ms/h3/w1/v3</property>
      <property value="-30.6893">fsim/tables/ps_idle_ms/h3/w1/v4</property>
      <property value="-40.0458">fsim/tables/ps_idle_ms/h3/w1/v5</property>
      <property value="-100.383">fsim/tables/ps_idle_ms/h3/w1/v6</property>
      <property value="-123.648">fsim/tables/ps_idle_ms/h3/w1/v7</property>
      <property value="-149.422">fsim/tables/ps_idle_ms/h3/w1/v8</property>
      <property value="-178.658">fsim/tables/ps_idle_ms/h3/w1/v9</property>
      <property value="-25.4436">fsim/tables/ps_idle_ms/h3/w2/v0</property>
      <property value="-24.9095">fsim/tables/ps_idle_ms/h3/w2/v1</property>
      <property value="-187.245">fsim/tables/ps_idle_ms/h3/w2/v10</property>
      <property value="-219.224">fsim/tables/ps_idle_ms/h3/w2/v11</property>
      <property value="-253.453">fsim/tables/ps_idle_ms/h3/w2/v12</property>
      <property value="-291.015">fsim/tables/ps_idle_ms/h3/w2/v13</property>
      <property value="-331.75">fsim/tables/ps_idle_ms/h3/w2/v14</property>
      <property value="-369.709">fsim/tables/ps_idle_ms/h3/w2/v15</property>
      <property value="-25.7276">fsim/tables/ps_idle_ms/h3/w2/v2</property>
      <property value="-27.6871">fsim/tables/ps_idle_ms/h3/w2/v3</property>
      <property value="-30.536">fsim/tables/ps_idle_ms/h3/w2/v4</property>
      <property value="-40.9142">fsim/tables/ps_idle_ms/h3/w2/v5</property>
      <property value="-90.7295">fsim/tables/ps_idle_ms/h3/w2/v6</property>
      <property value="-110.91">fsim/tables/ps_idle_ms/h3/w2/v7</property>
      <property value="-133.295">fsim/tables/ps_idle_ms/h3/w2/v8</property>
      <property value="-158.478">fsim/tables/ps_idle_ms/h3/w2/v9</property>
      <property value="-21.5439">fsim/tables/ps_idle_ms/h4/w0/v0</property>
      <property value="-22.1789">fsim/tables/ps_idle_ms/h4/w0/v1</property>
      <property value="-237.433">fsim/tables/ps_idle_ms/h4/w0/v10</property>
      <property value="-279.91">fsim/tables/ps_idle_ms/h4/w0/v11</property>
      <property value="-325.727">fsim/tables/ps_idle_ms/h4/w0/v12</property>
      <property value="-375.507">fsim/tables/ps_idle_ms/h4/w0/v13</property>
      <property value="-430.289">fsim/tables/ps_idle_ms/h4/w0/v14</property>
      <property value="-474.735">fsim/tables/ps_idle_ms/h4/w0/v15</property>
      <property value="-24.2091">fsim/tables/ps_idle_ms/h4/w0/v2</property>
      <property value="-27.5669">fsim/tables/ps_idle_ms/h4/w0/v3</property>
      <property value="-31.8269">fsim/tables/ps_idle_ms/h4/w0/v4</property>
      <property value="-42.5753">fsim/tables/ps_idle_ms/h4/w0/v5</property>
      <property value="-110.194">fsim/tables/ps_idle_ms/h4/w0/v6</property>
      <property value="-136.189">fsim/tables/ps_idle_ms/h4/w0/v7</property>
      <property value="-165.528">fsim/tables/ps_idle_ms/h4/w0/v8</property>
      <property value="-199.095">fsim/tables/ps_idle_ms/h4/w0/v9</property>
      <property value="-24.0246">fsim/tables/ps_idle_ms/h4/w1/v0</property>
      <property value="-23.8372">fsim/tables/ps_idle_ms/h4/w1/v1</property>
      <property value="-202.293">fsim/tables/ps_idle_ms/h4/w1/v10</property>
      <property value="-237.876">fsim/tables/ps_idle_ms/h4/w1/v11</property>
      <property value="-276.102">fsim/tables/ps_idle_ms/h4/w1/v12</property>
      <property value="-317.496">fsim/tables/ps_idle_ms/h4/w1/v13</property>
      <property value="-362.691">fsim/tables/ps_idle_ms/h4/w1/v14</property>
      <property value="-403.17">fsim/tables/ps_idle_ms/h4/w1/v15</property>
      <property value="-25.0319">fsim/tables/ps_idle_ms/h4/w1/v2</property>
      <property value="-27.4623">fsim/tables/ps_idle_ms/h4/w1/v3</property>
      <property value="-30.6581">fsim/tables/ps_idle_ms/h4/w1/v4</property>
      <property value="-40.9343">fsim/tables/ps_idle_ms/h4/w1/v5</property>
      <property value="-96.6267">fsim/tables/ps_idle_ms/h4/w1/v6</property>
      <property value="-118.631">fsim/tables/ps_idle_ms/h4/w1/v7</property>
      <property value="-143.028">fsim/tables/ps_idle_ms/h4/w1/v8</property>
      <property value="-170.659">fsim/tables/ps_idle_ms/h4/w1/v9</property>
      <property value="-26.4673">fsim/tables/ps_idle_ms/h4/w2/v0</property>
      <property value="-25.6919">fsim/tables/ps_idle_ms/h4/w2/v1</property>
      <property value="-179.119">fsim/tables/ps_idle_ms/h4/w2/v10</property>
      <property value="-209.317">fsim/tables/ps_idle_ms/h4/w2/v11</property>
      <property value="-240.995">fsim/tables/ps_idle_ms/h4/w2/v12</property>
      <property value="-275.989">fsim/tables/ps_idle_ms/h4/w2/v13</property>
      <property value="-314.162">fsim/tables/ps_idle_ms/h4/w2/v14</property>
      <property value="-350.663">fsim/tables/ps_idle_ms/h4/w2/v15</property>
      <property value="-26.3536">fsim/tables/ps_idle_ms/h4/w2/v2</property>
      <property value="-28.0892">fsim/tables/ps_idle_ms/h4/w2/v3</property>
      <property value="-30.6787">fsim/tables/ps_idle_ms/h4/w2/v4</property>
      <property value="-44.3802">fsim/tables/ps_idle_ms/h4/w2/v5</property>
      <property value="-87.8245">fsim/tables/ps_idle_ms/h4/w2/v6</property>
      <property value="-106.839">fsim/tables/ps_idle_ms/h4/w2/v7</property>
      <property value="-128.03">fsim/tables/ps_idle_ms/h4/w2/v8</property>
      <property value="-151.91">fsim/tables/ps_idle_ms/h4/w2/v9</property>
      <property value="-28.4191">fsim/tables/ps_idle_ms/h5/w0/v0</property>
      <property value="-27.4388">fsim/tables/ps_idle_ms/h5/w0/v1</property>
      <property value="-166.347">fsim/tables/ps_idle_ms/h5/w0/v10</property>
      <property value="-193.24">fsim/tables/ps_idle_ms/h5/w0/v11</property>
      <property value="-221.278">fsim/tables/ps_idle_ms/h5/w0/v12</property>
      <property value="-251.546">fsim/tables/ps_idle_ms/h5/w0/v13</property>
      <property value="-285.19">fsim/tables/ps_idle_ms/h5/w0/v14</property>
      <property value="-318.8">fsim/tables/ps_idle_ms/h5/w0/v15</property>
      <property value="-27.7538">fsim/tables/ps_idle_ms/h5/w0/v2</property>
      <property value="-29.0891">fsim/tables/ps_idle_ms/h5/w0/v3</property>
      <property value="-31.2762">fsim/tables/ps_idle_ms/h5/w0/v4</property>
      <property value="-56.3445">fsim/tables/ps_idle_ms/h5/w0/v5</property>
      <property value="-84.4702">fsim/tables/ps_idle_ms/h5/w0/v6</property>
      <property value="-101.15">fsim/tables/ps_idle_ms/h5/w0/v7</property>
      <property value="-120.165">fsim/tables/ps_idle_ms/h5/w0/v8</property>
      <property value="-141.835">fsim/tables/ps_idle_ms/h5/w0/v9</property>
      <property value="-31.9803">fsim/tables/ps_idle_ms/h5/w1/v0</property>
      <property value="-30.3636">fsim/tables/ps_idle_ms/h5/w1/v1</property>
      <property value="-145.576">fsim/tables/ps_idle_ms/h5/w1/v10</property>
      <property value="-167.776">fsim/tables/ps_idle_ms/h5/w1/v11</property>
      <property value="-190.661">fsim/tables/ps_idle_ms/h5/w1/v12</property>
      <property value="-215.388">fsim/tables/ps_idle_ms/h5/w1/v13</property>
      <property value="-242.546">fsim/tables/ps_idle_ms/h5/w1/v14</property>
      <property value="-270.895">fsim/tables/ps_idle_ms/h5/w1/v15</property>
      <property value="-30.1642">fsim/tables/ps_idle_ms/h5/w1/v2</property>
      <property value="-30.683">fsim/tables/ps_idle_ms/h5/w1/v3</property>
      <property value="-32.666">fsim/tables/ps_idle_ms/h5/w1/v4</property>
      <property value="-61.5918">fsim/tables/ps_idle_ms/h5/w1/v5</property>
      <property value="-77.8246">fsim/tables/ps_idle_ms/h5/w1/v6</property>
      <property value="-91.9363">fsim/tables/ps_idle_ms/h5/w1/v7</property>
      <property value="-107.849">fsim/tables/ps_idle_ms/h5/w1/v8</property>
      <property value="-125.62">fsim/tables/ps_idle_ms/h5/w1/v9</property>
      <property value="-35.2298">fsim/tables/ps_idle_ms/h5/w2/v0</property>
      <property value="-33.2985">fsim/tables/ps_idle_ms/h5/w2/v1</property>
      <property value="-130.954">fsim/tables/ps_idle_ms/h5/w2/v10</property>
      <property value="-149.403">fsim/tables/ps_idle_ms/h5/w2/v11</property>
      <property value="-167.281">fsim/tables/ps_idle_ms/h5/w2/v12</property>
      <property value="-187.078">fsim/tables/ps_idle_ms/h5/w2/v13</property>
      <property value="-209.391">fsim/tables/ps_idle_ms/h5/w2/v14</property>
      <property value="-233.618">fsim/tables/ps_idle_ms/h5/w2/v15</property>
      <property value="-32.5834">fsim/tables/ps_idle_ms/h5/w2/v2</property>
      <property value="-32.5118">fsim/tables/ps_idle_ms/h5/w2/v3</property>
      <property value="-34.4794">fsim/tables/ps_idle_ms/h5/w2/v4</property>
      <property value="-62.5696">fsim/tables/ps_idle_ms/h5/w2/v5</property>
      <property value="-73.8052">fsim/tables/ps_idle_ms/h5/w2/v6</property>
      <property value="-85.4139">fsim/tables/ps_idle_ms/h5/w2/v7</property>
      <property value="-98.7479">fsim/tables/ps_idle_ms/h5/w2/v8</property>
      <property value="-113.965">fsim/tables/ps_idle_ms/h5/w2/v9</property>
      <property value="-34.603">fsim/tables/ps_idle_ms/h6/w0/v0</property>
      <property value="-32.6696">fsim/tables/ps_idle_ms/h6/w0/v1</property>
      <property value="-134.058">fsim/tables/ps_idle_ms/h6/w0/v10</property>
      <property value="-153.083">fsim/tables/ps_idle_ms/h6/w0/v11</property>
      <property value="-171.666">fsim/tables/ps_idle_ms/h6/w0/v12</property>
      <property value="-192.641">fsim/tables/ps_idle_ms/h6/w0/v13</property>
      <property value="-215.981">fsim/tables/ps_idle_ms/h6/w0/v14</property>
      <property value="-241.316">fsim/tables/ps_idle_ms/h6/w0/v15</property>
      <property value="-32.0544">fsim/tables/ps_idle_ms/h6/w0/v2</property>
      <property value="-32.132">fsim/tables/ps_idle_ms/h6/w0/v3</property>
      <property value="-34.0513">fsim/tables/ps_idle_ms/h6/w0/v4</property>
      <property value="-63.1568">fsim/tables/ps_idle_ms/h6/w0/v5</property>
      <property value="-74.7036">fsim/tables/ps_idle_ms/h6/w0/v6</property>
      <property value="-86.7268">fsim/tables/ps_idle_ms/h6/w0/v7</property>
      <property value="-100.727">fsim/tables/ps_idle_ms/h6/w0/v8</property>
      <property value="-116.458">fsim/tables/ps_idle_ms/h6/w0/v9</property>
      <property value="-38.4919">fsim/tables/ps_idle_ms/h6/w1/v0</property>
      <property value="-36.4637">fsim/tables/ps_idle_ms/h6/w1/v1</property>
      <property value="-119.275">fsim/tables/ps_idle_ms/h6/w1/v10</property>
      <property value="-134.842">fsim/tables/ps_idle_ms/h6/w1/v11</property>
      <property value="-149.526">fsim/tables/ps_idle_ms/h6/w1/v12</property>
      <property value="-165.079">fsim/tables/ps_idle_ms/h6/w1/v13</property>
      <property value="-182.623">fsim/tables/ps_idle_ms/h6/w1/v14</property>
      <property value="-202.273">fsim/tables/ps_idle_ms/h6/w1/v15</property>
      <property value="-35.2422">fsim/tables/ps_idle_ms/h6/w1/v2</property>
      <property value="-34.988">fsim/tables/ps_idle_ms/h6/w1/v3</property>
      <property value="-37.2418">fsim/tables/ps_idle_ms/h6/w1/v4</property>
      <property value="-62.195">fsim/tables/ps_idle_ms/h6/w1/v5</property>
      <property value="-71.0388">fsim/tables/ps_idle_ms/h6/w1/v6</property>
      <property value="-81.1404">fsim/tables/ps_idle_ms/h6/w1/v7</property>
      <property value="-92.6011">fsim/tables/ps_idle_ms/h6/w1/v8</property>
      <property value="-105.236">fsim/tables/ps_idle_ms/h6/w1/v9</property>
      <property value="-42.3756">fsim/tables/ps_idle_ms/h6/w2/v0</property>
      <property value="-40.0649">fsim/tables/ps_idle_ms/h6/w2/v1</property>
      <property value="-110.235">fsim/tables/ps_idle_ms/h6/w2/v10</property>
      <property value="-123.163">fsim/tables/ps_idle_ms/h6/w2/v11</property>
      <property value="-134.34">fsim/tables/ps_idle_ms/h6/w2/v12</property>
      <property value="-145.978">fsim/tables/ps_idle_ms/h6/w2/v13</property>
      <property value="-160.002">fsim/tables/ps_idle_ms/h6/w2/v14</property>
      <property value="-176.144">fsim/tables/ps_idle_ms/h6/w2/v15</property>
      <property value="-38.5137">fsim/tables/ps_idle_ms/h6/w2/v2</property>
      <property value="-37.9552">fsim/tables/ps_idle_ms/h6/w2/v3</property>
      <property value="-46.7641">fsim/tables/ps_idle_ms/h6/w2/v4</property>
      <property value="-62.2726">fsim/tables/ps_idle_ms/h6/w2/v5</property>
      <property value="-69.698">fsim/tables/ps_idle_ms/h6/w2/v6</property>
      <property value="-78.321">fsim/tables/ps_idle_ms/h6/w2/v7</property>
      <property value="-87.741">fsim/tables/ps_idle_ms/h6/w2/v8</property>
      <property value="-98.2399">fsim/tables/ps_idle_ms/h6/w2/v9</property>
      <property value="-41.6144">fsim/tables/ps_idle_ms/h7/w0/v0</property>
      <property value="-39.2406">fsim/tables/ps_idle_ms/h7/w0/v1</property>
      <property value="-111.019">fsim/tables/ps_idle_ms/h7/w0/v10</property>
      <property value="-124.164">fsim/tables/ps_idle_ms/h7/w0/v11</property>
      <property value="-135.677">fsim/tables/ps_idle_ms/h7/w0/v12</property>
      <property value="-147.979">fsim/tables/ps_idle_ms/h7/w0/v13</property>
      <property value="-162.427">fsim/tables/ps_idle_ms/h7/w0/v14</property>
      <property value="-179.18">fsim/tables/ps_idle_ms/h7/w0/v15</property>
      <property value="-37.875">fsim/tables/ps_idle_ms/h7/w0/v2</property>
      <property value="-37.2163">fsim/tables/ps_idle_ms/h7/w0/v3</property>
      <property value="-44.4643">fsim/tables/ps_idle_ms/h7/w0/v4</property>
      <property value="-61.9995">fsim/tables/ps_idle_ms/h7/w0/v5</property>
      <property value="-69.6546">fsim/tables/ps_idle_ms/h7/w0/v6</property>
      <property value="-78.3639">fsim/tables/ps_idle_ms/h7/w0/v7</property>
      <property value="-87.8875">fsim/tables/ps_idle_ms/h7/w0/v8</property>
      <property value="-98.8226">fsim/tables/ps_idle_ms/h7/w0/v9</property>
      <property value="-46.205">fsim/tables/ps_idle_ms/h7/w1/v0</property>
      <property value="-43.6467">fsim/tables/ps_idle_ms/h7/w1/v1</property>
      <property value="-102.835">fsim/tables/ps_idle_ms/h7/w1/v10</property>
      <property value="-112.907">fsim/tables/ps_idle_ms/h7/w1/v11</property>
      <property value="-121.685">fsim/tables/ps_idle_ms/h7/w1/v12</property>
      <property value="-130.334">fsim/tables/ps_idle_ms/h7/w1/v13</property>
      <property value="-140.661">fsim/tables/ps_idle_ms/h7/w1/v14</property>
      <property value="-153.124">fsim/tables/ps_idle_ms/h7/w1/v15</property>
      <property value="-42.2607">fsim/tables/ps_idle_ms/h7/w1/v2</property>
      <property value="-42.0088">fsim/tables/ps_idle_ms/h7/w1/v3</property>
      <property value="-57.1785">fsim/tables/ps_idle_ms/h7/w1/v4</property>
      <property value="-63.6322">fsim/tables/ps_idle_ms/h7/w1/v5</property>
      <property value="-69.8129">fsim/tables/ps_idle_ms/h7/w1/v6</property>
      <property value="-76.7462">fsim/tables/ps_idle_ms/h7/w1/v7</property>
      <property value="-84.394">fsim/tables/ps_idle_ms/h7/w1/v8</property>
      <property value="-93.2515">fsim/tables/ps_idle_ms/h7/w1/v9</property>
      <property value="-50.977">fsim/tables/ps_idle_ms/h7/w2/v0</property>
      <property value="-48.6599">fsim/tables/ps_idle_ms/h7/w2/v1</property>
      <property value="-96.534">fsim/tables/ps_idle_ms/h7/w2/v10</property>
      <property value="-103.85">fsim/tables/ps_idle_ms/h7/w2/v11</property>
      <property value="-111.461">fsim/tables/ps_idle_ms/h7/w2/v12</property>
      <property value="-117.861">fsim/tables/ps_idle_ms/h7/w2/v13</property>
      <property value="-125.475">fsim/tables/ps_idle_ms/h7/w2/v14</property>
      <property value="-134.645">fsim/tables/ps_idle_ms/h7/w2/v15</property>
      <property value="-47.115">fsim/tables/ps_idle_ms/h7/w2/v2</property>
      <property value="-47.5964">fsim/tables/ps_idle_ms/h7/w2/v3</property>
      <property value="-61.6296">fsim/tables/ps_idle_ms/h7/w2/v4</property>
      <property value="-65.5631">fsim/tables/ps_idle_ms/h7/w2/v5</property>
      <property value="-70.3093">fsim/tables/ps_idle_ms/h7/w2/v6</property>
      <property value="-75.8513">fsim/tables/ps_idle_ms/h7/w2/v7</property>
      <property value="-82.0417">fsim/tables/ps_idle_ms/h7/w2/v8</property>
      <property value="-89.2323">fsim/tables/ps_idle_ms/h7/w2/v9</property>
      <property value="435.393">fsim/tables/reach_tas_ms/h0/w0</property>
      <property value="435.106">fsim/tables/reach_tas_ms/h0/w1</property>
      <property value="434.658">fsim/tables/reach_tas_ms/h0/w2</property>
      <property value="485.168">fsim/tables/reach_tas_ms/h1/w0</property>
      <property value="484.775">fsim/tables/reach_tas_ms/h1/w1</property>
      <property value="484.331">fsim/tables/reach_tas_ms/h1/w2</property>
      <property value="541.665">fsim/tables/reach_tas_ms/h2/w0</property>
      <property value="541.196">fsim/tables/reach_tas_ms/h2/w1</property>
      <property value="539.682">fsim/tables/reach_tas_ms/h2/w2</property>
      <property value="598.313">fsim/tables/reach_tas_ms/h3/w0</property>
      <property value="596.653">fsim/tables/reach_tas_ms/h3/w1</property>
      <property value="594.993">fsim/tables/reach_tas_ms/h3/w2</property>
      <property value="598.686">fsim/tables/reach_tas_ms/h4/w0</property>
      <property value="596.923">fsim/tables/reach_tas_ms/h4/w1</property>
      <property value="595.148">fsim/tables/reach_tas_ms/h4/w2</property>
      <property value="597.073">fsim/tables/reach_tas_ms/h5/w0</property>
      <property value="593.198">fsim/tables/reach_tas_ms/h5/w1</property>
      <property value="586.227">fsim/tables/reach_tas_ms/h5/w2</property>
      <property value="588.222">fsim/tables/reach_tas_ms/h6/w0</property>
      <property value="579.151">fsim/tables/reach_tas_ms/h6/w1</property>
      <property value="569.731">fsim/tables/reach_tas_ms/h6/w2</property>
      <property value="569.261">fsim/tables/reach_tas_ms/h7/w0</property>
      <property value="555.814">fsim/tables/reach_tas_ms/h7/w1</property>
      <property value="537.342">fsim/tables/reach_tas_ms/h7/w2</property>
      <property value="0.0">fsim/tables/speed_fraction/v0</property>
      <property value="0.0666667">fsim/tables/speed_fraction/v1</property>
      <property value="0.666667">fsim/tables/speed_fraction/v10</property>
      <property value="0.733333">fsim/tables/speed_fraction/v11</property>
      <property value="0.8">fsim/tables/speed_fraction/v12</property>
      <property value="0.866667">fsim/tables/speed_fraction/v13</property>
      <property value="0.933333">fsim/tables/speed_fraction/v14</property>
      <property value="1">fsim/tables/speed_fraction/v15</property>
      <property value="0.133333">fsim/tables/speed_fraction/v2</property>
      <property value="0.2">fsim/tables/speed_fraction/v3</property>
      <property value="0.266667">fsim/tables/speed_fraction/v4</property>
      <property value="0.333333">fsim/tables/speed_fraction/v5</property>
      <property value="0.4">fsim/tables/speed_fraction/v6</property>
      <property value="0.466667">fsim/tables/speed_fraction/v7</property>
      <property value="0.533333">fsim/tables/speed_fraction/v8</property>
      <property value="0.6">fsim/tables/speed_fraction/v9</property>
      <property value="51.122">fsim/tables/stall_cas_ms/h0/w0</property>
      <property value="55.8259">fsim/tables/stall_cas_ms/h0/w1</property>
      <property value="60.163">fsim/tables/stall_cas_ms/h0/w2</property>
      <property value="51.6869">fsim/tables/stall_cas_ms/h1/w0</property>
      <property value="56.4427">fsim/tables/stall_cas_ms/h1/w1</property>
      <property value="60.8278">fsim/tables/stall_cas_ms/h1/w2</property>
      <property value="52.0303">fsim/tables/stall_cas_ms/h2/w0</property>
      <property value="56.8177">fsim/tables/stall_cas_ms/h2/w1</property>
      <property value="61.2319">fsim/tables/stall_cas_ms/h2/w2</property>
      <property value="52.5932">fsim/tables/stall_cas_ms/h3/w0</property>
      <property value="57.4324">fsim/tables/stall_cas_ms/h3/w1</property>
      <property value="61.8944">fsim/tables/stall_cas_ms/h3/w2</property>
      <property value="52.8526">fsim/tables/stall_cas_ms/h4/w0</property>
      <property value="57.7157">fsim/tables/stall_cas_ms/h4/w1</property>
      <property value="62.1997">fsim/tables/stall_cas_ms/h4/w2</property>
      <property value="53.5177">fsim/tables/stall_cas_ms/h5/w0</property>
      <property value="58.4419">fsim/tables/stall_cas_ms/h5/w1</property>
      <property value="62.9823">fsim/tables/stall_cas_ms/h5/w2</property>
      <property value="54.2176">fsim/tables/stall_cas_ms/h6/w0</property>
      <property value="59.2063">fsim/tables/stall_cas_ms/h6/w1</property>
      <property value="63.8061">fsim/tables/stall_cas_ms/h6/w2</property>
      <property value="54.7997">fsim/tables/stall_cas_ms/h7/w0</property>
      <property value="59.8419">fsim/tables/stall_cas_ms/h7/w1</property>
      <property value="64.4911">fsim/tables/stall_cas_ms/h7/w2</property>
      <property value="11679.6">fsim/tables/weight_kg/w0</property>
      <property value="13927.8">fsim/tables/weight_kg/w1</property>
      <property value="16176">fsim/tables/weight_kg/w2</property>
      <channel name="Pitch (fly-by-wire)">
        <!-- hangar: load factor command, alpha and pitch-rate inner loop (hangar/fcs.py) -->
        <summer name="fcs/pitch-trim-sum">
          <input>fcs/elevator-cmd-norm</input>
          <input>fcs/pitch-trim-cmd-norm</input>
          <clipto> <min>-1</min> <max>1</max> </clipto>
        </summer>
        <!-- the integrators are reset below 60 kt and while a wheel carries weight
             (on the ground, taking off and landing) -->
        <switch name="fcs/fbw/reset">
          <default value="0"/>
          <test logic="OR" value="-1">
            velocities/vc-kts lt 60
            gear/wow gt 0
          </test>
        </switch>
        <fcs_function name="fcs/fbw/k-alpha">
          <function>
            <table>
              <independentVar lookup="row">aero/qbar-psf</independentVar>
              <independentVar lookup="column">velocities/mach</independentVar>
              <tableData>
                       0.150     0.400     0.700     0.900     1.100     1.400     2.000
              10.0  -4.22864  -4.29954  -4.15841  -3.84721  -6.00000  -6.00000  -6.00000
              20.0  -2.28264  -2.37261  -2.30422  -2.12842  -3.90229  -6.00000  -6.00000
              40.0  -1.31592  -1.41002  -1.37741  -1.26920  -2.27142  -3.86872  -4.81374
              80.0  -0.75122  -0.91375  -0.93487  -0.85942  -0.90368  -0.99906  -0.93162
             150.0  -0.69204  -0.85657  -0.88675  -0.81543  -0.85277  -0.92556  -0.54966
             300.0  -0.67875  -0.78825  -0.83432  -0.77277  -0.80626  -0.89207  -0.55614
             600.0  -0.82294  -0.72331  -0.77875  -0.72456  -0.74340  -0.83438  -0.54204
            1200.0  -1.59365  -0.58711  -0.57056  -0.48032  -0.28064  -0.31096  -0.36546
            2400.0  -6.00000  -0.63645  -0.45006  -0.34266   0.02763   0.26708   0.38152
              </tableData>
            </table>
          </function>
        </fcs_function>
        <fcs_function name="fcs/fbw/k-q">
          <function>
            <table>
              <independentVar lookup="row">aero/qbar-psf</independentVar>
              <independentVar lookup="column">velocities/mach</independentVar>
              <tableData>
                       0.150     0.400     0.700     0.900     1.100     1.400     2.000
              10.0  -3.00000  -3.00000  -3.00000  -3.00000  -3.00000  -3.00000  -3.00000
              20.0  -1.82823  -1.95985  -1.92338  -1.79239  -3.00000  -3.00000  -3.00000
              40.0  -0.82937  -0.94724  -0.94285  -0.88175  -1.68660  -2.93180  -3.00000
              80.0  -0.28070  -0.44449  -0.48499  -0.48184  -0.93144  -1.50472  -1.59534
             150.0  -0.14195  -0.29594  -0.33300  -0.33314  -0.64963  -1.06797  -1.22018
             300.0  -0.03295  -0.18168  -0.21818  -0.22211  -0.43911  -0.72693  -0.83270
             600.0   0.05262  -0.10292  -0.13896  -0.14499  -0.29300  -0.49391  -0.57460
            1200.0   0.16929  -0.02688  -0.05958  -0.06324  -0.13858  -0.27104  -0.37379
            2400.0   0.46727   0.03119  -0.00583  -0.01331  -0.04372  -0.10714  -0.16845
              </tableData>
            </table>
          </function>
        </fcs_function>
        <fcs_function name="fcs/fbw/k-ff">
          <function>
            <table>
              <independentVar lookup="row">aero/qbar-psf</independentVar>
              <independentVar lookup="column">velocities/mach</independentVar>
              <tableData>
                       0.150     0.400     0.700     0.900     1.100     1.400     2.000
              10.0  -0.30000  -0.30000  -0.30000  -0.30000  -0.30000  -0.30000  -0.30000
              20.0  -0.30000  -0.30000  -0.30000  -0.30000  -0.30000  -0.30000  -0.30000
              40.0  -0.30000  -0.30000  -0.30000  -0.30000  -0.30000  -0.30000  -0.30000
              80.0  -0.15027  -0.14993  -0.14811  -0.14251  -0.30000  -0.30000  -0.30000
             150.0  -0.08112  -0.08071  -0.07930  -0.07612  -0.16522  -0.29800  -0.30000
             300.0  -0.04065  -0.04046  -0.03982  -0.03830  -0.08366  -0.15159  -0.19887
             600.0  -0.02040  -0.02031  -0.01999  -0.01923  -0.04210  -0.07649  -0.10092
            1200.0  -0.00734  -0.00716  -0.00664  -0.00585  -0.01293  -0.02753  -0.04638
            2400.0  -0.00185  -0.00181  -0.00167  -0.00147  -0.00326  -0.00695  -0.01173
              </tableData>
            </table>
          </function>
        </fcs_function>
        <fcs_function name="fcs/fbw/k-i">
          <function>
            <table>
              <independentVar lookup="row">aero/qbar-psf</independentVar>
              <independentVar lookup="column">velocities/mach</independentVar>
              <tableData>
                       0.150     0.400     0.700     0.900     1.100     1.400     2.000
              10.0  -0.60000  -0.60000  -0.60000  -0.60000  -0.60000  -0.60000  -0.60000
              20.0  -0.60000  -0.60000  -0.60000  -0.60000  -0.60000  -0.60000  -0.60000
              40.0  -0.60000  -0.60000  -0.60000  -0.60000  -0.60000  -0.60000  -0.60000
              80.0  -0.15027  -0.14993  -0.14811  -0.14251  -0.30601  -0.53973  -0.60000
             150.0  -0.08112  -0.08071  -0.07930  -0.07612  -0.16522  -0.29800  -0.38629
             300.0  -0.04065  -0.04046  -0.03982  -0.03830  -0.08366  -0.15159  -0.19887
             600.0  -0.02040  -0.02031  -0.01999  -0.01923  -0.04210  -0.07649  -0.10092
            1200.0  -0.00734  -0.00716  -0.00664  -0.00585  -0.01293  -0.02753  -0.04638
            2400.0  -0.00185  -0.00181  -0.00167  -0.00147  -0.00326  -0.00695  -0.01173
              </tableData>
            </table>
          </function>
        </fcs_function>
        <fcs_function name="fcs/fbw/n-alpha">
          <function>
            <table>
              <independentVar lookup="row">aero/qbar-psf</independentVar>
              <independentVar lookup="column">velocities/mach</independentVar>
              <tableData>
                       0.150     0.400     0.700     0.900     1.100     1.400     2.000
              10.0   1.00000   1.00000   1.00000   1.00000   1.00000   1.00000   1.00000
              20.0   1.00000   1.00000   1.00000   1.00000   1.00000   1.00000   1.00000
              40.0   1.00000   1.00000   1.00000   1.00000   1.00000   1.00000   1.00000
              80.0   3.45188   3.54865   3.82861   4.24229   4.20228   3.46887   2.14655
             150.0   6.71078   6.84134   7.24573   7.87809   7.81521   6.73344   5.30890
             300.0  12.92608  13.18613  13.99160  15.26050  15.13404  12.97123  10.23517
             600.0  25.35449  25.87079  27.46992  29.98426  29.73410  25.44413  20.00065
            1200.0  50.03015  51.05809  54.24195  59.25348  58.75457  50.20862  39.37067
            2400.0  99.23220 101.28228 107.63206 117.64036 116.64253  99.58813  77.97336
              </tableData>
            </table>
          </function>
        </fcs_function>
        <!-- the pitching moment's departures from a straight line through the
             angle-of-attack envelope (+0.258 per rad about the CG), cancelled by the
             elevator: the gains are designed on the line -->
        <fcs_function name="fcs/fbw/moment-comp">
          <function>
            <table>
              <independentVar lookup="row">aero/alpha-rad</independentVar>
              <independentVar lookup="column">velocities/mach</independentVar>
              <tableData>
                       0.150     0.400     0.700     0.900     1.100     1.400     2.000
          -0.17453   0.00640   0.00632   0.00608   0.00564   0.01070   0.01844   0.02300
          -0.15708   0.00636   0.00628   0.00605   0.00560   0.01063   0.01832   0.02286
          -0.13963   0.00612   0.00605   0.00582   0.00539   0.01023   0.01763   0.02199
          -0.12217   0.00619   0.00611   0.00588   0.00545   0.01035   0.01783   0.02224
          -0.10472   0.00590   0.00583   0.00561   0.00520   0.00987   0.01700   0.02121
          -0.08727   0.00178   0.00176   0.00169   0.00157   0.00298   0.00513   0.00640
          -0.06981  -0.00102  -0.00100  -0.00097  -0.00090  -0.00170  -0.00293  -0.00365
          -0.05236  -0.00193  -0.00191  -0.00184  -0.00171  -0.00324  -0.00558  -0.00696
          -0.03491  -0.00289  -0.00286  -0.00275  -0.00255  -0.00483  -0.00833  -0.01039
          -0.01745  -0.00397  -0.00392  -0.00377  -0.00350  -0.00663  -0.01143  -0.01426
           0.00000  -0.00455  -0.00450  -0.00433  -0.00401  -0.00762  -0.01312  -0.01637
           0.01745  -0.00482  -0.00476  -0.00458  -0.00425  -0.00806  -0.01388  -0.01732
           0.03491  -0.00482  -0.00477  -0.00459  -0.00425  -0.00807  -0.01390  -0.01734
           0.05236  -0.00459  -0.00454  -0.00436  -0.00404  -0.00768  -0.01322  -0.01650
           0.06981  -0.00413  -0.00409  -0.00393  -0.00364  -0.00691  -0.01191  -0.01486
           0.08727  -0.00355  -0.00351  -0.00338  -0.00313  -0.00594  -0.01024  -0.01277
           0.10472  -0.00286  -0.00283  -0.00272  -0.00252  -0.00478  -0.00824  -0.01028
           0.12217  -0.00217  -0.00215  -0.00207  -0.00192  -0.00364  -0.00627  -0.00782
           0.13963  -0.00147  -0.00146  -0.00140  -0.00130  -0.00247  -0.00425  -0.00530
           0.15708  -0.00085  -0.00084  -0.00081  -0.00075  -0.00143  -0.00246  -0.00306
           0.17453  -0.00028  -0.00027  -0.00026  -0.00024  -0.00046  -0.00080  -0.00100
           0.19199   0.00011   0.00011   0.00010   0.00010   0.00018   0.00031   0.00039
           0.20944   0.00034   0.00033   0.00032   0.00030   0.00056   0.00097   0.00121
           0.22689   0.00030   0.00030   0.00029   0.00027   0.00051   0.00087   0.00109
           0.24435   0.00016   0.00016   0.00015   0.00014   0.00026   0.00046   0.00057
           0.26180  -0.00019  -0.00018  -0.00018  -0.00016  -0.00031  -0.00053  -0.00067
           0.27925  -0.00062  -0.00061  -0.00059  -0.00054  -0.00103  -0.00178  -0.00222
           0.29671  -0.00119  -0.00118  -0.00113  -0.00105  -0.00199  -0.00343  -0.00428
           0.31416  -0.00175  -0.00173  -0.00166  -0.00154  -0.00292  -0.00503  -0.00628
           0.33161  -0.00223  -0.00221  -0.00212  -0.00197  -0.00373  -0.00643  -0.00802
           0.34907  -0.00213  -0.00210  -0.00202  -0.00188  -0.00356  -0.00613  -0.00765
           0.36652  -0.00144  -0.00143  -0.00137  -0.00127  -0.00241  -0.00416  -0.00519
           0.38397  -0.00037  -0.00037  -0.00036  -0.00033  -0.00063  -0.00108  -0.00135
           0.40143   0.00083   0.00082   0.00079   0.00074   0.00140   0.00240   0.00300
           0.41888   0.00200   0.00197   0.00190   0.00176   0.00334   0.00575   0.00718
           0.43633   0.00273   0.00270   0.00260   0.00241   0.00457   0.00787   0.00982
           0.45379   0.00319   0.00315   0.00303   0.00281   0.00533   0.00918   0.01146
           0.47124   0.00341   0.00337   0.00324   0.00300   0.00570   0.00982   0.01225
           0.48869   0.00352   0.00348   0.00335   0.00310   0.00589   0.01014   0.01265
           0.50615   0.00338   0.00334   0.00321   0.00298   0.00565   0.00973   0.01214
           0.52360   0.00316   0.00313   0.00301   0.00279   0.00529   0.00912   0.01137
              </tableData>
            </table>
          </function>
        </fcs_function>
        <!-- the gravity reference: the load factor that holds the flight path -->
        <fcs_function name="fcs/fbw/g-ref">
          <function>
            <product>
              <cos><property>attitude/theta-rad</property></cos>
              <cos><property>attitude/phi-rad</property></cos>
            </product>
          </function>
        </fcs_function>
        <!-- stick to load factor beyond the gravity reference, aft (negative) to n_max,
             no more than the lift at the angle-of-attack limits gives - beyond the
             gravity reference of the moment, so that full aft stick still reaches
             the limit in a steep climb or inverted - through a 0.2 s prefilter and
             a 12 g/s onset limit (a full pull at once pitches an agile airframe
             faster than its nose-down control can stop at the angle-of-attack
             limit) -->
        <fcs_function name="fcs/fbw/dn-stick">
          <function>
            <max>
              <min>
                <table>
                  <independentVar lookup="row">fcs/pitch-trim-sum</independentVar>
                  <tableData>
                    -1.0  8.000
                     0.0  0.0
                     1.0  -4.000
                  </tableData>
                </table>
                <difference><product><property>fcs/fbw/n-alpha</property><value>0.52360</value></product><property>fcs/fbw/g-ref</property></difference>
              </min>
              <difference><product><property>fcs/fbw/n-alpha</property><value>-0.17453</value></product><property>fcs/fbw/g-ref</property></difference>
            </max>
          </function>
        </fcs_function>
        <lag_filter name="fcs/fbw/dn-lag">
          <input>fcs/fbw/dn-stick</input>
          <c1>5.0</c1>
        </lag_filter>
        <actuator name="fcs/fbw/dn-cmd">
          <input>fcs/fbw/dn-lag</input>
          <rate_limit>12.0</rate_limit>
        </actuator>
        <!-- the response the command should produce (the short period's rise): the
             integrator trims away what differs from it, not the rise itself -->
        <lag_filter name="fcs/fbw/dn-model">
          <input>fcs/fbw/dn-cmd</input>
          <c1>2.5</c1>
        </lag_filter>
        <fcs_function name="fcs/fbw/dn">
          <function>
            <difference><property>accelerations/Nz</property><property>fcs/fbw/g-ref</property></difference>
          </function>
        </fcs_function>
        <!-- the angle of attack with its rise over the next 0.35 s counted as spent
             (the rise, not the pitch rate: in a steady pull the nose turns with the
             flight path and the angle of attack holds), and the load factor the
             angle of attack left to each limit gives -->
        <fcs_function name="fcs/fbw/alpha-ahead">
          <function>
            <sum>
              <property>aero/alpha-rad</property>
              <product><value>0.35</value><property>aero/alphadot-rad_sec</property></product>
            </sum>
          </function>
        </fcs_function>
        <fcs_function name="fcs/fbw/dn-room-up">
          <function>
            <product><property>fcs/fbw/n-alpha</property>
              <difference><value>0.52360</value><property>fcs/fbw/alpha-ahead</property></difference></product>
          </function>
        </fcs_function>
        <fcs_function name="fcs/fbw/dn-room-down">
          <function>
            <product><property>fcs/fbw/n-alpha</property>
              <difference><value>-0.17453</value><property>fcs/fbw/alpha-ahead</property></difference></product>
          </function>
        </fcs_function>
        <!-- the command limited to the load factor the aircraft pulls now plus what
             the angle of attack left gives: at a limit the feedforward asks for the
             load factor the airframe gives there, whatever elevator holds it - a
             steady pull on a stable airframe, a push on an unstable one (a
             feedforward faded out past the limit instead took about 10 deg of
             elevator per deg of alpha, on one side of it only: the actuator's rate
             limit could not follow, and the MiG-29A cycled between 24 and 29 deg) -->
        <fcs_function name="fcs/fbw/dn-limited">
          <function>
            <max>
              <min>
                <property>fcs/fbw/dn-cmd</property>
                <sum><property>fcs/fbw/dn</property><property>fcs/fbw/dn-room-up</property></sum>
              </min>
              <sum><property>fcs/fbw/dn</property><property>fcs/fbw/dn-room-down</property></sum>
            </max>
          </function>
        </fcs_function>
        <!-- the integrator's error: the load factor's departure from the model
             response, and at a limit the angle of attack left, counted five times -
             it trims what the airframe needs there beyond the linear design (vortex
             lift, the tail's power at high alpha) in a fraction of a second, not
             over the pull -->
        <fcs_function name="fcs/fbw/pitch-error">
          <function>
            <max>
              <min>
                <difference><property>fcs/fbw/dn-model</property><property>fcs/fbw/dn</property></difference>
                <product><value>5.0</value><property>fcs/fbw/dn-room-up</property></product>
              </min>
              <product><value>5.0</value><property>fcs/fbw/dn-room-down</property></product>
            </max>
          </function>
        </fcs_function>
        <fcs_function name="fcs/fbw/pitch-error-rate">
          <function><product><property>fcs/fbw/k-i</property><property>fcs/fbw/pitch-error</property></product></function>
        </fcs_function>
        <!-- the integrator: reset below 60 kt and on the wheels, held while the
             elevator is at a stop it would push further into (anti-windup) -->
        <switch name="fcs/fbw/pitch-hold">
          <default value="0"/>
          <test logic="OR" value="-1">
            velocities/vc-kts lt 60
            gear/wow gt 0
          </test>
          <test logic="AND" value="1">
            fcs/fbw/elevator-raw gt 0.87266
            fcs/fbw/pitch-error-rate gt 0
          </test>
          <test logic="AND" value="1">
            fcs/fbw/elevator-raw lt -0.43633
            fcs/fbw/pitch-error-rate lt 0
          </test>
        </switch>
        <integrator name="fcs/fbw/pitch-integral">
          <input>fcs/fbw/pitch-error-rate</input>
          <c1>1.0</c1>
          <trigger>fcs/fbw/pitch-hold</trigger>
          <clipto> <min>-0.5</min> <max>0.5</max> </clipto>
        </integrator>
        <!-- past an angle-of-attack limit (the next 0.35 s counted) a push back
             in proportion, all the travel 4 deg beyond: an unstable airframe
             pitching up fast needs it at once, not when an integrator winds -->
        <fcs_function name="fcs/fbw/alpha-push">
          <function>
            <difference>
              <product><value>12.50000</value>
                <max><value>0</value><difference><property>fcs/fbw/alpha-ahead</property><value>0.52360</value></difference></max></product>
              <product><value>6.25000</value>
                <max><value>0</value><difference><value>-0.17453</value><property>fcs/fbw/alpha-ahead</property></difference></max></product>
            </difference>
          </function>
        </fcs_function>
        <lag_filter name="fcs/fbw/ground">
          <input>gear/wow</input>
          <c1>2.0</c1>
        </lag_filter>
        <fcs_function name="fcs/fbw/ground-direct">
          <function>
            <product>
              <property>fcs/fbw/ground</property>
              <table>
                <independentVar lookup="row">fcs/pitch-trim-sum</independentVar>
                <tableData>
                  -1.0  -0.43633
                   0.0  0.0
                   1.0  0.87266
                </tableData>
              </table>
            </product>
          </function>
        </fcs_function>
        <!-- the elevator: the push, the moment compensation, angle-of-attack and
             pitch-rate feedback, the feedforward of the limited command, the
             integrator, the ground mode's direct stick -->
        <fcs_function name="fcs/fbw/elevator-raw">
          <function>
            <sum>
              <property>fcs/fbw/alpha-push</property>
              <property>fcs/fbw/moment-comp</property>
              <product><value>-1</value><property>fcs/fbw/k-alpha</property><property>aero/alpha-rad</property></product>
              <product><value>-1</value><property>fcs/fbw/k-q</property><property>velocities/q-rad_sec</property></product>
              <product><property>fcs/fbw/k-ff</property><property>fcs/fbw/dn-limited</property></product>
              <property>fcs/fbw/pitch-integral</property>
              <property>fcs/fbw/ground-direct</property>
            </sum>
          </function>
        </fcs_function>
        <pure_gain name="fcs/fbw/elevator">
          <input>fcs/fbw/elevator-raw</input>
          <gain>1.0</gain>
          <clipto> <min>-0.43633</min> <max>0.87266</max> </clipto>
        </pure_gain>
        <!-- full travel in 0.83 s: 60 deg/s for a +-25 deg tail, faster for a
             canard's longer throw -->
        <actuator name="fcs/elevator-actuator">
          <input>fcs/fbw/elevator</input>
          <lag>40</lag>
          <rate_limit>1.577</rate_limit>
          <output>fcs/elevator-pos-rad</output>
        </actuator>
      </channel>
      <channel name="Roll (fly-by-wire)">
        <!-- hangar: roll-rate command about the flight path, limited to what the rudder can
             coordinate; bank hold at neutral stick -->
        <summer name="fcs/roll-trim-sum">
          <input>fcs/aileron-cmd-norm</input>
          <input>fcs/roll-trim-cmd-norm</input>
          <clipto> <min>-1</min> <max>1</max> </clipto>
        </summer>
        <fcs_function name="fcs/fbw/k-roll">
          <function>
            <table>
              <independentVar lookup="row">aero/qbar-psf</independentVar>
              <independentVar lookup="column">velocities/mach</independentVar>
              <tableData>
                       0.150     0.400     0.700     0.900     1.100     1.400     2.000
              10.0   1.50000   1.50000   1.50000   1.50000   1.50000   1.50000   1.50000
              20.0   1.50000   1.50000   1.50000   1.50000   1.50000   1.50000   1.50000
              40.0   0.97216   0.99973   0.92701   0.79699   1.50000   1.50000   1.50000
              80.0   0.20193   0.31872   0.31786   0.27649   0.52978   0.95769   1.27183
             150.0   0.05038   0.14232   0.15095   0.13350   0.25835   0.47056   0.62030
             300.0   0.00000   0.05087   0.06354   0.05784   0.11530   0.21713   0.28998
             600.0   0.00000   0.00274   0.01902   0.01957   0.04336   0.09184   0.13346
            1200.0   0.00000   0.00000   0.00000   0.00048   0.00749   0.02931   0.05528
            2400.0   0.00000   0.00000   0.00000   0.00000   0.00000   0.00000   0.01635
              </tableData>
            </table>
          </function>
        </fcs_function>
        <fcs_function name="fcs/fbw/k-roll-ff">
          <function>
            <table>
              <independentVar lookup="row">aero/qbar-psf</independentVar>
              <independentVar lookup="column">velocities/mach</independentVar>
              <tableData>
                       0.150     0.400     0.700     0.900     1.100     1.400     2.000
              10.0   0.09083   0.03381   0.01880   0.01371   0.02088   0.02435   0.01661
              20.0   0.09083   0.03381   0.01880   0.01371   0.02088   0.02435   0.01661
              40.0   0.09083   0.03381   0.01880   0.01371   0.02088   0.02435   0.01661
              80.0   0.20419   0.07546   0.04106   0.02896   0.04428   0.05468   0.03376
             150.0   0.15503   0.05711   0.03081   0.02160   0.03302   0.04149   0.03202
             300.0   0.12653   0.04701   0.02599   0.01885   0.02873   0.03392   0.02398
             600.0   0.12357   0.04598   0.02555   0.01862   0.02837   0.03313   0.02266
            1200.0   0.12321   0.04586   0.02549   0.01859   0.02831   0.03304   0.02255
            2400.0   0.12312   0.04582   0.02548   0.01858   0.02830   0.03301   0.02252
              </tableData>
            </table>
          </function>
        </fcs_function>
        <fcs_function name="fcs/fbw/k-roll-i">
          <function>
            <table>
              <independentVar lookup="row">aero/qbar-psf</independentVar>
              <independentVar lookup="column">velocities/mach</independentVar>
              <tableData>
                       0.150     0.400     0.700     0.900     1.100     1.400     2.000
              10.0   0.37795   0.36748   0.33629   0.28825   0.54132   0.94244   1.00000
              20.0   0.18898   0.18374   0.16814   0.14412   0.27066   0.47122   0.58787
              40.0   0.09449   0.09187   0.08407   0.07206   0.13533   0.23561   0.29393
              80.0   0.03610   0.03504   0.03190   0.02715   0.05103   0.08999   0.11605
             150.0   0.01826   0.01773   0.01616   0.01379   0.02590   0.04552   0.05798
             300.0   0.00895   0.00870   0.00796   0.00682   0.01280   0.02232   0.02791
             600.0   0.00446   0.00433   0.00396   0.00340   0.00638   0.01111   0.01388
            1200.0   0.00222   0.00216   0.00198   0.00169   0.00318   0.00554   0.00692
            2400.0   0.00111   0.00108   0.00099   0.00085   0.00159   0.00277   0.00346
              </tableData>
            </table>
          </function>
        </fcs_function>
        <fcs_function name="fcs/fbw/p-max">
          <function>
            <table>
              <independentVar lookup="row">aero/qbar-psf</independentVar>
              <independentVar lookup="column">velocities/mach</independentVar>
              <tableData>
                       0.150     0.400     0.700     0.900     1.100     1.400     2.000
              10.0   3.84322   4.36332   4.36332   4.36332   4.36332   4.36332   4.36332
              20.0   3.84322   4.36332   4.36332   4.36332   4.36332   4.36332   4.36332
              40.0   3.84322   4.36332   4.36332   4.36332   4.36332   4.36332   4.36332
              80.0   1.70953   4.36332   4.36332   4.36332   4.36332   4.36332   4.36332
             150.0   2.25165   4.36332   4.36332   4.36332   4.36332   4.36332   4.36332
             300.0   2.75868   4.36332   4.36332   4.36332   4.36332   4.36332   4.36332
             600.0   2.82492   4.36332   4.36332   4.36332   4.36332   4.36332   4.36332
            1200.0   2.83312   4.36332   4.36332   4.36332   4.36332   4.36332   4.36332
            2400.0   2.83523   4.36332   4.36332   4.36332   4.36332   4.36332   4.36332
              </tableData>
            </table>
          </function>
        </fcs_function>
        <!-- the stick's rate halves towards alpha_max -->
        <fcs_function name="fcs/fbw/p-stick">
          <function>
            <product>
              <property>fcs/roll-trim-sum</property>
              <property>fcs/fbw/p-max</property>
              <table>
                <independentVar lookup="row">aero/alpha-rad</independentVar>
                <tableData>
                  0.20944 1.0
                  0.52360 0.5
                </tableData>
              </table>
            </product>
          </function>
        </fcs_function>
        <!-- the rudder's yaw acceleration at full travel (1/s^2), and the yaw damping (1/s) -->
        <fcs_function name="fcs/fbw/yaw-accel">
          <function>
            <table>
              <independentVar lookup="row">aero/qbar-psf</independentVar>
              <independentVar lookup="column">velocities/mach</independentVar>
              <tableData>
                       0.150     0.400     0.700     0.900     1.100     1.400     2.000
              10.0   0.05269   0.05382   0.05742   0.06335   0.03870   0.02507   0.02142
              20.0   0.10537   0.10765   0.11484   0.12671   0.07740   0.05014   0.04284
              40.0   0.21074   0.21529   0.22969   0.25342   0.15480   0.10029   0.08568
              80.0   0.52820   0.54170   0.58411   0.65313   0.39848   0.25154   0.20138
             150.0   1.06589   1.09039   1.16783   1.29452   0.79042   0.50736   0.42470
             300.0   2.18370   2.23143   2.38244   2.63105   1.60701   1.03923   0.88427
             600.0   4.39082   4.48600   4.78716   5.28336   3.22719   2.08954   1.78318
            1200.0   8.79831   8.98859   9.59070  10.58278   6.46431   4.18698   3.57549
            2400.0  17.60827  17.98863  19.19220  21.17591  12.93499   8.37947   7.15818
              </tableData>
            </table>
          </function>
        </fcs_function>
        <fcs_function name="fcs/fbw/yaw-damping">
          <function>
            <table>
              <independentVar lookup="row">aero/qbar-psf</independentVar>
              <independentVar lookup="column">velocities/mach</independentVar>
              <tableData>
                       0.150     0.400     0.700     0.900     1.100     1.400     2.000
              10.0   0.02835   0.01085   0.00659   0.00561   0.00455   0.00305   0.00167
              20.0   0.05669   0.02170   0.01319   0.01122   0.00910   0.00610   0.00333
              40.0   0.11338   0.04340   0.02637   0.02243   0.01820   0.01219   0.00667
              80.0   0.26014   0.09985   0.06088   0.05216   0.04229   0.02799   0.01451
             150.0   0.50724   0.19427   0.11818   0.10067   0.08165   0.05455   0.02951
             300.0   1.02046   0.39066   0.23738   0.20214   0.16395   0.10973   0.05992
             600.0   2.05707   0.78763   0.47881   0.40770   0.33069   0.22121   0.12062
            1200.0   4.14098   1.58546   0.96366   0.82026   0.66535   0.44529   0.24298
            2400.0   8.31461   3.18323   1.93447   1.64616   1.33531   0.89409   0.48828
              </tableData>
            </table>
          </function>
        </fcs_function>
        <!-- the rudder's share of the yaw a roll about the flight path needs, per unit of
             its roll acceleration: sin(alpha), less the ailerons' own yaw and what a
             principal axis inclined to the body axis gives -->
        <fcs_function name="fcs/fbw/roll-yaw-share">
          <function>
            <table>
              <independentVar lookup="row">aero/alpha-rad</independentVar>
              <tableData>
                   -0.34907  -0.35094
                   -0.26180  -0.27658
                   -0.17453  -0.20374
                   -0.08727  -0.12283
                    0.00000  -0.03120
                    0.08727   0.06065
                    0.17453   0.13756
                    0.26180   0.20188
                    0.34907   0.27193
                    0.43633   0.34494
                    0.52360   0.41748
                    0.61087   0.49306
                    0.69813   0.57306
                    0.78540   0.65123
                    0.87266   0.70101
              </tableData>
            </table>
          </function>
        </fcs_function>
        <!-- the yaw acceleration each rad/s of roll rate needs while the aircraft pitches
             under it: the pitch rate's inertia coupling, the angle of attack rising, and
             the yaw damping the roll's yaw rate meets -->
        <fcs_function name="fcs/fbw/p-yaw-need">
          <function>
            <abs>
              <sum>
                <product>
                  <sum>
                    <property>aero/alphadot-rad_sec</property>
                    <product><value>0.61790</value><property>velocities/q-rad_sec</property></product>
                  </sum>
                  <cos><property>aero/alpha-rad</property></cos>
                </product>
                <product><property>fcs/fbw/yaw-damping</property><sin><property>aero/alpha-rad</property></sin></product>
              </sum>
            </abs>
          </function>
        </fcs_function>
        <!-- no more roll rate than 0.5 of the rudder's yaw holds: a roll the rudder cannot
             follow turns the angle of attack into sideslip -->
        <fcs_function name="fcs/fbw/p-yaw-max">
          <function>
            <quotient>
              <product><value>0.5</value><property>fcs/fbw/yaw-accel</property></product>
              <max><value>0.001</value><property>fcs/fbw/p-yaw-need</property></max>
            </quotient>
          </function>
        </fcs_function>
        <fcs_function name="fcs/fbw/p-limited">
          <function>
            <max>
              <min><property>fcs/fbw/p-stick</property><property>fcs/fbw/p-yaw-max</property></min>
              <product><value>-1</value><property>fcs/fbw/p-yaw-max</property></product>
            </max>
          </function>
        </fcs_function>
        <!-- and while the rate grows, no faster roll acceleration than all of it
             coordinates, unless the roll asked for could not leave 2.0 deg of sideslip
             even uncoordinated: at worst c^2 p^2 / (8 Y), c the rudder's share, Y its yaw
             acceleration, p the rate asked for -->
        <fcs_function name="fcs/fbw/p-accel">
          <function>
            <product>
              <quotient>
                <property>fcs/fbw/yaw-accel</property>
                <max><value>0.01</value><abs><property>fcs/fbw/roll-yaw-share</property></abs></max>
              </quotient>
              <max>
                <value>1</value>
                <quotient>
                  <product><value>0.27925</value><property>fcs/fbw/yaw-accel</property></product>
                  <sum>
                    <value>1e-9</value>
                    <product>
                      <property>fcs/fbw/roll-yaw-share</property><property>fcs/fbw/roll-yaw-share</property>
                      <property>fcs/fbw/p-limited</property><property>fcs/fbw/p-limited</property>
                    </product>
                  </sum>
                </quotient>
              </max>
            </product>
          </function>
        </fcs_function>
        <!-- a roll is stopped as fast as the ailerons can -->
        <fcs_function name="fcs/fbw/p-accel-up">
          <function>
            <sum><property>fcs/fbw/p-accel</property>
              <product><value>1000</value><lt><property>fcs/fbw/p-cmd</property><value>0</value></lt></product></sum>
          </function>
        </fcs_function>
        <fcs_function name="fcs/fbw/p-accel-down">
          <function>
            <sum><property>fcs/fbw/p-accel</property>
              <product><value>1000</value><gt><property>fcs/fbw/p-cmd</property><value>0</value></gt></product></sum>
          </function>
        </fcs_function>
        <actuator name="fcs/fbw/p-cmd">
          <input>fcs/fbw/p-limited</input>
          <rate_limit sense="incr">fcs/fbw/p-accel-up</rate_limit>
          <rate_limit sense="decr">fcs/fbw/p-accel-down</rate_limit>
        </actuator>
        <fcs_function name="fcs/fbw/p-stability">
          <function>
            <sum>
              <product><property>velocities/p-rad_sec</property><cos><property>aero/alpha-rad</property></cos></product>
              <product><property>velocities/r-rad_sec</property><sin><property>aero/alpha-rad</property></sin></product>
            </sum>
          </function>
        </fcs_function>
        <fcs_function name="fcs/fbw/roll-error-rate">
          <function>
            <product><property>fcs/fbw/k-roll-i</property>
              <difference><property>fcs/fbw/p-cmd</property><property>fcs/fbw/p-stability</property></difference></product>
          </function>
        </fcs_function>
        <integrator name="fcs/fbw/roll-integral">
          <input>fcs/fbw/roll-error-rate</input>
          <c1>1.0</c1>
          <trigger>fcs/fbw/reset</trigger>
          <clipto> <min>-0.21817</min> <max>0.21817</max> </clipto>
        </integrator>
        <fcs_function name="fcs/fbw/aileron">
          <function>
            <sum>
              <product><property>fcs/fbw/k-roll-ff</property><property>fcs/fbw/p-cmd</property></product>
              <product><property>fcs/fbw/k-roll</property>
                <difference><property>fcs/fbw/p-cmd</property><property>fcs/fbw/p-stability</property></difference></product>
              <property>fcs/fbw/roll-integral</property>
            </sum>
          </function>
          <clipto> <min>-0.43633</min> <max>0.43633</max> </clipto>
        </fcs_function>
        <actuator name="fcs/left-aileron-actuator">
          <input>fcs/fbw/aileron</input>
          <lag>40</lag>
          <rate_limit>1.4</rate_limit>
          <output>fcs/left-aileron-pos-rad</output>
        </actuator>
        <pure_gain name="fcs/right-aileron">
          <input>fcs/left-aileron-pos-rad</input>
          <gain>-1</gain>
          <output>fcs/right-aileron-pos-rad</output>
        </pure_gain>
      </channel>
      <channel name="Yaw (fly-by-wire)">
        <!-- hangar: yaw damper, sideslip feedback, pedals command sideslip -->
        <summer name="fcs/yaw-trim-sum">
          <input>fcs/rudder-cmd-norm</input>
          <input>fcs/yaw-trim-cmd-norm</input>
          <clipto> <min>-1</min> <max>1</max> </clipto>
        </summer>
        <fcs_function name="fcs/fbw/k-yaw-r">
          <function>
            <table>
              <independentVar lookup="row">aero/qbar-psf</independentVar>
              <independentVar lookup="column">velocities/mach</independentVar>
              <tableData>
                       0.150     0.400     0.700     0.900     1.100     1.400     2.000
              10.0  -3.00000  -3.00000  -3.00000  -3.00000  -3.00000  -3.00000  -3.00000
              20.0  -3.00000  -3.00000  -3.00000  -3.00000  -3.00000  -3.00000  -3.00000
              40.0  -3.00000  -3.00000  -3.00000  -3.00000  -3.00000  -3.00000  -3.00000
              80.0  -1.73427  -1.84404  -1.70331  -1.47530  -2.48376  -3.00000  -3.00000
             150.0  -0.62447  -0.79938  -0.78815  -0.71913  -1.21492  -1.91720  -2.42555
             300.0  -0.21808  -0.40850  -0.43278  -0.40869  -0.69646  -1.06684  -1.25320
             600.0  -0.02599  -0.22202  -0.25827  -0.25076  -0.43353  -0.66463  -0.76889
            1200.0   0.00000  -0.11251  -0.15460  -0.15534  -0.27493  -0.42922  -0.50107
            2400.0   0.00000  -0.04122  -0.08674  -0.09238  -0.17036  -0.27617  -0.33187
              </tableData>
            </table>
          </function>
        </fcs_function>
        <fcs_function name="fcs/fbw/k-yaw-beta">
          <function>
            <table>
              <independentVar lookup="row">aero/qbar-psf</independentVar>
              <independentVar lookup="column">velocities/mach</independentVar>
              <tableData>
                       0.150     0.400     0.700     0.900     1.100     1.400     2.000
              10.0   3.00000   3.00000   3.00000   3.00000   3.00000   3.00000   3.00000
              20.0   3.00000   3.00000   3.00000   3.00000   3.00000   3.00000   3.00000
              40.0   3.00000   3.00000   3.00000   3.00000   3.00000   3.00000   3.00000
              80.0   0.00000   0.00000   0.00000   0.00000   0.00000   0.00000   0.00000
             150.0   0.00000   0.00000   0.00000   0.00000   0.00000   0.00000   0.00000
             300.0   0.00000   0.00000   0.00000   0.00000   0.00000   0.00000   0.00000
             600.0   0.00000   0.00000   0.00000   0.00000   0.00000   0.00000   0.00000
            1200.0   0.00000   0.00000   0.00000   0.00000   0.00000   0.00000   0.00000
            2400.0   0.00000   0.00000   0.00000   0.00000   0.00000   0.00000   0.00000
              </tableData>
            </table>
          </function>
        </fcs_function>
        <fcs_function name="fcs/fbw/k-pedal">
          <function>
            <table>
              <independentVar lookup="row">aero/qbar-psf</independentVar>
              <independentVar lookup="column">velocities/mach</independentVar>
              <tableData>
                       0.150     0.400     0.700     0.900     1.100     1.400     2.000
              10.0   0.11684   0.11608   0.11363   0.10932   0.18415   0.25020   0.25020
              20.0   0.11684   0.11608   0.11363   0.10932   0.18415   0.25020   0.25020
              40.0   0.11684   0.11608   0.11363   0.10932   0.18415   0.25020   0.25020
              80.0   0.11015   0.10988   0.10994   0.10825   0.18175   0.23601   0.23181
             150.0   0.13486   0.13486   0.13447   0.13250   0.22271   0.28911   0.26621
             300.0   0.15427   0.15358   0.15121   0.14616   0.24614   0.33048   0.32082
             600.0   0.15752   0.15653   0.15331   0.14747   0.24843   0.33733   0.33650
            1200.0   0.15697   0.15593   0.15259   0.14670   0.24713   0.33612   0.33668
            2400.0   0.15621   0.15518   0.15185   0.14603   0.24599   0.33449   0.33501
              </tableData>
            </table>
          </function>
        </fcs_function>
        <!-- the yaw damper damps the sideslip's rate, the stability-axis yaw rate less
             the one that coordinates the bank and the side force: in the dutch roll the
             yaw rate itself, and zero in a steady coordinated turn, in a roll about the
             flight path and in a steady sideslip - it coordinates those as long as they
             last (a damper on the washed-out yaw rate stopped coordinating a sustained
             roll, and at low speed the roll turned the angle of attack into sideslip) -->
        <!-- on the wheels (the pitch's ground mode, fcs/fbw/ground) the pedals move the rudder
             directly over its travel, a ground law: the sideslip feedback, there the
             crosswind's, turned the nose into it, and as the C-17A's nose wheel unloaded
             towards its rotation it ran 8.6 m off its line across 10 m/s -->
        <fcs_function name="fcs/fbw/rudder">
          <function>
            <sum>
              <product>
                <difference><value>1</value><property>fcs/fbw/ground</property></difference>
                <sum>
                  <product><property>fcs/fbw/k-pedal</property><property>fcs/yaw-trim-sum</property></product>
                  <product><value>-1</value><property>fcs/fbw/k-yaw-beta</property>
                    <difference><property>aero/beta-rad</property>
                      <product><value>0.17453</value><property>fcs/yaw-trim-sum</property></product></difference></product>
                  <product><property>fcs/fbw/k-yaw-r</property><property>aero/betadot-rad_sec</property></product>
                </sum>
              </product>
              <product><property>fcs/fbw/ground</property><value>0.52360</value><property>fcs/yaw-trim-sum</property></product>
            </sum>
          </function>
          <clipto> <min>-0.52360</min> <max>0.52360</max> </clipto>
        </fcs_function>
        <actuator name="fcs/rudder-actuator">
          <input>fcs/fbw/rudder</input>
          <lag>40</lag>
          <rate_limit>1.4</rate_limit>
          <output>fcs/rudder-pos-rad</output>
        </actuator>
        <!-- the nose wheel steers with the pedals (JSBSim steers from fcs/steer-cmd-norm,
             positive right; the rudder command is positive left) -->
        <pure_gain name="fcs/steer-from-rudder">
          <input>fcs/yaw-trim-sum</input>
          <gain>-1</gain>
          <output>fcs/steer-cmd-norm</output>
        </pure_gain>
      </channel>
      <channel name="Speedbrake">
        <kinematic name="fcs/speedbrake-control">
          <input>fcs/speedbrake-cmd-norm</input>
          <traverse>
            <setting> <position>0</position> <time>0</time> </setting>
            <setting> <position>1</position> <time>2.00</time> </setting>
          </traverse>
          <output>fcs/speedbrake-pos-norm</output>
        </kinematic>
      </channel>
      <channel name="Leading-Edge Flaps">
        <fcs_function name="fcs/lef-schedule">
          <function>
            <sum>
              <product> <value>1.38</value> <property>aero/alpha-deg</property> </product>
              <product> <value>-9.05</value>
                <quotient> <property>aero/qbar-psf</property> <property>atmosphere/P-psf</property> </quotient>
              </product>
              <value>1.45</value>
            </sum>
          </function>
          <clipto> <min>-2</min> <max>25</max> </clipto>
        </fcs_function>
        <actuator name="fcs/lef-actuator">
          <input>fcs/lef-schedule</input>
          <lag>7.35</lag>
          <rate_limit>25</rate_limit>
          <output>fcs/lef-pos-deg</output>
        </actuator>
      </channel>
      <channel name="Throttle 0">
        <fcs_function name="fcs/throttle-lever-0">
          <function>
            <table>
              <independentVar lookup="row">fcs/throttle-cmd-norm[0]</independentVar>
              <tableData>
                0.0  0.0
                0.8  1.0
                1.0  2.0
              </tableData>
            </table>
          </function>
          <output>fcs/throttle-pos-norm[0]</output>
        </fcs_function>
      </channel>
      <channel name="Throttle 1">
        <fcs_function name="fcs/throttle-lever-1">
          <function>
            <table>
              <independentVar lookup="row">fcs/throttle-cmd-norm[1]</independentVar>
              <tableData>
                0.0  0.0
                0.8  1.0
                1.0  2.0
              </tableData>
            </table>
          </function>
          <output>fcs/throttle-pos-norm[1]</output>
        </fcs_function>
      </channel>
      <channel name="Landing Gear">
        <kinematic name="fcs/gear-control">
          <input>gear/gear-cmd-norm</input>
          <traverse>
            <setting> <position>0</position> <time>0</time> </setting>
            <setting> <position>1</position> <time>5</time> </setting>
          </traverse>
          <output>gear/gear-pos-norm</output>
        </kinematic>
      </channel>
    </flight_control>
    <aerodynamics>
        <function name="aero/function/mach-lift">
          <description>lift, and damping, over its low-speed value (hangar: aero/mach.py)</description>
          <table>
            <independentVar lookup="row">velocities/mach</independentVar>
            <tableData>
                 0.000     1.000000
                 0.300     1.014117
                 0.500     1.041977
                 0.600     1.063716
                 0.700     1.093055
                 0.800     1.133914
                 0.850     1.161114
                 0.900     1.195520
                 0.950     1.202649
                 1.000     1.202479
                 1.050     1.196276
                 1.100     1.185304
                 1.200     1.154116
                 1.400     1.010702
                 1.600     0.899455
                 1.800     0.892723
                 2.000     0.789412
                 2.300     0.675822
                 2.600     0.592711
            </tableData>
          </table>
        </function>
        <function name="aero/function/mach-side">
          <description>side force, rolling and yawing moment over their low-speed values</description>
          <table>
            <independentVar lookup="row">velocities/mach</independentVar>
            <tableData>
                 0.000     1.000000
                 0.300     1.010221
                 0.500     1.030092
                 0.600     1.045303
                 0.700     1.065391
                 0.800     1.092443
                 0.850     1.109797
                 0.900     1.130881
                 0.950     1.140422
                 1.000     1.150174
                 1.050     1.158457
                 1.100     1.163589
                 1.200     1.157671
                 1.400     1.024256
                 1.600     0.924252
                 1.800     0.985926
                 2.000     0.875114
                 2.300     0.751987
                 2.600     0.661158
            </tableData>
          </table>
        </function>
        <function name="aero/function/mach-dCm-dCL">
          <description>pitching moment per unit low-speed lift: the neutral point's move</description>
          <table>
            <independentVar lookup="row">velocities/mach</independentVar>
            <tableData>
                 0.000     0.000000
                 0.300    -0.001587
                 0.500    -0.005012
                 0.600    -0.007953
                 0.700    -0.012286
                 0.800    -0.018977
                 0.850    -0.023803
                 0.900    -0.030221
                 0.950    -0.048308
                 1.000    -0.072486
                 1.050    -0.098565
                 1.100    -0.122438
                 1.200    -0.148470
                 1.400    -0.145704
                 1.600    -0.148969
                 1.800    -0.163802
                 2.000    -0.156644
                 2.300    -0.148513
                 2.600    -0.142413
            </tableData>
          </table>
        </function>
        <function name="aero/function/mach-dCD0">
          <description>zero-lift drag's change: friction and wave drag</description>
          <table>
            <independentVar lookup="row">velocities/mach</independentVar>
            <tableData>
                 0.000     0.000000
                 0.300    -0.000083
                 0.500    -0.000227
                 0.600    -0.000323
                 0.700    -0.000434
                 0.800    -0.000557
                 0.850    -0.000623
                 0.900    -0.000692
                 0.950    -0.000764
                 1.000    -0.000293
                 1.050     0.001536
                 1.100     0.021398
                 1.200     0.021236
                 1.400     0.020290
                 1.600     0.019643
                 1.800     0.019050
                 2.000     0.018491
                 2.300     0.017705
                 2.600     0.016977
            </tableData>
          </table>
        </function>
        <function name="aero/function/mach-dK">
          <description>induced-drag factor's change (per CL^2)</description>
          <table>
            <independentVar lookup="row">velocities/mach</independentVar>
            <tableData>
                 0.000     0.000000
                 0.300     0.006405
                 0.500     0.018289
                 0.600     0.026921
                 0.700     0.037765
                 0.800     0.051487
                 0.850     0.059829
                 0.900     0.069577
                 0.950     0.071493
                 1.000     0.071448
                 1.050     0.071187
                 1.100     0.072272
                 1.200     0.079156
                 1.400     0.099388
                 1.600     0.125681
                 1.800     0.125882
                 2.000     0.099336
                 2.300     0.043048
                 2.600    -0.032010
            </tableData>
          </table>
        </function>
        <function name="aero/function/mach-aileron">
          <description>aileron power over its low-speed value</description>
          <table>
            <independentVar lookup="row">velocities/mach</independentVar>
            <tableData>
                 0.000     1.000000
                 0.300     1.018846
                 0.500     1.057523
                 0.600     1.089234
                 0.700     1.134487
                 0.800     1.203124
                 0.850     1.253301
                 0.900     1.323554
                 0.950     1.239836
                 1.000     1.085525
                 1.050     0.895535
                 1.100     0.704779
                 1.200     0.460627
                 1.400     0.404812
                 1.600     0.363579
                 1.800     0.366667
                 2.000     0.324489
                 2.300     0.278014
                 2.600     0.243952
            </tableData>
          </table>
        </function>
        <function name="aero/function/mach-elevator">
          <description>elevator power over its low-speed value</description>
          <table>
            <independentVar lookup="row">velocities/mach</independentVar>
            <tableData>
                 0.000     1.000000
                 0.300     1.007708
                 0.500     1.023616
                 0.600     1.036762
                 0.700     1.055722
                 0.800     1.085065
                 0.850     1.107091
                 0.900     1.138932
                 0.950     1.056957
                 1.000     0.921389
                 1.050     0.759887
                 1.100     0.600111
                 1.200     0.396375
                 1.400     0.348345
                 1.600     0.312864
                 1.800     0.315521
                 2.000     0.279226
                 2.300     0.239234
                 2.600     0.209923
            </tableData>
          </table>
        </function>
        <function name="aero/function/mach-rudder">
          <description>rudder power over its low-speed value</description>
          <table>
            <independentVar lookup="row">velocities/mach</independentVar>
            <tableData>
                 0.000     1.000000
                 0.300     1.014507
                 0.500     1.043491
                 0.600     1.066428
                 0.700     1.097810
                 0.800     1.142285
                 0.850     1.172397
                 0.900     1.211224
                 0.950     1.142733
                 1.000     1.025676
                 1.050     0.883553
                 1.100     0.739861
                 1.200     0.541769
                 1.400     0.479333
                 1.600     0.432533
                 1.800     0.461396
                 2.000     0.409538
                 2.300     0.351917
                 2.600     0.309410
            </tableData>
          </table>
        </function>
        <function name="aero/function/CL-base">
          <description>CL over alpha and beta at low speed</description>
          <table>
            <independentVar lookup="row">aero/alpha-deg</independentVar>
            <independentVar lookup="column">aero/beta-deg</independentVar>
            <tableData>
                        -90.00    -70.00    -50.00    -40.00    -30.00    -25.00    -20.00    -15.00    -10.00     -6.00     -3.00      0.00      3.00      6.00     10.00     15.00     20.00     25.00     30.00     40.00     50.00     70.00     90.00
             -180.00  -0.00000   0.00000   0.00000   0.00000   0.00000   0.00000   0.00000   0.00000   0.00000   0.00000   0.00000   0.00000   0.00000   0.00000   0.00000   0.00000   0.00000   0.00000   0.00000   0.00000   0.00000   0.00000  -0.00000
             -120.00   0.00000   0.07778   0.24631   0.34307   0.43343   0.47284   0.50681   0.53434   0.55460   0.56593   0.57080   0.57110   0.57080   0.56593   0.55460   0.53434   0.50681   0.47284   0.43343   0.34307   0.24631   0.07778   0.00000
              -70.00  -0.00000  -0.06252  -0.19848  -0.27712  -0.35066  -0.38276  -0.41044  -0.43287  -0.44939  -0.45800  -0.46235  -0.46229  -0.46235  -0.45800  -0.44939  -0.43287  -0.41044  -0.38276  -0.35066  -0.27712  -0.19848  -0.06252  -0.00000
              -46.00  -0.00000  -0.27333  -0.60013  -0.79957  -0.99317  -1.05223  -1.08873  -1.11447  -1.14461  -1.16598  -1.17325  -1.17566  -1.17325  -1.16598  -1.14461  -1.11447  -1.08873  -1.05223  -0.99317  -0.79957  -0.60013  -0.27333  -0.00000
              -32.00  -0.00000  -0.35132  -0.58970  -0.78779  -0.98141  -1.06415  -1.13720  -1.19417  -1.22074  -1.22342  -1.22246  -1.22214  -1.22246  -1.22342  -1.22074  -1.19417  -1.13720  -1.06415  -0.98141  -0.78779  -0.58970  -0.35132  -0.00000
              -22.00  -0.00000  -0.27585  -0.45392  -0.60862  -0.76029  -0.82458  -0.88352  -0.94379  -0.99343  -1.02335  -1.03784  -1.04271  -1.03784  -1.02335  -0.99343  -0.94379  -0.88352  -0.82458  -0.76029  -0.60862  -0.45392  -0.27585  -0.00000
              -17.00  -0.00000  -0.22404  -0.36362  -0.49202  -0.62022  -0.67443  -0.72630  -0.77207  -0.80481  -0.82130  -0.82759  -0.82934  -0.82759  -0.82130  -0.80481  -0.77207  -0.72630  -0.67443  -0.62022  -0.49202  -0.36362  -0.22404  -0.00000
              -13.00  -0.00000  -0.17875  -0.28336  -0.38608  -0.48961  -0.53163  -0.56825  -0.59837  -0.61820  -0.62771  -0.63170  -0.63307  -0.63170  -0.62771  -0.61820  -0.59837  -0.56825  -0.53163  -0.48961  -0.38608  -0.28336  -0.17875  -0.00000
               -9.00  -0.00000  -0.12663  -0.19356  -0.26673  -0.33987  -0.36799  -0.39039  -0.40827  -0.42016  -0.42622  -0.42875  -0.42959  -0.42875  -0.42622  -0.42016  -0.40827  -0.39039  -0.36799  -0.33987  -0.26673  -0.19356  -0.12663  -0.00000
               -5.00  -0.00000  -0.06847  -0.10248  -0.14302  -0.18313  -0.19741  -0.20820  -0.21651  -0.22215  -0.22498  -0.22612  -0.22648  -0.22612  -0.22498  -0.22215  -0.21651  -0.20820  -0.19741  -0.18313  -0.14302  -0.10248  -0.06847  -0.00000
               -1.00  -0.00000  -0.01033  -0.02183  -0.03321  -0.04414  -0.04622  -0.04651  -0.04649  -0.04618  -0.04599  -0.04588  -0.04583  -0.04588  -0.04599  -0.04618  -0.04649  -0.04651  -0.04622  -0.04414  -0.03321  -0.02183  -0.01033  -0.00000
                3.00   0.00000   0.04728   0.06474   0.07797   0.09582   0.10731   0.11946   0.12922   0.13631   0.13994   0.14143   0.14191   0.14143   0.13994   0.13631   0.12922   0.11946   0.10731   0.09582   0.07797   0.06474   0.04728   0.00000
                7.00   0.00000   0.10666   0.15097   0.19367   0.24212   0.26741   0.29148   0.31048   0.32409   0.33106   0.33397   0.33492   0.33397   0.33106   0.32409   0.31048   0.29148   0.26741   0.24212   0.19367   0.15097   0.10666   0.00000
               11.00   0.00000   0.16147   0.24173   0.31421   0.39351   0.43335   0.47083   0.49968   0.51999   0.53034   0.53467   0.53611   0.53467   0.53034   0.51999   0.49968   0.47083   0.43335   0.39351   0.31421   0.24173   0.16147   0.00000
               15.00   0.00000   0.20932   0.33010   0.43122   0.53753   0.59122   0.64434   0.68607   0.71596   0.73044   0.73602   0.73797   0.73602   0.73044   0.71596   0.68607   0.64434   0.59122   0.53753   0.43122   0.33010   0.20932   0.00000
               19.00   0.00000   0.25058   0.40918   0.53595   0.66360   0.72690   0.79231   0.84792   0.89151   0.91545   0.92609   0.92994   0.92609   0.91545   0.89151   0.84792   0.79231   0.72690   0.66360   0.53595   0.40918   0.25058   0.00000
               23.00   0.00000   0.28864   0.47898   0.63018   0.77737   0.84853   0.91528   0.97784   1.03242   1.06657   1.08242   1.08776   1.08242   1.06657   1.03242   0.97784   0.91528   0.84853   0.77737   0.63018   0.47898   0.28864   0.00000
               27.00   0.00000   0.32057   0.53822   0.71120   0.88035   0.96000   1.03229   1.09314   1.14071   1.16809   1.18011   1.18420   1.18011   1.16809   1.14071   1.09314   1.03229   0.96000   0.88035   0.71120   0.53822   0.32057   0.00000
               32.00   0.00000   0.35168   0.59304   0.78774   0.98454   1.07204   1.14818   1.20629   1.23038   1.23202   1.23037   1.22980   1.23037   1.23202   1.23038   1.20629   1.14818   1.07204   0.98454   0.78774   0.59304   0.35168   0.00000
               46.00   0.00000   0.27364   0.61158   0.81404   1.01143   1.07209   1.10942   1.13506   1.16700   1.18638   1.19461   1.19730   1.19461   1.18638   1.16700   1.13506   1.10942   1.07209   1.01143   0.81404   0.61158   0.27364   0.00000
               70.00   0.00000   0.06243   0.19872   0.27746   0.35109   0.38323   0.41095   0.43341   0.44994   0.45857   0.46292   0.46286   0.46292   0.45857   0.44994   0.43341   0.41095   0.38323   0.35109   0.27746   0.19872   0.06243   0.00000
              120.00  -0.00000  -0.07778  -0.24631  -0.34307  -0.43343  -0.47284  -0.50681  -0.53434  -0.55460  -0.56593  -0.57080  -0.57110  -0.57080  -0.56593  -0.55460  -0.53434  -0.50681  -0.47284  -0.43343  -0.34307  -0.24631  -0.07778  -0.00000
              180.00   0.00000   0.00000   0.00000   0.00000   0.00000   0.00000   0.00000   0.00000   0.00000   0.00000   0.00000   0.00000   0.00000   0.00000   0.00000   0.00000   0.00000   0.00000   0.00000   0.00000   0.00000   0.00000   0.00000
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            </tableData>
          </table>
        </function>
      <axis name="DRAG">
        <function name="aero/coefficient/CD_base">
          <description>CD over alpha and beta (hangar)</description>
          <product>
            <property>aero/qbar-psf</property>
            <property>metrics/Sw-sqft</property>
          <table>
            <independentVar lookup="row">aero/alpha-deg</independentVar>
            <independentVar lookup="column">aero/beta-deg</independentVar>
            <tableData>
                        -90.00    -70.00    -50.00    -40.00    -30.00    -25.00    -20.00    -15.00    -10.00     -6.00     -3.00      0.00      3.00      6.00     10.00     15.00     20.00     25.00     30.00     40.00     50.00     70.00     90.00
             -180.00   0.24293   0.18622   0.10340   0.06722   0.04024   0.03084   0.02391   0.01918   0.01431   0.01428   0.01470   0.01485   0.01470   0.01428   0.01431   0.01918   0.02391   0.03084   0.04024   0.06722   0.10340   0.18622   0.24293
             -120.00   0.24293   0.24711   0.39717   0.53832   0.69954   0.77809   0.84967   0.91026   0.95634   0.98070   0.99131   0.99499   0.99131   0.98070   0.95634   0.91026   0.84967   0.77809   0.69954   0.53832   0.39717   0.24711   0.24293
              -70.00   0.24293   0.27944   0.49415   0.67901   0.88545   0.98509   1.07554   1.15193   1.20996   1.24085   1.25406   1.25858   1.25406   1.24085   1.20996   1.15193   1.07554   0.98509   0.88545   0.67901   0.49415   0.27944   0.24293
              -46.00   0.24293   0.32349   0.54102   0.71824   0.92075   0.99495   1.04757   1.08733   1.12861   1.15623   1.16766   1.17149   1.16766   1.15623   1.12861   1.08733   1.04757   0.99495   0.92075   0.71824   0.54102   0.32349   0.24293
              -32.00   0.24293   0.30506   0.38363   0.46239   0.56309   0.61272   0.65924   0.69822   0.71803   0.72091   0.72080   0.72077   0.72080   0.72091   0.71803   0.69822   0.65924   0.61272   0.56309   0.46239   0.38363   0.30506   0.24293
              -22.00   0.24293   0.27142   0.26438   0.27320   0.29965   0.31441   0.33008   0.35104   0.36572   0.37522   0.38005   0.38168   0.38005   0.37522   0.36572   0.35104   0.33008   0.31441   0.29965   0.27320   0.26438   0.27142   0.24293
              -17.00   0.24293   0.25841   0.21848   0.20165   0.20087   0.20310   0.20780   0.21599   0.21823   0.21930   0.21956   0.21954   0.21956   0.21930   0.21823   0.21599   0.20780   0.20310   0.20087   0.20165   0.21848   0.25841   0.24293
              -13.00   0.24293   0.25014   0.19082   0.15812   0.14007   0.13411   0.13002   0.12988   0.12544   0.12305   0.12208   0.12179   0.12208   0.12305   0.12544   0.12988   0.13002   0.13411   0.14007   0.15812   0.19082   0.25014   0.24293
               -9.00   0.24293   0.24354   0.17129   0.12740   0.09722   0.08567   0.07617   0.07118   0.06338   0.05937   0.05770   0.05715   0.05770   0.05937   0.06338   0.07118   0.07617   0.08567   0.09722   0.12740   0.17129   0.24354   0.24293
               -5.00   0.24293   0.23955   0.16063   0.11038   0.07362   0.05917   0.04901   0.04019   0.03109   0.02645   0.02452   0.02389   0.02452   0.02645   0.03109   0.04019   0.04901   0.05917   0.07362   0.11038   0.16063   0.23955   0.24293
               -1.00   0.24293   0.23915   0.15510   0.10286   0.06427   0.04914   0.03858   0.02920   0.01979   0.01500   0.01301   0.01237   0.01301   0.01500   0.01979   0.02920   0.03858   0.04914   0.06427   0.10286   0.15510   0.23915   0.24293
                3.00   0.24293   0.23950   0.15524   0.10383   0.06612   0.05153   0.03968   0.03257   0.02355   0.01893   0.01702   0.01639   0.01702   0.01893   0.02355   0.03257   0.03968   0.05153   0.06612   0.10383   0.15524   0.23950   0.24293
                7.00   0.24293   0.24180   0.16269   0.11370   0.07954   0.06711   0.05888   0.05151   0.04375   0.03979   0.03814   0.03760   0.03814   0.03979   0.04375   0.05151   0.05888   0.06711   0.07954   0.11370   0.16269   0.24180   0.24293
               11.00   0.24293   0.24775   0.17679   0.13426   0.10856   0.10105   0.09934   0.09368   0.08872   0.08620   0.08516   0.08482   0.08516   0.08620   0.08872   0.09368   0.09934   0.10105   0.10856   0.13426   0.17679   0.24775   0.24293
               15.00   0.24293   0.25539   0.20025   0.16942   0.15717   0.15742   0.16437   0.16539   0.16572   0.16571   0.16557   0.16556   0.16557   0.16571   0.16572   0.16539   0.16437   0.15742   0.15717   0.16942   0.20025   0.25539   0.24293
               19.00   0.24293   0.26431   0.23258   0.21887   0.22401   0.23323   0.25016   0.26162   0.27097   0.27648   0.27904   0.28000   0.27904   0.27648   0.27097   0.26162   0.25016   0.23323   0.22401   0.21887   0.23258   0.26431   0.24293
               23.00   0.24293   0.27495   0.27223   0.28147   0.30940   0.32953   0.35331   0.37655   0.39638   0.40947   0.41569   0.41780   0.41569   0.40947   0.39638   0.37655   0.35331   0.32953   0.30940   0.28147   0.27223   0.27495   0.24293
               27.00   0.24293   0.28720   0.31729   0.35406   0.41132   0.44510   0.47930   0.51176   0.53557   0.54950   0.55568   0.55779   0.55568   0.54950   0.53557   0.51176   0.47930   0.44510   0.41132   0.35406   0.31729   0.28720   0.24293
               32.00   0.24293   0.30485   0.37825   0.45366   0.55552   0.60842   0.65823   0.70043   0.71910   0.72214   0.72195   0.72187   0.72195   0.72214   0.71910   0.70043   0.65823   0.60842   0.55552   0.45366   0.37825   0.30485   0.24293
               46.00   0.24293   0.32338   0.54082   0.72339   0.93106   1.00778   1.06255   1.10378   1.14776   1.17547   1.18730   1.19125   1.18730   1.17547   1.14776   1.10378   1.06255   1.00778   0.93106   0.72339   0.54082   0.32338   0.24293
               70.00   0.24293   0.27940   0.49415   0.67901   0.88545   0.98509   1.07554   1.15193   1.20996   1.24085   1.25406   1.25858   1.25406   1.24085   1.20996   1.15193   1.07554   0.98509   0.88545   0.67901   0.49415   0.27940   0.24293
              120.00   0.24293   0.24711   0.39717   0.53832   0.69954   0.77809   0.84967   0.91026   0.95634   0.98070   0.99131   0.99499   0.99131   0.98070   0.95634   0.91026   0.84967   0.77809   0.69954   0.53832   0.39717   0.24711   0.24293
              180.00   0.24293   0.18622   0.10340   0.06722   0.04024   0.03084   0.02391   0.01918   0.01431   0.01428   0.01470   0.01485   0.01470   0.01428   0.01431   0.01918   0.02391   0.03084   0.04024   0.06722   0.10340   0.18622   0.24293
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            </tableData>
          </table>
          </product>
        </function>
        <function name="aero/coefficient/CD_mach">
          <description>zero-lift drag's change with Mach: friction, wave drag</description>
          <product>
            <property>aero/qbar-psf</property>
            <property>metrics/Sw-sqft</property>
            <property>aero/function/mach-dCD0</property>
          </product>
        </function>
        <function name="aero/coefficient/CD_induced_mach">
          <description>induced drag's change with Mach (leading-edge suction lost)</description>
          <product>
            <property>aero/qbar-psf</property>
            <property>metrics/Sw-sqft</property>
            <property>aero/cl-squared</property>
            <property>aero/function/mach-dK</property>
          </product>
        </function>
        <function name="aero/coefficient/CD_aileron">
          <description>CD increment from aileron (deg), over alpha</description>
          <product>
            <property>aero/qbar-psf</property>
            <property>metrics/Sw-sqft</property>
            <property>aero/function/mach-aileron</property>
          <table>
            <independentVar lookup="row">aero/alpha-deg</independentVar>
            <independentVar lookup="column">fcs/left-aileron-pos-deg</independentVar>
            <tableData>
                        -25.00    -20.00    -15.00    -10.00     -5.00      0.00      5.00     10.00     15.00     20.00     25.00
             -180.00   0.01332   0.00872   0.00500   0.00225   0.00057   0.00000   0.00057   0.00225   0.00500   0.00872   0.01332
             -120.00   0.01332   0.00872   0.00500   0.00225   0.00057   0.00000   0.00057   0.00225   0.00500   0.00872   0.01332
              -70.00   0.01332   0.00872   0.00500   0.00225   0.00057   0.00000   0.00057   0.00225   0.00500   0.00872   0.01332
              -46.00   0.00736   0.00456   0.00241   0.00099   0.00023   0.00000   0.00023   0.00099   0.00241   0.00456   0.00736
              -32.00   0.00920   0.00550   0.00269   0.00096   0.00019   0.00000   0.00019   0.00096   0.00269   0.00550   0.00920
              -22.00   0.02004   0.01415   0.00867   0.00391   0.00090   0.00000   0.00090   0.00391   0.00867   0.01415   0.02004
              -17.00   0.02811   0.02122   0.01433   0.00748   0.00206   0.00000   0.00206   0.00748   0.01433   0.02122   0.02811
              -13.00   0.03176   0.02430   0.01671   0.00894   0.00252   0.00000   0.00252   0.00894   0.01671   0.02430   0.03176
               -9.00   0.03319   0.02502   0.01702   0.00905   0.00254   0.00000   0.00254   0.00905   0.01702   0.02502   0.03319
               -5.00   0.03575   0.02683   0.01797   0.00930   0.00255   0.00000   0.00255   0.00930   0.01797   0.02683   0.03575
               -1.00   0.03573   0.02686   0.01805   0.00941   0.00259   0.00000   0.00259   0.00941   0.01805   0.02686   0.03573
                3.00   0.03596   0.02701   0.01811   0.00940   0.00258   0.00000   0.00258   0.00940   0.01811   0.02701   0.03596
                7.00   0.03527   0.02643   0.01812   0.00981   0.00280   0.00000   0.00280   0.00981   0.01812   0.02643   0.03527
               11.00   0.03776   0.03002   0.02173   0.01238   0.00366   0.00000   0.00366   0.01238   0.02173   0.03002   0.03776
               15.00   0.03518   0.02792   0.02028   0.01178   0.00365   0.00000   0.00365   0.01178   0.02028   0.02792   0.03518
               19.00   0.02708   0.02070   0.01426   0.00772   0.00226   0.00000   0.00226   0.00772   0.01426   0.02070   0.02708
               23.00   0.01784   0.01246   0.00744   0.00309   0.00053   0.00000   0.00053   0.00309   0.00744   0.01246   0.01784
               27.00   0.01050   0.00606   0.00238   0.00005  -0.00033   0.00000  -0.00033   0.00005   0.00238   0.00606   0.01050
               32.00   0.00315  -0.00005  -0.00196  -0.00206  -0.00078   0.00000  -0.00078  -0.00206  -0.00196  -0.00005   0.00315
               46.00  -0.00020  -0.00168  -0.00215  -0.00153  -0.00048   0.00000  -0.00048  -0.00153  -0.00215  -0.00168  -0.00020
               70.00   0.01332   0.00872   0.00500   0.00225   0.00057   0.00000   0.00057   0.00225   0.00500   0.00872   0.01332
              120.00   0.01332   0.00872   0.00500   0.00225   0.00057   0.00000   0.00057   0.00225   0.00500   0.00872   0.01332
              180.00   0.01332   0.00872   0.00500   0.00225   0.00057   0.00000   0.00057   0.00225   0.00500   0.00872   0.01332
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            </tableData>
          </table>
          </product>
        </function>
        <function name="aero/coefficient/CD_elevator">
          <description>CD increment from elevator (deg), over alpha</description>
          <product>
            <property>aero/qbar-psf</property>
            <property>metrics/Sw-sqft</property>
            <property>aero/function/mach-elevator</property>
          <table>
            <independentVar lookup="row">aero/alpha-deg</independentVar>
            <independentVar lookup="column">fcs/elevator-pos-deg</independentVar>
            <tableData>
                        -25.00    -20.00    -15.00    -10.00     -5.00      0.00      5.00     10.00     15.00     20.00     25.00     30.00     35.00     40.00     45.00     50.00
             -180.00   0.02016   0.01556   0.00885   0.00303   0.00070   0.00000   0.00070   0.00303   0.00885   0.01556   0.02384   0.02811   0.03283   0.03787   0.04306   0.04825
             -120.00   0.02597   0.02137   0.01547   0.00983   0.00462   0.00000  -0.00389  -0.00693  -0.00903  -0.01012  -0.01018  -0.01452  -0.01842  -0.02176  -0.02446  -0.02716
              -70.00   0.02014   0.01554  -0.00648  -0.00519  -0.00289   0.00000   0.00340   0.00719   0.01128   0.01552   0.01980   0.01865   0.01672   0.01405   0.01073   0.00686
              -46.00   0.07077   0.05898   0.05294   0.04111   0.02262   0.00000  -0.02343  -0.04395  -0.05817  -0.06648  -0.07153  -0.06988  -0.06881  -0.06804  -0.06733  -0.06652
              -32.00   0.08434   0.07048   0.05994   0.04481   0.02403   0.00000  -0.02402  -0.04425  -0.05701  -0.06258  -0.06389  -0.05705  -0.05078  -0.04504  -0.03976  -0.03487
              -22.00   0.09825   0.08178   0.06509   0.04512   0.02259   0.00000  -0.02090  -0.03771  -0.04754  -0.05059  -0.04937  -0.04035  -0.03148  -0.02281  -0.01436  -0.00607
              -17.00   0.09998   0.08352   0.06397   0.04245   0.02001   0.00000  -0.01597  -0.02706  -0.03171  -0.03031  -0.02485  -0.01373  -0.00232   0.00924   0.02087   0.03257
              -13.00   0.09779   0.08192   0.06225   0.04012   0.01809   0.00000  -0.01279  -0.01985  -0.02048  -0.01514  -0.00532   0.00775   0.02162   0.03614   0.05114   0.06654
               -9.00   0.09120   0.07663   0.05774   0.03695   0.01617   0.00000  -0.00922  -0.01131  -0.00583   0.00641   0.02339   0.03749   0.05270   0.06916   0.08664   0.10493
               -5.00   0.07549   0.06335   0.04596   0.02843   0.01187   0.00000  -0.00471  -0.00103   0.00932   0.02393   0.04168   0.05509   0.07029   0.08713   0.10546   0.12512
               -1.00   0.05507   0.04557   0.02953   0.01571   0.00510   0.00000   0.00171   0.00979   0.02269   0.03864   0.05714   0.06918   0.08336   0.09958   0.11774   0.13739
                3.00   0.03805   0.03095   0.01570   0.00410  -0.00165   0.00000   0.00856   0.02217   0.03788   0.05498   0.07413   0.08473   0.09782   0.11328   0.13101   0.15028
                7.00   0.02251   0.01752   0.00312  -0.00549  -0.00664   0.00000   0.01435   0.03345   0.05292   0.07121   0.09030   0.09857   0.10954   0.12311   0.13906   0.15668
               11.00   0.00077   0.00188  -0.00590  -0.00942  -0.00792   0.00000   0.01573   0.03758   0.05975   0.07960   0.09860   0.10427   0.11263   0.12370   0.13712   0.15224
               15.00  -0.00987  -0.00616  -0.01087  -0.01138  -0.00798   0.00000   0.01481   0.03528   0.05724   0.07729   0.09610   0.09979   0.10578   0.11437   0.12538   0.13832
               19.00  -0.02505  -0.01903  -0.02045  -0.01695  -0.00958   0.00000   0.01363   0.03202   0.05116   0.06941   0.08710   0.08971   0.09395   0.10050   0.10943   0.12056
               23.00  -0.03932  -0.03157  -0.03065  -0.02410  -0.01277   0.00000   0.01362   0.02940   0.04541   0.05985   0.07506   0.07647   0.07947   0.08423   0.09131   0.10045
               27.00  -0.04862  -0.03993  -0.03730  -0.02866  -0.01489   0.00000   0.01396   0.02748   0.04012   0.05142   0.06220   0.06171   0.06340   0.06668   0.07176   0.07892
               32.00  -0.05462  -0.04614  -0.04236  -0.03242  -0.01694   0.00000   0.01515   0.02720   0.03607   0.04284   0.04943   0.04535   0.04395   0.04546   0.04886   0.05389
               46.00  -0.06472  -0.05727  -0.04988  -0.03704  -0.01917   0.00000   0.01703   0.02956   0.03645   0.03908   0.03976   0.03190   0.02487   0.01903   0.01473   0.01220
               70.00   0.02012   0.01552   0.01128   0.00719   0.00340   0.00000  -0.00289  -0.00519  -0.00648   0.01548   0.04642   0.04772   0.03294   0.01745   0.00232  -0.01142
              120.00  -0.00553  -0.01012  -0.00903  -0.00693  -0.00389   0.00000   0.00462   0.00983   0.01547   0.02137   0.02735   0.02791   0.02762   0.02649   0.02456   0.02189
              180.00   0.02016   0.01556   0.00885   0.00303   0.00070   0.00000   0.00070   0.00303   0.00885   0.01556   0.02384   0.02811   0.03283   0.03787   0.04306   0.04825
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            </tableData>
          </table>
          </product>
        </function>
        <function name="aero/coefficient/CD_rudder">
          <description>CD increment from rudder (deg), over alpha</description>
          <product>
            <property>aero/qbar-psf</property>
            <property>metrics/Sw-sqft</property>
            <property>aero/function/mach-rudder</property>
          <table>
            <independentVar lookup="row">aero/alpha-deg</independentVar>
            <independentVar lookup="column">fcs/rudder-pos-deg</independentVar>
            <tableData>
                        -30.00    -25.00    -20.00    -15.00    -10.00     -5.00      0.00      5.00     10.00     15.00     20.00     25.00     30.00
             -180.00   0.00375   0.00268   0.00175   0.00100   0.00045   0.00011   0.00000   0.00011   0.00045   0.00100   0.00175   0.00268   0.00375
             -120.00   0.00047   0.00033   0.00022   0.00013   0.00006   0.00001   0.00000   0.00001   0.00006   0.00013   0.00022   0.00033   0.00047
              -70.00   0.00016   0.00012   0.00008   0.00004   0.00002   0.00001   0.00000   0.00001   0.00002   0.00004   0.00008   0.00011   0.00016
              -46.00   0.00268   0.00212   0.00158   0.00106   0.00055   0.00015   0.00000   0.00015   0.00055   0.00106   0.00158   0.00212   0.00268
              -32.00   0.00551   0.00436   0.00328   0.00220   0.00115   0.00031   0.00000   0.00031   0.00115   0.00220   0.00328   0.00436   0.00551
              -22.00   0.00710   0.00562   0.00422   0.00283   0.00147   0.00040   0.00000   0.00040   0.00147   0.00283   0.00422   0.00562   0.00710
              -17.00   0.00774   0.00613   0.00460   0.00308   0.00160   0.00044   0.00000   0.00044   0.00160   0.00308   0.00460   0.00613   0.00774
              -13.00   0.00815   0.00645   0.00484   0.00324   0.00168   0.00046   0.00000   0.00046   0.00168   0.00324   0.00484   0.00645   0.00815
               -9.00   0.00845   0.00668   0.00501   0.00335   0.00174   0.00048   0.00000   0.00048   0.00174   0.00335   0.00501   0.00668   0.00845
               -5.00   0.00862   0.00682   0.00511   0.00342   0.00177   0.00049   0.00000   0.00049   0.00177   0.00342   0.00511   0.00682   0.00862
               -1.00   0.00867   0.00685   0.00513   0.00343   0.00178   0.00049   0.00000   0.00049   0.00178   0.00343   0.00513   0.00685   0.00867
                3.00   0.00859   0.00678   0.00508   0.00339   0.00176   0.00048   0.00000   0.00048   0.00176   0.00339   0.00508   0.00678   0.00859
                7.00   0.00838   0.00661   0.00495   0.00330   0.00171   0.00047   0.00000   0.00047   0.00171   0.00331   0.00495   0.00661   0.00838
               11.00   0.00805   0.00635   0.00475   0.00317   0.00164   0.00045   0.00000   0.00045   0.00164   0.00317   0.00475   0.00635   0.00805
               15.00   0.00761   0.00600   0.00448   0.00299   0.00155   0.00042   0.00000   0.00042   0.00155   0.00299   0.00448   0.00600   0.00762
               19.00   0.00708   0.00558   0.00416   0.00278   0.00144   0.00039   0.00000   0.00039   0.00144   0.00278   0.00417   0.00558   0.00709
               23.00   0.00647   0.00510   0.00380   0.00253   0.00131   0.00036   0.00000   0.00036   0.00131   0.00253   0.00380   0.00510   0.00648
               27.00   0.00581   0.00457   0.00341   0.00227   0.00117   0.00032   0.00000   0.00032   0.00117   0.00227   0.00341   0.00457   0.00581
               32.00   0.00499   0.00393   0.00292   0.00195   0.00100   0.00027   0.00000   0.00027   0.00100   0.00195   0.00293   0.00393   0.00500
               46.00   0.00296   0.00235   0.00177   0.00119   0.00062   0.00017   0.00000   0.00017   0.00062   0.00119   0.00176   0.00235   0.00296
               70.00   0.00016   0.00012   0.00008   0.00004   0.00002   0.00001   0.00000   0.00001   0.00002   0.00004   0.00008   0.00011   0.00016
              120.00   0.00047   0.00033   0.00022   0.00013   0.00006   0.00001   0.00000   0.00001   0.00006   0.00013   0.00022   0.00033   0.00047
              180.00   0.00375   0.00268   0.00175   0.00100   0.00045   0.00011   0.00000   0.00011   0.00045   0.00100   0.00175   0.00268   0.00375
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            </tableData>
          </table>
          </product>
        </function>
        <function name="aero/coefficient/CD_ground">
          <description>Induced drag change in ground effect</description>
          <product>
            <property>aero/qbar-psf</property>
            <property>metrics/Sw-sqft</property>
            <property>aero/cl-squared</property>
            <value>0.16915</value>
          <table>
            <independentVar lookup="row">aero/h_b-mac-ft</independentVar>
            <tableData>
                    0.00   -1.00000
                    0.10   -0.28090
                    0.15   -0.14793
                    0.20   -0.08897
                    0.30   -0.04160
                    0.40   -0.02383
                    0.50   -0.01538
                    0.60   -0.01073
                    0.70   -0.00791
                    0.80   -0.00607
                    0.90   -0.00480
                    1.00   -0.00389
                    1.10   -0.00322
            </tableData>
          </table>
          </product>
        </function>
        <function name="aero/coefficient/CD_airbrake">
          <description>airbrake: drag of its airbrake plates, 2.66 m2 opened to 50 deg (hangar)</description>
          <product>
            <property>aero/qbar-psf</property>
            <property>metrics/Sw-sqft</property>
            <value>0.062165</value>
            <pow>
              <sin>
                <product>
                  <property>fcs/speedbrake-pos-norm</property>
                  <value>0.872665</value>
                </product>
              </sin>
              <value>2</value>
            </pow>
          </product>
        </function>
      </axis>
      <axis name="SIDE">
        <function name="aero/coefficient/CY_base">
          <description>CY over alpha and beta (hangar)</description>
          <product>
            <property>aero/qbar-psf</property>
            <property>metrics/Sw-sqft</property>
            <property>aero/function/mach-side</property>
          <table>
            <independentVar lookup="row">aero/alpha-deg</independentVar>
            <independentVar lookup="column">aero/beta-deg</independentVar>
            <tableData>
                        -90.00    -70.00    -50.00    -40.00    -30.00    -25.00    -20.00    -15.00    -10.00     -6.00     -3.00      0.00      3.00      6.00     10.00     15.00     20.00     25.00     30.00     40.00     50.00     70.00     90.00
             -180.00  -0.00000   0.06557   0.07854   0.06809   0.05266   0.04292   0.03252   0.02255   0.03950   0.04934   0.02632  -0.00000  -0.02632  -0.04934  -0.03950  -0.02255  -0.03252  -0.04292  -0.05266  -0.06809  -0.07854  -0.06557   0.00000
             -120.00   0.00000  -0.05458  -0.22718  -0.28845  -0.29857  -0.28047  -0.24690  -0.19921  -0.13984  -0.08357  -0.03306  -0.00000   0.03306   0.08357   0.13984   0.19921   0.24690   0.28047   0.29857   0.28845   0.22718   0.05458  -0.00000
              -70.00   0.00000  -0.07983  -0.29051  -0.36347  -0.37338  -0.34996  -0.30755  -0.24774  -0.17325  -0.10542  -0.04680  -0.00000   0.04680   0.10542   0.17325   0.24774   0.30755   0.34996   0.37338   0.36347   0.29051   0.07983  -0.00000
              -46.00   0.00000  -0.17733  -0.33088  -0.38740  -0.38814  -0.34842  -0.29007  -0.22180  -0.14711  -0.07300  -0.03676  -0.00000   0.03676   0.07300   0.14711   0.22180   0.29007   0.34842   0.38814   0.38740   0.33088   0.17733  -0.00000
              -32.00   0.00000  -0.11623  -0.13383  -0.17167  -0.18027  -0.16760  -0.14441  -0.09761  -0.05769  -0.03477  -0.01743  -0.00000   0.01743   0.03477   0.05769   0.09761   0.14441   0.16760   0.18027   0.17167   0.13383   0.11623  -0.00000
              -22.00   0.00000  -0.01397   0.00627  -0.01625  -0.02760  -0.02644  -0.02053   0.00831   0.00366   0.00122   0.00031  -0.00000  -0.00031  -0.00122  -0.00366  -0.00831   0.02053   0.02644   0.02760   0.01625  -0.00627   0.01397  -0.00000
              -17.00   0.00000   0.02686   0.05952   0.04268   0.02949   0.02602   0.02494   0.04443   0.02912   0.01711   0.00848  -0.00000  -0.00848  -0.01711  -0.02912  -0.04443  -0.02494  -0.02602  -0.02949  -0.04268  -0.05952  -0.02686  -0.00000
              -13.00   0.00000   0.05274   0.09123   0.07770   0.06354   0.05754   0.05300   0.06639   0.04459   0.02662   0.01324  -0.00000  -0.01324  -0.02662  -0.04459  -0.06639  -0.05300  -0.05754  -0.06354  -0.07770  -0.09123  -0.05274  -0.00000
               -9.00   0.00000   0.07276   0.11310   0.10177   0.08710   0.07941   0.07268   0.08090   0.05462   0.03275   0.01632  -0.00000  -0.01632  -0.03275  -0.05462  -0.08090  -0.07268  -0.07941  -0.08710  -0.10177  -0.11310  -0.07276  -0.00000
               -5.00   0.00000   0.08465   0.12468   0.11454   0.09952   0.09073   0.09298   0.08752   0.05900   0.03531   0.01755  -0.00000  -0.01755  -0.03531  -0.05900  -0.08752  -0.09298  -0.09073  -0.09952  -0.11454  -0.12468  -0.08465  -0.00000
               -1.00   0.00000   0.08641   0.12760   0.11778   0.10245   0.09330   0.09551   0.08893   0.05994   0.03583   0.01776  -0.00000  -0.01776  -0.03583  -0.05994  -0.08893  -0.09551  -0.09330  -0.10245  -0.11778  -0.12760  -0.08641  -0.00000
                3.00   0.00000   0.08587   0.12513   0.11505   0.09945   0.09043   0.08269   0.08717   0.05883   0.03521   0.01748  -0.00000  -0.01748  -0.03521  -0.05883  -0.08717  -0.08269  -0.09043  -0.09945  -0.11505  -0.12513  -0.08587  -0.00000
                7.00   0.00000   0.07970   0.11780   0.10588   0.08975   0.08151   0.08442   0.07911   0.05334   0.03193   0.01589  -0.00000  -0.01589  -0.03193  -0.05334  -0.07911  -0.08442  -0.08151  -0.08975  -0.10588  -0.11780  -0.07970  -0.00000
               11.00   0.00000   0.06295   0.10062   0.08596   0.06961   0.06301   0.07618   0.06354   0.04260   0.02543   0.01265  -0.00000  -0.01265  -0.02543  -0.04260  -0.06354  -0.07618  -0.06301  -0.06961  -0.08596  -0.10062  -0.06295  -0.00000
               15.00   0.00000   0.03955   0.07283   0.05501   0.03855   0.03383   0.05085   0.04081   0.02676   0.01583   0.00787  -0.00000  -0.00787  -0.01583  -0.02676  -0.04081  -0.05085  -0.03383  -0.03855  -0.05501  -0.07283  -0.03955  -0.00000
               19.00   0.00000   0.01078   0.03587   0.01471  -0.00096  -0.00348   0.01666   0.01334   0.00720   0.00365   0.00166  -0.00000  -0.00166  -0.00365  -0.00720  -0.01334  -0.01666   0.00348   0.00096  -0.01471  -0.03587  -0.01078  -0.00000
               23.00   0.00000  -0.02377  -0.01063  -0.03620  -0.05015  -0.04953  -0.03261  -0.01833  -0.01520  -0.01037  -0.00542  -0.00000   0.00542   0.01037   0.01520   0.01833   0.03261   0.04953   0.05015   0.03620   0.01063   0.02377  -0.00000
               27.00   0.00000  -0.06257  -0.06485  -0.09611  -0.10885  -0.10434  -0.08980  -0.05620  -0.04023  -0.02518  -0.01266  -0.00000   0.01266   0.02518   0.04023   0.05620   0.08980   0.10434   0.10885   0.09611   0.06485   0.06257  -0.00000
               32.00   0.00000  -0.11583  -0.13915  -0.17884  -0.19140  -0.18052  -0.15670  -0.10725  -0.07348  -0.04401  -0.02171  -0.00000   0.02171   0.04401   0.07348   0.10725   0.15670   0.18052   0.19140   0.17884   0.13915   0.11583  -0.00000
               46.00   0.00000  -0.17700  -0.34504  -0.40225  -0.40421  -0.36447  -0.30472  -0.23315  -0.14068  -0.08583  -0.04244  -0.00000   0.04244   0.08583   0.14068   0.23315   0.30472   0.36447   0.40421   0.40225   0.34504   0.17700  -0.00000
               70.00   0.00000  -0.07938  -0.29051  -0.36347  -0.37338  -0.34996  -0.30755  -0.24774  -0.17325  -0.10542  -0.04680  -0.00000   0.04680   0.10542   0.17325   0.24774   0.30755   0.34996   0.37338   0.36347   0.29051   0.07938  -0.00000
              120.00   0.00000  -0.05458  -0.22718  -0.28845  -0.29857  -0.28047  -0.24690  -0.19921  -0.13984  -0.08357  -0.03306  -0.00000   0.03306   0.08357   0.13984   0.19921   0.24690   0.28047   0.29857   0.28845   0.22718   0.05458  -0.00000
              180.00  -0.00000   0.06557   0.07854   0.06809   0.05266   0.04292   0.03252   0.02255   0.03950   0.04934   0.02632  -0.00000  -0.02632  -0.04934  -0.03950  -0.02255  -0.03252  -0.04292  -0.05266  -0.06809  -0.07854  -0.06557   0.00000
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            </tableData>
          </table>
          </product>
        </function>
        <function name="aero/coefficient/CY_aileron">
          <description>CY increment from aileron (deg), over alpha</description>
          <product>
            <property>aero/qbar-psf</property>
            <property>metrics/Sw-sqft</property>
            <property>aero/function/mach-aileron</property>
          <table>
            <independentVar lookup="row">aero/alpha-deg</independentVar>
            <independentVar lookup="column">fcs/left-aileron-pos-deg</independentVar>
            <tableData>
                        -25.00    -20.00    -15.00    -10.00     -5.00      0.00      5.00     10.00     15.00     20.00     25.00
             -180.00   0.00000   0.00000   0.00000   0.00000   0.00000   0.00000   0.00000   0.00000   0.00000   0.00000   0.00000
              -35.00   0.00736   0.00652   0.00541   0.00388   0.00196   0.00000  -0.00196  -0.00388  -0.00541  -0.00652  -0.00736
              -11.00   0.01523   0.01338   0.01108   0.00804   0.00421   0.00000  -0.00421  -0.00804  -0.01108  -0.01338  -0.01523
                4.00   0.01968   0.01724   0.01424   0.01030   0.00538   0.00000  -0.00538  -0.01030  -0.01424  -0.01724  -0.01968
               19.00   0.02294   0.02010   0.01662   0.01206   0.00634   0.00000  -0.00634  -0.01206  -0.01662  -0.02010  -0.02295
               42.00   0.00974   0.00850   0.00691   0.00476   0.00209   0.00000  -0.00209  -0.00476  -0.00691  -0.00850  -0.00974
              180.00   0.00000   0.00000   0.00000   0.00000   0.00000   0.00000   0.00000   0.00000   0.00000   0.00000   0.00000
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            </tableData>
          </table>
          </product>
        </function>
        <function name="aero/coefficient/CY_rudder">
          <description>CY increment from rudder (deg), over alpha</description>
          <product>
            <property>aero/qbar-psf</property>
            <property>metrics/Sw-sqft</property>
            <property>aero/function/mach-rudder</property>
          <table>
            <independentVar lookup="row">aero/alpha-deg</independentVar>
            <independentVar lookup="column">fcs/rudder-pos-deg</independentVar>
            <tableData>
                        -30.00    -25.00    -20.00    -15.00    -10.00     -5.00      0.00      5.00     10.00     15.00     20.00     25.00     30.00
             -180.00   0.00000   0.00000   0.00000   0.00000   0.00000   0.00000   0.00000   0.00000   0.00000   0.00000   0.00000   0.00000   0.00000
              -35.00  -0.04065  -0.03724  -0.03331  -0.02810  -0.02066  -0.01094   0.00000   0.01094   0.02066   0.02810   0.03331   0.03723   0.04064
              -11.00  -0.04750  -0.04351  -0.03892  -0.03282  -0.02418  -0.01282   0.00000   0.01282   0.02418   0.03282   0.03892   0.04352   0.04751
                4.00  -0.04605  -0.04222  -0.03780  -0.03190  -0.02351  -0.01247   0.00000   0.01247   0.02351   0.03190   0.03781   0.04223   0.04607
               19.00  -0.03827  -0.03513  -0.03149  -0.02660  -0.01962  -0.01041   0.00000   0.01041   0.01963   0.02661   0.03150   0.03514   0.03829
               42.00  -0.03419  -0.03163  -0.02856  -0.02429  -0.01787  -0.00943   0.00000   0.00943   0.01787   0.02429   0.02856   0.03162   0.03418
              180.00   0.00000   0.00000   0.00000   0.00000   0.00000   0.00000   0.00000   0.00000   0.00000   0.00000   0.00000   0.00000   0.00000
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            </tableData>
          </table>
          </product>
        </function>
        <function name="aero/coefficient/CYp">
          <description>CY per p (non-dimensional), over alpha</description>
          <product>
            <property>aero/qbar-psf</property>
            <property>metrics/Sw-sqft</property>
            <property>aero/bi2vel</property>
            <property>velocities/p-aero-rad_sec</property>
            <property>aero/function/mach-lift</property>
          <table>
            <independentVar lookup="row">aero/alpha-deg</independentVar>
            <tableData>
                 -180.00   -0.22858
                 -165.00   -0.23499
                  -32.00   -0.09734
                  -10.00   -0.08017
                    5.00   -0.05943
                   20.00   -0.05097
                   46.00   -0.14538
                  180.00   -0.22858
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            </tableData>
          </table>
          </product>
        </function>
        <function name="aero/coefficient/CYr">
          <description>CY per r (non-dimensional), over alpha</description>
          <product>
            <property>aero/qbar-psf</property>
            <property>metrics/Sw-sqft</property>
            <property>aero/bi2vel</property>
            <property>velocities/r-aero-rad_sec</property>
            <property>aero/function/mach-lift</property>
          <table>
            <independentVar lookup="row">aero/alpha-deg</independentVar>
            <tableData>
                 -180.00    0.53297
                 -165.00    0.51557
                  -32.00    0.17914
                  -10.00    0.20485
                    5.00    0.19776
                   20.00    0.17299
                   46.00    0.16221
                  180.00    0.53297
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            </tableData>
          </table>
          </product>
        </function>
      </axis>
      <axis name="LIFT">
        <function name="aero/coefficient/CL_base">
          <description>CL over alpha and beta, ground effect, compressibility (hangar)</description>
          <product>
            <property>aero/qbar-psf</property>
            <property>metrics/Sw-sqft</property>
            <property>aero/function/CL-base</property>
            <property>aero/function/mach-lift</property>
          <table>
            <independentVar lookup="row">aero/h_b-mac-ft</independentVar>
            <tableData>
                    0.00    1.20000
                    0.10    1.08692
                    0.20    1.03778
                    0.40    1.00713
                    0.60    1.00135
                    0.80    1.00025
                    1.00    1.00005
                    1.10    1.00000
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            </tableData>
          </table>
          </product>
        </function>
        <function name="aero/coefficient/CL_elevator">
          <description>CL increment from elevator (deg), over alpha</description>
          <product>
            <property>aero/qbar-psf</property>
            <property>metrics/Sw-sqft</property>
            <property>aero/function/mach-elevator</property>
          <table>
            <independentVar lookup="row">aero/alpha-deg</independentVar>
            <independentVar lookup="column">fcs/elevator-pos-deg</independentVar>
            <tableData>
                        -25.00    -20.00    -15.00    -10.00     -5.00      0.00      5.00     10.00     15.00     20.00     25.00     30.00     35.00     40.00     45.00     50.00
             -180.00   0.01871   0.01871   0.01456   0.02063   0.01987   0.00000  -0.01987  -0.02063  -0.01456  -0.01871  -0.02230  -0.02521  -0.02736  -0.02867  -0.02911  -0.02867
              -35.00  -0.17355  -0.15747  -0.13832  -0.10522  -0.05721   0.00000   0.05967   0.11487   0.15944   0.19385   0.22261   0.23110   0.24017   0.24970   0.25957   0.26975
              -11.00  -0.28844  -0.25776  -0.22146  -0.16645  -0.09002   0.00000   0.09371   0.18012   0.24836   0.29872   0.33939   0.33994   0.34089   0.34211   0.34392   0.34647
                4.00  -0.32298  -0.28688  -0.24310  -0.18001  -0.09599   0.00000   0.09558   0.17936   0.24140   0.28276   0.31222   0.30771   0.30401   0.30139   0.30018   0.30124
               19.00  -0.31721  -0.28027  -0.23075  -0.16567  -0.08518   0.00000   0.07866   0.14270   0.18676   0.21247   0.22856   0.21966   0.21023   0.20094   0.19367   0.18738
               42.00  -0.18058  -0.16439  -0.13509  -0.09751  -0.05095   0.00000   0.04976   0.09247   0.12275   0.14094   0.15093   0.14578   0.13909   0.13194   0.12450   0.11263
              180.00   0.01871   0.01871   0.01456   0.02063   0.01987   0.00000  -0.01987  -0.02063  -0.01456  -0.01871  -0.02230  -0.02521  -0.02736  -0.02867  -0.02911  -0.02867
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            </tableData>
          </table>
          </product>
        </function>
        <function name="aero/coefficient/CLq">
          <description>CL per q (non-dimensional), over alpha</description>
          <product>
            <property>aero/qbar-psf</property>
            <property>metrics/Sw-sqft</property>
            <property>aero/ci2vel</property>
            <property>velocities/q-aero-rad_sec</property>
            <property>aero/function/mach-lift</property>
          <table>
            <independentVar lookup="row">aero/alpha-deg</independentVar>
            <tableData>
                 -180.00    0.99144
                 -165.00    0.02503
                  -32.00    1.48401
                  -10.00    2.59710
                    5.00    2.46247
                   20.00    2.32534
                   46.00    1.03265
                  180.00    0.99144
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            </tableData>
          </table>
          </product>
        </function>
        <function name="aero/coefficient/CLadot">
          <description>CL per alpha-dot (downwash lag at the tail)</description>
          <product>
            <property>aero/qbar-psf</property>
            <property>metrics/Sw-sqft</property>
            <property>aero/ci2vel</property>
            <property>aero/alphadot-rad_sec</property>
            <value>0.00000</value>
            <property>aero/function/mach-lift</property>
          </product>
        </function>
      </axis>
      <axis name="ROLL">
        <function name="aero/coefficient/Cl_base">
          <description>Cl over alpha and beta (hangar)</description>
          <product>
            <property>aero/qbar-psf</property>
            <property>metrics/Sw-sqft</property>
            <property>metrics/bw-ft</property>
            <property>aero/function/mach-side</property>
          <table>
            <independentVar lookup="row">aero/alpha-deg</independentVar>
            <independentVar lookup="column">aero/beta-deg</independentVar>
            <tableData>
                        -90.00    -70.00    -50.00    -40.00    -30.00    -25.00    -20.00    -15.00    -10.00     -6.00     -3.00      0.00      3.00      6.00     10.00     15.00     20.00     25.00     30.00     40.00     50.00     70.00     90.00
             -180.00   0.03635   0.03285   0.02502   0.01984   0.01366   0.01083   0.00835   0.00607   0.00923   0.01105   0.00594  -0.00000  -0.00594  -0.01105  -0.00923  -0.00607  -0.00835  -0.01083  -0.01366  -0.01984  -0.02502  -0.03285  -0.03635
              -35.00   0.03635   0.05100   0.04314   0.03905   0.02496   0.02058   0.01960   0.01810   0.01554   0.00809   0.00357  -0.00000  -0.00357  -0.00809  -0.01554  -0.01810  -0.01960  -0.02058  -0.02496  -0.03905  -0.04314  -0.05100  -0.03635
              -11.00   0.03635   0.03381   0.01831  -0.00791  -0.03541  -0.03830  -0.03177  -0.01904  -0.01296  -0.00786  -0.00393  -0.00000   0.00393   0.00786   0.01296   0.01904   0.03177   0.03830   0.03541   0.00791  -0.01831  -0.03381  -0.03635
                4.00   0.03635   0.03200   0.01596   0.00714   0.01047   0.01259   0.01214   0.01529   0.01053   0.00637   0.00319  -0.00000  -0.00319  -0.00637  -0.01053  -0.01529  -0.01214  -0.01259  -0.01047  -0.00714  -0.01596  -0.03200  -0.03635
               19.00   0.03635   0.02553   0.00997   0.01312   0.04623   0.05208   0.05182   0.04323   0.03109   0.01988   0.01042  -0.00000  -0.01042  -0.01988  -0.03109  -0.04323  -0.05182  -0.05208  -0.04623  -0.01312  -0.00997  -0.02553  -0.03635
               42.00   0.03635   0.01218  -0.00614  -0.02072  -0.03533  -0.03470  -0.02543  -0.01170   0.00261   0.00333   0.00179  -0.00000  -0.00179  -0.00333  -0.00261   0.01170   0.02543   0.03470   0.03533   0.02072   0.00614  -0.01218  -0.03635
              180.00   0.03635   0.03285   0.02502   0.01984   0.01366   0.01083   0.00835   0.00607   0.00923   0.01105   0.00594  -0.00000  -0.00594  -0.01105  -0.00923  -0.00607  -0.00835  -0.01083  -0.01366  -0.01984  -0.02502  -0.03285  -0.03635
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            </tableData>
          </table>
          </product>
        </function>
        <function name="aero/coefficient/Cl_aileron">
          <description>Cl increment from aileron (deg), over alpha</description>
          <product>
            <property>aero/qbar-psf</property>
            <property>metrics/Sw-sqft</property>
            <property>metrics/bw-ft</property>
            <property>aero/function/mach-aileron</property>
          <table>
            <independentVar lookup="row">aero/alpha-deg</independentVar>
            <independentVar lookup="column">fcs/left-aileron-pos-deg</independentVar>
            <tableData>
                        -25.00    -20.00    -15.00    -10.00     -5.00      0.00      5.00     10.00     15.00     20.00     25.00
             -180.00   0.00000   0.00000   0.00000   0.00000   0.00000   0.00000   0.00000   0.00000   0.00000   0.00000   0.00000
              -35.00  -0.03818  -0.03408  -0.02867  -0.02110  -0.01119   0.00000   0.01119   0.02110   0.02867   0.03408   0.03818
              -11.00  -0.06122  -0.05400  -0.04493  -0.03276  -0.01727   0.00000   0.01727   0.03276   0.04493   0.05400   0.06122
                4.00  -0.05788  -0.05112  -0.04259  -0.03109  -0.01641   0.00000   0.01641   0.03109   0.04259   0.05112   0.05787
               19.00  -0.05435  -0.04768  -0.03944  -0.02860  -0.01501   0.00000   0.01501   0.02860   0.03944   0.04768   0.05435
               42.00  -0.02815  -0.02519  -0.02125  -0.01570  -0.00841   0.00000   0.00841   0.01570   0.02125   0.02519   0.02815
              180.00   0.00000   0.00000   0.00000   0.00000   0.00000   0.00000   0.00000   0.00000   0.00000   0.00000   0.00000
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            </tableData>
          </table>
          </product>
        </function>
        <function name="aero/coefficient/Cl_rudder">
          <description>Cl increment from rudder (deg), over alpha</description>
          <product>
            <property>aero/qbar-psf</property>
            <property>metrics/Sw-sqft</property>
            <property>metrics/bw-ft</property>
            <property>aero/function/mach-rudder</property>
          <table>
            <independentVar lookup="row">aero/alpha-deg</independentVar>
            <independentVar lookup="column">fcs/rudder-pos-deg</independentVar>
            <tableData>
                        -30.00    -25.00    -20.00    -15.00    -10.00     -5.00      0.00      5.00     10.00     15.00     20.00     25.00     30.00
             -180.00   0.00000   0.00000   0.00000   0.00000   0.00000   0.00000   0.00000   0.00000   0.00000   0.00000   0.00000   0.00000   0.00000
              -35.00  -0.00794  -0.00718  -0.00634  -0.00529  -0.00385  -0.00203   0.00000   0.00203   0.00385   0.00529   0.00634   0.00718   0.00794
              -11.00  -0.00984  -0.00888  -0.00782  -0.00650  -0.00473  -0.00249   0.00000   0.00249   0.00473   0.00650   0.00782   0.00889   0.00984
                4.00  -0.00998  -0.00903  -0.00796  -0.00663  -0.00484  -0.00255   0.00000   0.00255   0.00484   0.00663   0.00797   0.00903   0.00998
               19.00  -0.00851  -0.00768  -0.00675  -0.00560  -0.00407  -0.00215   0.00000   0.00215   0.00407   0.00560   0.00675   0.00768   0.00851
               42.00  -0.00740  -0.00676  -0.00602  -0.00505  -0.00368  -0.00194   0.00000   0.00194   0.00368   0.00505   0.00602   0.00676   0.00739
              180.00   0.00000   0.00000   0.00000   0.00000   0.00000   0.00000   0.00000   0.00000   0.00000   0.00000   0.00000   0.00000   0.00000
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            </tableData>
          </table>
          </product>
        </function>
        <function name="aero/coefficient/Clp">
          <description>Cl per p (non-dimensional), over alpha</description>
          <product>
            <property>aero/qbar-psf</property>
            <property>metrics/Sw-sqft</property>
            <property>metrics/bw-ft</property>
            <property>aero/bi2vel</property>
            <property>velocities/p-aero-rad_sec</property>
            <property>aero/function/mach-lift</property>
          <table>
            <independentVar lookup="row">aero/alpha-deg</independentVar>
            <tableData>
                 -180.00   -0.56370
                 -165.00   -0.17052
                  -32.00   -0.12098
                  -10.00   -0.27830
                    5.00   -0.21668
                   20.00   -0.30854
                   46.00   -0.21130
                  180.00   -0.56370
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            </tableData>
          </table>
          </product>
        </function>
        <function name="aero/coefficient/Clr">
          <description>Cl per r (non-dimensional), over alpha</description>
          <product>
            <property>aero/qbar-psf</property>
            <property>metrics/Sw-sqft</property>
            <property>metrics/bw-ft</property>
            <property>aero/bi2vel</property>
            <property>velocities/r-aero-rad_sec</property>
            <property>aero/function/mach-lift</property>
          <table>
            <independentVar lookup="row">aero/alpha-deg</independentVar>
            <tableData>
                 -180.00    0.11543
                 -165.00    0.13628
                  -32.00   -0.15756
                  -10.00   -0.00783
                    5.00    0.08740
                   20.00    0.16916
                   46.00    0.31312
                  180.00    0.11543
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            </tableData>
          </table>
          </product>
        </function>
      </axis>
      <axis name="PITCH">
        <function name="aero/coefficient/Cm_base">
          <description>Cm over alpha and beta (hangar)</description>
          <product>
            <property>aero/qbar-psf</property>
            <property>metrics/Sw-sqft</property>
            <property>metrics/cbarw-ft</property>
          <table>
            <independentVar lookup="row">aero/alpha-deg</independentVar>
            <independentVar lookup="column">aero/beta-deg</independentVar>
            <tableData>
                        -90.00    -70.00    -50.00    -40.00    -30.00    -25.00    -20.00    -15.00    -10.00     -6.00     -3.00      0.00      3.00      6.00     10.00     15.00     20.00     25.00     30.00     40.00     50.00     70.00     90.00
             -180.00  -0.00000  -0.00006  -0.00024  -0.00029  -0.00032  -0.00039  -0.00048  -0.00056   0.00193   0.00138  -0.00022  -0.00080  -0.00022   0.00138   0.00193  -0.00056  -0.00048  -0.00039  -0.00032  -0.00029  -0.00024  -0.00006  -0.00000
              -35.00  -0.00000  -0.02136  -0.07261  -0.09639  -0.11619  -0.12285  -0.12921  -0.13713  -0.14602  -0.15099  -0.15360  -0.15469  -0.15360  -0.15099  -0.14602  -0.13713  -0.12921  -0.12285  -0.11619  -0.09639  -0.07261  -0.02136  -0.00000
              -11.00  -0.00000  -0.00881  -0.02361  -0.03474  -0.04279  -0.04389  -0.04398  -0.04496  -0.04359  -0.04283  -0.04250  -0.04242  -0.04250  -0.04283  -0.04359  -0.04496  -0.04398  -0.04389  -0.04279  -0.03474  -0.02361  -0.00881  -0.00000
                4.00   0.00000   0.00954   0.00952   0.00839   0.00893   0.01074   0.01289   0.01400   0.01676   0.01817   0.01873   0.01891   0.01873   0.01817   0.01676   0.01400   0.01289   0.01074   0.00893   0.00839   0.00952   0.00954   0.00000
               19.00   0.00000   0.02227   0.04816   0.05888   0.07259   0.07999   0.08375   0.08600   0.08741   0.08778   0.08781   0.08776   0.08781   0.08778   0.08741   0.08600   0.08375   0.07999   0.07259   0.05888   0.04816   0.02227   0.00000
               42.00   0.00000   0.02459   0.07476   0.09818   0.12228   0.13462   0.14702   0.15801   0.16586   0.17041   0.17205   0.17261   0.17205   0.17041   0.16586   0.15801   0.14702   0.13462   0.12228   0.09818   0.07476   0.02459   0.00000
              180.00  -0.00000  -0.00006  -0.00024  -0.00029  -0.00032  -0.00039  -0.00048  -0.00056   0.00193   0.00138  -0.00022  -0.00080  -0.00022   0.00138   0.00193  -0.00056  -0.00048  -0.00039  -0.00032  -0.00029  -0.00024  -0.00006  -0.00000
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            </tableData>
          </table>
          </product>
        </function>
        <function name="aero/coefficient/Cm_mach">
          <description>Cm from the neutral point's move with Mach</description>
          <product>
            <property>aero/qbar-psf</property>
            <property>metrics/Sw-sqft</property>
            <property>metrics/cbarw-ft</property>
            <property>aero/function/CL-base</property>
            <property>aero/function/mach-dCm-dCL</property>
          </product>
        </function>
        <function name="aero/coefficient/Cm_elevator">
          <description>Cm increment from elevator (deg), over alpha</description>
          <product>
            <property>aero/qbar-psf</property>
            <property>metrics/Sw-sqft</property>
            <property>metrics/cbarw-ft</property>
            <property>aero/function/mach-elevator</property>
          <table>
            <independentVar lookup="row">aero/alpha-deg</independentVar>
            <independentVar lookup="column">fcs/elevator-pos-deg</independentVar>
            <tableData>
                        -25.00    -20.00    -15.00    -10.00     -5.00      0.00      5.00     10.00     15.00     20.00     25.00     30.00     35.00     40.00     45.00     50.00
             -180.00  -0.01668  -0.01668  -0.01289  -0.01800  -0.01729   0.00000   0.01727   0.01790   0.01240   0.01582   0.01870   0.02095   0.02249   0.02328   0.02327   0.02246
              -35.00   0.13471   0.12501   0.10057   0.07133   0.03686   0.00000  -0.03587  -0.06717  -0.09048  -0.10601  -0.11633  -0.11455  -0.11163  -0.10767  -0.10277  -0.09704
              -11.00   0.17655   0.16402   0.13381   0.09617   0.05050   0.00000  -0.05110  -0.09788  -0.13593  -0.16527  -0.18875  -0.19685  -0.20302  -0.20710  -0.20901  -0.20869
                4.00   0.18404   0.17090   0.13892   0.09895   0.05123   0.00000  -0.05092  -0.09746  -0.13605  -0.16747  -0.19401  -0.20653  -0.21766  -0.22710  -0.23446  -0.23893
               19.00   0.16800   0.15496   0.12860   0.09334   0.04909   0.00000  -0.04930  -0.09353  -0.12957  -0.15970  -0.18541  -0.19891  -0.21220  -0.22441  -0.23362  -0.24075
               42.00   0.10469   0.09471   0.08091   0.06007   0.03206   0.00000  -0.03285  -0.06350  -0.08950  -0.11130  -0.13096  -0.14257  -0.15446  -0.16569  -0.17608  -0.18728
              180.00  -0.01668  -0.01668  -0.01289  -0.01800  -0.01729   0.00000   0.01727   0.01790   0.01240   0.01582   0.01870   0.02095   0.02249   0.02328   0.02327   0.02246
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            </tableData>
          </table>
          </product>
        </function>
        <function name="aero/coefficient/Cmq">
          <description>Cm per q (non-dimensional), over alpha</description>
          <product>
            <property>aero/qbar-psf</property>
            <property>metrics/Sw-sqft</property>
            <property>metrics/cbarw-ft</property>
            <property>aero/ci2vel</property>
            <property>velocities/q-aero-rad_sec</property>
            <property>aero/function/mach-lift</property>
          <table>
            <independentVar lookup="row">aero/alpha-deg</independentVar>
            <tableData>
                 -180.00   -0.61948
                 -165.00   -0.02175
                  -32.00   -0.78830
                  -10.00   -0.87143
                    5.00   -0.80679
                   20.00   -0.92248
                   46.00   -0.83196
                  180.00   -0.61948
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            </tableData>
          </table>
          </product>
        </function>
        <function name="aero/coefficient/Cmadot">
          <description>Cm per alpha-dot (downwash lag at the tail)</description>
          <product>
            <property>aero/qbar-psf</property>
            <property>metrics/Sw-sqft</property>
            <property>metrics/cbarw-ft</property>
            <property>aero/ci2vel</property>
            <property>aero/alphadot-rad_sec</property>
            <value>0.00000</value>
            <property>aero/function/mach-lift</property>
          </product>
        </function>
        <function name="aero/coefficient/Cm_airbrake">
          <description>airbrake: its drag's pitching moment, 1.00 m from the reference point's height</description>
          <product>
            <property>aero/qbar-psf</property>
            <property>metrics/Sw-sqft</property>
            <property>metrics/cbarw-ft</property>
            <value>0.0109066</value>
            <pow>
              <sin>
                <product>
                  <property>fcs/speedbrake-pos-norm</property>
                  <value>0.872665</value>
                </product>
              </sin>
              <value>2</value>
            </pow>
          </product>
        </function>
      </axis>
      <axis name="YAW">
        <function name="aero/coefficient/Cn_base">
          <description>Cn over alpha and beta (hangar)</description>
          <product>
            <property>aero/qbar-psf</property>
            <property>metrics/Sw-sqft</property>
            <property>metrics/bw-ft</property>
            <property>aero/function/mach-side</property>
          <table>
            <independentVar lookup="row">aero/alpha-deg</independentVar>
            <independentVar lookup="column">aero/beta-deg</independentVar>
            <tableData>
                        -90.00    -70.00    -50.00    -40.00    -30.00    -25.00    -20.00    -15.00    -10.00     -6.00     -3.00      0.00      3.00      6.00     10.00     15.00     20.00     25.00     30.00     40.00     50.00     70.00     90.00
             -180.00  -0.04416  -0.05742  -0.06115  -0.05687  -0.04722  -0.04106  -0.03426  -0.02668  -0.03175  -0.03335  -0.01784  -0.00000   0.01784   0.03335   0.03175   0.02668   0.03426   0.04106   0.04722   0.05687   0.06115   0.05742   0.04416
              -35.00  -0.04416  -0.02831  -0.01038  -0.00206   0.00293   0.00369   0.00310   0.00041  -0.00890  -0.00531  -0.00267  -0.00000   0.00267   0.00531   0.00890  -0.00041  -0.00310  -0.00369  -0.00293   0.00206   0.01038   0.02831   0.04416
              -11.00  -0.04416  -0.02502  -0.00781   0.00229   0.00467   0.00290  -0.00081  -0.01311  -0.00935  -0.00578  -0.00293  -0.00000   0.00293   0.00578   0.00935   0.01311   0.00081  -0.00290  -0.00467  -0.00229   0.00781   0.02502   0.04416
                4.00  -0.04416  -0.02458  -0.00641   0.00156   0.00095  -0.00131  -0.00499  -0.01554  -0.01118  -0.00696  -0.00355  -0.00000   0.00355   0.00696   0.01118   0.01554   0.00499   0.00131  -0.00095  -0.00156   0.00641   0.02458   0.04416
               19.00  -0.04416  -0.02566  -0.00702   0.00328   0.00488   0.00289  -0.00798  -0.00950  -0.00683  -0.00424  -0.00216  -0.00000   0.00216   0.00424   0.00683   0.00950   0.00798  -0.00289  -0.00488  -0.00328   0.00702   0.02566   0.04416
               42.00  -0.04416  -0.02900  -0.01074  -0.00285   0.00299   0.00371   0.00310   0.00104  -0.00535  -0.00322  -0.00184  -0.00000   0.00184   0.00322   0.00535  -0.00104  -0.00310  -0.00371  -0.00299   0.00285   0.01074   0.02900   0.04416
              180.00  -0.04416  -0.05742  -0.06115  -0.05687  -0.04722  -0.04106  -0.03426  -0.02668  -0.03175  -0.03335  -0.01784  -0.00000   0.01784   0.03335   0.03175   0.02668   0.03426   0.04106   0.04722   0.05687   0.06115   0.05742   0.04416
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            </tableData>
          </table>
          </product>
        </function>
        <function name="aero/coefficient/Cn_aileron">
          <description>Cn increment from aileron (deg), over alpha</description>
          <product>
            <property>aero/qbar-psf</property>
            <property>metrics/Sw-sqft</property>
            <property>metrics/bw-ft</property>
            <property>aero/function/mach-aileron</property>
          <table>
            <independentVar lookup="row">aero/alpha-deg</independentVar>
            <independentVar lookup="column">fcs/left-aileron-pos-deg</independentVar>
            <tableData>
                        -25.00    -20.00    -15.00    -10.00     -5.00      0.00      5.00     10.00     15.00     20.00     25.00
             -180.00  -0.00000  -0.00000  -0.00000  -0.00000  -0.00000   0.00000  -0.00000  -0.00000  -0.00000  -0.00000  -0.00000
              -35.00   0.00062   0.00065   0.00064   0.00054   0.00034   0.00000  -0.00034  -0.00054  -0.00064  -0.00065  -0.00062
              -11.00  -0.00888  -0.00763  -0.00606  -0.00410  -0.00198   0.00000   0.00198   0.00410   0.00606   0.00763   0.00888
                4.00  -0.00712  -0.00612  -0.00495  -0.00351  -0.00182   0.00000   0.00182   0.00351   0.00495   0.00612   0.00712
               19.00  -0.01307  -0.01206  -0.01070  -0.00852  -0.00492   0.00000   0.00492   0.00852   0.01070   0.01206   0.01307
               42.00  -0.01202  -0.01076  -0.00905  -0.00659  -0.00335   0.00000   0.00335   0.00659   0.00905   0.01076   0.01202
              180.00  -0.00000  -0.00000  -0.00000  -0.00000  -0.00000   0.00000  -0.00000  -0.00000  -0.00000  -0.00000  -0.00000
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            </tableData>
          </table>
          </product>
        </function>
        <function name="aero/coefficient/Cn_rudder">
          <description>Cn increment from rudder (deg), over alpha</description>
          <product>
            <property>aero/qbar-psf</property>
            <property>metrics/Sw-sqft</property>
            <property>metrics/bw-ft</property>
            <property>aero/function/mach-rudder</property>
          <table>
            <independentVar lookup="row">aero/alpha-deg</independentVar>
            <independentVar lookup="column">fcs/rudder-pos-deg</independentVar>
            <tableData>
                        -30.00    -25.00    -20.00    -15.00    -10.00     -5.00      0.00      5.00     10.00     15.00     20.00     25.00     30.00
             -180.00  -0.00000  -0.00000  -0.00000  -0.00000  -0.00000  -0.00000   0.00000  -0.00000  -0.00000  -0.00000  -0.00000  -0.00000  -0.00000
              -35.00   0.01928   0.01766   0.01581   0.01334   0.00981   0.00520   0.00000  -0.00520  -0.00981  -0.01334  -0.01581  -0.01766  -0.01928
              -11.00   0.02403   0.02201   0.01970   0.01662   0.01224   0.00649   0.00000  -0.00649  -0.01224  -0.01662  -0.01970  -0.02202  -0.02403
                4.00   0.02428   0.02228   0.01997   0.01687   0.01244   0.00660   0.00000  -0.00660  -0.01244  -0.01687  -0.01997  -0.02228  -0.02428
               19.00   0.02119   0.01947   0.01746   0.01476   0.01090   0.00578   0.00000  -0.00578  -0.01090  -0.01476  -0.01747  -0.01947  -0.02120
               42.00   0.01808   0.01671   0.01508   0.01281   0.00942   0.00499   0.00000  -0.00499  -0.00942  -0.01281  -0.01507  -0.01671  -0.01808
              180.00  -0.00000  -0.00000  -0.00000  -0.00000  -0.00000  -0.00000   0.00000  -0.00000  -0.00000  -0.00000  -0.00000  -0.00000  -0.00000
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            </tableData>
          </table>
          </product>
        </function>
        <function name="aero/coefficient/Cnp">
          <description>Cn per p (non-dimensional), over alpha</description>
          <product>
            <property>aero/qbar-psf</property>
            <property>metrics/Sw-sqft</property>
            <property>metrics/bw-ft</property>
            <property>aero/bi2vel</property>
            <property>velocities/p-aero-rad_sec</property>
            <property>aero/function/mach-lift</property>
          <table>
            <independentVar lookup="row">aero/alpha-deg</independentVar>
            <tableData>
                 -180.00    0.14186
                 -165.00    0.13847
                  -32.00    0.04257
                  -10.00    0.04353
                    5.00    0.01067
                   20.00    0.01820
                   46.00    0.04771
                  180.00    0.14186
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            </tableData>
          </table>
          </product>
        </function>
        <function name="aero/coefficient/Cnr">
          <description>Cn per r (non-dimensional), over alpha</description>
          <product>
            <property>aero/qbar-psf</property>
            <property>metrics/Sw-sqft</property>
            <property>metrics/bw-ft</property>
            <property>aero/bi2vel</property>
            <property>velocities/r-aero-rad_sec</property>
            <property>aero/function/mach-lift</property>
          <table>
            <independentVar lookup="row">aero/alpha-deg</independentVar>
            <tableData>
                 -180.00   -0.22888
                 -165.00   -0.23160
                  -32.00   -0.18947
                  -10.00   -0.17858
                    5.00   -0.16641
                   20.00   -0.15287
                   46.00   -0.16654
                  180.00   -0.22888
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            </tableData>
          </table>
          </product>
        </function>
      </axis>
    </aerodynamics>
</fdm_config>
