<?xml version="1.0"?>
<fdm_config name="uh1h" version="2.0" release="BETA">
  <fileheader>
    <author> hangar (tools/hangar), from aircraft/uh1h/uh1h.toml </author>
    <description> Bell UH-1H Iroquois - single main rotor, two blades, teetering, Bell stabilizer bar (NASA TM-73254) </description>
    <note> Written by hangar's rotorcraft pipeline from the design file, whose comments cite every number's source. </note>
    <reference refID="fsim/applicability/aerobatic" author="the design" title="The platform's aerobatics are a wing's manoeuvres flown by load factor (docs/flight-autonomy.md, rule R10)" date="n/a"/>
    <reference refID="fsim/applicability/carrier" author="the design" title="A helicopter takes off and lands vertically, as on a ship's deck" date="n/a"/>
    <reference refID="fsim/applicability/drag_devices" author="the design" title="US Army TM 55-1520-210-10: a helicopter, with no spoilers or airbrakes" date="n/a"/>
    <reference refID="fsim/applicability/flaps" author="the design" title="US Army TM 55-1520-210-10: a helicopter, with no flaps" date="n/a"/>
    <reference refID="fsim/applicability/ground_contact" author="the design" title="US Army TM 55-1520-210-10: skid landing gear" date="n/a"/>
    <reference refID="fsim/applicability/releasable_stores" author="the design" title="US Army FM 20-32 (mine/countermine operations): the M56 mine dispensing subsystem on the UH-1H" date="n/a"/>
    <reference refID="fsim/applicability/retractable_gear" author="the design" title="US Army TM 55-1520-210-10: fixed skids" date="n/a"/>
    <reference refID="fsim/applicability/vertical_flight" author="the design" title="US Army TM 55-1520-210-10 (UH-1H operator's manual): a helicopter that hovers" date="n/a"/>
  </fileheader>
  <metrics>
    <wingarea unit="FT2"> 1829.214 </wingarea>
    <wingspan unit="FT"> 48.26 </wingspan>
    <chord unit="FT"> 1.75 </chord>
    <htailarea unit="FT2"> 0 </htailarea> <htailarm unit="FT"> 0 </htailarm>
    <vtailarea unit="FT2"> 0 </vtailarea> <vtailarm unit="FT"> 0 </vtailarm>
    <location name="AERORP" unit="IN"> <x> 140 </x> <y> 0 </y> <z> 55 </z> </location>
    <location name="EYEPOINT" unit="IN"> <x> 140 </x> <y> 0 </y> <z> 55 </z> </location>
    <location name="VRP" unit="IN"> <x> 0 </x> <y> 0 </y> <z> 0 </z> </location>
  </metrics>
  <mass_balance negated_crossproduct_inertia="false">
    <ixx unit="SLUG*FT2"> 2800 </ixx>
    <iyy unit="SLUG*FT2"> 12733 </iyy>
    <izz unit="SLUG*FT2"> 10800 </izz>
    <ixz unit="SLUG*FT2"> 1480 </ixz>
    <emptywt unit="LBS"> 4758 </emptywt>
    <location name="CG" unit="IN"> <x> 140 </x> <y> 0 </y> <z> 55 </z> </location>
  </mass_balance>
  <ground_reactions>
    <contact type="BOGEY" name="skid 0">
      <location unit="IN"> <x> 35 </x> <y> -51.3 </y> <z> -2.6 </z> </location>
      <static_friction> 0.6 </static_friction>
      <dynamic_friction> 0.5 </dynamic_friction>
      <rolling_friction> 0.5 </rolling_friction>
      <spring_coeff unit="LBS/FT"> 5000 </spring_coeff>
      <damping_coeff unit="LBS/FT/SEC"> 500 </damping_coeff>
      <max_steer unit="DEG"> 0 </max_steer>
      <brake_group> NONE </brake_group>
      <retractable> 0 </retractable>
    </contact>
    <contact type="BOGEY" name="skid 1">
      <location unit="IN"> <x> 155 </x> <y> -51.3 </y> <z> -2.6 </z> </location>
      <static_friction> 0.6 </static_friction>
      <dynamic_friction> 0.5 </dynamic_friction>
      <rolling_friction> 0.5 </rolling_friction>
      <spring_coeff unit="LBS/FT"> 35000 </spring_coeff>
      <damping_coeff unit="LBS/FT/SEC"> 3500 </damping_coeff>
      <max_steer unit="DEG"> 0 </max_steer>
      <brake_group> NONE </brake_group>
      <retractable> 0 </retractable>
    </contact>
    <contact type="BOGEY" name="skid 2">
      <location unit="IN"> <x> 35 </x> <y> 51.3 </y> <z> -2.6 </z> </location>
      <static_friction> 0.6 </static_friction>
      <dynamic_friction> 0.5 </dynamic_friction>
      <rolling_friction> 0.5 </rolling_friction>
      <spring_coeff unit="LBS/FT"> 5000 </spring_coeff>
      <damping_coeff unit="LBS/FT/SEC"> 500 </damping_coeff>
      <max_steer unit="DEG"> 0 </max_steer>
      <brake_group> NONE </brake_group>
      <retractable> 0 </retractable>
    </contact>
    <contact type="BOGEY" name="skid 3">
      <location unit="IN"> <x> 155 </x> <y> 51.3 </y> <z> -2.6 </z> </location>
      <static_friction> 0.6 </static_friction>
      <dynamic_friction> 0.5 </dynamic_friction>
      <rolling_friction> 0.5 </rolling_friction>
      <spring_coeff unit="LBS/FT"> 35000 </spring_coeff>
      <damping_coeff unit="LBS/FT/SEC"> 3500 </damping_coeff>
      <max_steer unit="DEG"> 0 </max_steer>
      <brake_group> NONE </brake_group>
      <retractable> 0 </retractable>
    </contact>
    <contact type="STRUCTURE" name="elevator left rear">
      <location unit="IN"> <x> 381.29921 </x> <y> -56.141732 </y> <z> 57.007874 </z> </location>
      <static_friction> 0.8 </static_friction>
      <dynamic_friction> 0.6 </dynamic_friction>
      <spring_coeff unit="N/M"> 248182 </spring_coeff>
      <damping_coeff unit="N/M/SEC"> 8273 </damping_coeff>
      <damping_coeff_rebound unit="N/M/SEC"> 8273 </damping_coeff_rebound>
    </contact>
    <contact type="STRUCTURE" name="elevator right rear">
      <location unit="IN"> <x> 381.29921 </x> <y> 56.141732 </y> <z> 57.007874 </z> </location>
      <static_friction> 0.8 </static_friction>
      <dynamic_friction> 0.6 </dynamic_friction>
      <spring_coeff unit="N/M"> 248182 </spring_coeff>
      <damping_coeff unit="N/M/SEC"> 8273 </damping_coeff>
      <damping_coeff_rebound unit="N/M/SEC"> 8273 </damping_coeff_rebound>
    </contact>
    <contact type="STRUCTURE" name="front cross tube, under the belly left front">
      <location unit="IN"> <x> 40.314961 </x> <y> -36.220472 </y> <z> 12.401575 </z> </location>
      <static_friction> 0.8 </static_friction>
      <dynamic_friction> 0.6 </dynamic_friction>
      <spring_coeff unit="N/M"> 237829 </spring_coeff>
      <damping_coeff unit="N/M/SEC"> 7928 </damping_coeff>
      <damping_coeff_rebound unit="N/M/SEC"> 7928 </damping_coeff_rebound>
    </contact>
    <contact type="STRUCTURE" name="front cross tube, under the belly right front">
      <location unit="IN"> <x> 40.314961 </x> <y> 36.220472 </y> <z> 12.401575 </z> </location>
      <static_friction> 0.8 </static_friction>
      <dynamic_friction> 0.6 </dynamic_friction>
      <spring_coeff unit="N/M"> 237829 </spring_coeff>
      <damping_coeff unit="N/M/SEC"> 7928 </damping_coeff>
      <damping_coeff_rebound unit="N/M/SEC"> 7928 </damping_coeff_rebound>
    </contact>
    <contact type="STRUCTURE" name="fuselage left front">
      <location unit="IN"> <x> 41.062992 </x> <y> -37.411098 </y> <z> 70.565844 </z> </location>
      <static_friction> 0.8 </static_friction>
      <dynamic_friction> 0.6 </dynamic_friction>
      <spring_coeff unit="N/M"> 699619 </spring_coeff>
      <damping_coeff unit="N/M/SEC"> 23321 </damping_coeff>
      <damping_coeff_rebound unit="N/M/SEC"> 23321 </damping_coeff_rebound>
    </contact>
    <contact type="STRUCTURE" name="fuselage left front 2">
      <location unit="IN"> <x> 13.385827 </x> <y> -35.140252 </y> <z> 26.841 </z> </location>
      <static_friction> 0.8 </static_friction>
      <dynamic_friction> 0.6 </dynamic_friction>
      <spring_coeff unit="N/M"> 135061 </spring_coeff>
      <damping_coeff unit="N/M/SEC"> 4502 </damping_coeff>
      <damping_coeff_rebound unit="N/M/SEC"> 4502 </damping_coeff_rebound>
    </contact>
    <contact type="STRUCTURE" name="fuselage left front 3">
      <location unit="IN"> <x> -2.4015748 </x> <y> -23.289652 </y> <z> 40.762627 </z> </location>
      <static_friction> 0.8 </static_friction>
      <dynamic_friction> 0.6 </dynamic_friction>
      <spring_coeff unit="N/M"> 160168 </spring_coeff>
      <damping_coeff unit="N/M/SEC"> 5339 </damping_coeff>
      <damping_coeff_rebound unit="N/M/SEC"> 5339 </damping_coeff_rebound>
    </contact>
    <contact type="STRUCTURE" name="fuselage front">
      <location unit="IN"> <x> -11.889764 </x> <y> 0 </y> <z> 32.992126 </z> </location>
      <static_friction> 0.8 </static_friction>
      <dynamic_friction> 0.6 </dynamic_friction>
      <spring_coeff unit="N/M"> 121614 </spring_coeff>
      <damping_coeff unit="N/M/SEC"> 4054 </damping_coeff>
      <damping_coeff_rebound unit="N/M/SEC"> 4054 </damping_coeff_rebound>
    </contact>
    <contact type="STRUCTURE" name="fuselage right front">
      <location unit="IN"> <x> -2.4015748 </x> <y> 19.811361 </y> <z> 45.108778 </z> </location>
      <static_friction> 0.8 </static_friction>
      <dynamic_friction> 0.6 </dynamic_friction>
      <spring_coeff unit="N/M"> 159698 </spring_coeff>
      <damping_coeff unit="N/M/SEC"> 5323 </damping_coeff>
      <damping_coeff_rebound unit="N/M/SEC"> 5323 </damping_coeff_rebound>
    </contact>
    <contact type="STRUCTURE" name="fuselage right front 2">
      <location unit="IN"> <x> 13.385827 </x> <y> 35.140252 </y> <z> 26.841 </z> </location>
      <static_friction> 0.8 </static_friction>
      <dynamic_friction> 0.6 </dynamic_friction>
      <spring_coeff unit="N/M"> 135061 </spring_coeff>
      <damping_coeff unit="N/M/SEC"> 4502 </damping_coeff>
      <damping_coeff_rebound unit="N/M/SEC"> 4502 </damping_coeff_rebound>
    </contact>
    <contact type="STRUCTURE" name="fuselage right front 3">
      <location unit="IN"> <x> 41.062992 </x> <y> 37.411098 </y> <z> 70.565844 </z> </location>
      <static_friction> 0.8 </static_friction>
      <dynamic_friction> 0.6 </dynamic_friction>
      <spring_coeff unit="N/M"> 699619 </spring_coeff>
      <damping_coeff unit="N/M/SEC"> 23321 </damping_coeff>
      <damping_coeff_rebound unit="N/M/SEC"> 23321 </damping_coeff_rebound>
    </contact>
    <contact type="STRUCTURE" name="main rotor hub front">
      <location unit="IN"> <x> 133.01961 </x> <y> 0 </y> <z> 141.99084 </z> </location>
      <static_friction> 0.8 </static_friction>
      <dynamic_friction> 0.6 </dynamic_friction>
      <spring_coeff unit="N/M"> 478056 </spring_coeff>
      <damping_coeff unit="N/M/SEC"> 15935 </damping_coeff>
      <damping_coeff_rebound unit="N/M/SEC"> 15935 </damping_coeff_rebound>
    </contact>
    <contact type="STRUCTURE" name="rear cross tube, under the belly left front">
      <location unit="IN"> <x> 144.2126 </x> <y> -36.220472 </y> <z> 12.401575 </z> </location>
      <static_friction> 0.8 </static_friction>
      <dynamic_friction> 0.6 </dynamic_friction>
      <spring_coeff unit="N/M"> 427793 </spring_coeff>
      <damping_coeff unit="N/M/SEC"> 14260 </damping_coeff>
      <damping_coeff_rebound unit="N/M/SEC"> 14260 </damping_coeff_rebound>
    </contact>
    <contact type="STRUCTURE" name="rear cross tube, under the belly right front">
      <location unit="IN"> <x> 144.2126 </x> <y> 36.220472 </y> <z> 12.401575 </z> </location>
      <static_friction> 0.8 </static_friction>
      <dynamic_friction> 0.6 </dynamic_friction>
      <spring_coeff unit="N/M"> 427793 </spring_coeff>
      <damping_coeff unit="N/M/SEC"> 14260 </damping_coeff>
      <damping_coeff_rebound unit="N/M/SEC"> 14260 </damping_coeff_rebound>
    </contact>
    <contact type="STRUCTURE" name="tail rotor gearbox rear">
      <location unit="IN"> <x> 485.82677 </x> <y> -2.3622047 </y> <z> 117.32283 </z> </location>
      <static_friction> 0.8 </static_friction>
      <dynamic_friction> 0.6 </dynamic_friction>
      <spring_coeff unit="N/M"> 155876 </spring_coeff>
      <damping_coeff unit="N/M/SEC"> 5196 </damping_coeff>
      <damping_coeff_rebound unit="N/M/SEC"> 5196 </damping_coeff_rebound>
    </contact>
    <contact type="STRUCTURE" name="tail skid rear">
      <location unit="IN"> <x> 483.46457 </x> <y> 0 </y> <z> 51.968504 </z> </location>
      <static_friction> 0.8 </static_friction>
      <dynamic_friction> 0.6 </dynamic_friction>
      <spring_coeff unit="N/M"> 147039 </spring_coeff>
      <damping_coeff unit="N/M/SEC"> 4901 </damping_coeff>
      <damping_coeff_rebound unit="N/M/SEC"> 4901 </damping_coeff_rebound>
    </contact>
  </ground_reactions>
  <external_reactions>
    <!-- The airframe feels the rotors' drive, not their blades. JSBSim applies each rotor's aerodynamic
         torque to the airframe, as though the airframe held the rotor's speed; here the rotor speed is a
         state of the flight control system - the engine's torque less the rotors' spins them up - and the
         engine drives through a freewheel. What the drive does not carry (the rotors' spin-up, and all of
         an air-driven rotor's torque) is given back about the main rotor's shaft. -->
    <moment name="rotor-drive" frame="BODY">
      <function> <product> <value> 1 </value> <property> fcs/uh1h/armed </property>
        <difference> <property> fcs/uh1h/drive-torque </property>
          <sum> <property> propulsion/engine[0]/torque-lbsft </property>
            <product> <property> propulsion/engine[1]/torque-lbsft </property> <value> 5.1365494 </value> </product> </sum>
        </difference> </product> </function>
      <direction> <x> -0.087155743 </x> <y> 0 </y> <z> 0.9961947 </z> </direction>
    </moment>
  </external_reactions>
  <propulsion>
    <engine file="uh1h_engine">
        <feed>0</feed>
      <thruster file="uh1h_rotor">
        <location unit="IN"> <x> 133.5 </x> <y> 0 </y> <z> 136.5 </z> </location>
        <orient unit="DEG"> <roll> 0 </roll> <pitch> 85 </pitch> <yaw> 0 </yaw> </orient>
        <sense> 1 </sense>
      </thruster>
    </engine>
    <engine file="uh1h_tail_drive">
      <thruster file="uh1h_tail_rotor">
        <location unit="IN"> <x> 469.7 </x> <y> -12 </y> <z> 118.7 </z> </location>
        <orient unit="DEG"> <roll> 0 </roll> <pitch> 0 </pitch> <yaw> 90 </yaw> </orient>
        <sense> 1 </sense>
      </thruster>
    </engine>
    <tank type="FUEL">
      <location unit="IN"> <x> 140 </x> <y> 0 </y> <z> 55 </z> </location>
      <capacity unit="LBS"> 1400 </capacity>
      <contents unit="LBS"> 1400 </contents>
    </tank>
  </propulsion>
  <flight_control name="uh1h">
    <!-- the aircraft's profile for the platform (docs/control-architecture.md, section 7, and
         docs/rotorcraft.md): what hangar knows of it - its design and its flight tests -->
    <property value="2">fsim/identity/version</property>
    <property value="1">fsim/identity/provenance</property>
    <property value="12">fsim/identity/class</property>
    <property value="3">fsim/identity/family</property>
    <property value="2">fsim/effectors/version</property>
    <property value="1">fsim/effectors/provenance</property>
    <property value="0">fsim/effectors/flaps</property>
    <property value="0">fsim/effectors/neutral</property>
    <property value="3">fsim/effectors/pitch</property>
    <property value="0">fsim/effectors/pitch_trim</property>
    <property value="0">fsim/effectors/retractable_gear</property>
    <property value="2">fsim/effectors/roll</property>
    <property value="0">fsim/effectors/speedbrake</property>
    <property value="1">fsim/effectors/thrust</property>
    <property value="0">fsim/effectors/wheel_brakes</property>
    <property value="2">fsim/effectors/yaw</property>
    <property value="1">fsim/envelope/version</property>
    <property value="1">fsim/envelope/provenance</property>
    <property value="45">fsim/envelope/clean/bank_max_deg</property>
    <property value="63.7911">fsim/envelope/clean/cas_max_ms</property>
    <property value="30">fsim/envelope/clean/pitch_max_deg</property>
    <property value="-30">fsim/envelope/clean/pitch_min_deg</property>
    <property value="60">fsim/envelope/clean/roll_rate_max_deg_s</property>
    <property value="15.43">fsim/envelope/crosswind_max_ms</property>
    <property value="2">fsim/propulsion/version</property>
    <property value="1">fsim/propulsion/provenance</property>
    <property value="1">fsim/propulsion/engines</property>
    <property value="5">fsim/propulsion/type</property>
    <property value="1">fsim/hover/version</property>
    <property value="1">fsim/hover/provenance</property>
    <property value="0.154113">fsim/hover/aileron_trim</property>
    <property value="100">fsim/hover/altitude_m</property>
    <property value="-0.00433051">fsim/hover/elevator_trim</property>
    <property value="0.4364">fsim/hover/heave/damping</property>
    <property value="0.2">fsim/hover/heave/lag_s</property>
    <property value="35.2157">fsim/hover/heave/power</property>
    <property value="2793.22">fsim/hover/mass_kg</property>
    <property value="0.453848">fsim/hover/pitch/damping</property>
    <property value="0.144">fsim/hover/pitch/lag_s</property>
    <property value="-0.704024">fsim/hover/pitch/power</property>
    <property value="4.58023">fsim/hover/pitch_attitude_deg</property>
    <property value="2.69544">fsim/hover/roll/damping</property>
    <property value="0.144">fsim/hover/roll/lag_s</property>
    <property value="3.5151">fsim/hover/roll/power</property>
    <property value="-1.68844">fsim/hover/roll_attitude_deg</property>
    <property value="-0.0267006">fsim/hover/rudder_trim</property>
    <property value="0.354523">fsim/hover/throttle_trim</property>
    <property value="1.29737">fsim/hover/yaw/damping</property>
    <property value="0.022973">fsim/hover/yaw/lag_s</property>
    <property value="-2.64693">fsim/hover/yaw/power</property>
    <property value="1">fsim/tables/version</property>
    <property value="1">fsim/tables/provenance</property>
    <property value="100">fsim/tables/altitude_m/h0</property>
    <property value="1000">fsim/tables/altitude_m/h1</property>
    <property value="2000">fsim/tables/altitude_m/h2</property>
    <property value="3000">fsim/tables/altitude_m/h3</property>
    <property value="0.0267965">fsim/tables/best_endurance_fuel_kg_s/h0/w0</property>
    <property value="0.0285022">fsim/tables/best_endurance_fuel_kg_s/h0/w1</property>
    <property value="0.0303239">fsim/tables/best_endurance_fuel_kg_s/h0/w2</property>
    <property value="0.0257745">fsim/tables/best_endurance_fuel_kg_s/h1/w0</property>
    <property value="0.0275977">fsim/tables/best_endurance_fuel_kg_s/h1/w1</property>
    <property value="0.0295453">fsim/tables/best_endurance_fuel_kg_s/h1/w2</property>
    <property value="0.0248209">fsim/tables/best_endurance_fuel_kg_s/h2/w0</property>
    <property value="0.026788">fsim/tables/best_endurance_fuel_kg_s/h2/w1</property>
    <property value="0.0288902">fsim/tables/best_endurance_fuel_kg_s/h2/w2</property>
    <property value="0.024068">fsim/tables/best_endurance_fuel_kg_s/h3/w0</property>
    <property value="0.0261878">fsim/tables/best_endurance_fuel_kg_s/h3/w1</property>
    <property value="0.0284625">fsim/tables/best_endurance_fuel_kg_s/h3/w2</property>
    <property value="22.602">fsim/tables/best_endurance_tas_ms/h0/w0</property>
    <property value="23.9165">fsim/tables/best_endurance_tas_ms/h0/w1</property>
    <property value="25.1809">fsim/tables/best_endurance_tas_ms/h0/w2</property>
    <property value="23.1515">fsim/tables/best_endurance_tas_ms/h1/w0</property>
    <property value="24.5119">fsim/tables/best_endurance_tas_ms/h1/w1</property>
    <property value="25.7978">fsim/tables/best_endurance_tas_ms/h1/w2</property>
    <property value="23.7766">fsim/tables/best_endurance_tas_ms/h2/w0</property>
    <property value="25.1939">fsim/tables/best_endurance_tas_ms/h2/w1</property>
    <property value="26.5024">fsim/tables/best_endurance_tas_ms/h2/w2</property>
    <property value="24.4472">fsim/tables/best_endurance_tas_ms/h3/w0</property>
    <property value="25.8983">fsim/tables/best_endurance_tas_ms/h3/w1</property>
    <property value="27.2255">fsim/tables/best_endurance_tas_ms/h3/w2</property>
    <property value="0.0333435">fsim/tables/best_range_fuel_kg_s/h0/w0</property>
    <property value="0.0350576">fsim/tables/best_range_fuel_kg_s/h0/w1</property>
    <property value="0.0370001">fsim/tables/best_range_fuel_kg_s/h0/w2</property>
    <property value="0.0319576">fsim/tables/best_range_fuel_kg_s/h1/w0</property>
    <property value="0.0338175">fsim/tables/best_range_fuel_kg_s/h1/w1</property>
    <property value="0.0358098">fsim/tables/best_range_fuel_kg_s/h1/w2</property>
    <property value="0.0306166">fsim/tables/best_range_fuel_kg_s/h2/w0</property>
    <property value="0.0326609">fsim/tables/best_range_fuel_kg_s/h2/w1</property>
    <property value="0.0348378">fsim/tables/best_range_fuel_kg_s/h2/w2</property>
    <property value="0.0294961">fsim/tables/best_range_fuel_kg_s/h3/w0</property>
    <property value="0.0317429">fsim/tables/best_range_fuel_kg_s/h3/w1</property>
    <property value="0.0341293">fsim/tables/best_range_fuel_kg_s/h3/w2</property>
    <property value="38.6083">fsim/tables/best_range_tas_ms/h0/w0</property>
    <property value="39.4827">fsim/tables/best_range_tas_ms/h0/w1</property>
    <property value="40.3323">fsim/tables/best_range_tas_ms/h0/w2</property>
    <property value="38.6364">fsim/tables/best_range_tas_ms/h1/w0</property>
    <property value="39.5598">fsim/tables/best_range_tas_ms/h1/w1</property>
    <property value="40.4605">fsim/tables/best_range_tas_ms/h1/w2</property>
    <property value="38.6927">fsim/tables/best_range_tas_ms/h2/w0</property>
    <property value="39.6851">fsim/tables/best_range_tas_ms/h2/w1</property>
    <property value="40.6536">fsim/tables/best_range_tas_ms/h2/w2</property>
    <property value="38.7807">fsim/tables/best_range_tas_ms/h3/w0</property>
    <property value="39.857">fsim/tables/best_range_tas_ms/h3/w1</property>
    <property value="40.9011">fsim/tables/best_range_tas_ms/h3/w2</property>
    <property value="12.2163">fsim/tables/climb_tas_ms/h0/w0</property>
    <property value="14.7646">fsim/tables/climb_tas_ms/h0/w1</property>
    <property value="17.6124">fsim/tables/climb_tas_ms/h0/w2</property>
    <property value="12.6325">fsim/tables/climb_tas_ms/h1/w0</property>
    <property value="15.2268">fsim/tables/climb_tas_ms/h1/w1</property>
    <property value="18.1156">fsim/tables/climb_tas_ms/h1/w2</property>
    <property value="13.044">fsim/tables/climb_tas_ms/h2/w0</property>
    <property value="15.8165">fsim/tables/climb_tas_ms/h2/w1</property>
    <property value="18.7402">fsim/tables/climb_tas_ms/h2/w2</property>
    <property value="13.4924">fsim/tables/climb_tas_ms/h3/w0</property>
    <property value="16.512">fsim/tables/climb_tas_ms/h3/w1</property>
    <property value="19.4452">fsim/tables/climb_tas_ms/h3/w2</property>
    <property value="635.029">fsim/tables/fuel_capacity_kg</property>
    <property value="0.0371068">fsim/tables/fuel_kg_s/h0/w0/v0</property>
    <property value="0.0360504">fsim/tables/fuel_kg_s/h0/w0/v1</property>
    <property value="0.0310704">fsim/tables/fuel_kg_s/h0/w0/v10</property>
    <property value="0.033798">fsim/tables/fuel_kg_s/h0/w0/v11</property>
    <property value="0.0377238">fsim/tables/fuel_kg_s/h0/w0/v12</property>
    <property value="0.043538">fsim/tables/fuel_kg_s/h0/w0/v13</property>
    <property value="0.0526852">fsim/tables/fuel_kg_s/h0/w0/v14</property>
    <property value="0.0684882">fsim/tables/fuel_kg_s/h0/w0/v15</property>
    <property value="0.033391">fsim/tables/fuel_kg_s/h0/w0/v2</property>
    <property value="0.0305324">fsim/tables/fuel_kg_s/h0/w0/v3</property>
    <property value="0.0284777">fsim/tables/fuel_kg_s/h0/w0/v4</property>
    <property value="0.0273039">fsim/tables/fuel_kg_s/h0/w0/v5</property>
    <property value="0.0268285">fsim/tables/fuel_kg_s/h0/w0/v6</property>
    <property value="0.026922">fsim/tables/fuel_kg_s/h0/w0/v7</property>
    <property value="0.0275411">fsim/tables/fuel_kg_s/h0/w0/v8</property>
    <property value="0.0291963">fsim/tables/fuel_kg_s/h0/w0/v9</property>
    <property value="0.04085">fsim/tables/fuel_kg_s/h0/w1/v0</property>
    <property value="0.0396944">fsim/tables/fuel_kg_s/h0/w1/v1</property>
    <property value="0.0324593">fsim/tables/fuel_kg_s/h0/w1/v10</property>
    <property value="0.0351769">fsim/tables/fuel_kg_s/h0/w1/v11</property>
    <property value="0.0390675">fsim/tables/fuel_kg_s/h0/w1/v12</property>
    <property value="0.0447459">fsim/tables/fuel_kg_s/h0/w1/v13</property>
    <property value="0.0534683">fsim/tables/fuel_kg_s/h0/w1/v14</property>
    <property value="0.0682256">fsim/tables/fuel_kg_s/h0/w1/v15</property>
    <property value="0.0367292">fsim/tables/fuel_kg_s/h0/w1/v2</property>
    <property value="0.0333979">fsim/tables/fuel_kg_s/h0/w1/v3</property>
    <property value="0.0308789">fsim/tables/fuel_kg_s/h0/w1/v4</property>
    <property value="0.0293445">fsim/tables/fuel_kg_s/h0/w1/v5</property>
    <property value="0.0286181">fsim/tables/fuel_kg_s/h0/w1/v6</property>
    <property value="0.0285426">fsim/tables/fuel_kg_s/h0/w1/v7</property>
    <property value="0.0290532">fsim/tables/fuel_kg_s/h0/w1/v8</property>
    <property value="0.0306126">fsim/tables/fuel_kg_s/h0/w1/v9</property>
    <property value="0.0448386">fsim/tables/fuel_kg_s/h0/w2/v0</property>
    <property value="0.0435889">fsim/tables/fuel_kg_s/h0/w2/v1</property>
    <property value="0.0339502">fsim/tables/fuel_kg_s/h0/w2/v10</property>
    <property value="0.0366406">fsim/tables/fuel_kg_s/h0/w2/v11</property>
    <property value="0.0404867">fsim/tables/fuel_kg_s/h0/w2/v12</property>
    <property value="0.0460504">fsim/tables/fuel_kg_s/h0/w2/v13</property>
    <property value="0.054406">fsim/tables/fuel_kg_s/h0/w2/v14</property>
    <property value="0.068238">fsim/tables/fuel_kg_s/h0/w2/v15</property>
    <property value="0.0403322">fsim/tables/fuel_kg_s/h0/w2/v2</property>
    <property value="0.0365348">fsim/tables/fuel_kg_s/h0/w2/v3</property>
    <property value="0.033535">fsim/tables/fuel_kg_s/h0/w2/v4</property>
    <property value="0.0316055">fsim/tables/fuel_kg_s/h0/w2/v5</property>
    <property value="0.0305973">fsim/tables/fuel_kg_s/h0/w2/v6</property>
    <property value="0.0303262">fsim/tables/fuel_kg_s/h0/w2/v7</property>
    <property value="0.030705">fsim/tables/fuel_kg_s/h0/w2/v8</property>
    <property value="0.0321523">fsim/tables/fuel_kg_s/h0/w2/v9</property>
    <property value="0.036407">fsim/tables/fuel_kg_s/h1/w0/v0</property>
    <property value="0.0353644">fsim/tables/fuel_kg_s/h1/w0/v1</property>
    <property value="0.0300242">fsim/tables/fuel_kg_s/h1/w0/v10</property>
    <property value="0.032807">fsim/tables/fuel_kg_s/h1/w0/v11</property>
    <property value="0.036817">fsim/tables/fuel_kg_s/h1/w0/v12</property>
    <property value="0.0427388">fsim/tables/fuel_kg_s/h1/w0/v13</property>
    <property value="0.0519829">fsim/tables/fuel_kg_s/h1/w0/v14</property>
    <property value="0.0678262">fsim/tables/fuel_kg_s/h1/w0/v15</property>
    <property value="0.0327106">fsim/tables/fuel_kg_s/h1/w0/v2</property>
    <property value="0.0297853">fsim/tables/fuel_kg_s/h1/w0/v3</property>
    <property value="0.0276262">fsim/tables/fuel_kg_s/h1/w0/v4</property>
    <property value="0.0263603">fsim/tables/fuel_kg_s/h1/w0/v5</property>
    <property value="0.0258227">fsim/tables/fuel_kg_s/h1/w0/v6</property>
    <property value="0.0258809">fsim/tables/fuel_kg_s/h1/w0/v7</property>
    <property value="0.0264877">fsim/tables/fuel_kg_s/h1/w0/v8</property>
    <property value="0.0281175">fsim/tables/fuel_kg_s/h1/w0/v9</property>
    <property value="0.0403355">fsim/tables/fuel_kg_s/h1/w1/v0</property>
    <property value="0.0391949">fsim/tables/fuel_kg_s/h1/w1/v1</property>
    <property value="0.031518">fsim/tables/fuel_kg_s/h1/w1/v10</property>
    <property value="0.0342862">fsim/tables/fuel_kg_s/h1/w1/v11</property>
    <property value="0.0382611">fsim/tables/fuel_kg_s/h1/w1/v12</property>
    <property value="0.0440497">fsim/tables/fuel_kg_s/h1/w1/v13</property>
    <property value="0.0528853">fsim/tables/fuel_kg_s/h1/w1/v14</property>
    <property value="0.0676944">fsim/tables/fuel_kg_s/h1/w1/v15</property>
    <property value="0.0362395">fsim/tables/fuel_kg_s/h1/w1/v2</property>
    <property value="0.0328408">fsim/tables/fuel_kg_s/h1/w1/v3</property>
    <property value="0.030203">fsim/tables/fuel_kg_s/h1/w1/v4</property>
    <property value="0.0285562">fsim/tables/fuel_kg_s/h1/w1/v5</property>
    <property value="0.0277493">fsim/tables/fuel_kg_s/h1/w1/v6</property>
    <property value="0.0276247">fsim/tables/fuel_kg_s/h1/w1/v7</property>
    <property value="0.0281128">fsim/tables/fuel_kg_s/h1/w1/v8</property>
    <property value="0.0296452">fsim/tables/fuel_kg_s/h1/w1/v9</property>
    <property value="0.0445232">fsim/tables/fuel_kg_s/h1/w2/v0</property>
    <property value="0.0432897">fsim/tables/fuel_kg_s/h1/w2/v1</property>
    <property value="0.0331248">fsim/tables/fuel_kg_s/h1/w2/v10</property>
    <property value="0.0358613">fsim/tables/fuel_kg_s/h1/w2/v11</property>
    <property value="0.0397949">fsim/tables/fuel_kg_s/h1/w2/v12</property>
    <property value="0.0454668">fsim/tables/fuel_kg_s/h1/w2/v13</property>
    <property value="0.0539523">fsim/tables/fuel_kg_s/h1/w2/v14</property>
    <property value="0.0678618">fsim/tables/fuel_kg_s/h1/w2/v15</property>
    <property value="0.0400466">fsim/tables/fuel_kg_s/h1/w2/v2</property>
    <property value="0.0361827">fsim/tables/fuel_kg_s/h1/w2/v3</property>
    <property value="0.0330506">fsim/tables/fuel_kg_s/h1/w2/v4</property>
    <property value="0.0309889">fsim/tables/fuel_kg_s/h1/w2/v5</property>
    <property value="0.0298808">fsim/tables/fuel_kg_s/h1/w2/v6</property>
    <property value="0.0295454">fsim/tables/fuel_kg_s/h1/w2/v7</property>
    <property value="0.0298902">fsim/tables/fuel_kg_s/h1/w2/v8</property>
    <property value="0.0313076">fsim/tables/fuel_kg_s/h1/w2/v9</property>
    <property value="0.0358278">fsim/tables/fuel_kg_s/h2/w0/v0</property>
    <property value="0.0348044">fsim/tables/fuel_kg_s/h2/w0/v1</property>
    <property value="0.0290127">fsim/tables/fuel_kg_s/h2/w0/v10</property>
    <property value="0.0318391">fsim/tables/fuel_kg_s/h2/w0/v11</property>
    <property value="0.0359185">fsim/tables/fuel_kg_s/h2/w0/v12</property>
    <property value="0.0419216">fsim/tables/fuel_kg_s/h2/w0/v13</property>
    <property value="0.0512138">fsim/tables/fuel_kg_s/h2/w0/v14</property>
    <property value="0.0669911">fsim/tables/fuel_kg_s/h2/w0/v15</property>
    <property value="0.0321674">fsim/tables/fuel_kg_s/h2/w0/v2</property>
    <property value="0.0291751">fsim/tables/fuel_kg_s/h2/w0/v3</property>
    <property value="0.0268926">fsim/tables/fuel_kg_s/h2/w0/v4</property>
    <property value="0.0255146">fsim/tables/fuel_kg_s/h2/w0/v5</property>
    <property value="0.0248954">fsim/tables/fuel_kg_s/h2/w0/v6</property>
    <property value="0.0249031">fsim/tables/fuel_kg_s/h2/w0/v7</property>
    <property value="0.0254854">fsim/tables/fuel_kg_s/h2/w0/v8</property>
    <property value="0.0270851">fsim/tables/fuel_kg_s/h2/w0/v9</property>
    <property value="0.0399795">fsim/tables/fuel_kg_s/h2/w1/v0</property>
    <property value="0.0388599">fsim/tables/fuel_kg_s/h2/w1/v1</property>
    <property value="0.030636">fsim/tables/fuel_kg_s/h2/w1/v10</property>
    <property value="0.0334427">fsim/tables/fuel_kg_s/h2/w1/v11</property>
    <property value="0.037486">fsim/tables/fuel_kg_s/h2/w1/v12</property>
    <property value="0.0433614">fsim/tables/fuel_kg_s/h2/w1/v13</property>
    <property value="0.0522658">fsim/tables/fuel_kg_s/h2/w1/v14</property>
    <property value="0.0670356">fsim/tables/fuel_kg_s/h2/w1/v15</property>
    <property value="0.0359267">fsim/tables/fuel_kg_s/h2/w1/v2</property>
    <property value="0.0324627">fsim/tables/fuel_kg_s/h2/w1/v3</property>
    <property value="0.0296922">fsim/tables/fuel_kg_s/h2/w1/v4</property>
    <property value="0.0279039">fsim/tables/fuel_kg_s/h2/w1/v5</property>
    <property value="0.0269935">fsim/tables/fuel_kg_s/h2/w1/v6</property>
    <property value="0.026801">fsim/tables/fuel_kg_s/h2/w1/v7</property>
    <property value="0.0272516">fsim/tables/fuel_kg_s/h2/w1/v8</property>
    <property value="0.0287501">fsim/tables/fuel_kg_s/h2/w1/v9</property>
    <property value="0.0444075">fsim/tables/fuel_kg_s/h2/w2/v0</property>
    <property value="0.0432014">fsim/tables/fuel_kg_s/h2/w2/v1</property>
    <property value="0.0323378">fsim/tables/fuel_kg_s/h2/w2/v10</property>
    <property value="0.0350771">fsim/tables/fuel_kg_s/h2/w2/v11</property>
    <property value="0.0390327">fsim/tables/fuel_kg_s/h2/w2/v12</property>
    <property value="0.0447257">fsim/tables/fuel_kg_s/h2/w2/v13</property>
    <property value="0.0531754">fsim/tables/fuel_kg_s/h2/w2/v14</property>
    <property value="0.0668184">fsim/tables/fuel_kg_s/h2/w2/v15</property>
    <property value="0.0399971">fsim/tables/fuel_kg_s/h2/w2/v2</property>
    <property value="0.036079">fsim/tables/fuel_kg_s/h2/w2/v3</property>
    <property value="0.0327943">fsim/tables/fuel_kg_s/h2/w2/v4</property>
    <property value="0.0305692">fsim/tables/fuel_kg_s/h2/w2/v5</property>
    <property value="0.0293262">fsim/tables/fuel_kg_s/h2/w2/v6</property>
    <property value="0.0288942">fsim/tables/fuel_kg_s/h2/w2/v7</property>
    <property value="0.0291751">fsim/tables/fuel_kg_s/h2/w2/v8</property>
    <property value="0.0305374">fsim/tables/fuel_kg_s/h2/w2/v9</property>
    <property value="0.0354606">fsim/tables/fuel_kg_s/h3/w0/v0</property>
    <property value="0.0344615">fsim/tables/fuel_kg_s/h3/w0/v1</property>
    <property value="0.028146">fsim/tables/fuel_kg_s/h3/w0/v10</property>
    <property value="0.0309885">fsim/tables/fuel_kg_s/h3/w0/v11</property>
    <property value="0.0350989">fsim/tables/fuel_kg_s/h3/w0/v12</property>
    <property value="0.0411238">fsim/tables/fuel_kg_s/h3/w0/v13</property>
    <property value="0.0503691">fsim/tables/fuel_kg_s/h3/w0/v14</property>
    <property value="0.0658975">fsim/tables/fuel_kg_s/h3/w0/v15</property>
    <property value="0.0318548">fsim/tables/fuel_kg_s/h3/w0/v2</property>
    <property value="0.0288069">fsim/tables/fuel_kg_s/h3/w0/v3</property>
    <property value="0.0264057">fsim/tables/fuel_kg_s/h3/w0/v4</property>
    <property value="0.0248923">fsim/tables/fuel_kg_s/h3/w0/v5</property>
    <property value="0.0241752">fsim/tables/fuel_kg_s/h3/w0/v6</property>
    <property value="0.0241166">fsim/tables/fuel_kg_s/h3/w0/v7</property>
    <property value="0.0246587">fsim/tables/fuel_kg_s/h3/w0/v8</property>
    <property value="0.0262185">fsim/tables/fuel_kg_s/h3/w0/v9</property>
    <property value="0.0398561">fsim/tables/fuel_kg_s/h3/w1/v0</property>
    <property value="0.0387674">fsim/tables/fuel_kg_s/h3/w1/v1</property>
    <property value="0.0298659">fsim/tables/fuel_kg_s/h3/w1/v10</property>
    <property value="0.0326528">fsim/tables/fuel_kg_s/h3/w1/v11</property>
    <property value="0.0366809">fsim/tables/fuel_kg_s/h3/w1/v12</property>
    <property value="0.0425124">fsim/tables/fuel_kg_s/h3/w1/v13</property>
    <property value="0.0512634">fsim/tables/fuel_kg_s/h3/w1/v14</property>
    <property value="0.065548">fsim/tables/fuel_kg_s/h3/w1/v15</property>
    <property value="0.0358815">fsim/tables/fuel_kg_s/h3/w1/v2</property>
    <property value="0.0323734">fsim/tables/fuel_kg_s/h3/w1/v3</property>
    <property value="0.029461">fsim/tables/fuel_kg_s/h3/w1/v4</property>
    <property value="0.0275176">fsim/tables/fuel_kg_s/h3/w1/v5</property>
    <property value="0.0264773">fsim/tables/fuel_kg_s/h3/w1/v6</property>
    <property value="0.0261895">fsim/tables/fuel_kg_s/h3/w1/v7</property>
    <property value="0.0265732">fsim/tables/fuel_kg_s/h3/w1/v8</property>
    <property value="0.0280103">fsim/tables/fuel_kg_s/h3/w1/v9</property>
    <property value="0.0445466">fsim/tables/fuel_kg_s/h3/w2/v0</property>
    <property value="0.0433734">fsim/tables/fuel_kg_s/h3/w2/v1</property>
    <property value="0.0317328">fsim/tables/fuel_kg_s/h3/w2/v10</property>
    <property value="0.0344457">fsim/tables/fuel_kg_s/h3/w2/v11</property>
    <property value="0.0383861">fsim/tables/fuel_kg_s/h3/w2/v12</property>
    <property value="0.044047">fsim/tables/fuel_kg_s/h3/w2/v13</property>
    <property value="0.0523843">fsim/tables/fuel_kg_s/h3/w2/v14</property>
    <property value="0.0656413">fsim/tables/fuel_kg_s/h3/w2/v15</property>
    <property value="0.0402236">fsim/tables/fuel_kg_s/h3/w2/v2</property>
    <property value="0.0362699">fsim/tables/fuel_kg_s/h3/w2/v3</property>
    <property value="0.0328332">fsim/tables/fuel_kg_s/h3/w2/v4</property>
    <property value="0.0304323">fsim/tables/fuel_kg_s/h3/w2/v5</property>
    <property value="0.029033">fsim/tables/fuel_kg_s/h3/w2/v6</property>
    <property value="0.0284833">fsim/tables/fuel_kg_s/h3/w2/v7</property>
    <property value="0.0286798">fsim/tables/fuel_kg_s/h3/w2/v8</property>
    <property value="0.0299732">fsim/tables/fuel_kg_s/h3/w2/v9</property>
    <property value="16.3426">fsim/tables/max_climb_ms/h0/w0</property>
    <property value="15.009">fsim/tables/max_climb_ms/h0/w1</property>
    <property value="13.7487">fsim/tables/max_climb_ms/h0/w2</property>
    <property value="16.3835">fsim/tables/max_climb_ms/h1/w0</property>
    <property value="15.0332">fsim/tables/max_climb_ms/h1/w1</property>
    <property value="13.757">fsim/tables/max_climb_ms/h1/w2</property>
    <property value="16.3859">fsim/tables/max_climb_ms/h2/w0</property>
    <property value="15.0109">fsim/tables/max_climb_ms/h2/w1</property>
    <property value="13.7157">fsim/tables/max_climb_ms/h2/w2</property>
    <property value="16.3341">fsim/tables/max_climb_ms/h3/w0</property>
    <property value="14.9369">fsim/tables/max_climb_ms/h3/w1</property>
    <property value="13.6209">fsim/tables/max_climb_ms/h3/w2</property>
    <property value="55.125">fsim/tables/max_tas_ms/h0/w0</property>
    <property value="55.75">fsim/tables/max_tas_ms/h0/w1</property>
    <property value="56.25">fsim/tables/max_tas_ms/h0/w2</property>
    <property value="55.875">fsim/tables/max_tas_ms/h1/w0</property>
    <property value="56.5">fsim/tables/max_tas_ms/h1/w1</property>
    <property value="57">fsim/tables/max_tas_ms/h1/w2</property>
    <property value="56.625">fsim/tables/max_tas_ms/h2/w0</property>
    <property value="57.25">fsim/tables/max_tas_ms/h2/w1</property>
    <property value="57.625">fsim/tables/max_tas_ms/h2/w2</property>
    <property value="57.25">fsim/tables/max_tas_ms/h3/w0</property>
    <property value="57.75">fsim/tables/max_tas_ms/h3/w1</property>
    <property value="58.125">fsim/tables/max_tas_ms/h3/w2</property>
    <property value="0">fsim/tables/min_tas_ms/h0/w0</property>
    <property value="0">fsim/tables/min_tas_ms/h0/w1</property>
    <property value="0">fsim/tables/min_tas_ms/h0/w2</property>
    <property value="0">fsim/tables/min_tas_ms/h1/w0</property>
    <property value="0">fsim/tables/min_tas_ms/h1/w1</property>
    <property value="0">fsim/tables/min_tas_ms/h1/w2</property>
    <property value="0">fsim/tables/min_tas_ms/h2/w0</property>
    <property value="0">fsim/tables/min_tas_ms/h2/w1</property>
    <property value="0">fsim/tables/min_tas_ms/h2/w2</property>
    <property value="0">fsim/tables/min_tas_ms/h3/w0</property>
    <property value="0">fsim/tables/min_tas_ms/h3/w1</property>
    <property value="0">fsim/tables/min_tas_ms/h3/w2</property>
    <property value="16.1548">fsim/tables/ps_full_ms/h0/w0/v0</property>
    <property value="16.1957">fsim/tables/ps_full_ms/h0/w0/v1</property>
    <property value="13.1445">fsim/tables/ps_full_ms/h0/w0/v10</property>
    <property value="12.1246">fsim/tables/ps_full_ms/h0/w0/v11</property>
    <property value="10.8737">fsim/tables/ps_full_ms/h0/w0/v12</property>
    <property value="9.18954">fsim/tables/ps_full_ms/h0/w0/v13</property>
    <property value="6.52008">fsim/tables/ps_full_ms/h0/w0/v14</property>
    <property value="2.96969">fsim/tables/ps_full_ms/h0/w0/v15</property>
    <property value="16.2816">fsim/tables/ps_full_ms/h0/w0/v2</property>
    <property value="16.3372">fsim/tables/ps_full_ms/h0/w0/v3</property>
    <property value="16.3326">fsim/tables/ps_full_ms/h0/w0/v4</property>
    <property value="16.2351">fsim/tables/ps_full_ms/h0/w0/v5</property>
    <property value="16.017">fsim/tables/ps_full_ms/h0/w0/v6</property>
    <property value="15.6577">fsim/tables/ps_full_ms/h0/w0/v7</property>
    <property value="15.1425">fsim/tables/ps_full_ms/h0/w0/v8</property>
    <property value="13.9534">fsim/tables/ps_full_ms/h0/w0/v9</property>
    <property value="14.7544">fsim/tables/ps_full_ms/h0/w1/v0</property>
    <property value="14.7886">fsim/tables/ps_full_ms/h0/w1/v1</property>
    <property value="12.2861">fsim/tables/ps_full_ms/h0/w1/v10</property>
    <property value="11.3641">fsim/tables/ps_full_ms/h0/w1/v11</property>
    <property value="10.1904">fsim/tables/ps_full_ms/h0/w1/v12</property>
    <property value="8.50056">fsim/tables/ps_full_ms/h0/w1/v13</property>
    <property value="6.09845">fsim/tables/ps_full_ms/h0/w1/v14</property>
    <property value="2.91151">fsim/tables/ps_full_ms/h0/w1/v15</property>
    <property value="14.8741">fsim/tables/ps_full_ms/h0/w1/v2</property>
    <property value="14.9612">fsim/tables/ps_full_ms/h0/w1/v3</property>
    <property value="15.0087">fsim/tables/ps_full_ms/h0/w1/v4</property>
    <property value="14.976">fsim/tables/ps_full_ms/h0/w1/v5</property>
    <property value="14.8317">fsim/tables/ps_full_ms/h0/w1/v6</property>
    <property value="14.5542">fsim/tables/ps_full_ms/h0/w1/v7</property>
    <property value="14.1286">fsim/tables/ps_full_ms/h0/w1/v8</property>
    <property value="13.0043">fsim/tables/ps_full_ms/h0/w1/v9</property>
    <property value="13.3309">fsim/tables/ps_full_ms/h0/w2/v0</property>
    <property value="13.3612">fsim/tables/ps_full_ms/h0/w2/v1</property>
    <property value="11.4393">fsim/tables/ps_full_ms/h0/w2/v10</property>
    <property value="10.6018">fsim/tables/ps_full_ms/h0/w2/v11</property>
    <property value="9.51457">fsim/tables/ps_full_ms/h0/w2/v12</property>
    <property value="7.84799">fsim/tables/ps_full_ms/h0/w2/v13</property>
    <property value="5.65815">fsim/tables/ps_full_ms/h0/w2/v14</property>
    <property value="2.79239">fsim/tables/ps_full_ms/h0/w2/v15</property>
    <property value="13.4656">fsim/tables/ps_full_ms/h0/w2/v2</property>
    <property value="13.6004">fsim/tables/ps_full_ms/h0/w2/v3</property>
    <property value="13.7106">fsim/tables/ps_full_ms/h0/w2/v4</property>
    <property value="13.7472">fsim/tables/ps_full_ms/h0/w2/v5</property>
    <property value="13.6757">fsim/tables/ps_full_ms/h0/w2/v6</property>
    <property value="13.4741">fsim/tables/ps_full_ms/h0/w2/v7</property>
    <property value="13.128">fsim/tables/ps_full_ms/h0/w2/v8</property>
    <property value="12.0793">fsim/tables/ps_full_ms/h0/w2/v9</property>
    <property value="16.1819">fsim/tables/ps_full_ms/h1/w0/v0</property>
    <property value="16.2264">fsim/tables/ps_full_ms/h1/w0/v1</property>
    <property value="13.177">fsim/tables/ps_full_ms/h1/w0/v10</property>
    <property value="12.1507">fsim/tables/ps_full_ms/h1/w0/v11</property>
    <property value="10.8942">fsim/tables/ps_full_ms/h1/w0/v12</property>
    <property value="9.22682">fsim/tables/ps_full_ms/h1/w0/v13</property>
    <property value="6.5555">fsim/tables/ps_full_ms/h1/w0/v14</property>
    <property value="3.01768">fsim/tables/ps_full_ms/h1/w0/v15</property>
    <property value="16.3162">fsim/tables/ps_full_ms/h1/w0/v2</property>
    <property value="16.3761">fsim/tables/ps_full_ms/h1/w0/v3</property>
    <property value="16.3758">fsim/tables/ps_full_ms/h1/w0/v4</property>
    <property value="16.2812">fsim/tables/ps_full_ms/h1/w0/v5</property>
    <property value="16.064">fsim/tables/ps_full_ms/h1/w0/v6</property>
    <property value="15.7031">fsim/tables/ps_full_ms/h1/w0/v7</property>
    <property value="15.1836">fsim/tables/ps_full_ms/h1/w0/v8</property>
    <property value="13.9935">fsim/tables/ps_full_ms/h1/w0/v9</property>
    <property value="14.7597">fsim/tables/ps_full_ms/h1/w1/v0</property>
    <property value="14.7969">fsim/tables/ps_full_ms/h1/w1/v1</property>
    <property value="12.3165">fsim/tables/ps_full_ms/h1/w1/v10</property>
    <property value="11.392">fsim/tables/ps_full_ms/h1/w1/v11</property>
    <property value="10.2141">fsim/tables/ps_full_ms/h1/w1/v12</property>
    <property value="8.53272">fsim/tables/ps_full_ms/h1/w1/v13</property>
    <property value="6.12411">fsim/tables/ps_full_ms/h1/w1/v14</property>
    <property value="2.94241">fsim/tables/ps_full_ms/h1/w1/v15</property>
    <property value="14.8861">fsim/tables/ps_full_ms/h1/w1/v2</property>
    <property value="14.9785">fsim/tables/ps_full_ms/h1/w1/v3</property>
    <property value="15.0321">fsim/tables/ps_full_ms/h1/w1/v4</property>
    <property value="15.005">fsim/tables/ps_full_ms/h1/w1/v5</property>
    <property value="14.8647">fsim/tables/ps_full_ms/h1/w1/v6</property>
    <property value="14.589">fsim/tables/ps_full_ms/h1/w1/v7</property>
    <property value="14.1627">fsim/tables/ps_full_ms/h1/w1/v8</property>
    <property value="13.0382">fsim/tables/ps_full_ms/h1/w1/v9</property>
    <property value="13.3094">fsim/tables/ps_full_ms/h1/w2/v0</property>
    <property value="13.3421">fsim/tables/ps_full_ms/h1/w2/v1</property>
    <property value="11.4639">fsim/tables/ps_full_ms/h1/w2/v10</property>
    <property value="10.6271">fsim/tables/ps_full_ms/h1/w2/v11</property>
    <property value="9.5421">fsim/tables/ps_full_ms/h1/w2/v12</property>
    <property value="7.87067">fsim/tables/ps_full_ms/h1/w2/v13</property>
    <property value="5.67522">fsim/tables/ps_full_ms/h1/w2/v14</property>
    <property value="2.80587">fsim/tables/ps_full_ms/h1/w2/v15</property>
    <property value="13.4508">fsim/tables/ps_full_ms/h1/w2/v2</property>
    <property value="13.5927">fsim/tables/ps_full_ms/h1/w2/v3</property>
    <property value="13.7115">fsim/tables/ps_full_ms/h1/w2/v4</property>
    <property value="13.7566">fsim/tables/ps_full_ms/h1/w2/v5</property>
    <property value="13.6921">fsim/tables/ps_full_ms/h1/w2/v6</property>
    <property value="13.4954">fsim/tables/ps_full_ms/h1/w2/v7</property>
    <property value="13.1517">fsim/tables/ps_full_ms/h1/w2/v8</property>
    <property value="12.104">fsim/tables/ps_full_ms/h1/w2/v9</property>
    <property value="16.1631">fsim/tables/ps_full_ms/h2/w0/v0</property>
    <property value="16.2116">fsim/tables/ps_full_ms/h2/w0/v1</property>
    <property value="13.1836">fsim/tables/ps_full_ms/h2/w0/v10</property>
    <property value="12.1565">fsim/tables/ps_full_ms/h2/w0/v11</property>
    <property value="10.8927">fsim/tables/ps_full_ms/h2/w0/v12</property>
    <property value="9.24897">fsim/tables/ps_full_ms/h2/w0/v13</property>
    <property value="6.59337">fsim/tables/ps_full_ms/h2/w0/v14</property>
    <property value="3.08582">fsim/tables/ps_full_ms/h2/w0/v15</property>
    <property value="16.3057">fsim/tables/ps_full_ms/h2/w0/v2</property>
    <property value="16.3711">fsim/tables/ps_full_ms/h2/w0/v3</property>
    <property value="16.3767">fsim/tables/ps_full_ms/h2/w0/v4</property>
    <property value="16.2877">fsim/tables/ps_full_ms/h2/w0/v5</property>
    <property value="16.0744">fsim/tables/ps_full_ms/h2/w0/v6</property>
    <property value="15.7151">fsim/tables/ps_full_ms/h2/w0/v7</property>
    <property value="15.1949">fsim/tables/ps_full_ms/h2/w0/v8</property>
    <property value="14.0038">fsim/tables/ps_full_ms/h2/w0/v9</property>
    <property value="14.7127">fsim/tables/ps_full_ms/h2/w1/v0</property>
    <property value="14.7533">fsim/tables/ps_full_ms/h2/w1/v1</property>
    <property value="12.317">fsim/tables/ps_full_ms/h2/w1/v10</property>
    <property value="11.395">fsim/tables/ps_full_ms/h2/w1/v11</property>
    <property value="10.216">fsim/tables/ps_full_ms/h2/w1/v12</property>
    <property value="8.55153">fsim/tables/ps_full_ms/h2/w1/v13</property>
    <property value="6.14663">fsim/tables/ps_full_ms/h2/w1/v14</property>
    <property value="2.98633">fsim/tables/ps_full_ms/h2/w1/v15</property>
    <property value="14.8468">fsim/tables/ps_full_ms/h2/w1/v2</property>
    <property value="14.946">fsim/tables/ps_full_ms/h2/w1/v3</property>
    <property value="15.008">fsim/tables/ps_full_ms/h2/w1/v4</property>
    <property value="14.9894">fsim/tables/ps_full_ms/h2/w1/v5</property>
    <property value="14.8564">fsim/tables/ps_full_ms/h2/w1/v6</property>
    <property value="14.586">fsim/tables/ps_full_ms/h2/w1/v7</property>
    <property value="14.1627">fsim/tables/ps_full_ms/h2/w1/v8</property>
    <property value="13.0384">fsim/tables/ps_full_ms/h2/w1/v9</property>
    <property value="13.2284">fsim/tables/ps_full_ms/h2/w2/v0</property>
    <property value="13.2636">fsim/tables/ps_full_ms/h2/w2/v1</property>
    <property value="11.4708">fsim/tables/ps_full_ms/h2/w2/v10</property>
    <property value="10.6453">fsim/tables/ps_full_ms/h2/w2/v11</property>
    <property value="9.57729">fsim/tables/ps_full_ms/h2/w2/v12</property>
    <property value="7.93025">fsim/tables/ps_full_ms/h2/w2/v13</property>
    <property value="5.7601">fsim/tables/ps_full_ms/h2/w2/v14</property>
    <property value="2.93101">fsim/tables/ps_full_ms/h2/w2/v15</property>
    <property value="13.3772">fsim/tables/ps_full_ms/h2/w2/v2</property>
    <property value="13.5277">fsim/tables/ps_full_ms/h2/w2/v3</property>
    <property value="13.6579">fsim/tables/ps_full_ms/h2/w2/v4</property>
    <property value="13.7157">fsim/tables/ps_full_ms/h2/w2/v5</property>
    <property value="13.6636">fsim/tables/ps_full_ms/h2/w2/v6</property>
    <property value="13.4782">fsim/tables/ps_full_ms/h2/w2/v7</property>
    <property value="13.1442">fsim/tables/ps_full_ms/h2/w2/v8</property>
    <property value="12.1016">fsim/tables/ps_full_ms/h2/w2/v9</property>
    <property value="16.0928">fsim/tables/ps_full_ms/h3/w0/v0</property>
    <property value="16.145">fsim/tables/ps_full_ms/h3/w0/v1</property>
    <property value="13.1651">fsim/tables/ps_full_ms/h3/w0/v10</property>
    <property value="12.1457">fsim/tables/ps_full_ms/h3/w0/v11</property>
    <property value="10.8726">fsim/tables/ps_full_ms/h3/w0/v12</property>
    <property value="9.26862">fsim/tables/ps_full_ms/h3/w0/v13</property>
    <property value="6.65049">fsim/tables/ps_full_ms/h3/w0/v14</property>
    <property value="3.19715">fsim/tables/ps_full_ms/h3/w0/v15</property>
    <property value="16.2431">fsim/tables/ps_full_ms/h3/w0/v2</property>
    <property value="16.3147">fsim/tables/ps_full_ms/h3/w0/v3</property>
    <property value="16.3281">fsim/tables/ps_full_ms/h3/w0/v4</property>
    <property value="16.2474">fsim/tables/ps_full_ms/h3/w0/v5</property>
    <property value="16.0418">fsim/tables/ps_full_ms/h3/w0/v6</property>
    <property value="15.689">fsim/tables/ps_full_ms/h3/w0/v7</property>
    <property value="15.1735">fsim/tables/ps_full_ms/h3/w0/v8</property>
    <property value="13.9825">fsim/tables/ps_full_ms/h3/w0/v9</property>
    <property value="14.6094">fsim/tables/ps_full_ms/h3/w1/v0</property>
    <property value="14.6533">fsim/tables/ps_full_ms/h3/w1/v1</property>
    <property value="12.305">fsim/tables/ps_full_ms/h3/w1/v10</property>
    <property value="11.3989">fsim/tables/ps_full_ms/h3/w1/v11</property>
    <property value="10.2365">fsim/tables/ps_full_ms/h3/w1/v12</property>
    <property value="8.62502">fsim/tables/ps_full_ms/h3/w1/v13</property>
    <property value="6.26452">fsim/tables/ps_full_ms/h3/w1/v14</property>
    <property value="3.17883">fsim/tables/ps_full_ms/h3/w1/v15</property>
    <property value="14.7509">fsim/tables/ps_full_ms/h3/w1/v2</property>
    <property value="14.8576">fsim/tables/ps_full_ms/h3/w1/v3</property>
    <property value="14.9299">fsim/tables/ps_full_ms/h3/w1/v4</property>
    <property value="14.9235">fsim/tables/ps_full_ms/h3/w1/v5</property>
    <property value="14.8032">fsim/tables/ps_full_ms/h3/w1/v6</property>
    <property value="14.5453">fsim/tables/ps_full_ms/h3/w1/v7</property>
    <property value="14.1335">fsim/tables/ps_full_ms/h3/w1/v8</property>
    <property value="13.0142">fsim/tables/ps_full_ms/h3/w1/v9</property>
    <property value="13.086">fsim/tables/ps_full_ms/h3/w2/v0</property>
    <property value="13.1237">fsim/tables/ps_full_ms/h3/w2/v1</property>
    <property value="11.4423">fsim/tables/ps_full_ms/h3/w2/v10</property>
    <property value="10.6341">fsim/tables/ps_full_ms/h3/w2/v11</property>
    <property value="9.59152">fsim/tables/ps_full_ms/h3/w2/v12</property>
    <property value="7.97922">fsim/tables/ps_full_ms/h3/w2/v13</property>
    <property value="5.84869">fsim/tables/ps_full_ms/h3/w2/v14</property>
    <property value="3.07777">fsim/tables/ps_full_ms/h3/w2/v15</property>
    <property value="13.2424">fsim/tables/ps_full_ms/h3/w2/v2</property>
    <property value="13.4028">fsim/tables/ps_full_ms/h3/w2/v3</property>
    <property value="13.5463">fsim/tables/ps_full_ms/h3/w2/v4</property>
    <property value="13.6194">fsim/tables/ps_full_ms/h3/w2/v5</property>
    <property value="13.5832">fsim/tables/ps_full_ms/h3/w2/v6</property>
    <property value="13.4134">fsim/tables/ps_full_ms/h3/w2/v7</property>
    <property value="13.094">fsim/tables/ps_full_ms/h3/w2/v8</property>
    <property value="12.0576">fsim/tables/ps_full_ms/h3/w2/v9</property>
    <property value="55.125">fsim/tables/reach_tas_ms/h0/w0</property>
    <property value="55.75">fsim/tables/reach_tas_ms/h0/w1</property>
    <property value="56.25">fsim/tables/reach_tas_ms/h0/w2</property>
    <property value="55.875">fsim/tables/reach_tas_ms/h1/w0</property>
    <property value="56.5">fsim/tables/reach_tas_ms/h1/w1</property>
    <property value="57">fsim/tables/reach_tas_ms/h1/w2</property>
    <property value="56.625">fsim/tables/reach_tas_ms/h2/w0</property>
    <property value="57.25">fsim/tables/reach_tas_ms/h2/w1</property>
    <property value="57.625">fsim/tables/reach_tas_ms/h2/w2</property>
    <property value="57.25">fsim/tables/reach_tas_ms/h3/w0</property>
    <property value="57.75">fsim/tables/reach_tas_ms/h3/w1</property>
    <property value="58.125">fsim/tables/reach_tas_ms/h3/w2</property>
    <property value="0">fsim/tables/speed_fraction/v0</property>
    <property value="0.0666667">fsim/tables/speed_fraction/v1</property>
    <property value="0.666667">fsim/tables/speed_fraction/v10</property>
    <property value="0.733333">fsim/tables/speed_fraction/v11</property>
    <property value="0.8">fsim/tables/speed_fraction/v12</property>
    <property value="0.866667">fsim/tables/speed_fraction/v13</property>
    <property value="0.933333">fsim/tables/speed_fraction/v14</property>
    <property value="1">fsim/tables/speed_fraction/v15</property>
    <property value="0.133333">fsim/tables/speed_fraction/v2</property>
    <property value="0.2">fsim/tables/speed_fraction/v3</property>
    <property value="0.266667">fsim/tables/speed_fraction/v4</property>
    <property value="0.333333">fsim/tables/speed_fraction/v5</property>
    <property value="0.4">fsim/tables/speed_fraction/v6</property>
    <property value="0.466667">fsim/tables/speed_fraction/v7</property>
    <property value="0.533333">fsim/tables/speed_fraction/v8</property>
    <property value="0.6">fsim/tables/speed_fraction/v9</property>
    <property value="2221.7">fsim/tables/weight_kg/w0</property>
    <property value="2507.46">fsim/tables/weight_kg/w1</property>
    <property value="2793.22">fsim/tables/weight_kg/w2</property>
    <property value="1">fsim/applicability/version</property>
    <property value="1">fsim/applicability/provenance</property>
    <property value="0">fsim/applicability/aerobatic</property>
    <property value="3">fsim/applicability/carrier</property>
    <property value="1">fsim/applicability/drag_devices</property>
    <property value="0">fsim/applicability/flaps</property>
    <property value="2">fsim/applicability/ground_contact</property>
    <property value="4">fsim/applicability/releasable_stores</property>
    <property value="0">fsim/applicability/retractable_gear</property>
    <property value="1">fsim/applicability/vertical_flight</property>
    <channel name="pilot">
      <!-- the controls in inches: stick and pedals from the centre, + forward, + right, + right
           pedal; the collective from the bottom -->
      <pure_gain name="fcs/uh1h/long-in"> <input> fcs/elevator-cmd-norm </input> <gain> 6.45 </gain> </pure_gain>
      <pure_gain name="fcs/uh1h/lat-in"> <input> fcs/aileron-cmd-norm </input> <gain> 6.3 </gain> </pure_gain>
      <pure_gain name="fcs/uh1h/pedal-in"> <input> fcs/rudder-cmd-norm </input> <gain> -3.45 </gain> </pure_gain>
      <pure_gain name="fcs/uh1h/coll-in"> <input> fcs/throttle-cmd-norm[0] </input> <gain> 11 </gain>
        <clipto> <min> 0 </min> <max> 11 </max> </clipto> </pure_gain>
    </channel>
    <channel name="stabilizer bar">
      <fcs_function name="fcs/uh1h/p-shaft">
        <function> <sum> <product> <value> 0.9961947 </value> <property> velocities/p-rad_sec </property> </product>
          <product> <value> 0.087155743 </value> <property> velocities/r-rad_sec </property> </product> </sum> </function>
      </fcs_function>
      <lag_filter name="fcs/uh1h/bar-p"> <input> fcs/uh1h/p-shaft </input> <c1> 0.3030303 </c1> </lag_filter>
      <lag_filter name="fcs/uh1h/bar-q"> <input> velocities/q-rad_sec </input> <c1> 0.3030303 </c1> </lag_filter>
    </channel>
    <channel name="swashplate">
      <fcs_function name="fcs/uh1h/long-mixed"> <function> <property> fcs/uh1h/long-in </property> </function> </fcs_function>
      <fcs_function name="fcs/uh1h/lat-mixed"> <function> <property> fcs/uh1h/lat-in </property> </function> </fcs_function>
      <fcs_function name="fcs/uh1h/pedal-mixed"> <function> <property> fcs/uh1h/pedal-in </property> </function> </fcs_function>
      <fcs_function name="fcs/uh1h/b1c-rad"> <function> <sum> <product> <value> 0.0324 </value> <property> fcs/uh1h/long-mixed </property> </product> <product> <value> 0.528 </value> <property> fcs/uh1h/bar-q </property> </product> </sum> </function> </fcs_function>
      <fcs_function name="fcs/uh1h/a1c-rad"> <function> <sum> <product> <value> 0.0277 </value> <property> fcs/uh1h/lat-mixed </property> </product> <product> <value> -0.528 </value> <property> fcs/uh1h/bar-p </property> </product> </sum> </function> </fcs_function>
      <lag_filter name="fcs/uh1h/b1s-lag"> <input> fcs/uh1h/b1c-rad </input> <c1> 6.9444444 </c1> </lag_filter>
      <lag_filter name="fcs/uh1h/a1s-lag"> <input> fcs/uh1h/a1c-rad </input> <c1> 6.9444444 </c1> </lag_filter>
      <fcs_function name="fcs/uh1h/b1s-rad">
        <function> <sum> <property> fcs/uh1h/b1s-lag </property> <value> -0.0064 </value> </sum> </function>
        <output> propulsion/engine[0]/longitudinal-ctrl-rad </output>
      </fcs_function>
      <fcs_function name="fcs/uh1h/a1s-rad">
        <function> <sum> <property> fcs/uh1h/a1s-lag </property> <value> -0.0486 </value> </sum> </function>
        <output> propulsion/engine[0]/lateral-ctrl-rad </output>
      </fcs_function>
      <pure_gain name="fcs/uh1h/theta75-cmd"> <input> fcs/uh1h/coll-in </input> <gain> 0.025 </gain> </pure_gain>
      <lag_filter name="fcs/uh1h/theta75-rad"> <input> fcs/uh1h/theta75-cmd </input> <c1> 5 </c1> </lag_filter>
      <fcs_function name="fcs/uh1h/theta0-root-rad">
        <function> <sum> <property> fcs/uh1h/theta75-rad </property> <value> 0.14268067 </value> </sum> </function>
        <output> propulsion/engine[0]/collective-ctrl-rad </output>
      </fcs_function>
      <fcs_function name="fcs/uh1h/theta-tr-rad">
        <function> <sum> <value> 0.119 </value> <product> <value> -0.071 </value> <property> fcs/uh1h/pedal-mixed </property> </product> </sum> </function>
        <output> propulsion/engine[1]/antitorque-ctrl-rad </output>
      </fcs_function>
    </channel>
    <channel name="stabilizer">
      <fcs_function name="fcs/uh1h/stab-rad">
        <!-- the stabilizer is linked to the longitudinal stick (TM-73254 table 1) -->
        <function> <table> <independentVar> fcs/uh1h/long-in </independentVar> <tableData>
              -6.450   0.02240
              -6.000   0.01740
              -5.000   0.00000
              -4.000  -0.01920
              -3.000  -0.03840
              -2.000  -0.05410
              -1.000  -0.06900
               0.000  -0.08200
               1.000  -0.08500
               2.000  -0.08030
               3.000  -0.06280
               4.000  -0.03000
               5.000   0.00350
               6.000   0.05930
               6.450   0.09420
          </tableData> </table> </function>
        <output> fcs/elevator-pos-rad </output> <!-- the platform reports it (VehicleState::elevatorRad); the model's elevator follows -->
      </fcs_function>
    </channel>
    <channel name="blade strike">
      <!-- the shaft's up component (its angle from the vertical's cosine) and the hub's height above the ground;
           a strike counts once the flight has begun (a start's ground trim, at time 0, searches through the
           ground) -->
      <fcs_function name="fcs/uh1h/shaft-up">
        <function> <sum>
          <product> <sin> <property> attitude/theta-rad </property> </sin> <value> 0.087155743 </value> </product>
          <product> <cos> <property> attitude/phi-rad </property> </cos> <cos> <property> attitude/theta-rad </property> </cos> <value> 0.9961947 </value> </product>
        </sum> </function>
      </fcs_function>
      <fcs_function name="fcs/uh1h/hub-agl-ft">
        <function> <difference> <property> position/h-agl-ft </property> <sum>
          <product> <value> -0.54166667 </value> <sin> <property> attitude/theta-rad </property> </sin> </product>
          <product> <value> 0 </value> <sin> <property> attitude/phi-rad </property> </sin> <cos> <property> attitude/theta-rad </property> </cos> </product>
          <product> <value> -6.7916667 </value> <cos> <property> attitude/phi-rad </property> </cos> <cos> <property> attitude/theta-rad </property> </cos> </product>
        </sum> </difference> </function>
      </fcs_function>
      <fcs_function name="fcs/uh1h/blades-strike">
        <function> <and> <gt> <property> simulation/sim-time-sec </property> <value> 0 </value> </gt>
          <lt> <property> fcs/uh1h/hub-agl-ft </property> <product> <value> 24.13 </value>
          <sqrt> <max> <value> 0 </value> <difference> <value> 1 </value> <product> <property> fcs/uh1h/shaft-up </property> <property> fcs/uh1h/shaft-up </property> </product> </difference> </max> </sqrt>
        </product> </lt> </and> </function>
      </fcs_function>
      <!-- held once struck: the integral of the strike, clipped at 1 (a reset clears it) -->
      <pid name="fcs/uh1h/blades-struck-sum"> <input> fcs/uh1h/blades-strike </input>
        <kp> 0 </kp> <ki> 1000 </ki> <kd> 0 </kd> <clipto> <min> 0 </min> <max> 1 </max> </clipto> </pid>
      <fcs_function name="fcs/uh1h/blades-struck">
        <function> <gt> <property> fcs/uh1h/blades-struck-sum </property> <value> 0 </value> </gt> </function>
      </fcs_function>
    </channel>
    <channel name="engine">
      <!-- The rotor speed is a state here: the engine's power less the rotors' drives it through the
           drive's inertia; a governor holds the design's rpm, the load fed forward. 'armed' is 0 on
           the first frame after a load or a reset, 1 after: JSBSim resets the components' states but
           not their output properties, nor the rotors' torques, so what the channel reads from the
           previous frame is gated by it then. -->
      <fcs_function name="fcs/uh1h/one"> <function> <value> 1 </value> </function> </fcs_function>
      <lag_filter name="fcs/uh1h/armed-lag"> <input> fcs/uh1h/one </input> <c1> 1000 </c1> </lag_filter>
      <fcs_function name="fcs/uh1h/armed"> <function> <gt> <property> fcs/uh1h/armed-lag </property> <value> 0.5 </value> </gt> </function> </fcs_function>
      <fcs_function name="fcs/uh1h/delta-omega-prev">
        <function> <product> <property> fcs/uh1h/armed </property> <property> fcs/uh1h/delta-omega </property> </product> </function>
      </fcs_function>
      <fcs_function name="fcs/uh1h/omega">
        <function> <sum> <value> 33.897785 </value> <property> fcs/uh1h/delta-omega-prev </property> </sum> </function>
      </fcs_function>
      <fcs_function name="fcs/uh1h/rpm-error"> <function> <product> <value> -1 </value> <property> fcs/uh1h/delta-omega-prev </property> </product> </function> </fcs_function>
      <pid name="fcs/uh1h/governor"> <input> fcs/uh1h/rpm-error </input>
        <kp> 0.295 </kp> <ki> 0.295 </ki> <kd> 0 </kd>
        <trigger> fcs/uh1h/power-saturated </trigger> </pid>
      <fcs_function name="fcs/uh1h/load-power">
        <function> <quotient> <product> <property> fcs/uh1h/armed </property> <property> fcs/uh1h/omega </property> <sum>
          <property> propulsion/engine[0]/torque-lbsft </property>
          <product> <property> propulsion/engine[1]/torque-lbsft </property> <value> 5.1365494 </value> </product>
        </sum> </product> <value> 605000 </value> </quotient> </function>
      </fcs_function>
      <fcs_function name="fcs/uh1h/power-demand">
        <function> <sum> <property> fcs/uh1h/load-power </property> <property> fcs/uh1h/governor </property> </sum> </function>
      </fcs_function>
      <fcs_function name="fcs/uh1h/power">
        <function> <product> <difference> <value> 1 </value> <property> fcs/uh1h/blades-struck </property> </difference>
          <max> <value> 0 </value> <min> <value> 1 </value> <property> fcs/uh1h/power-demand </property> </min> </max> </product> </function>
        <output> fcs/throttle-pos-norm[0] </output>
      </fcs_function>
      <fcs_function name="fcs/uh1h/power-saturated">
        <function> <gt> <abs> <difference> <property> fcs/uh1h/power-demand </property> <property> fcs/uh1h/power </property> </difference> </abs> <value> 1e-9 </value> </gt> </function>
      </fcs_function>
      <pure_gain name="fcs/uh1h/tail-drive-throttle"> <input> fcs/uh1h/power </input> <gain> 0 </gain>
        <output> fcs/throttle-pos-norm[1] </output> </pure_gain>
      <fcs_function name="fcs/uh1h/fed">
        <function> <gt> <property> propulsion/total-fuel-lbs </property> <value> 0 </value> </gt> </function>
      </fcs_function>
      <fcs_function name="fcs/uh1h/net-torque">
        <function> <product> <property> fcs/uh1h/armed </property> <difference>
          <quotient> <product> <property> fcs/uh1h/power </property> <value> 605000 </value> <property> fcs/uh1h/fed </property> </product>
            <max> <value> 1 </value> <property> fcs/uh1h/omega </property> </max> </quotient>
          <sum> <property> propulsion/engine[0]/torque-lbsft </property>
            <product> <property> propulsion/engine[1]/torque-lbsft </property> <value> 5.1365494 </value> </product> </sum>
          <product> <property> fcs/uh1h/blades-struck </property> <value> 92619.503 </value> </product>
        </difference> </product> </function>
      </fcs_function>
      <!-- the rotor speed stops where the rotors' do (FGRotor's minimum and 130 %): past it, and pushed further,
           it is held there, the integration stopped -->
      <fcs_function name="fcs/uh1h/omega-stop">
        <function> <or>
          <and> <ge> <property> fcs/uh1h/delta-omega </property> <value> 10.169335 </value> </ge>
            <gt> <property> fcs/uh1h/net-torque </property> <value> 0 </value> </gt> </and>
          <and> <le> <property> fcs/uh1h/delta-omega </property> <value> -33.793065 </value> </le>
            <lt> <property> fcs/uh1h/net-torque </property> <value> 0 </value> </lt> </and>
        </or> </function>
      </fcs_function>
      <pid name="fcs/uh1h/delta-omega"> <input> fcs/uh1h/net-torque </input>
        <kp> 0 </kp> <ki type="trap"> 0.00018299485 </ki> <kd> 0 </kd>
        <trigger> fcs/uh1h/omega-stop </trigger> <clipto> <min> -33.793065 </min> <max> 10.169335 </max> </clipto> </pid>
      <!-- the engine's torque on the main rotor's shaft: what the airframe feels of the rotors (the
           external reaction rotor-drive) -->
      <fcs_function name="fcs/uh1h/drive-torque">
        <function> <quotient> <product> <property> fcs/uh1h/power </property> <value> 605000 </value> <property> fcs/uh1h/fed </property> </product>
          <max> <value> 1 </value> <property> fcs/uh1h/omega </property> </max> </quotient> </function>
      </fcs_function>
      <fcs_function name="fcs/uh1h/rotor-rpm">
        <function> <product> <sum> <value> 33.897785 </value> <property> fcs/uh1h/delta-omega </property> </sum> <value> 9.5492966 </value> </product> </function>
        <output> propulsion/engine[0]/x-rpm-dict </output>
      </fcs_function>
    </channel>
  </flight_control>
  <aerodynamics>
    <!-- TM-73254 eq. 42-60, in the report's body axes - the shaft's - the velocities turned into them
         and the forces and moments back -->
    <function name="aero/uh1h/u-s">
      <sum> <product> <value> 0.9961947 </value> <property> velocities/u-aero-fps </property> </product>
        <product> <value> 0.087155743 </value> <property> velocities/w-aero-fps </property> </product> </sum>
    </function>
    <function name="aero/uh1h/w-s">
      <sum> <product> <value> -0.087155743 </value> <property> velocities/u-aero-fps </property> </product>
        <product> <value> 0.9961947 </value> <property> velocities/w-aero-fps </property> </product> </sum>
    </function>
    <function name="aero/uh1h/r-s">
      <sum> <product> <value> -0.087155743 </value> <property> velocities/p-aero-rad_sec </property> </product>
        <product> <value> 0.9961947 </value> <property> velocities/r-aero-rad_sec </property> </product> </sum>
    </function>
    <function name="aero/uh1h/sign-u">
      <description> sgn u, smoothed over 1 ft/s so the force is continuous through hover </description>
      <quotient> <property> aero/uh1h/u-s </property>
        <sqrt> <sum> <product> <property> aero/uh1h/u-s </property> <property> aero/uh1h/u-s </property> </product> <value> 1 </value> </sum> </sqrt> </quotient>
    </function>
    <function name="aero/uh1h/fus-x-s">
      <description> eq. 42: X_F = -D1 u|u| + L1 w^2 sgn u </description>
      <sum>
        <product> <value> -0.022 </value> <property> aero/uh1h/u-s </property> <abs> <property> aero/uh1h/u-s </property> </abs> </product>
        <product> <value> 0.0654 </value> <property> aero/uh1h/w-s </property> <property> aero/uh1h/w-s </property> <property> aero/uh1h/sign-u </property> </product>
      </sum>
    </function>
    <function name="aero/uh1h/fus-z-s">
      <description> eq. 44: Z_F = w (-D3 |w| - L1 |u|) </description>
      <product> <property> aero/uh1h/w-s </property>
        <difference> <product> <value> -0.646 </value> <abs> <property> aero/uh1h/w-s </property> </abs> </product>
          <product> <value> 0.0654 </value> <abs> <property> aero/uh1h/u-s </property> </abs> </product> </difference> </product>
    </function>
    <function name="aero/uh1h/w-h">
      <description> eq. 54: the stabilizer's normal velocity: its incidence, the pitch rate and the rotor's downwash </description>
      <sum> <property> aero/uh1h/w-s </property>
        <product> <property> aero/uh1h/u-s </property> <property> fcs/uh1h/stab-rad </property> </product>
        <product> <value> 19.67 </value> <property> velocities/q-aero-rad_sec </property> </product>
        <product> <value> -1 </value> <property> propulsion/engine[0]/vi-fps </property> </product> </sum>
    </function>
    <function name="aero/uh1h/alpha-h">
      <atan2> <property> aero/uh1h/w-h </property> <property> aero/uh1h/u-s </property> </atan2>
    </function>
    <function name="aero/uh1h/stab-z-s">
      <description> eq. 57-59: linear to the stall, and within it of reversed flow; stalled between </description>
      <sum>
        <product> <value> -0.0083 </value> <property> aero/uh1h/w-h </property> <abs> <property> aero/uh1h/w-h </property> </abs> </product>
        <ifthen> <or> <le> <abs> <property> aero/uh1h/alpha-h </property> </abs> <value> 0.34906585 </value> </le>
                      <ge> <abs> <property> aero/uh1h/alpha-h </property> </abs> <value> 2.7925268 </value> </ge> </or>
          <product> <value> -0.031 </value> <property> aero/uh1h/w-h </property> <property> aero/uh1h/u-s </property> </product>
          <product> <value> -0.011283077 </value> <property> aero/uh1h/u-s </property> <property> aero/uh1h/u-s </property>
            <sign> <property> aero/uh1h/alpha-h </property> </sign> </product>
        </ifthen>
      </sum>
    </function>
    <function name="aero/uh1h/v-f">
      <description> eq. 48: the fin's side wind (+ from the left) </description>
      <sum> <product> <value> -1 </value> <property> velocities/v-aero-fps </property> </product>
        <product> <value> 25 </value> <property> aero/uh1h/r-s </property> </product> </sum>
    </function>
    <function name="aero/uh1h/alpha-f">
      <atan2> <property> aero/uh1h/v-f </property> <property> aero/uh1h/u-s </property> </atan2>
    </function>
    <function name="aero/uh1h/fin-y">
      <description> eq. 50-52 </description>
      <sum>
        <product> <value> 0.016 </value> <property> aero/uh1h/v-f </property> <abs> <property> aero/uh1h/v-f </property> </abs> </product>
        <ifthen> <or> <le> <abs> <property> aero/uh1h/alpha-f </property> </abs> <value> 0.34906585 </value> </le>
                      <ge> <abs> <property> aero/uh1h/alpha-f </property> </abs> <value> 2.7925268 </value> </ge> </or>
          <product> <value> 0.0292 </value> <property> aero/uh1h/v-f </property> <property> aero/uh1h/u-s </property> </product>
          <product> <value> 0.010627931 </value> <property> aero/uh1h/u-s </property> <property> aero/uh1h/u-s </property>
            <sign> <property> aero/uh1h/alpha-f </property> </sign> </product>
        </ifthen>
      </sum>
    </function>
    <function name="aero/uh1h/fus-n-s">
      <description> eq. 46: N_F = -N1 v u </description>
      <product> <value> -0.956 </value> <property> velocities/v-aero-fps </property> <property> aero/uh1h/u-s </property> </product>
    </function>
    <function name="aero/uh1h/n-s">
      <description> the yawing moment about the shaft: eq. 46 and 53 </description>
      <sum> <property> aero/uh1h/fus-n-s </property>
        <product> <value> -25 </value> <property> aero/uh1h/fin-y </property> </product> </sum>
    </function>
    <function name="aero/uh1h/tr-damping-y">
      <description> the tail rotor's damping beyond the isolated rotor's: the design's fit to flight (TM-73254
        eq. 37-38) less what the rotor model supplies, at the tail rotor </description>
      <product> <value> -10.754882 </value>
        <sum> <property> velocities/v-aero-fps </property>
          <product> <value> -28 </value> <property> velocities/r-aero-rad_sec </property> </product>
          <product> <value> 6.88 </value> <property> velocities/p-aero-rad_sec </property> </product> </sum> </product>
    </function>
    <axis name="X">
      <function name="aero/force/uh1h-x">
        <sum>
          <product> <value> 0.9961947 </value> <property> aero/uh1h/fus-x-s </property> </product>
          <product> <value> -0.087155743 </value> <sum> <property> aero/uh1h/fus-z-s </property> <property> aero/uh1h/stab-z-s </property> </sum> </product>
        </sum>
      </function>
    </axis>
    <axis name="Y">
      <function name="aero/force/uh1h-y">
        <description> eq. 43, the fin and the tail rotor's damping </description>
        <sum>
          <product> <property> velocities/v-aero-fps </property>
            <difference> <product> <value> -0.201 </value> <abs> <property> velocities/v-aero-fps </property> </abs> </product>
              <product> <value> 0.0654 </value> <abs> <property> aero/uh1h/u-s </property> </abs> </product> </difference> </product>
          <property> aero/uh1h/fin-y </property>
          <property> aero/uh1h/tr-damping-y </property>
        </sum>
      </function>
    </axis>
    <axis name="Z">
      <function name="aero/force/uh1h-z">
        <sum>
          <product> <value> 0.087155743 </value> <property> aero/uh1h/fus-x-s </property> </product>
          <product> <value> 0.9961947 </value> <sum> <property> aero/uh1h/fus-z-s </property> <property> aero/uh1h/stab-z-s </property> </sum> </product>
        </sum>
      </function>
    </axis>
    <axis name="ROLL">
      <function name="aero/moment/uh1h-l"> <sum> <product> <value> -0.087155743 </value> <property> aero/uh1h/n-s </property> </product> <product> <value> 6.88 </value> <property> aero/uh1h/tr-damping-y </property> </product> </sum> </function>
    </axis>
    <axis name="PITCH">
      <function name="aero/moment/uh1h-m">
        <description> eq. 45 and 60 </description>
        <sum>
          <product> <value> 0.956 </value> <property> aero/uh1h/w-s </property> <abs> <property> aero/uh1h/u-s </property> </abs> </product>
          <product> <value> 19.67 </value> <property> aero/uh1h/stab-z-s </property> </product>
        </sum>
      </function>
    </axis>
    <axis name="YAW">
      <function name="aero/moment/uh1h-n"> <sum> <product> <value> 0.9961947 </value> <property> aero/uh1h/n-s </property> </product> <product> <value> -28 </value> <property> aero/uh1h/tr-damping-y </property> </product> </sum> </function>
    </axis>
  </aerodynamics>
</fdm_config>
